# Disposal, asphalt, 0.1% water, to sanitary landfill

Dataset: EcoSpold 1, unit process
Functional unit: 1 kg
Category: landfill / sanitary landfill
Geography: CH
Time period: 2000-01 to 2000-12
Generated by: Gabor Doka
accessRestrictedTo: 0
copyright: true

## General comment
Inventoried waste contains 94.7% inert material; 5.3% bitumen; . waste composition (wet, in ppm): upper heating value 2.194 MJ/kg; lower heating value 2.087 MJ/kg; H2O 718.68; O 505600; H 5300; C 44036; S 2120; N 265; P 0.212; B n.a.; Cl n.a.; Br n.a.; F n.a.; I n.a.; Ag n.a.; As 0.0371; Ba n.a.; Cd n.a.; Co 0.02279; Cr 0.01855; Cu 0.265; Hg 0.00106; Mn n.a.; Mo 0.02968; Ni 5.3; Pb 0.053; Sb n.a.; Se 0.0106; Sn 4.717; V 13.25; Zn n.a.; Be n.a.; Sc n.a.; Sr n.a.; Ti n.a.; Tl n.a.; W n.a.; Si 441930; Fe 3.975; Ca 0.318; Al 0.371; K n.a.; Mg n.a.; Na 1.855; Share of carbon in waste that is biogenic 0%. Overall degradability of waste during 100 years: 0.05%.;;

## Included processes
Waste-specific short-term emissions to air via landfill gas incineration and landfill leachate. Burdens from treatment of short-term leachate (0-100a) in wastewater treatment plant (including WWTP sludge disposal in municipal incinerator). Long-term emissions from landfill to groundwater (after base lining failure).

## Geography
Technology encountered in Switzerland in 2000. Landfill includes base seal, leachate collection system, treatment of leachate in municipal wastewater treatment plant.

## Technology
Swiss municipal sanitary landfill for biogenic or untreated municipal waste ("reactive organic landfill"). Landfill gas and leachate collection system. Recultivation and monitoring for 150 years after closure.

## Reference product
- Disposal, asphalt, 0.1% water, to sanitary landfill [CH]: 1 kg
  SWITZERLAND

## Inputs from technosphere
- Natural gas, burned in boiler modulating >100kW [RER]: 4.71e-5 MJ; lognormal SD95 1.16
  burden from wastewater treatment of the short-term leachate (0-100a). Uncertainty calculated from unertainty of the waste composition of this waste, uncertainty in waste decomposition and short-term leaching in sanitary landfill
- Disposal, plastics, mixture, 15.3% water, to municipal incineration [CH]: 3.88e-5 kg; lognormal SD95 1.13
  (same comment as for Natural gas, burned in boiler modulating >100kW)
- Disposal, cement, hydrated, 0% water, to residual material landfill [CH]: 1.04e-8 kg; lognormal SD95 5.97
  burden from incineration of sludge from wastewater treatment of the short-term leachate (0-100a). uncertainty is calculated from uncertainties in waste composition and transfer coefficients in incinerator and uncertainty of waste decomposition and short-term leaching in sanitary landfill
- Heat from waste, at municipal waste incineration plant [CH]: 6.37e-6 MJ; lognormal SD95 6.81
  (same comment as for Disposal, cement, hydrated, 0% water, to residual material landfill)
- Sewer grid, class 3 [CH]: 5.45e-10 km; lognormal SD95 1.1
  (same comment as for Natural gas, burned in boiler modulating >100kW)
- Disposal, paper, 11.2% water, to municipal incineration [CH]: 3.88e-5 kg; lognormal SD95 1.13
  (same comment as for Natural gas, burned in boiler modulating >100kW)
- Process-specific burdens, sanitary landfill [CH]: 1 kg; lognormal SD95 1
  demands per kilogram waste. uncertainty is heeded in the module
- Ammonia, liquid, at regional storehouse [CH]: 9.31e-9 kg; lognormal SD95 6.41
  (same comment as for Disposal, cement, hydrated, 0% water, to residual material landfill)
- Residual material landfill facility [CH]: 2.1e-17 p; lognormal SD95 5.92
  (same comment as for Disposal, cement, hydrated, 0% water, to residual material landfill)
- Electricity from waste, at municipal waste incineration plant [CH]: 1.09e-6 kWh; lognormal SD95 10.1
  (same comment as for Disposal, cement, hydrated, 0% water, to residual material landfill)
- Chemicals organic, at plant [GLO]: 1.55e-12 kg; lognormal SD95 25.9
  (same comment as for Disposal, cement, hydrated, 0% water, to residual material landfill)
- Sanitary landfill facility [CH]: 5.56e-10 p; lognormal SD95 1
  demands per kilogram waste. uncertainty is heeded in the module
- Chemicals inorganic, at plant [GLO]: 1.01e-12 kg; lognormal SD95 4.69
  (same comment as for Disposal, cement, hydrated, 0% water, to residual material landfill)
- Electricity, low voltage, at grid [CH]: 0.000109 kWh; lognormal SD95 2.34
  (same comment as for Natural gas, burned in boiler modulating >100kW)
- Slag compartment [CH]: 7.2e-17 p; lognormal SD95 5.16
  (same comment as for Disposal, cement, hydrated, 0% water, to residual material landfill)
- Hydrochloric acid, 30% in H2O, at plant [RER]: 6.03e-13 kg; lognormal SD95 4.69
  (same comment as for Disposal, cement, hydrated, 0% water, to residual material landfill)
- Municipal waste incineration plant [CH]: 1.9e-15 p; lognormal SD95 6.8
  burden from incineration of sludge from wastewater treatment of the short-term leachate (0-100a).
- Process-specific burdens, residual material landfill [CH]: 1.04e-8 kg; lognormal SD95 5.92
  (same comment as for Disposal, cement, hydrated, 0% water, to residual material landfill)
- Sodium hydroxide, 50% in H2O, production mix, at plant [RER]: 4.63e-10 kg; lognormal SD95 5.81
  (same comment as for Disposal, cement, hydrated, 0% water, to residual material landfill)
- Quicklime, milled, packed, at plant [CH]: 8.39e-11 kg; lognormal SD95 5.83
  (same comment as for Disposal, cement, hydrated, 0% water, to residual material landfill)
- Iron sulphate, at plant [RER]: 5.62e-10 kg; lognormal SD95 23.8
  (same comment as for Natural gas, burned in boiler modulating >100kW)
- Cement, unspecified, at plant [CH]: 4.17e-9 kg; lognormal SD95 5.97
  (same comment as for Disposal, cement, hydrated, 0% water, to residual material landfill)
- Transport, freight, lorry, 16t-32t gross weight, fleet average [CH]: 9.55e-7 tkm; lognormal SD95 1.95
  (same comment as for Disposal, cement, hydrated, 0% water, to residual material landfill)
- Titanium dioxide, production mix, at plant [RER]: 2.66e-10 kg; lognormal SD95 8.39
  (same comment as for Disposal, cement, hydrated, 0% water, to residual material landfill)
- Process-specific burdens, municipal waste incineration [CH]: 7.59e-6 kg; lognormal SD95 6.8
  (same comment as for Municipal waste incineration plant)
- Aluminium sulphate, powder, at plant [RER]: 1.52e-10 kg; lognormal SD95 23.8
  (same comment as for Natural gas, burned in boiler modulating >100kW)
- Iron (III) chloride, 40% in H2O, at plant [CH]: 8.13e-10 kg; lognormal SD95 22.7
  (same comment as for Disposal, cement, hydrated, 0% water, to residual material landfill)
- Wastewater treatment plant, class 3 [CH]: 1.42e-11 p; lognormal SD95 1.1
  (same comment as for Natural gas, burned in boiler modulating >100kW)
- Natural gas, burned in industrial furnace 1MW [CH]: 9.08e-7 MJ; lognormal SD95 6.41
  (same comment as for Disposal, cement, hydrated, 0% water, to residual material landfill)
- Process-specific burdens, slag compartment [CH]: 4.08e-8 kg; lognormal SD95 5.16
  (same comment as for Disposal, cement, hydrated, 0% water, to residual material landfill)
- Light fuel oil, burned in boiler 100kW, non-modulating [CH]: 3.49e-5 MJ; lognormal SD95 1.16
  (same comment as for Natural gas, burned in boiler modulating >100kW)
- Transport, freight, rail [RER]: 2.47e-8 tkm; lognormal SD95 5.83
  (same comment as for Disposal, cement, hydrated, 0% water, to residual material landfill)
- Chromium oxide, flakes, at plant [RER]: 5.44e-12 kg; lognormal SD95 8.39
  burden from incineration of sludge from wastewater treatment of the short-term leachate (0-100a). Proxy for vanadium pentoxide V2O5 in SCR catalyst, uncertainty calculated from uncertainty in average DeNOx input, uncertainty in the share of thermal NOx, uncertainty of nitrogen content in average municipal waste and the unertainty in nitrogen content in *this* waste and uncertainty of waste decomposition and short-term leaching in sanitary landfill

## Emissions to nature
- COD, Chemical Oxygen Demand [emissions to water, river]: 8.09e-6 kg; lognormal SD95 7.52
  Emissions from short-term leachate treatment and incineration of resulting sludge. Uncertainty calculated depending on waste input and uncertainty of transfer coefficents in landfill, wastewater treatment and incineration model.
- Selenium [emissions to water, river]: 7.47e-12 kg; lognormal SD95 24.7
  (same comment as for COD, Chemical Oxygen Demand)
- Sulfate [emissions to water, groundwater, long-term]: 0.0059 kg; lognormal SD95 4.47
  Emissions from long-term leachate (>100a) directly from MSW landfill and indirectly via incineration of treatement sludge from leachate treatement. Uncertainty calculated depending on waste input and uncertainty of long-term transfer coefficents in landfill.
- NMVOC, non-methane volatile organic compounds, unspecified origin [emissions to air, high. pop.]: 3.27e-10 kg; lognormal SD95 8.83
  (same comment as for COD, Chemical Oxygen Demand)
- Carbon dioxide, fossil [emissions to air, low. pop.]: 0.0011 kg; lognormal SD95 4.54
  burden from direct release or incineration of landfill biogas. Uncertainty calculated from unertainty of the waste composition of this waste, uncertainty in waste decomposition and short-term leaching in sanitary landfill
- Aluminium [emissions to air, high. pop.]: 3.1e-13 kg; lognormal SD95 20.2
  (same comment as for COD, Chemical Oxygen Demand)
- Mercury [emissions to air, low. pop.]: 2.9e-13 kg; lognormal SD95 27.5
  (same comment as for Carbon dioxide, fossil)
- NMVOC, non-methane volatile organic compounds, unspecified origin [emissions to air, low. pop.]: 1.18e-9 kg; lognormal SD95 4.79
  (same comment as for Carbon dioxide, fossil)
- TOC, Total Organic Carbon [emissions to water, river]: 2.05e-6 kg; lognormal SD95 7.53
  (same comment as for COD, Chemical Oxygen Demand)
- Nickel [emissions to water, groundwater, long-term]: 5.3e-6 kg; lognormal SD95 10.2
  (same comment as for Sulfate)
- Vanadium [emissions to water, groundwater, long-term]: 3.86e-6 kg; lognormal SD95 12.7
  (same comment as for Sulfate)
- Selenium [emissions to air, high. pop.]: 0 kg; lognormal SD95 26.9
  (same comment as for COD, Chemical Oxygen Demand)
- Cobalt [emissions to air, high. pop.]: 1e-18 kg; lognormal SD95 24.3
  (same comment as for COD, Chemical Oxygen Demand)
- Chromium [emissions to water, river]: 3.32e-15 kg; lognormal SD95 30
  (same comment as for COD, Chemical Oxygen Demand)
- Silicon [emissions to water, river]: 9.57e-12 kg; lognormal SD95 24.8
  (same comment as for COD, Chemical Oxygen Demand)
- Mercury [emissions to air, high. pop.]: 1e-18 kg; lognormal SD95 26.4
  (same comment as for COD, Chemical Oxygen Demand)
- Calcium [emissions to air, high. pop.]: 6.77e-14 kg; lognormal SD95 21.7
  (same comment as for COD, Chemical Oxygen Demand)
- Nitrogen, organic bound [emissions to water, groundwater, long-term]: 0.000172 kg; lognormal SD95 6.2
  (same comment as for Sulfate)
- Arsenic [emissions to air, low. pop.]: 9.34e-13 kg; lognormal SD95 33.1
  (same comment as for Carbon dioxide, fossil)
- Lead [emissions to air, low. pop.]: 1.04e-15 kg; lognormal SD95 54
  (same comment as for Carbon dioxide, fossil)
- Aluminium [emissions to air, low. pop.]: 4.64e-14 kg; lognormal SD95 42.7
  (same comment as for Carbon dioxide, fossil)
- Vanadium [emissions to water, river]: 7.1e-9 kg; lognormal SD95 15.5
  (same comment as for COD, Chemical Oxygen Demand)
- TOC, Total Organic Carbon [emissions to water, groundwater, long-term]: 0.0112 kg; lognormal SD95 5.13
  (same comment as for Sulfate)
- Molybdenum [emissions to air, low. pop.]: 7.82e-15 kg; lognormal SD95 45.7
  (same comment as for Carbon dioxide, fossil)
- Phosphate [emissions to water, groundwater, long-term]: 4.4e-9 kg; lognormal SD95 287
  (same comment as for Sulfate)
- Silicon [emissions to air, high. pop.]: 3.48e-13 kg; lognormal SD95 25
  (same comment as for COD, Chemical Oxygen Demand)
- BOD5, Biological Oxygen Demand [emissions to water, groundwater, long-term]: 0.00289 kg; lognormal SD95 5.13
  (same comment as for Sulfate)
- Ammonium, ion [emissions to water, groundwater, long-term]: 0.000105 kg; lognormal SD95 6.2
  (same comment as for Sulfate)
- Chromium VI [emissions to water, groundwater, long-term]: 8.41e-11 kg; lognormal SD95 432
  (same comment as for Sulfate)
- Phosphorus [emissions to air, high. pop.]: 7.52e-14 kg; lognormal SD95 24.1
  (same comment as for COD, Chemical Oxygen Demand)
- Heat, waste [emissions to air, high. pop.]: 0.000474 MJ; lognormal SD95 2.67
  (same comment as for Disposal, cement, hydrated, 0% water, to residual material landfill)
- Sodium [emissions to air, low. pop.]: 1.92e-11 kg; lognormal SD95 27.5
  (same comment as for Carbon dioxide, fossil)
- Carbon monoxide, fossil [emissions to air, low. pop.]: 6.25e-8 kg; lognormal SD95 9.1
  (same comment as for Carbon dioxide, fossil)
- Ammonium, ion [emissions to water, river]: 3.2e-6 kg; lognormal SD95 6.05
  (same comment as for COD, Chemical Oxygen Demand)
- COD, Chemical Oxygen Demand [emissions to water, groundwater, long-term]: 0.0122 kg; lognormal SD95 5.13
  (same comment as for Sulfate)
- Nitrite [emissions to water, river]: 6.73e-8 kg; lognormal SD95 8.15
  (same comment as for COD, Chemical Oxygen Demand)
- Carbon monoxide, fossil [emissions to air, high. pop.]: 2.36e-8 kg; lognormal SD95 8.02
  (same comment as for COD, Chemical Oxygen Demand)
- Selenium [emissions to air, low. pop.]: 2.79e-15 kg; lognormal SD95 45.7
  (same comment as for Carbon dioxide, fossil)
- Vanadium [emissions to air, high. pop.]: 6.88e-13 kg; lognormal SD95 16.1
  (same comment as for COD, Chemical Oxygen Demand)
- DOC, Dissolved Organic Carbon [emissions to water, groundwater, long-term]: 0.0112 kg; lognormal SD95 5.13
  (same comment as for Sulfate)
- DOC, Dissolved Organic Carbon [emissions to water, river]: 1.96e-6 kg; lognormal SD95 7.54
  (same comment as for COD, Chemical Oxygen Demand)
- Nickel [emissions to air, low. pop.]: 7.7e-13 kg; lognormal SD95 35
  (same comment as for Carbon dioxide, fossil)
- Tin [emissions to air, low. pop.]: 6.95e-14 kg; lognormal SD95 41.2
  (same comment as for Carbon dioxide, fossil)
- Tin [emissions to water, river]: 1.16e-10 kg; lognormal SD95 22.1
  (same comment as for COD, Chemical Oxygen Demand)
- Copper [emissions to water, groundwater, long-term]: 2.65e-7 kg; lognormal SD95 14
  (same comment as for Sulfate)
- Arsenic [emissions to water, river]: 5.87e-11 kg; lognormal SD95 23.6
  (same comment as for COD, Chemical Oxygen Demand)
- Sulfur dioxide [emissions to air, low. pop.]: 2.77e-6 kg; lognormal SD95 9.51
  (same comment as for Carbon dioxide, fossil)
- Sulfate [emissions to water, river]: 2.41e-5 kg; lognormal SD95 7.73
  Emissions from short-term leachate treatment. Uncertainty calculated depending on waste input and uncertainty of transfer coefficents in landfill and wastewater treatment.
- Selenium [emissions to water, groundwater, long-term]: 2.99e-9 kg; lognormal SD95 21
  (same comment as for Sulfate)
- Sodium [emissions to water, river]: 7.68e-8 kg; lognormal SD95 13.5
  (same comment as for Sulfate)
- Molybdenum [emissions to water, river]: 1.85e-11 kg; lognormal SD95 24.7
  (same comment as for COD, Chemical Oxygen Demand)
- Chromium [emissions to air, low. pop.]: 5.29e-16 kg; lognormal SD95 52.7
  (same comment as for Carbon dioxide, fossil)
- Mercury [emissions to water, river]: 2.3e-13 kg; lognormal SD95 25.5
  (same comment as for COD, Chemical Oxygen Demand)
- Molybdenum [emissions to water, groundwater, long-term]: 1.17e-8 kg; lognormal SD95 18.6
  (same comment as for Sulfate)
- Silicon [emissions to air, low. pop.]: 3.97e-14 kg; lognormal SD95 41.5
  (same comment as for Carbon dioxide, fossil)
- Particulates, < 2.5 um [emissions to air, low. pop.]: 2.1e-8 kg; lognormal SD95 6.48
  (same comment as for Carbon dioxide, fossil)
- Aluminium [emissions to water, river]: 1.11e-11 kg; lognormal SD95 22.8
  (same comment as for COD, Chemical Oxygen Demand)
- Lead [emissions to water, river]: 3.43e-13 kg; lognormal SD95 31.1
  (same comment as for COD, Chemical Oxygen Demand)
- Chloride [emissions to water, river]: 5.04e-10 kg; lognormal SD95 23.8
  (same comment as for Sulfate)
- Phosphate [emissions to water, river]: 1.28e-10 kg; lognormal SD95 23.6
  (same comment as for COD, Chemical Oxygen Demand)
- Aluminium [emissions to water, groundwater, long-term]: 3.71e-7 kg; lognormal SD95 13.5
  (same comment as for Sulfate)
- Methane, fossil [emissions to air, low. pop.]: 0.000169 kg; lognormal SD95 4.79
  (same comment as for Carbon dioxide, fossil)
- Calcium [emissions to water, river]: 3.74e-10 kg; lognormal SD95 21.3
  (same comment as for COD, Chemical Oxygen Demand)
- Arsenic [emissions to air, high. pop.]: 1.88e-14 kg; lognormal SD95 24.3
  (same comment as for COD, Chemical Oxygen Demand)
- Cobalt [emissions to water, groundwater, long-term]: 2.27e-8 kg; lognormal SD95 16
  (same comment as for Sulfate)
- BOD5, Biological Oxygen Demand [emissions to water, river]: 2.55e-6 kg; lognormal SD95 7.54
  (same comment as for COD, Chemical Oxygen Demand)
- Heat, waste [emissions to air, low. pop.]: 0.006 MJ; lognormal SD95 5.42
  (same comment as for Carbon dioxide, fossil)
- Cobalt [emissions to air, low. pop.]: 1.83e-14 kg; lognormal SD95 42.4
  (same comment as for Carbon dioxide, fossil)
- Silicon [emissions to water, groundwater, long-term]: 0.00846 kg; lognormal SD95 52.8
  (same comment as for Sulfate)
- Copper [emissions to water, river]: 3.37e-12 kg; lognormal SD95 28.3
  (same comment as for COD, Chemical Oxygen Demand)
- Mercury [emissions to water, groundwater, long-term]: 1.06e-9 kg; lognormal SD95 16
  (same comment as for Sulfate)
- Heat, waste [emissions to water, groundwater, long-term]: 2.17 MJ; lognormal SD95 1
  burden from long-term decomposition of waste (>100a). Uncertainty calculated from unertainty of the waste composition of this waste, uncertainty in waste decomposition and short-term leaching in sanitary landfill
- Cyanide [emissions to air, high. pop.]: 1.66e-10 kg; lognormal SD95 6.54
  (same comment as for COD, Chemical Oxygen Demand)
- Nickel [emissions to water, river]: 1.87e-9 kg; lognormal SD95 17.8
  (same comment as for COD, Chemical Oxygen Demand)
- Dinitrogen monoxide [emissions to air, high. pop.]: 1.63e-8 kg; lognormal SD95 5.3
  (same comment as for COD, Chemical Oxygen Demand)
- Iron [emissions to air, high. pop.]: 2.47e-14 kg; lognormal SD95 16.7
  (same comment as for COD, Chemical Oxygen Demand)
- Arsenic [emissions to water, groundwater, long-term]: 3.7e-8 kg; lognormal SD95 16
  (same comment as for Sulfate)
- Heat, waste [emissions to water, river]: 0.000234 MJ; lognormal SD95 7.52
  (same comment as for Disposal, cement, hydrated, 0% water, to residual material landfill)
- Nitrogen oxides [emissions to air, high. pop.]: 5.77e-8 kg; lognormal SD95 5.7
  (same comment as for COD, Chemical Oxygen Demand)
- Tin [emissions to air, high. pop.]: 2.15e-13 kg; lognormal SD95 22.6
  (same comment as for COD, Chemical Oxygen Demand)
- Heat, waste [emissions to soil, industrial]: 0.0122 MJ; lognormal SD95 2.81
  burden from short-term decomposition of waste (0-100a). Uncertainty calculated from unertainty of the waste composition of this waste, uncertainty in waste decomposition and short-term leaching in sanitary landfill
- Nickel [emissions to air, high. pop.]: 5.2e-17 kg; lognormal SD95 19.3
  (same comment as for COD, Chemical Oxygen Demand)
- Iron [emissions to air, low. pop.]: 1.36e-13 kg; lognormal SD95 39.4
  (same comment as for Carbon dioxide, fossil)
- Cobalt [emissions to water, river]: 3.72e-11 kg; lognormal SD95 22.5
  (same comment as for COD, Chemical Oxygen Demand)
- Copper [emissions to air, high. pop.]: 7e-17 kg; lognormal SD95 29.5
  (same comment as for COD, Chemical Oxygen Demand)
- Nitrate [emissions to water, groundwater, long-term]: 1.11e-5 kg; lognormal SD95 6.2
  (same comment as for Sulfate)
- Molybdenum [emissions to air, high. pop.]: 3.08e-14 kg; lognormal SD95 25.2
  (same comment as for COD, Chemical Oxygen Demand)
- Carbon dioxide, fossil [emissions to air, high. pop.]: 3.68e-5 kg; lognormal SD95 7.53
  (same comment as for COD, Chemical Oxygen Demand)
- Lead [emissions to air, high. pop.]: 1.03e-16 kg; lognormal SD95 32.1
  (same comment as for COD, Chemical Oxygen Demand)
- Calcium [emissions to air, low. pop.]: 1.04e-13 kg; lognormal SD95 40.4
  (same comment as for Carbon dioxide, fossil)
- Nitrogen oxides [emissions to air, low. pop.]: 1.71e-9 kg; lognormal SD95 11.3
  (same comment as for Carbon dioxide, fossil)
- Hydrogen sulfide [emissions to water, groundwater, long-term]: 0.000154 kg; lognormal SD95 4.47
  (same comment as for Sulfate)
- Methane, fossil [emissions to air, high. pop.]: 7.21e-8 kg; lognormal SD95 7.91
  (same comment as for COD, Chemical Oxygen Demand)
- Ammonia [emissions to air, high. pop.]: 5.91e-9 kg; lognormal SD95 5.81
  (same comment as for COD, Chemical Oxygen Demand)
- Sodium [emissions to water, groundwater, long-term]: 1.78e-6 kg; lognormal SD95 11.5
  (same comment as for Sulfate)
- Chromium [emissions to air, high. pop.]: 0 kg; lognormal SD95 31.5
  (same comment as for COD, Chemical Oxygen Demand)
- Nitrite [emissions to water, groundwater, long-term]: 5.73e-6 kg; lognormal SD95 6.2
  (same comment as for Sulfate)
- Calcium [emissions to water, groundwater, long-term]: 3.18e-7 kg; lognormal SD95 13.7
  (same comment as for Sulfate)
- Vanadium [emissions to air, low. pop.]: 3.49e-12 kg; lognormal SD95 31.2
  (same comment as for Carbon dioxide, fossil)
- Tin [emissions to water, groundwater, long-term]: 4.72e-6 kg; lognormal SD95 10.4
  (same comment as for Sulfate)
- Nitrate [emissions to water, river]: 1.17e-5 kg; lognormal SD95 5.51
  (same comment as for COD, Chemical Oxygen Demand)
- Chromium VI [emissions to water, river]: 1.11e-12 kg; lognormal SD95 29.5
  (same comment as for COD, Chemical Oxygen Demand)
- Lead [emissions to water, groundwater, long-term]: 5.3e-8 kg; lognormal SD95 16
  (same comment as for Sulfate)
- Copper [emissions to air, low. pop.]: 3.71e-15 kg; lognormal SD95 50.3
  (same comment as for Carbon dioxide, fossil)
- Iron [emissions to water, groundwater, long-term]: 2.79e-7 kg; lognormal SD95 34.9
  (same comment as for Sulfate)
- Iron [emissions to water, river]: 2.77e-10 kg; lognormal SD95 20.8
  (same comment as for COD, Chemical Oxygen Demand)
- Nitrogen [emissions to water, river]: 8.69e-8 kg; lognormal SD95 5.59
  (same comment as for COD, Chemical Oxygen Demand)

## Sampling procedure
Landfill model based on observed leachate concentrations in literature. Extrapolated to 60'000 years heeding chemical characteristics. Initial waste composition from various literature sources.

## Uncertainty adjustments
uncertainty of waste input composition data derived from generic formula GSD(c) = N*ln(c)+1. Minimal long-term emissions are the emissions until the carbonate buffer in the landfill is used up. Mean long-term emissions are the emissions until the next glacial period occurs (in 60'000a) and the landfill is eroded. Maximal long-term emissions are the complete emissions of all landfilled material (except Cr).

## Sources
- Doka G., 2009, 2009 - LCI waste treatment services - Doka, Final report ecoinvent data v2.0, 13, Swiss Centre for LCI, Doka LCA, Duebendorf and St. Gallen, CH
Doka G. (2007) Life Cycle Inventories of Waste Treatment Services. Final report ecoinvent data v2.0. Volume: 13. Swiss Centre for LCI, Empa - TSL. Dübendorf, CH.
Type: Separate publication
Source: CD-ROM
First author: Doka G.
Year: 2007
Title of anthology: Final report ecoinvent data v2.0
Place of publication: Dübendorf, CH
Publisher: Swiss Centre for LCI, Empa - TSL
Volume No: 13

## Validation
Proof reading validation: Passed. Calculation for standard deviation 95 of, i.e., infrastructure, ; Other validation: none;
