# Wood preservative, creosote, at plant

Dataset: EcoSpold 1, unit process
Functional unit: 1 kg
Category: chemicals / pesticides
Geography: RER
Time period: 2000-01 to 2000-12
Generated by: Hans-Joerg Althaus
accessRestrictedTo: 0
copyright: true

## Included processes
Includes the inputs to the production processes, transports of those inputs and the process emissions as far as they are available.; Geography: Data for UK used for central Europe

## Geography
Data for UK used for central Europe

## Technology
Destillation of the coal tar to creosote

## Reference product
- Wood preservative, creosote, at plant [RER]: 1 kg
  Europe

## Inputs from technosphere
- Hard coal coke, at plant [RER]: 29.2 MJ; lognormal SD95 1.16
  (1,4,3,3,1,1);
- Electricity, medium voltage, production ENTSO-E, at grid: 1.11 kWh; lognormal SD95 1.16
  (1,4,3,3,1,1);
- Chemical plant, organics [RER]: 4e-10 p; lognormal SD95 3.79
  (5,5,5,5,4,5);
- Heavy fuel oil, burned in industrial furnace 1MW, non-modulating [RER]: 4.2 MJ; lognormal SD95 1.16
  (1,4,3,3,1,1);

## Emissions to nature
- NMVOC, non-methane volatile organic compounds, unspecified origin [emissions to air, unspecified]: 0.0205 kg; lognormal SD95 2.11
  (4,3,3,3,1,5);
- COD, Chemical Oxygen Demand [emissions to water, unspecified]: 0.001 kg; lognormal SD95 1.75
  (3,5,4,5,3,5);
- TOC, Total Organic Carbon [emissions to water, unspecified]: 0.000392 kg; lognormal SD95 1.75
  (3,5,4,5,3,5);
- DOC, Dissolved Organic Carbon [emissions to water, unspecified]: 0.000392 kg; lognormal SD95 1.75
  (3,5,4,5,3,5);
- BOD5, Biological Oxygen Demand [emissions to water, unspecified]: 0.001 kg; lognormal SD95 1.75
  (3,5,4,5,3,5);
- Heat, waste [emissions to air, unspecified]: 3.99 MJ; lognormal SD95 1.16
  (1,4,3,3,1,1);

## Sampling procedure
Literature

## Extrapolations
see Geography

## Uncertainty adjustments
The assumption that the technology is representative for central Europe is considered in the uncertainties.

## Sources
- Werner F., Althaus H.-J., Kuenniger T., Richter K., Jungbluth N., 2007, 2007 - LCI wood as fuel and const. mat. - Werner, Final report ecoinvent data v2.0, 9, Swiss Centre for LCI, Empa - TSL, ESU-services Ltd., Duebendorf, CH
Werner F., Althaus H.-J., Künniger T., Richter K., Jungbluth N. (2007) 1Life Cycle Inventories of Wood as Fuel and Construction Material. Final report ecoinvent data v2.0. Volume: 9. Issue: 0. Swiss Centre for LCI, Empa - TSL. Dübendorf, CH.
Type: Measurement on site
Source: CD-ROM
First author: Werner F.
Other authors: Althaus H.-J., Künniger T., Richter K., Jungbluth N.
Year: 2007
Title of anthology: Final report ecoinvent data v2.0
Place of publication: Dübendorf, CH
Publisher: Swiss Centre for LCI, Empa - TSL
Volume No: 9
Issue No: 0

## Validation
Proof reading validation: passed; Other validation: none;
