# xxx Facade construction, mounted, on roof

Dataset: EcoSpold 1, unit process, infrastructure
Functional unit: 1 p
Category: energy, obsolete / others, obsolete
Geography: CH
Generated by: Niels Jungbluth
accessRestrictedTo: 0
copyright: true

## General comment
Production of different additional components necessary for the montage of a 3kWp photovoltaic plant. ;

## Included processes
Materials and packaging for the production and estimation for metal processing. Disposal of the product after use.

## Technology
Construction parts for a photovoltaic system with 36 cell modules and a capacity of 3kWp

## Time period
Time of publications.

## Reference product
- xxx Facade construction, mounted, on roof [CH]: 1 p
  SWITZERLAND

## Inputs from technosphere
- Section bar rolling, steel [RER]: 46.1 kg; lognormal SD95 1.3
  (3,4,3,1,1,5); Brunschweiler 1993
- Transport, freight, rail, electricity with shunting [CH]: 44.1 tkm; lognormal SD95 2.1
  (4,5,na,na,na,na); Standard distances 200km, 600km
- Sheet rolling, aluminium [RER]: 72 kg; lognormal SD95 1.3
  (3,4,3,1,1,5); Brunschweiler 1993
- Disposal, packaging cardboard, 19.6% water, to municipal incineration [CH]: 1.1 kg; lognormal SD95 1.3
  (3,4,3,1,1,5); Estimation
- Disposal, building, polystyrene isolation, flame-retardant, to final disposal [CH]: 0.1 kg; lognormal SD95 1.3
  (3,4,3,1,1,5); Estimation
- Sheet rolling, steel [RER]: 3 kg; lognormal SD95 1.3
  (3,4,3,1,1,5); Brunschweiler 1993
- Aluminium, production mix, wrought alloy, at plant [RER]: 72 kg; lognormal SD95 1.3
  (3,4,3,1,1,5); Brunschweiler 1993
- Corrugated board, mixed fibre, single wall, at plant [RER]: 1.1 kg; lognormal SD95 1.3
  (3,4,3,1,1,5); Schwarz et al. 1992
- Disposal, building, polyethylene/polypropylene products, to final disposal [CH]: 0.02 kg; lognormal SD95 1.3
  (3,4,3,1,1,5); Estimation
- Transport, freight, lorry, 16t-32t gross weight, fleet average [CH]: 6.62 tkm; lognormal SD95 2.1
  (4,5,na,na,na,na); Standard distance 50km
- Transport, freight, lorry, 3.5t gross weight, fleet average [CH]: 12.2 tkm; lognormal SD95 1.3
  (3,4,3,1,1,5); 100km to construction place
- Polystyrene, high impact, HIPS, at plant [RER]: 0.1 kg; lognormal SD95 1.3
  (3,4,3,1,1,5); Schwarz et al. 1992
- Disposal, building, reinforcement steel, to sorting plant [CH]: 49.1 kg; lognormal SD95 1.3
  (3,4,3,1,1,5); Estimation
- Polyethylene, HDPE, granulate, at plant [RER]: 0.02 kg; lognormal SD95 1.3
  (3,4,3,1,1,5); Schwarz et al. 1992
- Steel, low-alloyed, at plant [RER]: 49.1 kg; lognormal SD95 1.3
  (3,4,3,1,1,5); Schwarz et al. 1992

## Sampling procedure
Detailed analysis of materials for one product in a diploma thesis.

## Extrapolations
From one product to the whole market.

## Sources
- Jungbluth N., Stucki M., Frischknecht R., 2009, 2009 - Photovoltaics - Jungbluth, Sachbilanzen von Energiesystemen. Final report No. 6 ecoinvent v2.1, 6, Swiss Centre for LCI, ESU-services Ltd., Duebendorf, CH
Jungbluth, N., Stucki, M., Frischknecht, R. (2009) Photovoltaics. Sachbilanzen von Energiesystemen. Final report No. 6 ecoinvent v2.1. Editors: Bauer C.. Volume: 6. Swiss Centre for LCI, PSI. Dübendorf and Villigen, CH.
Type: Measurement on site
Source: CD-ROM
First author: Jungbluth, N.
Other authors: Stucki, M., Frischknecht, R.
Year: 2009
Name of editors: Bauer C.
Title of anthology: Sachbilanzen von Energiesystemen. Final report No. 6 ecoinvent v2.1
Place of publication: Dübendorf and Villigen, CH
Publisher: Swiss Centre for LCI, PSI
Volume No: 6

## Validation
Proof reading validation: Passed.; Other validation: none;
