# Noise barrier wall, construction, ribbed concrete panel

Dataset: EcoSpold 1, unit process, infrastructure
Functional unit: 1 m
Category: construction / infrastructure
Geography: CH
Time period: 2025 to 2030
Synonyms: 0
Generated by: Thomas Pohl
accessRestrictedTo: 0
copyright: true

## General comment
Modern Swiss und European technologies are applied to building machines, material production and building processes.

## Included processes
1 meter of noise barrier wall installed along the roadside in open terrain.
Total visible height: 3.2 meters, consisting of a ribbed concrete panel with a height of 3.0 meters. Service life 80 years.
The system boundary includes production (A1–A3) and construction / transport (A4–A5) stages for one meter of installed noise barrier wall, including excavation, backfilling, and foundation works.

## Geography
Switzerland

## Technology
Based on ASTRA 21001, Fachhandbuch Trassee/Umwelt (FHB T/U), Lärmschutzwand Freifeld, Betonrippenplatte (ASTRA). Dimensions based on scaled measurement using known reference values.

## Time period
Review of data currency scheduled after 5 years.

## Reference product
- Noise barrier wall, construction, ribbed concrete panel [CH]: 1 m

## Inputs from technosphere
- Concrete, sole plate and foundation, at plant [CH]: 0.073 m3; lognormal SD95 1.2355
  (3,1,1,1,1,5,BU:1.05); Foundation, Density 1650 kg/m³; Based on ASTRA 21001, Fachhandbuch Trassee/Umwelt (FHB T/U), Lärmschutzwand Freifeld, Betonrippenplatte (ASTRA).
- Gravel, round, market mix, at regional storage [CH]: 733 kg; lognormal SD95 1.2355
  (3,1,1,1,1,5,BU:1.05); As unbound mixture for backfilling, Density 1800 kg/m³; Based on ASTRA 21001, Fachhandbuch Trassee/Umwelt (FHB T/U), Lärmschutzwand Freifeld, Betonrippenplatte (ASTRA).
- Asphalt concrete (AC) surface layer, 0% recycling, high temperature, at plant [CH]: 129 kg; lognormal SD95 1.2355
  (3,1,1,1,1,5,BU:1.05); Asphalt surface layer located between road and noise barrier wall; Based on ASTRA 21001, Fachhandbuch Trassee/Umwelt (FHB T/U), Lärmschutzwand Freifeld, Betonrippenplatte (ASTRA).
- Chromium steel 18/8, at plant [RER]: 4.28 kg; lognormal SD95 1.2355
  (3,1,1,1,1,5,BU:1.05); Foot plate; Based on ASTRA 21001, Fachhandbuch Trassee/Umwelt (FHB T/U), Lärmschutzwand Freifeld, Betonrippenplatte (ASTRA).
- Chromium steel 18/8, at plant [RER]: 0.81 kg; lognormal SD95 1.2355
  (3,1,1,1,1,5,BU:1.05); Anchor bolts; Based on ASTRA 21001, Fachhandbuch Trassee/Umwelt (FHB T/U), Lärmschutzwand Freifeld, Betonrippenplatte (ASTRA).
- Steel, low-alloyed, at plant [RER]: 56.8 kg; lognormal SD95 1.2355
  (3,1,1,1,1,5,BU:1.05); HEA 160 steel beam; Based on ASTRA 21001, Fachhandbuch Trassee/Umwelt (FHB T/U), Lärmschutzwand Freifeld, Betonrippenplatte (ASTRA).
- Lightweight concrete block, pumice, at plant [DE]: 679 kg; lognormal SD95 1.2355
  (3,1,1,1,1,5,BU:1.05); Ribbed concrete panel "Lavabeton", density 1400 kg/m3; Based on ASTRA 21001, Fachhandbuch Trassee/Umwelt (FHB T/U), Lärmschutzwand Freifeld, Betonrippenplatte (ASTRA).
- Concrete, normal, at plant [CH]: 0.286 m3; lognormal SD95 1.2355
  (3,1,1,1,1,5,BU:1.05); Backing plate; Based on ASTRA 21001, Fachhandbuch Trassee/Umwelt (FHB T/U), Lärmschutzwand Freifeld, Betonrippenplatte (ASTRA).
- Concrete, normal, at plant [CH]: 0.075 m3; lognormal SD95 1.2355
  (3,1,1,1,1,5,BU:1.05); Base elements; Based on ASTRA 21001, Fachhandbuch Trassee/Umwelt (FHB T/U), Lärmschutzwand Freifeld, Betonrippenplatte (ASTRA).
- Reinforcing steel, at regional storage [CH]: 2.242 kg; lognormal SD95 1.2355
  (3,1,1,1,1,5,BU:1.05); For reinforced concrete; Based on ASTRA 21001, Fachhandbuch Trassee/Umwelt (FHB T/U), Lärmschutzwand Freifeld, Betonrippenplatte (ASTRA).
- Transport, freight, lorry, fleet average [CH]: 140 tkm; lognormal SD95 2.1419
  (4,1,1,1,3,5,BU:2); Total mass of approx. 3.5 t transported over an estimated average distance of 40 km;
- Hydraulic digger, 18t, 100kW, crawler drive, diesel [CH]: 0.032 hr; lognormal SD95 3.0578
  (3,1,1,1,1,5,BU:3); Excavation and backfilling process, 0.89 m3 excavated material and gravel for backfilling, 0.364 h/m3. Backfilling estimated as similar process; Based on TB-Viewer standard analysis
- Hydraulic digger, 18t, 100kW, crawler drive, diesel [CH]: 0.06 hr; lognormal SD95 3.0578
  (3,1,1,1,1,5,BU:3); Installation of noise barrier and background panel, 0.85 m3 concrete components, 0.071 h/m3; Based on TB-Viewer standard analysis
- Road construction, surface concrete layer, installation [CH]: 483 kg; lognormal SD95 3.1365
  (4,1,1,1,3,5,BU:3); Installation of foundation and asphalt layer; Default process for foundation and asphalt layer

## Sources
- Pohl T., Stamm R., 2025, 2025 - Datasets construction machinery and infra. - Pohl, Hintergrundbericht, Umtec Technologie AG, Bern, CH
