# xxx Electricity, production mix JP

Dataset: EcoSpold 1, unit process
Functional unit: 1 kWh
Category: electricity / notMaintained
Geography: JP
Time period: 2008-01 to 2008-12
Production volume: 1082 TWh
Share of production covered: 100 %
Generated by: René Itten
accessRestrictedTo: 0
copyright: true

## General comment
Electricity domestic net production shares are based on IEA statistics for the year 2008.;

## Included processes
It includes the shares of domestic electricity production by technology at the busbar. It does not include transformation, transport nor distribution losses.

## Geography
Data apply to public and self producers in Japan.

## Technology
No technology description is provided because the dataset just describes the power plant portfolio of the respective country using current (2004) average technology per energy carrier.

## Time period
Time period of statistics used (2008).

## Reference product
- xxx Electricity, production mix JP [JP]: 1 kWh
  JAPAN

## Inputs from technosphere
- Electricity, at wind farm [RER]: 0.0051552 kWh; lognormal SD95 1.0541
  (1,1,1,3,1,1); assumption for geothermal power production in Japan, value: IEA statistics 2008
- Electricity, industrial gas, at power plant [UCTE]: 0.029593 kWh; lognormal SD95 1.0541
  (1,1,1,3,1,1); assumption for industrial, coke and blast furnace gas power production in Japan, value: IEA statistics 2008
- Electricity, hydropower, at run-of-river power plant [RER]: 0.059123 kWh; lognormal SD95 1.0541
  (1,1,1,3,1,1); estimated share of ROR hydropower production in Japan: 80%
- Electricity, oil, at power plant [UCTE]: 0.11814 kWh; lognormal SD95 1.0541
  (1,1,1,3,1,1); assumption for petroleum product and fuel oil power production in Japan, value: IEA statistics 2008
- Electricity from waste, at municipal waste incineration plant [CH]: 0.0067254 kWh; lognormal SD95 1.0541
  (1,1,1,3,1,1); assumption for power production from municipal and industrial waste in Japan, value: IEA statistics 2008
- Electricity, from natural gas [JP]: 0.26055 kWh; lognormal SD95 1.05
  (1,1,1,1,1,1); assumption for natural gas power production in Japan, value: IEA statistics 2008
- Electricity, at cogen 1MWth, wood chips, allocation exergy [CH]: 0.013875 kWh; lognormal SD95 1.0541
  (1,1,1,3,1,1); assumption for cogeneration power production in Japan, value: IEA statistics 2008
- Electricity, production mix photovoltaic, at plant [JP]: 0.0020719 kWh; lognormal SD95 1.05
  (1,1,1,1,1,1); assumption for solar power production in Japan, value: IEA statistics 2008
- Electricity, at cogen 300kWth, diesel, allocation exergy [CH]: 0.0029436 kWh; lognormal SD95 1.0541
  (1,1,1,3,1,1); assumption for diesel and other fossil fuel power production in Japan, value: IEA statistics 2008
- Electricity, hydropower, at reservoir power plant, non alpine regions [RER]: 0.014781 kWh; lognormal SD95 1.0541
  (1,1,1,3,1,1); estimated share of reservoir hydropower production in Japan: 20%
- Electricity, hydropower, at pumped storage power plant [JP]: 0.0068399 kWh; lognormal SD95 1.05
  (1,1,1,1,1,1); estimated share of pumped storage production in Japan: 8.47%
- Electricity, hard coal, at power plant [BE]: 0.24261 kWh; lognormal SD95 1.05
  (1,1,1,1,1,1); assumption for hard coal power production in Japan, value: IEA statistics 2008
- Electricity, nuclear, at power plant boiling water reactor [UCTE]: 0.13396 kWh; lognormal SD95 1.05
  (1,1,1,1,1,1); assumption for nuclear power production in Japan using BWR, value: IEA statistics 2008, fraction: IAEA Database 2010 (PRIS)
- Electricity, nuclear, at power plant pressure water reactor [UCTE]: 0.10362 kWh; lognormal SD95 1.05
  (1,1,1,1,1,1); assumption for nuclear power production in Japan using PWR, value: IEA statistics 2008, fraction: IAEA Database 2010 (PRIS)

## Sampling procedure
Statistical data

## Sources
- Frischknecht R., Itten R., Flury K., 2012, 2012 - GHG emis. from Swiss elec. mixes - Frischknecht, Project reports, 401, ESU-services Ltd., Uster, CH
Itten, R., Frischknecht, R. (2012) Life Cycle Inventories of electricity mixes. Project reports. Volume: 401. ESU-services Ltd.. Uster, CH.
Type: Separate publication
First author: Itten, R.
Other authors: Frischknecht, R.
Year: 2012
Title of anthology: Project reports
Place of publication: Uster, CH
Publisher: ESU-services Ltd.
Volume No: 401

## Validation
Proof reading validation: automatic validation in Excel; Other validation: Z:\ESU-Docs\Projekte laufend\401 Update Strommix v3.0\EcoSpold\_Asien\[401-electricity-mix-japan-JP-v1.0.xlsx]X-Process;
