# xx Glycerine, from epichlorohydrin, at plant

Dataset: EcoSpold 1, unit process
Functional unit: 1 kg
Category: material, obsolete / chemicals, obsolete\organic, obsolete
Geography: RER
Time period: 2004-01 to 2004-12
Generated by: Mike Chudacoff
accessRestrictedTo: 0
copyright: true

## General comment
Glycerine is produced by reacting epichlorohydrin with a 10% sodium hydroxide aqueous solution;
CAS number: 000056-81-5;
Formula: C3H8O3;

## Included processes
cradle-to-gate, including all precursors, ancillary materials and transports

## Geography
RER

## Technology
based on industry data in the US and Europe

## Reference product
- xx Glycerine, from epichlorohydrin, at plant [RER]: 1 kg
  Europe

## Inputs from technosphere
- Epichlorohydrin, from hypochlorination of allyl chloride, at plant [RER]: 1.015 kg; lognormal SD95 1.0773
  (2,2,1,3,1,1); literature
- Transport, freight, lorry, fleet average [RER]: 0.0823 tkm; lognormal SD95 1.3001
  (4,5,na,na,na,na); standard trucking distance
- Treatment, sewage, to wastewater treatment, class 3 [CH]: 0.00375 m3; lognormal SD95 1.2102
  (4,2,1,3,1,1); approximation
- Sodium hydroxide, 50% in H2O, production mix, at plant [RER]: 0.44 kg; lognormal SD95 1.113
  (2,2,1,3,1,1); literature
- Electricity, medium voltage, production ENTSO-E, at grid: 0.0066 kWh; lognormal SD95 1.0773
  (2,2,1,3,1,1); literature
- Chemical plant, organics [RER]: 4e-10 p; lognormal SD95 1.3001
  (4,5,na,na,na,na); infrastructure of a typical plant
- Transport, freight, rail [RER]: 0.873 tkm; lognormal SD95 1.3001
  (4,5,na,na,na,na); standard rail transport distance
- Heat, unspecific, in chemical plant [RER]: 9.27 MJ; lognormal SD95 1.0773
  (2,2,1,3,1,1); industry source
- Water, completely softened, at plant [RER]: 3.9 kg; lognormal SD95 1.113
  (2,2,1,3,1,1); literature

## Emissions to nature
- Sodium [emissions to water, river]: 0.023 kg; lognormal SD95 1.2102
  (4,2,1,3,1,1); approximation
- Heat, waste [emissions to air, high. pop.]: 0.0233 MJ; lognormal SD95 1.2102
  (4,2,1,3,1,1); estimated
- TOC, Total Organic Carbon [emissions to water, river]: 0.0006 kg; lognormal SD95 1.113
  (2,2,1,3,1,1); literature
- Chloride [emissions to water, river]: 0.382 kg; lognormal SD95 1.2102
  (4,2,1,3,1,1); calculation
- COD, Chemical Oxygen Demand [emissions to water, river]: 0.00192 kg; lognormal SD95 1.113
  (2,2,1,3,1,1); literature
- BOD5, Biological Oxygen Demand [emissions to water, river]: 0.00192 kg; lognormal SD95 1.113
  (2,2,1,3,1,1); literature
- AOX, Adsorbable Organic Halogen as Cl [emissions to water, river]: 0.00078 kg; lognormal SD95 1.0773
  (2,2,1,3,1,1); calculated
- DOC, Dissolved Organic Carbon [emissions to water, river]: 0.0006 kg; lognormal SD95 1.2102
  (4,2,1,3,1,1); calculation

## Sources
- Jungbluth N., Chudacoff M., Dauriat A., Dinkel F., Doka G., Faist Emmenegger M., Gnansounou E., Kljun N., Spielmann M., Stettler C., Sutter J., 2007, 2007 - LCI bioenergy - Jungbluth, Final report ecoinvent data v2.0, 17, Swiss Centre for LCI, ESU-services Ltd., Duebendorf and Uster, CH
Jungbluth N., Chudacoff M., Dauriat A., Dinkel F., Doka G., Faist Emmenegger M., Gnansounou E., Kljun N., Spielmann M., Stettler C., Sutter J. (2007) Life Cycle Inventories of Bioenergy. Final report ecoinvent data v2.0. Volume: 17. Swiss Centre for LCI, ESU. Duebendorf and Uster, CH.
Type: Measurement on site
Source: CD-ROM
First author: Jungbluth N.
Other authors: Chudacoff M., Dauriat A., Dinkel F., Doka G., Faist Emmenegger M., Gnansounou E., Kljun N., Spielmann M., Stettler C., Sutter J.
Year: 2007
Title of anthology: Final report ecoinvent data v2.0
Place of publication: Duebendorf and Uster, CH
Publisher: Swiss Centre for LCI, ESU
Volume No: 17

## Validation
Proof reading validation: Passed.; Other validation: none;
