# Disposal, biowaste, to anaerobic digestion

Dataset: EcoSpold 1, unit process
Functional unit: 1 kg
Category: Others / biomass
Geography: CH
Time period: 2004-01 to 2004-12
Generated by: Thomas Kaegi
accessRestrictedTo: 0
copyright: true

## General comment
Inventory refers to 1 kg of biowaste. Electricity consumption and emissions represent the biogas production in a digestion plant. Infrastructure expenditures are included. Methane emissions are based on Dinkel et al. 2012, Ökobilanzen zur Biomasseverwertung, Tab 4: sum of pre-storage, fermentation and cogen, but without post rotting (not common anymore) and purification (outside the systemboundary). In order to comply with the requirements of the UVEK and KBOB database, the following allocation approach was implemented: Composting and fermentation are the two viable, legally prescribed options for organic waste treatment. Fermentation is done to additionally produce energy. This leads to the following allocation approach: only the difference in efforts and emissions between fermentation and composting are attributed. Data for composting are also based on Dinkel et al 2012.;

## Included processes
Data represents the environmental exchanges due to biowaste pre treatment biowaste digestion and post-composting of digested matter

## Geography
Data represents conditions of biogas from biowaste production in Switzerland

## Technology
Industry data.

## Reference product
- Disposal, biowaste, to anaerobic digestion [CH]: 1 kg
  SWITZERLAND

## Inputs from technosphere
- Anaerobic digestion plant, biowaste [CH]: 1.67e-9 p; lognormal SD95 3.1039
  (1,4,1,3,3,5,BU:3); ; only difference to reference treatment (composting) is allocated to biogas, rest is allocated to biowaste treatment
- Electricity, low voltage, at grid [CH]: 0.000352 kWh; lognormal SD95 1.2264
  (2,3,2,3,1,5,BU:1.05); ; only difference to reference treatment (composting) is allocated to biogas, rest is allocated to biowaste treatment
- Treatment, sewage, to wastewater treatment, class 4 [CH]: 0.000225 m3; lognormal SD95 1.6115
  (3,4,3,3,4,5,BU:1.05); ; only difference to reference treatment (composting) is allocated to biogas, rest is allocated to biowaste treatment

## Emissions to nature
- Hydrogen sulfide [emissions to air, high. pop.]: 8.65e-5 kg; lognormal SD95 1.6209
  (4,3,1,1,1,5,BU:1.5); ; only difference to reference treatment (composting) is allocated to biogas, rest is allocated to biowaste treatment
- Carbon dioxide, biogenic [emissions to air, high. pop.]: 0.21 kg; lognormal SD95 1.3059
  (4,3,1,1,1,5,BU:1.05); ; only difference to reference treatment (composting) is allocated to biogas, rest is allocated to biowaste treatment
- Methane, biogenic [emissions to air, high. pop.]: 0.001 kg; lognormal SD95 1.5598
  (1,1,1,1,1,5,BU:1.5); ; only difference to reference treatment (composting) is allocated to biogas, rest is allocated to biowaste treatment

## Sampling procedure
Data provided by factories

## Sources
- Kaegi T., Zschokke M., Dinkel F., 2022, 2022 - LCI biogas and biomethane processes - Kaegi, -, Carbotech AG, Zuerich, CH
Kägi T, Zschokke M, Dinkel F (2021) Life Cycle Inventories of Biogas and Biomethane Processes. On behaltf of FOEN, 2021\n

## Validation
Proof reading validation: 12.04.2021; Other validation: Z:\Schreibtisch\WinShare\BAFU Heizsysteme\A_zum konvertieren\[EcoSpold_biogas_rohbiogas.xlsx]X-Process;
