# Cantilever retaining wall, construction, reinforced concrete

Dataset: EcoSpold 1, unit process, infrastructure
Functional unit: 1 m
Category: construction / infrastructure
Geography: CH
Time period: 2025 to 2030
Synonyms: 0
Generated by: Thomas Pohl
accessRestrictedTo: 0
copyright: true

## General comment
Modern Swiss und European technologies are applied to building machines, material production and building processes.

## Included processes
This process models 1 meter cantilever retaining wall with a height of 5.4 meters. Production phase (A1–A3) and construction phase/ transport (A4–A5) for 1 meter of installed cantiliever retaining wall, as well as trench excavation, foundation and backfilling are included. Disposal and deconstruction processes are excluded and modelled separately. Service life time 50 years

## Geography
Switzerland

## Technology
According to ASTRA (2025), project specific data related to study "Anwendung der Ökobilanz-Methode für die Infrastruktur von Nationalstrassen".

## Time period
Review of data currency scheduled after 5 years.

## Reference product
- Cantilever retaining wall, construction, reinforced concrete [CH]: 1 m

## Inputs from technosphere
- Gravel, round, market mix, at regional storage [CH]: 12210 kg; lognormal SD95 1.2152
  (2,1,1,1,1,5,BU:1.05); Density 1650 kg/m³; Amount based on project specific data, ASTRA (2025)
- Lean concrete, CEM III, A, primary, at plan [CH]: 0.2 m3; lognormal SD95 1.2152
  (2,1,1,1,1,5,BU:1.05); Lean concrete strip foundation; Amount based on project specific data, ASTRA (2025)
- Concrete for civil engineering, unspecific, at plant [CH]: 1.3 m3; lognormal SD95 1.2152
  (2,1,1,1,1,5,BU:1.05); Concrete strip foundation; Amount based on project specific data, ASTRA (2025)
- Concrete for civil engineering, unspecific, at plant [CH]: 2 m3; lognormal SD95 1.2152
  (2,1,1,1,1,5,BU:1.05); Concrete for wall; Amount based on project specific data, ASTRA (2025)
- Reinforcing steel, at regional storage [CH]: 362.5 kg; lognormal SD95 1.2152
  (2,1,1,1,1,5,BU:1.05); Steel for reinforced concrete; Amount based on project specific data, ASTRA (2025)
- Polyethylen (HDPE) pipe [CH]: 0.4 kg; lognormal SD95 1.2152
  (2,1,1,1,1,5,BU:1.05); Dewatering pipe; Amount based on project specific data, ASTRA (2025)
- Transport, freight, lorry, fleet average [CH]: 551 tkm; lognormal SD95 2.0607
  (3,1,1,1,1,5,BU:2); Transport excavated material, distance 80 km; Estimated average distance in Switzerland
- Transport, freight, lorry, fleet average [CH]: 446 tkm; lognormal SD95 2.0607
  (3,1,1,1,1,5,BU:2); Transport backfill gravel, distance 30 km; Estimated average distance in Switzerland
- Transport, freight, lorry, fleet average [CH]: 10 tkm; lognormal SD95 2.0607
  (3,1,1,1,1,5,BU:2); Transport lean concrete, distance 30 km; Estimated average distance in Switzerland
- Transport, freight, lorry, fleet average [CH]: 87 tkm; lognormal SD95 2.0607
  (3,1,1,1,1,5,BU:2); Transport concrete strip foundation, distance 30 km; Estimated average distance in Switzerland
- Transport, freight, lorry, fleet average [CH]: 132 tkm; lognormal SD95 2.0607
  (3,1,1,1,1,5,BU:2); Transport concrete for wall, distance 30 km; Estimated average distance in Switzerland
- Transport, freight, lorry, fleet average [CH]: 36 tkm; lognormal SD95 2.0607
  (3,1,1,1,1,5,BU:2); Transport of reinforcing steel, distance 30 km; Estimated average distance in Switzerland
- Transport, freight, lorry, fleet average [CH]: 0.2 tkm; lognormal SD95 2.0607
  (3,1,1,1,1,5,BU:2); Transport of dewatering pipe, distance 30 km; Estimated average distance in Switzerland
- Hydraulic digger, 18t, 100kW, crawler drive, diesel [CH]: 1 hr; lognormal SD95 3.0578
  (3,1,1,1,1,5,BU:3); Use of a hydraulic digger for 7.3 m3 excavation, backfilling and foundation; Based on TB-Viewer, amount based on project specific data, ASTRA (2025)
- Pneumatic tyre roller, 20t-35t, diesel [CH]: 1.5 hr; lognormal SD95 3.0578
  (3,1,1,1,1,5,BU:3); Assumed as default value for a tower crane since no specific process is available; Based on TB-Viewer, amount based on project specific data, ASTRA (2025)

## Sources
- Pohl T., Stamm R., 2025, 2025 - Datasets construction machinery and infra. - Pohl, Hintergrundbericht, Umtec Technologie AG, Bern, CH
