# Cable, data cable in infrastructure, at plant

Dataset: EcoSpold 1, unit process
Functional unit: 1 m
Category: electronics / devices
Geography: GLO
Time period: 2023-01 to 2029-12
Generated by: Lugas Raka Adrianto, Maulana Permana Ajie, Didier Beloin-Saint-Pierre
accessRestrictedTo: 0
copyright: false

## General comment
The data represent a mixture (50:50) of metallic and metal-free glasfibre cable for the transfer of data. Material data are taken from datasheet of a producer of such cables. Infrastructure and production efforts are based on own assumptions. The dataset is an average of cables with a meter-weight of 0.03 resp. 0.079 kg/m. In 2023 updates, material and energy input are now represented by global inventory flows; Geography: Data from one Swiss producer, used as representative for the global situation.;

## Included processes
This module includes material, an estimation of the production efforts (transportation, energy, process chemicals, …) and of the infrastructure for the production of a three-conductor cable used in the construction of new buildings. No information about emissions (air, water) and waste are included.

## Technology
Mix of two types of cable. Data from one producer of such cables.

## Reference product
- Cable, data cable in infrastructure, at plant [GLO]: 1 m
  Global

## Inputs from technosphere
- Copper, primary, at refinery [GLO]: 0.01555 kg; lognormal SD95 1.63
  (1,3,4,3,4,5,BU:1.07); data from composition of one such cable
- Extrusion, plastic pipes [RER]: 0.0342 kg; lognormal SD95 1.63
  (1,3,4,3,4,5,BU:1.07); data from composition of one such cable
- Glass fibre, at plant [RER]: 0.01975 kg; lognormal SD95 1.63
  (1,3,4,3,4,5,BU:1.07); data from composition of one such cable
- Polyethylene, HDPE, granulate, at plant [RER]: 0.0342 kg; lognormal SD95 1.63
  (1,3,4,3,4,5,BU:1.07); data from composition of one such cable
- Rolling mill [RER]: 1.7695e-12 p; lognormal SD95 3.85
  (4,5,4,3,5,5,BU:3.00); rough estimation of infrastructure
- Transport, freight, rail [RER]: 0.0139 tkm; lognormal SD95 2.19
  (4,3,4,3,3,5,BU:2.00); standard distances
- Transport, freight, lorry, fleet average [RER]: 0.00695 tkm; lognormal SD95 2.19
  (4,3,4,3,3,5,BU:2.00); standard distances
- Wire drawing, copper [RER]: 0.01555 kg; lognormal SD95 1.63
  (1,3,4,3,4,5,BU:1.07); data from composition of one such cable

## Sampling procedure
Literature & own estimations

## Extrapolations
see Geography and Technology

## Sources
- Raka Adrianto L., Permana Ajie M., Beloin-Saint-Pierre D., 2024, 2024 - LCI ICT sector - Raka Adrianto, Empa, St. Gallen, CH

## Validation
Proof reading validation: Passed, Other validation: none, Validator: Mischa Zschokke, Company: Carbotech, Country: CH
