# Photovoltaic panel, CIS, at plant

Dataset: EcoSpold 1, unit process, infrastructure
Functional unit: 1 m2
Category: photovoltaic / production of components
Geography: DE
Time period: 2002-01 to 2006-12
Production volume: 14.8 MW planned for 2007
Share of production covered: 0 %
Generated by: Philippe Stolz
accessRestrictedTo: 0
copyright: true

## General comment
Production of photovoltaic thin film modules by thermal vaporization in vacuum. The modules produced at Würth Solar have a size of 1.2m by 0.6m. The weight is 12.6kg. The efficiency is 10.8%. The rated nominal power is about 78Wp per module.;
Synonyms: Solarmodul, PV-module, copper indium selenide, thin film, CIGS;

## Included processes
Electricity use, materials, transport of materials, treatment of production wastes. Disposal after end of life. Process emissions not known (except Cd).

## Technology
Production technology of thin film CIS cells with thermal vaporization in vacuum.

## Time period
Data refer to 2007. Production in 2006 was ramped up.

## Reference product
- Photovoltaic panel, CIS, at plant [DE]: 1 m2
  GERMANY

## Inputs from technosphere
- Light fuel oil, burned in industrial furnace 1MW, non-modulating [RER]: 15.5 MJ; lognormal SD95 1.0714
  (1,1,1,1,1,3); Raugei, literature
- Aluminium alloy, AlMg3, at plant [RER]: 2.2 kg; lognormal SD95 1.0714
  (1,1,1,1,1,3); company information
- Photovoltaic laminate, CIS, at plant [DE]: 1 m2; lognormal SD95 3.0033
  (1,1,1,1,1,3); Assumption
- Transport, freight, lorry, fleet average [RER]: 0.224 tkm; lognormal SD95 2.095
  (4,5,na,na,na,na); Standard distance 100km
- Transport, freight, rail [RER]: 1.344 tkm; lognormal SD95 2.095
  (4,5,na,na,na,na); Standard distance 600km
- Glass fibre reinforced plastic, polyamide, injection moulding, at plant [RER]: 0.04 kg; lognormal SD95 1.0714
  (1,1,1,1,1,3); Raugei, literature

## Sampling procedure
Literature data based on producer information.

## Sources
- Frischknecht R., Itten R., Sinha P., de Wild-Scholten M., Zhank J., 2020, 2015 - LCI and LCA photovoltaic systems - Frischknecht, Project report, 174, IEA PVPS Task 12, Petten, NL
Frischknecht R.,, Stolz P., Sinha P., de Wild-Scholten M. (2020) Life Cycle Inventories and Life Cycle Assessments of Photovoltaic Systems. Project report. Volume: 174. IEA PVPS Task 12.
Type: Separate publication
Source: Report
First author: Frischknecht R.,
Other authors: Stolz P., Sinha P., de Wild-Scholten M.
Year: 2020
Title of anthology: Project report
Publisher: IEA PVPS Task 12
Volume No: 174
Original title: Life Cycle Inventories and Life Cycle Assessments of Photovoltaic Systems

## Validation
Proof reading validation: 30.09.2020; Other validation: G:\Projekte laufend\174 Photovoltaic, IEA Task 12\2017 Global supply chain\EcoSpold\[174-photovoltaics-global-supply-chain-v2.5.xlsx]X-Process;
