# xxx Glued laminated timber, oudoor use, at regional storage

Dataset: EcoSpold 1, unit process
Functional unit: 1 kg
Category: material, obsolete / wood, obsolete
Geography: CH
Time period: 1900-01 to 1900-12
Generated by: Frank Werner
accessRestrictedTo: 0
copyright: true

## Reference product
- xxx Glued laminated timber, oudoor use, at regional storage [CH]: 1 kg
  SWITZERLAND

## Inputs from technosphere
- Transport, freight, lorry, fleet average [RER]: 0.075 tkm
  25% market share; 300 km
- xxx Glued laminated timber, outdoor use, at plant [RER]: 0.000532 m3
  25% market share; 470 kg/m3
- xxx Glued laminated timber, outdoor use, at plant [CH]: 0.0016 m3
  75% market share; 470 kg/m3
- Transport, freight, rail [RER]: 0 tkm

## Sources
- Werner F., 2017, 2017 - LCI wood and wood based products - Werner, Project Report, 0, Environment & Development, Zuerich, CH
