# Building, hall, wood construction

Dataset: EcoSpold 1, unit process, infrastructure
Functional unit: 1 m2
Category: construction / others\infrastructure
Geography: CH
Time period: 2000-01 to 2000-12
Generated by: Daniel Kellenberger
accessRestrictedTo: 0
copyright: true

## General comment
The module is based on a fictitious building hall with size: length 50 m, width 30 m, height 7 m, daylight opening 110 m2. The service life is assumed to be 50 years. This module should not be used if its relative importance would be high in a certain environmental inventory.;

## Included processes
Includes the most important materials used and their disposal, the transportation of the parts to the building site and to the final disposal at the end of life. Also included is the requirement of electricity for construction, maintenance and demolition. Operation is not included.

## Geography
Certain elementary flows or intermediate product flows are RER or GLO modules

## Technology
Example representing current wooden industrial structures in Switzerland

## Reference product
- Building, hall, wood construction [CH]: 1 m2
  SWITZERLAND

## Inputs from technosphere
- Rock wool, packed, at plant [CH]: 13.2 kg; lognormal SD95 2.15
  (4,5,1,1,5,5);
- Disposal, building, bulk iron (excluding reinforcement), to sorting plant [CH]: 13.2 kg; lognormal SD95 2.15
  (4,5,1,1,5,5);
- Reinforcing steel, at plant [RER]: 13.2 kg; lognormal SD95 2.15
  (4,5,1,1,5,5);
- Disposal, building, polystyrene isolation, flame-retardant, to final disposal [CH]: 5.4 kg; lognormal SD95 2.15
  (4,5,1,1,5,5);
- Diesel, burned in building machine, average [CH]: 238 MJ; lognormal SD95 2.15
  (4,5,1,1,5,5);
- Concrete, sole plate and foundation, at plant [CH]: 0.3 m3; lognormal SD95 2.15
  (4,5,1,1,5,5);
- Disposal, building, reinforced concrete, to final disposal [CH]: 750 kg; lognormal SD95 2.15
  (4,5,1,1,5,5);
- Transport, freight, lorry, fleet average [RER]: 89.5 tkm; lognormal SD95 2.8
  (4,5,1,1,5,5);
- Sawnwood, production mix, softwood, dried (u=10%), planed, at sawmill [CH]: 0.006 m3; lognormal SD95 2.15
  (4,5,1,1,5,5);
- Disposal, building, waste wood, untreated, to final disposal [CH]: 79.9 kg; lognormal SD95 2.15
  (4,5,1,1,5,5);
- Disposal, building, mineral wool, to final disposal [CH]: 13.2 kg; lognormal SD95 2.15
  (4,5,1,1,5,5);
- Disposal, building, fibre board, to final disposal [CH]: 59.2 kg; lognormal SD95 2.15
  (4,5,1,1,5,5);
- Glued laminated timber, average glue mix, at plant [RER]: 0.05 m3; lognormal SD95 2.15
  (4,5,1,1,5,5);
- Disposal, building, glass sheet, to final disposal [CH]: 4.5 kg; lognormal SD95 2.15
  (4,5,1,1,5,5);
- Sawnwood, production mix, softwood, raw, dried (u=20%), at sawmill [CH]: 0.105 m3; lognormal SD95 2.15
  (4,5,1,1,5,5);
- Electricity, medium voltage, at grid [CH]: 10.5 kWh; lognormal SD95 2.15
  (4,5,1,1,5,5);
- Polystyrene foam slab, at plant [RER]: 5.4 kg; lognormal SD95 2.15
  (4,5,1,1,5,5);
- Sheet rolling, steel [RER]: 13.2 kg; lognormal SD95 2.15
  (4,5,1,1,5,5);
- Zinc coating, coils [RER]: 5.97 m2; lognormal SD95 2.15
  (4,5,1,1,5,5);
- Aluminium, production mix, at plant [RER]: 3 kg; lognormal SD95 2.15
  (4,5,1,1,5,5);
- Flat glass, uncoated, at plant [RER]: 4.5 kg; lognormal SD95 2.15
  (4,5,1,1,5,5);
- Particleboard, average glue mix, uncoated, at plant [RER]: 0.03 m3; lognormal SD95 2.15
  (4,5,1,1,5,5);

## Sampling procedure
most data obtained by personal communication

## Extrapolations
See geography

## Sources
- Kellenberger D., Althaus H.-J., Jungbluth N., Kuenniger T., Lehmann M., Thalmann P., 2007, 2007 - LCI building products - Kellenberger, Final report ecoinvent data v2.0, 7, Swiss Centre for LCI, Empa - TSL, ESU-services Ltd., Bau- und Umweltchimie, Duebendorf, CH
Kellenberger D., Althaus H.-J., Jungbluth N., Künniger T. (2007) Life Cycle Inventories of Building Products. Final report ecoinvent data v2.0. Volume: 7. Swiss Centre for LCI, Empa - TSL. Dübendorf, CH.
Type: Measurement on site
Source: CD-ROM
First author: Kellenberger D.
Other authors: Althaus H.-J., Jungbluth N., Künniger T.
Year: 2007
Title of anthology: Final report ecoinvent data v2.0
Place of publication: Dübendorf, CH
Publisher: Swiss Centre for LCI, Empa - TSL
Volume No: 7

## Validation
Proof reading validation: passed; Other validation: none;
