# Glass cullets, recovered from c-Si PV module treatment

Dataset: EcoSpold 1, unit process
Functional unit: 1 kg
Category: waste management / recycling
Geography: RER
Time period: 2014-01 to 2017-12
Generated by: Philippe Stolz
accessRestrictedTo: 0
copyright: true

## General comment
This dataset represents a weighted average of the recycling efforts of four recycling facilities in Europe. The average transport distance of waste c-Si PV panels is assumed to be 500 km. The treatment of c-Si PV modules yields glass cullets, aluminium scrap and copper scrap, which are considered as co-products. The efforts of PV module takeback and recycling are economically allocated to the treatment and the recovered materials.;

## Included processes
This dataset includes the transport of used crystalline silicon photovoltaic modules to the recycling facility as well as their dismantling and recycling. The consumption of energy and the disposal of waste material are also included. The takeback and recycling of the electric installation and the mounting structure are not included.

## Geography
Europe

## Technology
Industry data.

## Time period
Time of publications.

## Reference product
- Glass cullets, recovered from c-Si PV module treatment [RER]: 1 kg
  Europe

## Inputs from technosphere
- Diesel, burned in building machine, average [CH]: 0.0023568 MJ; lognormal SD95 2.0675
  (2,3,1,1,3,4,BU:2); Weighted average of data from recyclers; Economic allocation;
- Disposal, plastics, mixture, 15.3% water, to sanitary landfill [CH]: 0.00093254 kg; lognormal SD95 1.2491
  (2,3,1,1,3,4,BU:1.05); Weighted average of data from recyclers; Economic allocation;
- Transport, freight, lorry, fleet average [RER]: 0.014541 tkm; lognormal SD95 2.095
  (4,5,na,na,na,na,BU:2); Assumed transport distance to recycling site: 400 km; Economic allocation; Latunussa et al. 2016
- Transport, freight, lorry, 3.5t-7.5t gross weight, fleet average [RER]: 0.0036353 tkm; lognormal SD95 2.095
  (4,5,na,na,na,na,BU:2); Assumed transport distance to collection point: 100 km; Economic allocation; Latunussa et al. 2016
- Disposal, plastics, mixture, 15.3% water, to municipal incineration [CH]: 0.0053403 kg; lognormal SD95 1.2491
  (2,3,1,1,3,4,BU:1.05); Weighted average of data from recyclers; Economic allocation;
- Electricity, medium voltage, production ENTSO-E, at grid: 0.0040465 kWh; lognormal SD95 1.2491
  (2,3,1,1,3,4,BU:1.05); Weighted average of data from recyclers; Economic allocation;

## Sampling procedure
Literature data.

## Extrapolations
Some generic datasets from ecoinvent have been used.

## Sources
- Frischknecht R., Itten R., Sinha P., de Wild-Scholten M., Zhank J., 2020, 2015 - LCI and LCA photovoltaic systems - Frischknecht, Project report, 174, IEA PVPS Task 12, Petten, NL
Frischknecht R.,, Stolz P., Sinha P., de Wild-Scholten M. (2020) Life Cycle Inventories and Life Cycle Assessments of Photovoltaic Systems. Project report. Volume: 174. IEA PVPS Task 12.
Type: Separate publication
Source: Report
First author: Frischknecht R.,
Other authors: Stolz P., Sinha P., de Wild-Scholten M.
Year: 2020
Title of anthology: Project report
Publisher: IEA PVPS Task 12
Volume No: 174
Original title: Life Cycle Inventories and Life Cycle Assessments of Photovoltaic Systems

## Validation
Proof reading validation: 30.09.2020; Other validation: G:\Projekte laufend\174 Photovoltaic, IEA Task 12\2017 Global supply chain\EcoSpold\[174-photovoltaics-global-supply-chain-v2.5.xlsx]X-Process;
