# Greenhouse, glass walls and roof, metal tubes

Dataset: EcoSpold 1, unit process, infrastructure
Functional unit: 1 m2a
Category: agricultural / agricultural means of production\buildings
Geography: CH
Time period: 2015-01 to 2020-01
Generated by: Melina Glimmann
accessRestrictedTo: 0
copyright: true

## General comment
The inventory refers to the production of a greenhouse with glass walls with a lifespan of 20 years

## Included processes
This inventory includes the production of the greenhouse as well as the permanent technical infrastructure, that is greenhouse (bearing structure and covering materials), heating and cooling systems, fertirrigation, CO2 injection, stocking facilities and working equipement as far as it is installed permanentely (i.e. chariots on rails etc.) working equipement as far as it is installed permanentely (i.e. chariots on rails etc).

## Geography
The inventory is modelled for Switzerland

## Reference product
- Greenhouse, glass walls and roof, metal tubes [CH]: 1 m2a

## Inputs from technosphere
- Zinc coating, coils [RER]: 4e-5, 0.00012104, 4e-8, 0.018358 m2 (4 entries); lognormal SD95 1.24369
  (2,2,3,2,1,5,BU:1.05); ;
- Polyvinylchloride, suspension polymerised, at plant [RER]: 0.0001792, 0.0008 kg (2 entries); lognormal SD95 1.24369
  (2,2,3,2,1,5,BU:1.05); ;
- Oil boiler 100kW [CH]: 1.86e-6 p; lognormal SD95 3.0618
  (2,2,3,2,1,5,BU:3); ;
- Polyethylene, HDPE, granulate, at plant [RER]: 0.00036667, 0.008, 0.00055, 0.0022333, 0.0341, 0.00225 kg (6 entries); lognormal SD95 1.24369
  (2,2,3,2,1,5,BU:1.05); ;
- Section bar rolling, steel [RER]: 0.1769, 0.0011664, 0.0004 kg (3 entries); lognormal SD95 1.24369
  (2,2,3,2,1,5,BU:1.05); ;
- Disposal, municipal solid waste, 22.9% water, to municipal incineration [CH]: 0.4576 kg; lognormal SD95 1.24369
  (2,2,3,2,1,5,BU:1.05); ;
- Steel, low-alloyed, at plant [RER]: 1e-5, 0.00066667, 0.00264, 0.32, 0.1769, 0.00312, 0.0148, 0.0011664, 0.001, 0.00088 kg (10 entries); lognormal SD95 1.24369
  (2,2,3,2,1,5,BU:1.05); ;
- Synthetic rubber, at plant [RER]: 0.0003 kg; lognormal SD95 1.24369
  (2,2,3,2,1,5,BU:1.05); ;
- Drawing of pipes, steel [RER]: 0.32 kg; lognormal SD95 1.24369
  (2,2,3,2,1,5,BU:1.05); ;
- Polyethylene, LLDPE, granulate, at plant [RER]: 0.0476, 0.0057 kg (2 entries); lognormal SD95 1.24369
  (2,2,3,2,1,5,BU:1.05); ;
- Steel, converter, chromium steel 18/8, at plant [RER]: 0.0224, 0.01, 0.0004 kg (3 entries); lognormal SD95 1.24369
  (2,2,3,2,1,5,BU:1.05); ;
- Polystyrene, expandable, at plant [RER]: 0.0049 kg; lognormal SD95 1.24369
  (2,2,3,2,1,5,BU:1.05); ;
- Gas motor 206kW [RER]: 6.2e-10 p; lognormal SD95 3.0618
  (2,2,3,2,1,5,BU:3); ;
- Disposal, steel, 0% water, to construction waste landfill [CH]: 0.045803, 0.60561 kg (2 entries); lognormal SD95 1.24369
  (2,2,3,2,1,5,BU:1.05); ;
- Diesel, burned in building machine, average [CH]: 0.2517, 0.19831 MJ (2 entries); lognormal SD95 2.0648
  (2,2,3,2,1,5,BU:2); ;
- Agricultural machinery, general, production [CH]: 0.0003, 0.0003 kg (2 entries); lognormal SD95 3.0618
  (2,2,3,2,1,5,BU:3); ;
- Transport, freight, lorry, 7.5t-16t gross weight, fleet average [RER]: 0.00105, 2.03e-6, 0.02589, 2.9e-5, 0.00078927, 0.000176 tkm (6 entries); lognormal SD95 2.0648
  (2,2,3,2,1,5,BU:2); ;
- xx Concrete block, at plant [DE]: 0.10699 kg; lognormal SD95 1.24369
  (2,2,3,2,1,5,BU:1.05); ;
- Foaming, expanding [RER]: 0.0049 kg; lognormal SD95 1.24369
  (2,2,3,2,1,5,BU:1.05); ;
- Injection moulding [RER]: 0.0022333 kg; lognormal SD95 1.24369
  (2,2,3,2,1,5,BU:1.05); ;
- Extrusion, plastic film [RER]: 0.0008, 0.0003, 0.0057, 0.0341, 0.0476, 0.008 kg (6 entries); lognormal SD95 1.24369
  (2,2,3,2,1,5,BU:1.05); ;
- Concrete, sole plate and foundation, at plant [CH]: 0.00036897, 6e-5 m3 (2 entries); lognormal SD95 1.24369
  (2,2,3,2,1,5,BU:1.05); ;
- Sheet rolling, steel [RER]: 0.0224, 0.00312, 0.01 kg (3 entries); lognormal SD95 1.24369
  (2,2,3,2,1,5,BU:1.05); ;
- xx Electronics scrap, for precious metal recovery, at preparation plant [GLO]: 0.00328 kg; lognormal SD95 1.24369
  (2,2,3,2,1,5,BU:1.05); ;
- Aluminium alloy, AlMg3, at plant [RER]: 0.228 kg; lognormal SD95 1.24369
  (2,2,3,2,1,5,BU:1.05); ;
- xx Blow moulding [RER]: 0.00036667, 0.00055, 0.00225 kg (3 entries); lognormal SD95 1.24369
  (2,2,3,2,1,5,BU:1.05); ;
- Flat glass, uncoated, at plant [RER]: 0.48 kg; lognormal SD95 1.24369
  (2,2,3,2,1,5,BU:1.05); ;
- Electronics for control units [RER]: 0.003 kg; lognormal SD95 1.24369
  (2,2,3,2,1,5,BU:1.05); ;
- Disposal, aluminium, 0% water, to sanitary landfill [CH]: 0.057 kg; lognormal SD95 1.24369
  (2,2,3,2,1,5,BU:1.05); ;
- Wire drawing, copper [RER]: 0.00028 kg; lognormal SD95 1.24369
  (2,2,3,2,1,5,BU:1.05); ;
- Section bar extrusion, aluminium [RER]: 0.228 kg; lognormal SD95 1.24369
  (2,2,3,2,1,5,BU:1.05); ;
- Cogen unit 200kWe diesel SCR, components for electricity only [RER]: 6.2e-10 p; lognormal SD95 3.0618
  (2,2,3,2,1,5,BU:3); ;
- Transport, freight, lorry, 16t-32t gross weight, fleet average [RER]: 0.19417, 0.0081089 tkm (2 entries); lognormal SD95 2.0648
  (2,2,3,2,1,5,BU:2); ;
- Copper, at regional storage [RER]: 0.0001008 kg; lognormal SD95 1.24369
  (2,2,3,2,1,5,BU:1.05); ;
- Electricity, medium voltage, at grid [CH]: 0.05972 kWh; lognormal SD95 1.24369
  (2,2,3,2,1,5,BU:1.05); ;

## Inputs from nature
- Transformation, from heterogeneous, agricultural [resources, land]: 1.0667 m2; lognormal SD95 1.32319
  (2,2,3,2,1,5,BU:1.2); ;
- Transformation, from urban, discontinuously built [resources, land]: 0.02515 m2; lognormal SD95 2.0648
  (2,2,3,2,1,5,BU:2); ;
- Occupation, construction site [resources, land]: 0.04 m2a; lognormal SD95 1.5806
  (2,2,3,2,1,5,BU:1.5); ;
- Transformation, from permanent crop, fruit, extensive [resources, land]: 0.00807 m2; lognormal SD95 1.32319
  (2,2,3,2,1,5,BU:1.2); ;
- Transformation, from annual crop [resources, land]: 0.05327 m2; lognormal SD95 1.32319
  (2,2,3,2,1,5,BU:1.2); ;
- Transformation, from pasture, man made, extensive [resources, land]: 0.00181 m2; lognormal SD95 1.26241
  (2,2,3,2,1,5,BU:1.1); ;
- Transformation, to heterogeneous, agricultural [resources, land]: 1.2 m2; lognormal SD95 1.32319
  (2,2,3,2,1,5,BU:1.2); ;
- Occupation, heterogeneous, agricultural [resources, land]: 1.2 m2a; lognormal SD95 1.26241
  (2,2,3,2,1,5,BU:1.1); ;
- Transformation, from forest, unspecified [resources, land]: 0.00815 m2; lognormal SD95 2.0648
  (2,2,3,2,1,5,BU:2); ;
- Transformation, from pasture, man made, intensive [resources, land]: 0.0368 m2; lognormal SD95 1.26241
  (2,2,3,2,1,5,BU:1.1); ;

## Sampling procedure
Literature and manufacturer information.

## Sources
- Kaegi T., Glimmann M., Conte F., Roberts G., 2021, 2021 - LCA tomatoes and green beans production - Kaegi, Carbotech on behalf of BAFU, Carbotech AG, Zuerich, CH

## Validation
16.08.2022 \\tsclient\Schreibtisch\WinShare\BAFU Gemuese\Spargeln und Erdbeeren\[EcoSpold_Bafu_Gemuese_Greenhous_glass walls and roof_CH v1.xlsx]X-Process
