# Transport, freight, rail, diesel, with particle filter

Dataset: EcoSpold 1, unit process
Functional unit: 1 tkm
Category: transport systems / train
Geography: CH
Time period: 2000-01 to 2014-12
Production volume: 8738.193775 Mio tkm/a
Share of production covered: 100 %
Generated by: Luana Krebs
accessRestrictedTo: 0
copyright: true

## General comment
Inventory refers to the entire transport life cycle. For rail infrastructure, expenditures and environmental interventions due to construction, renewal and disposal of railway tracks have been allocated based on the Gross tonne kilometre performance of freight transport on SBB railway tracks in 2014 ( 20260 Mio. Gtkm). Expenditures due to operation of the rail infrastructure, as well as land use have been allocated based on the yearly train kilometre performance (8615 Mio tkm). Diesel consumption for traction have been updated based on SBB data for the year 2019. For the diesel consumption for traction no data was avaiable from Switzerland as no diesel freight train are used anymore. Therefore a similar consumption to Austria was assumed due to topographical reasons (10.3g/tkm).;

## Included processes
The inventory includes the energy consumption of a goods train in Switzerland using diesel energy and a particle filter. In addition also the diesel consumption and emissions of shunting processes, the production and maintenance of vehicles as well as the construction and maintenance of the rail way tracks are accounted for.

## Technology
Average technology

## Time period
Time of publications

## Reference product
- Transport, freight, rail, diesel, with particle filter [CH]: 1 tkm
  SWITZERLAND

## Inputs from technosphere
- Disposal, locomotive [RER]: 5.6465e-10 p; lognormal SD95 3.0942
  (2,1,1,1,3,5,BU:3); ;
- Maintenance, locomotive [RER]: 5.6465e-10 p; lognormal SD95 3.0942
  (2,1,1,1,3,5,BU:3); ;
- Operation, maintenance, railway track [CH]: 7.393e-5 my; lognormal SD95 3.0942
  (2,1,1,1,3,5,BU:3); based on the gross ton kilometric performance on the SBB track in 2014: 72126484166Gtkm and the rail track length 2385 km; pers. correspondence SBB, Dec. 2015
- Maintenance, goods wagon [RER]: 4.0795e-8 p; lognormal SD95 3.0942
  (2,1,1,1,3,5,BU:3); ;
- Diesel, at regional storage [CH]: 0.010567 kg; lognormal SD95 1.2077
  (1,1,1,1,1,5,BU:1.05); ; Pers. communication SBB, Fabiano Piccinno, Oct. 2020
- Goods wagon [RER]: 4.0795e-8 p; lognormal SD95 3.0942
  (2,1,1,1,3,5,BU:3); calculation based on the number of wagons of SBB in 2014, an assumed constant yearly performance of 12300000000 vkm/a and a life time of 40 years; pers. correspondence SBB, June. 2015
- Locomotive [RER]: 5.6465e-10 p; lognormal SD95 3.0942
  (2,1,1,1,3,5,BU:3); calculation based on the number of locomotives of SBB in 2014, an assumed constant yearly performance of 14478000000 vkm/a and a life time of 40 years; pers. correspondence SBB, June. 2015
- Railway track [CH]: 7.393e-5 my; lognormal SD95 3.0942
  (same comment as for Operation, maintenance, railway track)
- Disposal, railway track [CH]: 7.393e-5 my; lognormal SD95 3.0942
  (same comment as for Operation, maintenance, railway track)

## Emissions to nature
- Manganese [emissions to air, unspecified]: 1.1765e-10 kg; lognormal SD95 5.1125
  (2,3,2,1,3,5,BU:5); ; Data from ANABEL; Personal correspondence Gunter Adolf, SBB, June 2016
- Copper [emissions to air, unspecified]: 3.0126e-10 kg; lognormal SD95 5.1125
  (same comment as for Manganese)
- Lead [emissions to soil, industrial]: 1.7826e-12 kg; lognormal SD95 1.6263
  (2,3,2,1,3,5,BU:1.5); ; Data from ANABEL; Personal correspondence Gunter Adolf, SBB, June 2016
- Chromium [emissions to air, unspecified]: 4.7838e-11 kg; lognormal SD95 5.1125
  (same comment as for Manganese)
- Chromium [emissions to air, unspecified]: 5.2835e-10 kg; lognormal SD95 5.8584
  (3,3,2,5,5,5,BU:5); emission factor of diesel: 5.00E-5 g/kg diesel, assuming a share of 97.7% with particle filter; EMEP/EEA guidebook 2013, 1.A.2.f.ii, Tab. 3-1
- Propane [emissions to air, unspecified]: 5.3991e-8 kg; lognormal SD95 2.308
  (3,3,2,5,5,5,BU:1.5); emission factor of diesel: 5.11E-3 g/kg diesel, assuming a share of 97.7% with particle filter; BAFU 2015: Non-road database; EMEP/EEA guidebook 2013, Tab. 3-113
- Copper [emissions to air, unspecified]: 1.7964e-8 kg; lognormal SD95 5.8584
  (3,3,2,5,5,5,BU:5); emission factor of diesel: 1.70E-3 g/kg diesel, assuming a share of 97.7% with particle filter; EMEP/EEA guidebook 2013, 1.A.2.f.ii, Tab. 3-1
- Ammonia [emissions to air, unspecified]: 1.0567e-7 kg; lognormal SD95 2.1253
  (3,3,2,5,5,5,BU:1.2); emission factor of diesel: 1.00E-2 g/kg diesel, assuming a share of 97.7% with particle filter; EMEP/EEA guidebook 2013, 1.A.3.c, Tab. 3-3
- PAH, polycyclic aromatic hydrocarbons [emissions to air, unspecified]: 3.4765e-8 kg; lognormal SD95 3.7429
  (3,3,2,5,5,5,BU:3); emission factor of diesel: 3.29E-3 g/kg diesel, assuming a share of 97.7% with particle filter; EMEP/EEA guidebook 2013, 1.A.2.f.ii, Tab. 3-1
- Zinc [emissions to soil, industrial]: 1.0538e-11 kg; lognormal SD95 1.6263
  (same comment as for Lead)
- Lead [emissions to air, unspecified]: 5.4948e-10 kg; lognormal SD95 5.8584
  (3,3,2,5,5,5,BU:5); emission factor of diesel: 5.20E-5 g/kg diesel, assuming a share of 97.7% with particle filter; EMEP/EEA guidebook 2013, 1.A.2.f.ii, Tab. 3-12
- Heptane [emissions to air, unspecified]: 1.6197e-7 kg; lognormal SD95 2.308
  (3,3,2,5,5,5,BU:1.5); emission factor of diesel: 1.53E-2 g/kg diesel, assuming a share of 97.7% with particle filter; BAFU 2015: Non-road database; EMEP/EEA guidebook 2013, Tab. 3-116
- Toluene [emissions to air, unspecified]: 5.3991e-9 kg; lognormal SD95 2.308
  (3,3,2,5,5,5,BU:1.5); emission factor of diesel: 5.11E-4 g/kg diesel, assuming a share of 97.7% with particle filter; BAFU 2015: Non-road database; EMEP/EEA guidebook 2013, Tab. 3-118
- Sulfur dioxide [emissions to air, unspecified]: 2.1134e-7 kg; lognormal SD95 2.0816
  (3,3,2,5,5,5,BU:1.05); emission factor of diesel: 2.00E-2 g/kg diesel, assuming a share of 97.7% with particle filter; HBEFA 3.1., CH
- Carbon dioxide, fossil [emissions to air, unspecified]: 0.033287 kg; lognormal SD95 2.0816
  (3,3,2,5,5,5,BU:1.05); emission factor of diesel: 3.15E+3 g/kg diesel, assuming a share of 97.7% with particle filter; BAFU 2015: non road emission factor database
- Antimony [emissions to air, unspecified]: 1.5056e-11 kg; lognormal SD95 5.1125
  (same comment as for Manganese)
- Zinc [emissions to air, unspecified]: 2.9688e-11 kg; lognormal SD95 5.1125
  (same comment as for Manganese)
- Particulates, > 10 um [emissions to air, unspecified]: 7.5048e-8 kg; lognormal SD95 2.308
  (3,3,2,5,5,5,BU:1.5); emission factor of diesel: 7.10E-3 g/kg diesel, assuming a share of 97.7% with particle filter; own calculation with SBB tractions data and non road emission factor (BAFU 2015)
- Dinitrogen monoxide [emissions to air, unspecified]: 1.5975e-6 kg; lognormal SD95 2.308
  (3,3,2,5,5,5,BU:1.5); emission factor of diesel: 1.51E-1 g/kg diesel, assuming a share of 97.7% with particle filter; BAFU 2015: non road emission factor database
- o-Xylene [emissions to air, unspecified]: 2.1596e-7 kg; lognormal SD95 2.308
  (3,3,2,5,5,5,BU:1.5); emission factor of diesel: 2.04E-2 g/kg diesel, assuming a share of 97.7% with particle filter; BAFU 2015: Non-road database; EMEP/EEA guidebook 2013, Tab. 3-120
- Nitrogen oxides [emissions to air, unspecified]: 0.00047636 kg; lognormal SD95 2.308
  (3,3,2,5,5,5,BU:1.5); emission factor of diesel: 4.51E+1 g/kg diesel, assuming a share of 97.7% with particle filter; BAFU 2015: non road emission factor database
- m-Xylene [emissions to air, unspecified]: 5.2911e-7 kg; lognormal SD95 2.308
  (3,3,2,5,5,5,BU:1.5); emission factor of diesel: 5.01E-2 g/kg diesel, assuming a share of 97.7% with particle filter; BAFU 2015: Non-road database; EMEP/EEA guidebook 2013, Tab. 3-119
- Benzaldehyde [emissions to air, unspecified]: 7.3968e-7 kg; lognormal SD95 2.308
  (3,3,2,5,5,5,BU:1.5); emission factor of diesel: 7.00E-2 g/kg diesel, assuming a share of 97.7% with particle filter; BAFU 2015: Non-road database; EMEP/EEA guidebook 2013, Tab. 3-123
- Acetaldehyde [emissions to air, unspecified]: 2.4674e-6 kg; lognormal SD95 2.308
  (3,3,2,5,5,5,BU:1.5); emission factor of diesel: 2.33E-1 g/kg diesel, assuming a share of 97.7% with particle filter; BAFU 2015: Non-road database; EMEP/EEA guidebook 2013, Tab. 3-122
- Benzo(a)pyrene [emissions to air, unspecified]: 3.1701e-10 kg; lognormal SD95 3.7429
  (3,3,2,5,5,5,BU:3); emission factor of diesel: 3.00E-5 g/kg diesel, assuming a share of 97.7% with particle filter; EMEP/EEA guidebook 2013, 1.A.2.f.ii, Tab. 3-1
- Selenium [emissions to air, unspecified]: 1.0567e-10 kg; lognormal SD95 5.8584
  (3,3,2,5,5,5,BU:5); emission factor of diesel: 1.00E-5 g/kg diesel, assuming a share of 97.7% with particle filter; EMEP/EEA guidebook 2013, 1.A.2.f.ii, Tab. 3-1
- Iron [emissions to soil, industrial]: 9.7063e-9 kg; lognormal SD95 1.6263
  (same comment as for Lead)
- Carbon monoxide, fossil [emissions to air, unspecified]: 0.00026348 kg; lognormal SD95 5.8584
  (3,3,2,5,5,5,BU:5); emission factor of diesel: 2.49E+1 g/kg diesel, assuming a share of 97.7% with particle filter; BAFU 2015: non road emission factor database
- Iron [emissions to air, unspecified]: 2.7346e-8 kg; lognormal SD95 5.1125
  (same comment as for Manganese)
- Heat, waste [emissions to air, unspecified]: 0.45227 MJ; lognormal SD95 2.0816
  (3,3,2,5,5,5,BU:1.05); default value;
- Lead [emissions to air, unspecified]: 5.0222e-12 kg; lognormal SD95 5.1125
  (same comment as for Manganese)
- Arsenic [emissions to air, unspecified]: 1.0567e-12 kg; lognormal SD95 5.8584
  (3,3,2,5,5,5,BU:5); emission factor of diesel: 1.00E-7 g/kg diesel, assuming a share of 97.7% with particle filter; EMEP/EEA guidebook 2013, 1.A.2.f.ii, Tab. 3-1
- Ethane [emissions to air, unspecified]: 1.6197e-8 kg; lognormal SD95 2.308
  (3,3,2,5,5,5,BU:1.5); emission factor of diesel: 1.53E-3 g/kg diesel, assuming a share of 97.7% with particle filter; BAFU 2015: Non-road database; EMEP/EEA guidebook 2013, Tab. 3-112
- Zinc [emissions to air, unspecified]: 1.0567e-8 kg; lognormal SD95 5.8584
  (3,3,2,5,5,5,BU:5); emission factor of diesel: 1.00E-3 g/kg diesel, assuming a share of 97.7% with particle filter; EMEP/EEA guidebook 2013, 1.A.2.f.ii, Tab. 3-1
- Antimony [emissions to soil, industrial]: 5.344e-12 kg; lognormal SD95 1.6263
  (same comment as for Lead)
- Acrolein [emissions to air, unspecified]: 9.5564e-7 kg; lognormal SD95 2.308
  (3,3,2,5,5,5,BU:1.5); emission factor of diesel: 9.04E-2 g/kg diesel, assuming a share of 97.7% with particle filter; BAFU 2015: Non-road database; EMEP/EEA guidebook 2013, Tab. 3-124
- Nickel [emissions to air, unspecified]: 7.3969e-10 kg; lognormal SD95 5.8584
  (3,3,2,5,5,5,BU:5); emission factor of diesel: 7.00E-5 g/kg diesel, assuming a share of 97.7% with particle filter; EMEP/EEA guidebook 2013, 1.A.2.f.ii, Tab. 3-1
- Formaldehyde [emissions to air, unspecified]: 4.5352e-6 kg; lognormal SD95 2.308
  (3,3,2,5,5,5,BU:1.5); emission factor of diesel: 4.29E-1 g/kg diesel, assuming a share of 97.7% with particle filter; BAFU 2015: Non-road database; EMEP/EEA guidebook 2013, Tab. 3-121
- Oils, unspecified [emissions to soil, industrial]: 3.1803e-9 kg; lognormal SD95 1.6263
  (2,3,2,1,3,5,BU:1.5); hydrocarbon emission assumed as oil emission into soil; Data from ANABEL; Personal correspondence Gunter Adolf, SBB, June 2016
- Butane [emissions to air, unspecified]: 8.0986e-8 kg; lognormal SD95 2.308
  (3,3,2,5,5,5,BU:1.5); emission factor of diesel: 7.66E-3 g/kg diesel, assuming a share of 97.7% with particle filter; BAFU 2015: Non-road database; EMEP/EEA guidebook 2013, Tab. 3-114
- Copper [emissions to soil, industrial]: 1.0693e-10 kg; lognormal SD95 1.6263
  (same comment as for Lead)
- Mercury [emissions to air, unspecified]: 5.6005e-11 kg; lognormal SD95 5.8584
  (3,3,2,5,5,5,BU:5); emission factor of diesel: 5.30E-6 g/kg diesel, assuming a share of 97.7% with particle filter; EMEP/EEA guidebook 2013, 1.A.2.f.ii, Tab. 3-1
- Noise, rail, freight train [non material emissions, unspecified]: 1 tkm; lognormal SD95 2.532
  (3,3,5,5,5,5,BU:1.5); ; Ecological Scarcity method 2013; Frischknecht & Büsser Knöpfel 2013
- Copper [emissions to water, unspecified]: 3.0233e-11 kg; lognormal SD95 3.0986
  (2,3,2,1,3,5,BU:3); ; Data from ANABEL; Personal correspondence Gunter Adolf, SBB, June 2016
- Particulates, < 2.5 um [emissions to air, unspecified]: 1.7761e-6 kg; lognormal SD95 3.7429
  (3,3,2,5,5,5,BU:3); emission factor of diesel: 1.68E-1 g/kg diesel, assuming a share of 97.7% with particle filter; own calculation with SBB tractions data and non road emission factor (BAFU 2015)
- NMVOC, non-methane volatile organic compounds, unspecified origin [emissions to air, unspecified]: 4.3857e-5 kg; lognormal SD95 2.308
  (3,3,2,5,5,5,BU:1.5); emission factor of diesel: 4.15E+0 g/kg diesel, assuming a share of 97.7% with particle filter; non road emission factor
- Zinc [emissions to water, unspecified]: 2.8844e-10 kg; lognormal SD95 5.1125
  (same comment as for Manganese)
- Benzene [emissions to air, unspecified]: 7.2615e-8 kg; lognormal SD95 3.7429
  (3,3,2,5,5,5,BU:3); emission factor of diesel: 6.87E-3 g/kg diesel, assuming a share of 97.7% with particle filter; BAFU 2015: non road emission factor database
- Manganese [emissions to soil, industrial]: 4.1758e-11 kg; lognormal SD95 1.6263
  (same comment as for Lead)
- Chromium VI [emissions to air, unspecified]: 1.0567e-12 kg; lognormal SD95 5.8584
  (same comment as for Arsenic)
- Chromium [emissions to soil, industrial]: 1.698e-11 kg; lognormal SD95 1.6263
  (same comment as for Lead)
- Particulates, > 2.5 um, and < 10um [emissions to air, unspecified]: 7.3124e-8 kg; lognormal SD95 2.7394
  (3,3,2,5,5,5,BU:2); emission factor of diesel: 6.92E-3 g/kg diesel, assuming a share of 97.7% with particle filter; own calculation with SBB tractions data and non road emission factor (BAFU 2015)
- Cadmium [emissions to air, unspecified]: 1.0567e-10 kg; lognormal SD95 5.8584
  (same comment as for Selenium)
- Methane, fossil [emissions to air, unspecified]: 5.8092e-7 kg; lognormal SD95 2.308
  (3,3,2,5,5,5,BU:1.5); emission factor of diesel: 5.50E-2 g/kg diesel, assuming a share of 97.7% with particle filter; BAFU 2015: non road emission factor database
- Pentane [emissions to air, unspecified]: 3.2395e-8 kg; lognormal SD95 2.308
  (3,3,2,5,5,5,BU:1.5); emission factor of diesel: 3.07E-3 g/kg diesel, assuming a share of 97.7% with particle filter; BAFU 2015: Non-road database; EMEP/EEA guidebook 2013, Tab. 3-115
- Styrene [emissions to air, unspecified]: 3.0235e-7 kg; lognormal SD95 2.308
  (3,3,2,5,5,5,BU:1.5); emission factor of diesel: 2.86E-2 g/kg diesel, assuming a share of 97.7% with particle filter; BAFU 2015: Non-road database; EMEP/EEA guidebook 2013, Tab. 3-125

## Sampling procedure
Statistics

## Extrapolations
Data of the diesel consumption from Austria used.

## Sources
- Krebs L., Frischknecht R., 2020, 2020 - Update Mobitool 2020 - Krebs, Project report, 713, treeze Ltd., Uster, CH
L. Krebs, R. Frischknecht (2020) Aktualisierung Ökobilanzdaten mobitool 2020, Teil 1. Project report. Volume: 713. treeze Ltd.. Uster, CH.
Type: Separate publication
Source: Report
First author: L. Krebs
Other authors: R. Frischknecht
Year: 2020
Title of anthology: Project report
Place of publication: Uster, CH
Publisher: treeze Ltd.
Volume No: 713

## Validation
Proof reading validation: 10.11.2020; Other validation: G:\Projekte laufend\713 Aktualisierung mobitool 2020\EcoSpold\[713_Transport-Train-freight-CH_EIV2_v0.3.xlsx]X-Process;
