# Fibreboard, soft, at regional storage, with resource correction

Dataset: EcoSpold 1, unit process
Functional unit: 1 kg
Category: wood / wooden materials\at regional storage\other material
Geography: CH
Time period: 2000-01 to 2016-12
Generated by: default
accessRestrictedTo: 0
copyright: true

## Reference product
- Fibreboard, soft, at regional storage, with resource correction [CH]: 1 kg
  SWITZERLAND

## Inputs from technosphere
- Fibreboard, soft, from wet & dry processes, at plant [RER]: 0.00234 m3
  37.5% market share; 160 kg/m3
- Fibreboard soft, at plant (u=7%) [CH]: 0.00446 m3
  62.5% market share; 140 kg/m3
- Transport, freight, lorry, fleet average [RER]: 0.131 tkm
  37.5% market share; 350 km
- Transport, freight, rail [RER]: 0 tkm

## Inputs from nature
- Energy, gross calorific value, in biomass, resource correction [resources, unspecified]: -7.262 MJ
  (1,1,1,1,1,1,BU:1.05); correction for recycling of wood, calculated in "684-Holzdaten-Ressourcenkorrektur-v0.4.xlsx"

## Sources
- Werner F., 2017, 2017 - LCI wood and wood based products - Werner, Project Report, 0, Environment & Development, Zuerich, CH
