# Wood chips, softwood, wet, measured as dry mass, at sawmill

Dataset: EcoSpold 1, unit process
Functional unit: 1 kg
Category: wood / wooden materials\new processes\other material
Geography: AT
Generated by: Frank Werner
accessRestrictedTo: 0
copyright: true

## Reference product
- Wood chips, softwood, wet, measured as dry mass, at sawmill [AT]: 1 kg
  AUSTRIA

## Inputs from technosphere
- Steel, low-alloyed, at plant [RER]: 4.08e-6 kg; lognormal SD95 1.9278
  Pedigree: (2,1,2,1,1).
- Slab and siding, softwood, wet, measured as dry mass, at sawmill [AT]: 1 kg; lognormal SD95 1.0287
  Pedigree: (2,1,2,1,1).
- Lubricating oil, at plant [RER]: 2.04e-6 kg; lognormal SD95 1.0287
  Pedigree: (2,1,2,1,1).
- Chipper, stationary, electric [RER]: 5.3e-8 p; lognormal SD95 1.9278
  Pedigree: (2,1,2,1,1).
- Electricity, medium voltage, at grid [AT]: 0.0258 kWh; lognormal SD95 1.5653
  Pedigree: (2,1,2,1,1).
- Transport, freight, lorry, fleet average [RER]: 0.07 tkm; lognormal SD95 1.5103
  Pedigree: (1,1,4,5,4).

## Sources
- Werner F., 2017, 2017 - LCI wood and wood based products - Werner, Project Report, 0, Environment & Development, Zuerich, CH
