# Tomatoes conventional, hors-sol, at greenhouse

Dataset: EcoSpold 1, unit process
Functional unit: 1 kg
Category: agricultural / agricultural production\plant protection
Geography: ES
Time period: 2017-01 to 2020-12
Generated by: Melina Glimmann
accessRestrictedTo: 0
copyright: true

## General comment
The inventory refers to the hors-sol production of 1 kg of tomato in Almeria in an unheated greenhouse

## Geography
The inventory is modelled for Spain

## Reference product
- Tomatoes conventional, hors-sol, at greenhouse [ES]: 1 kg

## Inputs from technosphere
- Rock wool, at plant [CH]: 0.0011231 kg; lognormal SD95 1.22259
  (2,3,1,1,1,5,BU:1.05);
- Injection moulding [RER]: 0.00020198 kg; lognormal SD95 1.22259
  (2,3,1,1,1,5,BU:1.05);
- Pesticide unspecified, at regional storehouse [RER]: 3.1923e-5 kg; lognormal SD95 1.22259
  (2,3,1,1,1,5,BU:1.05);
- Average mineral fertiliser, as N, at regional storehouse [RER]: 0.0057692 kg; lognormal SD95 1.22259
  (2,3,1,1,1,5,BU:1.05);
- Section bar rolling, steel [RER]: 0.0028385 kg; lognormal SD95 1.22259
  (2,3,1,1,1,5,BU:1.05);
- Disposal, polyethylene, 0.4% water, to municipal incineration [CH]: 0.0011231 kg; lognormal SD95 1.22259
  (2,3,1,1,1,5,BU:1.05);
- Plastic tunnel, type almeria [ES]: 0.076923 m2a; lognormal SD95 3.0519
  (2,3,1,1,1,5,BU:3);
- Extrusion, plastic film [RER]: 0.0011507 kg; lognormal SD95 1.22259
  (2,3,1,1,1,5,BU:1.05);
- Electricity, low voltage, at grid [ES]: 0.017 kWh; lognormal SD95 1.22259
  (2,3,1,1,1,5,BU:1.05);
- Polyvinylchloride, at regional storage [RER]: 0.00018462 kg; lognormal SD95 1.22259
  (2,3,1,1,1,5,BU:1.05);
- Tap water, desalinated sea water, at user [ES]: 3.162 kg; lognormal SD95 1.22259
  (2,3,1,1,1,5,BU:1.05);
- Average mineral fertiliser, as P2O5, at regional storehouse [RER]: 0.0026077 kg; lognormal SD95 1.22259
  (2,3,1,1,1,5,BU:1.05);
- Disposal, polypropylene, 15.9% water, to municipal incineration [CH]: 1.6154e-5 kg; lognormal SD95 1.22259
  (2,3,1,1,1,5,BU:1.05);
- Tomato, seedling, conventional, soilless production, at production site [RER]: 1.1538e-5 p; lognormal SD95 1.22259
  (2,3,1,1,1,5,BU:1.05);
- Polypropylene, granulate, at plant [RER]: 1.6154e-5 kg; lognormal SD95 1.22259
  (2,3,1,1,1,5,BU:1.05);
- Disposal, polyvinylchloride, 0.2% water, to municipal incineration [CH]: 0.00018462 kg; lognormal SD95 1.22259
  (2,3,1,1,1,5,BU:1.05);
- Steel, low-alloyed, at plant [RER]: 0.0028385 kg; lognormal SD95 1.22259
  (2,3,1,1,1,5,BU:1.05);
- Polyethylene, HDPE, granulate, at plant [RER]: 0.0011231 kg; lognormal SD95 1.22259
  (2,3,1,1,1,5,BU:1.05);
- Diesel, burned in diesel-electric generating set [GLO]: 0.078508 MJ; lognormal SD95 1.22259
  (2,3,1,1,1,5,BU:1.05);
- Average mineral fertiliser, as K2O, at regional storehouse [RER]: 0.010846 kg; lognormal SD95 1.22259
  (2,3,1,1,1,5,BU:1.05);

## Inputs from nature
- Energy, gross calorific value, in biomass [resources, biotic]: 0.76022 MJ; lognormal SD95 1.22259
  (2,3,1,1,1,5,BU:1.05);
- Water, unspecified natural origin, EG [resources, in water]: 0.015484 m3; lognormal SD95 1.22259
  (2,3,1,1,1,5,BU:1.05);
- Carbon dioxide, in air [resources, in air]: 0.076989 kg; lognormal SD95 1.22259
  (2,3,1,1,1,5,BU:1.05);

## Emissions to nature
- Nitrogen oxides [emissions to air, low. pop.]: 9.6923e-6 kg; lognormal SD95 1.56811
  (2,3,1,1,1,5,BU:1.5);
- Mancozeb [emissions to soil, agricultural]: 9.8846e-6 kg; lognormal SD95 1.3059
  (2,3,1,1,1,5,BU:1.2);
- Water, ES [emissions to air, unspecified]: 16.559 kg; lognormal SD95 1.56811
  (2,3,1,1,1,5,BU:1.5);
- Cymoxanil [emissions to soil, agricultural]: 5.0769e-6 kg; lognormal SD95 1.3059
  (2,3,1,1,1,5,BU:1.2);
- Water, ES [emissions to water, unspecified]: 3.2581 m3; lognormal SD95 1.56811
  (2,3,1,1,1,5,BU:1.5);
- Dinitrogen monoxide [emissions to air, low. pop.]: 4.6308e-5 kg; lognormal SD95 1.56811
  (2,3,1,1,1,5,BU:1.5);
- Sulfur [emissions to soil, agricultural]: 5.7692e-6 kg; lognormal SD95 1.56811
  (2,3,1,1,1,5,BU:1.5);
- Imidacloprid [emissions to soil, agricultural]: 1.1538e-6 kg; lognormal SD95 1.3059
  (2,3,1,1,1,5,BU:1.2);
- Triadimenol [emissions to soil, agricultural]: 3.1154e-6 kg; lognormal SD95 1.3059
  (2,3,1,1,1,5,BU:1.2);
- Water, embodied in product, CH [economic issues, unspecified]: 0.95054 kg; lognormal SD95 1.22259
  (2,3,1,1,1,5,BU:1.05);
- Iprodione [emissions to soil, agricultural]: 1.9231e-6 kg; lognormal SD95 1.3059
  (2,3,1,1,1,5,BU:1.2);
- Ammonia [emissions to air, low. pop.]: 0.00020154 kg; lognormal SD95 1.3059
  (2,3,1,1,1,5,BU:1.2);
- Kresoxim-methyl [emissions to soil, agricultural]: 3.8462e-7 kg; lognormal SD95 1.3059
  (2,3,1,1,1,5,BU:1.2);

## Sampling procedure
Literature

## Sources
- Kaegi T., Glimmann M., Conte F., Roberts G., 2021, 2021 - LCA tomatoes and green beans production - Kaegi, Carbotech on behalf of BAFU, Carbotech AG, Zuerich, CH

## Validation
21.01.2022 \\tsclient\Schreibtisch\WinShare\BAFU Gemuese\2022-01-21\[EcoSpold_Bafu_Gemuese_Tomatoes conventional_hors-sol_greenhouse_ES V1.xlsx]X-Process
