# Disposal, LCD module, to municipal waste incineration

Dataset: EcoSpold 1, unit process
Functional unit: 1 kg
Category: waste management / municipal incineration
Geography: CH
Time period: 2004-01 to 2004-12
Generated by: Gabor Doka
accessRestrictedTo: 0
copyright: true

## General comment
This dataset represents the activity of waste disposal of liquid crystal display in a municipal solid waste incinerator (MSWI) Recommended use of this dataset: Only for incineration of LCD modules (mostly glass and inorganics, some electronic components, copper and plastics) generated in the recycling (mechanical treatment) of LCD screens (Liquid Crystal Display screen residue) Inventoried waste contains 0.87% Plastics from electronic consumer goods; 0.87% Plastics from electronic industrial goods; 82% Glass; 0.87% wiring copper; 0.83% liquid crystals; 0.12% ITO coating; 14.5% electronic goods; . Waste composition (wet, in ppm): upper heating value 2.835 MJ/kg; lower heating value 2.551 MJ/kg; H2O 40144; O 430500; H 7674.6; C 63365; S 102.58; N 1270.5; P 46.362; B 0.0082045; Cl 1519.4; Br 95.711; F 11.587; I n.a.; Ag 30.387; As 0.1305; Ba 8.0249; Cd 10.593; Co 0.51291; Cr 317.5; Cu 26895; Hg 0.16101; Mn 71.044; Mo 0.56082; Ni 1905; Pb 4347.4; Sb 112.38; Se 0.034097; Sn 2351.8; V 0.01305; Zn 2573.8; Be 0.0081182; Sc n.a.; Sr 1.4369; Ti 77.9; Tl 0.0064946; W n.a.; Si 294410; Fe 5671.6; Ca 60879; Al 900.8; K 965.57; Mg 2.0446; Na 52850; Share of carbon in waste that is biogenic 0%. Share of metals in waste not oxidised and bulk-recyclable (exclude very small or thin parts) Iron: 99.52%; Alu: 57.22%; Copper: 99.77%. One kg of this waste produces 0.9804 kg of slag and 0.01217 kg of residues, which are landfilled. Additional solidification with 0.004869 kg of cement. Net energy production: 0.24MJ/kg electric energy and 0.64MJ/kg thermal energy. Recovery of metal scrap to recycling: 3.1738g iron scrap, 0.131g aluminium scrap, 7.6938g copper scrap.;;

## Included processes
Waste incineration from waste reception gate further downstream (excluding transport to the MSWI plant). Waste-specific air and water emisions from incineration, auxiliary material consumption for flue gas cleaning. Short-term emissions to river water and long-term emisisons to ground water from slag compartment (from bottom ash) and residual material landfill (from solidified fly ashes and scrubber slugde). Waste-specific process energy demands for MSWI and net energy generation.

## Geography
Specific to the technology mix encountered in Switzerland in 2010. Well applicable to modern incineration practices in Europe, North America or Japan.

## Technology
average Swiss MSWI plants in 2010 (grate incinerators) with electrostatic precipitator for fly ash (ESP), wet flue gas scrubber and 25% SNCR , 42.77% SCR-high dust , 32.68% SCR-low dust -DeNOx facilities and 0% without Denox (weighted according to mass of burnt waste, representing Swiss average). Efficiency of iron scrap separation from slag : 58%. Efficiency of non-ferrous scrap separation from slag : 31%. Gross electric efficiency technology mix 15.84% and Gross thermal efficiency technology mix 28.51%

## Time period
Waste composition as given in literature reference, theoretical data or other source. Transfer coefficients for modern MSWI.

## Reference product
- Disposal, LCD module, to municipal waste incineration [CH]: 1 kg
  SWITZERLAND

## Inputs from technosphere
- Water, decarbonised, at plant [RER]: 0.31926 kg; lognormal SD95 2.3562
  Incinerator process water used in flue gas scrubber stage. uncertainty calculated from uncertainty in average water input, and the uncertainty of the waste composition of this waste
- Cement, unspecified, at plant [CH]: 0.0048692 kg; lognormal SD95 1.6894
  Cement required for solidification of landfilled residual material. Uncertainty calculated from uncertainty of the waste composition of this waste, of transfer coefficients in the incinerator and of the solidification recipe.
- Ammonia, liquid, at regional storehouse [CH]: 0.00019849 kg; lognormal SD95 7.5393
  Input to DeNOx stage (100% NH3). uncertainty calculated from uncertainty in average DeNOx input, uncertainty in the share of thermal NOx, uncertainty of nitrogen content in average municipal waste and the uncertainty in nitrogen content in *this* waste.
- Process-specific burdens, residual material landfill [CH]: 0.012173 kg; lognormal SD95 1.6298
  mass-specific expenditures required for landfilling of incineration residues. uncertainty is calculated from uncertainties in waste composition and transfer coefficients in incinerator
- Quicklime, milled, packed, at plant [CH]: 0.00073856 kg; lognormal SD95 4.5981
  auxilliary inputs for the flue gas treatment stage of the incinerator plant. uncertainty calculated from uncertainty in average CaO input, of transfer coefficients in the incinerator, and the uncertainty of the waste composition of this waste
- Chemicals organic, at plant [GLO]: 5.4533e-6 kg; lognormal SD95 8.307
  auxilliary inputs for the wastewater treatment stage of the incinerator plant. Proxy for (pure) Trisodium-trimercapto-s-triazine (CAS 17766-26-6), used as 15% diluted solution, aka TMT15. uncertainty calculated from uncertainty in average TMT15 input, of transfer coefficients in the incinerator, and the uncertainty of the waste composition of this waste
- Slag compartment [CH]: 1.7427e-9 p; lognormal SD95 1.2393
  landfill infrastructure required for landfilling of bottom ash. uncertainty is calculated from uncertainties in waste composition and transfer coefficients in incinerator
- Titanium dioxide, production mix, at plant [RER]: 1.2436e-5 kg; lognormal SD95 10.656
  Input to DeNOx stage (TiO2 catalyst carrier) uncertainty calculated from uncertainty in average DeNOx input, uncertainty in the share of thermal NOx, uncertainty of nitrogen content in average municipal waste and the uncertainty in nitrogen content in *this* waste.
- Hydrochloric acid, 30% in H2O, at plant [RER]: 1.3161e-5 kg; lognormal SD95 3.6506
  auxilliary inputs for the wastewater treatment stage of the incinerator plant. uncertainty calculated from uncertainty in average HCl input, of transfer coefficients in the incinerator, and the uncertainty of the waste composition of this waste
- Iron (III) chloride, 40% in H2O, at plant [CH]: 0.00016332 kg; lognormal SD95 2.3562
  auxilliary inputs for the wastewater treatment stage of the incinerator plant. uncertainty calculated from uncertainty in average FeCl3 input, of transfer coefficients in the incinerator, and the uncertainty of the waste composition of this waste
- Chromium oxide, flakes, at plant [RER]: 2.538e-7 kg; lognormal SD95 10.656
  Input to DeNOx stage. uncertainty calculated from uncertainty in average DeNOx input, uncertainty in the share of thermal NOx, uncertainty of nitrogen content in average municipal waste and the uncertainty in nitrogen content in *this* waste.
- Process-specific burdens, slag compartment [CH]: 0.98025 kg; lognormal SD95 1.2393
  mass-specific expenditures required for landfilling of bottom ash. uncertainty is calculated from uncertainties in waste composition and transfer coefficients in incinerator
- Sodium hydroxide, 50% in H2O, production mix, at plant [RER]: 0.00017662 kg; lognormal SD95 3.7153
  auxilliary inputs for the flue gas treatment stage of the incinerator plant. uncertainty calculated from uncertainty in average NaOH input, of transfer coefficients in the incinerator, and the uncertainty of the waste composition of this waste
- Disposal, cement, hydrated, 0% water, to residual material landfill [CH]: 0.012173 kg; lognormal SD95 1.6894
  Hydrated cement output for solidification of landfilled residual material. Uncertainty calculated from uncertainty of the waste composition of this waste and transfer coefficients in the incinerator and of the solidification recipe.
- Municipal waste incineration plant [CH]: 2.5e-10 p; lognormal SD95 1
  demands per kilogram waste. uncertainty is heeded in the module
- Natural gas, burned in industrial furnace 1MW [CH]: 0.037118 MJ; lognormal SD95 7.5393
  Input to DeNOx stage, to heat up flue gas in low-dust SCR. uncertainty calculated from uncertainty in average DeNOx input, uncertainty in the share of thermal NOx, uncertainty of nitrogen content in average municipal waste and the uncertainty in nitrogen content in *this* waste.
- Residual material landfill facility [CH]: 2.536e-11 p; lognormal SD95 1.6298
  landfill infrastructure required for landfilling of incineration residues. uncertainty is calculated from uncertainties in waste composition and transfer coefficients in incinerator
- Transport, freight, rail [RER]: 0.0018472 tkm; lognormal SD95 1.4645
  Transport services to transport incineration residues to landfills and to transport auxilliary inputs of the incinerator plant. uncertainty calculated from uncertainty in average auxiliary material input, the uncertainty of the waste composition of this waste and the uncertainty in generic transportation distances
- Chemicals inorganic, at plant [GLO]: 5.007e-5 kg; lognormal SD95 3.6506
  auxilliary inputs for the wastewater treatment stage of the incinerator plant. Proxy for Polyelectrolyte. uncertainty calculated from uncertainty in average Polyelectrolyte input, of transfer coefficients in the incinerator, and the uncertainty of the waste composition of this waste
- Transport, freight, lorry, 16t-32t gross weight, fleet average [CH]: 0.040631 tkm; lognormal SD95 1.2302
  (same comment as for Transport, freight, rail)

## Emissions to nature
- Aluminium [emissions to water, groundwater, long-term]: 0.00054441 kg; lognormal SD95 4.6735
  Long-term emissions from landfilling of incineration residues. uncertainty is calculated from uncertainties in waste composition and transfer coefficients in incinerator and landfills.
- Strontium [emissions to water, river]: 9.0473e-10 kg; lognormal SD95 19.87
  Emissions to water from waste composition and transfer coefficients in incinerator and landfills. uncertainty is calculated from uncertainties in waste composition and transfer coefficients in incinerator and landfills
- Bromine [emissions to water, groundwater, long-term]: 9.225e-6 kg; lognormal SD95 7.1723
  (same comment as for Aluminium)
- Chromium VI [emissions to water, groundwater, long-term]: 7.923e-6 kg; lognormal SD95 36.204
  (same comment as for Aluminium)
- Nitrate [emissions to water, river]: 1.6196e-5 kg; lognormal SD95 3.7502
  (same comment as for Strontium)
- Lead [emissions to water, groundwater, long-term]: 0.0021183 kg; lognormal SD95 44.584
  (same comment as for Aluminium)
- Selenium [emissions to air, high. pop.]: 4.0677e-10 kg; lognormal SD95 16.08
  Emission to air from waste composition and transfer coefficients. uncertainty is calculated from uncertainties in waste composition and transfer coefficients in incinerator
- Selenium [emissions to water, river]: 1.1518e-8 kg; lognormal SD95 12.311
  (same comment as for Strontium)
- Benzene, hexachloro- [emissions to air, high. pop.]: 9.8883e-11 kg; lognormal SD95 2.3724
  Incomplete combustion product emitted to air. uncertainty calculated from uncertainty in average operation emissions, and the uncertainty of the flue gas volume from this waste.
- Cobalt [emissions to air, high. pop.]: 9.3282e-10 kg; lognormal SD95 13.25
  (same comment as for Selenium)
- Cobalt [emissions to water, river]: 9.2927e-11 kg; lognormal SD95 16.046
  (same comment as for Strontium)
- Cadmium [emissions to air, high. pop.]: 5.3991e-9 kg; lognormal SD95 9.6721
  (same comment as for Selenium)
- Iron [emissions to water, river]: 1.2254e-7 kg; lognormal SD95 4.0471
  (same comment as for Strontium)
- Nickel [emissions to water, river]: 1.2799e-6 kg; lognormal SD95 8.4943
  (same comment as for Strontium)
- COD, Chemical Oxygen Demand [emissions to water, groundwater, long-term]: 0.00047585 kg; lognormal SD95 1.8862
  (same comment as for Aluminium)
- Potassium [emissions to water, groundwater, long-term]: 0.00075061 kg; lognormal SD95 3.2193
  (same comment as for Aluminium)
- Nitrate [emissions to water, groundwater, long-term]: 4.5696e-5 kg; lognormal SD95 4.9042
  (same comment as for Aluminium)
- Phenol, pentachloro- [emissions to air, high. pop.]: 2.0594e-11 kg; lognormal SD95 2.3724
  (same comment as for Benzene, hexachloro-)
- Titanium [emissions to air, high. pop.]: 6.463e-8 kg; lognormal SD95 7.5076
  (same comment as for Selenium)
- NMVOC, non-methane volatile organic compounds, unspecified origin [emissions to air, high. pop.]: 2.1522e-6 kg; lognormal SD95 2.3724
  (same comment as for Benzene, hexachloro-)
- Molybdenum [emissions to air, high. pop.]: 7.3792e-10 kg; lognormal SD95 13.177
  (same comment as for Selenium)
- Chromium [emissions to air, high. pop.]: 5.9917e-8 kg; lognormal SD95 6.25
  (same comment as for Selenium)
- Vanadium [emissions to air, high. pop.]: 2.7678e-10 kg; lognormal SD95 16.08
  (same comment as for Selenium)
- Boron [emissions to water, groundwater, long-term]: 6.977e-9 kg; lognormal SD95 13.872
  (same comment as for Aluminium)
- Copper [emissions to air, high. pop.]: 1.6659e-6 kg; lognormal SD95 2.9241
  (same comment as for Selenium)
- Manganese [emissions to water, groundwater, long-term]: 4.3828e-5 kg; lognormal SD95 16.839
  (same comment as for Aluminium)
- Chloride [emissions to water, river]: 0.0011819 kg; lognormal SD95 3.6018
  (same comment as for Strontium)
- Titanium [emissions to water, river]: 2.9045e-8 kg; lognormal SD95 5.621
  (same comment as for Strontium)
- Phosphate [emissions to water, groundwater, long-term]: 6.2122e-6 kg; lognormal SD95 95.536
  (same comment as for Aluminium)
- Silver [emissions to water, groundwater, long-term]: 1.9763e-5 kg; lognormal SD95 8.156
  (same comment as for Aluminium)
- Chromium VI [emissions to water, river]: 1.9248e-6 kg; lognormal SD95 6.6501
  (same comment as for Strontium)
- Arsenic [emissions to air, high. pop.]: 1.0222e-9 kg; lognormal SD95 15.054
  (same comment as for Selenium)
- Carbon monoxide, fossil [emissions to air, high. pop.]: 8.0389e-5 kg; lognormal SD95 7.908
  (same comment as for Benzene, hexachloro-)
- Nickel [emissions to air, high. pop.]: 2.393e-6 kg; lognormal SD95 4.6656
  (same comment as for Selenium)
- Dinitrogen monoxide [emissions to air, high. pop.]: 1.8949e-5 kg; lognormal SD95 10.664
  Nitrogen species emitted to air after DeNOx stage. uncertainty calculated from uncertainty in average N-emissions and uncertainty in the share of thermal NOx and the uncertainty in nitrogen content in *this* waste.
- Ammonia [emissions to air, high. pop.]: 2.3338e-7 kg; lognormal SD95 7.9916
  (same comment as for Dinitrogen monoxide)
- Boron [emissions to water, river]: 6.4283e-11 kg; lognormal SD95 18.538
  (same comment as for Strontium)
- Benzene [emissions to air, high. pop.]: 4.7291e-8 kg; lognormal SD95 2.3724
  (same comment as for Benzene, hexachloro-)
- Barium [emissions to air, high. pop.]: 3.1498e-8 kg; lognormal SD95 9.8596
  (same comment as for Selenium)
- Molybdenum [emissions to water, river]: 1.5317e-7 kg; lognormal SD95 8.7268
  (same comment as for Strontium)
- Methane, fossil [emissions to air, high. pop.]: 7.0936e-7 kg; lognormal SD95 2.3724
  (same comment as for Benzene, hexachloro-)
- Nitrogen oxides [emissions to air, high. pop.]: 7.3904e-5 kg; lognormal SD95 7.9916
  sum of fuel-Nox and thermal-NOx emitted to air after DeNOx stage. uncertainty calculated from uncertainty in average N-emissions and uncertainty in the share of thermal NOx and the uncertainty in nitrogen content in *this* waste.
- Benzene, pentachloro- [emissions to air, high. pop.]: 2.4985e-10 kg; lognormal SD95 2.3724
  (same comment as for Benzene, hexachloro-)
- Heat, waste [emissions to water, river]: 0.52519 MJ; lognormal SD95 1.0405
  Waste heat generated from heating value of this waste plus any electricity required to process it. uncertainty is calculated from uncertainties in waste composition and uncertainties in energy efficiency and the uncertainty in internal energy demand
- Titanium [emissions to water, groundwater, long-term]: 2.3288e-5 kg; lognormal SD95 8.0578
  (same comment as for Aluminium)
- COD, Chemical Oxygen Demand [emissions to water, river]: 7.4124e-5 kg; lognormal SD95 2.3358
  (same comment as for Strontium)
- Magnesium [emissions to water, groundwater, long-term]: 1.8107e-6 kg; lognormal SD95 11.031
  (same comment as for Aluminium)
- Phosphorus [emissions to air, high. pop.]: 4.7115e-8 kg; lognormal SD95 8.0089
  (same comment as for Selenium)
- Antimony [emissions to water, river]: 3.8734e-5 kg; lognormal SD95 7.0211
  (same comment as for Strontium)
- Potassium [emissions to water, river]: 0.00021019 kg; lognormal SD95 3.501
  (same comment as for Strontium)
- Vanadium [emissions to water, groundwater, long-term]: 6.0833e-9 kg; lognormal SD95 11.683
  (same comment as for Aluminium)
- Silicon [emissions to water, river]: 1.0876e-5 kg; lognormal SD95 8.3523
  (same comment as for Strontium)
- Dioxin, 2,3,7,8 Tetrachlorodibenzo-p- [emissions to air, high. pop.]: 9.4575e-14 kg; lognormal SD95 4.7448
  (same comment as for Benzene, hexachloro-)
- Mercury [emissions to water, groundwater, long-term]: 1.0255e-8 kg; lognormal SD95 38.358
  (same comment as for Aluminium)
- Zinc [emissions to water, groundwater, long-term]: 0.00078492 kg; lognormal SD95 26.169
  (same comment as for Aluminium)
- Silicon [emissions to water, groundwater, long-term]: 0.0025246 kg; lognormal SD95 118.84
  (same comment as for Aluminium)
- Tin [emissions to water, river]: 6.1229e-8 kg; lognormal SD95 9.2796
  (same comment as for Strontium)
- Sulfate [emissions to water, river]: 5.2037e-5 kg; lognormal SD95 3.9871
  (same comment as for Strontium)
- Lead [emissions to water, river]: 4.134e-7 kg; lognormal SD95 3.6261
  (same comment as for Strontium)
- Cobalt [emissions to water, groundwater, long-term]: 4.1781e-7 kg; lognormal SD95 12.23
  (same comment as for Aluminium)
- DOC, Dissolved Organic Carbon [emissions to water, river]: 3.237e-5 kg; lognormal SD95 2.3397
  (same comment as for Strontium)
- Chloride [emissions to water, groundwater, long-term]: 0.00033675 kg; lognormal SD95 4.3723
  (same comment as for Aluminium)
- Cadmium [emissions to water, groundwater, long-term]: 7.7294e-7 kg; lognormal SD95 178.15
  (same comment as for Aluminium)
- Bromine [emissions to water, river]: 8.6438e-5 kg; lognormal SD95 3.8663
  (same comment as for Strontium)
- Mercury [emissions to air, high. pop.]: 4.5654e-9 kg; lognormal SD95 14.746
  (same comment as for Selenium)
- Arsenic [emissions to water, river]: 9.0399e-8 kg; lognormal SD95 13.633
  (same comment as for Strontium)
- Particulates, > 2.5 um, and < 10um [emissions to air, high. pop.]: 2.8373e-8 kg; lognormal SD95 3.1632
  (same comment as for Benzene, hexachloro-)
- Arsenic [emissions to water, groundwater, long-term]: 3.9079e-8 kg; lognormal SD95 14.973
  (same comment as for Aluminium)
- Tin [emissions to water, groundwater, long-term]: 0.00095793 kg; lognormal SD95 10.278
  (same comment as for Aluminium)
- Sodium [emissions to water, river]: 0.00645 kg; lognormal SD95 2.909
  (same comment as for Strontium)
- Iron [emissions to air, high. pop.]: 1.0164e-8 kg; lognormal SD95 4.1209
  (same comment as for Selenium)
- Copper [emissions to water, river]: 2.392e-6 kg; lognormal SD95 3.4839
  (same comment as for Strontium)
- DOC, Dissolved Organic Carbon [emissions to water, groundwater, long-term]: 0.0001883 kg; lognormal SD95 1.8862
  (same comment as for Aluminium)
- Sulfur dioxide [emissions to air, high. pop.]: 1.0908e-6 kg; lognormal SD95 7.1729
  (same comment as for Selenium)
- Tin [emissions to air, high. pop.]: 1.4744e-9 kg; lognormal SD95 4.84
  (same comment as for Selenium)
- Aluminium [emissions to air, high. pop.]: 7.3443e-10 kg; lognormal SD95 5.6169
  (same comment as for Selenium)
- Aluminium [emissions to water, river]: 9.5764e-8 kg; lognormal SD95 7.3113
  (same comment as for Strontium)
- Potassium [emissions to air, high. pop.]: 4.7704e-6 kg; lognormal SD95 5.1529
  (same comment as for Selenium)
- Chromium [emissions to water, river]: 5.3279e-9 kg; lognormal SD95 6.3588
  (same comment as for Strontium)
- Cyanide [emissions to air, high. pop.]: 4.0711e-6 kg; lognormal SD95 10.664
  (same comment as for Dinitrogen monoxide)
- Fluoride [emissions to water, groundwater, long-term]: 1.0389e-5 kg; lognormal SD95 5.6548
  (same comment as for Aluminium)
- Magnesium [emissions to air, high. pop.]: 2.1566e-9 kg; lognormal SD95 11.56
  (same comment as for Selenium)
- Nickel [emissions to water, groundwater, long-term]: 0.0018285 kg; lognormal SD95 4.4329
  (same comment as for Aluminium)
- Beryllium [emissions to water, groundwater, long-term]: 7.4195e-9 kg; lognormal SD95 15.05
  (same comment as for Aluminium)
- Toluene [emissions to air, high. pop.]: 9.4582e-8 kg; lognormal SD95 2.3724
  (same comment as for Benzene, hexachloro-)
- Iron [emissions to water, groundwater, long-term]: 0.0012103 kg; lognormal SD95 6.7077
  (same comment as for Aluminium)
- Silicon [emissions to air, high. pop.]: 9.4552e-11 kg; lognormal SD95 2.4025
  (same comment as for Selenium)
- Zinc [emissions to water, river]: 2.3202e-7 kg; lognormal SD95 4.0454
  (same comment as for Strontium)
- TOC, Total Organic Carbon [emissions to water, groundwater, long-term]: 0.0001883 kg; lognormal SD95 1.8862
  (same comment as for Aluminium)
- Particulates, < 2.5 um [emissions to air, high. pop.]: 5.6461e-6 kg; lognormal SD95 4.7448
  (same comment as for Benzene, hexachloro-)
- Thallium [emissions to water, groundwater, long-term]: 3.7897e-9 kg; lognormal SD95 11.288
  (same comment as for Aluminium)
- Phosphate [emissions to water, river]: 2.6065e-8 kg; lognormal SD95 5.703
  (same comment as for Strontium)
- Magnesium [emissions to water, river]: 9.5401e-9 kg; lognormal SD95 12.005
  (same comment as for Strontium)
- Mercury [emissions to water, river]: 1.7487e-10 kg; lognormal SD95 9.7675
  (same comment as for Strontium)
- Sulfate [emissions to water, groundwater, long-term]: 0.00025405 kg; lognormal SD95 4.6152
  (same comment as for Aluminium)
- BOD5, Biological Oxygen Demand [emissions to water, river]: 7.3172e-5 kg; lognormal SD95 2.3645
  (same comment as for Strontium)
- Bromine [emissions to air, high. pop.]: 4.7808e-8 kg; lognormal SD95 7.3441
  (same comment as for Selenium)
- Thallium [emissions to air, high. pop.]: 6.4946e-12 kg; lognormal SD95 16.241
  (same comment as for Selenium)
- Thallium [emissions to water, river]: 3.9786e-12 kg; lognormal SD95 17.907
  (same comment as for Strontium)
- Vanadium [emissions to water, river]: 2.0836e-11 kg; lognormal SD95 15.101
  (same comment as for Strontium)
- Beryllium [emissions to water, river]: 5.0846e-12 kg; lognormal SD95 22.634
  (same comment as for Strontium)
- Sodium [emissions to water, groundwater, long-term]: 0.0464 kg; lognormal SD95 2.3528
  (same comment as for Aluminium)
- Hydrogen chloride [emissions to air, high. pop.]: 7.7544e-7 kg; lognormal SD95 4.8742
  (same comment as for Selenium)
- Calcium [emissions to water, groundwater, long-term]: 0.060315 kg; lognormal SD95 2.2679
  (same comment as for Aluminium)
- Hydrogen fluoride [emissions to air, high. pop.]: 7.8174e-8 kg; lognormal SD95 9.4363
  (same comment as for Selenium)
- Barium [emissions to water, groundwater, long-term]: 4.0415e-6 kg; lognormal SD95 24.219
  (same comment as for Aluminium)
- Sodium [emissions to air, high. pop.]: 2.2281e-8 kg; lognormal SD95 2.7889
  (same comment as for Selenium)
- Manganese [emissions to water, river]: 1.1059e-8 kg; lognormal SD95 6.4508
  (same comment as for Strontium)
- Calcium [emissions to water, river]: 0.00027362 kg; lognormal SD95 4.7514
  (same comment as for Strontium)
- Zinc [emissions to air, high. pop.]: 1.723e-6 kg; lognormal SD95 4.4521
  (same comment as for Selenium)
- Strontium [emissions to air, high. pop.]: 1.4369e-10 kg; lognormal SD95 12.11
  (same comment as for Selenium)
- Antimony [emissions to air, high. pop.]: 9.0024e-11 kg; lognormal SD95 7.5076
  (same comment as for Selenium)
- Cadmium [emissions to water, river]: 1.0152e-9 kg; lognormal SD95 7.7635
  (same comment as for Strontium)
- Heat, waste [emissions to air, high. pop.]: 2.2326 MJ; lognormal SD95 1.0405
  (same comment as for Heat, waste)
- Carbon dioxide, fossil [emissions to air, high. pop.]: 0.23081 kg; lognormal SD95 2.2477
  (same comment as for Selenium)
- Molybdenum [emissions to water, groundwater, long-term]: 4.0691e-7 kg; lognormal SD95 12.974
  (same comment as for Aluminium)
- Lead [emissions to air, high. pop.]: 3.5555e-7 kg; lognormal SD95 4.1616
  (same comment as for Selenium)
- Benzo(a)pyrene [emissions to air, high. pop.]: 1.0524e-12 kg; lognormal SD95 4.7448
  (same comment as for Benzene, hexachloro-)
- Manganese [emissions to air, high. pop.]: 1.3568e-8 kg; lognormal SD95 7.6729
  (same comment as for Selenium)
- BOD5, Biological Oxygen Demand [emissions to water, groundwater, long-term]: 0.00015565 kg; lognormal SD95 1.8862
  (same comment as for Aluminium)
- Antimony [emissions to water, groundwater, long-term]: 7.1467e-5 kg; lognormal SD95 6.7783
  (same comment as for Aluminium)
- TOC, Total Organic Carbon [emissions to water, river]: 3.237e-5 kg; lognormal SD95 2.3397
  (same comment as for Strontium)
- Strontium [emissions to water, groundwater, long-term]: 1.4351e-6 kg; lognormal SD95 11.79
  (same comment as for Aluminium)
- Barium [emissions to water, river]: 1.0801e-9 kg; lognormal SD95 12.041
  (same comment as for Strontium)
- Silver [emissions to water, river]: 1.1277e-7 kg; lognormal SD95 8.2009
  (same comment as for Strontium)
- Copper [emissions to water, groundwater, long-term]: 0.017259 kg; lognormal SD95 2.7167
  (same comment as for Aluminium)
- Calcium [emissions to air, high. pop.]: 9.3693e-6 kg; lognormal SD95 2.4336
  (same comment as for Selenium)
- Fluoride [emissions to water, river]: 8.8598e-7 kg; lognormal SD95 6.0352
  (same comment as for Strontium)
- Selenium [emissions to water, groundwater, long-term]: 2.2146e-8 kg; lognormal SD95 11.298
  (same comment as for Aluminium)

## Sampling procedure
fully waste-specific calculation based on literature data for average MSWI operation performance

## Extrapolations
Typical elemental transfer coefficients from current studies for modern MSWI, completed with data from coal power plants and estimates, adapted for inert/burnable waste.

## Uncertainty adjustments
uncertainty of waste input composition data derived from generic formula GSD(c) = N*ln(c)+1

## Sources
- Doka G., 2013, 2013 - Updates LCI waste treatment services - Doka, -, Doka LCA, Zuerich, CH
Doka G. (2013) Updates to Life Cycle Inventories of Waste Treatment Services - part II: waste incineration. Doka LCA. Zurich.
Type: Separate publication
Source: Report to document the 2013 changes to the MSWI incinerator model and datasets (URL: http://www.doka.ch/ecoinventMSWIupdateLCI2013.pdf). To be read with the ecoinvent Nr 13 report (Doka 2009, Life Cycle Inventories of Waste Treatment Services) for ecoinvent v2.2.
First author: Doka G.
Year: 2013
Place of publication: Zurich
Publisher: Doka LCA
Original title: Updates to Life Cycle Inventories of Waste Treatment Services - part II: waste incineration

## Validation
Proof reading validation: Passed.; Other validation: none;
