# Transformers

Dataset: EcoSpold 1, unit process
Functional unit: 1 p
Category: transport systems / road\Transformation\Infrastructure
Geography: RER
Time period: 2020-01 to 2020-12
Generated by: Romain Sacchi
accessRestrictedTo: 0
copyright: False

## General comment
All sorts fo transorfmers needed per km: 100 kVA, 50 kVA, 30 kVA, 16 kVA and 5 kVA. Original source: https://doi.org/10.3390/su10041148.

## Time period
Base technology year of 2020

## Reference product
- Transformers [RER]: 1 p

## Inputs from technosphere
- Transformer, high voltage use, at plant [GLO]: 143 kg; lognormal SD95 1.25585
  Uncertainty from pedigree matrix: (4, 4, 3, 2, 1, 2)
- Transport, freight, rail [RER]: 28.6 tkm; lognormal SD95 1.25585
  Uncertainty from pedigree matrix: (4, 4, 3, 2, 1, 2)
- Transport, freight, lorry, 16t-32t gross weight, fleet average [RER]: 14.3 tkm; lognormal SD95 1.25585
  Uncertainty from pedigree matrix: (4, 4, 3, 2, 1, 2)

## Sources
- Sacchi R., Bauer C., 2023, 2023 - LCI on-road vehicles - Sacchi, PSI, Villigen, CH
doi: 10.5281/ZENODO.5156043
