# Heat, natural gas, allocation exergy, at PEM fuel cell 2kWe, future

Dataset: EcoSpold 1, unit process
Functional unit: 1 MJ
Category: heat / natural gas\cogeneration
Geography: CH
Time period: 2000-01 to 2005-12
Generated by: Alex Primas
accessRestrictedTo: 0
copyright: true

## General comment
The multioutput-process 'natural gas, burned in PEM fuel cell 2kWe delivers the coproducts 'heat, natural gas, allocation exergy, at PEM fuel cell 2kWe' and 'electricity, natural gas, allocation exergy, at PEM fuel cell 2kWe'. The exergy allocation is the allocation scheme suggested to be used within the ecoinvent database (e.g. in electricity mixes).;

## Included processes
The module includes fuel input, infrastructure and emissions to air.

## Geography
Natural gas input modelled for Switzerland. Process applicable in central European conditions.

## Technology
polymer electrolyte membrane (PEM) fuel cell for stationary cogeneration. Performance, stack lifetime and catalyst use according to expected future values for a serial product. Operation with connection to low pressure gas network. Electrical efficiency 32%, total efficiency 87%.

## Reference product
- Heat, natural gas, allocation exergy, at PEM fuel cell 2kWe, future [CH]: 1 MJ
  SWITZERLAND

## Inputs from technosphere
- Storage 650 l Mini CHP plant [CH]: 1.0614e-6 p; lognormal SD95 3.0201
  (2,3,2,1,1,4); uncertainty of life time
- PEM fuel cell 2kWe, future [CH]: 2.0654e-7 p; lognormal SD95 3.0201
  (2,3,2,1,1,4); uncertainty of life time
- Natural gas, low pressure, at consumer [CH]: 0.24909 MJ; lognormal SD95 1.05
  (nA,nA,nA,nA,nA,nA); input
- Maintenance PEM fuel cell 2kWe [CH]: 2.8917e-6 p; lognormal SD95 1.1397
  (2,3,2,1,1,4); uncertainty of maintenance cycle

## Emissions to nature
- NMVOC, non-methane volatile organic compounds, unspecified origin [emissions to air, high. pop.]: 7.4727e-8 kg; lognormal SD95 1.5813
  (4,3,2,1,1,4); estimate based on different references
- Methane, fossil [emissions to air, high. pop.]: 9.9636e-7 kg; lognormal SD95 1.6224
  (4,3,2,1,1,5); estimate based on few references
- Carbon monoxide, fossil [emissions to air, high. pop.]: 4.2345e-7 kg; lognormal SD95 5.0229
  (2,3,2,1,1,4); estimate based on different references
- Heat, waste [emissions to air, high. pop.]: 0.19454 MJ; lognormal SD95 1.1073
  (2,3,2,1,1,3); uncertainty of heating value and electric efficiency
- Nitrogen oxides [emissions to air, high. pop.]: 3.2382e-7 kg; lognormal SD95 1.5269
  (2,3,2,1,1,4); estimate based on different references
- Sulfur dioxide [emissions to air, high. pop.]: 1.37e-7 kg; lognormal SD95 1.0714
  (2,nA,nA,nA,1,nA); composition of natural gas
- Carbon dioxide, fossil [emissions to air, high. pop.]: 0.013949 kg; lognormal SD95 1.0714
  (2,nA,nA,nA,1,nA); composition of natural gas
- Particulates, < 2.5 um [emissions to air, high. pop.]: 4.9818e-11 kg; lognormal SD95 3.1615
  (4,4,3,2,3,5); estimate based on one references

## Sampling procedure
Literature data and manufacturer information

## Sources
- Primas A., 2007, 2007 - LCI new CHP systems - Primas, Final report ecoinvent Data v2.0, 20, Swiss Centre for LCI, B&H AG, Duebendorf and Zuerich, CH
Primas A., 0 (2007) Life Cycle Inventories of new CHP systems. Final report ecoinvent Data v2.0. Editors: 0. Volume: 20. Swiss Centre for LCI, B&H AG. Duebendorf and Zurich, CH.
Type: Measurement on site
Source: CD-ROM
First author: Primas A.
Other authors: 0
Year: 2007
Name of editors: 0
Title of anthology: Final report ecoinvent Data v2.0
Place of publication: Duebendorf and Zurich, CH
Publisher: Swiss Centre for LCI, B&H AG
Volume No: 20

## Validation
Proof reading validation: passed; Other validation: none;
