# Treatment, sewage, to wastewater treatment, class 1

Dataset: EcoSpold 1, unit process
Functional unit: 1 m3
Category: wastewater treatment / unspecified
Geography: CH
Time period: 2000-01 to 2000-12
Generated by: Gabor Doka
accessRestrictedTo: 0
copyright: true

## General comment
Wastewater purified in a large municipal wastewater treatment plant (capacity class 1), with an average capacity size of 233000 per-captia-equivalents PCE. \nWastewater contains (in kg/m3): COD: 0.1556 (GSD=122.5%);

## Included processes
Infrastructure materials for municipal wastewater treatment plant, transports, dismantling. Land use burdens.

## Technology
Three stage wastewater treatment (mechanical, biological, chemical) including sludge digestion (fermentation) according to the average technology in Switzerland

## Reference product
- Treatment, sewage, to wastewater treatment, class 1 [CH]: 1 m3
  SWITZERLAND

## Inputs from technosphere
- Process-specific burdens, municipal waste incineration [CH]: 0.15169 kg; lognormal SD95 1.1445
  burden from sludge incineration. Uncertainty calculated from wastewater composition and treatment model
- Iron (III) chloride, 40% in H2O, at plant [CH]: 0.015948 kg; lognormal SD95 1.6171
  direct wastewater treatment plant burden plus burden from sludge incineration. Uncertainty calculated from wastewater composition and treatment model
- Cement, unspecified, at plant [CH]: 0.0017323 kg; lognormal SD95 1.5179
  (same comment as for Process-specific burdens, municipal waste incineration)
- Hydrochloric acid, 30% in H2O, at plant [RER]: 4.621e-7 kg; lognormal SD95 1.4895
  (same comment as for Process-specific burdens, municipal waste incineration)
- Transport, freight, lorry, 16t-32t gross weight, fleet average [CH]: 0.010479 tkm; lognormal SD95 1.0889
  (same comment as for Iron (III) chloride, 40% in H2O, at plant)
- Disposal, plastics, mixture, 15.3% water, to municipal incineration [CH]: 0.0155 kg; lognormal SD95 1.07
  direct wastewater treatment plant burden. Uncertainty calculated from wastewater composition and treatment model
- Ammonia, liquid, at regional storehouse [CH]: 8.4292e-5 kg; lognormal SD95 2.308
  (same comment as for Process-specific burdens, municipal waste incineration)
- Chemicals organic, at plant [GLO]: 6.1468e-7 kg; lognormal SD95 3.488
  (same comment as for Process-specific burdens, municipal waste incineration)
- Natural gas, burned in industrial furnace 1MW [CH]: 0.0082204 MJ; lognormal SD95 2.308
  (same comment as for Process-specific burdens, municipal waste incineration)
- Aluminium sulphate, powder, at plant [RER]: 0.0031512 kg; lognormal SD95 1.6175
  (same comment as for Disposal, plastics, mixture, 15.3% water, to municipal incineration)
- Iron sulphate, at plant [RER]: 0.01166 kg; lognormal SD95 1.6175
  (same comment as for Disposal, plastics, mixture, 15.3% water, to municipal incineration)
- Process-specific burdens, residual material landfill [CH]: 0.0043308 kg; lognormal SD95 1.4495
  (same comment as for Process-specific burdens, municipal waste incineration)
- Slurry spreading, by vacuum tanker [CH]: 0.00023908 m3; lognormal SD95 1.1234
  burden from sludge spreading. Uncertainty calculated from wastewater composition and treatment model
- Process-specific burdens, slag compartment [CH]: 0.027623 kg; lognormal SD95 1.4438
  (same comment as for Process-specific burdens, municipal waste incineration)
- Wastewater treatment plant, class 1 [CH]: 6.0643e-10 p; lognormal SD95 1
  uncertainty heeded in exchanges of the module
- Chromium oxide, flakes, at plant [RER]: 4.9242e-8 kg; lognormal SD95 4.1018
  (same comment as for Process-specific burdens, municipal waste incineration)
- Sodium hydroxide, 50% in H2O, production mix, at plant [RER]: 0.00041192 kg; lognormal SD95 1.5294
  (same comment as for Process-specific burdens, municipal waste incineration)
- Titanium dioxide, production mix, at plant [RER]: 2.4129e-6 kg; lognormal SD95 4.1018
  (same comment as for Process-specific burdens, municipal waste incineration)
- Sewer grid, class 1 [CH]: 1.2376e-7 km; lognormal SD95 1
  uncertainty heeded in exchanges of the module
- Quicklime, milled, packed, at plant [CH]: 1.4666e-6 kg; lognormal SD95 1.5129
  (same comment as for Process-specific burdens, municipal waste incineration)
- Heat from waste, at municipal waste incineration plant [CH]: 0.12722 MJ; lognormal SD95 1.1544
  (same comment as for Process-specific burdens, municipal waste incineration)
- Chemicals inorganic, at plant [GLO]: 7.7017e-7 kg; lognormal SD95 1.4895
  (same comment as for Process-specific burdens, municipal waste incineration)
- Electricity from waste, at municipal waste incineration plant [CH]: 0.021808 kWh; lognormal SD95 3.8059
  (same comment as for Process-specific burdens, municipal waste incineration)
- Electricity, low voltage, at grid [CH]: 0.20571 kWh; lognormal SD95 1.2895
  (same comment as for Disposal, plastics, mixture, 15.3% water, to municipal incineration)
- Disposal, cement, hydrated, 0% water, to residual material landfill [CH]: 0.0043308 kg; lognormal SD95 1.5179
  (same comment as for Process-specific burdens, municipal waste incineration)
- Residual material landfill facility [CH]: 9.0224e-12 p; lognormal SD95 1.4495
  (same comment as for Process-specific burdens, municipal waste incineration)
- Disposal, paper, 11.2% water, to municipal incineration [CH]: 0.0155 kg; lognormal SD95 1.07
  (same comment as for Disposal, plastics, mixture, 15.3% water, to municipal incineration)
- Slag compartment [CH]: 4.9107e-11 p; lognormal SD95 1.4438
  (same comment as for Process-specific burdens, municipal waste incineration)
- Municipal waste incineration plant [CH]: 3.7921e-11 p; lognormal SD95 1.1445
  (same comment as for Process-specific burdens, municipal waste incineration)
- Transport, freight, rail [RER]: 0.019664 tkm; lognormal SD95 1.3455
  (same comment as for Iron (III) chloride, 40% in H2O, at plant)

## Emissions to nature
- BOD5, Biological Oxygen Demand [emissions to water, groundwater, long-term]: 0.00010013 kg; lognormal SD95 1.7106
  emission from sludge incineration. Uncertainty calculated from wastewater composition and treatment model
- Silicon [emissions to water, river]: 0.00018795 kg; lognormal SD95 4.2848
  sewer overload discharge plus direct wastewater treatment plant emission plus emission from sludge incineration. Uncertainty calculated from wastewater composition and treatment model
- TOC, Total Organic Carbon [emissions to water, groundwater, long-term]: 0.00012113 kg; lognormal SD95 1.7106
  (same comment as for BOD5, Biological Oxygen Demand)
- Manganese [emissions to soil, agricultural]: 7.3771e-6 kg; lognormal SD95 5.1617
  emission from sludge spreading. Uncertainty calculated from wastewater composition and treatment model
- Cadmium [emissions to air, high. pop.]: 5.5219e-12 kg; lognormal SD95 5.3086
  direct digester gas emission plus emission from sludge incineration. Uncertainty calculated from wastewater composition and treatment model
- Mercury [emissions to water, groundwater, long-term]: 5.1586e-9 kg; lognormal SD95 30.74
  (same comment as for BOD5, Biological Oxygen Demand)
- Copper [emissions to water, groundwater, long-term]: 1.6081e-5 kg; lognormal SD95 5.2393
  (same comment as for BOD5, Biological Oxygen Demand)
- Silicon [emissions to air, high. pop.]: 4.9081e-6 kg; lognormal SD95 5.2508
  (same comment as for Cadmium)
- Carbon [emissions to soil, agricultural]: 0.0048869 kg; lognormal SD95 1.6715
  (same comment as for Manganese)
- Cadmium [emissions to water, groundwater, long-term]: 9.9486e-10 kg; lognormal SD95 188.14
  (same comment as for BOD5, Biological Oxygen Demand)
- Lead [emissions to water, groundwater, long-term]: 3.9268e-7 kg; lognormal SD95 189.46
  (same comment as for BOD5, Biological Oxygen Demand)
- Tin [emissions to water, river]: 1.4223e-6 kg; lognormal SD95 4.8281
  (same comment as for Silicon)
- Sulfate [emissions to water, river]: 0.14497 kg; lognormal SD95 1.4554
  (same comment as for Silicon)
- Calcium [emissions to water, river]: 0.04586 kg; lognormal SD95 4.8938
  (same comment as for Silicon)
- Magnesium [emissions to air, high. pop.]: 5.5305e-7 kg; lognormal SD95 5.2339
  (same comment as for Cadmium)
- Cobalt [emissions to air, high. pop.]: 1.8147e-14 kg; lognormal SD95 5.7971
  (same comment as for Cadmium)
- Tin [emissions to air, high. pop.]: 1.8824e-9 kg; lognormal SD95 5.2652
  (same comment as for Cadmium)
- Zinc [emissions to air, high. pop.]: 8.8543e-10 kg; lognormal SD95 5.4308
  (same comment as for Cadmium)
- Magnesium [emissions to water, groundwater, long-term]: 0.00037076 kg; lognormal SD95 5.1304
  (same comment as for BOD5, Biological Oxygen Demand)
- Iron [emissions to soil, agricultural]: 0.0037505 kg; lognormal SD95 2.0273
  (same comment as for Manganese)
- Copper [emissions to water, river]: 9.7127e-6 kg; lognormal SD95 4.7443
  (same comment as for Silicon)
- Arsenic [emissions to air, high. pop.]: 2.5337e-10 kg; lognormal SD95 5.2875
  (same comment as for Cadmium)
- Calcium [emissions to water, groundwater, long-term]: 0.0031132 kg; lognormal SD95 5.1427
  (same comment as for BOD5, Biological Oxygen Demand)
- Chloride [emissions to water, river]: 0.040484 kg; lognormal SD95 3.7877
  (same comment as for Silicon)
- Zinc [emissions to water, groundwater, long-term]: 8.403e-7 kg; lognormal SD95 107.34
  (same comment as for BOD5, Biological Oxygen Demand)
- Heat, waste [emissions to air, high. pop.]: 1.3039 MJ; lognormal SD95 1.2928
  direct wastewater treatment plant emission plus emission from sludge incineration. Uncertainty calculated from wastewater composition and treatment model
- Zinc [emissions to soil, agricultural]: 2.1352e-5 kg; lognormal SD95 5.1589
  (same comment as for Manganese)
- Cyanide [emissions to air, high. pop.]: 1.5037e-6 kg; lognormal SD95 2.4314
  (same comment as for BOD5, Biological Oxygen Demand)
- Phosphate [emissions to water, river]: 0.0026903 kg; lognormal SD95 1.4896
  sewer overload discharge plus direct wastewater treatment plant emission plus emission from sludge incineration plus emission from sludge spreading. Uncertainty calculated from wastewater composition and treatment model
- TOC, Total Organic Carbon [emissions to water, river]: 0.0072994 kg; lognormal SD95 1.4594
  (same comment as for Silicon)
- Silicon [emissions to water, groundwater, long-term]: 0.00018307 kg; lognormal SD95 105.02
  (same comment as for BOD5, Biological Oxygen Demand)
- Ammonium, ion [emissions to water, river]: 0.011027 kg; lognormal SD95 1.342
  direct wastewater treatment plant emission. Uncertainty calculated from wastewater composition and treatment model
- Nitrate [emissions to water, river]: 0.048308 kg; lognormal SD95 1.3167
  (same comment as for Silicon)
- Arsenic [emissions to soil, agricultural]: 5.4891e-8 kg; lognormal SD95 5.1518
  (same comment as for Manganese)
- COD, Chemical Oxygen Demand [emissions to water, river]: 0.030152 kg; lognormal SD95 1.4737
  (same comment as for Silicon)
- Aluminium [emissions to soil, agricultural]: 0.00041634 kg; lognormal SD95 3.6375
  (same comment as for Manganese)
- Cobalt [emissions to soil, agricultural]: 2.2517e-7 kg; lognormal SD95 5.1516
  (same comment as for Manganese)
- Magnesium [emissions to water, river]: 0.0051486 kg; lognormal SD95 4.8939
  (same comment as for Silicon)
- Mercury [emissions to water, river]: 6.2894e-8 kg; lognormal SD95 4.682
  (same comment as for Silicon)
- Chromium [emissions to water, river]: 1.3774e-8 kg; lognormal SD95 5.219
  (same comment as for BOD5, Biological Oxygen Demand)
- Carbon dioxide, biogenic [emissions to air, high. pop.]: 0.19905 kg; lognormal SD95 1.34
  direct wastewater treatment plant emission plus direct digester gas emission plus emission from sludge incineration. Uncertainty calculated from wastewater composition and treatment model
- Cobalt [emissions to water, river]: 8.211e-7 kg; lognormal SD95 4.8394
  (same comment as for Silicon)
- Lead [emissions to water, river]: 9.4875e-7 kg; lognormal SD95 4.4902
  (same comment as for Silicon)
- Cobalt [emissions to water, groundwater, long-term]: 5.0042e-7 kg; lognormal SD95 5.1433
  (same comment as for BOD5, Biological Oxygen Demand)
- Aluminium [emissions to water, river]: 6.2333e-5 kg; lognormal SD95 4.1632
  (same comment as for Silicon)
- Calcium [emissions to air, high. pop.]: 5.9636e-6 kg; lognormal SD95 5.2339
  (same comment as for Cadmium)
- Arsenic [emissions to water, groundwater, long-term]: 7.6517e-8 kg; lognormal SD95 5.131
  (same comment as for BOD5, Biological Oxygen Demand)
- Aluminium [emissions to air, high. pop.]: 1.6509e-6 kg; lognormal SD95 3.7148
  (same comment as for Cadmium)
- Copper [emissions to air, high. pop.]: 1.4685e-10 kg; lognormal SD95 5.4786
  (same comment as for Cadmium)
- Sulfate [emissions to water, groundwater, long-term]: 0.0027689 kg; lognormal SD95 1.6574
  (same comment as for BOD5, Biological Oxygen Demand)
- Silicon [emissions to soil, agricultural]: 0.00083056 kg; lognormal SD95 5.1784
  (same comment as for Manganese)
- Iron [emissions to water, groundwater, long-term]: 0.0044593 kg; lognormal SD95 7.0583
  (same comment as for BOD5, Biological Oxygen Demand)
- Molybdenum [emissions to air, high. pop.]: 6.7655e-10 kg; lognormal SD95 5.2379
  (same comment as for Cadmium)
- Molybdenum [emissions to soil, agricultural]: 1.3327e-7 kg; lognormal SD95 5.1516
  (same comment as for Manganese)
- Zinc [emissions to water, river]: 3.3811e-5 kg; lognormal SD95 4.7744
  (same comment as for Silicon)
- Copper [emissions to soil, agricultural]: 7.8374e-6 kg; lognormal SD95 5.1608
  (same comment as for Manganese)
- Molybdenum [emissions to water, river]: 5.4368e-7 kg; lognormal SD95 4.2929
  (same comment as for Silicon)
- Nitrogen oxides [emissions to air, high. pop.]: 0.00070765 kg; lognormal SD95 1.5081
  (same comment as for Cadmium)
- Methane, biogenic [emissions to air, high. pop.]: 0.00050249 kg; lognormal SD95 1.8725
  (same comment as for Cadmium)
- Nickel [emissions to air, high. pop.]: 8.0297e-14 kg; lognormal SD95 5.7629
  (same comment as for Cadmium)
- DOC, Dissolved Organic Carbon [emissions to water, river]: 0.0075379 kg; lognormal SD95 1.458
  (same comment as for Silicon)
- Lead [emissions to air, high. pop.]: 2.0486e-10 kg; lognormal SD95 5.3863
  (same comment as for Cadmium)
- Dinitrogen monoxide [emissions to air, high. pop.]: 0.00010014 kg; lognormal SD95 1.401
  direct wastewater treatment plant emission plus direct digester gas emission plus emission from sludge incineration plus emission from sludge spreading. Uncertainty calculated from wastewater composition and treatment model
- COD, Chemical Oxygen Demand [emissions to water, groundwater, long-term]: 0.00030611 kg; lognormal SD95 1.7106
  (same comment as for BOD5, Biological Oxygen Demand)
- Tin [emissions to soil, agricultural]: 5.5894e-7 kg; lognormal SD95 5.165
  (same comment as for Manganese)
- Fluoride [emissions to water, river]: 3.2769e-5 kg; lognormal SD95 4.9019
  (same comment as for Silicon)
- Cadmium [emissions to water, river]: 1.4246e-7 kg; lognormal SD95 4.8385
  (same comment as for Silicon)
- Chromium VI [emissions to water, river]: 6.3486e-6 kg; lognormal SD95 4.7057
  (same comment as for Silicon)
- Phosphate [emissions to water, groundwater]: 1.0707e-5 kg; lognormal SD95 1.8108
  (same comment as for Manganese)
- Carbon monoxide, biogenic [emissions to air, high. pop.]: 0.00017404 kg; lognormal SD95 1.9678
  (same comment as for Cadmium)
- BOD5, Biological Oxygen Demand [emissions to water, river]: 0.009823 kg; lognormal SD95 1.4543
  (same comment as for Silicon)
- Manganese [emissions to air, high. pop.]: 1.0196e-13 kg; lognormal SD95 5.9353
  (same comment as for Cadmium)
- Tin [emissions to water, groundwater, long-term]: 7.1319e-7 kg; lognormal SD95 9.1237
  (same comment as for BOD5, Biological Oxygen Demand)
- Chromium [emissions to soil, agricultural]: 1.7026e-6 kg; lognormal SD95 5.1516
  (same comment as for Manganese)
- Manganese [emissions to water, river]: 2.6899e-5 kg; lognormal SD95 4.8496
  (same comment as for Silicon)
- Nitrogen [emissions to water, river]: 0.00049 kg; lognormal SD95 1.5053
  (same comment as for Ammonium, ion)
- Phosphorus [emissions to air, high. pop.]: 1.5559e-6 kg; lognormal SD95 1.5968
  (same comment as for Cadmium)
- Cadmium [emissions to soil, agricultural]: 3.9061e-8 kg; lognormal SD95 5.1516
  (same comment as for Manganese)
- Mercury [emissions to air, high. pop.]: 3.3733e-13 kg; lognormal SD95 5.3046
  (same comment as for Cadmium)
- Nickel [emissions to water, river]: 3.9968e-6 kg; lognormal SD95 4.8547
  (same comment as for Silicon)
- Nickel [emissions to water, groundwater, long-term]: 1.7419e-6 kg; lognormal SD95 5.1297
  (same comment as for BOD5, Biological Oxygen Demand)
- Lead [emissions to soil, agricultural]: 2.1713e-6 kg; lognormal SD95 5.1664
  (same comment as for Manganese)
- Magnesium [emissions to soil, agricultural]: 0.00015823 kg; lognormal SD95 5.1476
  (same comment as for Manganese)
- Potassium [emissions to water, river]: 0.0003989 kg; lognormal SD95 4.9019
  (same comment as for Silicon)
- Aluminium [emissions to water, groundwater, long-term]: 0.00078208 kg; lognormal SD95 3.6799
  (same comment as for BOD5, Biological Oxygen Demand)
- Iron [emissions to water, river]: 0.0036028 kg; lognormal SD95 4.8558
  (same comment as for Silicon)
- Molybdenum [emissions to water, groundwater, long-term]: 2.7982e-7 kg; lognormal SD95 5.131
  (same comment as for BOD5, Biological Oxygen Demand)
- Nitrate [emissions to water, groundwater, long-term]: 6.0021e-5 kg; lognormal SD95 1.5095
  (same comment as for BOD5, Biological Oxygen Demand)
- Phosphate [emissions to water, groundwater, long-term]: 0.00018223 kg; lognormal SD95 60.603
  (same comment as for BOD5, Biological Oxygen Demand)
- Nitrite [emissions to water, river]: 0.000644 kg; lognormal SD95 1.5041
  (same comment as for Ammonium, ion)
- Arsenic [emissions to water, river]: 7.6834e-7 kg; lognormal SD95 4.4446
  (same comment as for Silicon)
- Sulfur [emissions to soil, agricultural]: 0.00043493 kg; lognormal SD95 1.6768
  (same comment as for Manganese)
- Sodium [emissions to water, river]: 0.002186 kg; lognormal SD95 4.9019
  (same comment as for Silicon)
- Nickel [emissions to soil, agricultural]: 7.3297e-7 kg; lognormal SD95 5.148
  (same comment as for Manganese)
- Sulfur dioxide [emissions to air, high. pop.]: 0.00088683 kg; lognormal SD95 1.6642
  (same comment as for Cadmium)
- Heat, waste [emissions to water, river]: 1.1906 MJ; lognormal SD95 1.3796
  (same comment as for Heat, waste)
- Ammonia [emissions to air, high. pop.]: 0.00028033 kg; lognormal SD95 2.5075
  direct digester gas emission plus emission from sludge incineration plus emission from sludge spreading. Uncertainty calculated from wastewater composition and treatment model
- Chromium VI [emissions to water, groundwater, long-term]: 4.575e-7 kg; lognormal SD95 7.7697
  (same comment as for BOD5, Biological Oxygen Demand)
- Chromium [emissions to air, high. pop.]: 3.1955e-13 kg; lognormal SD95 5.7366
  (same comment as for Cadmium)
- NMVOC, non-methane volatile organic compounds, unspecified origin [emissions to air, high. pop.]: 2.2813e-6 kg; lognormal SD95 2.5254
  direct digester gas emission. Uncertainty calculated from wastewater composition and treatment model
- Calcium [emissions to soil, agricultural]: 0.0014094 kg; lognormal SD95 5.1476
  (same comment as for Manganese)
- Mercury [emissions to soil, agricultural]: 3.9061e-8 kg; lognormal SD95 5.1589
  (same comment as for Manganese)
- DOC, Dissolved Organic Carbon [emissions to water, groundwater, long-term]: 0.00012113 kg; lognormal SD95 1.7106
  (same comment as for BOD5, Biological Oxygen Demand)
- Manganese [emissions to water, groundwater, long-term]: 1.6125e-5 kg; lognormal SD95 6.1681
  (same comment as for BOD5, Biological Oxygen Demand)
- Iron [emissions to air, high. pop.]: 3.1782e-7 kg; lognormal SD95 2.249
  (same comment as for Cadmium)

## Sources
- Doka G., 2009, 2009 - LCI waste treatment services - Doka, Final report ecoinvent data v2.1, 13, Swiss Centre for LCI, Doka LCA, Duebendorf and St. Gallen, CH
Doka G. (2008) Life Cycle Inventories of Waste Treatment Services. Final report ecoinvent data v2.1. Volume: 13. Issue: 0. Swiss Centre for LCI, Empa - TSL. Dübendorf, CH.
Type: Measurement on site
Source: CD-ROM
First author: Doka G.
Year: 2008
Title of anthology: Final report ecoinvent data v2.1
Place of publication: Dübendorf, CH
Publisher: Swiss Centre for LCI, Empa - TSL
Volume No: 13
Issue No: 0

## Validation
Proof reading validation: passed.; Other validation: none;
