# Disposal, ash slurry solids and bark chips, to sanitary landfill

Dataset: EcoSpold 1, unit process
Functional unit: 1 kg
Category: landfill / sanitary landfill
Geography: CH
Time period: 1998-01 to 1998-12
Generated by: Gabor Doka
accessRestrictedTo: 0
copyright: true

## General comment
Inventoried waste contains . waste composition (wet, in ppm): H2O n.a.; O 363500; H n.a.; C 12000; S 9200; N n.a.; P 83654; B n.a.; Cl n.a.; Br n.a.; F n.a.; I n.a.; Ag n.a.; As 6.7; Ba n.a.; Cd 0.86775; Co 1.8; Cr 18.969; Cu 833.59; Hg -0.030194; Mn 20000; Mo 3.7; Ni 4.7161; Pb 12.651; Sb n.a.; Se n.a.; Sn n.a.; V 39.5; Zn 2921.3; Be n.a.; Sc n.a.; Sr n.a.; Ti 1380; Tl n.a.; W n.a.; Si 82600; Fe 22800; Ca n.a.; Al 20800; K 147120; Mg 32100; Na 200960; Share of carbon in waste that is biogenic 100%. Overall degradability of waste during 100 years: 5%.;;

## Included processes
Waste-specific short-term emissions to air via landfill gas incineration and landfill leachate. Burdens from treatment of short-term leachate (0-100a) in wastewater treatment plant (including WWTP sludge disposal in municipal incinerator). Long-term emissions from landfill to groundwater (after base lining failure).

## Geography
Technology encountered in Switzerland in 2000. Landfill includes base seal, leachate collection system, treatment of leachate in municipal wastewater treatment plant.

## Technology
Swiss municipal sanitary landfill for biogenic or untreated municipal waste ("reactive organic landfill"). Landfill gas and leachate collection system. Recultivation and monitoring for 150 years after closure.

## Reference product
- Disposal, ash slurry solids and bark chips, to sanitary landfill [CH]: 1 kg
  SWITZERLAND

## Inputs from technosphere
- Iron (III) chloride, 40% in H2O, at plant [CH]: 0.00152 kg; lognormal SD95 5.1592
  burden from incineration of sludge from wastewater treatment of the short-term leachate (0-100a). uncertainty is calculated from uncertainties in waste composition and transfer coefficients in incinerator and uncertainty of waste decomposition and short-term leaching in sanitary landfill
- Sanitary landfill facility [CH]: 5.5553e-10 p; lognormal SD95 1
  demands per kilogram waste. uncertainty is heeded in the module
- Sodium hydroxide, 50% in H2O, production mix, at plant [RER]: 3.7205e-7 kg; lognormal SD95 5.3771
  (same comment as for Iron (III) chloride, 40% in H2O, at plant)
- Municipal waste incineration plant [CH]: 1.4525e-12 p; lognormal SD95 2.9819
  burden from incineration of sludge from wastewater treatment of the short-term leachate (0-100a).
- Wastewater treatment plant, class 3 [CH]: 1.422e-11 p; lognormal SD95 1.1025
  burden from wastewater treatment of the short-term leachate (0-100a). Uncertainty calculated from unertainty of the waste composition of this waste, uncertainty in waste decomposition and short-term leaching in sanitary landfill
- Iron sulphate, at plant [RER]: 0.001109 kg; lognormal SD95 5.1739
  (same comment as for Wastewater treatment plant, class 3)
- Hydrochloric acid, 30% in H2O, at plant [RER]: 2.5223e-8 kg; lognormal SD95 3.1243
  (same comment as for Iron (III) chloride, 40% in H2O, at plant)
- Quicklime, milled, packed, at plant [CH]: 6.7453e-8 kg; lognormal SD95 5.3986
  (same comment as for Iron (III) chloride, 40% in H2O, at plant)
- Residual material landfill facility [CH]: 7.3977e-13 p; lognormal SD95 2.9808
  (same comment as for Iron (III) chloride, 40% in H2O, at plant)
- Disposal, paper, 11.2% water, to municipal incineration [CH]: 3.875e-5 kg; lognormal SD95 1.1261
  (same comment as for Wastewater treatment plant, class 3)
- Chemicals organic, at plant [GLO]: 1.1451e-8 kg; lognormal SD95 17.344
  (same comment as for Iron (III) chloride, 40% in H2O, at plant)
- Process-specific burdens, slag compartment [CH]: 0.0027914 kg; lognormal SD95 3.0869
  (same comment as for Iron (III) chloride, 40% in H2O, at plant)
- Process-specific burdens, residual material landfill [CH]: 0.00035509 kg; lognormal SD95 2.9808
  (same comment as for Iron (III) chloride, 40% in H2O, at plant)
- Sewer grid, class 3 [CH]: 5.4455e-10 km; lognormal SD95 1.1025
  (same comment as for Wastewater treatment plant, class 3)
- Disposal, cement, hydrated, 0% water, to residual material landfill [CH]: 0.00035509 kg; lognormal SD95 3.0074
  (same comment as for Iron (III) chloride, 40% in H2O, at plant)
- Transport, freight, rail [RER]: 0.0017757 tkm; lognormal SD95 5.072
  (same comment as for Iron (III) chloride, 40% in H2O, at plant)
- Disposal, plastics, mixture, 15.3% water, to municipal incineration [CH]: 3.875e-5 kg; lognormal SD95 1.1261
  (same comment as for Wastewater treatment plant, class 3)
- Electricity, low voltage, at grid [CH]: 0.00099627 kWh; lognormal SD95 2.9353
  (same comment as for Wastewater treatment plant, class 3)
- Heat from waste, at municipal waste incineration plant [CH]: 0.0048728 MJ; lognormal SD95 2.9837
  (same comment as for Iron (III) chloride, 40% in H2O, at plant)
- Slag compartment [CH]: 4.9625e-12 p; lognormal SD95 3.0869
  (same comment as for Iron (III) chloride, 40% in H2O, at plant)
- Process-specific burdens, sanitary landfill [CH]: 0.99995 kg; lognormal SD95 1
  demands per kilogram waste. uncertainty is heeded in the module
- Process-specific burdens, municipal waste incineration [CH]: 0.00581 kg; lognormal SD95 2.9819
  (same comment as for Municipal waste incineration plant)
- Chemicals inorganic, at plant [GLO]: 4.2038e-8 kg; lognormal SD95 3.1243
  (same comment as for Iron (III) chloride, 40% in H2O, at plant)
- Natural gas, burned in boiler modulating >100kW [RER]: 0.0027989 MJ; lognormal SD95 3.0927
  (same comment as for Wastewater treatment plant, class 3)
- Electricity from waste, at municipal waste incineration plant [CH]: 0.0008353 kWh; lognormal SD95 4.5029
  (same comment as for Iron (III) chloride, 40% in H2O, at plant)
- Transport, freight, lorry, 16t-32t gross weight, fleet average [CH]: 0.00039055 tkm; lognormal SD95 3.6771
  (same comment as for Iron (III) chloride, 40% in H2O, at plant)
- Aluminium sulphate, powder, at plant [RER]: 0.00029972 kg; lognormal SD95 5.1739
  (same comment as for Wastewater treatment plant, class 3)
- Cement, unspecified, at plant [CH]: 0.00014204 kg; lognormal SD95 3.0074
  (same comment as for Iron (III) chloride, 40% in H2O, at plant)
- Light fuel oil, burned in boiler 100kW, non-modulating [CH]: 0.0020742 MJ; lognormal SD95 3.0927
  (same comment as for Wastewater treatment plant, class 3)

## Emissions to nature
- Carbon dioxide, biogenic [emissions to air, low. pop.]: 0.0015023 kg; lognormal SD95 4.3377
  burden from direct release or incineration of landfill biogas. Uncertainty calculated from unertainty of the waste composition of this waste, uncertainty in waste decomposition and short-term leaching in sanitary landfill
- Zinc [emissions to air, high. pop.]: 7.8101e-11 kg; lognormal SD95 8.3654
  Emissions from short-term leachate treatment and incineration of resulting sludge. Uncertainty calculated depending on waste input and uncertainty of transfer coefficents in landfill, wastewater treatment and incineration model.
- Silicon [emissions to water, river]: 1.2423e-5 kg; lognormal SD95 5.3223
  (same comment as for Zinc)
- Lead [emissions to air, high. pop.]: 1.2326e-13 kg; lognormal SD95 18.271
  (same comment as for Zinc)
- Titanium [emissions to air, low. pop.]: 8.6228e-10 kg; lognormal SD95 19.901
  (same comment as for Carbon dioxide, biogenic)
- Cobalt [emissions to water, groundwater, long-term]: 1.7835e-6 kg; lognormal SD95 11.397
  Emissions from long-term leachate (>100a) directly from MSW landfill and indirectly via incineration of treatement sludge from leachate treatement. Uncertainty calculated depending on waste input and uncertainty of long-term transfer coefficents in landfill.
- Silicon [emissions to water, groundwater, long-term]: 0.0015937 kg; lognormal SD95 55.021
  (same comment as for Cobalt)
- Arsenic [emissions to air, high. pop.]: 1.6939e-11 kg; lognormal SD95 13.994
  (same comment as for Zinc)
- Arsenic [emissions to water, groundwater, long-term]: 6.6461e-6 kg; lognormal SD95 9.9426
  (same comment as for Cobalt)
- Nickel [emissions to air, high. pop.]: 2.3288e-16 kg; lognormal SD95 16.926
  (same comment as for Zinc)
- Mercury [emissions to water, groundwater, long-term]: -3.0053e-8 kg; lognormal SD95 15.99
  (same comment as for Cobalt)
- Molybdenum [emissions to water, groundwater, long-term]: 1.4622e-6 kg; lognormal SD95 12.615
  (same comment as for Cobalt)
- Vanadium [emissions to water, river]: 1.0577e-7 kg; lognormal SD95 11.866
  (same comment as for Zinc)
- Heat, waste [emissions to air, low. pop.]: 0.0081699 MJ; lognormal SD95 5.18
  (same comment as for Carbon dioxide, biogenic)
- Zinc [emissions to water, groundwater, long-term]: 0.0024075 kg; lognormal SD95 4.2799
  (same comment as for Cobalt)
- Cadmium [emissions to water, river]: 3.8762e-9 kg; lognormal SD95 16.54
  (same comment as for Zinc)
- TOC, Total Organic Carbon [emissions to water, river]: 2.7882e-6 kg; lognormal SD95 7.0496
  (same comment as for Zinc)
- Carbon monoxide, biogenic [emissions to air, low. pop.]: 8.5157e-8 kg; lognormal SD95 8.8232
  (same comment as for Carbon dioxide, biogenic)
- Titanium [emissions to air, high. pop.]: 1.6987e-9 kg; lognormal SD95 8.8574
  (same comment as for Zinc)
- Phosphorus [emissions to air, high. pop.]: 1.4841e-7 kg; lognormal SD95 5.2936
  (same comment as for Zinc)
- Copper [emissions to air, low. pop.]: 5.8314e-11 kg; lognormal SD95 24.83
  (same comment as for Carbon dioxide, biogenic)
- Copper [emissions to air, high. pop.]: 1.1158e-12 kg; lognormal SD95 12.475
  (same comment as for Zinc)
- Chromium VI [emissions to water, groundwater, long-term]: 8.644e-8 kg; lognormal SD95 336.72
  (same comment as for Cobalt)
- Copper [emissions to water, groundwater, long-term]: 0.00083351 kg; lognormal SD95 5.2104
  (same comment as for Cobalt)
- Phosphate [emissions to water, groundwater, long-term]: 0.0017465 kg; lognormal SD95 155.92
  (same comment as for Cobalt)
- Manganese [emissions to air, low. pop.]: 2.8632e-7 kg; lognormal SD95 11.574
  (same comment as for Carbon dioxide, biogenic)
- Sulfate [emissions to water, groundwater, long-term]: 0.025145 kg; lognormal SD95 3.417
  (same comment as for Cobalt)
- Magnesium [emissions to water, groundwater, long-term]: 0.031199 kg; lognormal SD95 2.625
  (same comment as for Cobalt)
- Cobalt [emissions to water, river]: 1.4683e-8 kg; lognormal SD95 14.662
  (same comment as for Zinc)
- Zinc [emissions to air, low. pop.]: 1.5377e-9 kg; lognormal SD95 18.929
  (same comment as for Carbon dioxide, biogenic)
- Mercury [emissions to air, high. pop.]: -1.7508e-16 kg; lognormal SD95 23.227
  (same comment as for Zinc)
- Magnesium [emissions to air, high. pop.]: 1.3379e-7 kg; lognormal SD95 4.1384
  (same comment as for Zinc)
- Vanadium [emissions to water, groundwater, long-term]: 1.1461e-5 kg; lognormal SD95 11.253
  (same comment as for Cobalt)
- NMVOC, non-methane volatile organic compounds, unspecified origin [emissions to air, low. pop.]: 1.6111e-9 kg; lognormal SD95 4.5794
  (same comment as for Carbon dioxide, biogenic)
- Chloride [emissions to water, river]: 0.00099417 kg; lognormal SD95 5.1739
  Emissions from short-term leachate treatment. Uncertainty calculated depending on waste input and uncertainty of transfer coefficents in landfill and wastewater treatment.
- Nickel [emissions to air, low. pop.]: 3.4273e-12 kg; lognormal SD95 31.362
  (same comment as for Carbon dioxide, biogenic)
- Methane, biogenic [emissions to air, low. pop.]: 0.00023033 kg; lognormal SD95 4.5794
  (same comment as for Carbon dioxide, biogenic)
- Lead [emissions to water, river]: 4.0968e-10 kg; lognormal SD95 17.579
  (same comment as for Zinc)
- Manganese [emissions to air, high. pop.]: 3.0713e-12 kg; lognormal SD95 4.7127
  (same comment as for Zinc)
- Cobalt [emissions to air, low. pop.]: 7.232e-12 kg; lognormal SD95 29.656
  (same comment as for Carbon dioxide, biogenic)
- Carbon dioxide, biogenic [emissions to air, high. pop.]: 5.0159e-5 kg; lognormal SD95 7.0511
  (same comment as for Zinc)
- Cobalt [emissions to air, high. pop.]: 4.5234e-16 kg; lognormal SD95 16.034
  (same comment as for Zinc)
- Zinc [emissions to water, river]: 2.1397e-6 kg; lognormal SD95 7.8634
  (same comment as for Zinc)
- Hydrogen sulfide [emissions to water, groundwater, long-term]: 0.00065547 kg; lognormal SD95 3.417
  (same comment as for Cobalt)
- Carbon monoxide, biogenic [emissions to air, high. pop.]: 1.325e-6 kg; lognormal SD95 5.2494
  (same comment as for Zinc)
- Copper [emissions to water, river]: 5.2944e-8 kg; lognormal SD95 11.778
  (same comment as for Zinc)
- Aluminium [emissions to water, groundwater, long-term]: 0.020819 kg; lognormal SD95 2.8811
  (same comment as for Cobalt)
- Molybdenum [emissions to air, low. pop.]: 4.8773e-12 kg; lognormal SD95 30.552
  (same comment as for Carbon dioxide, biogenic)
- Sodium [emissions to water, river]: 0.041582 kg; lognormal SD95 2.0414
  (same comment as for Chloride)
- Cadmium [emissions to water, groundwater, long-term]: 8.6011e-7 kg; lognormal SD95 12.422
  (same comment as for Cobalt)
- Manganese [emissions to water, river]: 0.00058127 kg; lognormal SD95 3.8797
  (same comment as for Zinc)
- Vanadium [emissions to air, high. pop.]: 1.0257e-11 kg; lognormal SD95 12.352
  (same comment as for Zinc)
- Silicon [emissions to air, low. pop.]: 5.1612e-8 kg; lognormal SD95 14.192
  (same comment as for Carbon dioxide, biogenic)
- Cadmium [emissions to air, low. pop.]: 5.0896e-11 kg; lognormal SD95 25.37
  (same comment as for Carbon dioxide, biogenic)
- Nickel [emissions to water, groundwater, long-term]: 4.7075e-6 kg; lognormal SD95 10.346
  (same comment as for Cobalt)
- Heat, waste [emissions to air, high. pop.]: 0.0036995 MJ; lognormal SD95 2.8542
  (same comment as for Iron (III) chloride, 40% in H2O, at plant)
- Manganese [emissions to water, groundwater, long-term]: 0.018925 kg; lognormal SD95 2.8426
  (same comment as for Cobalt)
- Chromium [emissions to air, low. pop.]: 2.7028e-12 kg; lognormal SD95 31.795
  (same comment as for Carbon dioxide, biogenic)
- Chromium [emissions to water, river]: 1.697e-11 kg; lognormal SD95 16.237
  (same comment as for Zinc)
- TOC, Total Organic Carbon [emissions to water, groundwater, long-term]: 0.0029224 kg; lognormal SD95 6.1839
  (same comment as for Cobalt)
- Sulfate [emissions to water, river]: 0.0014768 kg; lognormal SD95 3.6564
  (same comment as for Chloride)
- Aluminium [emissions to water, river]: 3.1259e-6 kg; lognormal SD95 6.1364
  (same comment as for Zinc)
- DOC, Dissolved Organic Carbon [emissions to water, groundwater, long-term]: 0.0029224 kg; lognormal SD95 6.1839
  (same comment as for Cobalt)
- Magnesium [emissions to air, low. pop.]: 2.476e-7 kg; lognormal SD95 11.85
  (same comment as for Carbon dioxide, biogenic)
- BOD5, Biological Oxygen Demand [emissions to water, river]: 3.4683e-6 kg; lognormal SD95 7.0663
  (same comment as for Zinc)
- Molybdenum [emissions to water, river]: 1.1542e-8 kg; lognormal SD95 15.107
  (same comment as for Zinc)
- Heat, waste [emissions to water, river]: 0.00031949 MJ; lognormal SD95 7.0418
  (same comment as for Iron (III) chloride, 40% in H2O, at plant)
- Potassium [emissions to water, river]: 0.005378 kg; lognormal SD95 3.0286
  (same comment as for Chloride)
- Iron [emissions to water, river]: 8.2675e-6 kg; lognormal SD95 6.9077
  (same comment as for Zinc)
- Methane, biogenic [emissions to air, high. pop.]: 1.3524e-7 kg; lognormal SD95 5.351
  (same comment as for Zinc)
- Sodium [emissions to water, groundwater, long-term]: 0.15937 kg; lognormal SD95 1.6806
  (same comment as for Cobalt)
- Potassium [emissions to water, groundwater, long-term]: 0.14174 kg; lognormal SD95 1.8147
  (same comment as for Cobalt)
- Titanium [emissions to water, river]: 1.7504e-6 kg; lognormal SD95 8.5649
  (same comment as for Zinc)
- Titanium [emissions to water, groundwater, long-term]: 0.0013771 kg; lognormal SD95 4.8003
  (same comment as for Cobalt)
- Phosphate [emissions to water, river]: 0.0002523 kg; lognormal SD95 5.0767
  (same comment as for Zinc)
- Cadmium [emissions to air, high. pop.]: 2.0874e-13 kg; lognormal SD95 17.221
  (same comment as for Zinc)
- Vanadium [emissions to air, low. pop.]: 5.2068e-11 kg; lognormal SD95 25.307
  (same comment as for Carbon dioxide, biogenic)
- Molybdenum [emissions to air, high. pop.]: 1.9216e-11 kg; lognormal SD95 15.487
  (same comment as for Zinc)
- Sodium [emissions to air, low. pop.]: 1.0395e-5 kg; lognormal SD95 8.2077
  (same comment as for Carbon dioxide, biogenic)
- Potassium [emissions to air, low. pop.]: 1.3445e-6 kg; lognormal SD95 10.305
  (same comment as for Carbon dioxide, biogenic)
- Particulates, < 2.5 um [emissions to air, low. pop.]: 2.8588e-8 kg; lognormal SD95 6.249
  (same comment as for Carbon dioxide, biogenic)
- Aluminium [emissions to air, high. pop.]: 1.5027e-7 kg; lognormal SD95 3.9405
  (same comment as for Zinc)
- DOC, Dissolved Organic Carbon [emissions to water, river]: 2.6764e-6 kg; lognormal SD95 7.0614
  (same comment as for Zinc)
- Aluminium [emissions to air, low. pop.]: 1.2997e-8 kg; lognormal SD95 15.778
  (same comment as for Carbon dioxide, biogenic)
- Mercury [emissions to water, river]: -3.273e-11 kg; lognormal SD95 22.434
  (same comment as for Zinc)
- Lead [emissions to air, low. pop.]: 1.2423e-12 kg; lognormal SD95 33.681
  (same comment as for Carbon dioxide, biogenic)
- Iron [emissions to air, high. pop.]: 3.1304e-8 kg; lognormal SD95 5.3838
  (same comment as for Zinc)
- Arsenic [emissions to air, low. pop.]: 8.4351e-10 kg; lognormal SD95 20.03
  (same comment as for Carbon dioxide, biogenic)
- Magnesium [emissions to water, river]: 0.00089359 kg; lognormal SD95 3.943
  (same comment as for Zinc)
- NMVOC, non-methane volatile organic compounds, unspecified origin [emissions to air, high. pop.]: 4.4619e-10 kg; lognormal SD95 8.308
  (same comment as for Zinc)
- Silicon [emissions to air, high. pop.]: 4.518e-7 kg; lognormal SD95 5.397
  (same comment as for Zinc)
- Chromium VI [emissions to water, river]: 5.6602e-9 kg; lognormal SD95 15.864
  (same comment as for Zinc)
- Chromium [emissions to air, high. pop.]: 3.937e-16 kg; lognormal SD95 17.191
  (same comment as for Zinc)
- Mercury [emissions to air, low. pop.]: -4.1366e-11 kg; lognormal SD95 24.136
  (same comment as for Carbon dioxide, biogenic)
- Lead [emissions to water, groundwater, long-term]: 1.2647e-5 kg; lognormal SD95 9.2427
  (same comment as for Cobalt)
- COD, Chemical Oxygen Demand [emissions to water, groundwater, long-term]: 0.0031964 kg; lognormal SD95 6.1837
  (same comment as for Cobalt)
- BOD5, Biological Oxygen Demand [emissions to water, groundwater, long-term]: 0.00075671 kg; lognormal SD95 6.1837
  (same comment as for Cobalt)
- Sulfur dioxide [emissions to air, low. pop.]: 6.0031e-5 kg; lognormal SD95 6.5222
  (same comment as for Carbon dioxide, biogenic)
- Arsenic [emissions to water, river]: 5.3023e-8 kg; lognormal SD95 13.55
  (same comment as for Zinc)
- Nickel [emissions to water, river]: 8.3166e-9 kg; lognormal SD95 15.562
  (same comment as for Zinc)
- Iron [emissions to water, groundwater, long-term]: 0.0020351 kg; lognormal SD95 13.923
  (same comment as for Cobalt)
- COD, Chemical Oxygen Demand [emissions to water, river]: 1.1019e-5 kg; lognormal SD95 7.0462
  (same comment as for Zinc)
- Iron [emissions to air, low. pop.]: 3.9146e-9 kg; lognormal SD95 17.607
  (same comment as for Carbon dioxide, biogenic)

## Sampling procedure
Landfill model based on observed leachate concentrations in literature. Extrapolated to 60'000 years heeding chemical characteristics. Initial waste composition from various literature sources.

## Uncertainty adjustments
uncertainty of waste input composition data derived from generic formula GSD(c) = N*ln(c)+1. Mean long-term emissions are the emissions until the next glacial period occurs (in 60'000a) and the landfill is eroded. Maximal long-term emissions are the complete emissions of all landfilled material (except Cr). Minimal long-term emissions are derived implicitly from the mean and maximal values assuming a lognormal distribution.

## Sources
- Itten R., Stucki M., Jungbluth N., 2011, 2011 - LCA burning diff. solid biomass substrates - Itten, Project report, 321, ESU-services Ltd., Uster, CH
Itten R.,, Jungbluth N. (2011) Life Cycle Assessment of Burning Different Biomass Substrates. Project report. Volume: 321. ESU-services Ltd.. Uster, CH.
Type: Separate publication
Source: Report
First author: Itten R.,
Other authors: Jungbluth N.
Year: 2011
Title of anthology: Project report
Place of publication: Uster, CH
Publisher: ESU-services Ltd.
Volume No: 321
