# Wiring and tubing, carbon dioxide capture process

Dataset: EcoSpold 1, unit process
Functional unit: 1 p
Category: fuels / Synthetic\Carbon capture and storage\Transformation\Infrastructure
Geography: RER
Time period: 2020-01 to 2020-12
Generated by: Romain Sacchi
accessRestrictedTo: 3
copyright: False

## General comment
Datasets from an 2013 LCA of the Climeworks carbon capture process. Original source: Timofte, A. A Life Cycle Assessment of the Climeworks technology for direct air capture of carbon dioxide, a semester project in the ecological systems design group. Institute of Environmental Engineering of ETH Zurich (2013)..

## Time period
Base technology year of 2020

## Reference product
- Wiring and tubing, carbon dioxide capture process [RER]: 1 p

## Inputs from technosphere
All rows: lognormal SD95 1.31756
- Steel, low-alloyed, at plant [RER]: 3000 kg
  Uncertainty from pedigree matrix: (3, 5, 4, 2, 1, 2)
- Copper, primary, at refinery [RLA]: 97.5 kg
  Uncertainty from pedigree matrix: (3, 5, 4, 2, 1, 2)
- Synthetic rubber, at plant [RER]: 52.5 kg
  Uncertainty from pedigree matrix: (3, 5, 4, 2, 1, 2)
- Transport, freight, lorry, 7.5t-16t gross weight, fleet average [RER]: 4000 tkm
  Uncertainty from pedigree matrix: (3, 5, 4, 2, 1, 2)
- Transport, freight, rail [RER]: 630 tkm
  Uncertainty from pedigree matrix: (3, 5, 4, 2, 1, 2)
- Transport, freight, lorry, 16t-32t gross weight, fleet average [RER]: 315 tkm
  Uncertainty from pedigree matrix: (3, 5, 4, 2, 1, 2)

## Sources
- Sacchi R., Bauer C., 2023, 2023 - LCI on-road vehicles - Sacchi, PSI, Villigen, CH
doi: 10.5281/ZENODO.5156043
