# Natural gas, liquefied, production RU, at freight ship

Dataset: EcoSpold 1, unit process
Functional unit: 1 Nm3
Category: natural gas / production
Geography: KR
Time period: 2023 to 2024
Production volume: not known
Generated by: Niels Jungbluth
accessRestrictedTo: 0
copyright: true

## General comment
The process is normalized on the gaseous form of gas. The net calorific value of natural gas is 36.0 MJ/Nm³.

## Included processes
This dataset describes the transport of natural gas on a freight ship between the liquefaction plant in RU and a South Korean evaporation plant.

## Geography
not known

## Technology
The distances between liquefaction and evaporation plant is based on port distances.

## Time period
Transport modes investigated for 2023.

## Reference product
- Natural gas, liquefied, production RU, at freight ship [KR]: 1 Nm3

## Inputs from technosphere
- Natural gas, liquefied, at liquefaction plant [RU]: 1 Nm3; lognormal SD95 1.2423
  (4,3,3,1,1,BU:1.05); Based on data from Faist-Emmenegger (2015)
- Transport, liquefied natural gas RU, freight ship [OCE]: 16.464 tkm; lognormal SD95 2.077
  (3,3,3,1,3,BU:2); Average weighted distance based on BP statistics for 2021

## Sampling procedure
Literature.

## Sources
- Meili C., Jungbluth N., Bussa M., Stefanel A., 2025, 2025 - LCI long-distance transport crude oil - Meili, Project report, 234, ESU-services Ltd., Schaffhausen, CH
- Bussa M., Jungbluth N., Meili C., 2025, 2025 - LCI long-dist. transp. and distrib. natural gas - Bussa, Project report, 234, ESU-services Ltd., Schaffhausen, CH

## Validation
Passed.
https://esuservices-my.sharepoint.com/personal/jungbluth_esu-services_ch/Documents/ESU-intern/565 Beratung BAFU/EcoSpoldDataXML/[565-EcoSpold-gas-transport-2025-v2.0.xlsb]X-Process
