# Disposal, capacitors, 0% water, to hazardous waste incineration

Dataset: EcoSpold 1, unit process
Functional unit: 1 kg
Category: incineration / hazardous waste incineration
Geography: CH
Time period: 2004-01 to 2004-12
Production volume: 2 Swiss HWI plants with a total capacity of 53'000 t/a.
Share of production covered: 39 %
Generated by: Roland Hischier
accessRestrictedTo: 0
copyright: true

## General comment
Inventoried waste contains 2.52% rubber; 6.59% Plastics from electronic consumer goods; 6.59% Plastics from electronic industrial goods; 7.74% average paper; 76.6% Capacitor (w/o plastics rubber paper); . waste composition (wet, in ppm): upper heating value 6.8 MJ/kg; lower heating value 6.358 MJ/kg; H2O 9785.8; O 151710; H 38272; C 246570; S 248.21; N 2042.4; P 599.86; B 1.3305; Cl 1482.5; Br 724.35; F 34.432; I n.a.; Ag 4846.9; As 1.1463; Ba 32.153; Cd 20.151; Co 3.9391; Cr 8.0335; Cu 21482; Hg 0.12273; Mn 4.0218; Mo 0.72774; Ni 516.94; Pb 239.31; Sb 631.59; Se 0.45766; Sn 1994.6; V 0.098775; Zn 4666.9; Be 0.13684; Sc n.a.; Sr 15.387; Ti 602.93; Tl 0.18221; W n.a.; Si 2035.6; Fe 30928; Ca 675.96; Al 479070; K 118.16; Mg 332.64; Na 89.49; Share of carbon in waste that is biogenic 12.7%. Net energy produced in HWI: 17.11MJ/kg electric energy and 1.27MJ/kg thermal energy Allocation of energy production: no substitution or expansion. 100% of burden allocated to waste disposal function of HWI. One kg of this waste produces 0.5616 kg of residues, which are landfilled. Additional solidification with 0.2246 kg of cement.;;

## Included processes
waste-specific air and water emissions from incineration, auxiliary material consumption for flue gas cleaning. Short-term emissions to river water and long-term emissions to ground water from residual material landfill (from solidified fly ashes and scrubber slugde). Process energy demands for HWI.

## Geography
Specific to the technology encountered in Switzerland in 2000. Well applicable to modern incineration practices in Europe or North America or Japan.

## Technology
Swiss HWI plant in 2000 with wet flue gas scrubber and low-dust SCR DeNOx facility. Gross thermal efficiency 74.4% and gross electric efficiency 10%.

## Time period
Transfer coefficients for modern Swiss MSWI. Emission speciation based on early 90ies data.

## Reference product
- Disposal, capacitors, 0% water, to hazardous waste incineration [CH]: 1 kg
  SWITZERLAND

## Inputs from technosphere
- Ammonia, liquid, at regional storehouse [CH]: 7.4484e-5 kg; lognormal SD95 7.7926
  uncertainty calculated from uncertainty in average DeNOx input, uncertainty in the share of thermal NOx, uncertainty of nitrogen content in average municipal waste and the unertainty in nitrogen content in *this* waste.
- Residual material landfill facility [CH]: 1.17e-9 p; lognormal SD95 1.2323
  uncertainty is calculated from uncertainties in waste composition and transfer coefficients in incinerator
- Hydrochloric acid, 30% in H2O, at plant [RER]: 0.001078 kg; lognormal SD95 1.661
  uncertainty calculated from uncertainty in average auxiliary material input, and the unertainty of the waste composition of this waste
- Sodium hydroxide, 50% in H2O, production mix, at plant [RER]: 0.0041235 kg; lognormal SD95 2.8396
  (same comment as for Hydrochloric acid, 30% in H2O, at plant)
- Quicklime, milled, packed, at plant [CH]: 0.00062086 kg; lognormal SD95 2.8375
  (same comment as for Hydrochloric acid, 30% in H2O, at plant)
- Disposal, cement, hydrated, 0% water, to residual material landfill [CH]: 0.56161 kg; lognormal SD95 1.3268
  Hydrated cement for solidification of landfilled residual material. Uncertainty calculated from unertainty of the waste composition of this waste and transfer coefficients in the incinerator and of the solidification recipe.
- Chromium, at regional storage [RER]: 5.969e-8 kg; lognormal SD95 10.926
  Proxy for vanadium pentoxide V2O5 in SCR catalyst. uncertainty calculated from uncertainty in average DeNOx input, uncertainty in the share of thermal NOx, uncertainty of nitrogen content in average municipal waste and the unertainty in nitrogen content in *this* waste.
- Iron (III) chloride, 40% in H2O, at plant [CH]: 0.020316 kg; lognormal SD95 2.2929
  (same comment as for Hydrochloric acid, 30% in H2O, at plant)
- Hazardous waste incineration plant [CH]: 1.25e-9 p; lognormal SD95 1
  demands per kilogram waste. uncertainty is heeded in the module
- Calcium chloride, CaCl2, at regional storage [CH]: 0.0020801 kg; lognormal SD95 5.7252
  (same comment as for Hydrochloric acid, 30% in H2O, at plant)
- Light fuel oil, burned in boiler 100kW, non-modulating [CH]: 16.642 MJ; lognormal SD95 1.7325
  Uncertainty dependent on total energy required and heating value present, using experimental GSd for substraction from uc=A*GSDa^2-B
- Hydrogen peroxide, 50% in H2O, at plant [RER]: 1.1163e-6 kg; lognormal SD95 6.2913
  (same comment as for Hydrochloric acid, 30% in H2O, at plant)
- Natural gas, burned in industrial furnace 1MW [CH]: 0.040398 MJ; lognormal SD95 8.5175
  (same comment as for Ammonia, liquid, at regional storehouse)
- Chemicals inorganic, at plant [GLO]: 0.0017966 kg; lognormal SD95 1.661
  Proxy for Polyelectrolyte. uncertainty calculated from uncertainty in average auxiliary material input, and the unertainty of the waste composition of this waste
- Transport, freight, rail [RER]: 0.087917 tkm; lognormal SD95 1.4065
  uncertainty calculated from uncertainty in average auxiliary material input, the unertainty of the waste composition of this waste and the uncertainty in generic transportation distances
- Process-specific burdens, hazardous waste incineration plant [CH]: 1 kg; lognormal SD95 1
  demands per kilogram waste. uncertainty is heeded in the module
- Transport, freight, lorry, 16t-32t gross weight, fleet average [CH]: 0.041901 tkm; lognormal SD95 1.1623
  uncertainty calculated from calculated from uncertainties in waste composition, in transfer coefficients in incinerator, uncertainty in average auxiliary material input, the unertainty of the waste composition of this waste and the uncertainty in generic transportation distances
- Process-specific burdens, residual material landfill [CH]: 0.56161 kg; lognormal SD95 1.2323
  (same comment as for Residual material landfill facility)
- Titanium dioxide, production mix, at plant [RER]: 2.9248e-6 kg; lognormal SD95 10.926
  (same comment as for Ammonia, liquid, at regional storehouse)
- Chemicals organic, at plant [GLO]: 0.00012811 kg; lognormal SD95 9.1088
  Proxy for TMT15. uncertainty calculated from uncertainty in average auxiliary material input, and the unertainty of the waste composition of this waste
- Cement, unspecified, at plant [CH]: 0.22465 kg; lognormal SD95 1.3268
  Cement for solidification of landfilled residual material. Uncertainty calculated from unertainty of the waste composition of this waste, of transfer coefficients in the incinerator and of the solidification recipe.

## Emissions to nature
- Antimony [emissions to water, river]: 9.9383e-6 kg; lognormal SD95 8.5296
  uncertainty is calculated from uncertainties in waste composition and transfer coefficients in incinerator and landfills
- Selenium [emissions to water, river]: 1.3796e-6 kg; lognormal SD95 10.85
  (same comment as for Antimony)
- Chromium VI [emissions to water, river]: 2.082e-5 kg; lognormal SD95 7.1157
  (same comment as for Antimony)
- Phosphate [emissions to water, river]: 2.9529e-5 kg; lognormal SD95 5.147
  (same comment as for Antimony)
- Nickel [emissions to water, groundwater, long-term]: 5.1226e-5 kg; lognormal SD95 8.487
  Long-term emissions from landfilling of incineration residues. uncertainty is calculated from uncertainties in waste composition and transfer coefficients in incinerator and landfills.
- Fluoride [emissions to water, groundwater, long-term]: 9.1754e-8 kg; lognormal SD95 7.7951
  (same comment as for Nickel)
- Calcium [emissions to air, high. pop.]: 1.1268e-6 kg; lognormal SD95 5.4978
  (same comment as for Residual material landfill facility)
- Bromine [emissions to water, river]: 0.00072303 kg; lognormal SD95 5.3279
  (same comment as for Antimony)
- Phosphate [emissions to water, groundwater, long-term]: 0.00084071 kg; lognormal SD95 8.8614
  (same comment as for Nickel)
- Arsenic [emissions to water, groundwater, long-term]: 5.89e-15 kg; lognormal SD95 10.314
  (same comment as for Nickel)
- BOD5, Biological Oxygen Demand [emissions to water, groundwater, long-term]: 0.0054302 kg; lognormal SD95 1.8177
  (same comment as for Nickel)
- Strontium [emissions to water, groundwater, long-term]: 0.00025597 kg; lognormal SD95 7.1034
  (same comment as for Nickel)
- Mercury [emissions to air, high. pop.]: 4.238e-15 kg; lognormal SD95 16.22
  (same comment as for Residual material landfill facility)
- Manganese [emissions to air, high. pop.]: 2.1899e-14 kg; lognormal SD95 11.679
  (same comment as for Residual material landfill facility)
- Cadmium [emissions to air, high. pop.]: 1.1097e-9 kg; lognormal SD95 9.0518
  (same comment as for Residual material landfill facility)
- Chromium VI [emissions to water, groundwater, long-term]: 6.5688e-5 kg; lognormal SD95 6.0054
  (same comment as for Nickel)
- Carbon dioxide, fossil [emissions to air, high. pop.]: 0.78072 kg; lognormal SD95 1.5709
  calculated from uncertainty in carbon in waste and transfer coefficients
- Cadmium [emissions to water, groundwater, long-term]: 9.1674e-8 kg; lognormal SD95 235.65
  (same comment as for Nickel)
- Molybdenum [emissions to water, river]: 1.2476e-5 kg; lognormal SD95 9.2544
  (same comment as for Antimony)
- Copper [emissions to water, groundwater, long-term]: 4.6601e-5 kg; lognormal SD95 37.404
  (same comment as for Nickel)
- Boron [emissions to water, river]: 9.4923e-7 kg; lognormal SD95 7.6618
  (same comment as for Antimony)
- Barium [emissions to water, river]: 1.1797e-8 kg; lognormal SD95 15.697
  (same comment as for Antimony)
- Cadmium [emissions to water, river]: 9.0305e-9 kg; lognormal SD95 8.6102
  (same comment as for Antimony)
- Tin [emissions to water, groundwater, long-term]: 2.1259e-6 kg; lognormal SD95 82.897
  (same comment as for Nickel)
- Titanium [emissions to water, groundwater, long-term]: 0.0015731 kg; lognormal SD95 6.0724
  (same comment as for Nickel)
- Calcium [emissions to water, river]: 3.1828e-6 kg; lognormal SD95 8.7921
  (same comment as for Antimony)
- Iron [emissions to water, river]: 0.024844 kg; lognormal SD95 2.6538
  (same comment as for Antimony)
- Copper [emissions to water, river]: 0.00092166 kg; lognormal SD95 2.8969
  (same comment as for Antimony)
- Nitrate [emissions to water, river]: 3.5168e-5 kg; lognormal SD95 3.5573
  (same comment as for Antimony)
- Chloride [emissions to water, river]: 0.0014829 kg; lognormal SD95 4.7353
  (same comment as for Antimony)
- Calcium [emissions to water, groundwater, long-term]: 0.0019065 kg; lognormal SD95 13.829
  (same comment as for Nickel)
- Antimony [emissions to water, groundwater, long-term]: 1.8032e-5 kg; lognormal SD95 8.4407
  (same comment as for Nickel)
- Nitrate [emissions to water, groundwater, long-term]: 0.00011222 kg; lognormal SD95 4.2441
  (same comment as for Nickel)
- DOC, Dissolved Organic Carbon [emissions to water, river]: 6.4606e-6 kg; lognormal SD95 3.4451
  (same comment as for Antimony)
- Carbon dioxide, biogenic [emissions to air, high. pop.]: 0.11339 kg; lognormal SD95 1.5709
  calculated from uncertainty in carbon in waste and transfer coefficients
- Heat, waste [emissions to water, river]: 0.72522 MJ; lognormal SD95 3.3986
  uncertainty dependent on uncertainty of heating value, fuel oil input, net (internal) electricity consumption, and share of heat to water
- Sulfur dioxide [emissions to air, high. pop.]: 2.9786e-7 kg; lognormal SD95 6.4177
  (same comment as for Residual material landfill facility)
- Selenium [emissions to air, high. pop.]: 2.301e-15 kg; lognormal SD95 14.561
  (same comment as for Residual material landfill facility)
- Lead [emissions to water, river]: 1.0014e-8 kg; lognormal SD95 10.807
  (same comment as for Antimony)
- Tungsten [emissions to water, river]: 1.2471e-6 kg; lognormal SD95 10.971
  (same comment as for Antimony)
- Magnesium [emissions to air, high. pop.]: 4.5804e-7 kg; lognormal SD95 6.1217
  (same comment as for Residual material landfill facility)
- Nickel [emissions to water, river]: 0.0001058 kg; lognormal SD95 5.6132
  (same comment as for Antimony)
- Nickel [emissions to air, high. pop.]: 3.6186e-7 kg; lognormal SD95 5.7579
  (same comment as for Residual material landfill facility)
- Manganese [emissions to water, groundwater, long-term]: 7.9846e-6 kg; lognormal SD95 158.35
  (same comment as for Nickel)
- Bromine [emissions to water, groundwater, long-term]: 1.3992e-8 kg; lognormal SD95 8.2468
  (same comment as for Nickel)
- TOC, Total Organic Carbon [emissions to water, groundwater, long-term]: 0.0023757 kg; lognormal SD95 1.8177
  (same comment as for Nickel)
- Potassium [emissions to water, river]: 0.0025665 kg; lognormal SD95 3.6577
  (same comment as for Antimony)
- Zinc [emissions to air, high. pop.]: 3.2668e-6 kg; lognormal SD95 4.0122
  (same comment as for Residual material landfill facility)
- Beryllium [emissions to air, high. pop.]: 1.3684e-10 kg; lognormal SD95 15.121
  (same comment as for Residual material landfill facility)
- COD, Chemical Oxygen Demand [emissions to water, groundwater, long-term]: 0.0054302 kg; lognormal SD95 1.8177
  (same comment as for Nickel)
- Vanadium [emissions to water, groundwater, long-term]: 0.00011574 kg; lognormal SD95 6.8436
  (same comment as for Nickel)
- Beryllium [emissions to water, groundwater, long-term]: 2.558e-6 kg; lognormal SD95 12.272
  (same comment as for Nickel)
- Arsenic [emissions to air, high. pop.]: 1.1692e-14 kg; lognormal SD95 13.229
  (same comment as for Residual material landfill facility)
- Sulfate [emissions to water, river]: 0.0007521 kg; lognormal SD95 5.8978
  (same comment as for Antimony)
- Lead [emissions to air, high. pop.]: 8.883e-9 kg; lognormal SD95 6.5773
  (same comment as for Residual material landfill facility)
- Potassium [emissions to water, groundwater, long-term]: 0.0065383 kg; lognormal SD95 3.4431
  (same comment as for Nickel)
- Magnesium [emissions to water, river]: 4.6591e-6 kg; lognormal SD95 8.4142
  (same comment as for Antimony)
- Sodium [emissions to air, high. pop.]: 8.4198e-7 kg; lognormal SD95 7.2886
  (same comment as for Residual material landfill facility)
- Dinitrogen monoxide [emissions to air, high. pop.]: 7.2716e-6 kg; lognormal SD95 7.8968
  uncertainty calculated from uncertainty for proxy (from MSWI), uncertainty in average N-emissions, uncertainty in the share of thermal NOx, uncertainty of nitrogen content in average municipal waste and the unertainty in nitrogen content in *this* waste.
- Strontium [emissions to water, river]: 4.2732e-7 kg; lognormal SD95 10.853
  (same comment as for Antimony)
- Cobalt [emissions to water, river]: 3.9364e-6 kg; lognormal SD95 10.575
  (same comment as for Antimony)
- Hydrogen chloride [emissions to air, high. pop.]: 4.573e-7 kg; lognormal SD95 4.9123
  (same comment as for Residual material landfill facility)
- Vanadium [emissions to air, high. pop.]: 9.8775e-12 kg; lognormal SD95 16.396
  (same comment as for Residual material landfill facility)
- Fluoride [emissions to water, river]: 3.437e-5 kg; lognormal SD95 8.1756
  (same comment as for Antimony)
- Copper [emissions to air, high. pop.]: 1.5037e-5 kg; lognormal SD95 2.9928
  (same comment as for Residual material landfill facility)
- Scandium [emissions to water, groundwater, long-term]: 3.9469e-6 kg; lognormal SD95 10.405
  (same comment as for Nickel)
- Aluminium [emissions to air, high. pop.]: 0.0007484 kg; lognormal SD95 1.4404
  (same comment as for Residual material landfill facility)
- Heat, waste [emissions to air, high. pop.]: 4.3662 MJ; lognormal SD95 3.3986
  uncertainty dependent on uncertainty of heating value, fuel oil input, net (internal) electricity consumption, and share of heat to air
- Tin [emissions to water, river]: 3.0008e-8 kg; lognormal SD95 4.7724
  (same comment as for Antimony)
- Sulfate [emissions to water, groundwater, long-term]: 0.00033094 kg; lognormal SD95 4.2671
  (same comment as for Nickel)
- Scandium [emissions to water, river]: 6.4855e-7 kg; lognormal SD95 11.221
  (same comment as for Antimony)
- Mercury [emissions to water, groundwater, long-term]: 6.9023e-8 kg; lognormal SD95 50.601
  (same comment as for Nickel)
- Silicon [emissions to air, high. pop.]: 4.7389e-6 kg; lognormal SD95 4.5944
  (same comment as for Residual material landfill facility)
- Phosphorus [emissions to air, high. pop.]: 4.199e-7 kg; lognormal SD95 5.6297
  (same comment as for Residual material landfill facility)
- Aluminium [emissions to water, river]: 3.5892e-5 kg; lognormal SD95 6.6356
  (same comment as for Antimony)
- Molybdenum [emissions to air, high. pop.]: 1.4555e-9 kg; lognormal SD95 12.82
  (same comment as for Residual material landfill facility)
- Iron [emissions to water, groundwater, long-term]: 5.3784e-5 kg; lognormal SD95 213.44
  (same comment as for Nickel)
- Thallium [emissions to water, groundwater, long-term]: 1.2777e-6 kg; lognormal SD95 13.185
  (same comment as for Nickel)
- TOC, Total Organic Carbon [emissions to water, river]: 6.4606e-6 kg; lognormal SD95 3.4451
  (same comment as for Antimony)
- Manganese [emissions to water, river]: 1.337e-8 kg; lognormal SD95 15.471
  (same comment as for Antimony)
- Chloride [emissions to water, groundwater, long-term]: 8.3458e-6 kg; lognormal SD95 3.7338
  (same comment as for Nickel)
- Potassium [emissions to air, high. pop.]: 3.5623e-7 kg; lognormal SD95 7.0549
  (same comment as for Residual material landfill facility)
- Silver [emissions to water, groundwater, long-term]: 2.7483e-8 kg; lognormal SD95 62.212
  (same comment as for Nickel)
- Vanadium [emissions to water, river]: 3.6955e-7 kg; lognormal SD95 11.071
  (same comment as for Antimony)
- Sodium [emissions to water, groundwater, long-term]: 0.0053717 kg; lognormal SD95 3.4888
  (same comment as for Nickel)
- Antimony [emissions to air, high. pop.]: 2.4568e-12 kg; lognormal SD95 6.2783
  (same comment as for Residual material landfill facility)
- Silicon [emissions to water, groundwater, long-term]: 0.13629 kg; lognormal SD95 1.8491
  (same comment as for Nickel)
- Arsenic [emissions to water, river]: 5.8905e-6 kg; lognormal SD95 10.106
  (same comment as for Antimony)
- Hydrogen fluoride [emissions to air, high. pop.]: 8.6636e-9 kg; lognormal SD95 8.3997
  (same comment as for Residual material landfill facility)
- Iodide [emissions to water, river]: 3.7386e-9 kg; lognormal SD95 11.684
  (same comment as for Antimony)
- Barium [emissions to air, high. pop.]: 3.2153e-8 kg; lognormal SD95 8.4056
  (same comment as for Residual material landfill facility)
- Carbon monoxide, biogenic [emissions to air, high. pop.]: 1.5315e-6 kg; lognormal SD95 5.07
  (1,4,1,1,3,1) & basic uncertainty of 5; 1 plant for waste solvent incineration in Switzerland
- COD, Chemical Oxygen Demand [emissions to water, river]: 1.4767e-5 kg; lognormal SD95 3.4451
  (same comment as for Antimony)
- Mercury [emissions to water, river]: 1.3997e-9 kg; lognormal SD95 13.352
  (same comment as for Antimony)
- Zinc [emissions to water, river]: 6.2567e-5 kg; lognormal SD95 3.929
  (same comment as for Antimony)
- Zinc [emissions to water, groundwater, long-term]: 1.7974e-5 kg; lognormal SD95 106.59
  (same comment as for Nickel)
- Thallium [emissions to air, high. pop.]: 1.8221e-10 kg; lognormal SD95 14.72
  (same comment as for Residual material landfill facility)
- Aluminium [emissions to water, groundwater, long-term]: 0.021499 kg; lognormal SD95 4.228
  (same comment as for Nickel)
- Iron [emissions to air, high. pop.]: 2.1649e-5 kg; lognormal SD95 2.7732
  (same comment as for Residual material landfill facility)
- Thallium [emissions to water, river]: 2.133e-9 kg; lognormal SD95 18.436
  (same comment as for Antimony)
- Barium [emissions to water, groundwater, long-term]: 7.0663e-6 kg; lognormal SD95 159.35
  (same comment as for Nickel)
- Cyanide [emissions to air, high. pop.]: 1.8179e-6 kg; lognormal SD95 7.8968
  (same comment as for Dinitrogen monoxide)
- Tin [emissions to air, high. pop.]: 2.6458e-6 kg; lognormal SD95 4.6273
  (same comment as for Residual material landfill facility)
- Nitrogen oxides [emissions to air, high. pop.]: 5.2517e-5 kg; lognormal SD95 8.1032
  uncertainty calculated from uncertainty in average N-emissions, uncertainty in the share of thermal NOx, uncertainty of nitrogen content in average municipal waste and the unertainty in nitrogen content in *this* waste.
- Ammonia [emissions to air, high. pop.]: 2.0199e-6 kg; lognormal SD95 8.1032
  (same comment as for Nitrogen oxides)
- Beryllium [emissions to water, river]: 4.2705e-9 kg; lognormal SD95 17.305
  (same comment as for Antimony)
- Boron [emissions to water, groundwater, long-term]: 9.396e-5 kg; lognormal SD95 6.8534
  (same comment as for Nickel)
- Tungsten [emissions to water, groundwater, long-term]: 2.2892e-6 kg; lognormal SD95 10.751
  (same comment as for Nickel)
- Strontium [emissions to air, high. pop.]: 1.5387e-9 kg; lognormal SD95 9.314
  (same comment as for Residual material landfill facility)
- BOD5, Biological Oxygen Demand [emissions to water, river]: 1.4767e-5 kg; lognormal SD95 3.4451
  (same comment as for Antimony)
- Silver [emissions to air, high. pop.]: 6.2965e-8 kg; lognormal SD95 4.1411
  (same comment as for Residual material landfill facility)
- Sodium [emissions to water, river]: 0.0032268 kg; lognormal SD95 3.6034
  (same comment as for Antimony)
- Carbon monoxide, fossil [emissions to air, high. pop.]: 1.0545e-5 kg; lognormal SD95 5.07
  (same comment as for Carbon monoxide, biogenic)
- Silicon [emissions to water, river]: 0.00030721 kg; lognormal SD95 4.9727
  (same comment as for Antimony)
- Silver [emissions to water, river]: 3.5356e-7 kg; lognormal SD95 4.0655
  (same comment as for Antimony)
- Selenium [emissions to water, groundwater, long-term]: 2.5323e-6 kg; lognormal SD95 10.632
  (same comment as for Nickel)
- Lead [emissions to water, groundwater, long-term]: 3.3378e-6 kg; lognormal SD95 251.34
  (same comment as for Nickel)
- Boron [emissions to air, high. pop.]: 1.5967e-7 kg; lognormal SD95 11.911
  (same comment as for Residual material landfill facility)
- Chromium [emissions to air, high. pop.]: 5.9401e-13 kg; lognormal SD95 10.587
  (same comment as for Residual material landfill facility)
- Bromine [emissions to air, high. pop.]: 1.4487e-7 kg; lognormal SD95 5.5177
  (same comment as for Residual material landfill facility)
- Molybdenum [emissions to water, groundwater, long-term]: 5.7542e-8 kg; lognormal SD95 9.451
  (same comment as for Nickel)
- Titanium [emissions to air, high. pop.]: 6.0293e-7 kg; lognormal SD95 5.6125
  (same comment as for Residual material landfill facility)
- Cobalt [emissions to air, high. pop.]: 2.7574e-9 kg; lognormal SD95 10.773
  (same comment as for Residual material landfill facility)
- Magnesium [emissions to water, groundwater, long-term]: 0.0027908 kg; lognormal SD95 11.076
  (same comment as for Nickel)
- Titanium [emissions to water, river]: 2.6262e-6 kg; lognormal SD95 8.8542
  (same comment as for Antimony)
- DOC, Dissolved Organic Carbon [emissions to water, groundwater, long-term]: 0.0023757 kg; lognormal SD95 1.8177
  (same comment as for Nickel)
- Iodide [emissions to water, groundwater, long-term]: 3.73e-16 kg; lognormal SD95 11.909
  (same comment as for Nickel)

## Sampling procedure
The 2 Swiss HWI plants, used as the inventory reference technology mix, have a total annual capacity of 53'000 tons of hazardous waste. This corresponds to 39% of the Swiss total installed capacity in 2000. Swiss average plants size is 20'000 t/a.

## Sources
- Hischier R., Classen M., Lehmann M., Scharnhorst W., 2007, 2007 - LCI electric and electronic equipment - Hischier, Final report ecoinvent Data v2.0, 18, Swiss Centre for LCI, Empa - TSL, Duebendorf and St. Gallen, CH
Hischier R., Classen M., Lehmann M., Scharnhorst W. (2007) Life Cycle Inventories of Electric and Electronic Equipment - Production, Use & Disposal. Final report ecoinvent Data v2.0. Volume: 18. Swiss Centre for LCI, Empa - TSL. Duebendorf and St. Gallen, CH.
Type: Measurement on site
Source: CD-ROM
First author: Hischier R.
Other authors: Classen M., Lehmann M., Scharnhorst W.
Year: 2007
Title of anthology: Final report ecoinvent Data v2.0
Place of publication: Duebendorf and St. Gallen, CH
Publisher: Swiss Centre for LCI, Empa - TSL
Volume No: 18
Original title: Life Cycle Inventories of Electric and Electronic Equipment - Production, Use & Disposal

## Validation
Proof reading validation: passed.; Other validation: none;
