# Production of heating system, apartment building MCS Leimbach

Dataset: EcoSpold 1, unit process
Functional unit: 1 m2
Category: heating / heating systems
Geography: CH
Time period: 1994-01 to 2008-12
Generated by: Matthias Klingler
accessRestrictedTo: 0
copyright: true

## General comment
Production of components for the heating system;

## Included processes
Materials used for the production. Energy use for the different production steps. Transport of raw materials to the plant.

## Technology
Technology, materials and components used for heating systems in apartment buildings

## Time period
Amount of material investigated in 2013.

## Reference product
- Production of heating system, apartment building MCS Leimbach [CH]: 1 m2
  SWITZERLAND

## Inputs from technosphere
- Production of heat distribution system, apartment building MCS Leimbach [CH]: 1 m2; lognormal SD95 1
  (1,1,1,1,1,1); summation of subsystems, Basic uncertainty: set as 1.0
- Production of borehole heat exchanger, apartment building MCS Leimbach [CH]: 1 m2; lognormal SD95 1
  (1,1,1,1,1,1); summation of subsystems, Basic uncertainty: set as 1.0
- Production of heat production system, apartment building MCS Leimbach [CH]: 1 m2; lognormal SD95 1
  (1,1,1,1,1,1); summation of subsystems, Basic uncertainty: set as 1.0
- Production of heat dissipation system, apartment building MCS Leimbach [CH]: 1 m2; lognormal SD95 1
  (1,1,1,1,1,1); summation of subsystems, Basic uncertainty: set as 1.0

## Sampling procedure
Data from call of bids for a heating system of a specific building used. Data completed with information from literature and from manufacturers

## Sources
- Klingler M., Kasser U., Savi D., Primas A., Stettler Y., Gujer P., 2014, 2014 - LCA ventilation and heating systems - Klingler, Schlussbericht, BFE, Buero fuer Umweltchemie, B&H AG, Zuerich, CH
Klingler M., Kasser U., Savi D., Primas A., Stettler Y., Gujer P. (2014) Ökobilanzdaten für Lüftungs- und Wärmeanlagen. Schlussbericht, BFE. Bundesamt für Energie (BFE). Bern.
Type: Separate publication
Source: Report
First author: Klingler M.
Other authors: Kasser U., Savi D., Primas A., Stettler Y., Gujer P.
Year: 2014
Title of anthology: Schlussbericht, BFE
Place of publication: Bern
Publisher: Bundesamt für Energie (BFE)
