# Disposal, bitumen, 1.4% water, to sanitary landfill

Dataset: EcoSpold 1, unit process
Functional unit: 1 kg
Category: landfill / sanitary landfill
Geography: CH
Time period: 2000-01 to 2000-12
Generated by: Gabor Doka
accessRestrictedTo: 0
copyright: true

## General comment
Inventoried waste contains 100% bitumen; . waste composition (wet, in ppm): upper heating value 41.39 MJ/kg; lower heating value 39.38 MJ/kg; H2O 13560; O 10000; H 100000; C 830860; S 40000; N 5000; P 4; B n.a.; Cl n.a.; Br n.a.; F n.a.; I n.a.; Ag n.a.; As 0.7; Ba n.a.; Cd n.a.; Co 0.43; Cr 0.35; Cu 5; Hg 0.02; Mn n.a.; Mo 0.56; Ni 100; Pb 1; Sb n.a.; Se 0.2; Sn 89; V 250; Zn n.a.; Be n.a.; Sc n.a.; Sr n.a.; Ti n.a.; Tl n.a.; W n.a.; Si 6; Fe 75; Ca 6; Al 7; K n.a.; Mg n.a.; Na 35; Share of carbon in waste that is biogenic 0%. Overall degradability of waste during 100 years: 1%. CAS number: 008052-42-4;;

## Included processes
Waste-specific short-term emissions to air via landfill gas incineration and landfill leachate. Burdens from treatment of short-term leachate (0-100a) in wastewater treatment plant (including WWTP sludge disposal in municipal incinerator). Long-term emissions from landfill to groundwater (after base lining failure).

## Geography
Technology encountered in Switzerland in 2000. Landfill includes base seal, leachate collection system, treatment of leachate in municipal wastewater treatment plant.

## Technology
Swiss municipal sanitary landfill for biogenic or untreated municipal waste ("reactive organic landfill"). Landfill gas and leachate collection system. Recultivation and monitoring for 150 years after closure.

## Reference product
- Disposal, bitumen, 1.4% water, to sanitary landfill [CH]: 1 kg
  SWITZERLAND

## Inputs from technosphere
- Quicklime, milled, packed, at plant [CH]: 1.58e-9 kg; lognormal SD95 4.06
  burden from incineration of sludge from wastewater treatment of the short-term leachate (0-100a). uncertainty is calculated from uncertainties in waste composition and transfer coefficients in incinerator and uncertainty of waste decomposition and short-term leaching in sanitary landfill
- Chromium oxide, flakes, at plant [RER]: 1.03e-10 kg; lognormal SD95 6.1
  burden from incineration of sludge from wastewater treatment of the short-term leachate (0-100a). Proxy for vanadium pentoxide V2O5 in SCR catalyst, uncertainty calculated from uncertainty in average DeNOx input, uncertainty in the share of thermal NOx, uncertainty of nitrogen content in average municipal waste and the unertainty in nitrogen content in *this* waste and uncertainty of waste decomposition and short-term leaching in sanitary landfill
- Titanium dioxide, production mix, at plant [RER]: 5.03e-9 kg; lognormal SD95 6.1
  (same comment as for Quicklime, milled, packed, at plant)
- Iron sulphate, at plant [RER]: 1.06e-8 kg; lognormal SD95 18.6
  burden from wastewater treatment of the short-term leachate (0-100a). Uncertainty calculated from unertainty of the waste composition of this waste, uncertainty in waste decomposition and short-term leaching in sanitary landfill
- Heat from waste, at municipal waste incineration plant [CH]: 0.00012 MJ; lognormal SD95 5.58
  (same comment as for Quicklime, milled, packed, at plant)
- Iron (III) chloride, 40% in H2O, at plant [CH]: 1.53e-8 kg; lognormal SD95 17.6
  (same comment as for Quicklime, milled, packed, at plant)
- Sewer grid, class 3 [CH]: 5.45e-10 km; lognormal SD95 1.1
  (same comment as for Iron sulphate, at plant)
- Chemicals organic, at plant [GLO]: 2.93e-11 kg; lognormal SD95 25.9
  (same comment as for Quicklime, milled, packed, at plant)
- Transport, freight, rail [RER]: 4.66e-7 tkm; lognormal SD95 4.15
  (same comment as for Quicklime, milled, packed, at plant)
- Disposal, paper, 11.2% water, to municipal incineration [CH]: 3.88e-5 kg; lognormal SD95 1.13
  (same comment as for Iron sulphate, at plant)
- Process-specific burdens, municipal waste incineration [CH]: 0.000143 kg; lognormal SD95 5.58
  burden from incineration of sludge from wastewater treatment of the short-term leachate (0-100a).
- Ammonia, liquid, at regional storehouse [CH]: 1.76e-7 kg; lognormal SD95 4.52
  (same comment as for Quicklime, milled, packed, at plant)
- Chemicals inorganic, at plant [GLO]: 1.9e-11 kg; lognormal SD95 3.48
  (same comment as for Quicklime, milled, packed, at plant)
- Disposal, cement, hydrated, 0% water, to residual material landfill [CH]: 1.97e-7 kg; lognormal SD95 4.91
  (same comment as for Quicklime, milled, packed, at plant)
- Sodium hydroxide, 50% in H2O, production mix, at plant [RER]: 8.73e-9 kg; lognormal SD95 4.04
  (same comment as for Quicklime, milled, packed, at plant)
- Wastewater treatment plant, class 3 [CH]: 1.42e-11 p; lognormal SD95 1.1
  (same comment as for Iron sulphate, at plant)
- Process-specific burdens, residual material landfill [CH]: 1.97e-7 kg; lognormal SD95 4.86
  (same comment as for Quicklime, milled, packed, at plant)
- Natural gas, burned in boiler modulating >100kW [RER]: 5.43e-5 MJ; lognormal SD95 1.76
  (same comment as for Iron sulphate, at plant)
- Electricity from waste, at municipal waste incineration plant [CH]: 2.06e-5 kWh; lognormal SD95 8.6
  (same comment as for Quicklime, milled, packed, at plant)
- Process-specific burdens, sanitary landfill [CH]: 1 kg; lognormal SD95 1
  demands per kilogram waste. uncertainty is heeded in the module
- Slag compartment [CH]: 1.37e-15 p; lognormal SD95 3.98
  (same comment as for Quicklime, milled, packed, at plant)
- Light fuel oil, burned in boiler 100kW, non-modulating [CH]: 4.02e-5 MJ; lognormal SD95 1.76
  (same comment as for Iron sulphate, at plant)
- Electricity, low voltage, at grid [CH]: 0.0008 kWh; lognormal SD95 3.17
  (same comment as for Iron sulphate, at plant)
- Natural gas, burned in industrial furnace 1MW [CH]: 1.71e-5 MJ; lognormal SD95 4.52
  (same comment as for Quicklime, milled, packed, at plant)
- Transport, freight, lorry, 16t-32t gross weight, fleet average [CH]: 4.17e-6 tkm; lognormal SD95 4.69
  (same comment as for Quicklime, milled, packed, at plant)
- Disposal, plastics, mixture, 15.3% water, to municipal incineration [CH]: 3.88e-5 kg; lognormal SD95 1.13
  (same comment as for Iron sulphate, at plant)
- Residual material landfill facility [CH]: 4.09e-16 p; lognormal SD95 4.86
  (same comment as for Quicklime, milled, packed, at plant)
- Cement, unspecified, at plant [CH]: 7.86e-8 kg; lognormal SD95 4.91
  (same comment as for Quicklime, milled, packed, at plant)
- Process-specific burdens, slag compartment [CH]: 7.69e-7 kg; lognormal SD95 3.98
  (same comment as for Quicklime, milled, packed, at plant)
- Aluminium sulphate, powder, at plant [RER]: 2.87e-9 kg; lognormal SD95 18.6
  (same comment as for Iron sulphate, at plant)
- Municipal waste incineration plant [CH]: 3.58e-14 p; lognormal SD95 5.58
  (same comment as for Process-specific burdens, municipal waste incineration)
- Hydrochloric acid, 30% in H2O, at plant [RER]: 1.14e-11 kg; lognormal SD95 3.48
  (same comment as for Quicklime, milled, packed, at plant)
- Sanitary landfill facility [CH]: 5.56e-10 p; lognormal SD95 1
  demands per kilogram waste. uncertainty is heeded in the module

## Emissions to nature
- Sulfate [emissions to water, river]: 0.000455 kg; lognormal SD95 5.3
  Emissions from short-term leachate treatment. Uncertainty calculated depending on waste input and uncertainty of transfer coefficents in landfill and wastewater treatment.
- Dinitrogen monoxide [emissions to air, high. pop.]: 3.07e-7 kg; lognormal SD95 3.69
  Emissions from short-term leachate treatment and incineration of resulting sludge. Uncertainty calculated depending on waste input and uncertainty of transfer coefficents in landfill, wastewater treatment and incineration model.
- Nickel [emissions to water, river]: 3.53e-8 kg; lognormal SD95 13.4
  (same comment as for Dinitrogen monoxide)
- Sulfate [emissions to water, groundwater, long-term]: 0.111 kg; lognormal SD95 2.5
  Emissions from long-term leachate (>100a) directly from MSW landfill and indirectly via incineration of treatement sludge from leachate treatement. Uncertainty calculated depending on waste input and uncertainty of long-term transfer coefficents in landfill.
- TOC, Total Organic Carbon [emissions to water, groundwater, long-term]: 0.211 kg; lognormal SD95 3.94
  (same comment as for Sulfate)
- COD, Chemical Oxygen Demand [emissions to water, groundwater, long-term]: 0.231 kg; lognormal SD95 3.94
  (same comment as for Sulfate)
- Nitrogen, organic bound [emissions to water, groundwater, long-term]: 0.00325 kg; lognormal SD95 3.84
  (same comment as for Sulfate)
- Arsenic [emissions to water, groundwater, long-term]: 6.99e-7 kg; lognormal SD95 12.7
  (same comment as for Sulfate)
- Chloride [emissions to water, river]: 9.51e-9 kg; lognormal SD95 18.6
  (same comment as for Sulfate)
- Tin [emissions to air, low. pop.]: 1.31e-12 kg; lognormal SD95 33.2
  burden from direct release or incineration of landfill biogas. Uncertainty calculated from unertainty of the waste composition of this waste, uncertainty in waste decomposition and short-term leaching in sanitary landfill
- Nickel [emissions to water, groundwater, long-term]: 0.0001 kg; lognormal SD95 7.11
  (same comment as for Sulfate)
- NMVOC, non-methane volatile organic compounds, unspecified origin [emissions to air, high. pop.]: 6.18e-9 kg; lognormal SD95 7.29
  (same comment as for Dinitrogen monoxide)
- Hydrogen sulfide [emissions to water, groundwater, long-term]: 0.0029 kg; lognormal SD95 2.5
  (same comment as for Sulfate)
- Sodium [emissions to water, river]: 1.45e-6 kg; lognormal SD95 9.84
  (same comment as for Sulfate)
- DOC, Dissolved Organic Carbon [emissions to water, river]: 3.71e-5 kg; lognormal SD95 6.12
  (same comment as for Dinitrogen monoxide)
- Mercury [emissions to air, low. pop.]: 5.48e-12 kg; lognormal SD95 27.5
  (same comment as for Tin)
- Heat, waste [emissions to soil, industrial]: 0.229 MJ; lognormal SD95 2.94
  burden from short-term decomposition of waste (0-100a). Uncertainty calculated from unertainty of the waste composition of this waste, uncertainty in waste decomposition and short-term leaching in sanitary landfill
- Copper [emissions to air, low. pop.]: 7e-14 kg; lognormal SD95 41.2
  (same comment as for Tin)
- Methane, fossil [emissions to air, low. pop.]: 0.00319 kg; lognormal SD95 3.62
  (same comment as for Tin)
- NMVOC, non-methane volatile organic compounds, unspecified origin [emissions to air, low. pop.]: 2.23e-8 kg; lognormal SD95 3.62
  (same comment as for Tin)
- Vanadium [emissions to water, groundwater, long-term]: 7.28e-5 kg; lognormal SD95 9.11
  (same comment as for Sulfate)
- Cobalt [emissions to air, low. pop.]: 3.46e-13 kg; lognormal SD95 37.1
  (same comment as for Tin)
- Tin [emissions to air, high. pop.]: 4.05e-12 kg; lognormal SD95 17.4
  (same comment as for Dinitrogen monoxide)
- COD, Chemical Oxygen Demand [emissions to water, river]: 0.000153 kg; lognormal SD95 6.11
  (same comment as for Dinitrogen monoxide)
- Calcium [emissions to water, river]: 7.05e-9 kg; lognormal SD95 16.4
  (same comment as for Dinitrogen monoxide)
- Carbon dioxide, fossil [emissions to air, high. pop.]: 0.000695 kg; lognormal SD95 6.11
  (same comment as for Dinitrogen monoxide)
- TOC, Total Organic Carbon [emissions to water, river]: 3.86e-5 kg; lognormal SD95 6.11
  (same comment as for Dinitrogen monoxide)
- Molybdenum [emissions to air, low. pop.]: 1.48e-13 kg; lognormal SD95 39.4
  (same comment as for Tin)
- Selenium [emissions to air, high. pop.]: 0 kg; lognormal SD95 24.6
  (same comment as for Dinitrogen monoxide)
- Aluminium [emissions to air, low. pop.]: 8.75e-13 kg; lognormal SD95 34.6
  (same comment as for Tin)
- Lead [emissions to air, high. pop.]: 1.95e-15 kg; lognormal SD95 26
  (same comment as for Dinitrogen monoxide)
- Nitrogen oxides [emissions to air, high. pop.]: 1.09e-6 kg; lognormal SD95 3.96
  (same comment as for Dinitrogen monoxide)
- Sodium [emissions to air, low. pop.]: 3.62e-10 kg; lognormal SD95 21.6
  (same comment as for Tin)
- Chromium VI [emissions to water, groundwater, long-term]: 1.59e-9 kg; lognormal SD95 402
  (same comment as for Sulfate)
- Aluminium [emissions to air, high. pop.]: 5.85e-12 kg; lognormal SD95 15.6
  (same comment as for Dinitrogen monoxide)
- Nickel [emissions to air, low. pop.]: 1.45e-11 kg; lognormal SD95 27.9
  (same comment as for Tin)
- Nitrogen [emissions to water, river]: 1.64e-6 kg; lognormal SD95 3.87
  (same comment as for Dinitrogen monoxide)
- Nitrate [emissions to water, river]: 0.00022 kg; lognormal SD95 3.81
  (same comment as for Dinitrogen monoxide)
- Copper [emissions to water, groundwater, long-term]: 5e-6 kg; lognormal SD95 10.3
  (same comment as for Sulfate)
- Heat, waste [emissions to water, groundwater, long-term]: 41 MJ; lognormal SD95 1.25
  burden from long-term decomposition of waste (>100a). Uncertainty calculated from unertainty of the waste composition of this waste, uncertainty in waste decomposition and short-term leaching in sanitary landfill
- Nitrogen oxides [emissions to air, low. pop.]: 3.22e-8 kg; lognormal SD95 8.05
  (same comment as for Tin)
- Mercury [emissions to water, river]: 4.34e-12 kg; lognormal SD95 25.5
  (same comment as for Dinitrogen monoxide)
- Particulates, < 2.5 um [emissions to air, low. pop.]: 3.96e-7 kg; lognormal SD95 5.16
  (same comment as for Tin)
- Iron [emissions to air, high. pop.]: 4.66e-13 kg; lognormal SD95 12.9
  (same comment as for Dinitrogen monoxide)
- Iron [emissions to air, low. pop.]: 2.58e-12 kg; lognormal SD95 31.7
  (same comment as for Tin)
- Ammonium, ion [emissions to water, groundwater, long-term]: 0.00199 kg; lognormal SD95 3.84
  (same comment as for Sulfate)
- Arsenic [emissions to air, high. pop.]: 3.54e-13 kg; lognormal SD95 19.9
  (same comment as for Dinitrogen monoxide)
- BOD5, Biological Oxygen Demand [emissions to water, groundwater, long-term]: 0.0546 kg; lognormal SD95 3.94
  (same comment as for Sulfate)
- Cobalt [emissions to water, groundwater, long-term]: 4.29e-7 kg; lognormal SD95 13.3
  (same comment as for Sulfate)
- DOC, Dissolved Organic Carbon [emissions to water, groundwater, long-term]: 0.211 kg; lognormal SD95 3.94
  (same comment as for Sulfate)
- Heat, waste [emissions to water, river]: 0.00442 MJ; lognormal SD95 6.1
  (same comment as for Quicklime, milled, packed, at plant)
- Lead [emissions to water, river]: 6.48e-12 kg; lognormal SD95 25.2
  (same comment as for Dinitrogen monoxide)
- Sulfur dioxide [emissions to air, low. pop.]: 5.22e-5 kg; lognormal SD95 6.8
  (same comment as for Tin)
- Carbon monoxide, fossil [emissions to air, high. pop.]: 4.46e-7 kg; lognormal SD95 6.57
  (same comment as for Dinitrogen monoxide)
- Chromium [emissions to air, low. pop.]: 9.97e-15 kg; lognormal SD95 47.2
  (same comment as for Tin)
- Vanadium [emissions to water, river]: 1.34e-7 kg; lognormal SD95 11.5
  (same comment as for Dinitrogen monoxide)
- Molybdenum [emissions to air, high. pop.]: 5.82e-13 kg; lognormal SD95 21.1
  (same comment as for Dinitrogen monoxide)
- Heat, waste [emissions to air, low. pop.]: 0.113 MJ; lognormal SD95 4.04
  (same comment as for Tin)
- Silicon [emissions to water, groundwater, long-term]: 1.15e-7 kg; lognormal SD95 97.3
  (same comment as for Sulfate)
- Copper [emissions to water, river]: 6.35e-11 kg; lognormal SD95 22.3
  (same comment as for Dinitrogen monoxide)
- Carbon monoxide, fossil [emissions to air, low. pop.]: 1.18e-6 kg; lognormal SD95 7.53
  (same comment as for Tin)
- Ammonium, ion [emissions to water, river]: 6.05e-5 kg; lognormal SD95 4.14
  (same comment as for Dinitrogen monoxide)
- Ammonia [emissions to air, high. pop.]: 1.11e-7 kg; lognormal SD95 4.04
  (same comment as for Dinitrogen monoxide)
- Vanadium [emissions to air, high. pop.]: 1.3e-11 kg; lognormal SD95 11.9
  (same comment as for Dinitrogen monoxide)
- Molybdenum [emissions to water, river]: 3.49e-10 kg; lognormal SD95 20.7
  (same comment as for Dinitrogen monoxide)
- Aluminium [emissions to water, river]: 2.1e-10 kg; lognormal SD95 17.7
  (same comment as for Dinitrogen monoxide)
- Selenium [emissions to water, groundwater, long-term]: 5.64e-8 kg; lognormal SD95 19.1
  (same comment as for Sulfate)
- Silicon [emissions to air, low. pop.]: 7.5e-13 kg; lognormal SD95 35
  (same comment as for Tin)
- Nickel [emissions to air, high. pop.]: 9.88e-16 kg; lognormal SD95 14.7
  (same comment as for Dinitrogen monoxide)
- Methane, fossil [emissions to air, high. pop.]: 1.36e-6 kg; lognormal SD95 6.46
  (same comment as for Dinitrogen monoxide)
- Arsenic [emissions to water, river]: 1.11e-9 kg; lognormal SD95 19.3
  (same comment as for Dinitrogen monoxide)
- BOD5, Biological Oxygen Demand [emissions to water, river]: 4.8e-5 kg; lognormal SD95 6.12
  (same comment as for Dinitrogen monoxide)
- Sodium [emissions to water, groundwater, long-term]: 3.36e-5 kg; lognormal SD95 8.16
  (same comment as for Sulfate)
- Chromium [emissions to water, river]: 6.26e-14 kg; lognormal SD95 26.4
  (same comment as for Dinitrogen monoxide)
- Phosphorus [emissions to air, high. pop.]: 1.42e-12 kg; lognormal SD95 18.8
  (same comment as for Dinitrogen monoxide)
- Cyanide [emissions to air, high. pop.]: 3.13e-9 kg; lognormal SD95 4.62
  (same comment as for Dinitrogen monoxide)
- Iron [emissions to water, river]: 5.23e-9 kg; lognormal SD95 15.9
  (same comment as for Dinitrogen monoxide)
- Phosphate [emissions to water, groundwater, long-term]: 8.3e-8 kg; lognormal SD95 251
  (same comment as for Sulfate)
- Aluminium [emissions to water, groundwater, long-term]: 7e-6 kg; lognormal SD95 9.9
  (same comment as for Sulfate)
- Mercury [emissions to air, high. pop.]: 2.3e-17 kg; lognormal SD95 26.4
  (same comment as for Dinitrogen monoxide)
- Chromium VI [emissions to water, river]: 2.09e-11 kg; lognormal SD95 25.8
  (same comment as for Dinitrogen monoxide)
- Calcium [emissions to air, low. pop.]: 1.95e-12 kg; lognormal SD95 32.7
  (same comment as for Tin)
- Phosphate [emissions to water, river]: 2.41e-9 kg; lognormal SD95 18.4
  (same comment as for Dinitrogen monoxide)
- Molybdenum [emissions to water, groundwater, long-term]: 2.21e-7 kg; lognormal SD95 15.3
  (same comment as for Sulfate)
- Cobalt [emissions to air, high. pop.]: 2.1e-17 kg; lognormal SD95 20.8
  (same comment as for Dinitrogen monoxide)
- Lead [emissions to water, groundwater, long-term]: 1e-6 kg; lognormal SD95 12.2
  (same comment as for Sulfate)
- Selenium [emissions to air, low. pop.]: 5.27e-14 kg; lognormal SD95 42.3
  (same comment as for Tin)
- Silicon [emissions to air, high. pop.]: 6.56e-12 kg; lognormal SD95 18.3
  (same comment as for Dinitrogen monoxide)
- Iron [emissions to water, groundwater, long-term]: 5.26e-6 kg; lognormal SD95 27.8
  (same comment as for Sulfate)
- Lead [emissions to air, low. pop.]: 1.96e-14 kg; lognormal SD95 45.1
  (same comment as for Tin)
- Nitrite [emissions to water, groundwater, long-term]: 0.000108 kg; lognormal SD95 3.84
  (same comment as for Sulfate)
- Heat, waste [emissions to air, high. pop.]: 0.00445 MJ; lognormal SD95 3.45
  (same comment as for Quicklime, milled, packed, at plant)
- Calcium [emissions to air, high. pop.]: 1.28e-12 kg; lognormal SD95 16.8
  (same comment as for Dinitrogen monoxide)
- Selenium [emissions to water, river]: 1.41e-10 kg; lognormal SD95 22.5
  (same comment as for Dinitrogen monoxide)
- Copper [emissions to air, high. pop.]: 1.34e-15 kg; lognormal SD95 23.4
  (same comment as for Dinitrogen monoxide)
- Tin [emissions to water, river]: 2.19e-9 kg; lognormal SD95 17
  (same comment as for Dinitrogen monoxide)
- Vanadium [emissions to air, low. pop.]: 6.59e-11 kg; lognormal SD95 24.7
  (same comment as for Tin)
- Chromium [emissions to air, high. pop.]: 1e-18 kg; lognormal SD95 27.7
  (same comment as for Dinitrogen monoxide)
- Calcium [emissions to water, groundwater, long-term]: 5.99e-6 kg; lognormal SD95 10.1
  (same comment as for Sulfate)
- Silicon [emissions to water, river]: 1.8e-10 kg; lognormal SD95 18.2
  (same comment as for Dinitrogen monoxide)
- Arsenic [emissions to air, low. pop.]: 1.76e-11 kg; lognormal SD95 27.6
  (same comment as for Tin)
- Mercury [emissions to water, groundwater, long-term]: 2e-8 kg; lognormal SD95 16
  (same comment as for Sulfate)
- Nitrate [emissions to water, groundwater, long-term]: 0.000209 kg; lognormal SD95 3.83
  (same comment as for Sulfate)
- Cobalt [emissions to water, river]: 7.02e-10 kg; lognormal SD95 19.2
  (same comment as for Dinitrogen monoxide)
- Tin [emissions to water, groundwater, long-term]: 8.9e-5 kg; lognormal SD95 7.22
  (same comment as for Sulfate)
- Carbon dioxide, fossil [emissions to air, low. pop.]: 0.0208 kg; lognormal SD95 3.39
  (same comment as for Tin)
- Nitrite [emissions to water, river]: 1.27e-6 kg; lognormal SD95 5.45
  (same comment as for Dinitrogen monoxide)

## Sampling procedure
Landfill model based on observed leachate concentrations in literature. Extrapolated to 60'000 years heeding chemical characteristics. Initial waste composition from various literature sources.

## Uncertainty adjustments
uncertainty of waste input composition data derived from generic formula GSD(c) = N*ln(c)+1. Minimal long-term emissions are the emissions until the carbonate buffer in the landfill is used up. Mean long-term emissions are the emissions until the next glacial period occurs (in 60'000a) and the landfill is eroded. Maximal long-term emissions are the complete emissions of all landfilled material (except Cr).

## Sources
- Doka G., 2009, 2009 - LCI waste treatment services - Doka, Final report ecoinvent data v2.0, 13, Swiss Centre for LCI, Doka LCA, Duebendorf and St. Gallen, CH
Doka G. (2007) Life Cycle Inventories of Waste Treatment Services. Final report ecoinvent data v2.0. Volume: 13. Swiss Centre for LCI, Empa - TSL. Dübendorf, CH.
Type: Separate publication
Source: CD-ROM
First author: Doka G.
Year: 2007
Title of anthology: Final report ecoinvent data v2.0
Place of publication: Dübendorf, CH
Publisher: Swiss Centre for LCI, Empa - TSL
Volume No: 13

## Validation
Proof reading validation: Passed. Calculation for standard deviation 95 of, i.e., infrastructure, ; Other validation: none;
