# Ethanol from wheat straw pellets

Dataset: EcoSpold 1, unit process
Functional unit: 1 kg
Category: fuels / biofuels\Ethanol\Transformation
Geography: RER
Time period: 2020-01 to 2020-12
Generated by: Romain Sacchi
accessRestrictedTo: 3
copyright: False

## General comment
Inventories on first, second and third generation biofuels production.Based on Masters thesis at PSI in 2018. Has not been thoroughly peer reviewed, though datasets have been used in several peer reviewed publications. Original source: Life Cycle Assessment of Biofuels in EU/CH, F. Cozzolini 2018, PSI.

## Time period
Base technology year of 2020

## Reference product
- Ethanol from wheat straw pellets [RER]: 1 kg

## Inputs from technosphere
All rows: lognormal SD95 1.26103
- Farming and supply of wheat straw [RER]: 3.35 kg
  Uncertainty from pedigree matrix: (3, 5, 3, 1, 1, 3)
- Ammonia, liquid, at regional storehouse [CH]: 0.00621 kg
  Uncertainty from pedigree matrix: (3, 5, 3, 1, 1, 3)
- Ammonium sulphate, as N, at regional storehouse [RER]: 0.00239 kg
  Uncertainty from pedigree matrix: (3, 5, 3, 1, 1, 3)
- Calcium chloride, CaCl2, at plant [RER]: 0.000683 kg
  Uncertainty from pedigree matrix: (3, 5, 3, 1, 1, 3)
- Magnesium sulphate, at plant [RER]: 0.000512 kg
  Uncertainty from pedigree matrix: (3, 5, 3, 1, 1, 3)
- Quicklime, milled, packed, at plant [CH]: 0.0283 kg
  Uncertainty from pedigree matrix: (3, 5, 3, 1, 1, 3)
- Sodium chloride, powder, at plant [RER]: 0.0052 kg
  Uncertainty from pedigree matrix: (3, 5, 3, 1, 1, 3)
- Sodium hydroxide, 50% in H2O, production mix, at plant [RER]: 0.0712 kg
  Uncertainty from pedigree matrix: (3, 5, 3, 1, 1, 3)
- Sulphur dioxide, liquid, at plant [RER]: 0.000705 kg
  Uncertainty from pedigree matrix: (3, 5, 3, 1, 1, 3)
- Transport, freight, rail [RER]: 0.381 tkm
  Uncertainty from pedigree matrix: (3, 5, 3, 1, 1, 3)
- Transport, barge tanker [RER]: 0.153 tkm
  Uncertainty from pedigree matrix: (3, 5, 3, 1, 1, 3)
- Transport, freight, lorry, 16t-32t gross weight, fleet average [RER]: 0.33, 0.161 tkm (2 entries)
  Uncertainty from pedigree matrix: (3, 5, 3, 1, 1, 3)
- Transport, transoceanic tanker [OCE]: 1.12 tkm
  Uncertainty from pedigree matrix: (3, 5, 3, 1, 1, 3)
- Electricity, medium voltage, production ENTSO-E, at grid [ENTSO-E]: 0.00626, 0.0253 kWh (2 entries)
  Uncertainty from pedigree matrix: (3, 5, 3, 1, 1, 3)

## Emissions to nature
- Carbon dioxide, biogenic [emissions to air, unspecified]: 3.18 kg; lognormal SD95 1.26103
  Uncertainty from pedigree matrix: (3, 5, 3, 1, 1, 3)
- Dinitrogen monoxide [emissions to air, unspecified]: 2.63e-5 kg; lognormal SD95 1.26103
  Uncertainty from pedigree matrix: (3, 5, 3, 1, 1, 3)
- Methane, biogenic [emissions to air, unspecified]: 0.000131 kg; lognormal SD95 1.26103
  Uncertainty from pedigree matrix: (3, 5, 3, 1, 1, 3)

## Sources
- Sacchi R., Bauer C., 2023, 2023 - LCI on-road vehicles - Sacchi, PSI, Villigen, CH
doi: 10.5281/ZENODO.5156043
