# Transmission network, long-distance

Dataset: EcoSpold 1, unit process, infrastructure
Functional unit: 1 km
Category: electricity / distribution
Geography: UCTE
Time period: 2000-01 to 2000-12
Share of production covered: 0 %
Generated by: René Itten
accessRestrictedTo: 0
copyright: true

## General comment
This data set reflects the Swiss electricity transmission grid on the high voltage level including underground cables, aerial lines and transformers in the year 2011;

## Included processes
This data set includes the material use of the infrastructure for electricity transmission on the medium voltage level.

## Technology
Electricity transmission infrastructure

## Reference product
- Transmission network, long-distance [UCTE]: 1 km
  Union for the Co-ordination of Transmission of Electricity

## Inputs from technosphere
- Transmission network, electricity, high voltage [CH]: 1 km; lognormal SD95 3
  (1,1,1,1,1,1,BU:3); Assumption; replaced by high voltage transmission network

## Sampling procedure
Literature

## Sources
- Frischknecht R., Itten R., Flury K., 2012, 2012 - GHG emis. from Swiss elec. mixes - Frischknecht, Project reports, 401, ESU-services Ltd., Uster, CH
Itten, R., Frischknecht, R. (2012) Life Cycle Inventories of electricity mixes. Project reports. Volume: 401. ESU-services Ltd.. Uster, CH.
Type: Separate publication
First author: Itten, R.
Other authors: Frischknecht, R.
Year: 2012
Title of anthology: Project reports
Place of publication: Uster, CH
Publisher: ESU-services Ltd.
Volume No: 401

## Validation
Proof reading validation: 09.12.2013; Other validation: \\Server\E\ESU-Docs\Projektablage\401 Update Strommix v3.0\EcoSpold\Stromnetz\[401-calculations-electricity-grid-CH-v2.3.xlsx]X-Process;
