# xx Sulphite pulp, bleached, at plant

Dataset: EcoSpold 1, unit process
Functional unit: 1 kg
Category: material, obsolete / paper + board, obsolete\pulp, obsolete
Geography: RER
Time period: 2000-01 to 2000-12
Production volume: Total European market sulphite pulp production in 2000: 1101 kt
Generated by: Roland Hischier
accessRestrictedTo: 0
copyright: true

## Included processes
This module includes the production of bleached sulphite pulp - including transports to the pulp mill, wood handling, chemical pulping and bleaching, drying process, energy production on-site, recovery cycles of chemicals and internal waste water treatment.; Geography: Data from a small European producer and from the finnish database used as European average data.

## Technology
Mix of modern Ca-bisulphite and Mg-sulphite bleaching technology.

## Reference product
- xx Sulphite pulp, bleached, at plant [RER]: 1 kg
  Europe

## Inputs from technosphere
- Pulpwood, birch, sustainable forest management, measured as solid wood under bark, at forest road [SE]: 0.000326 m3; lognormal SD95 1.14
  (2,3,1,3,1,4); average from finnish DB, SE-EPA and 1 site
- Electricity, medium voltage, production ENTSO-E, at grid: 0.0825 kWh; lognormal SD95 1.14
  (2,3,1,3,1,4); average from finnish DB, SE-EPA and 1 site
- Secondary sulphur, at refinery [RER]: 0.0256 kg; lognormal SD95 1.14
  (2,3,1,3,1,4); average from finnish DB, SE-EPA and 1 site
- Pulpwood, pine, sustainable forest management, measured as solid wood under bark, at forest road [SE]: 0.000705 m3
  (2,3,1,3,1,4); average from finnish DB, SE-EPA and 1 site; DS
- Pulp plant [RER]: 5e-11 p; lognormal SD95 3.05
  (4,na,na,na,na,na); assumption
- Pulpwood, spruce, sustainable forest management, measured as solid wood under bark, at forest road [DE]: 0.00203 m3; lognormal SD95 1.14
  (2,3,1,3,1,4); average from finnish DB, SE-EPA and 1 site
- Disposal, textiles, soiled, 25% water, to municipal incineration [CH]: 0.00078 kg; lognormal SD95 1.1
  (2,3,1,3,1,3); average Swedish data from SE-EPA report
- Sodium chlorate, powder, at plant [RER]: 0.0006 kg; lognormal SD95 1.14
  (2,3,1,3,1,4); average from finnish DB, SE-EPA and 1 site
- Disposal, plastics, mixture, 15.3% water, to municipal incineration [CH]: 0.00756 kg; lognormal SD95 1.1
  (2,3,1,3,1,3); average Swedish data from SE-EPA report
- Magnesium oxide, at plant [RER]: 0.0065 kg; lognormal SD95 1.14
  (2,3,1,3,1,4); average from finnish DB, SE-EPA and 1 site
- Limestone, milled, loose, at plant [CH]: 0.0521 kg; lognormal SD95 1.14
  (2,3,1,3,1,4); average from finnish DB, SE-EPA and 1 site
- Diesel, at regional storage [RER]: 0.00024 kg; lognormal SD95 1.14
  (2,3,1,3,1,4); average from finnish DB, SE-EPA and 1 site
- Sulphuric acid, liquid, at plant [RER]: 0.0004 kg; lognormal SD95 1.14
  (2,3,1,3,1,4); average from finnish DB, SE-EPA and 1 site
- Pulpwood, beech, sustainable forest management, measured as solid wood under bark, at forest road [DE]: 0.000468 m3; lognormal SD95 1.14
  (2,3,1,3,1,4); average from finnish DB, SE-EPA and 1 site
- Disposal, ash from paper prod. sludge, 0% water, to residual material landfill [CH]: 0.00294 kg; lognormal SD95 1.1
  (2,3,1,3,1,3); average Swedish data from SE-EPA report
- Wood chips, from industry, mixed, burned in furnace 300kW [CH]: 13.5 MJ; lognormal SD95 1.14
  (2,3,1,3,1,4); average from finnish DB, SE-EPA and 1 site
- Disposal, sludge from pulp and paper production, 25% water, to sanitary landfill [CH]: 0.0104 kg; lognormal SD95 1.1
  (2,3,1,3,1,3); average Swedish data from SE-EPA report
- Disposal, steel, 0% water, to municipal incineration [CH]: 0.00084 kg; lognormal SD95 1.1
  (2,3,1,3,1,3); average Swedish data from SE-EPA report
- Disposal, green liquor dregs, 25% water, to residual material landfill [CH]: 0.0036 kg; lognormal SD95 1.1
  (2,3,1,3,1,3); average Swedish data from SE-EPA report
- Heavy fuel oil, burned in industrial furnace 1MW, non-modulating [RER]: 1.5 MJ; lognormal SD95 1.14
  (2,3,1,3,1,4); average from finnish DB, SE-EPA and 1 site
- Oxygen, liquid, at plant [RER]: 0.0119 kg; lognormal SD95 1.14
  (2,3,1,3,1,4); average from finnish DB, SE-EPA and 1 site
- Hydrogen peroxide, 50% in H2O, at plant [RER]: 0.0257 kg; lognormal SD95 1.14
  (2,3,1,3,1,4); average from finnish DB, SE-EPA and 1 site
- Disposal, wood ash mixture, pure, 0% water, to sanitary landfill [CH]: 0.0447 kg; lognormal SD95 1.1
  (2,3,1,3,1,3); average Swedish data from SE-EPA report
- Electricity, medium voltage, production NORDEL, at grid [NORDEL]: 0.0575 kWh; lognormal SD95 1.14
  (2,3,1,3,1,4); average from finnish DB, SE-EPA and 1 site
- Disposal, wood untreated, 20% water, to municipal incineration [CH]: 0.00042 kg; lognormal SD95 1.1
  (2,3,1,3,1,3); average Swedish data from SE-EPA report
- Sulphur dioxide, liquid, at plant [RER]: 0.0268 kg; lognormal SD95 1.14
  (2,3,1,3,1,4); average from finnish DB, SE-EPA and 1 site
- Chlorine dioxide, at plant [RER]: 0.0016 kg; lognormal SD95 1.14
  (2,3,1,3,1,4); average from finnish DB, SE-EPA and 1 site
- Light fuel oil, burned in industrial furnace 1MW, non-modulating [RER]: 0.00426 MJ; lognormal SD95 1.14
  (2,3,1,3,1,4); average from finnish DB, SE-EPA and 1 site
- Disposal, municipal solid waste, 22.9% water, to sanitary landfill [CH]: 0.0038 kg; lognormal SD95 1.1
  (2,3,1,3,1,3); average Swedish data from SE-EPA report
- Sodium hydroxide, 50% in H2O, production mix, at plant [RER]: 0.0424 kg; lognormal SD95 1.14
  (2,3,1,3,1,4); average from finnish DB, SE-EPA and 1 site
- Pulpwood, spruce, sustainable forest management, measured as solid wood under bark, at forest road [SE]: 0.000705 m3
  (2,3,1,3,1,4); average from finnish DB, SE-EPA and 1 site; DS
- Transport, freight, rail [RER]: 0.231 tkm; lognormal SD95 2.09
  (4,5,na,na,na,na); standard distances
- Transport, freight, lorry, fleet average [RER]: 0.4 tkm; lognormal SD95 2.09
  (4,5,na,na,na,na); standard distances
- Disposal, paper, 11.2% water, to municipal incineration [CH]: 0.0024 kg; lognormal SD95 1.1
  (2,3,1,3,1,3); average Swedish data from SE-EPA report

## Inputs from nature
- Water, cooling, unspecified natural origin/m3 [resources, in water]: 0.057 m3; lognormal SD95 1.13
  (1,4,1,3,1,3); based on filled in questionnaire from 1 site
- Water, unspecified natural origin/m3 [resources, in water]: 0.075 m3; lognormal SD95 1.14
  (2,3,1,3,1,4); average from finnish DB, SE-EPA and 1 site

## Emissions to nature
- Sulfate [emissions to water, river]: 0.0235 kg; lognormal SD95 1.53
  (2,3,1,3,1,4); average from finnish DB, SE-EPA and 1 site
- Sulfur dioxide [emissions to air, high. pop.]: 0.00245 kg; lognormal SD95 1.14
  (2,3,1,3,1,4); process emission average from finnish DB, SE-EPA and 1 site
- Nitrogen oxides [emissions to air, high. pop.]: 0.00143 kg; lognormal SD95 1.53
  (2,3,1,3,1,4); process emission average from finnish DB, SE-EPA and 1 site
- AOX, Adsorbable Organic Halogen as Cl [emissions to water, river]: 0.0002 kg; lognormal SD95 1.53
  (2,3,1,3,1,4); average from finnish DB, SE-EPA and 1 site
- Phosphorus [emissions to water, river]: 4e-5 kg; lognormal SD95 1.53
  (2,3,1,3,1,4); average from finnish DB, SE-EPA and 1 site
- COD, Chemical Oxygen Demand [emissions to water, river]: 0.0534 kg; lognormal SD95 1.53
  (2,3,1,3,1,4); average from finnish DB, SE-EPA and 1 site
- Suspended solids, unspecified [emissions to water, river]: 0.0051 kg; lognormal SD95 1.53
  (2,3,1,3,1,4); average from finnish DB, SE-EPA and 1 site
- Heat, waste [emissions to air, high. pop.]: 0.504 MJ; lognormal SD95 1.14
  (2,3,1,3,1,4); calculated from electricity input
- BOD5, Biological Oxygen Demand [emissions to water, river]: 0.00421 kg; lognormal SD95 1.53
  (2,3,1,3,1,4); average from finnish DB, SE-EPA and 1 site
- Nitrogen [emissions to water, river]: 0.00051 kg; lognormal SD95 1.53
  (2,3,1,3,1,4); average from finnish DB, SE-EPA and 1 site
- Water [emissions to water, unspecified]: 54.15, 71.25 kg (2 entries); lognormal SD95 2.5196
  (5,5,5,5,5,BU:1.05); All uncertainty-values set to 5.0 by default. Balance of input water

## Sources
- Hischier R., 2007, 2007 - LCI packagings and graphical papers - Hischier, Final report ecoinvent data v2.0, 11, Swiss Centre for LCI, Empa - TSL, Duebendorf and St. Gallen, CH
Hischier R. (2007) Life Cycle Inventories of Packaging and Graphical Paper. Final report ecoinvent data v2.0. Volume: 11. Swiss Centre for LCI, Empa - TSL. Dübendorf, CH.
Type: Measurement on site
Source: CD-ROM
First author: Hischier R.
Year: 2007
Title of anthology: Final report ecoinvent data v2.0
Place of publication: Dübendorf, CH
Publisher: Swiss Centre for LCI, Empa - TSL
Volume No: 11

## Validation
Proof reading validation: Passed; Other validation: none;
