# Ethanol, 95% in H2O, from sugarcane molasses, at sugar refinery

Dataset: EcoSpold 1, unit process
Functional unit: 1 kg
Category: fuels / biofuels\ethanol
Geography: BR
Time period: 2000-01 to 2000-12
Production volume: Production of sugar was 26.6 Mt in Brazil in 2004-2005
Share of production covered: 0 %
Generated by: Edgard Gnansounou
accessRestrictedTo: 0
copyright: true

## General comment
Inventory refers to the production of 1 kg sugar, respectively 1 kg of ethanol (95% w/w dry basis, i.e. 1.05 kg hydrated ethanol 95% wet basis), 1 kg of excess bagasse (wet basis, 79% dry matter), 1 kWh of electricity and 1 kg of vinasse. The multioutput-process 'sugarcane, in sugar refinery' delivers the co-products 'sugar, from sugarcane, at sugar refinery' and 'ethanol, 95% in H2O, from sugarcane molasses, at sugar refinery', 'bagasse, from sugarcane, at sugar refinery', 'electricity, bagasse, sugarcane, at sugar refinery' and 'vinasse, from sugarcane molasses, at sugar refinery'. Economic allocation with allocation factor for common sugar production stages of 80-85% to sugar, 10-11% to ethanol. Allocation according to carbon balance for CO2.;

## Included processes
This dataset includes the transport of sugarcane to the sugar refinery and the processing of sugarcane to sugar, ethanol (95% w/w), bagasse (79% dry matter, excess), excess electricity and vinasse from ethanol production. System boundary is at the sugar refinery. Treatment of waste effluents is not included (most wastewater is spread over the fields nearby). Packaging is not included.

## Geography
Data is from various sugar and ethanol producers in Brazil; some data is adapted from sugar producer in CH

## Technology
Juice extraction is performed through milling (not diffusion). The juice is then purified and crystallized to sugar according to standard processes. Ethanol is produced by standard fermentation and distillation techniques. Energy supply is done by combustion of the bagasse resulting from the extraction stage. The two main products are sugar and ethanol.

## Time period
Data from 1994 to 2006, current technology for the production of ethanol from sugarcane

## Reference product
- Ethanol, 95% in H2O, from sugarcane molasses, at sugar refinery [BR]: 1 kg
  BRAZIL

## Inputs from technosphere
- Limestone, milled, loose, at plant [CH]: 0.29023 kg; lognormal SD95 1.2674
  (2,4,1,5,1,5); Industrial data from Brazil, for sugarcane milling
- Ethanol fermentation plant [CH]: 4.194e-10 p; lognormal SD95 3.0735
  (2,4,1,5,1,5); Ethanol specific infrastructure, given ethanol plant characteristics
- Transport, freight, lorry, fleet average [RER]: 0.34651 tkm; lognormal SD95 2.0646
  (2,4,1,3,1,5); Industrial data from Brazil, for sugarcane delivery to sugar refinery; includes delivery of raw materials according to ecoinvent guidelines, adapted to Brazilian conditions
- Disposal, wood ash mixture, pure, 0% water, to landfarming [CH]: 0.0035122 kg; lognormal SD95 1.3451
  (4,4,2,5,1,5); Adapted from the dataset 'wood chips, in cogen 6400kWth, wood', according to actual water, carbon and energy content of the fuel (pressed sorghum bagasse)
- Treatment, sewage, to wastewater treatment, class 2 [CH]: 2.094e-5 m3; lognormal SD95 1.3451
  (same comment as for Disposal, wood ash mixture, pure, 0% water, to landfarming)
- Lubricating oil, at plant [RER]: 0.00024424 kg; lognormal SD95 1.2674
  (2,4,1,5,1,5); Average consumption of limestone in a sugar refinery, global value
- Sodium chloride, powder, at plant [RER]: 0.00010909 kg; lognormal SD95 1.3451
  (same comment as for Disposal, wood ash mixture, pure, 0% water, to landfarming)
- Soda, powder, at plant [RER]: 0.003306 kg; lognormal SD95 1.3286
  (2,4,1,3,3,5); etha+ project Alcosuisse, industrial data
- Disposal, wood ash mixture, pure, 0% water, to sanitary landfill [CH]: 0.0070511 kg; lognormal SD95 1.3451
  (same comment as for Disposal, wood ash mixture, pure, 0% water, to landfarming)
- Ammonium sulphate, as N, at regional storehouse [RER]: 0.0088123 kg; lognormal SD95 1.3286
  (2,4,1,3,3,5); etha+ project Alcosuisse, industrial data
- Chemicals organic, at plant [GLO]: 0.0010364 kg; lognormal SD95 1.3286
  (2,4,1,3,3,5); etha+ project Alcosuisse, industrial data
- Transport, freight, lorry, 7.5t-16t gross weight, fleet average [CH]: 0.023876 tkm; lognormal SD95 2.0646
  (2,4,1,3,1,5); Industrial data from Brazil, for sugarcane delivery to sugar refinery
- Cogen unit 6400kWth, wood burning, building [CH]: 6.4125e-9 p; lognormal SD95 3.117
  (same comment as for Disposal, wood ash mixture, pure, 0% water, to landfarming)
- Cogen unit 6400kWth, wood burning, common components for heat+electricity [CH]: 2.5676e-8 p; lognormal SD95 3.117
  (same comment as for Disposal, wood ash mixture, pure, 0% water, to landfarming)
- Tap water, at user [RER]: 21.2122 kg; lognormal SD95 1.2491
  (4,3,1,5,1,3); Average consumption of water in a sugar refinery in Brazil, literature survey
- Disposal, used mineral oil, 10% water, to hazardous waste incineration [CH]: 8.7273e-5 kg; lognormal SD95 1.3451
  (same comment as for Disposal, wood ash mixture, pure, 0% water, to landfarming)
- Chemicals inorganic, at plant [GLO]: 0.0012798 kg; lognormal SD95 1.2426
  (2,4,1,2,1,5); Data from sugar producer in Switzerland
- Chlorine, liquid, production mix, at plant [RER]: 8.7273e-6 kg; lognormal SD95 1.3451
  (same comment as for Disposal, wood ash mixture, pure, 0% water, to landfarming)
- Sugar refinery [GLO]: 1.4926e-10 p; lognormal SD95 3.0612
  (2,4,1,2,1,5); Sugar-specific infrastructure, given sugar refinery characteristics
- Disposal, wood ash mixture, pure, 0% water, to municipal incineration [CH]: 0.0035122 kg; lognormal SD95 1.3451
  (same comment as for Disposal, wood ash mixture, pure, 0% water, to landfarming)
- Cogen unit 6400kWth, wood burning, components for electricity only [CH]: 2.5676e-8 p; lognormal SD95 3.117
  (same comment as for Disposal, wood ash mixture, pure, 0% water, to landfarming)
- Sulphuric acid, liquid, at plant [RER]: 0.056577 kg; lognormal SD95 1.3286
  (2,4,1,3,3,5); etha+ project Alcosuisse, industrial data
- Sulphur dioxide, liquid, at plant [RER]: 0.0044767 kg; lognormal SD95 1.2435
  (3,3,1,3,1,5); Data from sugar and ethanol producers in Brazil
- Hard coal coke, at plant [RER]: 0.024031 MJ; lognormal SD95 1.2426
  (2,4,1,2,1,5); Data from sugar producer in Switzerland
- Disposal, municipal solid waste, 22.9% water, to municipal incineration [CH]: 8.7273e-5 kg; lognormal SD95 1.3451
  (same comment as for Disposal, wood ash mixture, pure, 0% water, to landfarming)
- Sugarcane, at farm [BR]: 11.9379 kg; lognormal SD95 1.0882
  (2,1,1,1,1,3); Average sugar and ethanol yields in Brazil, literature survey
- Water, decarbonised, at plant [RER]: 0.02094 kg; lognormal SD95 1.3451
  (same comment as for Disposal, wood ash mixture, pure, 0% water, to landfarming)
- Diammonium phosphate, as N, at regional storehouse [RER]: 0.013218 kg; lognormal SD95 1.3286
  (2,4,1,3,3,5); etha+ project Alcosuisse, industrial data
- Ammonia, liquid, at regional storehouse [RER]: 2.1818e-7 kg; lognormal SD95 1.3451
  (same comment as for Disposal, wood ash mixture, pure, 0% water, to landfarming)

## Emissions to nature
- Fluorine [emissions to air, high. pop.]: 1.3304e-6 kg; lognormal SD95 1.6486
  (same comment as for Disposal, wood ash mixture, pure, 0% water, to landfarming)
- Chromium VI [emissions to air, high. pop.]: 1.0643e-9 kg; lognormal SD95 5.1335
  (same comment as for Disposal, wood ash mixture, pure, 0% water, to landfarming)
- Sulfur dioxide [emissions to air, high. pop.]: 6.6253e-5 kg; lognormal SD95 1.3451
  (same comment as for Disposal, wood ash mixture, pure, 0% water, to landfarming)
- Phosphorus [emissions to air, high. pop.]: 7.9824e-6 kg; lognormal SD95 1.6486
  (same comment as for Disposal, wood ash mixture, pure, 0% water, to landfarming)
- Methane, biogenic [emissions to air, high. pop.]: 1.0356e-5 kg; lognormal SD95 1.6486
  (same comment as for Disposal, wood ash mixture, pure, 0% water, to landfarming)
- Cadmium [emissions to air, high. pop.]: 1.8625e-8 kg; lognormal SD95 5.1335
  (same comment as for Disposal, wood ash mixture, pure, 0% water, to landfarming)
- Dinitrogen monoxide [emissions to air, high. pop.]: 6.1197e-5 kg; lognormal SD95 1.6486
  (same comment as for Disposal, wood ash mixture, pure, 0% water, to landfarming)
- NMVOC, non-methane volatile organic compounds, unspecified origin [emissions to air, high. pop.]: 1.4555e-5 kg; lognormal SD95 1.6486
  (same comment as for Disposal, wood ash mixture, pure, 0% water, to landfarming)
- m-Xylene [emissions to air, high. pop.]: 2.8633e-6 kg; lognormal SD95 1.6486
  (same comment as for Disposal, wood ash mixture, pure, 0% water, to landfarming)
- Nitrogen oxides [emissions to air, high. pop.]: 0.0023414 kg; lognormal SD95 1.6486
  (same comment as for Disposal, wood ash mixture, pure, 0% water, to landfarming)
- Ammonia [emissions to air, high. pop.]: 4.6297e-5 kg; lognormal SD95 1.4115
  (same comment as for Disposal, wood ash mixture, pure, 0% water, to landfarming)
- Particulates, < 2.5 um [emissions to air, high. pop.]: 0.0010713 kg; lognormal SD95 3.117
  (same comment as for Disposal, wood ash mixture, pure, 0% water, to landfarming)
- Sodium [emissions to air, high. pop.]: 3.459e-5 kg; lognormal SD95 5.1335
  (same comment as for Disposal, wood ash mixture, pure, 0% water, to landfarming)
- Dioxin, 2,3,7,8 Tetrachlorodibenzo-p- [emissions to air, high. pop.]: 7.3968e-13 kg; lognormal SD95 3.117
  (same comment as for Disposal, wood ash mixture, pure, 0% water, to landfarming)
- Magnesium [emissions to air, high. pop.]: 9.6054e-6 kg; lognormal SD95 5.1335
  (same comment as for Disposal, wood ash mixture, pure, 0% water, to landfarming)
- Calcium [emissions to air, high. pop.]: 0.00015565 kg; lognormal SD95 5.1335
  (same comment as for Disposal, wood ash mixture, pure, 0% water, to landfarming)
- PAH, polycyclic aromatic hydrocarbons [emissions to air, high. pop.]: 2.6247e-7 kg; lognormal SD95 3.117
  (same comment as for Disposal, wood ash mixture, pure, 0% water, to landfarming)
- Acetaldehyde [emissions to air, high. pop.]: 1.623e-6 kg; lognormal SD95 1.6486
  (same comment as for Disposal, wood ash mixture, pure, 0% water, to landfarming)
- Carbon monoxide, biogenic [emissions to air, high. pop.]: 0.00016702 kg; lognormal SD95 5.1335
  (same comment as for Disposal, wood ash mixture, pure, 0% water, to landfarming)
- Hydrocarbons, aliphatic, unsaturated [emissions to air, high. pop.]: 7.3968e-5 kg; lognormal SD95 1.6486
  (same comment as for Disposal, wood ash mixture, pure, 0% water, to landfarming)
- Chromium [emissions to air, high. pop.]: 1.0537e-7 kg; lognormal SD95 5.1335
  (same comment as for Disposal, wood ash mixture, pure, 0% water, to landfarming)
- Chlorine [emissions to air, high. pop.]: 4.7895e-6 kg; lognormal SD95 1.6486
  (same comment as for Disposal, wood ash mixture, pure, 0% water, to landfarming)
- Formaldehyde [emissions to air, high. pop.]: 3.102e-6 kg; lognormal SD95 1.6486
  (same comment as for Disposal, wood ash mixture, pure, 0% water, to landfarming)
- Manganese [emissions to air, high. pop.]: 4.5499e-6 kg; lognormal SD95 5.1335
  (same comment as for Disposal, wood ash mixture, pure, 0% water, to landfarming)
- Potassium [emissions to air, high. pop.]: 0.00062262 kg; lognormal SD95 5.1335
  (same comment as for Disposal, wood ash mixture, pure, 0% water, to landfarming)
- Benzene, ethyl- [emissions to air, high. pop.]: 7.1583e-7 kg; lognormal SD95 1.6486
  (same comment as for Disposal, wood ash mixture, pure, 0% water, to landfarming)
- Phenol, pentachloro- [emissions to air, high. pop.]: 1.9327e-10 kg; lognormal SD95 1.6486
  (same comment as for Disposal, wood ash mixture, pure, 0% water, to landfarming)
- Benzo(a)pyrene [emissions to air, high. pop.]: 1.193e-8 kg; lognormal SD95 3.117
  (same comment as for Disposal, wood ash mixture, pure, 0% water, to landfarming)
- Carbon dioxide, biogenic [emissions to air, high. pop.]: 3.3707 kg; lognormal SD95 1.05
  (1,1,1,1,1,1); Calculation, to close carbon balance
- Nickel [emissions to air, high. pop.]: 1.5965e-7 kg; lognormal SD95 5.1335
  (same comment as for Disposal, wood ash mixture, pure, 0% water, to landfarming)
- Hydrocarbons, aliphatic, alkanes, unspecified [emissions to air, high. pop.]: 2.1714e-5 kg; lognormal SD95 1.6486
  (same comment as for Disposal, wood ash mixture, pure, 0% water, to landfarming)
- Benzene [emissions to air, high. pop.]: 2.1714e-5 kg; lognormal SD95 1.6486
  (same comment as for Disposal, wood ash mixture, pure, 0% water, to landfarming)
- Zinc [emissions to air, high. pop.]: 7.9824e-6 kg; lognormal SD95 5.1335
  (same comment as for Disposal, wood ash mixture, pure, 0% water, to landfarming)
- Copper [emissions to air, high. pop.]: 5.8538e-7 kg; lognormal SD95 5.1335
  (same comment as for Disposal, wood ash mixture, pure, 0% water, to landfarming)
- Bromine [emissions to air, high. pop.]: 1.5965e-6 kg; lognormal SD95 5.1335
  (same comment as for Disposal, wood ash mixture, pure, 0% water, to landfarming)
- Mercury [emissions to air, high. pop.]: 7.9824e-9 kg; lognormal SD95 5.1335
  (same comment as for Disposal, wood ash mixture, pure, 0% water, to landfarming)
- Carbon dioxide, fossil [emissions to air, high. pop.]: 0.0012798 kg; lognormal SD95 1.05
  (1,1,1,1,1,1); Calculation, according to consumption of hard coal
- Toluene [emissions to air, high. pop.]: 7.1583e-6 kg; lognormal SD95 1.6486
  (same comment as for Disposal, wood ash mixture, pure, 0% water, to landfarming)
- Arsenic [emissions to air, high. pop.]: 2.6608e-8 kg; lognormal SD95 5.1335
  (same comment as for Disposal, wood ash mixture, pure, 0% water, to landfarming)
- Benzene, hexachloro- [emissions to air, high. pop.]: 1.7179e-13 kg; lognormal SD95 3.117
  (same comment as for Disposal, wood ash mixture, pure, 0% water, to landfarming)
- Heat, waste [emissions to air, high. pop.]: 32.7922 MJ; lognormal SD95 1.3117
  (2,3,1,1,3,5); ecoinvent guidelines, calculation from electricity consumption and energy balance
- Lead [emissions to air, high. pop.]: 6.6253e-7 kg; lognormal SD95 5.1335
  (same comment as for Disposal, wood ash mixture, pure, 0% water, to landfarming)

## Sampling procedure
Data is from various sugar and ethanol producers in Brazil (incl. literature data) and from sugar producer in CH

## Extrapolations
Direct emissions (resulting from the combustion of sugarcane bagasse) are based on the the combustion of wood chips (without emission control), according to the corresponding dry matter content, carbon content and energy content.

## Sources
- Jungbluth N., Chudacoff M., Dauriat A., Dinkel F., Doka G., Faist Emmenegger M., Gnansounou E., Kljun N., Spielmann M., Stettler C., Sutter J., 2007, 2007 - LCI bioenergy - Jungbluth, Final report ecoinvent data v2.0, 17, Swiss Centre for LCI, ESU-services Ltd., Duebendorf and Uster, CH
Jungbluth N., Chudacoff M., Dauriat A., Dinkel F., Doka G., Faist Emmenegger M., Gnansounou E., Kljun N., Spielmann M., Stettler C., Sutter J. (2007) Life Cycle Inventories of Bioenergy. Final report ecoinvent data v2.0. Volume: 17. Swiss Centre for LCI, ESU. Duebendorf and Uster, CH.
Type: Measurement on site
Source: CD-ROM
First author: Jungbluth N.
Other authors: Chudacoff M., Dauriat A., Dinkel F., Doka G., Faist Emmenegger M., Gnansounou E., Kljun N., Spielmann M., Stettler C., Sutter J.
Year: 2007
Title of anthology: Final report ecoinvent data v2.0
Place of publication: Duebendorf and Uster, CH
Publisher: Swiss Centre for LCI, ESU
Volume No: 17

## Validation
Proof reading validation: Passed.; Other validation: none;
