# Inductor, miniature RF chip type, MRFI, at plant

Dataset: EcoSpold 1, unit process
Functional unit: 1 kg
Category: electronics / component
Geography: GLO
Time period: 2023-01 to 2029-12
Generated by: Lugas Raka Adrianto, Maulana Permana Ajie, Didier Beloin-Saint-Pierre
accessRestrictedTo: 0
copyright: false

## General comment
The data represent a typical miniature RF chip type inductor, used in the information and communication technology. Material data are taken from datasheets of producers of such inductors. Infrastructure and production efforts are based on own assumptions. The dataset represents 1 kg of inductors with a weight of 16.8 miligram/unit. No major updates were made in 2023 - according to recent product sheets from manufacturers, the composition of inductors remains similar. Production efforts dataset is update in a separate module. It is assumed that only global primary metals are used in the inventory.;

## Included processes
This dataset covers raw material input and production efforts for the production of currently used miniature RF chip type inductors.

## Geography
Data represent a global valuable composition of miniature RF chip type inductors.

## Technology
average production comprising the following steps: core mounting; epxoy-curing; winding; welding; molding; marking; bending; testing and final control.

## Reference product
- Inductor, miniature RF chip type, MRFI, at plant [GLO]: 1 kg
  Global

## Inputs from technosphere
- Aluminium oxide, at plant [RER]: 0.99574 kg; lognormal SD95 1.33
  (1,4,4,4,2,5,BU:1.03); average from company information
- Copper, primary, at refinery [GLO]: 0.16102 kg; lognormal SD95 1.33
  (1,4,4,4,2,5,BU:1.03); average from company information
- Epoxy resin, liquid, at plant [RER]: 0.18737 kg; lognormal SD95 1.33
  (1,4,4,4,2,5,BU:1.03); average from company information
- Gold, primary, at refinery [GLO]: 0.001184 kg; lognormal SD95 1.33
  (1,4,4,4,2,5,BU:1.03); average from company information
- Nickel, 99.5%, at plant [GLO]: 0.032856 kg; lognormal SD95 1.33
  (1,4,4,4,2,5,BU:1.03); average from company information
- Production efforts, inductors [GLO]: 1 kg; lognormal SD95 1.65
  (3,4,4,3,4,5,BU:1.03); rough estimation
- Quicklime, milled, packed, at plant [CH]: 0.022644 kg; lognormal SD95 1.33
  (1,4,4,4,2,5,BU:1.03); average from company information
- Silica sand, at plant [DE]: 0.07918 kg; lognormal SD95 1.33
  (1,4,4,4,2,5,BU:1.03); average from company information

## Sampling procedure
literature

## Extrapolations
see Geography & Technology

## Sources
- Raka Adrianto L., Permana Ajie M., Beloin-Saint-Pierre D., 2024, 2024 - LCI ICT sector - Raka Adrianto, Empa, St. Gallen, CH

## Validation
Proof reading validation: Passed, Other validation: none, Validator: Mischa Zschokke, Company: Carbotech, Country: CH
