# xx 4-methyl-2-pentanone, at plant

Dataset: EcoSpold 1, unit process
Functional unit: 1 kg
Category: material, obsolete / chemicals, obsolete\organic, obsolete
Geography: RER
Time period: 2000-01 to 2005-12
Production volume: Total production in the world is around 380.000 tons.
Share of production covered: 100 %
Generated by: Juergen Sutter
accessRestrictedTo: 0
copyright: true

## General comment
The process "4-methyl-2-pentanone, at plant, RER" is modelled for the production of 4-methyl-2-pentanone from acetone in Europe. Raw materials, auxilliaries, energy consumptions and emissions are modelled with data from US-production. Infrastructure and transports are calculated with standard values.;
CAS number: 000108-10-1;
Formula: C6H12O;
Synonyms: methyl isobutyl ketone;

## Included processes
Production of 4-methyl-2-pentanone including materials, energy uses, infrastructure and emissions.

## Geography
The inventory is modelled for Europe.

## Technology
Hydrgenation of acetone

## Time period
Time of publications

## Reference product
- xx 4-methyl-2-pentanone, at plant [RER]: 1 kg
  Europe

## Inputs from technosphere
- Hydrogen, liquid, at plant [RER]: 0.0216 kg; lognormal SD95 1.0744
  (1,2,1,1,1,3); Overcash 1998 - 2004
- Transport, freight, lorry, fleet average [RER]: 0.14337 tkm; lognormal SD95 2.095
  (4,5,na,na,na,na); Standard distances
- Heat, unspecific, in chemical plant [RER]: 4.45 MJ; lognormal SD95 1.0744
  (1,2,1,1,1,3); Overcash 1998 - 2004
- Chemical plant, organics [RER]: 4e-10 p; lognormal SD95 3.0909
  (4,5,na,na,na,na); Estimation
- Acetone, liquid, at plant [RER]: 1.4229 kg; lognormal SD95 1.0744
  (1,2,1,1,1,3); Overcash 1998 - 2004
- Transport, freight, rail [RER]: 0.8559 tkm; lognormal SD95 2.095
  (4,5,na,na,na,na); Standard distances
- Electricity, medium voltage, production ENTSO-E, at grid: 0.725 kWh; lognormal SD95 1.0744
  (1,2,1,1,1,3); Overcash 1998 - 2004
- Water, deionised, at plant [CH]: 0.21208 kg; lognormal SD95 1.0744
  (1,2,1,1,1,3); Overcash 1998 - 2004

## Inputs from nature
- Water, cooling, unspecified natural origin/m3 [resources, in water]: 0.063392 m3; lognormal SD95 1.0744
  (1,2,1,1,1,3); Overcash 1998 - 2004

## Emissions to nature
- Methyl pentane [emissions to water, river]: 0.00455 kg; lognormal SD95 1.0744
  (1,2,1,1,1,3); Overcash 1998 - 2004
- BOD5, Biological Oxygen Demand [emissions to water, river]: 0.551 kg; lognormal SD95 1.5051
  (1,2,1,1,1,3); Calculated from the water emissions
- 2-Propanol [emissions to air, high. pop.]: 1e-5 kg; lognormal SD95 1.0744
  (1,2,1,1,1,3); Overcash 1998 - 2004
- COD, Chemical Oxygen Demand [emissions to water, river]: 0.551 kg; lognormal SD95 1.5051
  (1,2,1,1,1,3); Calculated from the water emissions
- Pentane, 2-methyl- [emissions to air, high. pop.]: 5e-5 kg; lognormal SD95 1.0744
  (1,2,1,1,1,3); Overcash 1998 - 2004
- 2-Propanol [emissions to water, river]: 0.00114 kg; lognormal SD95 1.0744
  (1,2,1,1,1,3); Overcash 1998 - 2004
- TOC, Total Organic Carbon [emissions to water, river]: 0.156 kg; lognormal SD95 1.5051
  (1,2,1,1,1,3); Calculated from the water emissions
- 4-Methyl-2-pentanone [emissions to water, river]: 0.07368 kg; lognormal SD95 1.0744
  (1,2,1,1,1,3); Overcash 1998 - 2004
- 4-Methyl-2-pentanol [emissions to water, river]: 0.00038 kg; lognormal SD95 1.0744
  (1,2,1,1,1,3); Overcash 1998 - 2004
- Acetone [emissions to water, river]: 0.12807 kg; lognormal SD95 3.0038
  (1,2,1,1,1,3); Overcash 1998 - 2004
- Diisobutyl ketone [emissions to water, river]: 0.02462 kg; lognormal SD95 1.0744
  (1,2,1,1,1,3); Overcash 1998 - 2004
- Heat, waste [emissions to air, high. pop.]: 2.61 MJ; lognormal SD95 1.0744
  (1,2,1,1,1,3); Calculated from the electricity input
- 4-Methyl-2-pentanone [emissions to air, high. pop.]: 0.01074 kg; lognormal SD95 1.0744
  (1,2,1,1,1,3); Overcash 1998 - 2004
- Hydrogen [emissions to air, high. pop.]: 0.00025 kg; lognormal SD95 1.5051
  (1,2,1,1,1,3); Overcash 1998 - 2004
- DOC, Dissolved Organic Carbon [emissions to water, river]: 0.156 kg; lognormal SD95 1.5051
  (1,2,1,1,1,3); Calculated from the water emissions
- Acetone [emissions to air, high. pop.]: 0.07578 kg; lognormal SD95 1.5051
  (1,2,1,1,1,3); Overcash 1998 - 2004
- Water [emissions to water, unspecified]: 60.2224 kg; lognormal SD95 2.5196
  (5,5,5,5,5,BU:1.05); All uncertainty-values set to 5.0 by default. Balance of input water

## Sampling procedure
Literature data

## Extrapolations
Transports are modelled with standard distances.

## Sources
- Sutter J., 2007, 2007 - LCI petrochemical solvents - Sutter, Final report ecoinvent Data v2.0, 22, Swiss Centre for LCI, ETH, Duebendorf and Uster, CH
Sutter, J., 0 (2007) Life Cycle Inventories of Petrochemical Solvents. Final report ecoinvent Data v2.0. Editors: 0. 0. Volume: 22. Issue: 0. Swiss Centre for LCI, ETHZ. Duebendorf and St. Gallen, CH.
Type: Measurement on site
Source: CD-ROM
First author: Sutter, J.
Other authors: 0
Year: 2007
Name of editors: 0
Title of anthology: Final report ecoinvent Data v2.0
Place of publication: Duebendorf and St. Gallen, CH
Publisher: Swiss Centre for LCI, ETHZ
Journal: 0
Volume No: 22
Issue No: 0

## Validation
Proof reading validation: passed.; Other validation: none;
