# Cerium concentrate, 60% cerium oxide, at plant

Dataset: EcoSpold 1, unit process
Functional unit: 1 kg
Category: chemicals / inorganic
Geography: CN
Time period: 2000-01 to 2005-12
Share of production covered: 45 %
Generated by: Alex Primas
accessRestrictedTo: 0
copyright: true

## General comment
In- and outputs are calculated for rare earth oxide processing with sulphuric acid as used in China. Infrastructure approximated with a chemical plant. Some inputs of auxiliary materials are calculated according to stoechiometry. Rough estimation for energy consumption, solvent use and waste generation.;

## Included processes
The process includes raw materials, processing chemicals and processing energy, emissions to water and wastes. Transport and infrastructure are estimated. The multi output-process "rare earth oxide production from bastnasite" delivers the co-products "cerium concentrate, 60% cerium oxide, at plant", "lanthanum oxide, at plant", "neodymium oxide, at plant","praseodymium oxide, at plant", "samarium europium gadolinium concentrate 94% rare earth oxide, at plant". The revenue is used as allocation scheme.

## Geography
Production in China considered. Process applicable for other regions if a similar process is used.

## Technology
Process includes roasting and cracking of the rare earth concentrate with 98% sulphuric acid at 500°C in a rotary kiln. For the following separation of the different rare earth oxides solvent extraction (SX) is used. The obtained rare earth oxide product has a purity of up to 99.9%.

## Reference product
- Cerium concentrate, 60% cerium oxide, at plant [CN]: 1 kg
  CHINA

## Inputs from technosphere
- Hydrochloric acid, 30% in H2O, at plant [RER]: 0.20081 kg; lognormal SD95 1.4447
  (4,5,nA,nA,3,5); stoechiometric calculated value
- Chemical plant, organics [RER]: 3.0791e-9 p; lognormal SD95 3.1835
  (4,5,2,2,3,5); chemical plant used as proxy
- Kerosene, at refinery [RER]: 0.89249 kg; lognormal SD95 1.4797
  (4,5,3,5,3,5); estimation on solvent use
- Disposal, solvents mixture, 16.5% water, to hazardous waste incineration [CH]: 1.33874 kg; lognormal SD95 1.4797
  (4,5,3,5,3,5); estimated input and process route
- Electricity, medium voltage, at grid [CN]: 0.15619 kWh; lognormal SD95 2.3738
  (4,5,5,3,5,5); estimation data from oil extraction
- Heavy fuel oil, burned in industrial furnace 1MW, non-modulating [RER]: 0.65598 MJ; lognormal SD95 1.691
  (4,5,3,3,4,5); estimation based on phosphoric acid production
- Sulphuric acid, liquid, at plant [RER]: 0.58012 kg; lognormal SD95 1.4447
  (4,5,nA,nA,3,5); stoechiometric calculated value
- Transport, freight, rail [RER]: 1.89954 tkm; lognormal SD95 2.095
  (4,5,nA,nA,nA,nA); standard distances used
- Disposal, sulfidic tailings, off-site [GLO]: 0.87911 kg; lognormal SD95 1.4797
  (4,5,3,5,3,5); estimated process for solid wastes
- Sodium hydroxide, 50% in H2O, production mix, at plant [RER]: 0.31237 kg; lognormal SD95 1.4447
  (4,5,nA,nA,3,5); stoechiometric calculated value
- Chemicals organic, at plant [GLO]: 0.69168 kg; lognormal SD95 1.4797
  (4,5,3,5,3,5); estimation on solvent use
- Rare earth concentrate, 70% REO, from bastnasite, at beneficiation [CN]: 1.59 kg; lognormal SD95 1.0907
  (2,2,1,1,1,3); input 90% yield assumed
- Transport, freight, lorry, fleet average [RER]: 0.34584 tkm; lognormal SD95 2.095
  (4,5,nA,nA,nA,nA); standard distances used

## Emissions to nature
- Iron [emissions to water, river]: 3.8746e-6 kg; lognormal SD95 5.3933
  (3,5,3,3,4,5); data only from one source
- Arsenic [emissions to water, river]: 1.9155e-7 kg; lognormal SD95 5.3933
  (3,5,3,3,4,5); data only from one source
- Thorium-232 [emissions to water, river]: 0.045486 kBq; lognormal SD95 3.5931
  (4,5,5,3,4,5); estimation, high uncertainty
- Carbon dioxide, fossil [emissions to air, low. pop.]: 0.38154 kg; lognormal SD95 1.4447
  (4,5,nA,nA,3,5); calculated from input
- Sulfur dioxide [emissions to air, low. pop.]: 0.00040162 kg; lognormal SD95 1.4447
  (4,5,nA,nA,3,5); calculated from input, assumed emission control
- Nickel [emissions to water, river]: 4.7414e-7 kg; lognormal SD95 5.3933
  (3,5,3,3,4,5); data only from one source
- Mercury [emissions to water, river]: 9.4828e-11 kg; lognormal SD95 5.3933
  (3,5,3,3,4,5); data only from one source
- Cadmium [emissions to water, river]: 2.0483e-8 kg; lognormal SD95 3.3428
  (3,5,3,3,4,5); data only from one source
- Antimony [emissions to water, river]: 2.1071e-6 kg; lognormal SD95 5.3933
  (3,5,3,3,4,5); data only from one source
- Barium [emissions to water, river]: 2.0293e-7 kg; lognormal SD95 5.3933
  (3,5,3,3,4,5); data only from one source
- Magnesium [emissions to water, river]: 0.00081364 kg; lognormal SD95 5.3933
  (3,5,3,3,4,5); data only from one source
- Chloride [emissions to water, river]: 0.002742 kg; lognormal SD95 3.3428
  (3,5,3,3,4,5); data only from one source
- Sulfate [emissions to water, river]: 0.00041098 kg; lognormal SD95 1.9028
  (3,5,3,3,4,5); data only from one source
- Heat, waste [emissions to air, low. pop.]: 0.56227 MJ; lognormal SD95 1.691
  (4,5,3,3,4,5); calculated from inputs
- Cobalt [emissions to water, river]: 1.1246e-6 kg; lognormal SD95 3.3428
  (3,5,3,3,4,5); data only from one source
- Radium-226 [emissions to water, river]: 0.0089897 kBq; lognormal SD95 3.5931
  (4,5,5,3,4,5); estimation, high uncertainty
- Molybdenum [emissions to water, river]: 1.8966e-7 kg; lognormal SD95 5.3933
  (3,5,3,3,4,5); data only from one source
- Aluminium [emissions to water, river]: 1.3613e-5 kg; lognormal SD95 5.3933
  (3,5,3,3,4,5); data only from one source
- Selenium [emissions to water, river]: 1.9155e-7 kg; lognormal SD95 5.3933
  (3,5,3,3,4,5); data only from one source
- Hydrogen fluoride [emissions to air, low. pop.]: 0.0024097 kg; lognormal SD95 1.7251
  (4,5,nA,nA,3,5); calculated from input, assumed emission control
- Thallium [emissions to water, river]: 9.4828e-7 kg; lognormal SD95 5.3933
  (3,5,3,3,4,5); data only from one source
- Beryllium [emissions to water, river]: 2.0862e-8 kg; lognormal SD95 5.3933
  (3,5,3,3,4,5); data only from one source
- Chromium [emissions to water, river]: 1.1e-7 kg; lognormal SD95 3.3428
  (3,5,3,3,4,5); data only from one source
- Vanadium [emissions to water, river]: 1.8966e-7 kg; lognormal SD95 5.3933
  (3,5,3,3,4,5); data only from one source
- Cyanide [emissions to water, river]: 1.7069e-8 kg; lognormal SD95 3.3428
  (3,5,3,3,4,5); data only from one source
- Suspended solids, unspecified [emissions to water, river]: 0.0017979 kg; lognormal SD95 1.9028
  (3,5,3,3,4,5); data only from one source
- Manganese [emissions to water, river]: 3.9452e-5 kg; lognormal SD95 5.3933
  (3,5,3,3,4,5); data only from one source
- Silver [emissions to water, river]: 1.9724e-7 kg; lognormal SD95 5.3933
  (3,5,3,3,4,5); data only from one source
- Uranium-238 [emissions to water, river]: 0.00012046 kBq; lognormal SD95 3.5931
  (4,5,5,3,4,5); estimation, high uncertainty
- Fluoride [emissions to water, river]: 5.7276e-6 kg; lognormal SD95 1.9028
  (3,5,3,3,4,5); data only from one source
- Lead [emissions to water, river]: 9.5207e-7 kg; lognormal SD95 5.3933
  (3,5,3,3,4,5); data only from one source
- Zinc [emissions to water, river]: 3.0724e-6 kg; lognormal SD95 5.3933
  (3,5,3,3,4,5); data only from one source
- Sulfide [emissions to water, river]: 6.4483e-8 kg; lognormal SD95 1.9028
  (3,5,3,3,4,5); data only from one source
- Copper [emissions to water, river]: 4.1724e-7 kg; lognormal SD95 3.3428
  (3,5,3,3,4,5); data only from one source
- TOC, Total Organic Carbon [emissions to water, river]: 2.0705e-5 kg; lognormal SD95 1.9028
  (3,5,3,3,4,5); data only from one source

## Sampling procedure
based on literature

## Sources
- Althaus H.-J., Chudacoff M., Hellweg S., Hischier R., Jungbluth N., Osses M., Primas A., 2007, 2007 - LCI chemicals - Althaus, Final report ecoinvent data v2.0, 8, Swiss Centre for LCI, Empa - TSL, ETH, ESU-services Ltd., Chudacoff Oekoscience, Duebendorf, CH
Althaus H.-J., Chudacoff M., Hischier R., Jungbluth N., Osses M., Primas A. (2007) Life Cycle Inventories of Chemicals. Final report ecoinvent data v2.0. Volume: 8. Swiss Centre for LCI, Empa - TSL. Dübendorf, CH.
Type: Measurement on site
Source: CD-ROM
First author: Althaus H.-J.
Other authors: Chudacoff M., Hischier R., Jungbluth N., Osses M., Primas A.
Year: 2007
Title of anthology: Final report ecoinvent data v2.0
Place of publication: Dübendorf, CH
Publisher: Swiss Centre for LCI, Empa - TSL
Volume No: 8

## Validation
Proof reading validation: passed; Other validation: none;
