# Disposal, cation exchange resin f. water, 50% water, to municipal incineration

Dataset: EcoSpold 1, unit process
Functional unit: 1 kg
Category: waste management / municipal incineration
Geography: CH
Time period: 2000-01 to 2000-12
Generated by: Gabor Doka
accessRestrictedTo: 0
copyright: true

## General comment
This dataset represents the activity of waste disposal of spent cation exchange resin from potable water production in a municipal solid waste incinerator (MSWI) Recommended use of this dataset: disposal of used ion exchange resins *for potable water production*. Resins used of other purifications can have significantly more toxic composition, depending on use. Waste composition (wet, in ppm): upper heating value 11.35 MJ/kg; lower heating value 1.474 MJ/kg; H2O 496920; O 110250; H 19060; C 254640; S 73640; N 569.57; P n.a.; B n.a.; Cl 331.94; Br 258.64; F 4.178; I n.a.; Ag n.a.; As 0.54001; Ba 53.006; Cd 6.8422; Co 8.9784; Cr 11.614; Cu 31.537; Hg 0.24133; Mn 22.714; Mo n.a.; Ni 5.8546; Pb 4.379; Sb 12.212; Se 0.59685; Sn 7.448; V 81.897; Zn 244.71; Be 0.14211; Sc n.a.; Sr 25.153; Ti 284.22; Tl 0.11369; W n.a.; Si n.a.; Fe 1058.9; Ca 33440; Al 56.843; K 940; Mg 2650; Na 5380; Share of carbon in waste that is biogenic 0%. Share of metals in waste not oxidised and bulk-recyclable (exclude very small or thin parts) Iron: 0%; Alu: 0%; Copper: 0%. One kg of this waste produces 0.1774 kg of slag and 0.08701 kg of residues, which are landfilled. Additional solidification with 0.0348 kg of cement. Net energy production: 0MJ/kg electric energy and 0.04MJ/kg thermal energy. Recovery of metal scrap to recycling: 0g iron scrap, 0g aluminium scrap, 0g copper scrap.;;

## Included processes
Waste incineration from waste reception gate further downstream (excluding transport to the MSWI plant). Waste-specific air and water emisions from incineration, auxiliary material consumption for flue gas cleaning. Short-term emissions to river water and long-term emisisons to ground water from slag compartment (from bottom ash) and residual material landfill (from solidified fly ashes and scrubber slugde). Waste-specific process energy demands for MSWI and net energy generation.

## Geography
Specific to the technology mix encountered in Switzerland in 2010. Well applicable to modern incineration practices in Europe, North America or Japan.

## Technology
average Swiss MSWI plants in 2010 (grate incinerators) with electrostatic precipitator for fly ash (ESP), wet flue gas scrubber and 25% SNCR , 42.77% SCR-high dust , 32.68% SCR-low dust -DeNOx facilities and 0% without Denox (weighted according to mass of burnt waste, representing Swiss average). Efficiency of iron scrap separation from slag : 58%. Efficiency of non-ferrous scrap separation from slag : 31%. Gross electric efficiency technology mix 15.84% and Gross thermal efficiency technology mix 28.51%

## Time period
Waste composition as given in literature reference, theoretical data or other source. Transfer coefficients for modern MSWI.

## Reference product
- Disposal, cation exchange resin f. water, 50% water, to municipal incineration [CH]: 1 kg
  SWITZERLAND

## Inputs from technosphere
- Transport, freight, rail [RER]: 0.056406 tkm; lognormal SD95 1.4112
  Transport services to transport incineration residues to landfills and to transport auxilliary inputs of the incinerator plant. uncertainty calculated from uncertainty in average auxiliary material input, the uncertainty of the waste composition of this waste and the uncertainty in generic transportation distances
- Process-specific burdens, residual material landfill [CH]: 0.087009 kg; lognormal SD95 1.4554
  mass-specific expenditures required for landfilling of incineration residues. uncertainty is calculated from uncertainties in waste composition and transfer coefficients in incinerator
- Hydrochloric acid, 30% in H2O, at plant [RER]: 0.00013256 kg; lognormal SD95 1.6639
  auxilliary inputs for the wastewater treatment stage of the incinerator plant. uncertainty calculated from uncertainty in average HCl input, of transfer coefficients in the incinerator, and the uncertainty of the waste composition of this waste
- Titanium dioxide, production mix, at plant [RER]: 2.1006e-5 kg; lognormal SD95 4.9164
  Input to DeNOx stage (TiO2 catalyst carrier) uncertainty calculated from uncertainty in average DeNOx input, uncertainty in the share of thermal NOx, uncertainty of nitrogen content in average municipal waste and the uncertainty in nitrogen content in *this* waste.
- Iron (III) chloride, 40% in H2O, at plant [CH]: 2.616e-5 kg; lognormal SD95 3.1967
  auxilliary inputs for the wastewater treatment stage of the incinerator plant. uncertainty calculated from uncertainty in average FeCl3 input, of transfer coefficients in the incinerator, and the uncertainty of the waste composition of this waste
- Chromium oxide, flakes, at plant [RER]: 4.287e-7 kg; lognormal SD95 4.9164
  Input to DeNOx stage. uncertainty calculated from uncertainty in average DeNOx input, uncertainty in the share of thermal NOx, uncertainty of nitrogen content in average municipal waste and the uncertainty in nitrogen content in *this* waste.
- Transport, freight, lorry, 16t-32t gross weight, fleet average [CH]: 0.019303 tkm; lognormal SD95 1.2362
  (same comment as for Transport, freight, rail)
- Chemicals inorganic, at plant [GLO]: 0.00050434 kg; lognormal SD95 1.6639
  auxilliary inputs for the wastewater treatment stage of the incinerator plant. Proxy for Polyelectrolyte. uncertainty calculated from uncertainty in average Polyelectrolyte input, of transfer coefficients in the incinerator, and the uncertainty of the waste composition of this waste
- Chemicals organic, at plant [GLO]: 5.7957e-6 kg; lognormal SD95 9.9913
  auxilliary inputs for the wastewater treatment stage of the incinerator plant. Proxy for (pure) Trisodium-trimercapto-s-triazine (CAS 17766-26-6), used as 15% diluted solution, aka TMT15. uncertainty calculated from uncertainty in average TMT15 input, of transfer coefficients in the incinerator, and the uncertainty of the waste composition of this waste
- Natural gas, burned in industrial furnace 1MW [CH]: 0.062698 MJ; lognormal SD95 3.1607
  Input to DeNOx stage, to heat up flue gas in low-dust SCR. uncertainty calculated from uncertainty in average DeNOx input, uncertainty in the share of thermal NOx, uncertainty of nitrogen content in average municipal waste and the uncertainty in nitrogen content in *this* waste.
- Quicklime, milled, packed, at plant [CH]: 0.00020768 kg; lognormal SD95 5.0084
  auxilliary inputs for the flue gas treatment stage of the incinerator plant. uncertainty calculated from uncertainty in average CaO input, of transfer coefficients in the incinerator, and the uncertainty of the waste composition of this waste
- Cement, unspecified, at plant [CH]: 0.034804 kg; lognormal SD95 1.5234
  Cement required for solidification of landfilled residual material. Uncertainty calculated from uncertainty of the waste composition of this waste, of transfer coefficients in the incinerator and of the solidification recipe.
- Residual material landfill facility [CH]: 1.8127e-10 p; lognormal SD95 1.4554
  landfill infrastructure required for landfilling of incineration residues. uncertainty is calculated from uncertainties in waste composition and transfer coefficients in incinerator
- Water, decarbonised, at plant [RER]: 3.2158 kg; lognormal SD95 3.1967
  Incinerator process water used in flue gas scrubber stage. uncertainty calculated from uncertainty in average water input, and the uncertainty of the waste composition of this waste
- Ammonia, liquid, at regional storehouse [CH]: 0.00033528 kg; lognormal SD95 3.1607
  Input to DeNOx stage (100% NH3). uncertainty calculated from uncertainty in average DeNOx input, uncertainty in the share of thermal NOx, uncertainty of nitrogen content in average municipal waste and the uncertainty in nitrogen content in *this* waste.
- Municipal waste incineration plant [CH]: 2.5e-10 p; lognormal SD95 1
  demands per kilogram waste. uncertainty is heeded in the module
- Process-specific burdens, slag compartment [CH]: 0.17688 kg; lognormal SD95 1.4801
  mass-specific expenditures required for landfilling of bottom ash. uncertainty is calculated from uncertainties in waste composition and transfer coefficients in incinerator
- Sodium hydroxide, 50% in H2O, production mix, at plant [RER]: 0.025491 kg; lognormal SD95 1.7721
  auxilliary inputs for the flue gas treatment stage of the incinerator plant. uncertainty calculated from uncertainty in average NaOH input, of transfer coefficients in the incinerator, and the uncertainty of the waste composition of this waste
- Slag compartment [CH]: 3.1445e-10 p; lognormal SD95 1.4801
  landfill infrastructure required for landfilling of bottom ash. uncertainty is calculated from uncertainties in waste composition and transfer coefficients in incinerator
- Disposal, cement, hydrated, 0% water, to residual material landfill [CH]: 0.087009 kg; lognormal SD95 1.5234
  Hydrated cement output for solidification of landfilled residual material. Uncertainty calculated from uncertainty of the waste composition of this waste and transfer coefficients in the incinerator and of the solidification recipe.

## Emissions to nature
- COD, Chemical Oxygen Demand [emissions to water, river]: 0.00029787 kg; lognormal SD95 1.6955
  Emissions to water from waste composition and transfer coefficients in incinerator and landfills. uncertainty is calculated from uncertainties in waste composition and transfer coefficients in incinerator and landfills
- Chromium [emissions to water, river]: 9.0183e-10 kg; lognormal SD95 9.6424
  (same comment as for COD, Chemical Oxygen Demand)
- Selenium [emissions to water, river]: 2.0163e-7 kg; lognormal SD95 9.9135
  (same comment as for COD, Chemical Oxygen Demand)
- Potassium [emissions to water, river]: 0.00020462 kg; lognormal SD95 3.5132
  (same comment as for COD, Chemical Oxygen Demand)
- Bromine [emissions to air, high. pop.]: 1.2919e-7 kg; lognormal SD95 6.4009
  Emission to air from waste composition and transfer coefficients. uncertainty is calculated from uncertainties in waste composition and transfer coefficients in incinerator
- Vanadium [emissions to air, high. pop.]: 1.7369e-6 kg; lognormal SD95 7.3441
  (same comment as for Bromine)
- Copper [emissions to water, river]: 4.0865e-9 kg; lognormal SD95 7.3719
  (same comment as for COD, Chemical Oxygen Demand)
- Antimony [emissions to air, high. pop.]: 9.7823e-12 kg; lognormal SD95 9.9225
  (same comment as for Bromine)
- Copper [emissions to air, high. pop.]: 2.8885e-9 kg; lognormal SD95 8.5264
  (same comment as for Bromine)
- Chloride [emissions to water, river]: 0.00025483 kg; lognormal SD95 5.1015
  (same comment as for COD, Chemical Oxygen Demand)
- Barium [emissions to air, high. pop.]: 2.0805e-7 kg; lognormal SD95 7.84
  (same comment as for Bromine)
- Strontium [emissions to water, river]: 1.5837e-8 kg; lognormal SD95 15.266
  (same comment as for COD, Chemical Oxygen Demand)
- Hydrogen chloride [emissions to air, high. pop.]: 1.8942e-7 kg; lognormal SD95 6.1573
  (same comment as for Bromine)
- Chromium VI [emissions to water, groundwater, long-term]: 1.0654e-6 kg; lognormal SD95 13.648
  Long-term emissions from landfilling of incineration residues. uncertainty is calculated from uncertainties in waste composition and transfer coefficients in incinerator and landfills.
- Tin [emissions to air, high. pop.]: 4.8651e-12 kg; lognormal SD95 10.498
  (same comment as for Bromine)
- Methane, fossil [emissions to air, high. pop.]: 5.5855e-7 kg; lognormal SD95 1.8395
  Incomplete combustion product emitted to air. uncertainty calculated from uncertainty in average operation emissions, and the uncertainty of the flue gas volume from this waste.
- Toluene [emissions to air, high. pop.]: 7.4474e-8 kg; lognormal SD95 1.8395
  (same comment as for Methane, fossil)
- Nickel [emissions to air, high. pop.]: 7.3547e-9 kg; lognormal SD95 10.304
  (same comment as for Bromine)
- Chloride [emissions to water, groundwater, long-term]: 7.6918e-5 kg; lognormal SD95 5.9697
  (same comment as for Chromium VI)
- Nitrate [emissions to water, groundwater, long-term]: 2.0486e-5 kg; lognormal SD95 5.5636
  (same comment as for Chromium VI)
- Aluminium [emissions to water, river]: 6.1516e-9 kg; lognormal SD95 9.1727
  (same comment as for COD, Chemical Oxygen Demand)
- TOC, Total Organic Carbon [emissions to water, river]: 0.00013008 kg; lognormal SD95 1.6972
  (same comment as for COD, Chemical Oxygen Demand)
- Magnesium [emissions to water, river]: 1.2365e-5 kg; lognormal SD95 5.4349
  (same comment as for COD, Chemical Oxygen Demand)
- Iron [emissions to water, groundwater, long-term]: 0.0005342 kg; lognormal SD95 6.1561
  (same comment as for Chromium VI)
- Bromine [emissions to water, river]: 0.00023358 kg; lognormal SD95 3.4378
  (same comment as for COD, Chemical Oxygen Demand)
- Aluminium [emissions to air, high. pop.]: 4.6345e-11 kg; lognormal SD95 8.2369
  (same comment as for Bromine)
- Heat, waste [emissions to air, high. pop.]: 8.93 MJ; lognormal SD95 1.4591
  Waste heat generated from heating value of this waste plus any electricity required to process it. uncertainty is calculated from uncertainties in waste composition and uncertainties in energy efficiency and the uncertainty in internal energy demand
- Barium [emissions to water, groundwater, long-term]: 2.6695e-5 kg; lognormal SD95 21.542
  (same comment as for Chromium VI)
- Iron [emissions to air, high. pop.]: 1.8977e-9 kg; lognormal SD95 5.4289
  (same comment as for Bromine)
- Thallium [emissions to air, high. pop.]: 1.1369e-10 kg; lognormal SD95 15.366
  (same comment as for Bromine)
- Antimony [emissions to water, groundwater, long-term]: 7.7658e-6 kg; lognormal SD95 8.9803
  (same comment as for Chromium VI)
- Manganese [emissions to air, high. pop.]: 4.3379e-9 kg; lognormal SD95 8.8804
  (same comment as for Bromine)
- Aluminium [emissions to water, groundwater, long-term]: 4.1106e-5 kg; lognormal SD95 7.035
  (same comment as for Chromium VI)
- Potassium [emissions to air, high. pop.]: 4.6441e-6 kg; lognormal SD95 5.1984
  (same comment as for Bromine)
- Magnesium [emissions to water, groundwater, long-term]: 0.0023468 kg; lognormal SD95 4.1839
  (same comment as for Chromium VI)
- Sodium [emissions to water, river]: 0.0014618 kg; lognormal SD95 2.5698
  (same comment as for COD, Chemical Oxygen Demand)
- Beryllium [emissions to water, river]: 8.9005e-11 kg; lognormal SD95 21.196
  (same comment as for COD, Chemical Oxygen Demand)
- Fluoride [emissions to water, groundwater, long-term]: 3.7459e-6 kg; lognormal SD95 6.3323
  (same comment as for Chromium VI)
- Particulates, > 2.5 um, and < 10um [emissions to air, high. pop.]: 2.2341e-8 kg; lognormal SD95 2.4527
  (same comment as for Methane, fossil)
- Thallium [emissions to water, groundwater, long-term]: 6.6338e-8 kg; lognormal SD95 10.688
  (same comment as for Chromium VI)
- Mercury [emissions to water, river]: 2.621e-10 kg; lognormal SD95 9.3988
  (same comment as for COD, Chemical Oxygen Demand)
- Carbon dioxide, fossil [emissions to air, high. pop.]: 0.92796 kg; lognormal SD95 1.5563
  (same comment as for Bromine)
- BOD5, Biological Oxygen Demand [emissions to water, river]: 0.00029405 kg; lognormal SD95 1.7083
  (same comment as for COD, Chemical Oxygen Demand)
- Cyanide [emissions to air, high. pop.]: 1.8251e-6 kg; lognormal SD95 11.634
  Nitrogen species emitted to air after DeNOx stage. uncertainty calculated from uncertainty in average N-emissions and uncertainty in the share of thermal NOx and the uncertainty in nitrogen content in *this* waste.
- Titanium [emissions to water, river]: 1.0597e-7 kg; lognormal SD95 4.8396
  (same comment as for COD, Chemical Oxygen Demand)
- Vanadium [emissions to water, river]: 1.3076e-7 kg; lognormal SD95 7.9236
  (same comment as for COD, Chemical Oxygen Demand)
- Strontium [emissions to water, groundwater, long-term]: 2.512e-5 kg; lognormal SD95 8.5014
  (same comment as for Chromium VI)
- Potassium [emissions to water, groundwater, long-term]: 0.00073074 kg; lognormal SD95 3.2308
  (same comment as for Chromium VI)
- Antimony [emissions to water, river]: 4.209e-6 kg; lognormal SD95 9.2746
  (same comment as for COD, Chemical Oxygen Demand)
- DOC, Dissolved Organic Carbon [emissions to water, river]: 0.00013008 kg; lognormal SD95 1.6972
  (same comment as for COD, Chemical Oxygen Demand)
- TOC, Total Organic Carbon [emissions to water, groundwater, long-term]: 0.00075669 kg; lognormal SD95 1.4759
  (same comment as for Chromium VI)
- Benzene, pentachloro- [emissions to air, high. pop.]: 1.9674e-10 kg; lognormal SD95 1.8395
  (same comment as for Methane, fossil)
- Titanium [emissions to air, high. pop.]: 2.358e-7 kg; lognormal SD95 6.3001
  (same comment as for Bromine)
- Cadmium [emissions to water, river]: 6.558e-10 kg; lognormal SD95 8.1114
  (same comment as for COD, Chemical Oxygen Demand)
- Mercury [emissions to water, groundwater, long-term]: 1.5371e-8 kg; lognormal SD95 37.456
  (same comment as for Chromium VI)
- Manganese [emissions to water, groundwater, long-term]: 1.4013e-5 kg; lognormal SD95 18.511
  (same comment as for Chromium VI)
- Phenol, pentachloro- [emissions to air, high. pop.]: 1.6216e-11 kg; lognormal SD95 1.8395
  (same comment as for Methane, fossil)
- Tin [emissions to water, groundwater, long-term]: 2.8505e-6 kg; lognormal SD95 18.835
  (same comment as for Chromium VI)
- BOD5, Biological Oxygen Demand [emissions to water, groundwater, long-term]: 0.0006255 kg; lognormal SD95 1.4759
  (same comment as for Chromium VI)
- Sulfur dioxide [emissions to air, high. pop.]: 0.00078312 kg; lognormal SD95 2.2332
  (same comment as for Bromine)
- Calcium [emissions to water, river]: 0.0003702 kg; lognormal SD95 2.4863
  (same comment as for COD, Chemical Oxygen Demand)
- Arsenic [emissions to water, groundwater, long-term]: 1.6171e-7 kg; lognormal SD95 13.05
  (same comment as for Chromium VI)
- Chromium VI [emissions to water, river]: 3.246e-7 kg; lognormal SD95 9.9531
  (same comment as for COD, Chemical Oxygen Demand)
- NMVOC, non-methane volatile organic compounds, unspecified origin [emissions to air, high. pop.]: 1.6946e-6 kg; lognormal SD95 1.8395
  (same comment as for Methane, fossil)
- Sulfate [emissions to water, groundwater, long-term]: 0.18239 kg; lognormal SD95 1.7317
  (same comment as for Chromium VI)
- Selenium [emissions to water, groundwater, long-term]: 3.8765e-7 kg; lognormal SD95 9.0839
  (same comment as for Chromium VI)
- Cadmium [emissions to air, high. pop.]: 3.4875e-9 kg; lognormal SD95 10.112
  (same comment as for Bromine)
- Mercury [emissions to air, high. pop.]: 6.8427e-9 kg; lognormal SD95 14.213
  (same comment as for Bromine)
- Thallium [emissions to water, river]: 6.9645e-11 kg; lognormal SD95 17.055
  (same comment as for COD, Chemical Oxygen Demand)
- Arsenic [emissions to water, river]: 3.7407e-7 kg; lognormal SD95 11.869
  (same comment as for COD, Chemical Oxygen Demand)
- Ammonia [emissions to air, high. pop.]: 3.9421e-7 kg; lognormal SD95 3.3992
  (same comment as for Cyanide)
- Beryllium [emissions to water, groundwater, long-term]: 1.2988e-7 kg; lognormal SD95 13.954
  (same comment as for Chromium VI)
- Bromine [emissions to water, groundwater, long-term]: 2.4928e-5 kg; lognormal SD95 6.2503
  (same comment as for Chromium VI)
- Dinitrogen monoxide [emissions to air, high. pop.]: 8.495e-6 kg; lognormal SD95 11.634
  (same comment as for Cyanide)
- Nitrogen oxides [emissions to air, high. pop.]: 0.00012483 kg; lognormal SD95 3.3992
  sum of fuel-Nox and thermal-NOx emitted to air after DeNOx stage. uncertainty calculated from uncertainty in average N-emissions and uncertainty in the share of thermal NOx and the uncertainty in nitrogen content in *this* waste.
- Strontium [emissions to air, high. pop.]: 2.5153e-9 kg; lognormal SD95 8.7616
  (same comment as for Bromine)
- Tin [emissions to water, river]: 1.9704e-10 kg; lognormal SD95 16.153
  (same comment as for COD, Chemical Oxygen Demand)
- Cobalt [emissions to air, high. pop.]: 1.6329e-8 kg; lognormal SD95 9.7969
  (same comment as for Bromine)
- Lead [emissions to water, river]: 4.1888e-10 kg; lognormal SD95 8.6485
  (same comment as for COD, Chemical Oxygen Demand)
- COD, Chemical Oxygen Demand [emissions to water, groundwater, long-term]: 0.0019123 kg; lognormal SD95 1.4759
  (same comment as for Chromium VI)
- Cadmium [emissions to water, groundwater, long-term]: 4.9928e-7 kg; lognormal SD95 182.14
  (same comment as for Chromium VI)
- Arsenic [emissions to air, high. pop.]: 4.23e-9 kg; lognormal SD95 13.177
  (same comment as for Bromine)
- Nickel [emissions to water, groundwater, long-term]: 5.6197e-6 kg; lognormal SD95 9.8466
  (same comment as for Chromium VI)
- Iron [emissions to water, river]: 2.7837e-8 kg; lognormal SD95 6.7522
  (same comment as for COD, Chemical Oxygen Demand)
- Chromium [emissions to air, high. pop.]: 1.0142e-8 kg; lognormal SD95 9.4864
  (same comment as for Bromine)
- Vanadium [emissions to water, groundwater, long-term]: 3.8176e-5 kg; lognormal SD95 5.5619
  (same comment as for Chromium VI)
- Copper [emissions to water, groundwater, long-term]: 2.817e-5 kg; lognormal SD95 8.1169
  (same comment as for Chromium VI)
- Sodium [emissions to water, groundwater, long-term]: 0.0038741 kg; lognormal SD95 2.4971
  (same comment as for Chromium VI)
- Titanium [emissions to water, groundwater, long-term]: 8.4965e-5 kg; lognormal SD95 6.9037
  (same comment as for Chromium VI)
- Lead [emissions to water, groundwater, long-term]: 2.1172e-6 kg; lognormal SD95 69.977
  (same comment as for Chromium VI)
- Carbon monoxide, fossil [emissions to air, high. pop.]: 6.3299e-5 kg; lognormal SD95 6.1318
  (same comment as for Methane, fossil)
- Heat, waste [emissions to water, river]: 2.7717 MJ; lognormal SD95 1.4591
  (same comment as for Heat, waste)
- Selenium [emissions to air, high. pop.]: 7.1204e-9 kg; lognormal SD95 13.032
  (same comment as for Bromine)
- Fluoride [emissions to water, river]: 3.1946e-7 kg; lognormal SD95 6.7514
  (same comment as for COD, Chemical Oxygen Demand)
- Cobalt [emissions to water, groundwater, long-term]: 7.3138e-6 kg; lognormal SD95 8.9636
  (same comment as for Chromium VI)
- Sodium [emissions to air, high. pop.]: 4.4171e-5 kg; lognormal SD95 3.8416
  (same comment as for Bromine)
- Hydrogen fluoride [emissions to air, high. pop.]: 2.8187e-8 kg; lognormal SD95 10.605
  (same comment as for Bromine)
- Zinc [emissions to air, high. pop.]: 1.6402e-7 kg; lognormal SD95 6.4516
  (same comment as for Bromine)
- Nickel [emissions to water, river]: 3.9337e-9 kg; lognormal SD95 15.57
  (same comment as for COD, Chemical Oxygen Demand)
- Particulates, < 2.5 um [emissions to air, high. pop.]: 4.4458e-6 kg; lognormal SD95 3.6791
  (same comment as for Methane, fossil)
- Benzene [emissions to air, high. pop.]: 3.7237e-8 kg; lognormal SD95 1.8395
  (same comment as for Methane, fossil)
- Lead [emissions to air, high. pop.]: 3.6077e-10 kg; lognormal SD95 10.758
  (same comment as for Bromine)
- Manganese [emissions to water, river]: 3.5357e-9 kg; lognormal SD95 7.3303
  (same comment as for COD, Chemical Oxygen Demand)
- Benzene, hexachloro- [emissions to air, high. pop.]: 7.7861e-11 kg; lognormal SD95 1.8395
  (same comment as for Methane, fossil)
- Benzo(a)pyrene [emissions to air, high. pop.]: 8.2864e-13 kg; lognormal SD95 3.6791
  (same comment as for Methane, fossil)
- Sulfate [emissions to water, river]: 0.037357 kg; lognormal SD95 1.7343
  (same comment as for COD, Chemical Oxygen Demand)
- DOC, Dissolved Organic Carbon [emissions to water, groundwater, long-term]: 0.00075669 kg; lognormal SD95 1.4759
  (same comment as for Chromium VI)
- Calcium [emissions to water, groundwater, long-term]: 0.024908 kg; lognormal SD95 2.5379
  (same comment as for Chromium VI)
- Zinc [emissions to water, groundwater, long-term]: 7.4415e-5 kg; lognormal SD95 31.324
  (same comment as for Chromium VI)
- Barium [emissions to water, river]: 7.1342e-9 kg; lognormal SD95 9.9954
  (same comment as for COD, Chemical Oxygen Demand)
- Magnesium [emissions to air, high. pop.]: 2.7952e-6 kg; lognormal SD95 4.41
  (same comment as for Bromine)
- Cobalt [emissions to water, river]: 1.6267e-9 kg; lognormal SD95 12.366
  (same comment as for COD, Chemical Oxygen Demand)
- Dioxin, 2,3,7,8 Tetrachlorodibenzo-p- [emissions to air, high. pop.]: 7.4469e-14 kg; lognormal SD95 3.6791
  (same comment as for Methane, fossil)
- Zinc [emissions to water, river]: 2.2078e-8 kg; lognormal SD95 5.3559
  (same comment as for COD, Chemical Oxygen Demand)
- Calcium [emissions to air, high. pop.]: 0.00026317 kg; lognormal SD95 2.6569
  (same comment as for Bromine)
- Nitrate [emissions to water, river]: 7.2606e-6 kg; lognormal SD95 4.1844
  (same comment as for COD, Chemical Oxygen Demand)

## Sampling procedure
fully waste-specific calculation based on literature data for average MSWI operation performance

## Extrapolations
Typical elemental transfer coefficients from current studies for modern MSWI, completed with data from coal power plants and estimates, adapted for inert/burnable waste.

## Uncertainty adjustments
uncertainty of waste input composition data derived from generic formula GSD(c) = N*ln(c)+1

## Sources
- Doka G., 2013, 2013 - Updates LCI waste treatment services - Doka, -, Doka LCA, Zuerich, CH
Doka G. (2013) Updates to Life Cycle Inventories of Waste Treatment Services - part II: waste incineration. Doka LCA. Zurich.
Type: Separate publication
Source: Report to document the 2013 changes to the MSWI incinerator model and datasets (URL: http://www.doka.ch/ecoinventMSWIupdateLCI2013.pdf). To be read with the ecoinvent Nr 13 report (Doka 2009, Life Cycle Inventories of Waste Treatment Services) for ecoinvent v2.2.
First author: Doka G.
Year: 2013
Place of publication: Zurich
Publisher: Doka LCA
Original title: Updates to Life Cycle Inventories of Waste Treatment Services - part II: waste incineration

## Validation
Proof reading validation: Passed.; Other validation: none;
