# Multi-Si wafer, at regional storage

Dataset: EcoSpold 1, unit process
Functional unit: 1 m2
Category: photovoltaic / production of components
Geography: US
Time period: 2018-01 to 2021-12
Generated by: Philippe Stolz
accessRestrictedTo: 0
copyright: true

## General comment
Imports of wafers are not taken into account since domestic wafer production is sufficient to cover cell production.;
Synonyms: Solarmodul, PV-module, cadmium telluride, thin film;

## Included processes
Domestic production and imports of multi-crystalline silicon wafers used in photovoltaic cell production in the US and other American countries. Transport from different world regions to regional storage.

## Geography
Regional supply mix calculated based on data for the worldwide production and consumption.

## Time period
Data refer to 2018

## Reference product
- Multi-Si wafer, at regional storage [US]: 1 m2
  UNITED STATES

## Inputs from technosphere
- Transport, transoceanic freight ship [OCE]: 8.7048 tkm; lognormal SD95 2.095
  (4,5,na,na,na,na); Transport distance CN-EU: 19994 km, CN-US: 20755 km, CN-APAC: 4584 km
- Transport, freight, lorry, fleet average [RER]: 0.02097 tkm; lognormal SD95 2.095
  (4,5,na,na,na,na); Standard distance 50km
- Multi-Si wafer, at plant [CN]: 1 m2; lognormal SD95 1.564
  (5,1,1,1,1,5); Market share Chinese wafers
- Transport, freight, rail [RER]: 0.08388 tkm; lognormal SD95 2.095
  (4,5,na,na,na,na); Standard distance 200km

## Sampling procedure
Survey among market intelligence companies

## Sources
- Frischknecht R., Itten R., Sinha P., de Wild-Scholten M., Zhank J., 2020, 2015 - LCI and LCA photovoltaic systems - Frischknecht, Project report, 174, IEA PVPS Task 12, Petten, NL
Frischknecht R.,, Stolz P., Sinha P., de Wild-Scholten M. (2020) Life Cycle Inventories and Life Cycle Assessments of Photovoltaic Systems. Project report. Volume: 174. IEA PVPS Task 12.
Type: Separate publication
Source: Report
First author: Frischknecht R.,
Other authors: Stolz P., Sinha P., de Wild-Scholten M.
Year: 2020
Title of anthology: Project report
Publisher: IEA PVPS Task 12
Volume No: 174
Original title: Life Cycle Inventories and Life Cycle Assessments of Photovoltaic Systems

## Validation
Proof reading validation: 30.09.2020; Other validation: G:\Projekte laufend\174 Photovoltaic, IEA Task 12\2017 Global supply chain\EcoSpold\[174-photovoltaics-global-supply-chain-v2.5.xlsx]X-Process;
