# Diesel-electric generating set production 10MW

Dataset: EcoSpold 1, unit process, infrastructure
Functional unit: 1 p
Category: mechanical / other energy
Geography: RER
Time period: 2000-01 to 2020-01
Production volume: Not known.
Share of production covered: 100 %
Generated by: Niels Jungbluth
accessRestrictedTo: 0
copyright: true

## General comment
Rough estimation.;

## Included processes
Materials of the generator. Not including manufacturing

## Geography
Not known.

## Technology
Production of equipment.

## Time period
Time of estimation.

## Reference product
- Diesel-electric generating set production 10MW [RER]: 1 p

## Inputs from technosphere
All rows: lognormal SD95 1
- Chromium steel 18/8, at plant [RER]: 9000 kg
- Transport, freight, lorry, 16t-32t gross weight, fleet average [RER]: 20700 tkm
- Copper, at regional storage [RER]: 18000 kg
- Steel, low-alloyed, at plant [RER]: 180000 kg
- Transport, freight, rail [RER]: 124200 tkm

## Sampling procedure
Literature.

## Extrapolations
From single data to European situation.

## Sources
- Meili C., Jungbluth N., Bussa M., 2021, 2021 - LCI crude oil and natural gas extraction - Meili, Project report, 614, ESU-services Ltd., Schaffhausen, CH
Meili C., Jungbluth N., Bussa M. (2021) Life cycle inventories of crude oil and natural gas extraction. Project report. Volume: 614. ESU-services Ltd.. Schaffhausen, CH.
Type: Separate publication
First author: Meili C.
Other authors: Jungbluth N., Bussa M.
Year: 2021
Title of anthology: Project report
Place of publication: Schaffhausen, CH
Publisher: ESU-services Ltd.
Volume No: 614

## Validation
26.05.2021 https://esuservices-my.sharepoint.com/personal/jungbluth_esuservices_onmicrosoft_com/Documents/ESU-intern/565 LCI oil and gas sector CH BAFU/EcoSpold/[EcoSpold-crude-gas exploration and extraction-2020-v3.0.xlsb]X-Process
