# Assembly operation, for lorry

Dataset: EcoSpold 1, unit process
Functional unit: 1 kg
Category: transport systems / road\Vehicle assembly
Geography: RER
Time period: 2020-01 to 2020-12
Generated by: Romain Sacchi
accessRestrictedTo: 0
copyright: False

## General comment
This is the inventory for assembling one kilogram of a 7450 kg heavy MDV/HDV. Based on a MAN TGX Euro 5 TGX 18.440. Includes transport of components to assembly factory. Original source: Wolff et al. 2020, Sustainability, DOI: 10.3390/su12135396.

## Time period
Base technology year of 2020

## Reference product
- Assembly operation, for lorry [RER]: 1 kg

## Inputs from technosphere
All rows: lognormal SD95 1.24511
- Electricity, low voltage, production ENTSO-E, at grid [ENTSO-E]: 0.101 kWh
  Uncertainty from pedigree matrix: (3, 3, 2, 2, 3, 3)
- Heat, at cogen 1MWe lean burn, allocation heat [RER]: 0.657 MJ
  Uncertainty from pedigree matrix: (3, 3, 2, 2, 3, 3)
- Tap water, at user [RER]: 5.65 kg
  Uncertainty from pedigree matrix: (3, 3, 2, 2, 3, 3)
- Transport, freight, lorry, 16t-32t gross weight, fleet average [RER]: 0.1 tkm
  Uncertainty from pedigree matrix: (3, 3, 2, 2, 3, 3)
- Treatment, sewage, from residence, to wastewater treatment, class 2 [CH]: 0.00565 m3
  Uncertainty from pedigree matrix: (3, 3, 2, 2, 3, 3)

## Sources
- Sacchi R., Bauer C., 2023, 2023 - LCI on-road vehicles - Sacchi, PSI, Villigen, CH
doi: 10.5281/ZENODO.5156043
