# Disposal, anion exchange resin f. water, 50% water, to municipal incineration

Dataset: EcoSpold 1, unit process
Functional unit: 1 kg
Category: waste management / municipal incineration
Geography: CH
Time period: 2000-01 to 2000-12
Generated by: Gabor Doka
accessRestrictedTo: 0
copyright: true

## General comment
This dataset represents the activity of waste disposal of spent anion exchange resin from potable water production in a municipal solid waste incinerator (MSWI) Recommended use of this dataset: disposal of used ion exchange resins *for potable water production*. Resins used of other purifications can have significantly more toxic composition, depending on use. Waste composition (wet, in ppm): upper heating value 16.06 MJ/kg; lower heating value 6.081 MJ/kg; H2O 499710; O 70320; H 40160; C 327130; S 23980; N 28640; P 10; B n.a.; Cl 7880; Br n.a.; F n.a.; I n.a.; Ag n.a.; As n.a.; Ba n.a.; Cd 1.592; Co n.a.; Cr n.a.; Cu 16.311; Hg n.a.; Mn n.a.; Mo n.a.; Ni n.a.; Pb 9.2482; Sb n.a.; Se n.a.; Sn 226.21; V n.a.; Zn 34.545; Be n.a.; Sc n.a.; Sr n.a.; Ti n.a.; Tl n.a.; W n.a.; Si 1880; Fe n.a.; Ca n.a.; Al n.a.; K n.a.; Mg n.a.; Na n.a.; Share of carbon in waste that is biogenic 0%. Share of metals in waste not oxidised and bulk-recyclable (exclude very small or thin parts) Iron: 0%; Alu: 0%; Copper: 0%. One kg of this waste produces 0.05049 kg of slag and 0.02777 kg of residues, which are landfilled. Additional solidification with 0.01111 kg of cement. Net energy production: 0.5MJ/kg electric energy and 1.18MJ/kg thermal energy. Recovery of metal scrap to recycling: 0g iron scrap, 0g aluminium scrap, 0g copper scrap.;;

## Included processes
Waste incineration from waste reception gate further downstream (excluding transport to the MSWI plant). Waste-specific air and water emisions from incineration, auxiliary material consumption for flue gas cleaning. Short-term emissions to river water and long-term emisisons to ground water from slag compartment (from bottom ash) and residual material landfill (from solidified fly ashes and scrubber slugde). Waste-specific process energy demands for MSWI and net energy generation.

## Geography
Specific to the technology mix encountered in Switzerland in 2010. Well applicable to modern incineration practices in Europe, North America or Japan.

## Technology
average Swiss MSWI plants in 2010 (grate incinerators) with electrostatic precipitator for fly ash (ESP), wet flue gas scrubber and 25% SNCR , 42.77% SCR-high dust , 32.68% SCR-low dust -DeNOx facilities and 0% without Denox (weighted according to mass of burnt waste, representing Swiss average). Efficiency of iron scrap separation from slag : 58%. Efficiency of non-ferrous scrap separation from slag : 31%. Gross electric efficiency technology mix 15.84% and Gross thermal efficiency technology mix 28.51%

## Time period
Waste composition as given in literature reference, theoretical data or other source. Transfer coefficients for modern MSWI.

## Reference product
- Disposal, anion exchange resin f. water, 50% water, to municipal incineration [CH]: 1 kg
  SWITZERLAND

## Inputs from technosphere
- Sodium hydroxide, 50% in H2O, production mix, at plant [RER]: 0.0091003 kg; lognormal SD95 2.0323
  auxilliary inputs for the flue gas treatment stage of the incinerator plant. uncertainty calculated from uncertainty in average NaOH input, of transfer coefficients in the incinerator, and the uncertainty of the waste composition of this waste
- Chemicals organic, at plant [GLO]: 4.1903e-7 kg; lognormal SD95 11.645
  auxilliary inputs for the wastewater treatment stage of the incinerator plant. Proxy for (pure) Trisodium-trimercapto-s-triazine (CAS 17766-26-6), used as 15% diluted solution, aka TMT15. uncertainty calculated from uncertainty in average TMT15 input, of transfer coefficients in the incinerator, and the uncertainty of the waste composition of this waste
- Iron (III) chloride, 40% in H2O, at plant [CH]: 7.4111e-7 kg; lognormal SD95 5.5441
  auxilliary inputs for the wastewater treatment stage of the incinerator plant. uncertainty calculated from uncertainty in average FeCl3 input, of transfer coefficients in the incinerator, and the uncertainty of the waste composition of this waste
- Chemicals inorganic, at plant [GLO]: 0.00039538 kg; lognormal SD95 2.3352
  auxilliary inputs for the wastewater treatment stage of the incinerator plant. Proxy for Polyelectrolyte. uncertainty calculated from uncertainty in average Polyelectrolyte input, of transfer coefficients in the incinerator, and the uncertainty of the waste composition of this waste
- Disposal, cement, hydrated, 0% water, to residual material landfill [CH]: 0.027767 kg; lognormal SD95 1.6875
  Hydrated cement output for solidification of landfilled residual material. Uncertainty calculated from uncertainty of the waste composition of this waste and transfer coefficients in the incinerator and of the solidification recipe.
- Process-specific burdens, residual material landfill [CH]: 0.027767 kg; lognormal SD95 1.6279
  mass-specific expenditures required for landfilling of incineration residues. uncertainty is calculated from uncertainties in waste composition and transfer coefficients in incinerator
- Municipal waste incineration plant [CH]: 2.5e-10 p; lognormal SD95 1
  demands per kilogram waste. uncertainty is heeded in the module
- Quicklime, milled, packed, at plant [CH]: 0.0042496 kg; lognormal SD95 3.4788
  auxilliary inputs for the flue gas treatment stage of the incinerator plant. uncertainty calculated from uncertainty in average CaO input, of transfer coefficients in the incinerator, and the uncertainty of the waste composition of this waste
- Natural gas, burned in industrial furnace 1MW [CH]: 0.6582 MJ; lognormal SD95 6.3511
  Input to DeNOx stage, to heat up flue gas in low-dust SCR. uncertainty calculated from uncertainty in average DeNOx input, uncertainty in the share of thermal NOx, uncertainty of nitrogen content in average municipal waste and the uncertainty in nitrogen content in *this* waste.
- Water, decarbonised, at plant [RER]: 2.521 kg; lognormal SD95 5.5441
  Incinerator process water used in flue gas scrubber stage. uncertainty calculated from uncertainty in average water input, and the uncertainty of the waste composition of this waste
- Chromium oxide, flakes, at plant [RER]: 4.5005e-6 kg; lognormal SD95 9.4419
  Input to DeNOx stage. uncertainty calculated from uncertainty in average DeNOx input, uncertainty in the share of thermal NOx, uncertainty of nitrogen content in average municipal waste and the uncertainty in nitrogen content in *this* waste.
- Titanium dioxide, production mix, at plant [RER]: 0.00022052 kg; lognormal SD95 9.4419
  Input to DeNOx stage (TiO2 catalyst carrier) uncertainty calculated from uncertainty in average DeNOx input, uncertainty in the share of thermal NOx, uncertainty of nitrogen content in average municipal waste and the uncertainty in nitrogen content in *this* waste.
- Cement, unspecified, at plant [CH]: 0.011107 kg; lognormal SD95 1.6875
  Cement required for solidification of landfilled residual material. Uncertainty calculated from uncertainty of the waste composition of this waste, of transfer coefficients in the incinerator and of the solidification recipe.
- Ammonia, liquid, at regional storehouse [CH]: 0.0035198 kg; lognormal SD95 6.3511
  Input to DeNOx stage (100% NH3). uncertainty calculated from uncertainty in average DeNOx input, uncertainty in the share of thermal NOx, uncertainty of nitrogen content in average municipal waste and the uncertainty in nitrogen content in *this* waste.
- Process-specific burdens, slag compartment [CH]: 0.049836 kg; lognormal SD95 1.6851
  mass-specific expenditures required for landfilling of bottom ash. uncertainty is calculated from uncertainties in waste composition and transfer coefficients in incinerator
- Transport, freight, lorry, 16t-32t gross weight, fleet average [CH]: 0.0098625 tkm; lognormal SD95 1.3753
  Transport services to transport incineration residues to landfills and to transport auxilliary inputs of the incinerator plant. uncertainty calculated from uncertainty in average auxiliary material input, the uncertainty of the waste composition of this waste and the uncertainty in generic transportation distances
- Transport, freight, rail [RER]: 0.02952 tkm; lognormal SD95 1.563
  (same comment as for Transport, freight, lorry, 16t-32t gross weight, fleet average)
- Hydrochloric acid, 30% in H2O, at plant [RER]: 0.00010392 kg; lognormal SD95 2.3352
  auxilliary inputs for the wastewater treatment stage of the incinerator plant. uncertainty calculated from uncertainty in average HCl input, of transfer coefficients in the incinerator, and the uncertainty of the waste composition of this waste
- Residual material landfill facility [CH]: 5.7848e-11 p; lognormal SD95 1.6279
  landfill infrastructure required for landfilling of incineration residues. uncertainty is calculated from uncertainties in waste composition and transfer coefficients in incinerator
- Slag compartment [CH]: 8.8597e-11 p; lognormal SD95 1.6851
  landfill infrastructure required for landfilling of bottom ash. uncertainty is calculated from uncertainties in waste composition and transfer coefficients in incinerator

## Emissions to nature
- Benzene, pentachloro- [emissions to air, high. pop.]: 1.6798e-10 kg; lognormal SD95 1.8146
  Incomplete combustion product emitted to air. uncertainty calculated from uncertainty in average operation emissions, and the uncertainty of the flue gas volume from this waste.
- COD, Chemical Oxygen Demand [emissions to water, river]: 0.00038267 kg; lognormal SD95 1.6009
  Emissions to water from waste composition and transfer coefficients in incinerator and landfills. uncertainty is calculated from uncertainties in waste composition and transfer coefficients in incinerator and landfills
- Silicon [emissions to air, high. pop.]: 2.9281e-9 kg; lognormal SD95 4.9729
  Emission to air from waste composition and transfer coefficients. uncertainty is calculated from uncertainties in waste composition and transfer coefficients in incinerator
- Cadmium [emissions to air, high. pop.]: 8.1144e-10 kg; lognormal SD95 11.902
  (same comment as for Silicon)
- Sulfur dioxide [emissions to air, high. pop.]: 0.00025502 kg; lognormal SD95 2.8705
  (same comment as for Silicon)
- Benzene [emissions to air, high. pop.]: 3.1794e-8 kg; lognormal SD95 1.8146
  (same comment as for Benzene, pentachloro-)
- Phosphorus [emissions to air, high. pop.]: 1.0162e-8 kg; lognormal SD95 9.6721
  (same comment as for Silicon)
- Methane, fossil [emissions to air, high. pop.]: 4.769e-7 kg; lognormal SD95 1.8146
  (same comment as for Benzene, pentachloro-)
- Heat, waste [emissions to water, river]: 3.801 MJ; lognormal SD95 1.4786
  Waste heat generated from heating value of this waste plus any electricity required to process it. uncertainty is calculated from uncertainties in waste composition and uncertainties in energy efficiency and the uncertainty in internal energy demand
- Sulfate [emissions to water, river]: 0.012165 kg; lognormal SD95 2.0181
  (same comment as for COD, Chemical Oxygen Demand)
- Sulfate [emissions to water, groundwater, long-term]: 0.059392 kg; lognormal SD95 2.1033
  Long-term emissions from landfilling of incineration residues. uncertainty is calculated from uncertainties in waste composition and transfer coefficients in incinerator and landfills.
- Dioxin, 2,3,7,8 Tetrachlorodibenzo-p- [emissions to air, high. pop.]: 6.3583e-14 kg; lognormal SD95 3.6291
  (same comment as for Benzene, pentachloro-)
- Copper [emissions to water, river]: 2.1135e-9 kg; lognormal SD95 7.9044
  (same comment as for COD, Chemical Oxygen Demand)
- Silicon [emissions to water, groundwater, long-term]: 0.00018988 kg; lognormal SD95 98.254
  (same comment as for Sulfate)
- Cyanide [emissions to air, high. pop.]: 9.1771e-5 kg; lognormal SD95 7.5415
  Nitrogen species emitted to air after DeNOx stage. uncertainty calculated from uncertainty in average N-emissions and uncertainty in the share of thermal NOx and the uncertainty in nitrogen content in *this* waste.
- Phenol, pentachloro- [emissions to air, high. pop.]: 1.3846e-11 kg; lognormal SD95 1.8146
  (same comment as for Benzene, pentachloro-)
- Nitrate [emissions to water, groundwater, long-term]: 0.0010301 kg; lognormal SD95 2.7461
  (same comment as for Sulfate)
- Tin [emissions to water, river]: 5.9845e-9 kg; lognormal SD95 11.827
  (same comment as for COD, Chemical Oxygen Demand)
- Carbon monoxide, fossil [emissions to air, high. pop.]: 5.4045e-5 kg; lognormal SD95 6.0485
  (same comment as for Benzene, pentachloro-)
- Cadmium [emissions to water, groundwater, long-term]: 1.1617e-7 kg; lognormal SD95 195.85
  (same comment as for Sulfate)
- Tin [emissions to water, groundwater, long-term]: 8.6575e-5 kg; lognormal SD95 13.952
  (same comment as for Sulfate)
- Ammonia [emissions to air, high. pop.]: 4.1384e-6 kg; lognormal SD95 6.7969
  (same comment as for Cyanide)
- Dinitrogen monoxide [emissions to air, high. pop.]: 0.00042716 kg; lognormal SD95 7.5415
  (same comment as for Cyanide)
- Chloride [emissions to water, groundwater, long-term]: 0.001826 kg; lognormal SD95 3.5161
  (same comment as for Sulfate)
- BOD5, Biological Oxygen Demand [emissions to water, river]: 0.00037776 kg; lognormal SD95 1.6115
  (same comment as for COD, Chemical Oxygen Demand)
- Particulates, > 2.5 um, and < 10um [emissions to air, high. pop.]: 1.9075e-8 kg; lognormal SD95 2.4194
  (same comment as for Benzene, pentachloro-)
- Lead [emissions to water, river]: 8.8465e-10 kg; lognormal SD95 7.9692
  (same comment as for COD, Chemical Oxygen Demand)
- Silicon [emissions to water, river]: 4.6093e-7 kg; lognormal SD95 5.6778
  (same comment as for COD, Chemical Oxygen Demand)
- COD, Chemical Oxygen Demand [emissions to water, groundwater, long-term]: 0.0024566 kg; lognormal SD95 1.4142
  (same comment as for Sulfate)
- DOC, Dissolved Organic Carbon [emissions to water, river]: 0.00016711 kg; lognormal SD95 1.6023
  (same comment as for COD, Chemical Oxygen Demand)
- Hydrogen chloride [emissions to air, high. pop.]: 4.4968e-6 kg; lognormal SD95 3.6519
  (same comment as for Silicon)
- BOD5, Biological Oxygen Demand [emissions to water, groundwater, long-term]: 0.00080356 kg; lognormal SD95 1.4142
  (same comment as for Sulfate)
- TOC, Total Organic Carbon [emissions to water, groundwater, long-term]: 0.0009721 kg; lognormal SD95 1.4142
  (same comment as for Sulfate)
- Tin [emissions to air, high. pop.]: 1.4776e-10 kg; lognormal SD95 6.8644
  (same comment as for Silicon)
- Phosphate [emissions to water, river]: 5.6221e-9 kg; lognormal SD95 6.6691
  (same comment as for COD, Chemical Oxygen Demand)
- Zinc [emissions to water, groundwater, long-term]: 1.0505e-5 kg; lognormal SD95 36.173
  (same comment as for Sulfate)
- NMVOC, non-methane volatile organic compounds, unspecified origin [emissions to air, high. pop.]: 1.4469e-6 kg; lognormal SD95 1.8146
  (same comment as for Benzene, pentachloro-)
- Benzo(a)pyrene [emissions to air, high. pop.]: 7.0751e-13 kg; lognormal SD95 3.6291
  (same comment as for Benzene, pentachloro-)
- Zinc [emissions to water, river]: 3.1168e-9 kg; lognormal SD95 6.6785
  (same comment as for COD, Chemical Oxygen Demand)
- Copper [emissions to water, groundwater, long-term]: 1.4569e-5 kg; lognormal SD95 8.8027
  (same comment as for Sulfate)
- DOC, Dissolved Organic Carbon [emissions to water, groundwater, long-term]: 0.0009721 kg; lognormal SD95 1.4142
  (same comment as for Sulfate)
- Nitrate [emissions to water, river]: 0.00036509 kg; lognormal SD95 2.3552
  (same comment as for COD, Chemical Oxygen Demand)
- Carbon dioxide, fossil [emissions to air, high. pop.]: 1.1922 kg; lognormal SD95 1.4453
  (same comment as for Silicon)
- Nitrogen oxides [emissions to air, high. pop.]: 0.0013105 kg; lognormal SD95 6.7969
  sum of fuel-Nox and thermal-NOx emitted to air after DeNOx stage. uncertainty calculated from uncertainty in average N-emissions and uncertainty in the share of thermal NOx and the uncertainty in nitrogen content in *this* waste.
- Zinc [emissions to air, high. pop.]: 2.3154e-8 kg; lognormal SD95 8.3521
  (same comment as for Silicon)
- Phosphate [emissions to water, groundwater, long-term]: 1.3399e-6 kg; lognormal SD95 104.7
  (same comment as for Sulfate)
- Lead [emissions to water, groundwater, long-term]: 4.4714e-6 kg; lognormal SD95 66.846
  (same comment as for Sulfate)
- Chloride [emissions to water, river]: 0.0060496 kg; lognormal SD95 3.0807
  (same comment as for COD, Chemical Oxygen Demand)
- Heat, waste [emissions to air, high. pop.]: 12.228 MJ; lognormal SD95 1.4786
  (same comment as for Heat, waste)
- Particulates, < 2.5 um [emissions to air, high. pop.]: 3.7959e-6 kg; lognormal SD95 3.6291
  (same comment as for Benzene, pentachloro-)
- Copper [emissions to air, high. pop.]: 1.4939e-9 kg; lognormal SD95 9.2416
  (same comment as for Silicon)
- Toluene [emissions to air, high. pop.]: 6.3587e-8 kg; lognormal SD95 1.8146
  (same comment as for Benzene, pentachloro-)
- Lead [emissions to air, high. pop.]: 7.6191e-10 kg; lognormal SD95 9.9225
  (same comment as for Silicon)
- TOC, Total Organic Carbon [emissions to water, river]: 0.00016711 kg; lognormal SD95 1.6023
  (same comment as for COD, Chemical Oxygen Demand)
- Cadmium [emissions to water, river]: 1.5258e-10 kg; lognormal SD95 9.3529
  (same comment as for COD, Chemical Oxygen Demand)
- Benzene, hexachloro- [emissions to air, high. pop.]: 6.6479e-11 kg; lognormal SD95 1.8146
  (same comment as for Benzene, pentachloro-)

## Sampling procedure
fully waste-specific calculation based on literature data for average MSWI operation performance

## Extrapolations
Typical elemental transfer coefficients from current studies for modern MSWI, completed with data from coal power plants and estimates, adapted for inert/burnable waste.

## Uncertainty adjustments
uncertainty of waste input composition data derived from generic formula GSD(c) = N*ln(c)+1

## Sources
- Doka G., 2013, 2013 - Updates LCI waste treatment services - Doka, -, Doka LCA, Zuerich, CH
Doka G. (2013) Updates to Life Cycle Inventories of Waste Treatment Services - part II: waste incineration. Doka LCA. Zurich.
Type: Separate publication
Source: Report to document the 2013 changes to the MSWI incinerator model and datasets (URL: http://www.doka.ch/ecoinventMSWIupdateLCI2013.pdf). To be read with the ecoinvent Nr 13 report (Doka 2009, Life Cycle Inventories of Waste Treatment Services) for ecoinvent v2.2.
First author: Doka G.
Year: 2013
Place of publication: Zurich
Publisher: Doka LCA
Original title: Updates to Life Cycle Inventories of Waste Treatment Services - part II: waste incineration

## Validation
Proof reading validation: Passed.; Other validation: none;
