# Passenger car, diesel, Medium, 2018, EURO-6c

Dataset: EcoSpold 1, unit process
Functional unit: 1 p
Category: transport systems / road\Transformation\Infrastructure
Geography: RER
Time period: 2018-01 to 2018-12
Generated by: Romain Sacchi
accessRestrictedTo: 0
copyright: False

## General comment
Driving cycle: WLTC. Combustion engine power: 99 [kW]. Power share from combustion engine: 100 [%]. Km over lifetime: 200000 [km]. Yearly mileage: 12000 [km/year]. Autonomy on a full tank/battery: 1083 [km]. Tank-to-wheel efficiency: 28 [%]. Tank-to-wheel energy consumption: 1777 [kj/km]. Fuel tank capacity: 534 [kWh]. Curb mass (excl. driver and cargo): 1421 [kg]. Driving mass (incl. driver and cargo): 1561 [kg]..

## Time period
EURO-6c emissions standards apply to car registrations from 2018-01 until 2018-12. Vehicle lightweighting factors match manufacture year of 2018

## Reference product
- Passenger car, diesel, Medium, 2018, EURO-6c [RER]: 1 p

## Inputs from technosphere
All rows: lognormal SD95 1.09366
- Glider lightweighting [GLO]: 127 kg
  Uncertainty from pedigree matrix: (2, 3, 2, 1, 1, 3)
- Glider, for passenger car [RER]: 1210 kg
  Uncertainty from pedigree matrix: (2, 3, 2, 1, 1, 3)
- Internal combustion engine, for passenger car [RER]: 256 kg
  Uncertainty from pedigree matrix: (2, 3, 2, 1, 1, 3)
- Polyethylene, HDPE, granulate, at plant [RER]: 40.1 kg
  Uncertainty from pedigree matrix: (2, 3, 2, 1, 1, 3)
- Disposal, glider, for passenger car [RER]: 1120 kg
  Uncertainty from pedigree matrix: (2, 3, 2, 1, 1, 3)
- Disposal, internal combustion engine, for passenger car [RER]: 256 kg
  Uncertainty from pedigree matrix: (2, 3, 2, 1, 1, 3)

## Sources
- Sacchi R., Bauer C., 2023, 2023 - LCI on-road vehicles - Sacchi, PSI, Villigen, CH
doi: 10.5281/ZENODO.5156043
