# Heavy fuel oil, at refinery

Dataset: EcoSpold 1, unit process
Functional unit: 1 kg
Category: oil / fuels
Geography: CH
Time period: 2000-01 to 2000-12
Production volume: 68.000 barrels of crude per day in 2016.
Generated by: Niels Jungbluth
accessRestrictedTo: 0
copyright: true

## General comment
Description of all flows of materials and energy due to the throughput of 1kg crude oil in the refinery. The multioutput-process 'crude oil, in refinery' delivers the co-products petrol, unleaded, bitumen, diesel, light fuel oil, heavy fuel oil, kerosene, naphtha, propane/ butane, refinery gas, secondary sulphur and electricity. The impacts of processing are allocated to the different products with flow specific allocation factors described in the report.;
Synonyms: Schweröl, HFO;

## Included processes
All processes on the refinery site, including energy use and emissions from combustion facilities, including waste water treatment, process emissions and direct discharges to rivers.

## Geography
Investigation for the refinery in Cressier in Switzerland.

## Technology
Average data for the used technology.

## Time period
The most important data (e.g. production, throughput, energy use, regulated emissions) have been investigated for one Swiss refinery for the year 2016. Other data and indicators have been assessed based on European literature data.

## Reference product
- Heavy fuel oil, at refinery [CH]: 1 kg
  SWITZERLAND

## Inputs from technosphere
- Transport, freight, lorry, fleet average [RER]: 0.00019477 tkm; lognormal SD95 2.0171
  (3,1,1,3,1,3); Estimation for Europe
- Ammonia, liquid, at regional storehouse [RER]: 1.9562e-6 kg; lognormal SD95 1.1267
  (3,1,1,3,1,3); Estimation for Europe
- Crude oil, market mix, at long distance transport [CH]: 0.9357 kg; lognormal SD95 1.05
  (1,1,1,1,1,1); Varo 2016
- Calcium chloride, CaCl2, at plant [RER]: 1.584e-5 kg; lognormal SD95 1.1267
  (3,1,1,3,1,3); Estimation for Europe
- Disposal, refinery sludge, 89.5% water, to hazardous waste incineration [CH]: 0.00038709 kg; lognormal SD95 1.05
  (1,1,1,1,1,1); Varo 2016
- Transport, freight, rail [RER]: 0.0011686 tkm; lognormal SD95 2.0171
  (3,1,1,3,1,3); Estimation for Europe
- Tap water, unspecified natural origin CH, at user [CH]: 0.014843 kg; lognormal SD95 1.1047
  (2,3,1,3,1,3); Average of plant data
- Lubricating oil, at plant [RER]: 1.2053e-5 kg; lognormal SD95 1.1267
  (3,1,1,3,1,3); Estimation for Europe
- Chemicals organic, at plant [GLO]: 0.0001649 kg; lognormal SD95 1.1267
  (3,1,1,3,1,3); Estimation for Europe
- Heavy fuel oil, burned in refinery furnace [CH]: 0.049777 MJ; lognormal SD95 1.05
  (1,1,1,1,1,1); Varo 2016
- Lime, hydrated, packed, at plant [CH]: 3.4173e-5 kg; lognormal SD95 1.1267
  (3,1,1,3,1,3); Estimation for Europe
- Disposal, catalytic converter NOx reduction, 0% water, to underground deposit [DE]: 1.1179e-6 kg; lognormal SD95 1.1267
  (3,1,1,3,1,3); Estimation for Europe
- Propylene glycol, liquid, at plant [RER]: 6.3182e-7 kg; lognormal SD95 1.1267
  (3,1,1,3,1,3); Estimation for Europe
- Refinery [RER]: 2.1249e-11 p; lognormal SD95 3.0162
  (3,1,1,3,1,3); Estimation for Europe
- Electricity, medium voltage, at grid [CH]: 0.038505 kWh; lognormal SD95 1.05
  (1,1,1,1,1,1); Varo 2016
- Soap, at plant [RER]: 2.6122e-6 kg; lognormal SD95 1.1267
  (3,1,1,3,1,3); Estimation for Europe
- Refinery gas, burned in furnace [CH]: 1.3312 MJ; lognormal SD95 1.05
  (1,1,1,1,1,1); Varo 2016
- Disposal, municipal solid waste, 22.9% water, to municipal incineration [CH]: 1.9015e-5 kg; lognormal SD95 1.05
  (1,1,1,1,1,1); Varo 2016
- Iron sulphate, at plant [RER]: 4.8819e-5 kg; lognormal SD95 1.1267
  (3,1,1,3,1,3); Estimation for Europe
- Zeolite, powder, at plant [RER]: 1.1084e-5 kg; lognormal SD95 1.1267
  (3,1,1,3,1,3); Estimation for Europe
- Naphtha, at refinery [RER]: 0.022261 kg; lognormal SD95 1.1267
  (3,1,1,3,1,3); Estimation for Europe
- Sodium hypochlorite, 15% in H2O, at plant [RER]: 4.8819e-5 kg; lognormal SD95 1.1267
  (3,1,1,3,1,3); Estimation for Europe
- Zinc, primary, at regional storage [RER]: 1.2008e-7 kg; lognormal SD95 1.1267
  (3,1,1,3,1,3); Estimation for Europe
- Hydrochloric acid, 30% in H2O, at plant [RER]: 8.6925e-5 kg; lognormal SD95 1.1267
  (3,1,1,3,1,3); Estimation for Europe
- Sulphuric acid, liquid, at plant [RER]: 9.4593e-6 kg; lognormal SD95 1.1267
  (3,1,1,3,1,3); Estimation for Europe
- Nitrogen, liquid, at plant [RER]: 0.0010986 kg; lognormal SD95 1.1267
  (3,1,1,3,1,3); Estimation for Europe

## Inputs from nature
- Water, cooling, unspecified natural origin, CH [resources, in water]: 0.0003604 m3; lognormal SD95 1.05
  (1,1,1,1,1,1); Varo 2016
- Water, unspecified natural origin, CH [resources, in water]: 0.00013475 m3; lognormal SD95 1.05
  (1,1,1,1,1,1); Varo 2016

## Emissions to nature
- Phosphorus [emissions to water, river]: 2.9291e-7 kg; lognormal SD95 1.5217
  (3,1,1,3,1,3); Estimation for Europe
- Tin [emissions to water, river]: 4.2518e-9 kg; lognormal SD95 5.0184
  (3,1,1,3,1,3); Estimation for Europe
- Sodium [emissions to water, river]: 7.4888e-5 kg; lognormal SD95 5.0184
  (3,1,1,3,1,3); Estimation for Europe
- COD, Chemical Oxygen Demand [emissions to water, river]: 7.3165e-6 kg; lognormal SD95 1.5217
  (3,1,1,3,1,3); Estimation for Europe
- Methane, fossil [emissions to air, high. pop.]: 4.3546e-5 kg; lognormal SD95 1.5167
  (1,1,3,1,1,1); Swiss greenhouse gas inventory 2015
- BOD5, Biological Oxygen Demand [emissions to water, river]: 2.0928e-6 kg; lognormal SD95 1.5217
  (3,1,1,3,1,3); Estimation for Europe
- Benzene [emissions to air, high. pop.]: 1.0375e-6 kg; lognormal SD95 3.0578
  (3,1,1,1,3,1); Varo 2016 and European NMVOC profile
- Molybdenum [emissions to water, river]: 6.4441e-14 kg; lognormal SD95 5.0184
  (3,1,1,3,1,3); Estimation for Europe
- Iron [emissions to water, river]: 1.4646e-7 kg; lognormal SD95 5.0184
  (3,1,1,3,1,3); Estimation for Europe
- Cadmium [emissions to water, river]: 1.0629e-9 kg; lognormal SD95 3.0162
  (3,1,1,3,1,3); Estimation for Europe
- Potassium [emissions to water, river]: 2.4995e-6 kg; lognormal SD95 5.0184
  (3,1,1,3,1,3); Estimation for Europe
- Aluminium [emissions to water, river]: 1.2498e-8 kg; lognormal SD95 5.0184
  (3,1,1,3,1,3); Estimation for Europe
- Magnesium [emissions to water, river]: 6.239e-6 kg; lognormal SD95 5.0184
  (3,1,1,3,1,3); Estimation for Europe
- Strontium [emissions to water, river]: 1.9027e-7 kg; lognormal SD95 5.0184
  (3,1,1,3,1,3); Estimation for Europe
- Heptane [emissions to air, high. pop.]: 1.1335e-6 kg; lognormal SD95 1.5757
  (3,1,1,1,3,1); Varo 2016 and European NMVOC profile
- Sulfate [emissions to water, river]: 4.5449e-5 kg; lognormal SD95 1.5217
  (3,1,1,3,1,3); Estimation for Europe
- Toluene [emissions to water, river]: 3.9055e-9 kg; lognormal SD95 3.0162
  (3,1,1,3,1,3); Estimation for Europe
- Hexane [emissions to air, high. pop.]: 2.2671e-6 kg; lognormal SD95 1.5757
  (3,1,1,1,3,1); Varo 2016 and European NMVOC profile
- Nitrite [emissions to water, river]: 9.7637e-8 kg; lognormal SD95 1.5217
  (3,1,1,3,1,3); Estimation for Europe
- PAH, polycyclic aromatic hydrocarbons [emissions to water, river]: 2.6682e-10 kg; lognormal SD95 3.0162
  (3,1,1,3,1,3); Estimation for Europe
- Fluoride [emissions to water, river]: 5.8582e-7 kg; lognormal SD95 1.5217
  (3,1,1,3,1,3); Estimation for Europe
- Phenol [emissions to water, river]: 3.2144e-8 kg; lognormal SD95 3
  (1,1,1,1,1,1); Varo 2016
- Butene [emissions to air, high. pop.]: 1.1335e-7 kg; lognormal SD95 1.5757
  (3,1,1,1,3,1); Varo 2016 and European NMVOC profile
- Chromium [emissions to water, river]: 1.0629e-9 kg; lognormal SD95 3.0162
  (3,1,1,3,1,3); Estimation for Europe
- Phosphate [emissions to water, river]: 1.2693e-7 kg; lognormal SD95 1.5217
  (3,1,1,3,1,3); Estimation for Europe
- Ammonium, ion [emissions to water, river]: 5.7067e-7 kg; lognormal SD95 1.5217
  (3,1,1,3,1,3); Estimation for Europe
- Cyanide [emissions to water, river]: 3.9055e-9 kg; lognormal SD95 3.0162
  (3,1,1,3,1,3); Estimation for Europe
- Sulfide [emissions to water, river]: 2.4409e-8 kg; lognormal SD95 1.5217
  (3,1,1,3,1,3); Estimation for Europe
- Cobalt [emissions to water, river]: 7.0154e-15 kg; lognormal SD95 3.0162
  (3,1,1,3,1,3); Estimation for Europe
- Ethane [emissions to air, unspecified]: 1.1335e-6 kg; lognormal SD95 1.5757
  (3,1,1,1,3,1); Varo 2016 and European NMVOC profile
- Manganese [emissions to water, river]: 3.9055e-8 kg; lognormal SD95 5.0184
  (3,1,1,3,1,3); Estimation for Europe
- AOX, Adsorbable Organic Halogen as Cl [emissions to water, river]: 5.3365e-8 kg; lognormal SD95 1.5217
  (3,1,1,3,1,3); Estimation for Europe
- Heat, waste [emissions to air, high. pop.]: 0.096598 MJ; lognormal SD95 1.05
  (1,1,1,1,1,1); Calculation
- Calcium [emissions to water, river]: 1.2498e-5 kg; lognormal SD95 3.0162
  (3,1,1,3,1,3); Estimation for Europe
- Hydrocarbons, aliphatic, alkanes, unspecified [emissions to air, unspecified]: 3.786e-12 kg; lognormal SD95 1.5757
  (3,1,1,1,3,1); Varo 2016 and European NMVOC profile
- Benzene [emissions to water, river]: 1.7788e-9 kg; lognormal SD95 3.0162
  (3,1,1,3,1,3); Estimation for Europe
- Boron [emissions to water, river]: 2.5776e-12 kg; lognormal SD95 5.0184
  (3,1,1,3,1,3); Estimation for Europe
- Copper [emissions to water, river]: 2.1259e-9 kg; lognormal SD95 3.0162
  (3,1,1,3,1,3); Estimation for Europe
- Ethene [emissions to air, unspecified]: 2.2671e-7 kg; lognormal SD95 1.5757
  (3,1,1,1,3,1); Varo 2016 and European NMVOC profile
- Nitrate [emissions to water, river]: 6.0535e-6 kg; lognormal SD95 1.5217
  (3,1,1,3,1,3); Estimation for Europe
- Suspended solids, unspecified [emissions to water, fossilwater]: 6.1512e-6 kg; lognormal SD95 1.5217
  (3,1,1,3,1,3); Estimation for Europe
- Chromium VI [emissions to water, river]: 1.0629e-9 kg; lognormal SD95 3.0162
  (3,1,1,3,1,3); Estimation for Europe
- DOC, Dissolved Organic Carbon [emissions to water, river]: 7.5152e-9 kg; lognormal SD95 1.5217
  (3,1,1,3,1,3); Estimation for Europe
- Benzene, ethyl- [emissions to water, river]: 4.251e-9 kg; lognormal SD95 3.0162
  (3,1,1,3,1,3); Estimation for Europe
- Nickel [emissions to water, river]: 3.3027e-9 kg; lognormal SD95 5.7831
  (3,1,1,1,5,1); Data Cressier in 2003
- Hydrocarbons, aromatic [emissions to water, river]: 9.7637e-9 kg; lognormal SD95 1.5217
  (3,1,1,3,1,3); Estimation for Europe
- Toluene [emissions to air, high. pop.]: 6.8012e-7 kg; lognormal SD95 1.5757
  (3,1,1,1,3,1); Varo 2016 and European NMVOC profile
- Propane [emissions to air, high. pop.]: 4.5342e-6 kg; lognormal SD95 1.5757
  (3,1,1,1,3,1); Varo 2016 and European NMVOC profile
- Mercury [emissions to water, river]: 9.7637e-11 kg; lognormal SD95 5.0184
  (3,1,1,3,1,3); Estimation for Europe
- Vanadium [emissions to water, river]: 3.1888e-9 kg; lognormal SD95 5.0184
  (3,1,1,3,1,3); Estimation for Europe
- Hydrocarbons, aliphatic, unsaturated [emissions to air, high. pop.]: 2.0823e-13 kg; lognormal SD95 1.5757
  (3,1,1,1,3,1); Varo 2016 and European NMVOC profile
- Xylene [emissions to water, river]: 3.9055e-9 kg; lognormal SD95 3.0162
  (3,1,1,3,1,3); Estimation for Europe
- Hydrocarbons, unspecified [emissions to water, river]: 3.649e-7 kg; lognormal SD95 1.5
  (1,1,1,1,1,1); Varo 2016
- Zinc [emissions to water, river]: 4.3125e-8 kg; lognormal SD95 5.7831
  (3,1,1,1,5,1); Data Cressier in 2003
- Butane [emissions to air, unspecified]: 4.5342e-6 kg; lognormal SD95 1.5757
  (3,1,1,1,3,1); Varo 2016 and European NMVOC profile
- Silver [emissions to water, river]: 1.2498e-8 kg; lognormal SD95 5.0184
  (3,1,1,3,1,3); Estimation for Europe
- Particulates, > 10 um [emissions to air, high. pop.]: 1.4672e-5 kg; lognormal SD95 1.5217
  (3,1,1,3,1,3); Estimation for Europe
- Hydrocarbons, aromatic [emissions to air, high. pop.]: 5.679e-14 kg; lognormal SD95 1.5757
  (3,1,1,1,3,1); Varo 2016 and European NMVOC profile
- Propene [emissions to air, unspecified]: 2.2671e-7 kg; lognormal SD95 1.5757
  (3,1,1,1,3,1); Varo 2016 and European NMVOC profile
- Nitrogen, organic bound [emissions to water, river]: 6.7046e-6 kg; lognormal SD95 1.5217
  (3,1,1,3,1,3); Estimation for Europe
- Barium [emissions to water, river]: 2.4995e-8 kg; lognormal SD95 5.0184
  (3,1,1,3,1,3); Estimation for Europe
- Selenium [emissions to water, river]: 2.5776e-13 kg; lognormal SD95 5.0184
  (3,1,1,3,1,3); Estimation for Europe
- Benzene, ethyl- [emissions to air, unspecified]: 1.1335e-7 kg; lognormal SD95 3.0578
  (3,1,1,1,3,1); Varo 2016 and European NMVOC profile
- Arsenic [emissions to water, river]: 7.4406e-10 kg; lognormal SD95 5.0184
  (3,1,1,3,1,3); Estimation for Europe
- Ammonia [emissions to air, high. pop.]: 1.074e-6 kg; lognormal SD95 1.2366
  (3,1,1,3,1,3); Estimation for Europe
- Water, CH [emissions to water, river]: 0.00051 m3; lognormal SD95 1.5
  (1,1,1,1,1,1); Varo 2016
- Oils, unspecified [emissions to water, river]: 3.478e-7 kg; lognormal SD95 2.2449
  (3,1,1,1,5,1); Data Cressier in 2003
- Lead [emissions to water, river]: 5.3147e-9 kg; lognormal SD95 5.0184
  (3,1,1,3,1,3); Estimation for Europe
- Pentane [emissions to air, high. pop.]: 5.6677e-6 kg; lognormal SD95 1.5757
  (3,1,1,1,3,1); Varo 2016 and European NMVOC profile
- Chloride [emissions to water, river]: 1.8276e-5 kg; lognormal SD95 3.6785
  (3,1,1,1,5,1); Data Cressier in 2003
- TOC, Total Organic Carbon [emissions to water, river]: 2.616e-6 kg; lognormal SD95 1.5217
  (3,1,1,3,1,3); Estimation for Europe
- Xylene [emissions to air, unspecified]: 4.5342e-7 kg; lognormal SD95 1.5757
  (3,1,1,1,3,1); Varo 2016 and European NMVOC profile

## Sampling procedure
Questionnaires to refinery and literature data.

## Extrapolations
Some European data were used.

## Sources
- Jungbluth N., Meili C., Wenzel P., 2018, 2018 - LCI oil refinery processing and products - Jungbluth, Project report, 565, ESU-services Ltd., Schaffhausen, CH
Jungbluth N., Meili C., Wenzel P. (2018) Life cycle inventories of oil refinery processing and products. Project report. Volume: 565. ESU-services Ltd.. Schaffhausen, CH.
Type: Separate publication
Source: Report
First author: Jungbluth N.
Other authors: Meili C., Wenzel P.
Year: 2018
Title of anthology: Project report
Place of publication: Schaffhausen, CH
Publisher: ESU-services Ltd.
Volume No: 565

## Validation
Proof reading validation: 08.11.2018; Other validation: C:\Users;
