# Disposal, building, polystyrene isolation, flame-retardant, to final disposal

Dataset: EcoSpold 1, unit process
Functional unit: 1 kg
Category: construction waste / unspecified
Geography: CH
Time period: 2000-01 to 2000-12
Generated by: Gabor Doka
accessRestrictedTo: 0
copyright: true

## General comment
The waste contains 1kg flame retarded EPS (GSD=100%) Waste density is 20 kg/m3. Allocation of energy production in waste incineration: no substitution or expansion. Total burden allocated to waste disposal function of waste incinerator.;
CAS number: 009003-53-6;
Formula: (CH2-CH-C6H5)n;
Synonyms: EPS;

## Included processes
transport to dismantling facilities, final disposal of waste material,

## Geography
Specific to the technology mix encountered in Switzerland in late 1990ies

## Technology
Building demolition with skid-steer loaders.

## Reference product
- Disposal, building, polystyrene isolation, flame-retardant, to final disposal [CH]: 1 kg
  SWITZERLAND

## Inputs from technosphere
- Transport, freight, lorry, 16t-32t gross weight, fleet average [CH]: 0.01 tkm; lognormal SD95 1
  transport to disposal facilities. Uncertainty calculated from uncertainty in transported masses and the uncertainty in generic transportation distances
- Disposal, expanded polystyrene, 5% water, to municipal incineration [CH]: 1 kg; lognormal SD95 1
  disposed masses. Uncertainty calculated from uncertainty of waste composition

## Sampling procedure
waste-specific calculation based on literature data

## Sources
- Doka G., 2009, 2009 - LCI waste treatment services - Doka, Final report ecoinvent data v2.0, 13, Swiss Centre for LCI, Doka LCA, Duebendorf and St. Gallen, CH
Doka G. (2007) Life Cycle Inventories of Waste Treatment Services. Final report ecoinvent data v2.0. Volume: 13. Swiss Centre for LCI, Empa - TSL. Dübendorf, CH.
Type: Separate publication
Source: CD-ROM
First author: Doka G.
Year: 2007
Title of anthology: Final report ecoinvent data v2.0
Place of publication: Dübendorf, CH
Publisher: Swiss Centre for LCI, Empa - TSL
Volume No: 13

## Validation
Proof reading validation: Passed. Calculation for standard deviation 95 of transport services differs from standard Pedigree approach in this project and figure obtained by this procedure (2.09). Uncertainty for estimation of distance is not included.; Other validation: none;
