# xxx Operation, transoceanic tanker

Dataset: EcoSpold 1, unit process
Functional unit: 1 tkm
Category: transport systems / transport, obsolete\operations, obsolete
Geography: OCE
Generated by: Michael Spielmann
accessRestrictedTo: 0
copyright: true

## General comment
Individual hydrocarbons are estimated based on the share of diesel engines of road vehicles. Heavy metals are estimated from trace elements in fuel. A distinction between distilled (28%) and residual fuel (72%) is applied. Amount of disposed bilge oil is estimated as 0.6% of the consumed fuel.;

## Included processes
The inventory includes the supply of fuel. Direct airborne emissions of gaseous substances, particulate matters, dioxins, PAHs, halogens and heavy metals are accounted for. Also, the disposal of bilge oil, emissions of oil (regular and spills of small accidents) and emissions of tributyltin compounds are included. The spill of oil due to huge accidents is not included.

## Technology
Average data for steam turbine (62%) and diesel engine (38%) propulsion. The fuel used is Heavy Fuel Oil (HFO). Fuel consumption and emissions are representative for slow speed engine types (speed: 14 knots per hour) and a tanker size between 50"000-300"000 dwt.

## Reference product
- xxx Operation, transoceanic tanker [OCE]: 1 tkm
  Oceanic

## Inputs from technosphere
- Disposal, bilge oil, 90% water, to hazardous waste incineration [CH]: 6.5e-6 kg; lognormal SD95 1.5
  literature studies. Uncertainty range accounts for a factor between 0.65 and 2.6 g/tkm
- Heavy fuel oil, at regional storage [RER]: 0.0013 kg; lognormal SD95 2
  literature studies. Uncertainty range accounts for a emission factor between 0.65 and 2.6 g/tkm

## Emissions to nature
- Cadmium [emissions to air, low. pop.]: 3.18e-11 kg; lognormal SD95 5
  literature studies; average for distilled and residue fuels
- Nickel [emissions to air, low. pop.]: 2.83e-8 kg; lognormal SD95 5
  literature studies; average for distilled and residue fuels
- Lead [emissions to air, low. pop.]: 2.24e-10 kg; lognormal SD95 5
  literature studies; average for distilled and residue fuels
- Carbon monoxide, fossil [emissions to air, low. pop.]: 4.02e-6 kg; lognormal SD95 2
  literature studies; average steam and diesel engine concept
- COD, Chemical Oxygen Demand [emissions to water, ocean]: 0.000286 kg; lognormal SD95 2
  own calculation, according to quality guidelines, derived from emissions of oil.
- Dioxin, 2,3,7,8 Tetrachlorodibenzo-p- [emissions to air, low. pop.]: 1.3e-15 kg; lognormal SD95 8
  literature studies. Uncertainty range accounts for a factor between 1.25E-10 g/kg and 8E-09 g/kg
- Ammonia [emissions to air, low. pop.]: 5.2e-7 kg; lognormal SD95 2
  estimate based on the emission of heavy fuel oil burned in industrial furnance
- Oils, unspecified [emissions to water, ocean]: 9.09e-5 kg; lognormal SD95 2
  literature studies and own calculations. Oil spilled is assuemed to be 0.8 kg/t and an average transport of 8800 km is assumed.
- Arsenic [emissions to air, low. pop.]: 4.89e-10 kg; lognormal SD95 5
  literature studies; average for distilled and residue fuels
- Carbon dioxide, fossil [emissions to air, low. pop.]: 0.004 kg; lognormal SD95 1.05
  calculated from carbon content in heavy fuel oil
- TOC, Total Organic Carbon [emissions to water, ocean]: 7.87e-5 kg; lognormal SD95 2
  own calculation, according to quality guidelines, derived from emissions of oil.
- BOD5, Biological Oxygen Demand [emissions to water, ocean]: 0.000286 kg; lognormal SD95 2
  own calculation, according to quality guidelines, derived from emissions of oil.
- Selenium [emissions to air, low. pop.]: 4.48e-10 kg; lognormal SD95 5
  literature studies; average for distilled and residue fuels
- Particulates, > 2.5 um, and < 10um [emissions to air, low. pop.]: 2.14e-6 kg; lognormal SD95 2
  estimate based on the emission of heavy fuel oil burned in industrial furnance
- Particulates, > 10 um [emissions to air, low. pop.]: 2.68e-6 kg; lognormal SD95 1.5
  estimate based on the emission of heavy fuel oil burned in industrial furnance
- Copper [emissions to air, low. pop.]: 4.89e-10 kg; lognormal SD95 5
  literature studies; average for distilled and residue fuels
- Dinitrogen monoxide [emissions to air, low. pop.]: 1.04e-7 kg; lognormal SD95 2
  literature studies; average steam and diesel engine concept
- Hydrogen chloride [emissions to air, low. pop.]: 7.71e-8 kg; lognormal SD95 1.5
  calculated from Cl content in heavy fuel oil
- Zinc [emissions to air, low. pop.]: 1.03e-9 kg; lognormal SD95 5
  literature studies; average for distilled and residue fuels
- Sulfur dioxide [emissions to air, low. pop.]: 9.1e-5 kg; lognormal SD95 1.5
  calculated from sulphur content in heavy fuel oil
- Tributyltin compounds [emissions to water, ocean]: 1e-8 kg; lognormal SD95 2
  literature studies
- DOC, Dissolved Organic Carbon [emissions to water, ocean]: 7.87e-5 kg; lognormal SD95 2
  own calculation, according to quality guidelines, derived from emissions of oil.
- Hydrogen fluoride [emissions to air, low. pop.]: 7.71e-9 kg; lognormal SD95 1.5
  calculated from F content in heavy fuel oil
- Particulates, < 2.5 um [emissions to air, low. pop.]: 1.87e-6 kg; lognormal SD95 3
  estimate based on the emission of heavy fuel oil burned in industrial furnance
- Benzene [emissions to air, low. pop.]: 2.86e-8 kg; lognormal SD95 2
  NMVOC values is based on literature studies and specific value is calculated from VOC split of diesel engines
- Nitrogen oxides [emissions to air, low. pop.]: 3.3e-5 kg; lognormal SD95 1.5
  literature studies; average steam and diesel engine concept
- Xylene [emissions to air, low. pop.]: 1.2e-8 kg; lognormal SD95 2
  (same comment as for Benzene)
- Mercury [emissions to air, low. pop.]: 3.67e-11 kg; lognormal SD95 5
  literature studies; average for distilled and residue fuels
- Toluene [emissions to air, low. pop.]: 1.2e-8 kg; lognormal SD95 2
  (same comment as for Benzene)
- NMVOC, non-methane volatile organic compounds, unspecified origin [emissions to air, low. pop.]: 1.5e-6 kg; lognormal SD95 1.5
  literature studies; average steam and diesel engine concept
- Chromium [emissions to air, low. pop.]: 2.03e-10 kg; lognormal SD95 5
  literature studies; average for distilled and residue fuels
- PAH, polycyclic aromatic hydrocarbons [emissions to air, low. pop.]: 2.6e-9 kg; lognormal SD95 3
  literature studies
- Heat, waste [emissions to air, unspecified]: 0.052 MJ; lognormal SD95 2
  standard values, depneds on the fuel burned.
- Methane, fossil [emissions to air, low. pop.]: 3.61e-8 kg; lognormal SD95 2
  (same comment as for Benzene)

## Sampling procedure
literature studies and own estimates

## Sources
- Spielmann M., Bauer C., Dones R., Tuchschmid M., 2007, 2007 - Transport services - Spielmann, Final report ecoinvent Data v2.0, 14, Swiss Centre for LCI, PSI, ESU-services Ltd., Duebendorf, Villigen and Uster, CH
Spielmann M., Dones R; Bauer C. (2007) Life Cycle Inventories of Transport Services. Final report ecoinvent Data v2.0. Volume: 14. Issue: 0. Swiss Centre for LCI, PSI. Dübendorf and Villigen, CH.
Type: Measurement on site
Source: CD-ROM
First author: Spielmann M.
Other authors: Dones R; Bauer C.
Year: 2007
Title of anthology: Final report ecoinvent Data v2.0
Place of publication: Dübendorf and Villigen, CH
Publisher: Swiss Centre for LCI, PSI
Volume No: 14
Issue No: 0

## Validation
Proof reading validation: Passed.; Other validation: none;
