# Ethylene oxide, at plant

Dataset: EcoSpold 1, unit process
Functional unit: 1 kg
Category: chemicals / organic
Geography: RER
Time period: 2000-01 to 2000-12
Generated by: Mike Chudacoff
accessRestrictedTo: 0
copyright: true

## General comment
The processes that are used to produce ethylene oxide from ethylene, oxygen or air are described in this inventory. These processes also produce carbon dioxide in some quantity.;
CAS number: 000075-21-8;
Formula: C2H4O;

## Included processes
Precursors, transports, infrastructure.

## Geography
RER

## Technology
represents a current cross-section of actual plants in Europe

## Reference product
- Ethylene oxide, at plant [RER]: 1 kg
  Europe

## Inputs from technosphere
- Chemical plant, organics [RER]: 4e-10 p; lognormal SD95 1.2
  (2,2,1,2,1,5); infrastructure of a typical plant
- Oxygen, liquid, at plant [RER]: 0.463 kg; lognormal SD95 1.2
  (2,2,1,2,1,5); precursor
- Disposal, catalyst base Eth.oxide prod., 0% water, to residual material landfill [CH]: 0.0005 kg; lognormal SD95 1.3
  (4,2,1,2,1,5); disposal of catalyst base
- Transport, freight, lorry, fleet average [RER]: 0.105 tkm; lognormal SD95 1.2
  (2,4,1,2,1,5); transport
- Transport, freight, rail [RER]: 0.541 tkm; lognormal SD95 1.2
  (2,4,1,2,1,5); transport
- Ethylene, average, at plant [RER]: 0.825 kg; lognormal SD95 1.2
  (2,2,1,2,1,5); precursor
- Electricity, medium voltage, production ENTSO-E, at grid: 0.33 kWh; lognormal SD95 1.3
  (4,2,1,2,1,5); electricity

## Emissions to nature
- Ethylene oxide [emissions to air, high. pop.]: 2e-5 kg; lognormal SD95 1.2
  (2,2,1,2,1,5); emissions
- Carbon monoxide, fossil [emissions to air, high. pop.]: 0.00011 kg; lognormal SD95 1.2
  (2,2,1,2,1,5); emissions
- Methane, fossil [emissions to air, high. pop.]: 7.5e-5 kg; lognormal SD95 1.2
  (2,2,1,2,1,5); emissions
- Carbon dioxide, fossil [emissions to air, high. pop.]: 0.21 kg; lognormal SD95 1.2
  (2,2,1,2,1,5); emissions
- DOC, Dissolved Organic Carbon [emissions to water, river]: 0.0002 kg; lognormal SD95 1.2
  (2,2,1,2,1,5); emissions
- Heat, waste [emissions to air, high. pop.]: 1.2 MJ; lognormal SD95 1.3
  (4,2,1,2,1,5); emissions
- Ethene [emissions to air, high. pop.]: 0.00023 kg; lognormal SD95 1.2
  (2,2,1,2,1,5); emissions
- NMVOC, non-methane volatile organic compounds, unspecified origin [emissions to air, high. pop.]: 0.00024 kg; lognormal SD95 1.2
  (2,2,1,2,1,5); emissions
- BOD5, Biological Oxygen Demand [emissions to water, river]: 0.00019 kg; lognormal SD95 1.2
  (2,2,1,2,1,5); emissions
- COD, Chemical Oxygen Demand [emissions to water, river]: 0.00019 kg; lognormal SD95 1.2
  (2,2,1,2,1,5); emissions
- TOC, Total Organic Carbon [emissions to water, river]: 0.0002 kg; lognormal SD95 1.2
  (2,2,1,2,1,5); emissions

## Sampling procedure
see technology

## Sources
- Althaus H.-J., Chudacoff M., Hellweg S., Hischier R., Jungbluth N., Osses M., Primas A., 2007, 2007 - LCI chemicals - Althaus, Final report ecoinvent data v2.0, 8, Swiss Centre for LCI, Empa - TSL, ETH, ESU-services Ltd., Chudacoff Oekoscience, Duebendorf, CH
Althaus H.-J., Chudacoff M., Hischier R., Jungbluth N., Osses M., Primas A. (2007) Life Cycle Inventories of Chemicals. Final report ecoinvent data v2.0. Volume: 8. Swiss Centre for LCI, Empa - TSL. Dübendorf, CH.
Type: Measurement on site
Source: CD-ROM
First author: Althaus H.-J.
Other authors: Chudacoff M., Hischier R., Jungbluth N., Osses M., Primas A.
Year: 2007
Title of anthology: Final report ecoinvent data v2.0
Place of publication: Dübendorf, CH
Publisher: Swiss Centre for LCI, Empa - TSL
Volume No: 8

## Validation
Proof reading validation: Passed.; Other validation: none;
