# Epoxy resin, liquid, disaggregated data, at plant

Dataset: EcoSpold 1, unit process
Functional unit: 1 kg
Category: chemicals / organic
Geography: RER
Time period: 1999-01 to 1999-12
Production volume: 190000 Tonnes
Share of production covered: 100 %
Generated by: Niels Jungbluth
accessRestrictedTo: 0
copyright: true

## General comment
All data are based on Eco-profiles of the European plastics industry. This dataset is used for methodological comparision in the data base. It shall not be used as background data in LCI.;
CAS number: 025928-94-3;

## Included processes
Disaggregated data for all processes from raw material extraction until delivery at plant

## Geography
Data for 4 plants in DE, IT, NL, CH

## Technology
Production from epichlorohydrin and bisphenol-A

## Time period
Time to which data refer

## Reference product
- Epoxy resin, liquid, disaggregated data, at plant [RER]: 1 kg
  Europe

## Inputs from technosphere
- Heavy fuel oil, burned in power plant [RER]: 11 MJ
  Uncertainty for LCI results cannot be determined
- Transport, freight, rail [RER]: 1.74 tkm
  Uncertainty for LCI results cannot be determined
- Tap water, at user [RER]: 13 kg
  Uncertainty for LCI results cannot be determined
- Electricity, medium voltage, production ENTSO-E, at grid: 2.19 kWh
  Uncertainty for LCI results cannot be determined
- Disposal, municipal solid waste, 22.9% water, to sanitary landfill [CH]: 0.298 kg
  Uncertainty for LCI results cannot be determined
- Natural gas, burned in industrial furnace 1MWth [CH]: 57.7 MJ
  Uncertainty for LCI results cannot be determined
- Chemical plant, organics [RER]: 4e-10 p; lognormal SD95 3.9
  (5,na,1,1,5,na); Rough estimation
- Disposal, municipal solid waste, 22.9% water, to municipal incineration [CH]: 0.0058 kg
  Uncertainty for LCI results cannot be determined
- Transport, freight, lorry, fleet average [RER]: 60.6 tkm
  Uncertainty for LCI results cannot be determined

## Inputs from nature
- Water, unspecified natural origin/m3 [resources, in water]: 0.0061 m3
  Uncertainty for LCI results cannot be determined
- Water, salt, ocean [resources, in water]: 0.00095 m3
  Uncertainty for LCI results cannot be determined
- Water, well [resources, in water]: 1.4e-5 m3
  Uncertainty for LCI results cannot be determined
- Water, cooling, unspecified natural origin/m3 [resources, in water]: 0.384 m3
  Uncertainty for LCI results cannot be determined
- Sodium chloride [resources, in ground]: 1.8 kg
  Uncertainty for LCI results cannot be determined
- Calcite [resources, in ground]: 0.71 kg
  Uncertainty for LCI results cannot be determined
- Sand [resources, in ground]: 1200 kg
  Uncertainty for LCI results cannot be determined
- Water, river [resources, in water]: 9.2e-5 m3
  Uncertainty for LCI results cannot be determined
- Gas, natural/m3 [resources, in ground]: 0.678 m3
  Uncertainty for LCI results cannot be determined
- Potassium chloride [resources, in ground]: 0.029 kg
  Uncertainty for LCI results cannot be determined
- Oil, crude [resources, in ground]: 0.355 kg
  Uncertainty for LCI results cannot be determined

## Emissions to nature
- Oils, unspecified [emissions to water, river]: 6.9e-5 kg
  Uncertainty for LCI results cannot be determined
- Iron [emissions to water, river]: 1e-6 kg
  Uncertainty for LCI results cannot be determined
- Sulfur dioxide [emissions to air, unspecified]: 0.0017 kg
  Uncertainty for LCI results cannot be determined
- Cyanide [emissions to water, river]: 5e-7 kg
  Uncertainty for LCI results cannot be determined
- Lead [emissions to air, unspecified]: 5e-7 kg
  Uncertainty for LCI results cannot be determined
- Sulfate [emissions to water, river]: 0.0081 kg
  Uncertainty for LCI results cannot be determined
- Particulates, > 2.5 um, and < 10um [emissions to air, unspecified]: 0.0071 kg
  Uncertainty for LCI results cannot be determined
- Nitrate [emissions to water, river]: 1e-6 kg
  Uncertainty for LCI results cannot be determined
- Nickel [emissions to water, river]: 5e-7 kg
  Uncertainty for LCI results cannot be determined
- Chlorinated solvents, unspecified [emissions to water, river]: 0.000113 kg
  Uncertainty for LCI results cannot be determined
- Methane, fossil [emissions to air, unspecified]: 0.0002 kg
  Uncertainty for LCI results cannot be determined
- DOC, Dissolved Organic Carbon [emissions to water, river]: 0.017 kg
  Uncertainty for LCI results cannot be determined
- Potassium [emissions to water, river]: 0.00082 kg
  Uncertainty for LCI results cannot be determined
- Nitrogen oxides [emissions to air, unspecified]: 0.0027 kg
  Uncertainty for LCI results cannot be determined
- Chromium VI [emissions to water, river]: 5e-7 kg
  Uncertainty for LCI results cannot be determined
- Magnesium [emissions to water, river]: 1.7e-5 kg
  Uncertainty for LCI results cannot be determined
- Hydrocarbons, chlorinated [emissions to air, unspecified]: 1.1e-5 kg
  Uncertainty for LCI results cannot be determined
- Ammonium, ion [emissions to water, river]: 3e-6 kg
  Uncertainty for LCI results cannot be determined
- COD, Chemical Oxygen Demand [emissions to water, river]: 0.051 kg
  Uncertainty for LCI results cannot be determined
- Hydrogen fluoride [emissions to air, unspecified]: 5e-7 kg
  Uncertainty for LCI results cannot be determined
- Methane, chlorotrifluoro-, CFC-13 [emissions to air, unspecified]: 8e-6 kg
  Uncertainty for LCI results cannot be determined
- Mercury [emissions to air, unspecified]: 5e-7 kg
  Uncertainty for LCI results cannot be determined
- Carbon monoxide, fossil [emissions to air, unspecified]: 0.00026 kg
  Uncertainty for LCI results cannot be determined
- Calcium [emissions to water, river]: 0.054 kg
  Uncertainty for LCI results cannot be determined
- Sulfide [emissions to water, river]: 1e-6 kg
  Uncertainty for LCI results cannot be determined
- NMVOC, non-methane volatile organic compounds, unspecified origin [emissions to air, unspecified]: 0.000494 kg
  Uncertainty for LCI results cannot be determined
- Arsenic [emissions to water, river]: 5e-7 kg
  Uncertainty for LCI results cannot be determined
- Hydrocarbons, aromatic [emissions to air, unspecified]: 2.8e-5 kg
  Uncertainty for LCI results cannot be determined
- Hydrocarbons, unspecified [emissions to water, river]: 6.4e-5 kg
  Uncertainty for LCI results cannot be determined
- Carboxylic acids, unspecified [emissions to water, river]: 5.9e-5 kg
  Uncertainty for LCI results cannot be determined
- Fluoride [emissions to water, river]: 1e-6 kg
  Uncertainty for LCI results cannot be determined
- Phosphate [emissions to water, river]: 0.00022 kg
  Uncertainty for LCI results cannot be determined
- Acetaldehyde [emissions to air, unspecified]: 4.7e-5 kg
  Uncertainty for LCI results cannot be determined
- Hydrogen chloride [emissions to air, unspecified]: 0.00023 kg
  Uncertainty for LCI results cannot be determined
- Nitrogen [emissions to water, river]: 1e-5 kg
  Uncertainty for LCI results cannot be determined
- Hydrogen sulfide [emissions to air, unspecified]: 3e-6 kg
  Uncertainty for LCI results cannot be determined
- BOD5, Biological Oxygen Demand [emissions to water, river]: 0.0011 kg
  Uncertainty for LCI results cannot be determined
- Carbon dioxide, fossil [emissions to air, unspecified]: 0.65 kg
  Uncertainty for LCI results cannot be determined
- Chloride [emissions to water, river]: 0.98 kg
  Uncertainty for LCI results cannot be determined
- Phenol [emissions to water, river]: 6e-6 kg
  Uncertainty for LCI results cannot be determined
- Ammonia [emissions to air, unspecified]: 4e-6 kg
  Uncertainty for LCI results cannot be determined
- Copper [emissions to water, river]: 5e-7 kg
  Uncertainty for LCI results cannot be determined
- Mercury [emissions to water, river]: 1e-6 kg
  Uncertainty for LCI results cannot be determined
- Sodium [emissions to water, river]: 0.38 kg
  Uncertainty for LCI results cannot be determined
- Zinc [emissions to water, river]: 5e-7 kg
  Uncertainty for LCI results cannot be determined
- Heat, waste [emissions to air, unspecified]: 7.87 MJ
  Uncertainty for LCI results cannot be determined
- Suspended solids, unspecified [emissions to water, river]: 0.083 kg
  Uncertainty for LCI results cannot be determined
- VOC, volatile organic compounds, unspecified origin [emissions to water, river]: 0.0052 kg
  Uncertainty for LCI results cannot be determined
- Water [emissions to water, unspecified]: 5.795, 0.0126, 364.8, 0.0874 kg (4 entries); lognormal SD95 2.5196
  (5,5,5,5,5,BU:1.05); All uncertainty-values set to 5.0 by default. Balance of input water

## Sampling procedure
Company data

## Extrapolations
No extrapoloation

## Sources
- Althaus H.-J., Chudacoff M., Hellweg S., Hischier R., Jungbluth N., Osses M., Primas A., 2007, 2007 - LCI chemicals - Althaus, Final report ecoinvent data v2.0, 8, Swiss Centre for LCI, Empa - TSL, ETH, ESU-services Ltd., Chudacoff Oekoscience, Duebendorf, CH
Althaus H.-J., Chudacoff M., Hischier R., Jungbluth N., Osses M., Primas A. (2007) Life Cycle Inventories of Chemicals. Final report ecoinvent data v2.0. Volume: 8. Swiss Centre for LCI, Empa - TSL. Dübendorf, CH.
Type: Measurement on site
Source: CD-ROM
First author: Althaus H.-J.
Other authors: Chudacoff M., Hischier R., Jungbluth N., Osses M., Primas A.
Year: 2007
Title of anthology: Final report ecoinvent data v2.0
Place of publication: Dübendorf, CH
Publisher: Swiss Centre for LCI, Empa - TSL
Volume No: 8

## Validation
Proof reading validation: Passed.; Other validation: none;
