# Residual wood, dry, from plywood production, for indoor use, measured as dry mass, at plant

Dataset: EcoSpold 1, unit process
Functional unit: 1 kg
Category: wood / wooden materials\new processes\other material
Geography: RER
Time period: 2000-01 to 2016-12
Generated by: default
accessRestrictedTo: 0
copyright: true

## Reference product
- Residual wood, dry, from plywood production, for indoor use, measured as dry mass, at plant [RER]: 1 kg

## Inputs from technosphere
- Wooden board manufacturing plant, organic bonded boards [RER]: 3.969e-12 p
  Pedigree: (4,5,5,3,4).
- Sawlog and veneer log, hardwood, sustainable forest management, measured as solid wood under bark, at forest road [RER]: 0.0002985 m3
  Pedigree: (1,4,5,3,1).
- Treatment, plywood production effluent, to wastewater treatment, class 3 [CH]: 0.0002188 m3
  Pedigree: (1,4,5,3,1).
- Electricity, medium voltage, production ENTSO-E, at grid: 0.03647 kWh
  Pedigree: (1,4,5,3,1).
- Heat, hardwood chips from industry, at furnace 50kW [CH]: 0.7735 MJ
  Pedigree: (1,4,5,3,1).
- Urea formaldehyde resin, at plant [RER]: 0.009923 kg
  Pedigree: (1,4,5,3,1).
- Diesel, burned in building machine, average [CH]: 0.0003816 MJ
  Pedigree: (1,4,5,3,1).
- Sawlog and veneer log, hardwood, sustainable forest management, measured as solid wood under bark, at forest road [CH]: 2.375e-5 m3
  Pedigree: (1,4,5,3,1).

## Inputs from nature
- Energy, gross calorific value, in biomass [resources, biotic]: 12.11 MJ
  Pedigree: (1,1,2,1,1).
- Water, river [resources, in water]: 0.0002188 m3
  Pedigree: (1,4,5,3,1).
- Carbon dioxide, in air [resources, in air]: 1.119 kg
  Pedigree: (1,1,2,1,1).

## Emissions to nature
- Water [emissions to air, unspecified]: 8.498e-5 kg
  Pedigree: (4,4,5,2,4).
- Formaldehyde [emissions to air, unspecified]: 9.923e-6 kg
  Pedigree: (4,5,5,5,5).
- Water [emissions to water, unspecified]: 0.20786 kg; lognormal SD95 2.5196
  (5,5,5,5,5,BU:1.05); All uncertainty-values set to 5.0 by default. Balance of input water

## Sources
- Werner F., 2017, 2017 - LCI wood and wood based products - Werner, Project Report, 0, Environment & Development, Zuerich, CH
