# Technical wood drying, infrastructure

Dataset: EcoSpold 1, unit process, infrastructure
Functional unit: 1 p
Category: wood / infrastructure
Geography: RER
Time period: 2000-01 to 2000-12
Generated by: Hans-Joerg Althaus
accessRestrictedTo: 0
copyright: true

## General comment
The service life is assumed to be 50 years. The kiln has a capacity of 30 m3 wood per charge. Drying time depends on wood type and in- and output moisture content. This data must only be used to consider the infrastructure needed for kiln drying wood if this is not relevant.;
Synonyms: kiln, Trocknungskammer;

## Included processes
The land area and the materials and their transports needed for building and disposal of a kiln with a per charge loading capacity of 30 m3 wood (under bark) are included. Not included is the land used for storage etc.

## Technology
Medium sized kiln of polystyren foam insulated aluminium panels, located with sawmill

## Reference product
- Technical wood drying, infrastructure [RER]: 1 p
  Europe

## Inputs from technosphere
- Polystyrene foam slab, at plant [RER]: 451 kg; lognormal SD95 3.2
  (3,5,1,3,3,5);
- Transport, freight, lorry, fleet average [RER]: 218 tkm; lognormal SD95 2.1
  (4,5,nA,nA,nA,nA);
- Disposal, building, polystyrene isolation, flame-retardant, to final disposal [CH]: 451 kg; lognormal SD95 3.2
  (3,5,1,3,3,5);
- Aluminium, production mix, wrought alloy, at plant [RER]: 640 kg; lognormal SD95 3.2
  (3,5,1,3,3,5);
- Sheet rolling, aluminium [RER]: 640 kg; lognormal SD95 3.2
  (3,5,1,3,3,5);
- Transport, freight, rail [RER]: 604 tkm; lognormal SD95 2.1
  (4,5,nA,nA,nA,nA);
- Disposal, building, reinforced concrete, to final disposal [CH]: 9900 kg; lognormal SD95 3.2
  (3,5,1,3,3,5);
- Concrete, sole plate and foundation, at plant [CH]: 4.5 m3; lognormal SD95 3.2
  (3,5,1,3,3,5);

## Inputs from nature
- Occupation, industrial area, built up [resources, land]: 750 m2a; lognormal SD95 1.7
  (3,5,1,3,3,5);
- Transformation, from unknown [resources, land]: 15 m2; lognormal SD95 2.2
  (3,5,1,3,3,5);
- Transformation, to industrial area, built up [resources, land]: 15 m2; lognormal SD95 2.2
  (3,5,1,3,3,5);

## Sampling procedure
estimation

## Sources
- Werner F., Althaus H.-J., Kuenniger T., Richter K., Jungbluth N., 2007, 2007 - LCI wood as fuel and const. mat. - Werner, Final report ecoinvent data v2.0, 9, Swiss Centre for LCI, Empa - TSL, ESU-services Ltd., Duebendorf, CH
Werner F., Althaus H.-J., Künniger T., Richter K., Jungbluth N. (2007) 1Life Cycle Inventories of Wood as Fuel and Construction Material. Final report ecoinvent data v2.0. Volume: 9. Issue: 0. Swiss Centre for LCI, Empa - TSL. Dübendorf, CH.
Type: Measurement on site
Source: CD-ROM
First author: Werner F.
Other authors: Althaus H.-J., Künniger T., Richter K., Jungbluth N.
Year: 2007
Title of anthology: Final report ecoinvent data v2.0
Place of publication: Dübendorf, CH
Publisher: Swiss Centre for LCI, Empa - TSL
Volume No: 9
Issue No: 0

## Validation
Proof reading validation: Passed; Other validation: none;
