# Borehole heat exchanger, specific heat demand 10W

Dataset: EcoSpold 1, unit process
Functional unit: 1 m2
Category: heat / heat pumps\heating systems
Geography: CH
Generated by: Matthias Klingler
accessRestrictedTo: 0
copyright: true

## General comment
Dataset for production of borehole heat exchanger in heating system with specific heat demand of 10W/m2 heated gross floor area;

## Included processes
Materials used for the production. Energy use for the production steps and drilling. Transport of raw materials to the site. water use for drilling.

## Geography
Data source from Switzerland. Process applicable in central European conditions.

## Technology
Technology, materials and components used for a typical borhole heat exchanger with an average length of 150m.

## Time period
Amount of material investigated in 2013. Some process information partly from 2007

## Reference product
- Borehole heat exchanger, specific heat demand 10W [CH]: 1 m2
  SWITZERLAND

## Inputs from technosphere
- Borehole heat exchanger, per m [CH]: 0.17 m; lognormal SD95 1.2226
  (2,3,1,1,1,5); uncertainty of average value, Basic uncertainty: 1.05

## Sampling procedure
Manufacturer informations and literature data. Data of different companies on market analysed.

## Sources
- Klingler M., Kasser U., Savi D., Primas A., Stettler Y., Gujer P., 2014, 2014 - LCA ventilation and heating systems - Klingler, Schlussbericht, BFE, Buero fuer Umweltchemie, B&H AG, Zuerich, CH
Klingler M., Kasser U., Savi D., Primas A., Stettler Y., Gujer P. (2014) Ökobilanzdaten für Lüftungs- und Wärmeanlagen. Schlussbericht, BFE. Bundesamt für Energie (BFE). Bern.
Type: Separate publication
Source: Report
First author: Klingler M.
Other authors: Kasser U., Savi D., Primas A., Stettler Y., Gujer P.
Year: 2014
Title of anthology: Schlussbericht, BFE
Place of publication: Bern
Publisher: Bundesamt für Energie (BFE)
