# Lorry 16t

Dataset: EcoSpold 1, unit process, infrastructure
Functional unit: 1 p
Category: transport systems / road\operations\infrastructure
Geography: RER
Time period: 2000-01 to 2000-12
Production volume: 22918 vehicles in 1999. including 1855 CKD vehicles
Generated by: Michael Spielmann
accessRestrictedTo: 0
copyright: true

## General comment
Material consumption values refer to the production of one average lorry in the referring weight class (net weight 6800t). Total Kilometric performance: 5.40E+05. Interventions for manufacturing processes of vehicles are independent of weight class.;

## Included processes
The inventory includes processes of material, energy and water use in vehicle manufacturing (final assembly, engine production and manufacturing of metal parts). Rail and road transport of materials is accounted for. Plant infrastructure is included, addressing issues such as land use, building, road and parking construction.

## Geography
Vehicle manufacturing data are taken from one production site in Germany.

## Technology
Current production technology, environmental issues have been addressed in the past.

## Time period
The material consumption represents a current 16t vehicle (Volvo FH). The data for vehicle production are representative for lorry production of one German company with an environmental management system. The data includes the final assembly (2000), engine production (2002) and the manufacturing of metal parts (2002).

## Reference product
- Lorry 16t [RER]: 1 p
  Europe

## Inputs from technosphere
- Light fuel oil, burned in industrial furnace 1MW, non-modulating [RER]: 906 MJ; lognormal SD95 1.2
  Data represent MAN production sites in Germany and comprises: final truck assembly, engine manufacturing, manufacturing of metal parts. Data available from environmental reports of the company.
- Treatment, sewage, to wastewater treatment, class 1 [CH]: 15.9 m3; lognormal SD95 1.2
  (same comment as for Light fuel oil, burned in industrial furnace 1MW, non-modulating)
- Brass, at plant [CH]: 20 kg; lognormal SD95 2
  Based on the material composition of a Volovo FH as available from product declaration.
- Cast iron, at plant [RER]: 1450 kg; lognormal SD95 1.5
  Based on the material composition of a Volovo FH as available from product declaration.
- Rock wool, packed, at plant [CH]: 10 kg; lognormal SD95 1.2
  Based on the material composition of a Volovo FH as available from product declaration.
- Sheet rolling, steel [RER]: 418 kg; lognormal SD95 1.2
  Based on the material composition of a Volovo FH as available from product declaration.
- Steel, low-alloyed, at plant [RER]: 11.4 kg; lognormal SD95 10
  Based on the material composition of a Volovo FH as available from product declaration. No information about the share of unalloyed and low alloyed steel is available. Assumption: 0.5% of used steel is low alloyed.
- Electronics for control units [RER]: 30 kg; lognormal SD95 1.2
  Based on the material composition of a Volovo FH as available from product declaration.
- Acetic acid, 98% in H2O, at plant [RER]: 0.066 kg; lognormal SD95 1.2
  (same comment as for Light fuel oil, burned in industrial furnace 1MW, non-modulating)
- Transport, freight, lorry, fleet average [RER]: 645 tkm; lognormal SD95 2.06
  standard transport distance
- Aluminium, production mix, at plant [RER]: 215 kg; lognormal SD95 2
  Based on the material composition of a Volovo FH as available from product declaration.
- Sodium hydroxide, 50% in H2O, production mix, at plant [RER]: 0.381 kg; lognormal SD95 1.2
  (same comment as for Light fuel oil, burned in industrial furnace 1MW, non-modulating)
- Natural gas, burned in industrial furnace 1MWth [CH]: 34000 MJ; lognormal SD95 1.2
  (same comment as for Light fuel oil, burned in industrial furnace 1MW, non-modulating)
- Treatment, lorry production effluent, to wastewater treatment, class 1 [CH]: 2.18 m3; lognormal SD95 1.2
  (same comment as for Light fuel oil, burned in industrial furnace 1MW, non-modulating)
- Copper, at regional storage [RER]: 30 kg; lognormal SD95 2
  Based on the material composition of a Volovo FH as available from product declaration.
- Tap water, at user [RER]: 16400 kg; lognormal SD95 1.2
  (same comment as for Light fuel oil, burned in industrial furnace 1MW, non-modulating)
- Sulphuric acid, liquid, at plant [RER]: 27.9 kg; lognormal SD95 1.2
  H2SO4 used in battery
- Reinforcing steel, at plant [RER]: 2260 kg; lognormal SD95 1.2
  Based on the material composition of a Volovo FH as available from product declaration. No information about the share of unalloyed and low alloyed steel is available. Assumption: 99.5% of used steel is unalloyed.
- Bitumen, at refinery [RER]: 10 kg; lognormal SD95 1.2
  Based on the material composition of a Volovo FH as available from product declaration.
- Hydrochloric acid, 30% in H2O, at plant [RER]: 0.189 kg; lognormal SD95 1.2
  (same comment as for Light fuel oil, burned in industrial furnace 1MW, non-modulating)
- Chromium steel 18/8, at plant [RER]: 5 kg; lognormal SD95 2
  Based on the material composition of a Volovo FH as available from product declaration.
- Lubricating oil, at plant [RER]: 62.1 kg; lognormal SD95 2
  (same comment as for Light fuel oil, burned in industrial furnace 1MW, non-modulating)
- Electricity, medium voltage, production ENTSO-E, at grid: 4740 kWh; lognormal SD95 1.2
  (same comment as for Light fuel oil, burned in industrial furnace 1MW, non-modulating)
- Lime, hydrated, packed, at plant [CH]: 0.31 kg; lognormal SD95 1.2
  Data represent MAN production sites in Germany and comprises: final truck assembly, engine manufacturing, manufacturing of metal parts. Data available from environmental reports of the company. For Ca(OH)2, 50% H2O is assumed.
- Road vehicle plant [RER]: 8.73e-7 p; lognormal SD95 3
  Based on the yearly production in 2000 and a life span of 50 yrs. Both, the yearly production and life span are uncertain.
- Wire drawing, copper [RER]: 30 kg; lognormal SD95 2
  Based on the material composition of a Volovo FH as available from product declaration.
- Nitric acid, 50% in H2O, at plant [RER]: 0.0985 kg; lognormal SD95 1.2
  (same comment as for Light fuel oil, burned in industrial furnace 1MW, non-modulating)
- Pig iron, at plant [RER]: 1630 kg; lognormal SD95 1.5
  Based on the material composition of a Volovo FH as available from product declaration.
- Diesel, burned in building machine, average [CH]: 20.1 MJ; lognormal SD95 3
  Diesel used for internal transportation with forklifts .Own assumptions, based on data representing MAN production sites in Germany and comprises: final truck assembly, engine manufacturing, manufacturing of metal parts. Data available from environmental reports of the company.
- Synthetic rubber, at plant [RER]: 375 kg; lognormal SD95 1.5
  Based on the material composition of a Volovo FH as available from product declaration.
- Diesel, at regional storage [RER]: 167 kg; lognormal SD95 3
  Diesel used for engine testing. Own assumptions, based on data representing MAN production sites in Germany and comprises: final truck assembly and engine manufacturing. Data available from environmental reports of the company.
- Polyethylene, HDPE, granulate, at plant [RER]: 230 kg; lognormal SD95 2
  Based on the material composition of a Volovo FH as available from product declaration.
- Alkyd paint, white, 60% in solvent, at plant [RER]: 40 kg; lognormal SD95 1.5
  Based on the material composition of a Volovo FH as available from product declaration.
- Section bar rolling, steel [RER]: 1630 kg; lognormal SD95 1.5
  Based on the material composition of a Volovo FH as available from product declaration.
- Transport, freight, rail [RER]: 1380 tkm; lognormal SD95 2.06
  standard transport distance
- Propylene glycol, liquid, at plant [RER]: 22 kg; lognormal SD95 1.2
  Based on the material composition of a Volovo FH as available from product declaration.
- Flat glass, uncoated, at plant [RER]: 45 kg; lognormal SD95 1.5
  Based on the material composition of a Volovo FH as available from product declaration.
- Lead, at regional storage [RER]: 73.62 kg; lognormal SD95 1.2
  Lead used in battery

## Inputs from nature
- Water, well [resources, in water]: 69.5 m3; lognormal SD95 1.2
  (same comment as for Light fuel oil, burned in industrial furnace 1MW, non-modulating)

## Emissions to nature
- Chromium [emissions to air, unspecified]: 0.000293 kg; lognormal SD95 5
  Diesel-emission due to engine testing. Own assumptions, based on data representing MAN production sites in Germany and comprises: final truck assembly and engine manufacturing. Data available from environmental reports of the company.
- Selenium [emissions to air, unspecified]: 1.73e-6 kg; lognormal SD95 5
  (same comment as for Chromium)
- Mercury [emissions to air, unspecified]: 3.45e-9 kg; lognormal SD95 5
  (same comment as for Chromium)
- Particulates, > 2.5 um, and < 10um [emissions to air, unspecified]: 0.0212 kg; lognormal SD95 2
  (same comment as for Chromium)
- Heat, waste [emissions to air, unspecified]: 17100 MJ; lognormal SD95 1.21
  (1,4,1,1,1,1); standard values
- BOD5, Biological Oxygen Demand [emissions to water, unspecified]: 0.126 kg; lognormal SD95 2
  Data represent MAN production sites in Germany and comprises: final truck assembly, engine manufacturing, manufacturing of metal parts. Data available from environmental reports of the company. Value calculated from COD value assuming BOD5=COD.
- COD, Chemical Oxygen Demand [emissions to water, unspecified]: 0.126 kg; lognormal SD95 2
  (same comment as for Light fuel oil, burned in industrial furnace 1MW, non-modulating)
- TOC, Total Organic Carbon [emissions to water, unspecified]: 0.0551 kg; lognormal SD95 2
  Data represent MAN production sites in Germany and comprises: final truck assembly, engine manufacturing, manufacturing of metal parts. Data available from environmental reports of the company. Value calculated from COD value assuming TOC=DOC=COD*14/32.
- Xylene [emissions to air, unspecified]: 0.00551 kg; lognormal SD95 2
  (same comment as for Chromium)
- Dinitrogen monoxide [emissions to air, unspecified]: 0.0223 kg; lognormal SD95 2
  (same comment as for Chromium)
- Copper [emissions to air, unspecified]: 0.000293 kg; lognormal SD95 5
  (same comment as for Chromium)
- Nickel [emissions to air, unspecified]: 1.21e-5 kg; lognormal SD95 5
  (same comment as for Chromium)
- Cadmium [emissions to air, unspecified]: 1.73e-6 kg; lognormal SD95 5
  (same comment as for Chromium)
- Toluene [emissions to air, unspecified]: 0.00551 kg; lognormal SD95 2
  (same comment as for Chromium)
- Methane, fossil [emissions to air, unspecified]: 0.0165 kg; lognormal SD95 2
  (same comment as for Chromium)
- Nitrogen oxides [emissions to air, unspecified]: 6 kg; lognormal SD95 2
  (same comment as for Chromium)
- Lead [emissions to air, unspecified]: 1.9e-8 kg; lognormal SD95 5
  (same comment as for Chromium)
- Benzene [emissions to air, unspecified]: 0.0131 kg; lognormal SD95 2
  (same comment as for Chromium)
- Carbon monoxide, fossil [emissions to air, unspecified]: 0.973 kg; lognormal SD95 2
  (same comment as for Chromium)
- Zinc [emissions to air, unspecified]: 0.000173 kg; lognormal SD95 5
  (same comment as for Chromium)
- DOC, Dissolved Organic Carbon [emissions to water, unspecified]: 0.0551 kg; lognormal SD95 2
  (same comment as for TOC, Total Organic Carbon)
- Ammonia [emissions to air, unspecified]: 0.0223 kg; lognormal SD95 2
  (same comment as for Chromium)
- Particulates, > 10 um [emissions to air, unspecified]: 0.0109 kg; lognormal SD95 2
  (same comment as for Chromium)
- Carbon dioxide, fossil [emissions to air, unspecified]: 633 kg; lognormal SD95 2
  (same comment as for Chromium)
- Particulates, < 2.5 um [emissions to air, unspecified]: 0.254 kg; lognormal SD95 2
  (same comment as for Chromium)
- NMVOC, non-methane volatile organic compounds, unspecified origin [emissions to air, unspecified]: 7.87 kg; lognormal SD95 2
  (same comment as for Chromium)
- Sulfur dioxide [emissions to air, unspecified]: 0.12 kg; lognormal SD95 2
  (same comment as for Chromium)
- Water [emissions to water, unspecified]: 62550 kg; lognormal SD95 2.5196
  (5,5,5,5,5,BU:1.05); All uncertainty-values set to 5.0 by default. Balance of input water

## Sampling procedure
Manufacturing data is taken from an environmental report of one production site. Additional data was generated via oral communcation.

## Extrapolations
Data from one production site in Germany is used as an first estimate for Europe

## Sources
- Spielmann M., Bauer C., Dones R., Tuchschmid M., 2007, 2007 - Transport services - Spielmann, Final report ecoinvent Data v2.0, 14, Swiss Centre for LCI, PSI, ESU-services Ltd., Duebendorf, Villigen and Uster, CH
Spielmann M., Dones R; Bauer C. (2007) Life Cycle Inventories of Transport Services. Final report ecoinvent Data v2.0. Volume: 14. Issue: 0. Swiss Centre for LCI, PSI. Dübendorf and Villigen, CH.
Type: Measurement on site
Source: CD-ROM
First author: Spielmann M.
Other authors: Dones R; Bauer C.
Year: 2007
Title of anthology: Final report ecoinvent Data v2.0
Place of publication: Dübendorf and Villigen, CH
Publisher: Swiss Centre for LCI, PSI
Volume No: 14
Issue No: 0

## Validation
Proof reading validation: passed.; Other validation: none;
