# Heat, residential, by combustion of hydrogen using boiler, distributed by truck, produced by Electrolysis, SOEC with steam input using electricity from grid

Dataset: EcoSpold 1, unit process
Functional unit: 1 MJ
Category: heat / synthetic\transformation
Geography: CH
Time period: 2024-01 to 2024-01
Generated by: Romain Sacchi
accessRestrictedTo: 0
copyright: true

## General comment
This dataset represents the supply of 1 megajoule of heat in a residence, by hydrogen combustion in a boiler. The hydrogen is produced by Electrolysis, SOEC with steam input, with electricity from grid as feedstock. Heat conversion efficiency [% LHV input]: 111%. LHV [MJ/kg]: 120. Market price [Euro/MJ]: 0.03. Synthesis efficiency [% LHV input]: 0%. Total cap. Input-related [kW]: 14.95. CO2 biogenic share [%]: 0%. Power [kW]: 16.6. Lifetime [years]: 20. Annual operation [hours]: 2100. Allocation factor: 1. On-site storage loss [%]: 1.26. Use loss [%]: 0.5. For more information, refer to: Sacchi, R. and Bauer, C. LCA of Power-to-X processes and applications in the residential sector. Paul Scherrer Institut, 2023. Source: Sacchi, R. and Bauer, C. LCA of Power-to-X processes and applications in the residential sector. Paul Scherrer Institut, 2023.

## Reference product
- Heat, residential, by combustion of hydrogen using boiler, distributed by truck, produced by Electrolysis, SOEC with steam input using electricity from grid [CH]: 1 MJ
  not defined

## Inputs from technosphere
- Electricity, low voltage, at grid [CH]: 0.000734 kWh; lognormal SD95 1.382
  To operate the boiler. {2;5;1;2;3;5;1.05;}
- Gas boiler 15kW [RER]: 3.984e-7 p; lognormal SD95 3.14
  1/(Total cap. (input-related) [kW] * lifetime [y] * annual operation [h] * 3.6 [MJ/kWh]) {2;5;1;2;3;5;3;}
- Chimney [CH]: 7.968e-7 m; lognormal SD95 3.14
  To evacuate the flue gases. {2;5;1;2;3;5;3;}
- High pressure hydrogen Type I storage tank production [GLO]: 1.787e-6 p; lognormal SD95 3.137
  No. of tanks/(annual hydrogen use x lifetime) {2;5;1;2;3;5;3;}
- Hydrogen supply, distributed by truck, produced by Electrolysis, SOEC with steam input using electricity from grid [CH]: 0.007508 kg; lognormal SD95 1.382
  Hydrogen input. 1 [MJ H2]/120 [MJ/kg H2]/ eff.(th) {2;5;1;2;3;5;1.05;}
- Hydrogen supply, distributed by truck, produced by Electrolysis, SOEC with steam input using electricity from grid [CH]: 0.0001326 kg; lognormal SD95 1.382
  ((1+storage loss)*(1+use loss)-1)*hydrogen input {2;5;1;2;3;5;1.05;}

## Emissions to nature
- Water [emissions to air, stratosphere + troposphere]: 0.06757 kg; lognormal SD95 1.382
  9kg of water produced per kg of H2 combusted. {2;5;1;2;3;5;1.05;}
- Nitrogen oxides [emissions to air, unspecified]: 6.944e-6 kg; lognormal SD95 1.676
  Based on Greenstar 8000 Hydrogen-Ready specifications (25mg NOx/kWh). {2;5;1;2;3;5;1.5;}
- Hydrogen [emissions to air, unspecified]: 0.0001326 kg
  Hydrogen leakage.

## Sampling procedure
Sampling procedure: Literature data

## Sources
- Sacchi R., Bauer C., 2024, 2024 - LCA power-to-X in residential sector - Sacchi, Project report, PSI, Villigen, CH

## Validation
Proof reading validation: Passed, Other validation: none, Validator: Rolf Frischknecht, Telephone: 0041 44 940 61 91, E-mail: frischknecht@treeze.ch, Company: treeze, Country: CH
