# Lean concrete, only common base, at plant

Dataset: EcoSpold 1, unit process
Functional unit: 1 m3
Category: construction materials / concrete
Geography: CH
Generated by: Laura Tschuemperlin
accessRestrictedTo: 0
copyright: true

## General comment
based on ecoinvent 3.2 dataset;

## Included processes
Without the ingredients for the concrete at the factory gate. Includes the whole manufacturing processes to produce ready-mixed concrete and infrastructure. No administration is included.

## Technology
Data from the Amt für Hochbauten, Stadt Zürich. Data approximates average swiss production

## Time period
Time of publications.

## Reference product
- Lean concrete, only common base, at plant [CH]: 1 m3
  SWITZERLAND

## Inputs from technosphere
- Light fuel oil, burned in boiler 10kW condensing, non-modulating [CH]: 2.4 MJ; lognormal SD95 1.5798
  (5,1,3,1,1,5,BU:1.05); ;
- Synthetic rubber, at plant [RER]: 0.12 kg; lognormal SD95 1.2152
  (2,1,1,1,1,5,BU:1.05); ;
- Transport, freight, lorry, 32t-40t gross weight, fleet average [CH]: 0.007 tkm
  only transport of synthetic rubber and lubricating oil included
- Diesel, burned in building machine, average [CH]: 0.2 MJ; lognormal SD95 1.3059
  (1,3,3,3,1,1,BU:1.05); ;
- Concrete mixing plant [CH]: 4.17e-7 p; lognormal SD95 3.0499
  (2,1,2,1,1,5,BU:3); ;
- Disposal, concrete, 5% water, to construction waste landfill [CH]: 5.29 kg; lognormal SD95 1.218
  (2,1,2,1,1,5,BU:1.05); ;
- Electricity, medium voltage, at grid [CH]: 5.4 kWh; lognormal SD95 1.1639
  (3,3,3,2,1,1,BU:1.05); ;
- Disposal, municipal solid waste, 22.9% water, to municipal incineration [CH]: 0.05 kg; lognormal SD95 1.218
  (2,1,2,1,1,5,BU:1.05); ;
- Transport, freight, rail, electricity with shunting [CH]: 0.036 tkm
  only transport of synthetic rubber and lubricating oil included
- Natural gas, burned in industrial furnace 1MW [CH]: 2.6 MJ; lognormal SD95 1.2152
  (2,1,1,1,1,5,BU:1.05); ;
- Lubricating oil, at plant [RER]: 0.02 kg; lognormal SD95 1.2152
  (2,1,1,1,1,5,BU:1.05); ;

## Sampling procedure
Measured data of several Swiss plants, intended to be representative for the Swiss production volume

## Sources
- Created for EcoSpold 1 compatibility, Sachbilanzen von Energiesystemen. Final report No. 6 ecoinvent data v2.0, 6
Faist Emmenegger, M., Heck, T., Jungbluth, N. (2007) Erdgas. Sachbilanzen von Energiesystemen. Final report No. 6 ecoinvent data v2.0. Editors: Dones R.. Volume: 6. Swiss Centre for LCI, PSI. Dübendorf and Villigen, CH.
Type: Measurement on site
Source: CD-ROM
First author: Faist Emmenegger, M.
Other authors: Heck, T., Jungbluth, N.
Year: 2007
Name of editors: Dones R.
Title of anthology: Sachbilanzen von Energiesystemen. Final report No. 6 ecoinvent data v2.0
Place of publication: Dübendorf and Villigen, CH
Publisher: Swiss Centre for LCI, PSI
Volume No: 6
