# Cogen unit 6400kWth, wood burning, building

Dataset: EcoSpold 1, unit process, infrastructure
Functional unit: 1 p
Category: heat / wood\cogeneration\power unit\infrastructure
Geography: CH
Time period: 2000-01 to 2001-12
Generated by: Christian Bauer
accessRestrictedTo: 0
copyright: true

## General comment
Assumed lifetime: 20 years. Operation time for heat production 2030 h/a, for electricity production 3500 h/a, calculated from reported annual production.;

## Included processes
This module includes the most important materials used for the construction of the building: concrete, steel, gravel, wood, rock wool, paint. Also includes the transport of these materials, the area occupied, and the disposal of the building.

## Geography
Could be used for central European conditions.

## Technology
Specific cogeneration unit installed in Switzerland.

## Reference product
- Cogen unit 6400kWth, wood burning, building [CH]: 1 p
  SWITZERLAND

## Inputs from technosphere
- Glued laminated timber, average glue mix, at plant [RER]: 18.2 m3; lognormal SD95 2.06
  basic uncertainty:2;(4,na,3,1,1,na);
- Transport, freight, rail, electricity with shunting [CH]: 26200 tkm; lognormal SD95 1.66
  basic uncertainty:1.6;(4,na,na,1,na,na);
- Sawnwood, production mix, softwood, raw, dried (u=20%), at sawmill [CH]: 150 m3; lognormal SD95 2.06
  basic uncertainty:2;(4,na,3,1,1,na);
- Transport, freight, lorry, 16t-32t gross weight, fleet average [CH]: 38800 tkm; lognormal SD95 1.66
  basic uncertainty:1.6;(4,na,na,1,na,na);
- Rock wool, at plant [CH]: 13 kg; lognormal SD95 2.06
  basic uncertainty:2;(4,na,3,1,1,na);
- Disposal, building, concrete gravel, to sorting plant [CH]: 210000 kg; lognormal SD95 1.55
  (3,3,3,3,4,3);
- Concrete, normal, at plant [CH]: 727 m3; lognormal SD95 2.06
  basic uncertainty:2;(4,na,3,1,1,na);
- Alkyd paint, white, 60% in solvent, at plant [RER]: 680 kg; lognormal SD95 2.06
  basic uncertainty:2;(4,na,3,1,1,na);
- Disposal, building, paint on wood, to final disposal [CH]: 680 kg; lognormal SD95 1.55
  (3,3,3,3,4,3);
- Gravel, crushed, at mine [CH]: 210000 kg; lognormal SD95 2.06
  basic uncertainty:2;(4,na,3,1,1,na);
- Disposal, building, mineral wool, to sorting plant [CH]: 13 kg; lognormal SD95 1.55
  (3,3,3,3,4,3);
- Excavation, hydraulic digger, average [CH]: 8000 m3; lognormal SD95 2.06
  basic uncertainty:2;(4,na,3,1,1,na);
- Reinforcing steel, at plant [RER]: 31500 kg; lognormal SD95 2.06
  basic uncertainty:2;(4,na,3,1,1,na);
- Steel, low-alloyed, at plant [RER]: 7600 kg; lognormal SD95 2.06
  basic uncertainty:2;(4,na,3,1,1,na);
- Disposal, building, waste wood, untreated, to final disposal [CH]: 13200 kg; lognormal SD95 1.55
  (3,3,3,3,4,3);
- Disposal, building, reinforced concrete, to sorting plant [CH]: 1.63e6 kg; lognormal SD95 1.55
  (3,3,3,3,4,3);

## Inputs from nature
- Transformation, from unknown [resources, land]: 2000 m2; lognormal SD95 2.06
  basic uncertainty:2;(4,na,3,1,1,na);
- Occupation, industrial area [resources, land]: 160000 m2a; lognormal SD95 2.06
  basic uncertainty:2;(4,na,3,1,1,na);
- Transformation, to industrial area [resources, land]: 2000 m2; lognormal SD95 2.06
  basic uncertainty:2;(4,na,3,1,1,na);

## Sampling procedure
literature

## Sources
- Bauer C., 2007, 2007 - Wood energy - Bauer, Sachbilanzen von Energiesystemen. Final report No. 6 ecoinvent data v2.0, 6, Swiss Centre for LCI, PSI, Duebendorf and Villigen, CH
Bauer, C. (2007) Holzenergie. Sachbilanzen von Energiesystemen. Final report No. 6 ecoinvent data v2.0. Editors: Dones R.. Volume: 6. Swiss Centre for LCI, PSI. Dübendorf and Villigen, CH.
Type: Measurement on site
Source: CD-ROM
First author: Bauer, C.
Year: 2007
Name of editors: Dones R.
Title of anthology: Sachbilanzen von Energiesystemen. Final report No. 6 ecoinvent data v2.0
Place of publication: Dübendorf and Villigen, CH
Publisher: Swiss Centre for LCI, PSI
Volume No: 6

## Validation
Proof reading validation: passed; Other validation: none;
