# Uranium natural, in uranium hexafluoride, at conversion plant

Dataset: EcoSpold 1, unit process
Functional unit: 1 kg
Category: fuels / uranium\enriched
Geography: RU
Time period: 2011-01 to 2011-12
Generated by: Roberto Dones
accessRestrictedTo: 0
copyright: true

## General comment
PSI data (BFE project 407, Christian Bauer, April 2012).;

## Included processes
The module includes: input of yellowcake U3O8 from uranium milling; electricity and natural gas used for operation; chemicals for the wet process; water use; cement assumed to be used for conditioning of contaminated sludge; transport requirements of operation materials, industrial wastes, and contaminated waste from operation and decommissioning. Radioactive and non-radioactive emissions to air and to water from the operation are also included. The infrastructure requirements are accounted for, although construction and operation data partially refer to different plants rather than to one single unit.

## Technology
Effluents correspond to operational characteristics in 1980s.

## Reference product
- Uranium natural, in uranium hexafluoride, at conversion plant [RU]: 1 kg
  RUSSIAN FEDERATION

## Inputs from technosphere
- Electricity, medium voltage, production RU, at grid [RU]: 6.1 kWh
  Axpo data
- Quicklime, milled, loose, at plant [CH]: 0.5 kg; lognormal SD95 1.5
  v2.2
- Transport, freight, rail, diesel [US]: 4.84 tkm
  Axpo data
- Uranium conversion plant [US]: 3.13e-9 p; lognormal SD95 1.2
  v2.2
- Nitric acid, 50% in H2O, at plant [RER]: 0.9 kg; lognormal SD95 1.5
  v2.2
- Cement, unspecified, at plant [CH]: 0.81 kg; lognormal SD95 2
  v2.2
- Low active radioactive waste [CH]: 0.01 m3; lognormal SD95 1.5
  Axpo
- Transport, freight, lorry, 32t-40t gross weight, fleet average [RER]: 4 tkm; lognormal SD95 2.1
  rough estimate; 1000km
- Hydrogen fluoride, at plant [GLO]: 0.505 kg
  Axpo data
- Ammonia, liquid, at regional storehouse [RER]: 0.25 kg; lognormal SD95 1.5
  v2.2
- Uranium natural, in yellowcake, at mill [RU]: 1 kg
  Axpo data
- Water, decarbonised, at plant [RER]: 500 kg; lognormal SD95 1.5
  v2.2
- Chemicals inorganic, at plant [GLO]: 0.052 kg; lognormal SD95 1.5
  v2.2
- Chemicals organic, at plant [GLO]: 0.03 kg; lognormal SD95 1.5
  v2.2

## Emissions to nature
- Radium-226 [emissions to water, river]: 0.0014 kBq; lognormal SD95 2.5
  v2.2
- Radium-226 [emissions to air, low. pop.]: 0.00349 kBq
  Axpo data
- Suspended solids, unspecified [emissions to water, river]: 0.0026 kg
  Axpo data
- Protactinium-234 [emissions to water, river]: 5 kBq; lognormal SD95 3
  v2.2
- Kerosene [emissions to air, high. pop.]: 0.0003 kg
  Axpo data
- Lead [emissions to water, river]: 1.7e-6 kg; lognormal SD95 1.2
  v2.2
- Thorium-230 [emissions to water, river]: 0.0012 kBq; lognormal SD95 3
  v2.2
- Thorium-230 [emissions to air, low. pop.]: 0.00575 kBq
  Axpo data
- Chloride [emissions to water, river]: 0.0087 kg; lognormal SD95 1.2
  v2.2
- Sulfur dioxide [emissions to air, low. pop.]: 0.0055 kg; lognormal SD95 1.2
  v2.2
- NMVOC, non-methane volatile organic compounds, unspecified origin [emissions to air, low. pop.]: 0.00012 kg; lognormal SD95 1.2
  v2.2
- Calcium [emissions to water, river]: 0.0083 kg; lognormal SD95 1.2
  v2.2
- Ammonium, ion [emissions to water, river]: 0.00017 kg; lognormal SD95 1.2
  v2.2
- COD, Chemical Oxygen Demand [emissions to water, river]: 0.0017 kg; lognormal SD95 1.2
  v2.2
- Uranium-235 [emissions to water, river]: 0.2 kBq; lognormal SD95 5
  v2.2
- Aluminium [emissions to water, river]: 6.9e-5 kg; lognormal SD95 1.2
  v2.2
- Sulfate [emissions to water, river]: 0.0028 kg; lognormal SD95 1.2
  v2.2
- Radioactive species, unspecified [emissions to air, low. pop.]: 0.051 kBq
  Axpo data
- Acetone [emissions to air, high. pop.]: 0.00035 kg
  Axpo data
- Phosphate [emissions to water, river]: 5.2e-5 kg; lognormal SD95 1.2
  v2.2
- Titanium [emissions to water, river]: 1.7e-6 kg; lognormal SD95 1.2
  v2.2
- Nitrogen oxides [emissions to air, low. pop.]: 0.025 kg; lognormal SD95 1.2
  v2.2
- Uranium-235 [emissions to air, low. pop.]: 0.00277 kBq
  Axpo data
- Ammonia [emissions to air, high. pop.]: 0.0051 kg
  Axpo data
- Nitrate [emissions to water, river]: 0.00061 kg; lognormal SD95 1.2
  v2.2
- BOD5, Biological Oxygen Demand [emissions to water, river]: 0.013 kg
  Axpo data
- Carbon monoxide, fossil [emissions to air, low. pop.]: 0.00069 kg; lognormal SD95 1.2
  v2.2
- Mercury [emissions to water, river]: 1.7e-7 kg; lognormal SD95 1.2
  v2.2
- TOC, Total Organic Carbon [emissions to water, river]: 0.00017 kg; lognormal SD95 1.2
  v2.2
- Iron [emissions to water, river]: 0.000176 kg
  Axpo data
- Fluoride [emissions to water, river]: 0.00083 kg
  Axpo data
- Copper [emissions to water, river]: 4.3e-5 kg
  Axpo data
- Magnesium [emissions to water, river]: 0.00035 kg; lognormal SD95 1.2
  v2.2
- Petrol [emissions to water, river]: 7.3e-5 kg
  Axpo data
- Thorium-232 [emissions to air, low. pop.]: 0.00303 kBq
  Axpo data
- Barium [emissions to water, river]: 2.2e-5 kg; lognormal SD95 1.2
  v2.2
- Uranium-238 [emissions to air, low. pop.]: 0.0626 kBq
  Axpo data
- Xylene [emissions to air, high. pop.]: 0.00107 kg
  Axpo data
- Toluene [emissions to air, high. pop.]: 0.00027 kg
  Axpo data
- Sodium [emissions to water, river]: 0.0061 kg; lognormal SD95 1.2
  v2.2
- Tin [emissions to water, river]: 6.9e-6 kg; lognormal SD95 1.2
  v2.2
- Zinc [emissions to water, river]: 6.9e-6 kg; lognormal SD95 1.2
  v2.2
- Hydrogen fluoride [emissions to air, high. pop.]: 1.89e-5 kg
  Axpo data
- Thorium-234 [emissions to water, river]: 5 kBq; lognormal SD95 3
  v2.2
- Cadmium [emissions to water, river]: 1.7e-6 kg; lognormal SD95 1.2
  v2.2
- Uranium-238 [emissions to water, river]: 5.4 kBq; lognormal SD95 5
  v2.2
- Uranium-234 [emissions to water, river]: 5.4 kBq; lognormal SD95 5
  v2.2
- Particulates, > 2.5 um, and < 10um [emissions to air, low. pop.]: 0.00073 kg; lognormal SD95 1.4
  v2.2
- Chromium [emissions to water, river]: 1e-5 kg; lognormal SD95 1.2
  v2.2
- Sulfide [emissions to water, river]: 1.7e-5 kg; lognormal SD95 1.2
  v2.2
- Uranium-234 [emissions to air, low. pop.]: 0.0608 kBq
  Axpo data
- Manganese [emissions to water, river]: 0.00022 kg; lognormal SD95 1.2
  v2.2
- Potassium [emissions to water, river]: 0.00017 kg; lognormal SD95 1.2
  v2.2

## Sampling procedure
Literature

## Sources
- Bauer C., Frischknecht R., Eckle P., Flury K., Neal T., Papp K., Schori S., Simons A., Stucki M., Treyer K., 2012, 2012 - LCA electricity generation in Switzerland - Uster, -, 407, Swiss Centre for LCI, ESU-services Ltd., PSI, Uster and Villigen, CH
Ch. Bauer, Frischknecht (2012) Umweltauswirkungen Strom. Volume: 407. PSI. Uster und Villigen, CH.
Type: Separate publication
Source: CD-ROM
First author: Ch. Bauer
Other authors: Frischknecht
Year: 2012
Place of publication: Uster und Villigen, CH
Publisher: PSI
Volume No: 407
