# Treatment, particle board production effluent, to wastewater treatment, class 1

Dataset: EcoSpold 1, unit process
Functional unit: 1 m3
Category: wood / wooden materials\new processes\other material
Geography: RER
Time period: 2000-01 to 2016-12
Generated by: default
accessRestrictedTo: 0
copyright: true

## Reference product
- Treatment, particle board production effluent, to wastewater treatment, class 1 [RER]: 1 m3

## Inputs from technosphere
- Chemicals inorganic, at plant [GLO]: 3.21e-12 kg; lognormal SD95 1.3937
  Pedigree: (1,1,2,1,1).
- Electricity, low voltage, production ENTSO-E, at grid: 0.0279 kWh; lognormal SD95 1.41439
  Pedigree: (1,1,2,1,1).
- Wastewater treatment plant, class 1 [CH]: 5.69e-9 p; lognormal SD95 1.01424
  Pedigree: (1,1,2,1,1).
- Municipal waste incineration plant [CH]: 5.65e-14 p; lognormal SD95 1.10627
  Pedigree: (1,1,2,1,1).
- Heat, natural gas, at boiler condensing modulating >100kW [RER]: 0.017 MJ; lognormal SD95 1.20019
  Pedigree: (4,2,2,1,1).
- Transport, freight, lorry, fleet average [RER]: 2.5e-6 tkm; lognormal SD95 1.5103
  Pedigree: (1,1,4,5,4).
- Process-specific burdens, municipal waste incineration [CH]: 0.000226 kg; lognormal SD95 1.10627
  Pedigree: (1,1,2,1,1).
- Disposal, plastics, mixture, 15.3% water, to municipal incineration [CH]: 0.0155 kg
- Cement, unspecified, at plant [CH]: 6.89e-8 kg; lognormal SD95 1.22201
  Pedigree: (1,1,2,1,1).
- Sewer grid, class 1 [CH]: 2.17e-7 km; lognormal SD95 1.01424
  Pedigree: (1,1,2,1,1).
- Disposal, cement, hydrated, 0% water, to residual material landfill [CH]: 1.73e-7 kg
- Heat, hardwood chips from industry, at furnace 300kW [CH]: 0.0126 MJ; lognormal SD95 1.10627
  Pedigree: (1,1,2,1,1).
- Process-specific burdens, residual material landfill [CH]: 1.72e-7 kg; lognormal SD95 1.1898
  Pedigree: (1,1,2,1,1).
- Transport, freight, rail [RER]: 0.0099327 tkm; lognormal SD95 1.5103
  Pedigree: (1,1,4,5,4).
- Process-specific burdens, slag compartment [CH]: 3.73e-7 kg; lognormal SD95 1.1898
  Pedigree: (1,1,2,1,1).
- Hydrochloric acid, 30% in H2O, at plant [RER]: 1.93e-12 kg; lognormal SD95 1.3937
  Pedigree: (1,1,2,1,1).

## Inputs from nature
- Water, process, unspecified natural origin/m3 [resources, unspecified]: 0.9 m3

## Emissions to nature
- COD, Chemical Oxygen Demand [emissions to water, river]: 8.53e-5 kg; lognormal SD95 1.01424
  Pedigree: (1,1,2,1,1).
- Methane, biogenic [emissions to air, high. pop.]: 1.45e-6 kg; lognormal SD95 1.51067
  Pedigree: (1,1,2,1,1).
- DOC, Dissolved Organic Carbon [emissions to water, river]: 2.13e-5 kg; lognormal SD95 1.01424
  Pedigree: (1,1,2,1,1).
- Carbon dioxide, biogenic [emissions to air, high. pop.]: 0.00059 kg; lognormal SD95 1.27808
  Pedigree: (1,1,2,1,1).
- Carbon monoxide, biogenic [emissions to air, high. pop.]: 4.73e-7 kg; lognormal SD95 1.54669
  Pedigree: (1,1,2,1,1).
- TOC, Total Organic Carbon [emissions to water, river]: 4.88e-7 kg; lognormal SD95 1.32737
  Pedigree: (1,1,2,1,1).
- NMVOC, non-methane volatile organic compounds, unspecified origin [emissions to air, high. pop.]: 6.59e-9 kg; lognormal SD95 1.71378
  Pedigree: (1,1,2,1,1).
- DOC, Dissolved Organic Carbon [emissions to water, groundwater, long-term]: 4.87e-7 kg; lognormal SD95 1.47338
  Pedigree: (1,1,2,1,1).
- COD, Chemical Oxygen Demand [emissions to water, groundwater, long-term]: 1.23e-6 kg; lognormal SD95 1.47338
  Pedigree: (1,1,2,1,1).
- BOD5, Biological Oxygen Demand [emissions to water, groundwater, long-term]: 4.03e-7 kg; lognormal SD95 1.47338
  Pedigree: (1,1,2,1,1).
- Water [emissions to air, unspecified]: 0.1 kg; lognormal SD95 1.22414
  Pedigree: (2,2,2,1,1).
- TOC, Total Organic Carbon [emissions to water, groundwater, long-term]: 4.88e-7 kg; lognormal SD95 1.47338
  Pedigree: (1,1,2,1,1).
- BOD5, Biological Oxygen Demand [emissions to water, river]: 5.84e-6 kg; lognormal SD95 1.35031
  Pedigree: (1,1,2,1,1).

## Sources
- Werner F., 2017, 2017 - LCI wood and wood based products - Werner, Project Report, 0, Environment & Development, Zuerich, CH
