# Treatment, condensate from light oil boiler, to wastewater treatment, class 2

Dataset: EcoSpold 1, unit process
Functional unit: 1 m3
Category: wastewater treatment / unspecified
Geography: CH
Time period: 2000-01 to 2000-12
Generated by: Gabor Doka
accessRestrictedTo: 0
copyright: true

## General comment
Wastewater purified in a moderatly large municipal wastewater treatment plant (capacity class 2), with an average capacity size of 71100 per-captia-equivalents PCE. \nWastewater contains (in kg/m3): TOC: 0.025 (GSD=128.4%);

## Included processes
Infrastructure materials for municipal wastewater treatment plant, transports, dismantling. Land use burdens.

## Technology
Three stage wastewater treatment (mechanical, biological, chemical) including sludge digestion (fermentation) according to the average technology in Switzerland

## Reference product
- Treatment, condensate from light oil boiler, to wastewater treatment, class 2 [CH]: 1 m3
  SWITZERLAND

## Inputs from technosphere
- Residual material landfill facility [CH]: 7.1573e-12 p; lognormal SD95 1.4495
  burden from sludge incineration. Uncertainty calculated from wastewater composition and treatment model
- Transport, freight, rail [RER]: 0.00014712 tkm; lognormal SD95 1.4936
  direct wastewater treatment plant burden plus burden from sludge incineration. Uncertainty calculated from wastewater composition and treatment model
- Natural gas, burned in industrial furnace 1MW [CH]: 4.3627e-5 MJ; lognormal SD95 2.6038
  (same comment as for Residual material landfill facility)
- Disposal, paper, 11.2% water, to municipal incineration [CH]: 0.0155 kg; lognormal SD95 1.07
  direct wastewater treatment plant burden. Uncertainty calculated from wastewater composition and treatment model
- Chemicals inorganic, at plant [GLO]: 4.4894e-8 kg; lognormal SD95 3.2305
  (same comment as for Residual material landfill facility)
- Hydrochloric acid, 30% in H2O, at plant [RER]: 2.6937e-8 kg; lognormal SD95 3.2305
  (same comment as for Residual material landfill facility)
- Iron (III) chloride, 40% in H2O, at plant [CH]: 5.6876e-6 kg; lognormal SD95 4.1562
  (same comment as for Transport, freight, rail)
- Slurry spreading, by vacuum tanker [CH]: 0.00017697 m3; lognormal SD95 1.1498
  burden from sludge spreading. Uncertainty calculated from wastewater composition and treatment model
- Sodium hydroxide, 50% in H2O, production mix, at plant [RER]: 2.2229e-8 kg; lognormal SD95 1.9862
  (same comment as for Residual material landfill facility)
- Disposal, cement, hydrated, 0% water, to residual material landfill [CH]: 0.0034355 kg; lognormal SD95 1.5179
  (same comment as for Residual material landfill facility)
- Process-specific burdens, municipal waste incineration [CH]: 0.075634 kg; lognormal SD95 1.7419
  (same comment as for Residual material landfill facility)
- Ammonia, liquid, at regional storehouse [CH]: 4.4735e-7 kg; lognormal SD95 2.6038
  (same comment as for Residual material landfill facility)
- Cement, unspecified, at plant [CH]: 0.0013742 kg; lognormal SD95 1.5179
  (same comment as for Residual material landfill facility)
- Disposal, plastics, mixture, 15.3% water, to municipal incineration [CH]: 0.0155 kg; lognormal SD95 1.07
  (same comment as for Disposal, paper, 11.2% water, to municipal incineration)
- Transport, freight, lorry, 16t-32t gross weight, fleet average [CH]: 0.0059964 tkm; lognormal SD95 1.1291
  (same comment as for Transport, freight, rail)
- Electricity, low voltage, at grid [CH]: 0.066203 kWh; lognormal SD95 1.7414
  (same comment as for Disposal, paper, 11.2% water, to municipal incineration)
- Wastewater treatment plant, class 2 [CH]: 1.9883e-9 p; lognormal SD95 1
  uncertainty heeded in exchanges of the module
- Electricity from waste, at municipal waste incineration plant [CH]: 0.010874 kWh; lognormal SD95 4.2245
  (same comment as for Residual material landfill facility)
- Slag compartment [CH]: 3.5279e-11 p; lognormal SD95 1.4438
  (same comment as for Residual material landfill facility)
- Heat from waste, at municipal waste incineration plant [CH]: 0.063433 MJ; lognormal SD95 1.7456
  (same comment as for Residual material landfill facility)
- Municipal waste incineration plant [CH]: 1.8909e-11 p; lognormal SD95 1.7419
  (same comment as for Residual material landfill facility)
- Chromium oxide, flakes, at plant [RER]: 2.6133e-10 kg; lognormal SD95 4.4197
  (same comment as for Residual material landfill facility)
- Process-specific burdens, slag compartment [CH]: 0.019845 kg; lognormal SD95 1.4438
  (same comment as for Residual material landfill facility)
- Process-specific burdens, residual material landfill [CH]: 0.0034355 kg; lognormal SD95 1.4495
  (same comment as for Residual material landfill facility)
- Sewer grid, class 2 [CH]: 1.6832e-7 km; lognormal SD95 1
  uncertainty heeded in exchanges of the module
- Titanium dioxide, production mix, at plant [RER]: 1.2805e-8 kg; lognormal SD95 4.4197
  (same comment as for Residual material landfill facility)
- Quicklime, milled, packed, at plant [CH]: 4.0302e-9 kg; lognormal SD95 2.0055
  (same comment as for Residual material landfill facility)

## Emissions to nature
- DOC, Dissolved Organic Carbon [emissions to water, groundwater, long-term]: 3.8465e-5 kg; lognormal SD95 1.4242
  emission from sludge incineration. Uncertainty calculated from wastewater composition and treatment model
- Methane, fossil [emissions to air, high. pop.]: 0.00018674 kg; lognormal SD95 1.614
  (same comment as for DOC, Dissolved Organic Carbon)
- Heat, waste [emissions to air, high. pop.]: 0.44504 MJ; lognormal SD95 1.4016
  direct wastewater treatment plant emission plus emission from sludge incineration. Uncertainty calculated from wastewater composition and treatment model
- Cyanide [emissions to air, high. pop.]: 7.9805e-9 kg; lognormal SD95 2.726
  (same comment as for DOC, Dissolved Organic Carbon)
- Nitrate [emissions to water, groundwater, long-term]: 3.1854e-7 kg; lognormal SD95 1.8611
  (same comment as for DOC, Dissolved Organic Carbon)
- Nickel [emissions to water, river]: 0.0012131 kg; lognormal SD95 4.973
  sewer overload discharge plus direct wastewater treatment plant emission plus emission from sludge incineration. Uncertainty calculated from wastewater composition and treatment model
- Aluminium [emissions to air, high. pop.]: 1.8011e-5 kg; lognormal SD95 5.3818
  direct digester gas emission plus emission from sludge incineration. Uncertainty calculated from wastewater composition and treatment model
- Nickel [emissions to air, high. pop.]: 2.0835e-11 kg; lognormal SD95 5.8949
  (same comment as for Aluminium)
- Zinc [emissions to water, river]: 6.1836e-6 kg; lognormal SD95 4.8899
  (same comment as for Nickel)
- Carbon monoxide, fossil [emissions to air, high. pop.]: 6.7344e-5 kg; lognormal SD95 1.8728
  (same comment as for DOC, Dissolved Organic Carbon)
- Chloride [emissions to water, river]: 0.01 kg; lognormal SD95 5.0113
  (same comment as for Nickel)
- Nickel [emissions to water, groundwater, long-term]: 0.00045199 kg; lognormal SD95 5.2555
  (same comment as for DOC, Dissolved Organic Carbon)
- TOC, Total Organic Carbon [emissions to water, groundwater, long-term]: 3.8465e-5 kg; lognormal SD95 1.4242
  (same comment as for DOC, Dissolved Organic Carbon)
- DOC, Dissolved Organic Carbon [emissions to water, river]: 0.0028001 kg; lognormal SD95 1.148
  (same comment as for Nickel)
- Dinitrogen monoxide [emissions to air, high. pop.]: 5.4378e-6 kg; lognormal SD95 1.6134
  direct wastewater treatment plant emission plus direct digester gas emission plus emission from sludge incineration plus emission from sludge spreading. Uncertainty calculated from wastewater composition and treatment model
- Nitrate [emissions to water, river]: 0.0074931 kg; lognormal SD95 1.6437
  (same comment as for Nickel)
- Iron [emissions to water, groundwater, long-term]: 0.00028294 kg; lognormal SD95 11.788
  (same comment as for DOC, Dissolved Organic Carbon)
- Aluminium [emissions to soil, agricultural]: 0.007271 kg; lognormal SD95 5.2824
  emission from sludge spreading. Uncertainty calculated from wastewater composition and treatment model
- Nitrogen oxides [emissions to air, high. pop.]: 4.3453e-6 kg; lognormal SD95 1.8224
  (same comment as for Aluminium)
- Iron [emissions to soil, agricultural]: 0.00038094 kg; lognormal SD95 5.2655
  (same comment as for Aluminium)
- Zinc [emissions to air, high. pop.]: 1.3844e-10 kg; lognormal SD95 5.5595
  (same comment as for Aluminium)
- Carbon dioxide, fossil [emissions to air, high. pop.]: 0.071518 kg; lognormal SD95 1.1689
  (same comment as for DOC, Dissolved Organic Carbon)
- Chromium VI [emissions to water, river]: 0.00020694 kg; lognormal SD95 4.8382
  (same comment as for Nickel)
- COD, Chemical Oxygen Demand [emissions to water, river]: 0.011189 kg; lognormal SD95 1.1138
  (same comment as for Nickel)
- Zinc [emissions to water, groundwater, long-term]: 1.3138e-7 kg; lognormal SD95 108.26
  (same comment as for DOC, Dissolved Organic Carbon)
- Chromium VI [emissions to water, groundwater, long-term]: 1.2789e-5 kg; lognormal SD95 7.9218
  (same comment as for DOC, Dissolved Organic Carbon)
- Carbon [emissions to soil, agricultural]: 0.0024842 kg; lognormal SD95 1.3568
  (same comment as for Aluminium)
- Chromium [emissions to soil, agricultural]: 7.6188e-5 kg; lognormal SD95 5.2655
  (same comment as for Aluminium)
- BOD5, Biological Oxygen Demand [emissions to water, river]: 0.0036744 kg; lognormal SD95 1.1573
  (same comment as for Nickel)
- Fluoride [emissions to water, river]: 0.00045 kg; lognormal SD95 5.0113
  (same comment as for Nickel)
- Ammonia [emissions to air, high. pop.]: 2.2109e-6 kg; lognormal SD95 2.8625
  direct digester gas emission plus emission from sludge incineration plus emission from sludge spreading. Uncertainty calculated from wastewater composition and treatment model
- Aluminium [emissions to water, groundwater, long-term]: 0.0085323 kg; lognormal SD95 5.3424
  (same comment as for DOC, Dissolved Organic Carbon)
- Chromium [emissions to air, high. pop.]: 8.9329e-12 kg; lognormal SD95 5.8684
  (same comment as for Aluminium)
- Nickel [emissions to soil, agricultural]: 0.00030444 kg; lognormal SD95 5.2619
  (same comment as for Aluminium)
- Copper [emissions to soil, agricultural]: 8.5929e-6 kg; lognormal SD95 5.2748
  (same comment as for Aluminium)
- BOD5, Biological Oxygen Demand [emissions to water, groundwater, long-term]: 3.1796e-5 kg; lognormal SD95 1.4242
  (same comment as for DOC, Dissolved Organic Carbon)
- TOC, Total Organic Carbon [emissions to water, river]: 0.0029977 kg; lognormal SD95 1.1232
  (same comment as for Nickel)
- COD, Chemical Oxygen Demand [emissions to water, groundwater, long-term]: 9.7208e-5 kg; lognormal SD95 1.4242
  (same comment as for DOC, Dissolved Organic Carbon)
- Copper [emissions to air, high. pop.]: 1.0058e-10 kg; lognormal SD95 5.6078
  (same comment as for Aluminium)
- NMVOC, non-methane volatile organic compounds, unspecified origin [emissions to air, high. pop.]: 8.4744e-7 kg; lognormal SD95 2.3001
  direct digester gas emission. Uncertainty calculated from wastewater composition and treatment model
- Aluminium [emissions to water, river]: 0.0012005 kg; lognormal SD95 4.2533
  (same comment as for Nickel)
- Copper [emissions to water, groundwater, long-term]: 1.1014e-5 kg; lognormal SD95 5.3662
  (same comment as for DOC, Dissolved Organic Carbon)
- Iron [emissions to air, high. pop.]: 2.0166e-8 kg; lognormal SD95 5.5299
  (same comment as for Aluminium)
- Iron [emissions to water, river]: 0.0010152 kg; lognormal SD95 4.9665
  (same comment as for Nickel)
- Chromium [emissions to water, river]: 3.8504e-7 kg; lognormal SD95 5.3457
  (same comment as for DOC, Dissolved Organic Carbon)
- Sulfate [emissions to water, river]: 0.25661 kg; lognormal SD95 1.6426
  (same comment as for Nickel)
- Nitrogen [emissions to water, river]: 6.8098e-6 kg; lognormal SD95 1.8485
  direct wastewater treatment plant emission. Uncertainty calculated from wastewater composition and treatment model
- Heat, waste [emissions to water, river]: 0.4417 MJ; lognormal SD95 1.1483
  (same comment as for Heat, waste)
- Zinc [emissions to soil, agricultural]: 5.344e-6 kg; lognormal SD95 5.2729
  (same comment as for Aluminium)
- Copper [emissions to water, river]: 7.7818e-6 kg; lognormal SD95 4.8587
  (same comment as for Nickel)

## Sources
- Doka G., 2009, 2009 - LCI waste treatment services - Doka, Final report ecoinvent data v2.1, 13, Swiss Centre for LCI, Doka LCA, Duebendorf and St. Gallen, CH
Doka G. (2008) Life Cycle Inventories of Waste Treatment Services. Final report ecoinvent data v2.1. Volume: 13. Issue: 0. Swiss Centre for LCI, Empa - TSL. Dübendorf, CH.
Type: Measurement on site
Source: CD-ROM
First author: Doka G.
Year: 2008
Title of anthology: Final report ecoinvent data v2.1
Place of publication: Dübendorf, CH
Publisher: Swiss Centre for LCI, Empa - TSL
Volume No: 13
Issue No: 0

## Validation
Proof reading validation: passed.; Other validation: none;
