# Glycerine, from rape oil, at esterification plant

Dataset: EcoSpold 1, unit process
Functional unit: 1 kg
Category: chemicals / organic
Geography: CH
Time period: 2004-01 to 2004-12
Production volume: Approx. 2.5-3 kt of vegetable oil were processed to methyl ester in 2004 in CH
Generated by: Matthias Stucki
accessRestrictedTo: 0
copyright: true

## General comment
Inventory refers to the production of 1 kg rape rape methyl ester, respectively glycerine, from rape oil. The multioutput-process 'rape oil, in esterification plant' delivers the co-products 'rape methyl ester, at esterification plant' and 'glycerine, from rape oil, at esterification plant'. Economic allocation with allocation factor of 97.8% to rape methyl ester. Allocation of CO2 emissions is done according to carbon balance.;
CAS number: 000056-81-5;
Formula: C3H8O3;

## Included processes
Original Author: Arnaud Dauriat; Author of updated dataset: Matthias Stucki. The update includes the allocation based on updated price information (208 CHF/ton glycerine).

## Geography
Data from biodiesel producers in CH, industrial data

## Technology
Typical rape oil esterification plant designed for rape methyl ester (RME) production (for use in the vehicle fuels market), Swiss context. Rape oil base-catalyzed transesterification (based on industrial data from biodiesel producer in CH).

## Reference product
- Glycerine, from rape oil, at esterification plant [CH]: 1 kg

## Inputs from technosphere
- Heat, natural gas, at industrial furnace 1MW [CH]: 0.019868 MJ; lognormal SD95 1.325
  (1,4,2,1,3,4); Industrial data from biodiesel producer in CH
- Saw dust, production mix, wet, measured as dry mass, at sawmill [CH]: 4.946e-5 kg
  (1,4,2,1,3,4); Literature data & biodiesel producer
- Treatment, sewage, from residence, to wastewater treatment, class 2 [CH]: 5.1173e-5 m3; lognormal SD95 1.6517
  (1,4,2,1,3,4); Calculation, to close mass balance of process
- Electricity, medium voltage, at grid [CH]: 0.017174 kWh; lognormal SD95 1.325
  (1,4,2,1,3,4); Industrial data from biodiesel producer in CH
- Tap water, at user [CH]: 0.0063751 kg; lognormal SD95 3.3428
  (1,1,1,1,1,1); Literature, environmental report
- Potassium hydroxide, at regional storage [RER]: 0.0032253 kg; lognormal SD95 1.6517
  (1,4,2,1,3,4); Literature data & biodiesel producer
- Vegetable oil esterification plant [CH]: 2.1241e-10 p; lognormal SD95 1.325
  (1,4,2,1,3,4); Calculation, according to feed capacity and lifetime of the plant
- Rape oil, at oil mill [CH]: 0.23365 kg; lognormal SD95 1.325
  (1,4,2,1,3,4); Industrial data from biodiesel producer in CH
- Transport, freight, lorry, 16t-32t gross weight, fleet average [CH]: 0.0050192 tkm; lognormal SD95 1.325
  (1,4,2,1,3,4); Based on ecoinvent Guidelines, standard distances
- Transport, freight, rail, electricity with shunting [CH]: 0.020849 tkm; lognormal SD95 1.325
  (1,4,2,1,3,4); Based on ecoinvent Guidelines, standard distances
- Methanol, at regional storage [CH]: 0.031491 kg; lognormal SD95 1.325
  (1,4,2,1,3,4); Industrial data from biodiesel producer in CH

## Emissions to nature
- Heat, waste [emissions to air, high. pop.]: 1.4851 MJ; lognormal SD95 1.6517
  (1,4,2,1,3,4); ecoinvent guidelines, calculation from electricity consumption and energy balance
- Carbon dioxide, biogenic [emissions to air, high. pop.]: 2.4948 kg; lognormal SD95 1.6517
  (1,4,2,1,3,4); Calculation, to close carbon balance

## Sources
- Stucki M., Jungbluth N., Leuenberger M., 2011, 2011 - LCA biogas prod. from diff. substrates - Stucki, Project report, 320, ESU-services Ltd., Uster, CH
Stucki M., Jungbluth N., Leuenberger M. (2011) Life Cycle Assessment of Biogas Production from Different Substrates. Project report. Volume: 320. ESU-services Ltd.. Uster, CH.
Type: Separate publication
Source: Report
First author: Stucki M.
Other authors: Jungbluth N., Leuenberger M.
Year: 2011
Title of anthology: Project report
Place of publication: Uster, CH
Publisher: ESU-services Ltd.
Volume No: 320
Original title: Life Cycle Assessment of Biogas Production from Different Substrates

## Validation
Proof reading validation: 01.02.2012; Other validation: \\Server\e\ESU-Docs\Projektablage\320_FP Biomasse Biogas_Substrate\Ecospold\Veröffentlicht\BiogasFromPurchased Substrates\[stucki-2011-biogas-production.xlsx]X-Process;
