# Uranium, enriched 3.8%, at URENCO enrichment plant

Dataset: EcoSpold 1, unit process
Functional unit: 1 kg
Category: fuels / uranium\enriched
Geography: RER
Time period: 2000-01 to 2000-12
Generated by: Roberto Dones
accessRestrictedTo: 0
copyright: true

## General comment
This module uses a mix of data, some specific for the URENCO facilities taken from environmental reports, some from literature. The plants consume 40 kWh/SWU and the electricity is assumed to be supplied by the UCTE grid. The factor for the infrastructure requirement is calculated with annual throughput of 1500 t SWU for 30 years operation.;

## Included processes
The module includes: input of UF6; electricity, diesel, and natural gas used for operation; also taken into account is the material for replacement of centrifuge; water use, lubricant oil, and wastewater treatment; concrete assumed to be used for conditioning of contaminated scrap from decommissioning; transport requirements of operation materials, industrial wastes, and contaminated waste from decommissioning (25% of the reinforced concrete and the great part of metals according to the reference). Radioactive and non-radioactive emissions to air and to water from the operation are also included. The infrastructure requirements are accounted for, though construction and operation data partially refer to different plants rather than to one single unit.

## Technology
Current technology for uranium enrichment with centrifuge process.

## Reference product
- Uranium, enriched 3.8%, at URENCO enrichment plant [RER]: 1 kg
  Europe

## Inputs from technosphere
- Acetylene, at regional storehouse [CH]: 2.5e-5 kg; lognormal SD95 1.1
  environmental report
- Transport, freight, rail [RER]: 0.0668 tkm; lognormal SD95 2.1
  standard
- Uranium enrichment centrifuge plant [GLO]: 2.22e-8 p; lognormal SD95 1.5
  own estimation
- Brass, at plant [CH]: 0.0018 kg; lognormal SD95 2
  own assumption
- Hydrogen peroxide, 50% in H2O, at plant [RER]: 0.00068 kg; lognormal SD95 1.1
  environmental report
- Concrete, normal, at plant [CH]: 0.00029 m3; lognormal SD95 2
  own estimation
- Oxygen, liquid, at plant [RER]: 3.6e-5 kg; lognormal SD95 1.1
  environmental report
- Hydrochloric acid, 30% in H2O, at plant [RER]: 0.0002 kg; lognormal SD95 1.1
  environmental report
- Electricity, medium voltage, production ENTSO-E, at grid: 40 kWh; lognormal SD95 1.25
  range of data
- Diesel, burned in diesel-electric generating set [GLO]: 1.28 MJ; lognormal SD95 1.1
  environmental report
- Lubricating oil, at plant [RER]: 0.0092 kg; lognormal SD95 1.1
  environmental report
- Low active radioactive waste [CH]: 0.00063 m3; lognormal SD95 1.1
  environmental report
- Chemicals inorganic, at plant [GLO]: 0.0311 kg; lognormal SD95 1.1
  environmental report
- Uranium natural, in uranium hexafluoride, at conversion plant [US]: 1.48 kg; lognormal SD95 1
  calculated
- Soap, at plant [RER]: 0.00088 kg; lognormal SD95 1.1
  environmental report
- Polyvinylchloride, bulk polymerised, at plant [RER]: 0.00087 kg; lognormal SD95 1.1
  environmental report
- Steel, low-alloyed, at plant [RER]: 0.15 kg; lognormal SD95 1.5
  own estimation
- Aluminium, primary, at plant [RER]: 0.05 kg; lognormal SD95 2
  own estimation
- Transport, freight, lorry, fleet average [RER]: 0.893 tkm; lognormal SD95 2.1
  standard
- Disposal, used mineral oil, 10% water, to hazardous waste incineration [CH]: 0.0024 kg; lognormal SD95 1.1
  environmental report
- Disposal, anion exchange resin f. water, 50% water, to municipal incineration [CH]: 0.058 kg; lognormal SD95 1.1
  environmental report
- Argon, liquid, at plant [RER]: 0.0018 kg; lognormal SD95 1.1
  environmental report
- Disposal, municipal solid waste, 22.9% water, to sanitary landfill [CH]: 0.235 kg; lognormal SD95 1.1
  environmental report
- Chemicals organic, at plant [GLO]: 0.00082 kg; lognormal SD95 1.1
  environmental report
- Sodium hydroxide, 50% in H2O, production mix, at plant [RER]: 0.0028 kg; lognormal SD95 1.1
  environmental report
- Nitric acid, 50% in H2O, at plant [RER]: 0.0015 kg; lognormal SD95 1.1
  environmental report
- Phosphoric acid, fertiliser grade, 70% in H2O, at plant [GLO]: 0.00012 kg; lognormal SD95 1.1
  environmental report
- Natural gas, burned in industrial furnace 1MWth [CH]: 14.4 MJ; lognormal SD95 1.1
  environmental report
- Nitrogen, liquid, at plant [RER]: 0.00039 kg; lognormal SD95 1.1
  environmental report
- Methanol, at regional storage [CH]: 0.00032 kg; lognormal SD95 1.1
  environmental report
- Hydrogen, liquid, at plant [RER]: 1.1e-5 kg; lognormal SD95 1.1
  environmental report
- Water, decarbonised, at plant [RER]: 4 kg; lognormal SD95 1.1
  environmental report

## Emissions to nature
- Hydrocarbons, unspecified [emissions to water, river]: 6.1e-5 kg; lognormal SD95 1.1
  environmental report
- Thorium-234 [emissions to air, low. pop.]: 0.00029 kBq; lognormal SD95 1.5
  emission from environmental report, but isotpes not given
- Copper [emissions to water, river]: 1.3e-6 kg; lognormal SD95 1.1
  environmental report
- Ethane, 1,1,1,2-tetrafluoro-, HFC-134a [emissions to air, low. pop.]: 0.00026 kg; lognormal SD95 1.3
  extrapolated from environmental report
- Thorium-234 [emissions to water, river]: 0.0031 kBq; lognormal SD95 1.1
  environmental report
- Heat, waste [emissions to air, low. pop.]: 144 MJ; lognormal SD95 1.1
  same as for electricity
- Uranium alpha [emissions to water, river]: 8.2e-6 kBq; lognormal SD95 1.1
  environmental report
- Zinc [emissions to water, river]: 3.8e-5 kg; lognormal SD95 1.1
  environmental report
- Aluminium [emissions to water, river]: 0.0011 kg; lognormal SD95 1.1
  environmental report
- Nitrate [emissions to water, river]: 0.0025 kg; lognormal SD95 1.1
  environmental report
- Fluoride [emissions to water, river]: 0.00011 kg; lognormal SD95 1.1
  environmental report
- Ethanol [emissions to air, low. pop.]: 0.0013 kg; lognormal SD95 1.1
  environmental report
- Uranium alpha [emissions to air, low. pop.]: 5.8e-5 kBq; lognormal SD95 1.1
  environmental report
- Hydrogen fluoride [emissions to air, low. pop.]: 3.7e-8 kg; lognormal SD95 1.1
  environmental report
- Phosphate [emissions to water, river]: 0.00034 kg; lognormal SD95 1.1
  environmental report
- Chromium [emissions to water, river]: 3.8e-6 kg; lognormal SD95 1.1
  environmental report

## Sampling procedure
Literature

## Sources
- Dones R., Bauer C., Doka G., 2009, 2009 - Nuclear energy - Dones, Sachbilanzen von Energiesystemen. Final report No. 6 ecoinvent v2.1, 6, Swiss Centre for LCI, PSI, Doka LCA, Duebendorf and Villigen, CH
Dones, R., Doka G. (2009) Kernenergie. Sachbilanzen von Energiesystemen. Final report No. 6 ecoinvent v2.1. Editors: Bauer C.. Volume: 6. Swiss Centre for LCI, PSI. Dübendorf and Villigen, CH.
Type: Measurement on site
Source: CD-ROM
First author: Dones, R.
Other authors: Doka G.
Year: 2009
Name of editors: Bauer C.
Title of anthology: Sachbilanzen von Energiesystemen. Final report No. 6 ecoinvent v2.1
Place of publication: Dübendorf and Villigen, CH
Publisher: Swiss Centre for LCI, PSI
Volume No: 6

## Validation
Proof reading validation: passed; Other validation: for final calculation August 2003;
