# Disposal, footpath, gravel pavement

Dataset: EcoSpold 1, unit process, infrastructure
Functional unit: 1 m2
Category: construction / infrastructure
Geography: CH
Time period: 2025 to 2030
Synonyms: 0
Generated by: Thomas Pohl
accessRestrictedTo: 0
copyright: true

## General comment
Modern Swiss und European technologies are applied to building machines, material production and building processes.

## Geography
Switzerland

## Technology
Width 1.5 m incl. foundation; curbstones 12×30 cm; layers: 15 cm reused excavation, 20 cm crushed stone, 5 cm fine gravel; concrete foundation 20×25 cm with curbstone embedded 15 cm centrally. Based on assumptions.

## Time period
Review of data currency scheduled after 5 years.

## Reference product
- Disposal, footpath, gravel pavement [CH]: 1 m2

## Inputs from technosphere
- Disposal, excavation material, clean, 20% water, to excavation landfill [CH]: 627 kg; lognormal SD95 1.3765
  (4,5,1,1,1,5,BU:1.05); Excavation, deconstruction and transport included, 0.38 m3, density 1650 kg/m3;
- Disposal, non-specific mineral building materials, as building waste [CH]: 129.6 kg; lognormal SD95 1.3765
  (4,5,1,1,1,5,BU:1.05); Natural stone slab as curbstone, deconstruction and transport included;
- Disposal, concrete, as building waste [CH]: 168 kg; lognormal SD95 1.3765
  (4,5,1,1,1,5,BU:1.05); Total amount of concrete, deconstruction and transport included;
- Disposal, gravel and sand, as building waste [CH]: 447 kg; lognormal SD95 1.3765
  (4,5,1,1,1,5,BU:1.05); Total amount of gravel, deconstruction and transport included;

## Sources
- Pohl T., Stamm R., 2025, 2025 - Datasets construction machinery and infra. - Pohl, Hintergrundbericht, Umtec Technologie AG, Bern, CH
