# Cladding, crossbar-pole, aluminium, at plant

Dataset: EcoSpold 1, unit process
Functional unit: 1 m2
Category: construction / cladding
Geography: RER
Time period: 2005-01 to 2005-12
Generated by: Martin Lehmann
accessRestrictedTo: 0
copyright: true

## General comment
The data is calculated per 1 m2 of cladding. The aluminium cladding weighs 86.7 kg per m2. Production and disposal of glazing updated based on QualiBob data. Philippe Stolz, September 2016.
Geography: Data based on a recently built official building in Switzerland.
Technology: The technology represented in this dataset is mainly related to the production of the various parts integrated in the cladding construction.
Version: 2.2

Local category: Bauteile
Local subcategory: Fassade

## Included processes
This dataset describes the processes and materials required to build 1m2 (visible area) of an aluminium cladding, type crossbar-pole. No transport activities between production and construction site are taken into account.

## Reference product
- Cladding, crossbar-pole, aluminium, at plant [RER]: 1 m2
  Europe

## Inputs from technosphere
- Polystyrene, extruded (XPS), at plant [RER]: 0.0202 kg; lognormal SD95 1.24
  (1,4,1,3,1,5,3)
- Sawnwood, production mix, hardwood, dried (u=10%), planed, at sawmill [RER]: 0.000279 m3; lognormal SD95 1.24
  (1,4,1,3,1,5,3)
- Disposal, mineral wool, 0% water, to construction waste landfill [CH]: 0.0234 kg; lognormal SD95 1.24
  (1,4,1,3,1,5,6)
- Transport, freight, rail [RER]: 38.1 tkm; lognormal SD95 2.06
  (1,4,1,3,1,5,5)
- Extrusion, plastic film [RER]: 0.723 kg; lognormal SD95 1.24
  (1,4,1,3,1,5,3)
- Disposal, plastics, mixture, 15.3% water, to municipal incineration [CH]: 0.0363 kg; lognormal SD95 1.24
  (1,4,1,3,1,5,6)
- Glazing, triple (3-IV), U=0.6 W/m2K, 4 Low E 1.1 Float / 14 Ar / 4 Float / 14 Ar / VSG 2x4, 0.76 PVB, Low E 1.1 Float, at plant [CH]: 0.688 m2; lognormal SD95 1.24
  (1,4,1,3,1,5,3); input of glazing updated, data generated by Büro für Umweltchemie in the QualiBOB project
- Rock wool, at plant [CH]: 0.72 kg; lognormal SD95 1.24
  (1,4,1,3,1,5,3)
- Zinc coating, coils [RER]: 0.156 m2; lognormal SD95 1.24
  (1,4,1,3,1,5,3)
- Natural rubber based sealing, at plant [DE]: 0.141 kg; lognormal SD95 1.24
  composite
- Disposal, wood untreated, 20% water, to municipal incineration [CH]: 0.0203 kg; lognormal SD95 1.24
  (1,4,1,3,1,5,6)
- Powder coating, steel [RER]: 0.886 m2; lognormal SD95 1.24
  (1,4,1,3,1,5,3)
- Powder coating, aluminium sheet [RER]: 0.808 m2; lognormal SD95 1.24
  composite
- Section bar extrusion, aluminium [RER]: 3.82 kg; lognormal SD95 1.24
  composite
- Disposal, glazing, 3-IV, U=0.6 W/m2K, 4 Low E 1.1 Float or ESG / 14 Ar / 4 Float / 14 Ar / VSG 2x4, 0.76 PVB, Low E 1.1 Float, as building waste [CH]: 0.0135 m2; lognormal SD95 1.24
  (1,4,1,3,1,5,6); disposal of glazing updated, data generated by Büro für Umweltchemie in the QualiBOB project
- Glass wool mat, at plant [CH]: 0.472 kg; lognormal SD95 1.24
  (1,4,1,3,1,5,3)
- Steel, low-alloyed, at plant [RER]: 1.22 kg; lognormal SD95 1.24
  (1,4,1,3,1,5,3)
- Aluminium, production mix, at plant [RER]: 3.82 kg; lognormal SD95 1.24
  composite
- Glass fibre reinforced plastic, polyamide, injection moulding, at plant [RER]: 0.152 kg; lognormal SD95 1.24
  composite
- Reinforcing steel, at plant [RER]: 24.1 kg; lognormal SD95 1.24
  (1,4,1,3,1,5,3)
- Plywood, indoor use, at plant [RER]: 0.00136 m3; lognormal SD95 1.24
  (1,4,1,3,1,5,3)
- Transport, freight, lorry, fleet average [RER]: 8.59 tkm; lognormal SD95 2.06
  (1,4,1,3,1,5,5)
- Synthetic rubber, at plant [RER]: 1.37 kg; lognormal SD95 1.24
  composite
- Chromium steel 18/8, at plant [RER]: 1.09 kg; lognormal SD95 1.24
  composite
- Polyurethane, rigid foam, at plant [RER]: 0.148 kg; lognormal SD95 1.24
  composite
- Sheet rolling, steel [RER]: 1.22 kg; lognormal SD95 1.24
  (1,4,1,3,1,5,3)
- Metal working factory [RER]: 3.96e-8 p; lognormal SD95 3.06
  (2,4,1,3,1,5,9)
- Electricity, medium voltage, production ENTSO-E, at grid: 7.92 kWh; lognormal SD95 1.24
  composite
- Adhesive for metals, at plant [DE]: 0.0198 kg; lognormal SD95 1.24
  (1,4,1,3,1,5,3)
- Section bar rolling, steel [RER]: 25 kg; lognormal SD95 1.24
  composite
- Polyvinylchloride, at regional storage [RER]: 0.723 kg; lognormal SD95 1.24
  (1,4,1,3,1,5,3)

## Emissions to nature
- Heat, waste [emissions to air, unspecified]: 28.5 MJ; lognormal SD95 1.22
  (1,3,1,3,1,5,13)

## Sampling procedure
Company documentation

## Extrapolations
see Geography

## Uncertainty adjustments
The assumption that this single Swiss dataset is representative for the whole Europe is taken into account in the uncertainties.

## Sources
- Kellenberger D., Althaus H.-J., Jungbluth N., Kuenniger T., Lehmann M., Thalmann P., 2007, 2007 - LCI building products - Kellenberger, Final report ecoinvent data v2.0, 7, Swiss Centre for LCI, Empa - TSL, ESU-services Ltd., Bau- und Umweltchimie, Duebendorf, CH
Kellenberger D., Althaus H.-J., Jungbluth N., Künniger T. (2007) Life Cycle Inventories of Building Products. Final report ecoinvent data v2.0. Volume: 7. Swiss Centre for LCI, Empa - TSL. Dübendorf, CH.
Type: Measurement on site
Source: CD-ROM
First author: Kellenberger D.
Other authors: Althaus H.-J., Jungbluth N., Künniger T.
Year: 2007
Title of anthology: Final report ecoinvent data v2.0
Place of publication: Dübendorf, CH
Publisher: Swiss Centre for LCI, Empa - TSL
Volume No: 7

## Validation
Proof reading validation: passed; Other validation: none;
