# Disposal, heat pump, air-water, 7kW

Dataset: EcoSpold 1, unit process, infrastructure
Functional unit: 1 p
Category: heat pumps / disposal
Geography: CH
Time period: 2018-01 to 2020-12
Generated by: Cyrill Kern
accessRestrictedTo: 0
copyright: true

## General comment
Inventory for the disposal of an air-water heat pump, 7kW.;

## Included processes
Disposal of the air-water heat pump (256 kg). Transport to WEEE dismantling facilities, machines for handling in sorting plant, electricity demand for sorting plant, final disposal of waste material. Cut-off to recycling for metals.

## Geography
Data apply to the supply in Switzerland.

## Technology
average technology available on market

## Reference product
- Disposal, heat pump, air-water, 7kW [CH]: 1 p
  SWITZERLAND

## Inputs from technosphere
- Disposal, hazardous waste, 25% water, to hazardous waste incineration [CH]: 2.835 kg; lognormal SD95 1.209
  (1,1,1,3,1,5,BU:1.05); ;
- Disposal, industrial devices, to WEEE treatment [CH]: 256 kg; lognormal SD95 1.209
  (1,1,1,3,1,5,BU:1.05); ;

## Emissions to nature
- Methane, difluoro-, HFC-32 [emissions to air, high. pop.]: 0.3325 kg; lognormal SD95 1.5605
  (1,1,1,3,1,5,BU:1.5); ;
- Ethane, pentafluoro-, HFC-125 [emissions to air, high. pop.]: 0.3325 kg; lognormal SD95 1.5605
  (1,1,1,3,1,5,BU:1.5); ;

## Sources
- Kaegi T., Waldburger L., Kern C., Roberts G., Zschokke M., Conte F., Weber L., 2021, 2021 - LCI heating systems - Kaegi, Carbotech im Auftrag des BAFU, Carbotech AG, Zuerich, CH
Kägi Thomas, Livia Waldburger, Cyril Kern, Gavin Roberts, Mischa Zschokke, Flora Conte, Lea Weber (2020) LCI of heating systems. Carbotech im Auftrag des BAFU. Carbotech AG. Zürich. CH.
Type: Separate publication
Source: Report
First author: Kägi Thomas
Other authors: Livia Waldburger, Cyril Kern, Gavin Roberts, Mischa Zschokke, Flora Conte, Lea Weber
Year: 2020
Title of anthology: Carbotech im Auftrag des BAFU
Place of publication: Zürich. CH
Publisher: Carbotech AG

## Validation
Proof reading validation: 19.02.2021; Other validation: Z:\Schreibtisch\WinShare\BAFU Heizsysteme\A_zum konvertieren\WP\[EcoSpold_disposal_heat pump, air-water _NEU 7kW_v0.2.xlsx]X-Process;
