# Disposal, lignite ash, 0% water, to opencast refill

Dataset: EcoSpold 1, unit process
Functional unit: 1 kg
Category: Others / unspecified
Geography: DE
Time period: 2000-01 to 2000-12
Generated by: Gabor Doka
accessRestrictedTo: 0
copyright: true

## General comment
backfilled waste composition is (in ppm): H2O n.a.;
Synonyms: ashes form lignite incineration disposed as backfill in opencast lignite mines;

## Included processes
This module contains only direct emissions from lignite ash used as backfill in opencast lignite mines: short-term emissions (0-100a) and long-term emissions (>100a) both to ground water. E.g. land-use and energy consumption is *not* included.

## Geography
Ash composition calculated from country-specific coal composition (DE) and technology-specific transfer coefficients in power plant.

## Technology
Lignite ash as backfill in lignite opencast mine (together with tailings)

## Reference product
- Disposal, lignite ash, 0% water, to opencast refill [DE]: 1 kg
  GERMANY

## Emissions to nature
- Calcium [emissions to water, groundwater, long-term]: 0.15308 kg; lognormal SD95 1.7944
  Long-term emission from lignite ash backfill. Uncertainty derived from uncertainty in ash composition and uncertainty in transfer coefficients.
- Arsenic [emissions to water, groundwater]: 1.5185e-5 kg; lognormal SD95 9.0465
  Short-term emission from lignite ash backfill. Uncertainty derived from uncertainty in ash composition and uncertainty in transfer coefficients.
- Cadmium [emissions to water, groundwater, long-term]: 3.8109e-7 kg; lognormal SD95 13.502
  (same comment as for Calcium)
- Fluoride [emissions to water, groundwater]: 4.9946e-6 kg; lognormal SD95 8.8404
  (same comment as for Arsenic)
- Vanadium [emissions to water, groundwater]: 2.3512e-7 kg; lognormal SD95 11.707
  (same comment as for Arsenic)
- Iron [emissions to water, groundwater]: 3.4597e-7 kg; lognormal SD95 11.493
  (same comment as for Arsenic)
- Nickel [emissions to water, groundwater, long-term]: 2.2896e-5 kg; lognormal SD95 8.6034
  (same comment as for Calcium)
- Vanadium [emissions to water, groundwater, long-term]: 2.0576e-5 kg; lognormal SD95 8.8257
  (same comment as for Calcium)
- Aluminium [emissions to water, groundwater]: 4.4747e-5 kg; lognormal SD95 6.2973
  (same comment as for Arsenic)
- Tungsten [emissions to water, groundwater]: 2.953e-6 kg; lognormal SD95 10.024
  (same comment as for Arsenic)
- Boron [emissions to water, groundwater, long-term]: 0.0010057 kg; lognormal SD95 5.0186
  (same comment as for Calcium)
- Magnesium [emissions to water, groundwater]: 1.0932e-5 kg; lognormal SD95 7.5422
  (same comment as for Arsenic)
- Molybdenum [emissions to water, groundwater]: 7.6511e-6 kg; lognormal SD95 9.808
  (same comment as for Arsenic)
- Titanium [emissions to water, groundwater, long-term]: 0.00076474 kg; lognormal SD95 5.2822
  (same comment as for Calcium)
- Cobalt [emissions to water, groundwater]: 1.0966e-8 kg; lognormal SD95 15.839
  (same comment as for Arsenic)
- Lead [emissions to water, groundwater, long-term]: 1.5255e-5 kg; lognormal SD95 9.0415
  (same comment as for Calcium)
- Calcium [emissions to water, groundwater]: 5.7959e-5 kg; lognormal SD95 6.4262
  (same comment as for Arsenic)
- Antimony [emissions to water, groundwater]: 4.4193e-7 kg; lognormal SD95 12.322
  (same comment as for Arsenic)
- Tin [emissions to water, groundwater, long-term]: 1.225e-5 kg; lognormal SD95 9.2817
  (same comment as for Calcium)
- Sodium [emissions to water, groundwater, long-term]: 0.0021168 kg; lognormal SD95 3.6937
  (same comment as for Calcium)
- Barium [emissions to water, groundwater]: 2.6492e-8 kg; lognormal SD95 14.509
  (same comment as for Arsenic)
- Chromium VI [emissions to water, groundwater, long-term]: 3.797e-6 kg; lognormal SD95 8.5899
  (same comment as for Calcium)
- Mercury [emissions to water, groundwater]: 1.515e-11 kg; lognormal SD95 27.78
  (same comment as for Arsenic)
- Beryllium [emissions to water, groundwater, long-term]: 3.0581e-6 kg; lognormal SD95 10.873
  (same comment as for Calcium)
- Manganese [emissions to water, groundwater]: 1.3246e-8 kg; lognormal SD95 15.52
  (same comment as for Arsenic)
- Mercury [emissions to water, groundwater, long-term]: 7.6613e-8 kg; lognormal SD95 15.72
  (same comment as for Calcium)
- Iodide [emissions to water, groundwater, long-term]: 1.5314e-13 kg; lognormal SD95 11.942
  (same comment as for Calcium)
- Silicon [emissions to water, groundwater]: 0.0020738 kg; lognormal SD95 3.8903
  (same comment as for Arsenic)
- Selenium [emissions to water, groundwater]: 1.2475e-6 kg; lognormal SD95 11.037
  (same comment as for Arsenic)
- Zinc [emissions to water, groundwater, long-term]: 3.8108e-5 kg; lognormal SD95 8.0726
  (same comment as for Calcium)
- Bromine [emissions to water, groundwater]: 1.2044e-5 kg; lognormal SD95 9.2818
  (same comment as for Arsenic)
- Tungsten [emissions to water, groundwater, long-term]: 4.704e-6 kg; lognormal SD95 9.8604
  (same comment as for Calcium)
- Molybdenum [emissions to water, groundwater, long-term]: 1.0412e-11 kg; lognormal SD95 10.012
  (same comment as for Calcium)
- Arsenic [emissions to water, groundwater, long-term]: 1.5185e-14 kg; lognormal SD95 9.2418
  (same comment as for Calcium)
- Scandium [emissions to water, groundwater, long-term]: 2.7465e-6 kg; lognormal SD95 10.643
  (same comment as for Calcium)
- Tin [emissions to water, groundwater]: 9.7239e-10 kg; lognormal SD95 19.782
  (same comment as for Arsenic)
- Potassium [emissions to water, groundwater]: 0.0025925 kg; lognormal SD95 3.9522
  (same comment as for Arsenic)
- Barium [emissions to water, groundwater, long-term]: 0.00076567 kg; lognormal SD95 5.2822
  (same comment as for Calcium)
- Copper [emissions to water, groundwater]: 2.4668e-9 kg; lognormal SD95 18.193
  (same comment as for Arsenic)
- Thallium [emissions to water, groundwater, long-term]: 1.5267e-7 kg; lognormal SD95 14.744
  (same comment as for Calcium)
- Chloride [emissions to water, groundwater]: 2.1843e-5 kg; lognormal SD95 8.1396
  (same comment as for Arsenic)
- Magnesium [emissions to water, groundwater, long-term]: 0.02296 kg; lognormal SD95 2.832
  (same comment as for Calcium)
- Phosphate [emissions to water, groundwater]: 8.7813e-7 kg; lognormal SD95 11.346
  (same comment as for Arsenic)
- Bromine [emissions to water, groundwater, long-term]: 2.0718e-7 kg; lognormal SD95 9.4754
  (same comment as for Calcium)
- Sulfate [emissions to water, groundwater, long-term]: 0.10207 kg; lognormal SD95 2.4377
  (same comment as for Calcium)
- Strontium [emissions to water, groundwater]: 8.1248e-7 kg; lognormal SD95 10.114
  (same comment as for Arsenic)
- Selenium [emissions to water, groundwater, long-term]: 1.9873e-6 kg; lognormal SD95 10.864
  (same comment as for Calcium)
- Copper [emissions to water, groundwater, long-term]: 1.5296e-5 kg; lognormal SD95 9.0384
  (same comment as for Calcium)
- Chloride [emissions to water, groundwater, long-term]: 1.6442e-5 kg; lognormal SD95 8.1526
  (same comment as for Calcium)
- Zinc [emissions to water, groundwater]: 1.9564e-9 kg; lognormal SD95 18.575
  (same comment as for Arsenic)
- Chromium VI [emissions to water, groundwater]: 5.7742e-6 kg; lognormal SD95 8.746
  (same comment as for Arsenic)
- Thallium [emissions to water, groundwater]: 2.3187e-10 kg; lognormal SD95 22.295
  (same comment as for Arsenic)
- Fluoride [emissions to water, groundwater, long-term]: 3.329e-5 kg; lognormal SD95 8.0767
  (same comment as for Calcium)
- Strontium [emissions to water, groundwater, long-term]: 0.00053497 kg; lognormal SD95 5.5834
  (same comment as for Calcium)
- Silicon [emissions to water, groundwater, long-term]: 0.26208 kg; lognormal SD95 1.6056
  (same comment as for Calcium)
- Scandium [emissions to water, groundwater]: 1.082e-6 kg; lognormal SD95 10.99
  (same comment as for Arsenic)
- Iron [emissions to water, groundwater, long-term]: 0.027631 kg; lognormal SD95 2.7064
  (same comment as for Calcium)
- Titanium [emissions to water, groundwater]: 9.5207e-7 kg; lognormal SD95 9.9281
  (same comment as for Arsenic)
- Lead [emissions to water, groundwater]: 3.3146e-10 kg; lognormal SD95 21.73
  (same comment as for Arsenic)
- Boron [emissions to water, groundwater]: 1.2608e-5 kg; lognormal SD95 7.3121
  (same comment as for Arsenic)
- Sulfate [emissions to water, groundwater]: 0.037595 kg; lognormal SD95 2.6633
  (same comment as for Arsenic)
- Aluminium [emissions to water, groundwater, long-term]: 0.035943 kg; lognormal SD95 2.5651
  (same comment as for Calcium)
- Potassium [emissions to water, groundwater, long-term]: 0.0020017 kg; lognormal SD95 3.9588
  (same comment as for Calcium)
- Antimony [emissions to water, groundwater, long-term]: 7.0399e-7 kg; lognormal SD95 12.138
  (same comment as for Calcium)
- Beryllium [emissions to water, groundwater]: 4.6445e-9 kg; lognormal SD95 17.192
  (same comment as for Arsenic)
- Sodium [emissions to water, groundwater]: 0.0047745 kg; lognormal SD95 3.6357
  (same comment as for Arsenic)
- Cobalt [emissions to water, groundwater, long-term]: 1.5303e-5 kg; lognormal SD95 9.0373
  (same comment as for Calcium)
- Iodide [emissions to water, groundwater]: 1.5314e-6 kg; lognormal SD95 11.716
  (same comment as for Arsenic)
- Cadmium [emissions to water, groundwater]: 1.0837e-11 kg; lognormal SD95 28.675
  (same comment as for Arsenic)
- Phosphate [emissions to water, groundwater, long-term]: 0.000526 kg; lognormal SD95 6.647
  (same comment as for Calcium)
- Nickel [emissions to water, groundwater]: 3.4773e-8 kg; lognormal SD95 14.169
  (same comment as for Arsenic)
- Manganese [emissions to water, groundwater, long-term]: 0.00038284 kg; lognormal SD95 5.8745
  (same comment as for Calcium)

## Sampling procedure
country-specific calculation based on literature data

## Extrapolations
Ash composition calculated from coal composition and transfer coefficients in power plant (cf. ecoinvent coal report Röder 2003). Transfer coefficients in backfill estimated from data of residual material landfills and estimated carbonate phase of lignite ashes

## Uncertainty adjustments
uncertainty of waste input composition data derived from generic formula GSD(c) = N*ln(c)+1. Mean long-term emissions are the emissions until the next glacial period occurs (in 60'000a) and the landfill is eroded. Maximal long-term emissions are the complete emissions of all landfilled material (except Cr). Minimal long-term emissions are derived implicitly from the mean and maximal values assuming a lognormal distribution.

## Sources
- Doka G., 2009, 2009 - LCI waste treatment services - Doka, Final report ecoinvent data v2.1, 13, Swiss Centre for LCI, Doka LCA, Duebendorf and St. Gallen, CH
Doka G. (2008) Life Cycle Inventories of Waste Treatment Services. Final report ecoinvent data v2.1. Volume: 13. Issue: 0. Swiss Centre for LCI, Empa - TSL. Dübendorf, CH.
Type: Measurement on site
Source: CD-ROM
First author: Doka G.
Year: 2008
Title of anthology: Final report ecoinvent data v2.1
Place of publication: Dübendorf, CH
Publisher: Swiss Centre for LCI, Empa - TSL
Volume No: 13
Issue No: 0

## Validation
Proof reading validation: passed.; Other validation: none;
