# Ventilation of dwellings, decentralized, 6 x 120 m3/h, PE ducts, with GHE

Dataset: EcoSpold 1, unit process
Functional unit: 1 m2a
Category: ventilation / unspecified
Geography: CH
Time period: 2003-01 to 2003-12
Generated by: Alex Primas
accessRestrictedTo: 0
copyright: true

## General comment
Life time of system and ducts 50 years. Life time of ventilation unit 20 years. Life time of filters 1 year. Ventilation system for a multi family house. The house considered in the investigation includes 6 flats with 130 m2 floor area each and a ventilation rate of 120 m3/h. The influence of a smaller concrete demand due to embedment of ventilation tubes in the concrete of the floor (-4.86 kg concrete per m2 floor area) is not included.;

## Included processes
Materials used for the construction and renewal of the ventilation system. Electricity for the operation of the system on 12 month per year included. Transport of the components to the construction site. Disposal of the components included. Influence of ventilation ducts on building construction not included.

## Technology
Electricity demand of ventilator (0.4 Wh/m3) representative for DC- or EC-motors and a system design with low pressure drops. Electricity demand of control unit 10 W. Decentral ventilation system including 4 parallel polyethylene ground heat exchanger tubes (200 mm diameter). Air distribution to the 6 decentral ventilation units with a galvanised steel tube (400 mm diameter). Distribution of fresh- and exhaust-air within the flat with polyethylene tubes (75 mm diameter). Exhaust air from the 6 decentral ventilation units with a galvanised steel tube (400 mm diameter) to the exhaust on the roof.

## Time period
Amount of material investigated in 2003

## Reference product
- Ventilation of dwellings, decentralized, 6 x 120 m3/h, PE ducts, with GHE [CH]: 1 m2a
  SWITZERLAND

## Inputs from technosphere
- Air filter, in exhaust air valve, at plant [RER]: 0.0226 p; lognormal SD95 1.15
  (3,4,1,1,1,nA); Questionnaire, Data related to building considered
- Air filter, decentralized unit, 180-250 m3/h, at plant [RER]: 0.0151 p; lognormal SD95 1.15
  (3,4,1,1,1,nA); Questionnaire, Data related to building considered
- Disposal, air filter, in exhaust air valve [CH]: 0.0226 p; lognormal SD95 1.15
  (3,4,1,1,1,nA); Questionnaire, Data related to building considered
- Transport, freight, lorry, 3.5t gross weight, fleet average [CH]: 0.00142 tkm; lognormal SD95 2.06
  (4,4,1,1,1,nA); Assumption, Data related to building considered
- Disposal, silencer, steel, DN 125 [CH]: 0.00123 p; lognormal SD95 1.15
  (3,4,1,1,1,nA); Questionnaire, Data related to building considered
- Control and wiring, decentralized unit, at plant [RER]: 0.000308 p; lognormal SD95 1.15
  (3,4,1,1,1,nA); Questionnaire, Data related to building considered
- Disposal, air filter, decentralized unit, 180-250 m3/h [CH]: 0.0151 p; lognormal SD95 1.15
  (3,4,1,1,1,nA); Questionnaire, Data related to building considered
- Ventilation system, decentralized, 6 x 120 m3/h, PE ducts, with GHE [CH]: 2.56e-5 p; lognormal SD95 1.15
  (3,4,1,1,1,nA); Questionnaire, Data related to building considered
- Silencer, steel, DN 125, at plant [CH]: 0.00123 p; lognormal SD95 1.15
  (3,4,1,1,1,nA); Questionnaire, Data related to building considered
- Transport, freight, lorry, 16t-32t gross weight, fleet average [CH]: 0.000204 tkm; lognormal SD95 2.03
  (3,4,1,1,1,nA); Questionnaire, Data related to building considered
- Disposal, ventilation equipment, decentralized, 180-250 m3 [CH]: 0.000308 p; lognormal SD95 1.15
  (3,4,1,1,1,nA); Questionnaire, Data related to building considered
- Ventilation equipment, decentralized, 180-250 m3/h, at plant [RER]: 0.000308 p; lognormal SD95 1.15
  (3,4,1,1,1,nA); Questionnaire, Data related to building considered
- Transport, freight, lorry, fleet average [RER]: 0.00492 tkm; lognormal SD95 2.03
  (3,4,1,1,1,nA); Questionnaire, Data related to building considered
- Flexible duct, aluminum/PET, DN of 125, at plant [RER]: 0.000513 m; lognormal SD95 1.15
  (3,4,1,1,1,nA); Questionnaire, Data related to building considered
- Electricity, low voltage, at grid [CH]: 3.35 kWh; lognormal SD95 1.14
  (2,3,1,1,1,4); Questionnaire, tecnical informations, related to system used
- Disposal, control and wiring, decentralized unit [CH]: 0.000308 p; lognormal SD95 1.15
  (3,4,1,1,1,nA); Questionnaire, Data related to building considered
- Disposal, flexible duct, aluminum/PET, DN of 125 [CH]: 0.000513 m; lognormal SD95 1.15
  (3,4,1,1,1,nA); Questionnaire, Data related to building considered

## Emissions to nature
- Heat, waste [emissions to air, high. pop.]: 9.23e-5 MJ; lognormal SD95 1.69
  (3,5,5,1,3,5); Calculated from electricity use

## Sampling procedure
Questionnaire, technical information and assumptions. Data valid for example building used.

## Sources
- Haessig W., Primas A., 2007, 2007 - LCI comfort ventilation in dwellings - Haessig, Final report ecoinvent Data v2.0, 25, Swiss Centre for LCI, B+H, Duebendorf and Zuerich, CH
Hässig, W., Primas, A. (2007) Ökologische Aspekte der Komfortlüftungen im Wohnbereich. Final report ecoinvent Data v2.0. Volume: 25. Swiss Centre for LCI, B+H. Dübendorf and Zürich, CH.
Type: Measurement on site
Source: CD-ROM
First author: Hässig, W.
Other authors: Primas, A.
Year: 2007
Title of anthology: Final report ecoinvent Data v2.0
Place of publication: Dübendorf and Zürich, CH
Publisher: Swiss Centre for LCI, B+H
Volume No: 25

## Validation
Proof reading validation: passed; Other validation: none;
