# Sawn timber, softwood, raw, air, kiln dried, u=6%, holzpur, at plant

Dataset: EcoSpold 1, unit process
Functional unit: 1 m3
Category: wood / wooden materials\extraction
Geography: CH
Generated by: Philippe Stolz
accessRestrictedTo: 0
copyright: true

## General comment
Air emissions from the wood are not accounted for because the same emissions would occur if the wood would not be used. Data on the energy use are specific for the Lang-Sägewerk AG, which delivers the sawn timber to Walter Küng AG for the production of holzpur elements.;

## Included processes
Includes drying of wet sawn timber (u=70%) by air (down to u=18-20%) and kiln (down to u=6%) at sawmill. Shrinkage of wood is taken into account. No transports are considered since drying occurs at the sawmill site.

## Technology
Industry data.

## Time period
Time of publications.

## Reference product
- Sawn timber, softwood, raw, air, kiln dried, u=6%, holzpur, at plant [CH]: 1 m3
  SWITZERLAND

## Inputs from technosphere
- Wood chips, from sawmill, softwood, holzpur, burned in furnace 300kW [CH]: 271.3 MJ; lognormal SD95 1.3001
  (4,1,1,1,1,5,BU:1.05); Kiln drying from u=20% to u=6%, water loss = 56 kg/m3, energy use = 4.6 MJ/kg; Stalder 2013
- Electricity, low voltage, water utility Zug, at grid [CH]: 23.874 kWh; lognormal SD95 1.2152
  (2,1,1,1,1,5,BU:1.05); Operation of ventilators in the kiln; Stalder 2013, Peter Lang, personal communication 23.02.2015
- Sawn timber, softwood, raw, plant-debarked, u=70%, holzpur, at plant [CH]: 1.0526 m3; lognormal SD95 1.05
  (1,1,1,1,1,1,BU:1.05); ; Stalder 2013
- Technical wood drying, infrastructure [RER]: 1.7512e-5 p; lognormal SD95 3.3763
  (4,5,3,3,4,5,BU:3); ; ecoinvent report 9

## Inputs from nature
- Transformation, from unknown [resources, land]: 0.0075574 m2; lognormal SD95 2.0511
  (2,1,1,1,1,5,BU:2); Air drying from u=70% to u=20%; Patrick Stalder, personal communication 13.01.2015, Peter Lang, personal communication 20.01.2015, ecoinvent report 9
- Occupation, industrial area, vegetation [resources, land]: 0.75574 m2a; lognormal SD95 1.564
  (2,1,1,1,1,5,BU:1.5); Air drying from u=70% to u=20%; Patrick Stalder, personal communication 13.01.2015, Peter Lang, personal communication 20.01.2015, ecoinvent report 9
- Transformation, to industrial area, vegetation [resources, land]: 0.0075574 m2; lognormal SD95 2.0511
  (same comment as for Transformation, from unknown)

## Emissions to nature
- Heat, waste [emissions to air, low. pop.]: 85.945 MJ; lognormal SD95 1.2152
  (2,1,1,1,1,5,BU:1.05); ;

## Sampling procedure
Data survey at the Lang-Sägewerk AG in Hochdorf-Ligschwil (Switzerland).

## Extrapolations
Some generic datasets from ecoinvent have been used.

## Sources
- Stolz P., Frischknecht R., 2015, 2015 - LCA solid wood system holzpur - Stolz, Project report, 527, treeze Ltd., Uster, CH
Stolz P., Frischknecht R. (2015) Ökobilanz Vollholzsystem holzpur. Project report. Volume: 527. treeze Ltd.. Uster, CH.
Type: Separate publication
Source: Report
First author: Stolz P.
Other authors: Frischknecht R.
Year: 2015
Title of anthology: Project report
Place of publication: Uster, CH
Publisher: treeze Ltd.
Volume No: 527

## Validation
Proof reading validation: 08.05.2015; Other validation: \\SRV01\ESU-Docs\Projekte laufend\527 Bilanz Holzpur\EcoSpold\[527-Ökobilanz-holzpur-v0.16.xlsx]X-Process;
