# Arsine, at plant

Dataset: EcoSpold 1, unit process
Functional unit: 1 kg
Category: chemicals / inorganic
Geography: GLO
Time period: 2000-01 to 2006-12
Share of production covered: 100 %
Generated by: Juergen Sutter
accessRestrictedTo: 0
copyright: true

## General comment
The process "arsine, at plant, GLO" is modelled for the production of arsine from sodium arsenide in the world. Raw materials are modelled with a stoechiometric calculation. Energy consumptions and emissions are estimated. Infrastructure and transports are calculated with standard values.;
CAS number: 007784-42-1;
Formula: AsH3;
Synonyms: arsane;

## Included processes
Production of arsine including materials, energy uses, infrastructure and emissions.

## Geography
The inventory is modelled for the world.

## Technology
Hydration ofsidum arsenide

## Time period
Time of publications

## Reference product
- Arsine, at plant [GLO]: 1 kg
  Global

## Inputs from technosphere
- Water, ultrapure, at plant [GLO]: 0.692 kg; lognormal SD95 1.38
  (4,5,1,1,1,5); Stoechiometric calculation
- Disposal, hazardous waste, 0% water, to underground deposit [DE]: 0.0972 kg; lognormal SD95 1.38
  (4,5,1,1,1,5); Stoechiometric calculation
- Chemical plant, organics [RER]: 4e-10 p; lognormal SD95 3.09
  (4,5,na,na,na,na); Estimation
- Electricity, medium voltage, production ENTSO-E, at grid: 0.333 kWh; lognormal SD95 1.3
  (4,5,na,na,na,na); Estimation
- Transport, freight, rail [RER]: 1.65 tkm; lognormal SD95 2.09
  (4,5,na,na,na,na); Standard distances
- Sodium arsenide, at plant [GLO]: 1.94 kg; lognormal SD95 1.38
  (4,5,1,1,1,5); Stoechiometric calculation
- Transport, freight, lorry, fleet average [RER]: 0.68 tkm; lognormal SD95 2.09
  (4,5,na,na,na,na); Standard distances
- Hydrochloric acid, 30% in H2O, at plant [RER]: 1.46 kg; lognormal SD95 1.38
  (4,5,1,1,1,5); Stoechiometric calculation

## Inputs from nature
- Water, cooling, unspecified natural origin/m3 [resources, in water]: 0.024 m3; lognormal SD95 1.3
  (4,5,na,na,na,na); Estimation

## Emissions to nature
- AOX, Adsorbable Organic Halogen as Cl [emissions to water, river]: 1.4 kg; lognormal SD95 1.62
  (4,5,na,na,na,na); Calculated from the water emissions
- Heat, waste [emissions to air, high. pop.]: 1.2 MJ; lognormal SD95 1.3
  (4,5,na,na,na,na); Calculated from the electricity input
- Hydrogen chloride [emissions to air, high. pop.]: 0.00291 kg; lognormal SD95 1.62
  (4,5,na,na,na,na); Estimation
- Sodium [emissions to water, river]: 0.885 kg; lognormal SD95 5.1
  (4,5,na,na,na,na); Estimation
- Chloride [emissions to water, river]: 1.41 kg; lognormal SD95 3.09
  (4,5,na,na,na,na); Estimation
- Water [emissions to water, unspecified]: 22.8 kg; lognormal SD95 2.5196
  (5,5,5,5,5,BU:1.05); All uncertainty-values set to 5.0 by default. Balance of input water

## Sampling procedure
Standard values

## Sources
- Sutter J., 2007, 2007 - LCI highly pure chemicals - Sutter, Final report ecoinvent Data v2.0, 19, Swiss Centre for LCI, ETH, Duebendorf and Uster, CH
Sutter, J., 0 (2007) Life Cycle Inventories of Highly Pure Chemicals. Final report ecoinvent Data v2.0. Editors: 0. Volume: 19. Swiss Centre for LCI, ETHZ. Duebendorf and St. Gallen, CH.
Type: Measurement on site
Source: CD-ROM
First author: Sutter, J.
Other authors: 0
Year: 2007
Name of editors: 0
Title of anthology: Final report ecoinvent Data v2.0
Place of publication: Duebendorf and St. Gallen, CH
Publisher: Swiss Centre for LCI, ETHZ
Volume No: 19

## Validation
Proof reading validation: passed.; Other validation: none;
