# Wind turbine 2.3MW, onshore, moving parts

Dataset: EcoSpold 1, unit process, infrastructure
Functional unit: 1 unit
Category: wind power / production of components
Geography: RER
Time period: 2024 to 2024
Share of production covered: 100 %
Generated by: Alena Frehner
accessRestrictedTo: 0
copyright: true

## Included processes
Wind turbine moving parts (without tower and substructure), at site including manufacturing, transports, installation, replacements, decommission and waste treatement. Calculated for FU of 1p.
Data are based on the Enercon E-82 2.3MW onshore wind turbine (Enercon, 2011).
Assumed lifetime is 25 years.

## Reference product
- Wind turbine 2.3MW, onshore, moving parts [RER]: 1 unit

## Inputs from technosphere
- Aluminium, production mix, at plant [RER]: 1375.3 kg; lognormal SD95 1.3221
  (1,4,4,1,1,5,BU:1.05); Input calculated based on Enercon (2011)
- Cast iron, at plant [RER]: 77610 kg; lognormal SD95 1.3221
  (1,4,4,1,1,5,BU:1.05); Input calculated based on Enercon (2011)
- Chromium steel 18/8, at plant [RER]: 45675 kg; lognormal SD95 1.3221
  (1,4,4,1,1,5,BU:1.05); Input calculated based on Enercon (2011)
- Copper, at regional storage [RER]: 13276 kg; lognormal SD95 1.3221
  (1,4,4,1,1,5,BU:1.05); Input calculated based on Enercon (2011)
- Glass fibre reinforced plastic, polyamide, injection moulding, at plant [RER]: 29539 kg; lognormal SD95 1.3221
  (1,4,4,1,1,5,BU:1.05); Input calculated based on Enercon (2011)
- Lubricating oil, at plant [RER]: 185.48 kg; lognormal SD95 1.2423
  (2,4,1,1,1,5,BU:1.05); Estimation: 111 kg lubrification oil per MW based on Mali and Garrett (2023)
- Steel, low-alloyed, at plant [RER]: 52987 kg; lognormal SD95 1.3221
  (1,4,4,1,1,5,BU:1.05); Input calculated based on Enercon (2011)
- Sulphur hexafluoride, liquid, at plant [RER]: 4.1818 kg; lognormal SD95 1.3221
  (1,4,4,1,1,5,BU:1.05); Estimation: 1.8 kg of SF6/MW, based on Martinez Aguado & Garrett (2025)
- Aluminium product manufacturing, average metal working [RER]: 1298.7 kg; lognormal SD95 1.3221
  (1,4,4,1,1,5,BU:1.05); Input calculated based on Enercon (2011)
- Copper product manufacturing, average metal working [RER]: 13276 kg; lognormal SD95 1.3221
  (1,4,4,1,1,5,BU:1.05); Input calculated based on Enercon (2011)
- Sheet rolling, steel [RER]: 52987 kg; lognormal SD95 1.3221
  (1,4,4,1,1,5,BU:1.05); Input calculated based on Enercon (2011)
- Sheet rolling, chromium steel [RER]: 45675 kg; lognormal SD95 1.3221
  (1,4,4,1,1,5,BU:1.05); Input calculated based on Enercon (2011)
- Electricity, medium voltage, production ENTSO-E, at grid [ENTSO-E]: 110330 kWh; lognormal SD95 1.5798
  (1,4,5,1,1,5,BU:1.05); Assumed electricity consumption for assembly of rotor and nacelle of 0.5 kWh/kg.
- Transport, freight, lorry, fleet average [RER]: 158550 tkm; lognormal SD95 2.1112
  (2,4,4,1,1,5,BU:2); Includes the tranportation of components to wind farm site.
- Transport, freight, lorry, diesel, 26t gross weight, 2010, EURO-V, regional delivery [RER]: 22837 tkm; lognormal SD95 2.1112
  (2,4,4,1,1,5,BU:2); Includes the tranportation of materials to component manufacturing site and components to waste treatement site.
- Transport, transoceanic freight ship [OCE]: 1.8658e6 tkm; lognormal SD95 2.1112
  (2,4,4,1,1,5,BU:2); Includes the tranportation of components to wind farm site.
- Operation, freight train, diesel [RER]: 44206 tkm; lognormal SD95 2.1112
  (2,4,4,1,1,5,BU:2); Includes the tranportation of materials to component manufacturing site.
- Diesel, burned in building machine, average [CH]: 377.72 MJ; lognormal SD95 2.2944
  (2,4,5,2,1,5,BU:2); Diesel consumption for the erection of the wind turbine, based on the potential energy.
- Recycling steel and iron [RER]: 180070 kg; lognormal SD95 1.3277
  (2,4,4,1,1,5,BU:1.05); Own calculation; recycling of steel and iron; assumed recycling rate: 95%
- Disposal, steel, 0% water, to construction waste landfill [CH]: 9477.4 kg; lognormal SD95 1.3277
  (2,4,4,1,1,5,BU:1.05); Own calculation; landfill of steel and iron; assumed landfill rate: 5%
- Disposal, aluminium, 0% water, to sanitary landfill [CH]: 68.765 kg; lognormal SD95 1.3277
  (2,4,4,1,1,5,BU:1.05); Own calculation; landfill of aluminum; assumed landfill rate: 5%
- Disposal, glass fibre-reinforced polymer panel, polyester resin, to municipal incineration [CH]: 14769 kg; lognormal SD95 1.3277
  (2,4,4,1,1,5,BU:1.05); Own calculation; incineration off fiberglass and carbon fiber contained in blades; assumed incineration rate 50%
- Disposal, inert material, 0% water, to sanitary landfill [CH]: 14769 kg; lognormal SD95 1.3277
  (2,4,4,1,1,5,BU:1.05); Own calculation; incineration off fiberglass and carbon fiber contained in blades; assumed landfill rate 50%
- Disposal, inert material, 0% water, to sanitary landfill [CH]: 189.67 kg; lognormal SD95 1.3277
  (2,4,4,1,1,5,BU:1.05); Own calculation; landfill of remaining materials (which are not classified as steel and iron, aluminum, copper, plastics or blades); assumed landfill rate 100%

## Sources
- Kroehnert H., Frehner A., Stucki M., 2025, 2025 - LCI wind Energy - Kroehnert, Project report, 0, ZHAW, Waedenswil, CH

## Validation
22.07.2025
"S:\pools\n\N-IUNR-FG-LCA\Projekte\Wind LCA\LCI-Update\Sachbilanz"
