# Electric installation, photovoltaic plant, at plant

Dataset: EcoSpold 1, unit process, infrastructure
Functional unit: 1 p
Category: photovoltaic / production of components
Geography: CH
Time period: 1992-01 to 1992-12
Generated by: Philippe Stolz
accessRestrictedTo: 0
copyright: true

## General comment
Production of different components of the electric installation of a 3kWp photovoltaic plant.;

## Included processes
Materials and packaging for the production of cabling, lightning protection and fuse box. Inverter ist not included. Estimation for metal processing. Disposal of the product after use.

## Geography
Production in CH.

## Technology
All electric installations for a photovoltaic system with a capacity of 3kWp. Including cables, counter, etc.

## Time period
Date of data investigation.

## Reference product
- Electric installation, photovoltaic plant, at plant [CH]: 1 p
  SWITZERLAND

## Inputs from technosphere
All rows: lognormal SD95 1
- Polycarbonate, at plant [RER]: 0.2 kg
- Brass, at plant [CH]: 0.02 kg
- Disposal, plastic, industr. electronics, 15.3% water, to municipal incineration [CH]: 16.992 kg
- Polyethylene, HDPE, granulate, at plant [RER]: 14.43 kg
- Steel, low-alloyed, at plant [RER]: 0.86 kg
- Polyvinylchloride, bulk polymerised, at plant [RER]: 2.13 kg
- Transport, freight, lorry, 16t-32t gross weight, fleet average [CH]: 2.8387 tkm
- Transport, freight, rail, electricity with shunting [CH]: 21.59 tkm
- Nylon 6, at plant [RER]: 0.23 kg
- Zinc, primary, at regional storage [RER]: 0.04 kg
- Disposal, building, electric wiring, to final disposal [CH]: 0.06 kg
- Wire drawing, copper [RER]: 14.7 kg
- Epoxy resin, liquid, at plant [RER]: 0.002 kg
- Copper, at regional storage [RER]: 14.7 kg

## Sampling procedure
Detailed analysis of materials for one product in a diploma thesis.

## Sources
- Frischknecht R., Itten R., Sinha P., de Wild-Scholten M., Zhank J., 2020, 2015 - LCI and LCA photovoltaic systems - Frischknecht, Project report, 174, IEA PVPS Task 12, Petten, NL
Frischknecht R.,, Stolz P., Sinha P., de Wild-Scholten M. (2020) Life Cycle Inventories and Life Cycle Assessments of Photovoltaic Systems. Project report. Volume: 174. IEA PVPS Task 12.
Type: Separate publication
Source: Report
First author: Frischknecht R.,
Other authors: Stolz P., Sinha P., de Wild-Scholten M.
Year: 2020
Title of anthology: Project report
Publisher: IEA PVPS Task 12
Volume No: 174
Original title: Life Cycle Inventories and Life Cycle Assessments of Photovoltaic Systems

## Validation
Proof reading validation: 30.09.2020; Other validation: G:\Projekte laufend\174 Photovoltaic, IEA Task 12\2017 Global supply chain\EcoSpold\[174-photovoltaics-global-supply-chain-v2.5.xlsx]X-Process;
