# Disposal, cement, hydrated, 0% water, to residual material landfill

Dataset: EcoSpold 1, unit process
Functional unit: 1 kg
Category: landfill / residual material landfill
Geography: CH
Time period: 2000-01 to 2000-12
Generated by: Gabor Doka
accessRestrictedTo: 0
copyright: true

## General comment
Inventoried waste contains 100% cement hydrated; . waste composition (wet, in ppm): H2O 5969.2; O 672760; H 66667; C n.a.; S 4938.4; N n.a.; P 231.96; B n.a.; Cl n.a.; Br n.a.; F n.a.; I n.a.; Ag n.a.; As 3.3957; Ba n.a.; Cd 0.60687; Co 1.7555; Cr 21.386; Cu 3.8614; Hg 0.017115; Mn 189.76; Mo n.a.; Ni 16.464; Pb 29.371; Sb 0.0881; Se n.a.; Sn 1.3293; V 23.132; Zn 80.532; Be n.a.; Sc n.a.; Sr n.a.; Ti n.a.; Tl 0.19256; W n.a.; Si 38427; Fe 10046; Ca 183060; Al 13408; K n.a.; Mg n.a.; Na 4115.3; Share of carbon in waste that is biogenic 60.4%. ;;

## Included processes
Waste-specific short-term emissions to water from leachate. Long-term emissions from landfill to ground water.

## Geography
Technology encountered in Switzerland in 2000. Landfill includes base seal and leachate collection system.

## Technology
Swiss residual material landfill for polluted, inorganic waste. With base seal and leachate collection system. Recultivation after closure.

## Time period
Waste composition as given in literature reference, theoretical data or other source. Transfer coefficients from prospective model.

## Reference product
- Disposal, cement, hydrated, 0% water, to residual material landfill [CH]: 1 kg
  SWITZERLAND

## Inputs from technosphere
- Residual material landfill facility [CH]: 2.0833e-9 p; lognormal SD95 1
  demands per kilogram waste. uncertainty is heeded in the module
- Process-specific burdens, residual material landfill [CH]: 1 kg; lognormal SD95 1
  demands per kilogram waste. uncertainty is heeded in the module

## Emissions to nature
- Calcium [emissions to water, groundwater, long-term]: 0.016541 kg; lognormal SD95 11.739
  uncertainty is calculated from uncertainties in waste composition and transfer coefficients in incinerator and landfills.
- Zinc [emissions to water, groundwater, long-term]: 9.87e-7 kg; lognormal SD95 125.34
  (same comment as for Calcium)
- Iron [emissions to water, river]: 8.4054e-8 kg; lognormal SD95 13.055
  uncertainty is calculated from uncertainties in waste composition and transfer coefficients in residual landfill
- Sulfate [emissions to water, river]: 0.0015895 kg; lognormal SD95 4.5124
  (same comment as for Iron)
- Aluminium [emissions to water, river]: 6.6448e-6 kg; lognormal SD95 7.9696
  (same comment as for Iron)
- Cadmium [emissions to water, groundwater, long-term]: 4.12e-9 kg; lognormal SD95 272.86
  (same comment as for Calcium)
- Sodium [emissions to water, river]: 0.0015444 kg; lognormal SD95 4.1289
  (same comment as for Iron)
- Manganese [emissions to water, groundwater, long-term]: 1.5674e-6 kg; lognormal SD95 172.25
  (same comment as for Calcium)
- Vanadium [emissions to water, groundwater, long-term]: 1.778e-5 kg; lognormal SD95 8.7325
  (same comment as for Calcium)
- Antimony [emissions to water, groundwater, long-term]: 5.7031e-8 kg; lognormal SD95 16.063
  (same comment as for Calcium)
- Arsenic [emissions to water, groundwater, long-term]: 3.395e-15 kg; lognormal SD95 10.966
  (same comment as for Calcium)
- Chromium VI [emissions to water, groundwater, long-term]: 4.0609e-6 kg; lognormal SD95 8.731
  (same comment as for Calcium)
- Iron [emissions to water, groundwater, long-term]: 5.0348e-5 kg; lognormal SD95 228.77
  (same comment as for Calcium)
- Sodium [emissions to water, groundwater, long-term]: 0.0025709 kg; lognormal SD95 4.0103
  (same comment as for Calcium)
- Zinc [emissions to water, river]: 1.6477e-9 kg; lognormal SD95 18.857
  (same comment as for Iron)
- Mercury [emissions to water, groundwater, long-term]: 8.0787e-10 kg; lognormal SD95 61.825
  (same comment as for Calcium)
- Silicon [emissions to water, groundwater, long-term]: 0.03834 kg; lognormal SD95 2.5273
  (same comment as for Calcium)
- Thallium [emissions to water, groundwater, long-term]: 6.9715e-8 kg; lognormal SD95 17.388
  (same comment as for Calcium)
- Cadmium [emissions to water, river]: 6.8781e-12 kg; lognormal SD95 29.741
  (same comment as for Iron)
- Sulfate [emissions to water, groundwater, long-term]: 0.013226 kg; lognormal SD95 3.8502
  (same comment as for Calcium)
- Arsenic [emissions to water, river]: 3.3957e-6 kg; lognormal SD95 10.75
  (same comment as for Iron)
- Lead [emissions to water, river]: 2.5434e-10 kg; lognormal SD95 22.217
  (same comment as for Iron)
- Tin [emissions to water, river]: 4.2051e-11 kg; lognormal SD95 25.787
  (same comment as for Iron)
- Calcium [emissions to water, river]: 2.7615e-5 kg; lognormal SD95 7.1904
  (same comment as for Iron)
- Lead [emissions to water, groundwater, long-term]: 1.5235e-7 kg; lognormal SD95 290.95
  (same comment as for Calcium)
- Vanadium [emissions to water, river]: 5.6771e-8 kg; lognormal SD95 13.509
  (same comment as for Iron)
- Tin [emissions to water, groundwater, long-term]: 2.5189e-8 kg; lognormal SD95 107.27
  (same comment as for Calcium)
- Aluminium [emissions to water, groundwater, long-term]: 0.0039802 kg; lognormal SD95 5.3385
  (same comment as for Calcium)
- Copper [emissions to water, groundwater, long-term]: 1.4864e-7 kg; lognormal SD95 55.854
  (same comment as for Calcium)
- Nickel [emissions to water, groundwater, long-term]: 5.9604e-6 kg; lognormal SD95 11.207
  (same comment as for Calcium)
- Silicon [emissions to water, river]: 8.642e-5 kg; lognormal SD95 5.7414
  (same comment as for Iron)
- Mercury [emissions to water, river]: 1.3487e-12 kg; lognormal SD95 30.299
  (same comment as for Iron)
- Copper [emissions to water, river]: 2.4815e-10 kg; lognormal SD95 22.267
  (same comment as for Iron)
- Phosphate [emissions to water, river]: 2.6526e-7 kg; lognormal SD95 12.869
  (same comment as for Iron)
- Nickel [emissions to water, river]: 9.9506e-9 kg; lognormal SD95 15.983
  (same comment as for Iron)
- Antimony [emissions to water, river]: 3.1069e-8 kg; lognormal SD95 16.344
  (same comment as for Iron)
- Manganese [emissions to water, river]: 2.6168e-9 kg; lognormal SD95 18.072
  (same comment as for Iron)
- Cobalt [emissions to water, river]: 5.0104e-10 kg; lognormal SD95 20.944
  (same comment as for Iron)
- Phosphate [emissions to water, groundwater, long-term]: 0.00015889 kg; lognormal SD95 10.761
  (same comment as for Calcium)
- Cobalt [emissions to water, groundwater, long-term]: 3.0013e-7 kg; lognormal SD95 20.439
  (same comment as for Calcium)
- Thallium [emissions to water, river]: 1.1639e-10 kg; lognormal SD95 23.614
  (same comment as for Iron)
- Chromium VI [emissions to water, river]: 1.2856e-6 kg; lognormal SD95 10.082
  (same comment as for Iron)

## Sampling procedure
Landfill model based on observed leachate concentrations in literature. Extrapolated to 60'000 years heeding chemical characteristics. Initial waste composition from various literature sources.

## Uncertainty adjustments
uncertainty of waste input composition data derived from generic formula GSD(c) = N*ln(c)+1. Mean long-term emissions are the emissions until the next glacial period occurs (in 60'000a) and the landfill is eroded. Maximal long-term emissions are the complete emissions of all landfilled material (except Cr). Minimal long-term emissions are derived implicitly from the mean and maximal values assuming a lognormal distribution.

## Sources
- Doka G., 2009, 2009 - LCI waste treatment services - Doka, Final report ecoinvent data v2.1, 13, Swiss Centre for LCI, Doka LCA, Duebendorf and St. Gallen, CH
Doka G. (2009) Life Cycle Inventories of Waste Treatment Services. Final report ecoinvent data v2.1. Volume: 13. Swiss Centre for LCI, Empa - TSL. Dübendorf, CH.
Type: Measurement on site
Source: CD-ROM
First author: Doka G.
Year: 2009
Title of anthology: Final report ecoinvent data v2.1
Place of publication: Dübendorf, CH
Publisher: Swiss Centre for LCI, Empa - TSL
Volume No: 13

## Validation
Proof reading validation: passed.; Other validation: none;
