# xxx Electricity, production mix EE

Dataset: EcoSpold 1, unit process
Functional unit: 1 kWh
Category: electricity / notMaintained
Geography: EE
Time period: 2006-01 to 2009-12
Production volume: 11 TWh
Share of production covered: 100 %
Generated by: René Itten
accessRestrictedTo: 0
copyright: true

## General comment
Electricity domestic net production shares are based on IEA statistics for the year 2008.;

## Included processes
It includes the shares of domestic electricity production by technology at the busbar. It does not include transformation, transport nor distribution losses.

## Geography
Data apply to public and self producers in Estonia.

## Technology
No technology description is provided because the dataset just describes the power plant portfolio of the respective country using current (2004) average technology per energy carrier.

## Time period
Time period of statistics used (2008).

## Reference product
- xxx Electricity, production mix EE [EE]: 1 kWh
  ESTONIA

## Inputs from technosphere
- Electricity, oil, at power plant [SK]: 0.0034881 kWh; lognormal SD95 1.0541
  (1,1,1,3,1,1); assumption for petroleum product and fuel oil power production in Estonia, value: IEA statistics 2008
- Electricity, at wind farm [RER]: 0.014619 kWh; lognormal SD95 1.0511
  (1,1,1,2,1,1); assumption for geothermal power production in Estonia, value: IEA statistics 2008
- Electricity, at cogen 1MWth, wood chips, allocation exergy [CH]: 0.0025454 kWh; lognormal SD95 1.0541
  (1,1,1,3,1,1); assumption for cogeneration power production in Estonia, value: IEA statistics 2008
- Electricity, at cogen with biogas engine, allocation exergy [CH]: 0.00084846 kWh; lognormal SD95 1.0541
  (1,1,1,3,1,1); assumption for power production from biogas, sewage and landfill gas in Estonia, value: IEA statistics 2008
- Electricity, peat, at power plant [NORDEL]: 0.0018845 kWh; lognormal SD95 1.0541
  (1,1,1,3,1,1); assumption for peat power production in Estonia, value: IEA statistics 2008
- Electricity, lignite, at power plant [ENTSO-E]: 0.90739 kWh; lognormal SD95 1.0541
  (1,1,1,3,1,1); assumption for lignite power production in Estonia, value: IEA statistics 2008
- Electricity, from natural gas [EE]: 0.06618 kWh; lognormal SD95 1.05
  (1,1,1,1,1,1); assumption for natural gas power production in Estonia, value: IEA statistics 2008
- Electricity, hydropower, at run-of-river power plant [RER]: 0.0030469 kWh; lognormal SD95 1.0511
  (1,1,1,2,1,1); estimated share of ROR hydropower production in Estonia: 100%

## Sampling procedure
Statistical data

## Sources
- Frischknecht R., Itten R., Flury K., 2012, 2012 - GHG emis. from Swiss elec. mixes - Frischknecht, Project reports, 401, ESU-services Ltd., Uster, CH
Itten, R., Frischknecht, R. (2012) Life Cycle Inventories of electricity mixes. Project reports. Volume: 401. ESU-services Ltd.. Uster, CH.
Type: Separate publication
First author: Itten, R.
Other authors: Frischknecht, R.
Year: 2012
Title of anthology: Project reports
Place of publication: Uster, CH
Publisher: ESU-services Ltd.
Volume No: 401

## Validation
Proof reading validation: automatic validation in Excel; Other validation: Z:\ESU-Docs\Projekte laufend\401 Update Strommix v3.0\EcoSpold\_Europa\[401-electricity-mix-estonia-EE-v1.0.xlsx]X-Process;
