# Electric motor, electric vehicle, at plant

Dataset: EcoSpold 1, unit process
Functional unit: 1 kg
Category: transport systems / road\operations\infrastructure
Geography: RER
Time period: 2000-01 to 2009-12
Generated by: Marianne Leuenberger
accessRestrictedTo: 0
copyright: true

## General comment
The module reflects an average electric motor used in BEV or HEV;

## Included processes
This data set includes the material used for the production of 1 kg electric motor for a electric vehicle

## Geography
Data valid for average electric motor

## Technology
Production of electric motor for BEV or HEV

## Reference product
- Electric motor, electric vehicle, at plant [RER]: 1 kg
  Europe

## Inputs from technosphere
All rows: lognormal SD95 1.3488
- Wire drawing, copper [RER]: 0.09 kg
  (4,3,3,2,3,4); assumption
- Sheet rolling, steel [RER]: 0.75 kg
  (4,3,3,2,3,4); assumption
- Copper, at regional storage [RER]: 0.09 kg
  (4,3,3,2,3,4); Roeder, 2001
- Aluminium, production mix, at plant [RER]: 0.165 kg
  (4,3,3,2,3,4); Roeder, 2001
- Steel, low-alloyed, at plant [RER]: 0.75 kg
  (4,3,3,2,3,4); Roeder, 2001

## Sampling procedure
Literature

## Sources
- Spielmann M., Bauer C., Dones R., Tuchschmid M., 2007, 2007 - Transport services - Spielmann, Final report ecoinvent Data v2.0, 14, Swiss Centre for LCI, PSI, ESU-services Ltd., Duebendorf, Villigen and Uster, CH
Spielmann M., Dones R; Bauer C. (2007) Life Cycle Inventories of Transport Services. Final report ecoinvent Data v2.0. Volume: 14. Issue: 0. Swiss Centre for LCI, PSI. Dübendorf and Villigen, CH.
Type: Measurement on site
Source: CD-ROM
First author: Spielmann M.
Other authors: Dones R; Bauer C.
Year: 2007
Title of anthology: Final report ecoinvent Data v2.0
Place of publication: Dübendorf and Villigen, CH
Publisher: Swiss Centre for LCI, PSI
Volume No: 14
Issue No: 0

## Validation
Proof reading validation: 09.02.2010; Other validation: C:\Dokumente und Einstellungen\Marianne\Eigene Dateien\Projekte\277_Mobitool\Ecoinvent\Review\Upload 1\[Ecospold_ElectricMotor-v1.1.xls]X-Process;
