# Electricity, nuclear, at power plant pressure water reactor

Dataset: EcoSpold 1, unit process
Functional unit: 1 kWh
Category: electricity by fuel / waste\nuclear\pwr
Geography: DE
Time period: 2000-01 to 2000-12
Generated by: Roberto Dones
accessRestrictedTo: 0
copyright: true

## General comment
The average burnup 53 MWd/kg heavy metal around year 2000 has been assumed representative for the lifetime of the modeled plant. The average burnup corresponds to an average enrichment of 4.2% U235 for fresh uranium fuel elements. Over the lifetime of the plant it can be assumed that approximately 8% of the energy will be produced by MOX fuel elements. Of total fuel elements 92% are assumed to be from fresh U (thus burdened by the full upstream chain), and 8% MOX (burdened by reprocessing). The utilisation factor for the infrastructure is the inverse of the total net electricity delivered in 40 years lifetime;

## Included processes
The module includes fuel elements, chemicals, and diesel requirements as well as the relevant transport requirements. Water use (fresh and decarbonized) for cooling is included. Considered radioactive waste streams are: spent fuel to reprocessing and conditioning; operational low active waste for conditioning in the intermediate repository; and, contaminated waste from dismantling. Non-radioactive wastes are accounted for.

## Geography
Swiss data of one specific plant for requirements and all German PWRs for emissions.

## Technology
Standard technology for commercial operation.

## Reference product
- Electricity, nuclear, at power plant pressure water reactor [DE]: 1 kWh
  GERMANY

## Inputs from technosphere
- Paper, woodfree, coated, at integrated mill [RER]: 6.75e-7 kg; lognormal SD95 1.3
  own estimation
- Chemicals inorganic, at plant [GLO]: 2.45e-6 kg; lognormal SD95 1.25
  own estimation
- Carbon dioxide liquid, at plant [RER]: 1.75e-7 kg; lognormal SD95 1.3
  own estimation
- Disposal, hazardous waste, 25% water, to hazardous waste incineration [CH]: 1.02e-6 kg; lognormal SD95 1.3
  own estimation
- Bitumen, at refinery [CH]: 8.1e-7 kg; lognormal SD95 1.3
  own estimation
- Oxygen, liquid, at plant [RER]: 1.75e-5 kg; lognormal SD95 1.3
  own estimation
- Cationic resin, at plant [CH]: 6.75e-8 kg; lognormal SD95 1.15
  own estimation
- Reinforcing steel, at plant [RER]: 4.9e-7 kg; lognormal SD95 1.3
  own assumption
- Lubricating oil, at plant [RER]: 1.7e-6 kg; lognormal SD95 1.3
  own estimation
- Cast iron, at plant [RER]: 1.35e-7 kg; lognormal SD95 1.2
  extrapolation from another plant type
- Chemicals organic, at plant [GLO]: 1.45e-6 kg; lognormal SD95 1.2
  own estimation
- Radioactive waste, in interim storage, for final repository LLW [CH]: 1.76e-9 m3; lognormal SD95 1.2
  own estimation
- Nitrogen, liquid, at plant [RER]: 6.48e-5 kg; lognormal SD95 1.3
  own estimation
- Cement, unspecified, at plant [CH]: 9.64e-7 kg; lognormal SD95 1.3
  own estimation
- Disposal, used mineral oil, 10% water, to hazardous waste incineration [CH]: 1.71e-6 kg; lognormal SD95 1.3
  own estimation
- Acetylene, at regional storehouse [CH]: 3.78e-8 kg; lognormal SD95 1.25
  own estimation
- Disposal, separator sludge, 90% water, to hazardous waste incineration [CH]: 2.29e-6 kg; lognormal SD95 1.3
  own estimation
- Hydrogen, liquid, at plant [RER]: 1.08e-5 kg; lognormal SD95 1.3
  own estimation
- Nuclear spent fuel, in reprocessing, at plant [RER]: 1.01e-6 kg; lognormal SD95 1.5
  own assumption
- Steel, low-alloyed, at plant [RER]: 1.7e-6 kg; lognormal SD95 1.6
  own assumption
- Sodium hypochlorite, 15% in H2O, at plant [RER]: 1.81e-5 kg; lognormal SD95 1.3
  own estimation
- Transport, freight, lorry, 16t-32t gross weight, fleet average [CH]: 5.45e-5 tkm; lognormal SD95 2.1
  standard
- Flat glass, coated, at plant [RER]: 4.59e-6 kg; lognormal SD95 1.3
  own estimation
- Concrete, normal, at plant [CH]: 1.02e-8 m3; lognormal SD95 1.3
  own estimation
- Anionic resin, at plant [CH]: 6.75e-8 kg; lognormal SD95 1.15
  own estimation
- Diesel, burned in diesel-electric generating set [GLO]: 0.000388 MJ; lognormal SD95 1.3
  own estimation
- Nuclear spent fuel, in conditioning, at plant [CH]: 1.52e-6 kg; lognormal SD95 1.5
  own assumption
- Radioactive waste, in interim storage conditioning [CH]: 4.32e-11 m3; lognormal SD95 1.2
  own estimation
- Fuel elements PWR, UO2 4.0% & MOX, at nuclear fuel fabrication plant [DE]: 2.53e-6 kg; lognormal SD95 1.15
  estimated variation over lifetime
- Argon, liquid, at plant [RER]: 2.74e-5 kg; lognormal SD95 1.3
  own estimation
- Radioactive waste, in final repository for nuclear waste LLW [CH]: 2.98e-8 m3; lognormal SD95 1.4
  own estimation
- Boric acid, anhydrous, powder, at plant [RER]: 6.74e-8 kg; lognormal SD95 1.15
  own estimation on data from utility
- Water, decarbonised, at plant [RER]: 2.68 kg; lognormal SD95 1.2
  own estimation
- Nuclear power plant, pressure water reactor 1000MW [DE]: 3.06e-12 p; lognormal SD95 1.05
  estimation of total net electricity over a lifetime

## Inputs from nature
- Water, river [resources, in water]: 0.00575 m3; lognormal SD95 1.2
  own estimation

## Emissions to nature
- Cesium-134 [emissions to water, river]: 4.51e-7 kBq; lognormal SD95 1.5
  uncertainty declared in reports for radioactive releases
- Xenon-138 [emissions to air, low. pop.]: 2.31e-5 kBq; lognormal SD95 1.5
  uncertainty declared in reports for radioactive releases
- Argon-41 [emissions to air, low. pop.]: 0.0372 kBq; lognormal SD95 1.5
  uncertainty declared in reports for radioactive releases
- Krypton-87 [emissions to air, low. pop.]: 0.000175 kBq; lognormal SD95 1.5
  uncertainty declared in reports for radioactive releases
- Radioactive species, Nuclides, unspecified [emissions to water, river]: 5.04e-6 kBq; lognormal SD95 1.5
  uncertainty declared in reports for radioactive releases
- Heat, waste [emissions to air, low. pop.]: 7.31 MJ; lognormal SD95 1.03
  uncertainty on efficiency
- Xenon-131m [emissions to air, low. pop.]: 0.00557 kBq; lognormal SD95 1.5
  uncertainty declared in reports for radioactive releases
- Xenon-133 [emissions to air, low. pop.]: 0.148 kBq; lognormal SD95 1.5
  uncertainty declared in reports for radioactive releases
- Iodine-131 [emissions to air, low. pop.]: 3.54e-7 kBq; lognormal SD95 1.5
  uncertainty declared in reports for radioactive releases
- Niobium-95 [emissions to water, river]: 1.13e-7 kBq; lognormal SD95 1.5
  uncertainty declared in reports for radioactive releases
- Xenon-135m [emissions to air, low. pop.]: 0.000136 kBq; lognormal SD95 1.5
  uncertainty declared in reports for radioactive releases
- Cesium-137 [emissions to water, river]: 1.76e-6 kBq; lognormal SD95 1.5
  uncertainty declared in reports for radioactive releases
- Strontium-89 [emissions to water, river]: 1.14e-7 kBq; lognormal SD95 1.5
  uncertainty declared in reports for radioactive releases
- Manganese-54 [emissions to water, river]: 7.39e-8 kBq; lognormal SD95 1.5
  uncertainty declared in reports for radioactive releases
- Strontium-90 [emissions to water, river]: 1.9e-8 kBq; lognormal SD95 1.5
  uncertainty declared in reports for radioactive releases
- Krypton-85 [emissions to air, low. pop.]: 0.111 kBq; lognormal SD95 1.5
  uncertainty declared in reports for radioactive releases
- Antimony-124 [emissions to water, river]: 3.85e-6 kBq; lognormal SD95 1.5
  uncertainty declared in reports for radioactive releases
- Antimony-125 [emissions to water, river]: 5.62e-7 kBq; lognormal SD95 1.5
  uncertainty declared in reports for radioactive releases
- Xenon-137 [emissions to air, low. pop.]: 5.99e-6 kBq; lognormal SD95 1.5
  uncertainty declared in reports for radioactive releases
- Silver-110 [emissions to water, river]: 1.23e-6 kBq; lognormal SD95 1.5
  uncertainty declared in reports for radioactive releases
- Chromium-51 [emissions to water, river]: 9.18e-8 kBq; lognormal SD95 1.5
  uncertainty declared in reports for radioactive releases
- Xenon-135 [emissions to air, low. pop.]: 0.0125 kBq; lognormal SD95 1.5
  uncertainty declared in reports for radioactive releases
- Cobalt-60 [emissions to water, river]: 5.04e-6 kBq; lognormal SD95 1.5
  uncertainty declared in reports for radioactive releases
- Iodine-131 [emissions to water, river]: 2.4e-7 kBq; lognormal SD95 1.5
  uncertainty declared in reports for radioactive releases
- Cobalt-58 [emissions to water, river]: 8.51e-7 kBq; lognormal SD95 1.5
  uncertainty declared in reports for radioactive releases
- Hydrogen-3, Tritium [emissions to water, river]: 1.51 kBq; lognormal SD95 1.5
  uncertainty declared in reports for radioactive releases
- Krypton-85m [emissions to air, low. pop.]: 0.000643 kBq; lognormal SD95 1.5
  uncertainty declared in reports for radioactive releases
- Krypton-89 [emissions to air, low. pop.]: 4.92e-5 kBq; lognormal SD95 1.5
  uncertainty declared in reports for radioactive releases
- Radioactive species, other beta emitters [emissions to air, low. pop.]: 3.47e-7 kBq; lognormal SD95 1.5
  uncertainty declared in reports for radioactive releases
- Krypton-88 [emissions to air, low. pop.]: 0.000522 kBq; lognormal SD95 1.5
  uncertainty declared in reports for radioactive releases
- Xenon-133m [emissions to air, low. pop.]: 0.00097 kBq; lognormal SD95 1.5
  uncertainty declared in reports for radioactive releases
- Hydrogen-3, Tritium [emissions to air, low. pop.]: 0.07 kBq; lognormal SD95 1.5
  uncertainty declared in reports for radioactive releases
- Water [emissions to water, unspecified]: 5.4625 kg; lognormal SD95 2.5196
  (5,5,5,5,5,BU:1.05); All uncertainty-values set to 5.0 by default. Balance of input water

## Sampling procedure
Literature and statistics of radioactive emissions.

## Sources
- Dones R., Bauer C., Doka G., 2009, 2009 - Nuclear energy - Dones, Sachbilanzen von Energiesystemen. Final report No. 6 ecoinvent v2.1, 6, Swiss Centre for LCI, PSI, Doka LCA, Duebendorf and Villigen, CH
Dones, R., Doka G. (2009) Kernenergie. Sachbilanzen von Energiesystemen. Final report No. 6 ecoinvent v2.1. Editors: Bauer C.. Volume: 6. Swiss Centre for LCI, PSI. Dübendorf and Villigen, CH.
Type: Measurement on site
Source: CD-ROM
First author: Dones, R.
Other authors: Doka G.
Year: 2009
Name of editors: Bauer C.
Title of anthology: Sachbilanzen von Energiesystemen. Final report No. 6 ecoinvent v2.1
Place of publication: Dübendorf and Villigen, CH
Publisher: Swiss Centre for LCI, PSI
Volume No: 6

## Validation
Proof reading validation: passed; Other validation: for final run August 2003;
