# Carbon fiber production, fiber winding and unwinding

Dataset: EcoSpold 1, unit process
Functional unit: 1 kg
Category: chemicals / organic
Geography: RER
Time period: 2024-01 to 2024-01
Generated by: Romain Sacchi
accessRestrictedTo: 0
copyright: true

## General comment
1 kg of finished carbon fiber Toray T700 G. Carbon fiber manufacturing. Source: based on Ellringmann et al. (2016), Gill et al. (2016), Mützel (2012). Source: Benitez A, Wulf C, de Palmenaer A, Lengersdorf M, Röding T, Grube T, et al. Ecological assessment of fuel cell electric vehicles with special focus on type IV carbon fiber hydrogen tank. J Clean Prod 2021;278:123277. https://doi.org/10.1016/j.jclepro.2020.123277.

## Reference product
- Carbon fiber production, fiber winding and unwinding [RER]: 1 kg
  not defined

## Inputs from technosphere
- Electricity, low voltage, production ENTSO-E, at grid: 0.04676, 0.1118 kWh (2 entries); lognormal SD95 2.565
  {5;5;5;5;5;5;1.05;}
- Compressed air, average generation, <30kW, 10 bar gauge, at compressor [RER]: 0.03597, 0.1526 m3 (2 entries); lognormal SD95 2.565
  {5;5;5;5;5;5;1.05;}
- Water, deionised, at plant [CH]: 0.1024 kg; lognormal SD95 2.565
  {5;5;5;5;5;5;1.05;}
- Carbon fiber production, fiber relaxation [RER]: 1 kg; lognormal SD95 2.565
  {5;5;5;5;5;5;1.05;}

## Sampling procedure
Sampling procedure: Literature data

## Sources
- Sacchi R., Bauer C., 2024, 2024 - LCA power-to-X in residential sector - Sacchi, Project report, PSI, Villigen, CH

## Validation
Proof reading validation: Passed, Other validation: none, Validator: Rolf Frischknecht, Telephone: 0041 44 940 61 91, E-mail: frischknecht@treeze.ch, Company: treeze, Country: CH
