# Plugs, inlet and outlet, for printer cable, at plant

Dataset: EcoSpold 1, unit process
Functional unit: 1 p
Category: electronics / devices
Geography: GLO
Time period: 2023-01 to 2029-12
Synonyms: Connector; Male; Female
Generated by: Lugas Raka Adrianto, Maulana Permana Ajie, Didier Beloin-Saint-Pierre
accessRestrictedTo: 0
copyright: false

## General comment
This dataset can be applied to describe the production of a typical set of plugs (inlet and outlet) for a printer cable. The total weight of the inlet plug (with pins) is 0.0395 kg and 0.050 kg for the outlet plug (the one with holes). The information for this dataset is based on weighing, measurements and analysis at EMPA Laboratories. Updates were made in 2023 to reflect regionalized material and electricity mix for global production;

## Included processes
Describes the production of a typical set of inlet and outlet plugs for a printer cable. Calculated per 1 unit of plugs, which is per definition 1 inlet and 1 outlet plug. Included are the materials PVC, LDPE, HDPE, silicone, low-alloyed steel, chromium steel, brass, and copper with their respective manufacturing processes. The infrastructure is calculated via the proxy "electronic component production plant". Further inventoried are the electricity used in the assembly of the plugs, plus the road and rail transportation for input materials from the regional storage to the production site.

## Geography
The data describes a typical set of plugs for a printer cable in 2006. Plugs and cable are produced by international manufacturers and available all over the world. Therefore a global dataset is justifiable.

## Technology
The manufacturing process is inventoried through wire drawing, injection moulding, sheet rolling & hot rolling (steel), contouring (brass), and zinc coating (galvanising of steel).

## Reference product
- Plugs, inlet and outlet, for printer cable, at plant [GLO]: 1 p
  Global

## Inputs from technosphere
- Brass, at plant [CH]: 0.0014 kg; lognormal SD95 1.32
  (1,4,4,3,1,5,BU:1.05)
- Chromium steel 18/8, at plant [RER]: 0.00261 kg; lognormal SD95 1.32
  (1,4,4,3,1,5,BU:1.05)
- Contour, brass [RER]: 0.0014 kg; lognormal SD95 1.32
  (1,4,4,3,1,5,BU:1.05)
- Copper, primary, at refinery [GLO]: 0.0023125 kg; lognormal SD95 1.32
  (1,4,4,3,1,5,BU:1.05)
- Electricity, medium voltage, production GLO, at grid [GLO]: 0.0014755 kWh; lognormal SD95 1.33
  (2,4,4,3,1,5,BU:1.05)
- Hot rolling, steel [RER]: 0.00261 kg; lognormal SD95 1.32
  (1,4,4,3,1,5,BU:1.05)
- Injection moulding [RER]: 0.07174 kg; lognormal SD95 1.33
  (2,4,4,3,1,5,BU:1.05)
- Polyethylene, HDPE, granulate, at plant [RER]: 0.00681 kg; lognormal SD95 1.33
  (2,4,4,3,1,5,BU:1.05)
- Polyethylene, LDPE, granulate, at plant [RER]: 0.05273 kg; lognormal SD95 1.33
  (2,4,4,3,1,5,BU:1.05)
- Printed wiring board mounting plant [GLO]: 1.8616e-8 p; lognormal SD95 3.11
  (2,4,4,3,1,5,BU:3.00)
- Sheet rolling, steel [RER]: 0.011537 kg; lognormal SD95 1.33
  (2,4,4,3,1,5,BU:1.05)
- Silicone product, at plant [RER]: 0.0122 kg; lognormal SD95 1.32
  (1,4,4,3,1,5,BU:1.05)
- Steel, low-alloyed, at plant [RER]: 0.011537 kg; lognormal SD95 1.33
  (2,4,4,3,1,5,BU:1.05)
- Transport, freight, rail [RER]: 0.007898 tkm; lognormal SD95 2.12
  (3,4,4,3,1,5,BU:2.00)
- Transport, freight, lorry, fleet average [RER]: 0.003949 tkm; lognormal SD95 2.12
  (3,4,4,3,1,5,BU:2.00)
- Wire drawing, copper [RER]: 0.0023125 kg; lognormal SD95 1.32
  (1,4,4,3,1,5,BU:1.05)
- Zinc coating, pieces [RER]: 0.0023 m2; lognormal SD95 1.33
  (2,4,4,3,1,5,BU:1.05)

## Sampling procedure
Weighing and measuring of materials. Literature for electricity consumption (assembly).

## Extrapolations
see Geography and Technology

## Sources
- Raka Adrianto L., Permana Ajie M., Beloin-Saint-Pierre D., 2024, 2024 - LCI ICT sector - Raka Adrianto, Empa, St. Gallen, CH

## Validation
Proof reading validation: Passed, Other validation: none, Validator: Mischa Zschokke, Company: Carbotech, Country: CH
