# xx Green manure organic, until February

Dataset: EcoSpold 1, unit process
Functional unit: 1 ha
Category: material, obsolete / agricultural, obsolete\plant production, obsolete
Geography: CH
Time period: 2000-01 to 2000-12
Generated by: Thomas Nemecek
accessRestrictedTo: 0
copyright: true

## General comment
Inventory refers to the production of 1 kg green manure organic, until February.;
Synonyms: catch crop;

## Included processes
The inventory includes the processes of soil cultivation, sowing and mulching. Machine infrastructure and a shed for machine sheltering is included. Inputs of fertilisers, pesticides and seed as well as their transports to the farm are considered. The direct emissions on the field are also included.

## Geography
Refers to an average production in the Swiss lowlands.

## Technology
Organic production

## Time period
The yield data have been collected for the years 1996-2003.

## Reference product
- xx Green manure organic, until February [CH]: 1 ha
  SWITZERLAND

## Inputs from technosphere
- Sowing [CH]: 1 ha; lognormal SD95 1.0714
  (2,1,1,1,1,na)
- Mulching [CH]: 1 ha; lognormal SD95 1.0714
  (2,1,1,1,1,na)
- Transport, freight, lorry, 3.5t gross weight, fleet average [CH]: 0.15 tkm; lognormal SD95 2.095
  (4,5,na,na,na,na)
- Tillage, harrowing, by spring tine harrow [CH]: 1 ha; lognormal SD95 1.0714
  (2,1,1,1,1,na)
- Rape seed IP, at regional storehouse [CH]: 10 kg; lognormal SD95 1.0714
  (2,1,1,1,1,na)

## Inputs from nature
- Occupation, annual crop, organic [resources, land]: 5500 m2a; lognormal SD95 1.113
  (2,1,1,1,1,na)
- Transformation, from arable, organic [resources, land]: 10000 m2; lognormal SD95 1.2077
  (2,1,1,1,1,na)
- Transformation, to arable, organic [resources, land]: 10000 m2; lognormal SD95 1.2077
  (2,1,1,1,1,na)

## Emissions to nature
- Zinc [emissions to water, groundwater]: 0.00015348 kg; lognormal SD95 1.8042
  (2,2,1,1,1,na)
- Dinitrogen monoxide [emissions to air, low. pop.]: 1.4732 kg; lognormal SD95 1.4057
  (2,2,1,1,1,na)
- Cadmium [emissions to water, groundwater]: 9.8588e-7 kg; lognormal SD95 1.8042
  (2,2,1,1,1,na)
- Copper [emissions to water, groundwater]: 4.3039e-5 kg; lognormal SD95 1.8042
  (2,2,1,1,1,na)
- Nitrogen oxides [emissions to air, low. pop.]: 0.30937 kg; lognormal SD95 1.4057
  (2,2,1,1,1,na)
- Phosphorus [emissions to water, river]: 0.12188 kg; lognormal SD95 1.5051
  (2,2,1,1,1,na)
- Phosphate [emissions to water, groundwater]: 0.089382 kg; lognormal SD95 1.5051
  (2,2,1,1,1,na)
- Lead [emissions to water, groundwater]: 1.4787e-6 kg; lognormal SD95 1.8042
  (2,2,1,1,1,na)
- Mercury [emissions to water, groundwater]: 1.9544e-7 kg; lognormal SD95 1.8042
  (2,2,1,1,1,na)
- Phosphate [emissions to water, river]: 0.22345 kg; lognormal SD95 1.5051
  (2,2,1,1,1,na)
- Chromium [emissions to water, groundwater]: 2.5525e-5 kg; lognormal SD95 1.8042
  (2,2,1,1,1,na)
- Nitrate [emissions to water, groundwater]: 44.445 kg; lognormal SD95 1.5051
  (2,2,1,1,1,na)

## Sampling procedure
Data were compiled from statistics, pilot network, fertilising recommendations, documents from extension services, information provided by retailers and expert knowledge. The production data were verified and adjusted by a group of experts.

## Sources
- Nemecek T., Kaegi T., 2007, 2007 - LCI agricultural prod. systems - Nemecek, Ecoinvent report version 2.0, 15, Swiss Centre for LCI, ART, Duebendorf and Zuerich, CH
Nemecek, T., Kägi, T., Blaser, S. (2007) Life Cycle Inventories of Agricultural Production Systems. Ecoinvent report version 2.0. Editors: 0. Volume: 15. Swiss Centre for LCI, ART. Duebendorf and Zurich, CH.
Type: Measurement on site
Source: CD-ROM
First author: Nemecek, T.
Other authors: Kägi, T., Blaser, S.
Year: 2007
Name of editors: 0
Title of anthology: Ecoinvent report version 2.0
Place of publication: Duebendorf and Zurich, CH
Publisher: Swiss Centre for LCI, ART
Volume No: 15

## Validation
Proof reading validation: passed; Other validation: none;
