# Stone columns, 500-600mm, Implenia

Dataset: EcoSpold 1, unit process
Functional unit: 1 m
Category: construction processes / civil engineering
Geography: CH
Time period: 2014-01 to 2014-12
Share of production covered: 0 %
Generated by: René Itten
accessRestrictedTo: 0
copyright: true

## General comment
Rüttelstopfsäule, d=700mm, durchschnittliche Tiefe ca. 8m, Kies 16/32 0.7 to/lm Rüttelstopfsäule (Gesteinskörnung 16/32), Dieselverbrauch 1.4 l/lm Rüttelstopfsäule;

## Included processes
This data set includes the material use of deep foundation.

## Reference product
- Stone columns, 500-600mm, Implenia [CH]: 1 m
  SWITZERLAND

## Inputs from technosphere
- Diesel, burned in building machine, average [CH]: 50.333 MJ; lognormal SD95 1.165
  (3,3,1,3,1,4,BU:1.05); company data; Keller-MTS 2014, pers. communication Christian Senn, Implenia 2014, pers. communication Duncan Moore
- Transport, freight, lorry, 32t-40t gross weight, fleet average [CH]: 14 tkm; lognormal SD95 2.0301
  (3,3,1,3,1,4,BU:2); 20 km for gravel; standard distances ecoinvent v2.2
- Gravel, round, at mine [CH]: 700 kg; lognormal SD95 1.165
  (same comment as for Diesel, burned in building machine, average)

## Sources
- Frischknecht R., Itten R., Wyss F., Stolz P., 2014, 2014 - LCA civil eng. works in building const. - Frischknecht, Project report, 489, treeze Ltd., Zuerich, CH
Frischknecht R., Wyss F., Itten R. (2014) Ökobilanzen von Tiefbauarbeiten bei Hochbauten. Project report. Volume: 489. treeze Ltd.. Uster, CH.
Type: Separate publication
Source: Report
First author: Frischknecht R.
Other authors: Wyss F., Itten R.
Year: 2014
Title of anthology: Project report
Place of publication: Uster, CH
Publisher: treeze Ltd.
Volume No: 489

## Validation
Proof reading validation: 15.08.2016; Other validation: \\SRV01\ESU-Docs\Projektablage\489 Erweiterung KBOB-Liste BFE\EcoSpold\Baugrubenabschluss\[489-Ecospold-Baugrubensicherung-Tiefgründung-v0.25.xlsx]X-Process;
