# Wind turbine 6.2MW, onshore, tower

Dataset: EcoSpold 1, unit process, infrastructure
Functional unit: 1 unit
Category: wind power / production of components
Geography: RER
Time period: 2024 to 2024
Synonyms: 0
Share of production covered: 100 %
Generated by: Alena Frehner
accessRestrictedTo: 0
copyright: true

## Included processes
Wind turbine tower, at site including manufacturing, transports, installation, replacements, decommission and waste treatement. Calculated for FU of 1p.
Data are based on the Vestas V162-6.2MW onshore wind turbine (Mali & Garrett, 2023).
Assumed lifetime is 25 years.

## Reference product
- Wind turbine 6.2MW, onshore, tower [RER]: 1 unit

## Inputs from technosphere
- Aluminium, production mix, at plant [RER]: 5765.1 kg; lognormal SD95 1.2355
  (1,4,1,1,1,5,BU:1.05); Input based on Mali and Garrett (2023)
- Chromium steel 18/8, at plant [RER]: 879.51 kg; lognormal SD95 1.2355
  (1,4,1,1,1,5,BU:1.05); Input based on Mali and Garrett (2023)
- Copper, at regional storage [RER]: 258.31 kg; lognormal SD95 1.2355
  (1,4,1,1,1,5,BU:1.05); Input based on Mali and Garrett (2023)
- Steel, low-alloyed, at plant [RER]: 476920 kg; lognormal SD95 1.2355
  (1,4,1,1,1,5,BU:1.05); Input based on Mali and Garrett (2023)
- Aluminium product manufacturing, average metal working [RER]: 5765.1 kg; lognormal SD95 1.2355
  (1,4,1,1,1,5,BU:1.05); Input based on Mali and Garrett (2023)
- Copper product manufacturing, average metal working [RER]: 258.3 kg; lognormal SD95 1.2355
  (1,4,1,1,1,5,BU:1.05); Input based on Mali and Garrett (2023)
- Sheet rolling, steel [RER]: 476916 kg; lognormal SD95 1.2355
  (1,4,1,1,1,5,BU:1.05); Input based on Mali and Garrett (2023)
- Sheet rolling, chromium steel [RER]: 879.5 kg; lognormal SD95 1.2355
  (1,4,1,1,1,5,BU:1.05); Input based on Mali and Garrett (2023)
- Welding, arc, steel [RER]: 566.2 m; lognormal SD95 1.2355
  (1,4,1,1,1,5,BU:1.05); Input based on Mali and Garrett (2023)
- Transport, freight, lorry, fleet average [RER]: 205620 tkm; lognormal SD95 2.0641
  (2,4,1,1,1,5,BU:2); Includes the tranportation of components to wind farm site.
- Transport, freight, lorry, diesel, 26t gross weight, 2010, EURO-V, regional delivery [RER]: 49580 tkm; lognormal SD95 2.0641
  (2,4,1,1,1,5,BU:2); Includes the tranportation of materials to component manufacturing site and components to waste treatement site.
- Operation, freight train, diesel [RER]: 96764 tkm; lognormal SD95 2.0641
  (2,4,1,1,1,5,BU:2); Includes the tranportation of materials to component manufacturing site.
- Diesel, burned in building machine, average [CH]: 707.19 MJ; lognormal SD95 2.2942
  (2,4,5,1,1,5,BU:2); Diesel consumption for the erection of the wind turbine, based on the potential energy.
- Recycling steel and iron [RER]: 454150 kg; lognormal SD95 1.2423
  (2,4,1,1,1,5,BU:1.05); Own calculation; recycling of steel and iron; assumed recycling rate: 95%
- Disposal, steel, 0% water, to construction waste landfill [CH]: 23903 kg; lognormal SD95 1.2423
  (2,4,1,1,1,5,BU:1.05); Own calculation; landfill of steel and iron; assumed landfill rate: 5%
- Disposal, aluminium, 0% water, to sanitary landfill [CH]: 288.26 kg; lognormal SD95 1.2423
  (2,4,1,1,1,5,BU:1.05); Own calculation; landfill of aluminum; assumed landfill rate: 5%

## Sources
- Kroehnert H., Frehner A., Stucki M., 2025, 2025 - LCI wind Energy - Kroehnert, Project report, 0, ZHAW, Waedenswil, CH

## Validation
22.07.2025
"S:\pools\n\N-IUNR-FG-LCA\Projekte\Wind LCA\LCI-Update\Sachbilanz"
