# Heat, heavy fuel oil, at industrial furnace 1MW

Dataset: EcoSpold 1, unit process
Functional unit: 1 MJ
Category: heat / oil\heating systems
Geography: CH
Time period: 2000-01 to 2000-12
Generated by: Paula Wenzel
accessRestrictedTo: 0
copyright: true

## General comment
Inventory for heat delivery. Efficiency depends on use patterns such as input and output temperature and is here estimated with (Hu) 0.951272727272727;

## Included processes
Heat delivered by the furnace not including losses during distribution in the factory.

## Geography
Assumption for operation in Switzerland.

## Technology
Average furnace used in 2016.

## Time period
Estimation for efficiency of furnaces used in 2016.

## Reference product
- Heat, heavy fuel oil, at industrial furnace 1MW [CH]: 1 MJ
  SWITZERLAND

## Inputs from technosphere
- Heavy fuel oil, burned in industrial furnace 1MW, non-modulating [CH]: 1.0512 MJ; lognormal SD95 1.129
  (3,3,2,1,1,na); Literature

## Sampling procedure
Data published in technical data sheets.

## Sources
- Jungbluth N., Wenzel P., Meili C., 2018, 2018 - LCI oil heating systems - Jungbluth, Project report, 565, ESU-services Ltd., Schaffhausen, CH
Jungbluth N., Wenzel P., Meili C. (2018) Life cycle inventories of oil heating systems. Project report. Volume: 565. ESU-services Ltd.. Schaffhausen, CH.
Type: Separate publication
Source: Report
First author: Jungbluth N.
Other authors: Wenzel P., Meili C.
Year: 2018
Title of anthology: Project report
Place of publication: Schaffhausen, CH
Publisher: ESU-services Ltd.
Volume No: 565

## Validation
Proof reading validation: automatic validation in Excel; Other validation: https://esuservices-my.sharepoint.com/personal/mitarbeiter1_esuservices_onmicrosoft_com/Documents/565 LCI oil sector CH BAFU/EcoSpold/[EcoSpold-heating-2018-v6.0.xlsx]X-Process;
