# Solar collector factory

Dataset: EcoSpold 1, unit process, infrastructure
Functional unit: 1 p
Category: heat / solar\infrastructure
Geography: RER
Time period: 2000-01 to 2000-12
Production volume: Calculation for a production volume of 100'000m2.
Generated by: Niels Jungbluth
accessRestrictedTo: 0
copyright: true

## General comment
Factory with an annual production of 100'000m2 and a life time of 50 years.;

## Included processes
Building, land occupation and transformation of a factory for flat plate collectors. Not including machinery.

## Technology
Factory for production of solar collectors.

## Time period
Material data have been investigated for a collector produced in 2002. Data for energy uses during production have been investigated for 2001.

## Reference product
- Solar collector factory [RER]: 1 p
  Europe

## Inputs from technosphere
- Building, multi-storey [RER]: 5960 m3; lognormal SD95 1.5
  (1,4,1,3,1,4); Company information
- Building, hall [CH]: 1500 m2; lognormal SD95 1.5
  (1,4,1,3,1,4); Company information

## Inputs from nature
- Transformation, to industrial area, vegetation [resources, land]: 3000 m2; lognormal SD95 2
  (1,4,1,3,1,4); Company information
- Transformation, to industrial area, built up [resources, land]: 7590 m2; lognormal SD95 2
  (1,4,1,3,1,4); Company information
- Transformation, from unknown [resources, land]: 10600 m2; lognormal SD95 2
  (1,4,1,3,1,4); Company information
- Occupation, industrial area, built up [resources, land]: 380000 m2a; lognormal SD95 1.5
  (1,4,1,3,1,4); 50a occupation
- Occupation, industrial area, vegetation [resources, land]: 150000 m2a; lognormal SD95 2
  (1,4,1,3,1,4); 50a occupation

## Sampling procedure
Questionnaires.

## Extrapolations
Average of two plants as assumption for several plants in Europe.

## Sources
- Jungbluth N., 2007, 2007 - Solar collector systems - Jungbluth, Sachbilanzen von Energiesystemen. Final report No. 6 ecoinvent data v2.0, 6, Swiss Centre for LCI, ESU-services Ltd., Duebendorf, CH
Jungbluth, N. (2007) Sonnenkollektor-Anlagen. Sachbilanzen von Energiesystemen. Final report No. 6 ecoinvent data v2.0. Editors: Dones R.. Volume: 6. Swiss Centre for LCI, PSI. Dübendorf and Villigen, CH.
Type: Measurement on site
Source: CD-ROM
First author: Jungbluth, N.
Year: 2007
Name of editors: Dones R.
Title of anthology: Sachbilanzen von Energiesystemen. Final report No. 6 ecoinvent data v2.0
Place of publication: Dübendorf and Villigen, CH
Publisher: Swiss Centre for LCI, PSI
Volume No: 6

## Validation
Proof reading validation: Passed.; Other validation: none;
