# Electricity, lignite, at power plant

Dataset: EcoSpold 1, unit process
Functional unit: 1 kWh
Category: electricity by fuel / lignite
Geography: ENTSO-E
Time period: 2018-01 to 2020-01
Production volume: 260 TWh
Share of production covered: 100 %
Generated by: Christopher Oberschelp
accessRestrictedTo: 0
copyright: true

## General comment
The average allocated net electrical efficiency is about 33.7 %. The electricity generation of this technology in the region is at about 260 TWh based on Eurostat/IEA. NA;

## Included processes
Electricity output at busbar. The dataset uses the average net efficiency of power plants in the region adjusted for co-generation (using allocation based on exergy content).

## Geography
ENTSO-E in 2019

## Technology
Average installed technology.

## Reference product
- Electricity, lignite, at power plant [ENTSO-E]: 1 kWh

## Inputs from technosphere
All rows: lognormal SD95 1.05
- Electricity, lignite, at power plant [DE]: 0.042878 kWh
  (1,1,1,1,1,1,BU:1.05)calculated from IEA Extended World Energy Balances for 2019; uncertainty own estimate
- Electricity, lignite, at power plant [GR]: 0.098493 kWh
  (same comment as for Electricity, lignite, at power plant)
- Electricity, lignite, at power plant [BA]: 0.45602 kWh
  (same comment as for Electricity, lignite, at power plant)
- Electricity, lignite, at power plant [MK]: 0.047033 kWh
  (same comment as for Electricity, lignite, at power plant)
- Electricity, lignite, at power plant [SI]: 0.014392 kWh
  (same comment as for Electricity, lignite, at power plant)
- Electricity, lignite, at power plant [RS]: 0.016021 kWh
  (same comment as for Electricity, lignite, at power plant)
- Electricity, lignite, at power plant [CZ]: 0.13782 kWh
  (same comment as for Electricity, lignite, at power plant)
- Electricity, lignite, at power plant [HU]: 0.015419 kWh
  (same comment as for Electricity, lignite, at power plant)
- Electricity, lignite, at power plant [PL]: 0.16639 kWh
  (same comment as for Electricity, lignite, at power plant)
- Electricity, lignite, at power plant [SK]: 0.0055368 kWh
  (same comment as for Electricity, lignite, at power plant)

## Sampling procedure
Databases/ literature data based on regional statistics.

## Extrapolations
No relevant extrapolations.

## Sources
- Itten R., Oberschelp C., Kroehnert H., Stucki M., 2023, 2023 - LCI solid fossil fuel - Itten, Project report, ZHAW, Waedenswil, CH

## Validation
27.07.2023
