# Disposal, emulsion paint, 0% water, to construction waste landfill

Dataset: EcoSpold 1, unit process
Functional unit: 1 kg
Category: waste management / construction waste landfill
Geography: CH
Generated by: default
accessRestrictedTo: 0
copyright: true

## General comment
This dataset represents the activity of waste disposal of waste emulsion paint in a construction waste landfill. Recommended use of this dataset: For minor amounts going to construction waste landfill as part of a building product (eg. paint on concrete or un-recycled steel). Large amounts of separated paint cannot go into this type of landfill.Inventoried waste consists of fraction: 100% Emulsion paint (remains); . Waste composition (wet, in ppm): upper heating value 11.14 MJ/kg; lower heating value 10.51 MJ/kg; H2O na; O 214760; H 31708; C 268330; S na; N na; P na; B na; Cl 86465; Br na; F na; I na; Ag na; As 0.44122; Ba na; Cd 0.016849; Co na; Cr 1.248; Cu na; Hg 0.0085442; Mn na; Mo na; Ni 0.95527; Pb 0.64946; Sb na; Se na; Sn na; V na; Zn 6.5444; Be na; Sc na; Sr na; Ti 135000; Tl na; W na; Si 149810; Fe na; Ca 113920; Al na; K na; Mg na; Na na. Share of carbon in waste that is biogenic 0%.;;

## Included processes
Waste-specific short-term emissions via landfill leachate. Waste-specific long-term emissions from landfill. Land transformation and occupation. Waste placement and compaction. Landfill construction materials, sewer pipe for leachate, and access road.

## Technology
This is an inventory for a construction waste landfill (mostly mineral C&D waste, VVEA type B). Ultimate average landfill height is 11 meters. Operation phase duration is 15 years.

## Reference product
- Disposal, emulsion paint, 0% water, to construction waste landfill [CH]: 1 kg
  SWITZERLAND

## Inputs from technosphere
- Transport, freight, lorry, 16t-32t gross weight, fleet average [CH]: 0.0036943 tkm; lognormal SD95 1.9032
  transport for landfill infrastructure materials. uncertainty calculated from uncertainty in transported goods
- Concrete, sole plate and foundation, at plant [CH]: 1.156e-8 m3; lognormal SD95 3.1055
  for sewer pipe. Uncertainty calculated from uncertainty in base parameters.
- Polypropylene, granulate, at plant [RER]: 1.9736e-8 kg; lognormal SD95 3.1055
  for sewer auxiliary materials. Uncertainty calculated from uncertainty in base parameters.
- Tap water, at user [RER]: 0.00016406 kg; lognormal SD95 3.1055
  for sewer auxiliary materials. Uncertainty calculated from uncertainty in base parameters.
- Transport, freight, rail [RER]: 2.8427e-6 tkm; lognormal SD95 2.0832
  (same comment as for Transport, freight, lorry, 16t-32t gross weight, fleet average)
- Cast iron, at plant [RER]: 1.3026e-7 kg; lognormal SD95 3.1055
  for sewer auxiliary materials. Uncertainty calculated from uncertainty in base parameters.
- Bitumen, at refinery [CH]: 8.1169e-6 kg; lognormal SD95 3.1055
  for access street. Uncertainty calculated from uncertainty in base parameters.
- Polyethylene, HDPE, granulate, at plant [RER]: 2.5439e-6 kg; lognormal SD95 3.1055
  for base drain system in landfill and sewer auxiliary materials. Uncertainty calculated from uncertainty in base parameters.
- Reinforcing steel, at plant [RER]: 7.6971e-7 kg; lognormal SD95 3.1055
  for sewer auxiliary materials. Uncertainty calculated from uncertainty in base parameters.
- Extrusion, plastic pipes [RER]: 2.5834e-6 kg; lognormal SD95 3.1055
  (same comment as for Polyethylene, HDPE, granulate, at plant)
- Chromium steel 18/8, at plant [RER]: 2.6841e-7 kg; lognormal SD95 3.1055
  for sewer auxiliary materials. Uncertainty calculated from uncertainty in base parameters.
- Excavation, skid-steer loader [RER]: 0.00030229 m3; lognormal SD95 3.1055
  excavation work for landfill construction, sewer construction, waste placement and compaction, and landfill recultivation. Uncertainty calculated from uncertainty in base parameters.
- Excavation, hydraulic digger, average [CH]: 0.00030229 m3; lognormal SD95 3.1055
  (same comment as for Excavation, skid-steer loader)
- Diesel, burned in building machine, average [CH]: 1.9748e-6 MJ; lognormal SD95 3.1055
  construction diesel for access street and sewer construction. Uncertainty calculated from uncertainty in base parameters.
- Synthetic rubber, at plant [RER]: 7.8944e-9 kg; lognormal SD95 3.1055
  for sewer auxiliary materials. Uncertainty calculated from uncertainty in base parameters.
- Polyvinylchloride, at regional storage [RER]: 1.9736e-8 kg; lognormal SD95 3.1055
  for sewer auxiliary materials. Uncertainty calculated from uncertainty in base parameters.
- Sand, at mine [CH]: 0.021824 kg; lognormal SD95 3.1055
  for landfill base layer and sewer auxiliary materials. Uncertainty calculated from uncertainty in base parameters.
- Gravel, round, at mine [CH]: 0.036583 kg; lognormal SD95 3.1055
  for access street, for recultivation layer. Uncertainty calculated from uncertainty in base parameters.

## Inputs from nature
- Occupation, traffic area, road network [resources, land]: 8.658e-6 m2a; lognormal SD95 2.5417
  for access road to landfill during construction, operation, and aftercare phase of 25 years. Uncertainty calculated from uncertainty in base parameters.
- Transformation, to pasture, man made [resources, land]: 4.5455e-5 m2; lognormal SD95 4.3339
  recultivation of landfill after operation phase. Uncertainty calculated from uncertainty in base parameters.
- Transformation, from dump site, inert material landfill [resources, land]: 4.5455e-5 m2; lognormal SD95 4.3339
  (same comment as for Transformation, to pasture, man made)
- Waste mass, total, placed in landfill [resources, in ground]: 1 kg; lognormal SD95 1
  waste mass placed in construction waste landfill (for ecoscarcity LCIA only). uncertainty is low as functional unit.
- Transformation, to dump site, inert material landfill [resources, land]: 4.5455e-5 m2; lognormal SD95 4.3339
  for establishing the landfill. Uncertainty calculated from uncertainty in base parameters.
- Organic carbon, placed in landfill [resources, in ground]: 0.26833 kg; lognormal SD95 1.5328
  organic carbon placed in construction waste landfill (for ecoscarcity LCIA only). uncertainty is derived from uncertainty in initial waste composition.
- Occupation, dump site [resources, land]: 0.00068182 m2a; lognormal SD95 2.5417
  occupation of landfill during operation phase of 15 years. Uncertainty calculated from uncertainty in base parameters.
- Transformation, to traffic area, road network [resources, land]: 2.1645e-7 m2; lognormal SD95 4.3339
  for access road to landfill. Uncertainty calculated from uncertainty in base parameters.
- Transformation, from pasture, man made [resources, land]: 4.5671e-5 m2; lognormal SD95 4.3339
  for establishing the landfill on open ground. Uncertainty calculated from uncertainty in base parameters.

## Emissions to nature
- Lead [emissions to water, river]: 2.5035e-10 kg; lognormal SD95 22.199
  burden from short-term leachate to groundwater in uncontrolled landfill in moist cimate. Uncertainty calculated from unertainty of the waste composition of this waste and short-term leaching in landfill
- Cadmium [emissions to water, river]: 1.403e-10 kg; lognormal SD95 20.875
  (same comment as for Lead)
- COD, Chemical Oxygen Demand [emissions to water, river]: 0.014814 kg; lognormal SD95 3.4599
  (same comment as for Lead)
- Cadmium [emissions to water, groundwater, long-term]: 1.6709e-8 kg; lognormal SD95 16
  Emissions from long-term leachate (>100a) directly from construction waste landfill. Uncertainty calculated depending on waste input and uncertainty of long-term transfer coefficents in landfill.
- Chromium VI [emissions to water, groundwater, long-term]: 1.6665e-7 kg; lognormal SD95 24.441
  (same comment as for Cadmium)
- Titanium [emissions to water, river]: 3.3752e-6 kg; lognormal SD95 9.2285
  (same comment as for Lead)
- COD, Chemical Oxygen Demand [emissions to water, groundwater, long-term]: 1.1846 kg; lognormal SD95 1.5329
  (same comment as for Cadmium)
- Mercury [emissions to water, river]: 2.751e-11 kg; lognormal SD95 22.524
  (same comment as for Lead)
- BOD5, Biological Oxygen Demand [emissions to water, groundwater, long-term]: 0.16164 kg; lognormal SD95 1.5329
  (same comment as for Cadmium)
- Nickel [emissions to water, river]: 1.4906e-9 kg; lognormal SD95 19.043
  (same comment as for Lead)
- DOC, Dissolved Organic Carbon [emissions to water, groundwater, long-term]: 0.26501 kg; lognormal SD95 1.5329
  (same comment as for Cadmium)
- Zinc [emissions to water, groundwater, long-term]: 4.4295e-6 kg; lognormal SD95 10.319
  (same comment as for Cadmium)
- TOC, Total Organic Carbon [emissions to water, groundwater, long-term]: 0.26501 kg; lognormal SD95 1.5329
  (same comment as for Cadmium)
- Arsenic [emissions to water, river]: 8.4093e-10 kg; lognormal SD95 20.015
  (same comment as for Lead)
- Silicon [emissions to water, river]: 6.1941e-6 kg; lognormal SD95 8.6174
  (same comment as for Lead)
- Silicon [emissions to water, groundwater, long-term]: 0.0037103 kg; lognormal SD95 42.313
  (same comment as for Cadmium)
- Arsenic [emissions to water, groundwater, long-term]: 2.9992e-7 kg; lognormal SD95 13.694
  (same comment as for Cadmium)
- Nickel [emissions to water, groundwater, long-term]: 8.9288e-7 kg; lognormal SD95 12.319
  (same comment as for Cadmium)
- TOC, Total Organic Carbon [emissions to water, river]: 0.0033141 kg; lognormal SD95 3.4599
  (same comment as for Lead)
- DOC, Dissolved Organic Carbon [emissions to water, river]: 0.0033141 kg; lognormal SD95 3.4599
  (same comment as for Lead)
- Lead [emissions to water, groundwater, long-term]: 1.4996e-7 kg; lognormal SD95 18.934
  (same comment as for Cadmium)
- Calcium [emissions to water, river]: 0.00014653 kg; lognormal SD95 5.5236
  (same comment as for Lead)
- Mercury [emissions to water, groundwater, long-term]: 8.5167e-9 kg; lognormal SD95 16
  (same comment as for Cadmium)
- Calcium [emissions to water, groundwater, long-term]: 0.087769 kg; lognormal SD95 2.0389
  (same comment as for Cadmium)
- Chloride [emissions to water, river]: 0.01628 kg; lognormal SD95 2.4653
  (same comment as for Lead)
- Titanium [emissions to water, groundwater, long-term]: 0.0020217 kg; lognormal SD95 69.867
  (same comment as for Cadmium)
- BOD5, Biological Oxygen Demand [emissions to water, river]: 0.0020214 kg; lognormal SD95 3.4599
  (same comment as for Lead)
- Chromium VI [emissions to water, river]: 2.9868e-10 kg; lognormal SD95 21.889
  (same comment as for Lead)
- Zinc [emissions to water, river]: 7.3948e-9 kg; lognormal SD95 16.455
  (same comment as for Lead)
- Chloride [emissions to water, groundwater, long-term]: 0.070185 kg; lognormal SD95 2.0938
  (same comment as for Cadmium)

## Sampling procedure
Landfill model based on average mineral building waste composition and observed average leachate concentrations from various literature sources. Extrapolated to 60'000 years heeding chemical characteristics and hydrology. Based on waste composition and climate data the end of carbonate phase of this landfill is estimated to be reached beyond 60'000 years.

## Uncertainty adjustments
uncertainty of waste input composition data derived from generic formula GSD(c) = N*ln(c)+1. *Mean* long-term emissions are the emissions until 60'000 years after waste placement. *Maximal* (upper bound) long-term emissions are the complete emissions of all landfilled material, depicting possible mechanical landfill failures and/or natural erosion not heeded in the mean value. Minimal long-term emissions are derived implicitly from the mean and maximal values assuming a lognormal distribution.

## Sources
- Doka G., 2020, 2020 - LCI exc. mat. constr. and dem. waste landfill - Doka, -, Doka LCA, Zuerich, CH
Doka G. (2020) Two models for waste-specific and climate-specific life cycle inventories of excavation material landfills and construction & demolition waste landfills. Doka LCA. Zürich, CH. http://www.doka.ch/publications.htm.
Type: Separate publication
First author: Doka G.
Year: 2020
Place of publication: Zürich, CH. http://www.doka.ch/publications.htm
Publisher: Doka LCA
Original title: Two models for waste-specific and climate-specific life cycle inventories of excavation material landfills and construction & demolition waste landfills
