# Corrugated board base paper, semichemical fluting, at plant

Dataset: EcoSpold 1, unit process
Functional unit: 1 kg
Category: paper+ board / corrugated board
Geography: RER
Time period: 2000-01 to 2000-12
Production volume: represented European production in 2005: 3'955 kt (FEFCO report)
Share of production covered: 80 %
Generated by: Roland Hischier
accessRestrictedTo: 0
copyright: true

## Included processes
This module includes the European production of semichemical fluting paper in an integrated mill - including transports to paper mill, wood handling, chemical pulping, paper production, energy production on-site and internal waste water treatment.; Geography: Average data from European producers, collected from FEFCO and checked by technical specialists

## Technology
Average of present used technology

## Reference product
- Corrugated board base paper, semichemical fluting, at plant [RER]: 1 kg
  Europe

## Inputs from technosphere
- Sulphur dioxide, liquid, at plant [RER]: 0.0019 kg; lognormal SD95 1.06
  (1,2,1,1,1,2); average data for European production from FEFCO
- Oxygen, liquid, at plant [RER]: 0.00014 kg; lognormal SD95 1.06
  (1,2,1,1,1,2); average data for European production from FEFCO
- Transport, freight, lorry, fleet average [RER]: 0.101 tkm; lognormal SD95 2
  (1,2,1,1,1,2); average data for European production from FEFCO
- Soda, powder, at plant [RER]: 0.0024 kg; lognormal SD95 1.06
  (1,2,1,1,1,2); average data for European production from FEFCO
- Lignite briquettes, at plant [DE]: 2 MJ; lognormal SD95 1.06
  (1,2,1,1,1,2); average data for European production from FEFCO
- Nitric acid, 50% in H2O, at plant [RER]: 0.0002 kg; lognormal SD95 1.06
  (1,2,1,1,1,2); average data for European production from FEFCO
- Pulpwood, spruce, sustainable forest management, measured as solid wood under bark, at forest road [DE]: 3.9867e-5 m3; lognormal SD95 1.06
  (1,2,1,1,1,2); average data for European production from FEFCO
- Waste paper, sorted, for further treatment [RER]: 0.045 kg; lognormal SD95 1.06
  (1,2,1,1,1,2); average data for European production from FEFCO
- Sulphuric acid, liquid, at plant [RER]: 0.0047 kg; lognormal SD95 1.06
  (1,2,1,1,1,2); average data for European production from FEFCO
- Light fuel oil, at regional storage [RER]: 9.1549e-5 kg; lognormal SD95 1.06
  (1,2,1,1,1,2); average data for European production from FEFCO
- Quicklime, milled, loose, at plant [CH]: 0.00035 kg; lognormal SD95 1.06
  (1,2,1,1,1,2); average data for European production from FEFCO
- Disposal, textiles, soiled, 25% water, to municipal incineration [CH]: 0.0007345 kg; lognormal SD95 1.06
  (1,2,1,1,1,2); average data for European production from FEFCO
- Pulpwood, spruce, sustainable forest management, measured as solid wood under bark, at forest road [SE]: 3.118e-5 m3
  (1,2,1,1,1,2); average data for European production from FEFCO; DS
- Pulpwood, pine, sustainable forest management, measured as solid wood under bark, at forest road [SE]: 3.118e-5 m3
  (1,2,1,1,1,2); average data for European production from FEFCO; DS
- Electricity, medium voltage, production ENTSO-E, at grid: 0.15167 kWh; lognormal SD95 1.06
  (1,2,1,1,1,2); average data for European production from FEFCO
- Transport, freight, rail [RER]: 0.277 tkm; lognormal SD95 2
  (1,2,1,1,1,2); average data for European production from FEFCO
- Aluminium sulphate, powder, at plant [RER]: 0.00197 kg; lognormal SD95 1.06
  (1,2,1,1,1,2); average data for European production from FEFCO
- Waste paper, mixed, from public collection, for further treatment [RER]: 0.076 kg; lognormal SD95 1.06
  (1,2,1,1,1,2); average data for European production from FEFCO
- Sheet rolling, steel [RER]: 2.3e-5 kg; lognormal SD95 1.06
  (1,2,1,1,1,2); average data for European production from FEFCO
- Disposal, steel, 0% water, to municipal incineration [CH]: 0.000791 kg; lognormal SD95 1.06
  (1,2,1,1,1,2); average data for European production from FEFCO
- Ethoxylated alcohols (AE3), petrochemical, at plant [RER]: 0.00018 kg; lognormal SD95 1.06
  (1,2,1,1,1,2); average data for European production from FEFCO
- Ammonia, liquid, at regional storehouse [RER]: 0.0081 kg; lognormal SD95 1.06
  (1,2,1,1,1,2); average data for European production from FEFCO
- Kraft paper, unbleached, at plant [RER]: 0.0026 kg; lognormal SD95 1.06
  (1,2,1,1,1,2); average data for European production from FEFCO
- Transport, transoceanic freight ship [OCE]: 0.253 tkm; lognormal SD95 2
  (1,2,1,1,1,2); average data for European production from FEFCO
- Disposal, wood untreated, 20% water, to municipal incineration [CH]: 0.0003955 kg; lognormal SD95 1.06
  (1,2,1,1,1,2); average data for European production from FEFCO
- Disposal, plastics, mixture, 15.3% water, to municipal incineration [CH]: 0.007119 kg; lognormal SD95 1.06
  (1,2,1,1,1,2); average data for European production from FEFCO
- Lubricating oil, at plant [RER]: 2.6e-5 kg; lognormal SD95 1.06
  (1,2,1,1,1,2); average data for European production from FEFCO
- Sulphate pulp, unbleached, at plant [RER]: 0.0093 kg; lognormal SD95 1.06
  (1,2,1,1,1,2); average data for European production from FEFCO
- Natural gas, high pressure, at consumer [RER]: 0.38 MJ; lognormal SD95 1.06
  (1,2,1,1,1,2); average data for European production from FEFCO
- Disposal, wood ash mixture, pure, 0% water, to sanitary landfill [CH]: 0.0177 kg; lognormal SD95 1.06
  (1,2,1,1,1,2); average data for European production from FEFCO
- Paper mill, integrated [RER]: 5.44e-11 p; lognormal SD95 3.05
  (4,na,na,na,na,na); own assumption
- Heavy fuel oil, at regional storage [RER]: 0.046529 kg; lognormal SD95 1.06
  (1,2,1,1,1,2); average data for European production from FEFCO
- Biocides, for paper production, unspecified, at plant [RER]: 7e-6 kg; lognormal SD95 1.06
  (1,2,1,1,1,2); average data for European production from FEFCO
- Disposal, paper, 11.2% water, to municipal incineration [CH]: 0.00226 kg; lognormal SD95 1.06
  (1,2,1,1,1,2); average data for European production from FEFCO
- Hard coal, at regional storage [WEU]: 0.089965 kg; lognormal SD95 1.06
  (1,2,1,1,1,2); average data for European production from FEFCO
- Pitch despergents, in paper production, at plant [RER]: 7.8e-6 kg; lognormal SD95 1.06
  (1,2,1,1,1,2); average data for European production from FEFCO
- Polyethylene, HDPE, granulate, at plant [RER]: 6e-6 kg; lognormal SD95 1.06
  (1,2,1,1,1,2); average data for European production from FEFCO
- Pulpwood, birch, sustainable forest management, measured as solid wood under bark, at forest road [SE]: 0.00091969 m3; lognormal SD95 1.06
  (1,2,1,1,1,2); average data for European production from FEFCO
- Disposal, ash from paper prod. sludge, 0% water, to residual material landfill [CH]: 0.0019273 kg; lognormal SD95 1.06
  (1,2,1,1,1,2); average data for European production from FEFCO
- Sodium hydroxide, 50% in H2O, production mix, at plant [RER]: 0.0158 kg; lognormal SD95 1.06
  (1,2,1,1,1,2); average data for European production from FEFCO
- Electricity, medium voltage, production NORDEL, at grid [NORDEL]: 0.23722 kWh; lognormal SD95 1.06
  (1,2,1,1,1,2); average data for European production from FEFCO
- Steel, converter, unalloyed, at plant [RER]: 2.3e-5 kg; lognormal SD95 1.06
  (1,2,1,1,1,2); average data for European production from FEFCO
- Transport, freight, lorry, 3.5t gross weight, fleet average [RER]: 0.0011594 tkm; lognormal SD95 2
  (1,2,1,1,1,2); average data for European production from FEFCO
- Urea, as N, at regional storehouse [RER]: 6e-5 kg; lognormal SD95 1.06
  (1,2,1,1,1,2); average data for European production from FEFCO
- Secondary sulphur, at refinery [RER]: 0.0085 kg; lognormal SD95 1.06
  (1,2,1,1,1,2); average data for European production from FEFCO
- Disposal, sludge from pulp and paper production, 25% water, to sanitary landfill [CH]: 0.006825 kg; lognormal SD95 1.06
  (1,2,1,1,1,2); average data for European production from FEFCO
- Hydrochloric acid, 30% in H2O, at plant [RER]: 9.2e-6 kg; lognormal SD95 1.06
  (1,2,1,1,1,2); average data for European production from FEFCO
- Phosphoric acid, industrial grade, 85% in H2O, at plant [RER]: 5e-5 kg; lognormal SD95 1.06
  (1,2,1,1,1,2); average data for European production from FEFCO
- Core board, at plant [RER]: 0.002945 kg; lognormal SD95 1.06
  (1,2,1,1,1,2); average data for European production from FEFCO
- Pulpwood, beech, sustainable forest management, measured as solid wood under bark, at forest road [DE]: 0.000588 m3; lognormal SD95 1.06
  (1,2,1,1,1,2); average data for European production from FEFCO

## Inputs from nature
- Water, well [resources, in water]: 0.0001 m3; lognormal SD95 1.06
  (1,2,1,1,1,2); average data for European production from FEFCO
- Water, cooling, unspecified natural origin/m3 [resources, in water]: 0.0168 m3; lognormal SD95 1.06
  (1,2,1,1,1,2); average data for European production from FEFCO
- Water, river [resources, in water]: 0.0252 m3; lognormal SD95 1.06
  (1,2,1,1,1,2); average data for European production from FEFCO

## Emissions to nature
- Ethanol [emissions to air, high. pop.]: 5.751e-7 kg; lognormal SD95 1.88
  (2,5,2,1,4,5); estimation - based on respective heating modules
- Pentane [emissions to air, high. pop.]: 4.5682e-7 kg; lognormal SD95 1.88
  (2,5,2,1,4,5); estimation - based on respective heating modules
- Toluene [emissions to air, high. pop.]: 2.6006e-6 kg; lognormal SD95 1.88
  (2,5,2,1,4,5); estimation - based on respective heating modules
- COD, Chemical Oxygen Demand [emissions to water, river]: 0.0099 kg; lognormal SD95 1.5
  (1,2,1,1,1,2); average data for European production from FEFCO
- Bromine [emissions to air, high. pop.]: 9.6448e-8 kg; lognormal SD95 1.88
  (2,5,2,1,4,5); estimation - based on respective heating modules
- Phenol [emissions to air, high. pop.]: 1e-6 kg; lognormal SD95 1.88
  (2,5,2,1,4,5); estimation - based on respective heating modules
- Particulates, < 2.5 um [emissions to air, high. pop.]: 0.000191 kg; lognormal SD95 3
  (1,2,1,1,1,2); average data for European production from FEFCO
- Radon-220 [emissions to air, high. pop.]: 1.06e-5 kBq; lognormal SD95 3.32
  (2,5,2,1,4,5); estimation - based on respective heating modules
- Beryllium [emissions to air, high. pop.]: 8.336e-9 kg; lognormal SD95 5.37
  (2,5,2,1,4,5); estimation - based on respective heating modules
- Particulates, > 2.5 um, and < 10um [emissions to air, high. pop.]: 0.000117 kg; lognormal SD95 2
  (1,2,1,1,1,2); average data for European production from FEFCO
- Methane, biogenic [emissions to air, high. pop.]: 2.76e-7 kg; lognormal SD95 1.88
  (2,5,2,1,4,5); estimation - based on respective heating modules
- Zinc [emissions to air, high. pop.]: 3.1483e-7 kg; lognormal SD95 5.37
  (2,5,2,1,4,5); estimation - based on respective heating modules
- Strontium [emissions to air, high. pop.]: 1.024e-6 kg; lognormal SD95 5.37
  (2,5,2,1,4,5); estimation - based on respective heating modules
- Manganese [emissions to air, high. pop.]: 2.2536e-7 kg; lognormal SD95 5.37
  (2,5,2,1,4,5); estimation - based on respective heating modules
- Formaldehyde [emissions to air, high. pop.]: 1.4019e-6 kg; lognormal SD95 1.88
  (2,5,2,1,4,5); estimation - based on respective heating modules
- Nitrogen [emissions to water, river]: 0.00052 kg; lognormal SD95 1.5
  (1,2,1,1,1,2); average data for European production from FEFCO
- Radon-222 [emissions to air, high. pop.]: 1.06e-5 kBq; lognormal SD95 3.32
  (2,5,2,1,4,5); estimation - based on respective heating modules
- Uranium [emissions to air, high. pop.]: 1.6678e-8 kg; lognormal SD95 5.37
  (2,5,2,1,4,5); estimation - based on respective heating modules
- BOD5, Biological Oxygen Demand [emissions to water, river]: 0.0023 kg; lognormal SD95 1.5
  (1,2,1,1,1,2); average data for European production from FEFCO
- Ammonia [emissions to air, high. pop.]: 1.2135e-6 kg; lognormal SD95 1.88
  (2,5,2,1,4,5); estimation - based on respective heating modules
- Methanol [emissions to air, high. pop.]: 9.7767e-7 kg; lognormal SD95 1.88
  (2,5,2,1,4,5); estimation - based on respective heating modules
- Benzene, ethyl- [emissions to air, high. pop.]: 2.07e-8 kg; lognormal SD95 1.88
  (2,5,2,1,4,5); estimation - based on respective heating modules
- Acetone [emissions to air, high. pop.]: 2.8755e-7 kg; lognormal SD95 1.88
  (2,5,2,1,4,5); estimation - based on respective heating modules
- Aluminium [emissions to air, high. pop.]: 5.162e-5 kg; lognormal SD95 1.88
  (2,5,2,1,4,5); estimation - based on respective heating modules
- Tin [emissions to air, high. pop.]: 5.6832e-9 kg; lognormal SD95 5.37
  (2,5,2,1,4,5); estimation - based on respective heating modules
- Antimony [emissions to air, high. pop.]: 5.4708e-8 kg; lognormal SD95 1.88
  (2,5,2,1,4,5); estimation - based on respective heating modules
- Xylene [emissions to air, high. pop.]: 6.86e-6 kg; lognormal SD95 1.88
  (2,5,2,1,4,5); estimation - based on respective heating modules
- Hydrocarbons, aromatic [emissions to air, high. pop.]: 2.8767e-7 kg; lognormal SD95 1.88
  (2,5,2,1,4,5); estimation - based on respective heating modules
- Phenol, pentachloro- [emissions to air, high. pop.]: 5.589e-12 kg; lognormal SD95 1.88
  (2,5,2,1,4,5); estimation - based on respective heating modules
- Ethene [emissions to air, high. pop.]: 6.78e-5 kg; lognormal SD95 5.37
  (2,5,2,1,4,5); estimation - based on respective heating modules
- Chlorine [emissions to air, high. pop.]: 1.242e-7 kg; lognormal SD95 3.32
  (2,5,2,1,4,5); estimation - based on respective heating modules
- Benzene [emissions to air, high. pop.]: 1.208e-5 kg; lognormal SD95 1.88
  (2,5,2,1,4,5); estimation - based on respective heating modules
- Mercury [emissions to air, high. pop.]: 3.0692e-8 kg; lognormal SD95 5.37
  (2,5,2,1,4,5); estimation - based on respective heating modules
- Barium [emissions to air, high. pop.]: 8.336e-7 kg; lognormal SD95 5.37
  (2,5,2,1,4,5); estimation - based on respective heating modules
- Cobalt [emissions to air, high. pop.]: 1.4728e-7 kg; lognormal SD95 5.37
  (2,5,2,1,4,5); estimation - based on respective heating modules
- Thorium-228 [emissions to air, high. pop.]: 2.91e-5 kBq; lognormal SD95 3.32
  (2,5,2,1,4,5); estimation - based on respective heating modules
- Copper [emissions to air, high. pop.]: 2.08e-7 kg; lognormal SD95 5.37
  (2,5,2,1,4,5); estimation - based on respective heating modules
- Chromium [emissions to air, high. pop.]: 2.3172e-7 kg; lognormal SD95 5.37
  (2,5,2,1,4,5); estimation - based on respective heating modules
- Thorium [emissions to air, high. pop.]: 1.1e-8 kg; lognormal SD95 5.37
  (2,5,2,1,4,5); estimation - based on respective heating modules
- Carbon dioxide, fossil [emissions to air, high. pop.]: 0.613 kg; lognormal SD95 1.06
  (1,2,1,1,1,2); average data for European production from FEFCO
- Ethane [emissions to air, high. pop.]: 3.39e-5 kg; lognormal SD95 1.88
  (2,5,2,1,4,5); estimation - based on respective heating modules
- Ethyne [emissions to air, high. pop.]: 1.13e-5 kg; lognormal SD95 1.88
  (2,5,2,1,4,5); estimation - based on respective heating modules
- Selenium [emissions to air, high. pop.]: 1.9925e-7 kg; lognormal SD95 5.37
  (2,5,2,1,4,5); estimation - based on respective heating modules
- Carbon monoxide, biogenic [emissions to air, high. pop.]: 3.312e-5 kg; lognormal SD95 5.37
  (2,5,2,1,4,5); estimation - based on respective heating modules
- Uranium-238 [emissions to air, high. pop.]: 5.28e-5 kBq; lognormal SD95 3.32
  (2,5,2,1,4,5); estimation - based on respective heating modules
- Propane [emissions to air, high. pop.]: 2.2734e-5 kg; lognormal SD95 1.88
  (2,5,2,1,4,5); estimation - based on respective heating modules
- Acetaldehyde [emissions to air, high. pop.]: 3.3002e-7 kg; lognormal SD95 1.88
  (2,5,2,1,4,5); estimation - based on respective heating modules
- Sulfur dioxide [emissions to air, high. pop.]: 0.0021 kg; lognormal SD95 1.06
  (1,2,1,1,1,2); average data for European production from FEFCO
- Vanadium [emissions to air, high. pop.]: 5.3487e-6 kg; lognormal SD95 5.37
  (2,5,2,1,4,5); estimation - based on respective heating modules
- Radium-226 [emissions to air, high. pop.]: 6.32e-5 kBq; lognormal SD95 3.32
  (2,5,2,1,4,5); estimation - based on respective heating modules
- Thorium-232 [emissions to air, high. pop.]: 1.83e-5 kBq; lognormal SD95 3.32
  (2,5,2,1,4,5); estimation - based on respective heating modules
- Hydrocarbons, aliphatic, alkanes, unspecified [emissions to air, high. pop.]: 1.308e-5 kg; lognormal SD95 1.88
  (2,5,2,1,4,5); estimation - based on respective heating modules
- Thallium [emissions to air, high. pop.]: 4.36e-9 kg; lognormal SD95 5.37
  (2,5,2,1,4,5); estimation - based on respective heating modules
- Iron [emissions to air, high. pop.]: 3.9037e-5 kg; lognormal SD95 5.37
  (2,5,2,1,4,5); estimation - based on respective heating modules
- Nickel [emissions to air, high. pop.]: 1.4134e-6 kg; lognormal SD95 5.37
  (2,5,2,1,4,5); estimation - based on respective heating modules
- Butane [emissions to air, high. pop.]: 2.6723e-7 kg; lognormal SD95 3.32
  (2,5,2,1,4,5); estimation - based on respective heating modules
- Potassium [emissions to air, high. pop.]: 2.2462e-5 kg; lognormal SD95 5.37
  (2,5,2,1,4,5); estimation - based on respective heating modules
- Dinitrogen monoxide [emissions to air, high. pop.]: 8.4325e-6 kg; lognormal SD95 1.88
  (2,5,2,1,4,5); estimation - based on respective heating modules
- m-Xylene [emissions to air, high. pop.]: 8.28e-8 kg; lognormal SD95 1.88
  (2,5,2,1,4,5); estimation - based on respective heating modules
- Benzo(a)pyrene [emissions to air, high. pop.]: 4.0429e-8 kg; lognormal SD95 1.88
  (2,5,2,1,4,5); estimation - based on respective heating modules
- Magnesium [emissions to air, high. pop.]: 2.5262e-5 kg; lognormal SD95 5.37
  (2,5,2,1,4,5); estimation - based on respective heating modules
- Chromium VI [emissions to air, high. pop.]: 8.9783e-9 kg; lognormal SD95 5.37
  (2,5,2,1,4,5); estimation - based on respective heating modules
- Titanium [emissions to air, high. pop.]: 1.4914e-6 kg; lognormal SD95 5.37
  (2,5,2,1,4,5); estimation - based on respective heating modules
- Benzene, hexachloro- [emissions to air, high. pop.]: 4.968e-15 kg; lognormal SD95 1.88
  (2,5,2,1,4,5); estimation - based on respective heating modules
- Carbon dioxide, biogenic [emissions to air, high. pop.]: 0.547 kg; lognormal SD95 1.06
  (1,2,1,1,1,2); average data for European production from FEFCO
- Radium-228 [emissions to air, high. pop.]: 0.0001862 kBq; lognormal SD95 3.32
  (2,5,2,1,4,5); estimation - based on respective heating modules
- Polonium-210 [emissions to air, high. pop.]: 0.000449 kBq; lognormal SD95 3.32
  (2,5,2,1,4,5); estimation - based on respective heating modules
- Particulates, > 10 um [emissions to air, high. pop.]: 9.18e-5 kg; lognormal SD95 1.5
  (1,2,1,1,1,2); average data for European production from FEFCO
- Iodine [emissions to air, high. pop.]: 1.2064e-7 kg; lognormal SD95 1.88
  (2,5,2,1,4,5); estimation - based on respective heating modules
- Phosphorus [emissions to air, high. pop.]: 5.7332e-7 kg; lognormal SD95 1.88
  (2,5,2,1,4,5); estimation - based on respective heating modules
- Methane, fossil [emissions to air, high. pop.]: 0.00063251 kg; lognormal SD95 1.88
  (2,5,2,1,4,5); estimation - based on respective heating modules
- Sodium [emissions to air, high. pop.]: 8.518e-6 kg; lognormal SD95 5.37
  (2,5,2,1,4,5); estimation - based on respective heating modules
- PAH, polycyclic aromatic hydrocarbons [emissions to air, high. pop.]: 1.2573e-8 kg; lognormal SD95 1.88
  (2,5,2,1,4,5); estimation - based on respective heating modules
- Carbon monoxide, fossil [emissions to air, high. pop.]: 0.0082742 kg; lognormal SD95 5.37
  (2,5,2,1,4,5); estimation - based on respective heating modules
- Boron [emissions to air, high. pop.]: 2.4032e-5 kg; lognormal SD95 5.37
  (2,5,2,1,4,5); estimation - based on respective heating modules
- Heat, waste [emissions to air, high. pop.]: 9.57 MJ; lognormal SD95 1.06
  (1,2,1,1,1,2); calculated from input
- Arsenic [emissions to air, high. pop.]: 1.9239e-7 kg; lognormal SD95 1.88
  (2,5,2,1,4,5); estimation - based on respective heating modules
- Molybdenum [emissions to air, high. pop.]: 1.314e-7 kg; lognormal SD95 5.37
  (2,5,2,1,4,5); estimation - based on respective heating modules
- Propionic acid [emissions to air, high. pop.]: 7.6e-9 kg; lognormal SD95 1.88
  (2,5,2,1,4,5); estimation - based on respective heating modules
- Hydrogen sulfide [emissions to air, high. pop.]: 0.00014 kg; lognormal SD95 1.88
  (2,5,2,1,4,5); estimation - based on respective heating modules
- Scandium [emissions to air, high. pop.]: 4.54e-9 kg; lognormal SD95 5.37
  (2,5,2,1,4,5); estimation - based on respective heating modules
- Hydrogen fluoride [emissions to air, high. pop.]: 3.8005e-6 kg; lognormal SD95 1.88
  (2,5,2,1,4,5); estimation - based on respective heating modules
- NMVOC, non-methane volatile organic compounds, unspecified origin [emissions to air, high. pop.]: 3.9686e-5 kg; lognormal SD95 1.88
  (2,5,2,1,4,5); estimation - based on respective heating modules
- Lead [emissions to air, high. pop.]: 3.994e-7 kg; lognormal SD95 5.37
  (2,5,2,1,4,5); estimation - based on respective heating modules
- Lead-210 [emissions to air, high. pop.]: 0.0002449 kBq; lognormal SD95 3.32
  (2,5,2,1,4,5); estimation - based on respective heating modules
- Fluorine [emissions to air, high. pop.]: 3.45e-8 kg; lognormal SD95 1.88
  (2,5,2,1,4,5); estimation - based on respective heating modules
- Calcium [emissions to air, high. pop.]: 0.00010847 kg; lognormal SD95 3.32
  (2,5,2,1,4,5); estimation - based on respective heating modules
- Nitrogen oxides [emissions to air, high. pop.]: 0.0016 kg; lognormal SD95 1.5
  (1,2,1,1,1,2); average data for European production from FEFCO
- Potassium-40 [emissions to air, high. pop.]: 6.85e-5 kBq; lognormal SD95 3.32
  (2,5,2,1,4,5); estimation - based on respective heating modules
- Hydrocarbons, aliphatic, unsaturated [emissions to air, high. pop.]: 1.3497e-5 kg; lognormal SD95 1.88
  (2,5,2,1,4,5); estimation - based on respective heating modules
- Propene [emissions to air, high. pop.]: 1.13e-5 kg; lognormal SD95 1.88
  (2,5,2,1,4,5); estimation - based on respective heating modules
- Phosphorus [emissions to water, river]: 2.6e-5 kg; lognormal SD95 1.5
  (1,2,1,1,1,2); average data for European production from FEFCO
- Dioxin, 2,3,7,8 Tetrachlorodibenzo-p- [emissions to air, high. pop.]: 7.8266e-14 kg; lognormal SD95 1.88
  (2,5,2,1,4,5); estimation - based on respective heating modules
- Silicon [emissions to air, high. pop.]: 0.00028308 kg; lognormal SD95 5.37
  (2,5,2,1,4,5); estimation - based on respective heating modules
- Acetic acid [emissions to air, high. pop.]: 1.2072e-6 kg; lognormal SD95 1.88
  (2,5,2,1,4,5); estimation - based on respective heating modules
- Cadmium [emissions to air, high. pop.]: 8.3272e-8 kg; lognormal SD95 5.37
  (2,5,2,1,4,5); estimation - based on respective heating modules
- Hydrogen chloride [emissions to air, high. pop.]: 0.0001148 kg; lognormal SD95 1.88
  (2,5,2,1,4,5); estimation - based on respective heating modules
- Suspended solids, unspecified [emissions to water, river]: 0.0038 kg; lognormal SD95 1.5
  (1,2,1,1,1,2); average data for European production from FEFCO
- Water [emissions to water, unspecified]: 0.09, 15.96, 23.94 kg (3 entries); lognormal SD95 2.5196
  (5,5,5,5,5,BU:1.05); All uncertainty-values set to 5.0 by default. Balance of input water

## Extrapolations
Additional air emissions estimated based on respective industrial heating modules of this study

## Sources
- Hischier R., 2007, 2007 - LCI packagings and graphical papers - Hischier, Final report ecoinvent data v2.0, 11, Swiss Centre for LCI, Empa - TSL, Duebendorf and St. Gallen, CH
Hischier R. (2007) Life Cycle Inventories of Packaging and Graphical Paper. Final report ecoinvent data v2.0. Volume: 11. Swiss Centre for LCI, Empa - TSL. Dübendorf, CH.
Type: Measurement on site
Source: CD-ROM
First author: Hischier R.
Year: 2007
Title of anthology: Final report ecoinvent data v2.0
Place of publication: Dübendorf, CH
Publisher: Swiss Centre for LCI, Empa - TSL
Volume No: 11

## Validation
Proof reading validation: passed.; Other validation: none;
