# Outside air intake, stainless steel, DN 370, at plant

Dataset: EcoSpold 1, unit process
Functional unit: 1 p
Category: construction / ventilation\components
Geography: RER
Time period: 2003-01 to 2003-12
Generated by: Alex Primas
accessRestrictedTo: 0
copyright: true

## General comment
Production of a typical component used for a ventilation system in a multi family house. The house considered in the investigation includes 6 flats with 130 m2 floor area each and a ventilation rate of 120 m3/h.;

## Included processes
Materials used for the production. Estimation of electricity use for the different production steps. Energy use for heating of the production building. Transport of raw materials to the plant. Estimation for the Infrastructure of the Production site included.

## Geography
Data for production in Germany used.

## Technology
Outside mounted stainless steel tube with air inlet of 400 mm diameter. Weight per element 32 kg

## Time period
Materials investigated in 2003

## Reference product
- Outside air intake, stainless steel, DN 370, at plant [RER]: 1 p
  Europe

## Inputs from technosphere
- Natural gas, burned in industrial furnace 1MWth [CH]: 67.2 MJ; lognormal SD95 1.38
  (4,5,1,1,1,5); Data estimated from related companies
- Transport, freight, rail [RER]: 7.02 tkm; lognormal SD95 2.09
  (4,5,nA,nA,nA,nA); Standard distance of ecoinvent used
- Electricity, medium voltage, production ENTSO-E, at grid: 5.61 kWh; lognormal SD95 1.69
  (3,5,5,1,3,5); Data estimated from related processes
- Ventilation components factory [RER]: 1.28e-7 p; lognormal SD95 3.18
  (4,5,1,1,3,5); Calculated with data of a similar company
- Extrusion, plastic pipes [RER]: 2.1 kg; lognormal SD95 1.24
  (2,4,1,1,1,5); Questionnaire
- Chromium steel 18/8, at plant [RER]: 33 kg; lognormal SD95 1.24
  (2,4,1,1,1,5); Questionnaire
- Transport, freight, lorry, fleet average [RER]: 3.51 tkm; lognormal SD95 2.09
  (4,5,nA,nA,nA,nA); Standard distance of ecoinvent used
- Polyethylene, HDPE, granulate, at plant [RER]: 2.1 kg; lognormal SD95 1.24
  (2,4,1,1,1,5); Questionnaire
- Light fuel oil, burned in industrial furnace 1MW, non-modulating [RER]: 67.2 MJ; lognormal SD95 1.38
  4,5,1,1,1,5; Data estimated from related companies
- Disposal, polyethylene, 0.4% water, to municipal incineration [CH]: 0.1 kg; lognormal SD95 1.32
  (4,4,1,1,1,5); Estimations on precentage material disposed
- Welding, arc, steel [RER]: 2.5 m; lognormal SD95 1.33
  (2,4,1,1,3,5); Questionnaire, approximation for technology
- Drawing of pipes, steel [RER]: 33 kg; lognormal SD95 1.26
  (3,4,1,1,1,5); Questionnaire, estimations

## Emissions to nature
- Heat, waste [emissions to air, high. pop.]: 20.2 MJ; lognormal SD95 1.69
  (3,5,5,1,3,5); Calculated from electricity use

## Sampling procedure
Questionnaire and technical information of producer. Data of one common product used.

## Sources
- Haessig W., Primas A., 2007, 2007 - LCI comfort ventilation in dwellings - Haessig, Final report ecoinvent Data v2.0, 25, Swiss Centre for LCI, B+H, Duebendorf and Zuerich, CH
Hässig, W., Primas, A. (2007) Ökologische Aspekte der Komfortlüftungen im Wohnbereich. Final report ecoinvent Data v2.0. Volume: 25. Swiss Centre for LCI, B+H. Dübendorf and Zürich, CH.
Type: Measurement on site
Source: CD-ROM
First author: Hässig, W.
Other authors: Primas, A.
Year: 2007
Title of anthology: Final report ecoinvent Data v2.0
Place of publication: Dübendorf and Zürich, CH
Publisher: Swiss Centre for LCI, B+H
Volume No: 25

## Validation
Proof reading validation: passed; Other validation: none;
