# Manganese oxide (Mn2O3), at plant

Dataset: EcoSpold 1, unit process
Functional unit: 1 kg
Category: chemicals / inorganic
Geography: CN
Time period: 2000-01 to 2000-12
Generated by: Dominic Notter
accessRestrictedTo: 0
copyright: true

## General comment
The dataset can be used for example as base material in the production of spinell type lithium manganese oxide Data are based on patents. ;
CAS number: 001317-34-6;
Formula: Mn2O3;
Synonyms: Manganese sesquioxide;

## Included processes
This dataset includes rosting of manganese carbonate in a rotary kiln in a specified nitrogen/oxygen-atmosphere. Energy consumption, carbon monoxide and carbon dioxide emissions to air are calculated. For infrastructure, the ecoinvent dataset "chemical plant, organics" is accounted. Transportation efforts are based on ecoinvent standard estimates.

## Geography
Some Swiss or European datasets are used for global processes.

## Technology
This dataset includes rosting of manganese carbonate in a rotary kiln at temperatures around 500°C. Assumption: CO to the atmosphere is equal to the CO after thermal post-combustion (<20mgC/Nm3). No infrastructure for thermal post combustion an no heat through the burning process of CO is calculated.

## Reference product
- Manganese oxide (Mn2O3), at plant [CN]: 1 kg
  CHINA

## Inputs from technosphere
- Transport, freight, lorry, fleet average [RER]: 0.48148 tkm; lognormal SD95 3.2046
  (5,5,5,2,5,5,5)
- Heat, natural gas, at industrial furnace 1MW [CH]: 4.129 MJ; lognormal SD95 1.3966
  (4,4,1,3,3,5,1)
- Nitrogen, liquid, at plant [RER]: 2.5646 kg; lognormal SD95 1.2366
  (1,4,1,3,1,5,4)
- Manganese concentrate, at beneficiation [GLO]: 1.713 kg; lognormal SD95 1.5846
  (2,4,1,3,4,5,12)
- Electricity, medium voltage, at grid [CN]: 0.005 kWh; lognormal SD95 1.4797
  (4,5,3,5,3,5,2)
- Chemical plant, organics [RER]: 4e-10 p; lognormal SD95 3.3649
  (5,5,2,3,3,5,9)
- Disposal, inert waste, 5% water, to construction waste landfill [CH]: 0.25695 kg; lognormal SD95 1.3277
  (2,4,1,1,3,5,6)
- Oxygen, liquid, at plant [RER]: 0.53721 kg; lognormal SD95 1.2366
  (1,4,1,3,1,5,4)
- Transport, freight, rail [RER]: 2.2037 tkm; lognormal SD95 3.2046
  (5,5,5,2,5,5,5)

## Emissions to nature
- Heat, waste [emissions to air, unspecified]: 0.018 MJ; lognormal SD95 1.323
  (4,4,1,3,1,5,13)
- Carbon monoxide, fossil [emissions to air, unspecified]: 4.6667e-5 kg; lognormal SD95 5.3787
  (4,4,1,3,4,5,17)
- Carbon dioxide, fossil [emissions to air, unspecified]: 0.55731 kg; lognormal SD95 1.323
  composite

## Sampling procedure
patent, ecoinvent

## Extrapolations
see Geography

## Uncertainty adjustments
Uncertainty is assessed using the pedigree matrix.

## Sources
- Althaus H.-J., Bauer C., Doka G., Frischknecht R., Jungbluth N., Nemecek T., Simons A., Stucki M., Sutter J., Tuchschmid M., 2010, 2010 - Changes in ecoinvent v2.1 and v2.2 - Althaus, Final report ecoinvent data v2.1, 16, Swiss Centre for LCI, Duebendorf and St. Gallen, CH
Hischier, R., Althaus H.-J., Bauer, Chr., Doka, G., Frischknecht R., Jungbluth N., Margni M., Nemecek, T., Simons A., Spielmann M. (2009) Documentation of changes implemented in ecoinvent Data v2.1. Final report ecoinvent data v2.1. Volume: 16. Swiss Centre for LCI. Dübendorf. CH.
Type: Measurement on site
Source: CD-ROM
First author: Hischier, R.
Other authors: Althaus H.-J., Bauer, Chr., Doka, G., Frischknecht R., Jungbluth N., Margni M., Nemecek, T., Simons A., Spielmann M.
Year: 2009
Title of anthology: Final report ecoinvent data v2.1
Place of publication: Dübendorf. CH
Publisher: Swiss Centre for LCI
Volume No: 16

## Validation
Proof reading validation: passed; Other validation: none;
