# xx Mowing, by motor mower

Dataset: EcoSpold 1, unit process
Functional unit: 1 ha
Category: processing, obsolete / agricultural, obsolete
Geography: CH
Time period: 2000-01 to 2000-12
Generated by: Dunja Dux
accessRestrictedTo: 0
copyright: true

## General comment
Motor mower, working width 1,9 m. Petrol engine 8 kW. FU is one ha mowed area.;

## Included processes
The inventory takes into account the diesel fuel consumption and the amount of agricultural machinery and of the shed, which has to be attributed to the mowing. Also taken into consideration is the amount of emissions to the air from combustion and the emission to the soil from tyre abrasion during the work process. The following activities where considered part of the work process: preliminary work at the farm; transfer to field (with an assumed distance of 1 km); field work (for a parcel of land of 1 ha surface); transfer to farm and concluding work The overlapping during the field work is considered. The amount of mowed good is not taken into account. Not included are dust other than from combustion and noise.

## Geography
The inventories are based on measurements made by the FAT, in Switzerland.

## Technology
Emissions and fuel consumption by the newest models of tractors set into operation during the period from 1999 to 2001.

## Time period
Measurements were made in the last few years (1999-2001).

## Reference product
- xx Mowing, by motor mower [CH]: 1 ha
  SWITZERLAND

## Inputs from technosphere
- Petrol, two-stroke blend, at regional storage [CH]: 3 kg; lognormal SD95 1.11
  (1,4,1,1,1,na)
- Shed [CH]: 0.00446 m2; lognormal SD95 3.01
  (1,4,1,1,1,na)
- Tractor, production [CH]: 0.881 kg; lognormal SD95 1.11
  (1,4,1,1,1,na)

## Emissions to nature
- Cadmium [emissions to soil, agricultural]: 4.23e-7 kg; lognormal SD95 1.52
  (1,4,1,1,1,na)
- Nitrogen oxides [emissions to air, low. pop.]: 0.06 kg; lognormal SD95 1.52
  (1,4,1,1,1,na)
- Ammonia [emissions to air, low. pop.]: 0.00012 kg; lognormal SD95 1.56
  (1,2,1,1,3,na)
- Lead [emissions to air, low. pop.]: 0.000438 kg; lognormal SD95 5.05
  (1,2,1,1,3,na)
- Zinc [emissions to air, low. pop.]: 3e-6 kg; lognormal SD95 5.05
  (1,2,1,1,3,na)
- Heat, waste [emissions to air, low. pop.]: 135 MJ; lognormal SD95 1.11
  (1,4,1,1,1,na)
- Cadmium [emissions to air, low. pop.]: 3e-8 kg; lognormal SD95 5.05
  (1,2,1,1,3,na)
- Lead [emissions to soil, agricultural]: 1.85e-6 kg; lognormal SD95 1.52
  (1,4,1,1,1,na)
- Benzo(a)pyrene [emissions to air, low. pop.]: 1.2e-7 kg; lognormal SD95 5.05
  (1,2,1,1,3,na)
- Nickel [emissions to air, low. pop.]: 2.1e-7 kg; lognormal SD95 5.05
  (1,2,1,1,3,na)
- Sulfur dioxide [emissions to air, low. pop.]: 0.000216 kg; lognormal SD95 1.21
  (1,2,1,1,3,na)
- Methane, fossil [emissions to air, low. pop.]: 0.00876 kg; lognormal SD95 1.56
  (1,2,1,1,3,na)
- Carbon dioxide, fossil [emissions to air, low. pop.]: 7.1 kg; lognormal SD95 1.21
  (1,2,1,1,3,na)
- Zinc [emissions to soil, agricultural]: 0.00112 kg; lognormal SD95 1.52
  (1,4,1,1,1,na)
- NMVOC, non-methane volatile organic compounds, unspecified origin [emissions to air, low. pop.]: 0.0328 kg; lognormal SD95 1.52
  (1,4,1,1,1,na)
- Chromium [emissions to air, low. pop.]: 1.5e-7 kg; lognormal SD95 5.05
  (1,2,1,1,3,na)
- Particulates, < 2.5 um [emissions to air, low. pop.]: 0.00797 kg; lognormal SD95 3.05
  (1,2,1,1,3,na)
- PAH, polycyclic aromatic hydrocarbons [emissions to air, low. pop.]: 5.77e-6 kg; lognormal SD95 3.05
  (1,2,1,1,3,na)
- Benzene [emissions to air, low. pop.]: 0.0284 kg; lognormal SD95 1.56
  (1,2,1,1,3,na)
- Copper [emissions to air, low. pop.]: 5.1e-6 kg; lognormal SD95 5.05
  (1,2,1,1,3,na)
- Dinitrogen monoxide [emissions to air, low. pop.]: 0.00039 kg; lognormal SD95 1.56
  (1,2,1,1,3,na)
- Carbon monoxide, fossil [emissions to air, low. pop.]: 1.9 kg; lognormal SD95 5.01
  (1,4,1,1,1,na)
- Selenium [emissions to air, low. pop.]: 3e-8 kg; lognormal SD95 1.56
  (1,2,1,1,3,na)

## Sampling procedure
Data on fuel consumption and emissions of CO, HC and NOx are expert estimations based on measurements for comparable activities. The other emissions were calculated basing on literature data and the measured fuel consumption.

## Extrapolations
Processes are typical procedures for Switzerland around the year 2000, they are not statistical average processes.

## Sources
- Nemecek T., Kaegi T., 2007, 2007 - LCI agricultural prod. systems - Nemecek, Ecoinvent report version 2.0, 15, Swiss Centre for LCI, ART, Duebendorf and Zuerich, CH
Nemecek, T., Kägi, T., Blaser, S. (2007) Life Cycle Inventories of Agricultural Production Systems. Ecoinvent report version 2.0. Editors: 0. Volume: 15. Swiss Centre for LCI, ART. Duebendorf and Zurich, CH.
Type: Measurement on site
Source: CD-ROM
First author: Nemecek, T.
Other authors: Kägi, T., Blaser, S.
Year: 2007
Name of editors: 0
Title of anthology: Ecoinvent report version 2.0
Place of publication: Duebendorf and Zurich, CH
Publisher: Swiss Centre for LCI, ART
Volume No: 15

## Validation
Proof reading validation: Passed.; Other validation: none;
