# Methane, 96 vol-%, from biogas, at purification

Dataset: EcoSpold 1, unit process
Functional unit: 1 m3
Category: biomass / fuels
Geography: CH
Time period: 2004-01 to 2004-12
Generated by: Thomas Kaegi
accessRestrictedTo: 0
copyright: true

## General comment
Inventory refers to 1 m3 of methane, at plant. Average mix of purification processes and average mix of biogas production;

## Included processes
mix of purification processes and mix of biogas production

## Geography
Data apply to the supply in Switzerland. Production occurs at Viessmann in Berlin (DE).

## Technology
Industry data.

## Reference product
- Methane, 96 vol-%, from biogas, at purification [CH]: 1 m3
  SWITZERLAND

## Inputs from technosphere
All rows: lognormal SD95 1.2077
- Biogas, from biowaste, at storage [CH]: 0.62458 m3
  (1,1,1,1,1,5,BU:1.05); ;
- Biogas purification, to methane, 96 vol-%, pressure swing adsorption [CH]: 0.157 m3
  (1,1,1,1,1,5,BU:1.05); ;
- Biogas, mix, at agricultural co-fermentation, covered [CH]: 0.02672 m3
  (1,1,1,1,1,5,BU:1.05); ;
- Biogas purification, to methane, 99 vol-%, membrane technology process [CH]: 0.265 m3
  (1,1,1,1,1,5,BU:1.05); ;
- Biogas purification, to methane, 99 vol-%, amino washing process [CH]: 0.578 m3
  (1,1,1,1,1,5,BU:1.05); ;
- Biogas, from sewage sludge, at storage [CH]: 1.0187 m3
  (1,1,1,1,1,5,BU:1.05); ;

## Sampling procedure
Data provided by factories

## Sources
- Kaegi T., Zschokke M., Dinkel F., 2022, 2022 - LCI biogas and biomethane processes - Kaegi, -, Carbotech AG, Zuerich, CH
Kägi T, Zschokke M, Dinkel F (2021) Life Cycle Inventories of Biogas and Biomethane Processes. On behaltf of FOEN, 2021\n

## Validation
Proof reading validation: 12.04.2021; Other validation: Z:\Schreibtisch\WinShare\BAFU Heizsysteme\A_zum konvertieren\[EcoSpold_biogas_aufbereitung.xlsx]X-Process;
