# Mastic asphalt, at plant

Dataset: EcoSpold 1, unit process
Functional unit: 1 kg
Category: construction / others
Geography: CH
Time period: 2000-01 to 2000-12
Generated by: Daniel Kellenberger
accessRestrictedTo: 0
copyright: true

## General comment
The raw materials per kg ready mix product are mixed in following ratio: Limestone powder (0.260 kg), sand (0.66 kg), bitumen (0.060 kg) and natural bitumen (0.020 kg). The only process emission taken into account are the VOC-emissions. Further emissions are not taken into account as they play a subordinate role compared to the emissions of the raw material production (e.g. drying of silica sand) and because no data are available. For inventorying the infrastructure, a yearly production amount of 150'000 tons is assumed. The lifespan of the machines is assumed to be 20 years.;

## Included processes
Includes the whole manufacturing process to produce mastic asphalt: raw material provision and transport, heating and mixing, storage, flush mounting, and the infrastructure. No transportation from the plant to the construction site and no requirements for administration are included. No additional buildings and land-use are taken into account as it is assumed that the mixing process takes place at the construction site.

## Geography
For the infrastructure RER-datasets are used as proxy

## Technology
Mixing, heating and casting of raw materials according to current technology used in Switzerland. It can be assumed that the technology is basically the same all over Europe and probably also for the rest of the world.

## Reference product
- Mastic asphalt, at plant [CH]: 1 kg
  SWITZERLAND

## Inputs from technosphere
- Limestone, milled, packed, at plant [CH]: 0.26 kg; lognormal SD95 5
  estimation
- Transport, freight, lorry, 16t-32t gross weight, fleet average [CH]: 0.054 tkm; lognormal SD95 2.0989
  (4,3,1,3,1,5,5)
- Industrial machine, heavy, unspecified, at plant [RER]: 6.6667e-6 kg; lognormal SD95 5
  estimation
- Transport, freight, rail [RER]: 0.016 tkm; lognormal SD95 2.0989
  (4,3,1,3,1,5,5)
- Diesel, burned in building machine, average [CH]: 0.021571 MJ; lognormal SD95 5
  estimation
- Sand, at mine [CH]: 0.66 kg; lognormal SD95 5
  estimation
- Heat, light fuel oil, at industrial furnace 1MW [CH]: 1.5 MJ; lognormal SD95 5
  estimation
- Bitumen, at refinery [CH]: 0.08 kg; lognormal SD95 5
  estimation
- Conveyor belt, at plant [RER]: 3.3333e-8 m; lognormal SD95 5
  estimation
- Electricity, medium voltage, at grid [CH]: 0.027778 kWh; lognormal SD95 3
  estimation

## Emissions to nature
- Heat, waste [emissions to air, unspecified]: 0.1 MJ; lognormal SD95 5
  estimation
- Benzo(a)pyrene [emissions to air, unspecified]: 4.66e-10 kg; lognormal SD95 5
  estimation
- NMVOC, non-methane volatile organic compounds, unspecified origin [emissions to air, unspecified]: 0.00019 kg; lognormal SD95 5
  estimation

## Sampling procedure
estimation

## Sources
- Kellenberger D., Althaus H.-J., Jungbluth N., Kuenniger T., Lehmann M., Thalmann P., 2007, 2007 - LCI building products - Kellenberger, Final report ecoinvent data v2.0, 7, Swiss Centre for LCI, Empa - TSL, ESU-services Ltd., Bau- und Umweltchimie, Duebendorf, CH
Kellenberger D., Althaus H.-J., Jungbluth N., Künniger T. (2007) Life Cycle Inventories of Building Products. Final report ecoinvent data v2.0. Volume: 7. Swiss Centre for LCI, Empa - TSL. Dübendorf, CH.
Type: Measurement on site
Source: CD-ROM
First author: Kellenberger D.
Other authors: Althaus H.-J., Jungbluth N., Künniger T.
Year: 2007
Title of anthology: Final report ecoinvent data v2.0
Place of publication: Dübendorf, CH
Publisher: Swiss Centre for LCI, Empa - TSL
Volume No: 7

## Validation
Proof reading validation: passed; Other validation: none;
