# Use, computer, desktop with CRT monitor, standby/sleep mode

Dataset: EcoSpold 1, unit process
Functional unit: 1 hr
Category: computers & network / use, obsolete\computers & network
Geography: CH
Time period: 2004-01 to 2004-12
Generated by: Martin Lehmann
accessRestrictedTo: 0
copyright: true

## General comment
The computer desktop use in the standby/sleep mode includes the share of computer production (CPU, keyboard, mouse, CRT) as well as the energy consumption (use-phase) and the rail and road transport from factory to user. Energy consumption of computer CPUs and CRT monitors (use-phase) vary a lot depending on the computer looked at. Min.-Max. values are listed;
Synonyms: PC;

## Included processes
Describes the use of a desktop computer with a CRT monitor in the standby/sleep mode. Calculated per 1 hour of computer use. Computer life span assumed to be 4 years, for the CRT monitor 6 years. Standby/sleep mode 2 hours a day (office use), 240 days a year. Swiss supply mix applied for electricity consumption (low voltage).

## Technology
No technology involved, except for the production of the desktop computer (including CRT, keyboard and mouse), which is described in another dataset.

## Reference product
- Use, computer, desktop with CRT monitor, standby/sleep mode [CH]: 1 hr
  SWITZERLAND

## Inputs from technosphere
- Electricity, low voltage, at grid [CH]: 0.045 kWh; lognormal SD95 1.1401
  (2,3,2,2,1,4,2)
- CRT screen, 17 inches, at plant [GLO]: 1.9026e-5 p; lognormal SD95 1.2426
  (3,3,1,2,1,5,3)
- Desktop computer, without screen, at plant [GLO]: 2.8539e-5 p; lognormal SD95 1.2426
  (3,3,1,2,1,5,3)
- Keyboard, standard version, at plant [GLO]: 2.8539e-5 p; lognormal SD95 1.2426
  (3,3,1,2,1,5,3)
- Mouse device, optical, with cable, at plant [GLO]: 2.8539e-5 p; lognormal SD95 1.2426
  (3,3,1,2,1,5,3)
- Transport, freight, rail [RER]: 0.0001347 tkm; lognormal SD95 2.1118
  (2,4,1,3,3,5,5)
- Transport, freight, lorry, fleet average [RER]: 6.7352e-5 tkm; lognormal SD95 2.1118
  (2,4,1,3,3,5,5)

## Sampling procedure
Manufacturers, literature and own assumptions.

## Extrapolations
see Geography and Technology

## Uncertainty adjustments
International data suitable for Switzerland.

## Sources
- Hischier R., Classen M., Lehmann M., Scharnhorst W., 2007, 2007 - LCI electric and electronic equipment - Hischier, Final report ecoinvent Data v2.0, 18, Swiss Centre for LCI, Empa - TSL, Duebendorf and St. Gallen, CH
Hischier R., Classen M., Lehmann M., Scharnhorst W. (2007) Life Cycle Inventories of Electric and Electronic Equipment - Production, Use & Disposal. Final report ecoinvent Data v2.0. Volume: 18. Swiss Centre for LCI, Empa - TSL. Duebendorf and St. Gallen, CH.
Type: Measurement on site
Source: CD-ROM
First author: Hischier R.
Other authors: Classen M., Lehmann M., Scharnhorst W.
Year: 2007
Title of anthology: Final report ecoinvent Data v2.0
Place of publication: Duebendorf and St. Gallen, CH
Publisher: Swiss Centre for LCI, Empa - TSL
Volume No: 18
Original title: Life Cycle Inventories of Electric and Electronic Equipment - Production, Use & Disposal

## Validation
Proof reading validation: passed; Other validation: none;
