# Copper, secondary, at refinery

Dataset: EcoSpold 1, unit process
Functional unit: 1 kg
Category: metals / non ferro
Geography: RER
Time period: 2000-01 to 2000-12
Production volume: Env. 50% of the 2.3 million tonnes = 1.2 million tonnes in STAF Europe in 1994.
Share of production covered: 15.3 %
Generated by: Mischa Classen
accessRestrictedTo: 0
copyright: true

## General comment
The module describes the production of secondary copper in Germany with a production of 176'000 t copper cathodes in 1994. It is designed for the use of the metal as part of the consumption mix "copper, at regional storage". It is not to be used if the impact of the secondary copper is considerable. In such cases, a more detailed analysis has to be conducted.;

## Included processes
The module includes the collection and handling of the copper scrap, the refining and the processes for waste water treatment.

## Geography
This module is valid for one single very big plant, which is taken as proxy for the RER.

## Technology
In three different stages different types of copper scrap and 10% of the feed of blister copper are refined to copper cathodes. Waste water is led to a communal treatment plant.

## Reference product
- Copper, secondary, at refinery [RER]: 1 kg
  Europe

## Inputs from technosphere
- Chemical plant, organics [RER]: 4e-10 p; lognormal SD95 3.07
  (3,2,2,1,3,4,9)
- Treatment, sewage, unpolluted, to wastewater treatment, class 3 [CH]: 0.001 m3; lognormal SD95 1.13
  (2,4,2,3,1,nA,6)
- Heavy fuel oil, burned in industrial furnace 1MW, non-modulating [RER]: 2.58 MJ; lognormal SD95 1.13
  (2,4,2,3,1,nA,1)
- Hard coal, burned in industrial furnace 1-10MW [RER]: 6.53 MJ; lognormal SD95 1.13
  (2,4,2,3,1,nA,1)
- Electricity, high voltage, production ENTSO-E, at grid: 1.1 kWh; lognormal SD95 1.13
  (2,4,2,3,1,nA,2)
- Silica sand, at plant [DE]: 0.0625 kg; lognormal SD95 1.13
  (2,4,2,3,1,nA,4)
- Limestone, milled, packed, at plant [CH]: 0.0739 kg; lognormal SD95 1.13
  (2,4,2,3,1,nA,4)
- Iron scrap, at plant [RER]: 1.31 kg; lognormal SD95 1.13
  (2,4,2,3,1,nA,4)
- Copper, blister-copper, at primary smelter [RER]: 0.114 kg; lognormal SD95 1.13
  (2,4,2,3,1,nA,4)
- Non-ferrous metal smelter [GLO]: 9.57e-12 p; lognormal SD95 3.07
  (3,2,2,1,3,4,9)

## Emissions to nature
- Sulfur dioxide [emissions to air, low. pop.]: 0.003 kg; lognormal SD95 1.13
  (2,4,2,3,1,nA,15)
- Cadmium [emissions to air, low. pop.]: 3e-6 kg; lognormal SD95 5.02
  (2,4,2,3,1,nA,22)
- Nitrogen oxides [emissions to air, low. pop.]: 0.001 kg; lognormal SD95 1.13
  (2,4,2,3,1,nA,15)
- Lead [emissions to water, river]: 5e-7 kg; lognormal SD95 5.02
  (2,4,2,3,1,nA,35)
- Lead [emissions to air, low. pop.]: 9e-5 kg; lognormal SD95 5.02
  (2,4,2,3,1,nA,22)
- Nickel [emissions to water, river]: 3e-7 kg; lognormal SD95 5.02
  (2,4,2,3,1,nA,35)
- Particulates, > 10 um [emissions to air, low. pop.]: 9.4e-5 kg; lognormal SD95 1.52
  (2,4,2,3,1,nA,25)
- Zinc [emissions to air, low. pop.]: 0.000375 kg; lognormal SD95 5.02
  (2,4,2,3,1,nA,22)
- Antimony [emissions to air, low. pop.]: 3e-6 kg; lognormal SD95 5.02
  (2,4,2,3,1,nA,22)
- Heat, waste [emissions to air, low. pop.]: 3.97 MJ; lognormal SD95 1.14
  (2,3,2,1,1,4,13)
- Carbon monoxide, fossil [emissions to air, low. pop.]: 0.002 kg; lognormal SD95 5.02
  (2,4,2,3,1,nA,17)
- Particulates, > 2.5 um, and < 10um [emissions to air, low. pop.]: 9.4e-5 kg; lognormal SD95 2.02
  (2,4,2,3,1,nA,26)
- Dioxin, 2,3,7,8 Tetrachlorodibenzo-p- [emissions to air, low. pop.]: 5e-11 kg; lognormal SD95 10
  (2,4,2,3,1,nA,21)
- Arsenic [emissions to water, river]: 1e-7 kg; lognormal SD95 5.02
  (2,4,2,3,1,nA,35)
- Zinc [emissions to water, river]: 2e-7 kg; lognormal SD95 5.02
  (2,4,2,3,1,nA,35)
- Particulates, < 2.5 um [emissions to air, low. pop.]: 0.000282 kg; lognormal SD95 3.02
  (2,4,2,3,1,nA,27)
- Nickel [emissions to air, low. pop.]: 1e-6 kg; lognormal SD95 5.02
  (2,4,2,3,1,nA,22)
- Copper [emissions to water, river]: 1e-6 kg; lognormal SD95 5.02
  (2,4,2,3,1,nA,35)
- Arsenic [emissions to air, low. pop.]: 2e-6 kg; lognormal SD95 5.02
  (2,4,2,3,1,nA,22)
- Cadmium [emissions to water, river]: 1e-8 kg; lognormal SD95 5.02
  (2,4,2,3,1,nA,35)
- Copper [emissions to air, low. pop.]: 8.5e-5 kg; lognormal SD95 5.02
  (2,4,2,3,1,nA,22)

## Sampling procedure
literature

## Extrapolations
see Geography and Technology

## Sources
- Classen M., Althaus H.-J., Blaser S., Scharnhorst W., Tuchschmid M., Jungbluth N., Faist Emmenegger M., 2009, 2009 - LCI metals - Classen, Final report ecoinvent data v2.1, 10, Swiss Centre for LCI, Empa, ESU-services Ltd., Duebendorf, CH
Classen M., Althaus H.-J., Blaser S., Doka G., Jungbluth N., Tuchschmid M. (2008) Life Cycle Inventories of Metals. Final report ecoinvent data v2.1. Volume: 10. Issue: 0. Swiss Centre for LCI, Empa - TSL. Dübendorf, CH.
Type: Measurement on site
Source: CD-ROM
First author: Classen M.
Other authors: Althaus H.-J., Blaser S., Doka G., Jungbluth N., Tuchschmid M.
Year: 2008
Title of anthology: Final report ecoinvent data v2.1
Place of publication: Dübendorf, CH
Publisher: Swiss Centre for LCI, Empa - TSL
Volume No: 10
Issue No: 0

## Validation
Proof reading validation: passed.; Other validation: none;
