# xx Electricity, at cogen, biogas agricultural mix, allocation exergy

Dataset: EcoSpold 1, unit process
Functional unit: 1 kWh
Category: energy, obsolete / biomass, obsolete\cogeneration, obsolete
Geography: CH
Time period: 2006-01 to 2006-12
Production volume: 25 GWh electricity, 12 mio. m3 Biogas
Share of production covered: 50 %
Generated by: Konrad Schleiss
accessRestrictedTo: 0
copyright: true

## General comment
This process gives the mix of electricity production from biogas from agricultural plants in Switzerland in the year 2006;

## Included processes
This process connects the different productions for electricity from agricultural biogas plants.

## Geography
For this process 20 plants in Switzerland producing about 50% of electricity from biogas have been evaluated.

## Technology
Mix of biogas engines and ignition gas engine

## Reference product
- xx Electricity, at cogen, biogas agricultural mix, allocation exergy [CH]: 1 kWh
  SWITZERLAND

## Inputs from technosphere
- Electricity, at cogen with biogas engine, agricultural covered, alloc. exergy [CH]: 0.5504 kWh; lognormal SD95 1.0579
  (1,2,1,1,1,2); Data from 20 plants in Switzerland producing about 50% of the biogas in agricultural biogas plants.
- Electricity, at cogen with ignition biogas engine, agric. covered, alloc. exergy [CH]: 0.0815 kWh; lognormal SD95 1.0579
  (1,2,1,1,1,2); Data from 20 plants in Switzerland producing about 50% of the biogas in agricultural biogas plants. In the year 2006 a large amount of fat and oil were used to produce biogas. According to the market situation this can change in the future
- Electricity, at cogen with biogas engine, agricultural, alloc. exergy [CH]: 0.085 kWh; lognormal SD95 1.0579
  (same comment as for Electricity, at cogen with biogas engine, agricultural covered, alloc.)
- Electricity, at cogen with ignition biogas engine, allocation exergy [CH]: 0.2832 kWh; lognormal SD95 1.0579
  (same comment as for Electricity, at cogen with biogas engine, agricultural covered, alloc.)

## Sampling procedure
The data are the average of 20 plants in Switzerland

## Sources
- Jungbluth N., Chudacoff M., Dauriat A., Dinkel F., Doka G., Faist Emmenegger M., Gnansounou E., Kljun N., Spielmann M., Stettler C., Sutter J., 2007, 2007 - LCI bioenergy - Jungbluth, Final report ecoinvent data v2.0, 17, Swiss Centre for LCI, ESU-services Ltd., Duebendorf and Uster, CH
Jungbluth N., Chudacoff M., Dauriat A., Dinkel F., Doka G., Faist Emmenegger M., Gnansounou E., Kljun N., Spielmann M., Stettler C., Sutter J. (2007) Life Cycle Inventories of Bioenergy. Final report ecoinvent data v2.0. Volume: 17. Swiss Centre for LCI, ESU. Duebendorf and Uster, CH.
Type: Measurement on site
Source: CD-ROM
First author: Jungbluth N.
Other authors: Chudacoff M., Dauriat A., Dinkel F., Doka G., Faist Emmenegger M., Gnansounou E., Kljun N., Spielmann M., Stettler C., Sutter J.
Year: 2007
Title of anthology: Final report ecoinvent data v2.0
Place of publication: Duebendorf and Uster, CH
Publisher: Swiss Centre for LCI, ESU
Volume No: 17

## Validation
Proof reading validation: passed; Other validation: none;
