# Hard sandstone, at mine

Dataset: EcoSpold 1, unit process
Functional unit: 1 m3
Category: construction materials / others
Geography: CH
Time period: 2009-01 to 2009-12
Production volume: 3700 m3
Share of production covered: 0 %
Generated by: Franziska Wyss
accessRestrictedTo: 0
copyright: true

## General comment
Average technology;

## Included processes
This data set includes the material and energy input to mine 1 m3 of hard sandstone. Mining takes place in Switzerland, Zurich. Additives use (lubrication oil etc) and its transport to the mining site are considered. Steel and concrete are used to stabilize the mining site.

## Geography
Data for Switzerland

## Reference product
- Hard sandstone, at mine [CH]: 1 m3
  SWITZERLAND

## Inputs from technosphere
- Transport, freight, rail, electricity with shunting [CH]: 0.461 tkm; lognormal SD95 2
  (1,1,1,1,1,1,BU:2); Antransport Einsatzstoffe: Bahn; F. Werner, (2011), Berechnung der Grauen Energie für Natursandstein der Müller Natursandstein AG, AHB Zürich
- Diesel, burned in building machine, average [CH]: 116 MJ; lognormal SD95 1.05
  (1,1,1,1,1,1,BU:1.05); Dieselverbrauch; F. Werner, (2011), Berechnung der Grauen Energie für Natursandstein der Müller Natursandstein AG, AHB Zürich
- Electricity, medium voltage, at grid [CH]: 21.9 kWh; lognormal SD95 1.05
  (1,1,1,1,1,1,BU:1.05); Stromverbrauch; F. Werner, (2011), Berechnung der Grauen Energie für Natursandstein der Müller Natursandstein AG, AHB Zürich
- Steel, low-alloyed, at plant [RER]: 0.02 kg; lognormal SD95 1.05
  (1,1,1,1,1,1,BU:1.05); Verschliessmaterial Schrammsäge; F. Werner, (2011), Berechnung der Grauen Energie für Natursandstein der Müller Natursandstein AG, AHB Zürich
- Cement, unspecified, at plant [CH]: 0.16 kg; lognormal SD95 1.05
  (1,1,1,1,1,1,BU:1.05); Zement; F. Werner, (2011), Berechnung der Grauen Energie für Natursandstein der Müller Natursandstein AG, AHB Zürich
- Lubricating oil, at plant [RER]: 0.116 kg; lognormal SD95 1.05
  (1,1,1,1,1,1,BU:1.05); Schmierstoffe; F. Werner, (2011), Berechnung der Grauen Energie für Natursandstein der Müller Natursandstein AG, AHB Zürich
- Disposal, used mineral oil, 10% water, to hazardous waste incineration [CH]: 0.0836 kg; lognormal SD95 1.05
  (1,1,1,1,1,1,BU:1.05); Altöl in Entsorgung ; F. Werner, (2011), Berechnung der Grauen Energie für Natursandstein der Müller Natursandstein AG, AHB Zürich
- Disposal, wood untreated, 20% water, to municipal incineration [CH]: 0.216 kg; lognormal SD95 1.05
  (1,1,1,1,1,1,BU:1.05); Altholz in KVA; F. Werner, (2011), Berechnung der Grauen Energie für Natursandstein der Müller Natursandstein AG, AHB Zürich
- Sawnwood, production mix, softwood, raw, dried (u=20%), at sawmill [RER]: 0.0004 m3; lognormal SD95 1.05
  (1,1,1,1,1,1,BU:1.05); Holzbalken zur Lagerung; F. Werner, (2011), Berechnung der Grauen Energie für Natursandstein der Müller Natursandstein AG, AHB Zürich
- Nylon 66, at plant [RER]: 0.0012 kg; lognormal SD95 1.05
  (1,1,1,1,1,1,BU:1.05); Verschleissmaterial Seilsäge: Polyamid; F. Werner, (2011), Berechnung der Grauen Energie für Natursandstein der Müller Natursandstein AG, AHB Zürich
- Steel, low-alloyed, at plant [RER]: 0.52 kg; lognormal SD95 1.05
  (1,1,1,1,1,1,BU:1.05); Stahlanker; F. Werner, (2011), Berechnung der Grauen Energie für Natursandstein der Müller Natursandstein AG, AHB Zürich
- Transport, freight, lorry, 16t-32t gross weight, fleet average [RER]: 0.0511 tkm; lognormal SD95 2
  (1,1,1,1,1,1,BU:2); Antransport Einsatzstoffe: LKW; F. Werner, (2011), Berechnung der Grauen Energie für Natursandstein der Müller Natursandstein AG, AHB Zürich
- Chromium steel 18/8, at plant [RER]: 0.00368 kg; lognormal SD95 1.05
  (1,1,1,1,1,1,BU:1.05); Verschleissmaterial Seilsäge: Chromstahl; F. Werner, (2011), Berechnung der Grauen Energie für Natursandstein der Müller Natursandstein AG, AHB Zürich
- Explosives, tovex, at plant [CH]: 0.0856 kg; lognormal SD95 1.05
  (1,1,1,1,1,1,BU:1.05); Sprenstoff; F. Werner, (2011), Berechnung der Grauen Energie für Natursandstein der Müller Natursandstein AG, AHB Zürich

## Inputs from nature
- Transformation, to mineral extraction site [resources, land]: 0.059 m2; lognormal SD95 2
  (1,1,1,1,1,1,BU:2); Transformation in Kiesplatz; F. Werner, (2011), Berechnung der Grauen Energie für Natursandstein der Müller Natursandstein AG, AHB Zürich
- Transformation, from mineral extraction site [resources, land]: 0.0212 m2; lognormal SD95 2
  (1,1,1,1,1,1,BU:2); Transformation von Steinbruch; F. Werner, (2011), Berechnung der Grauen Energie für Natursandstein der Müller Natursandstein AG, AHB Zürich
- Occupation, mineral extraction site [resources, land]: 0.0425 m2a; lognormal SD95 1.5
  (1,1,1,1,1,1,BU:1.5); Flächenbelegung Steinbruch; F. Werner, (2011), Berechnung der Grauen Energie für Natursandstein der Müller Natursandstein AG, AHB Zürich
- Transformation, to mineral extraction site [resources, land]: 0.0212 m2; lognormal SD95 2
  (1,1,1,1,1,1,BU:2); Transformation in Steinbruch; F. Werner, (2011), Berechnung der Grauen Energie für Natursandstein der Müller Natursandstein AG, AHB Zürich
- Sand [resources, in ground]: 1.23 kg; lognormal SD95 1.05
  (1,1,1,1,1,1,BU:1.05); Sandstein als Ressource; F. Werner, (2011), Berechnung der Grauen Energie für Natursandstein der Müller Natursandstein AG, AHB Zürich
- Occupation, mineral extraction site [resources, land]: 0.134 m2a; lognormal SD95 1.5
  (1,1,1,1,1,1,BU:1.5); Flächenbelegung Kiesplatz; F. Werner, (2011), Berechnung der Grauen Energie für Natursandstein der Müller Natursandstein AG, AHB Zürich
- Transformation, from mineral extraction site [resources, land]: 0.059 m2; lognormal SD95 2
  (1,1,1,1,1,1,BU:2); Transformation von Kiesplatz; F. Werner, (2011), Berechnung der Grauen Energie für Natursandstein der Müller Natursandstein AG, AHB Zürich
- Transformation, from forest, unspecified [resources, land]: 0.059 m2; lognormal SD95 2
  (1,1,1,1,1,1,BU:2); Transformation von Laubwald; F. Werner, (2011), Berechnung der Grauen Energie für Natursandstein der Müller Natursandstein AG, AHB Zürich
- Transformation, to forest, extensive [resources, land]: 0.059 m2; lognormal SD95 2
  (1,1,1,1,1,1,BU:2); Transformation in Mischwald; F. Werner, (2011), Berechnung der Grauen Energie für Natursandstein der Müller Natursandstein AG, AHB Zürich

## Sources
- Werner F., 2011, 2011 - Calc. grey energy for natural sandstone - Werner, Project report, 500, Umwelt & Entwicklung, Zuerich, CH
Frank Werner (2011) Berechnung der Grauen Energie für Natursandstein der Müller Natursandstein AG. Project report. Volume: 500. AHB Zurich. Zürich, CH.
Type: Separate publication
Source: Report
First author: Frank Werner
Year: 2011
Title of anthology: Project report
Place of publication: Zürich, CH
Publisher: AHB Zurich
Volume No: 500
Original title: Berechnung der Grauen Energie für Natursandstein der Müller Natursandstein AG

## Validation
Proof reading validation: 12.12.2013; Other validation: \\server\e\ESU-Docs\Projekte laufend\500 Aktualisierung KBOB-Liste 2014\EcoSpold\Hartsandstein\[500-ecospold_Hartsandstein_v0.2.xlsx]X-Process;
