# Battery, NiMH, rechargeable, prismatic, at plant

Dataset: EcoSpold 1, unit process
Functional unit: 1 kg
Category: electronics / devices\module
Geography: GLO
Time period: 2004-01 to 2004-12
Production volume: 183?000 t in 2005 (own calculations)
Generated by: Wolfram Scharnhorst
accessRestrictedTo: 0
copyright: true

## General comment
The functional unit represents 1 kg of a NiMH battery for laptop applications. A typical such NiMH battery has a weight of 0.591 kg. Process data is taken mainly from an environmental report of a battery producer as well as from literature. In addition own measurements of sizes and weights of batteries were used.;
Synonyms: NiMN-Akku;

## Included processes
(Raw) materials, infrastructure, transport efforts, energy consumption and waste disposal for the production of a NiMH battery. No emissions to air or water are taken into account.

## Geography
This module relates to the global situation (electricity consumption according to the main producing countries).

## Technology
Construction details as described for NiMH-rechargable batteries and manufacturing conditions as documented in the environmental report were adopted.

## Reference product
- Battery, NiMH, rechargeable, prismatic, at plant [GLO]: 1 kg
  Global

## Inputs from technosphere
- Zinc, primary, at regional storage [RER]: 3.6223e-8 kg; lognormal SD95 1.5698
  (5,5,2,2,1,3,4)
- Steel, low-alloyed, at plant [RER]: 0.046263 kg; lognormal SD95 1.3083
  (4,5,2,2,1,3,4)
- Electrolyte, KOH, LiOH additive, at plant [GLO]: 0.082202 kg; lognormal SD95 1.1963
  (3,4,3,2,1,3,4)
- Acrylic acid, at plant [RER]: 0.0013381 kg; lognormal SD95 1.5683
  (5,5,1,2,1,3,4)
- Electricity, medium voltage, at grid [JP]: 0.2176 kWh; lognormal SD95 1.1253
  (1,4,1,2,1,3,2)
- Polyethylene, LDPE, granulate, at plant [RER]: 0.018334 kg; lognormal SD95 1.1639
  (3,4,1,2,1,3,4)
- Facilities precious metal refinery [SE]: 1.6461e-7 p; lognormal SD95 3.7732
  (4,5,1,3,5,4,9)
- Polycarbonate, at plant [RER]: 0.081198 kg; lognormal SD95 1.3062
  (4,5,1,2,1,3,4)
- Electricity, medium voltage, at grid [CN]: 0.3264 kWh; lognormal SD95 1.1253
  (1,4,1,2,1,3,2)
- Injection moulding [RER]: 0.11807 kg; lognormal SD95 1.1253
  (1,4,1,2,1,3,1)
- Polypropylene, granulate, at plant [RER]: 0.018536 kg; lognormal SD95 1.1639
  (3,4,1,2,1,3,4)
- Copper, primary, at refinery [RAS]: 3.6223e-6 kg; lognormal SD95 1.1294
  (1,4,2,2,1,3,4)
- Transport, freight, rail [RER]: 0.094657 tkm; lognormal SD95 2.095
  (4,5,na,na,na,na,5)
- Water, decarbonised, at plant [RER]: 182.57 kg; lognormal SD95 1.1253
  (1,4,1,2,1,3,11)
- Sheet rolling, copper [RER]: 3.6223e-6 kg; lognormal SD95 1.1294
  (1,4,2,2,1,3,4)
- Electrode, negative, Ni, at plant [GLO]: 0.35895 kg; lognormal SD95 1.1963
  (3,4,3,2,1,3,4)
- Nickel, 99.5%, at plant [GLO]: 0.058332 kg; lognormal SD95 1.3083
  (4,5,2,2,1,3,4)
- Transport, freight, lorry, fleet average [RER]: 0.030621 tkm; lognormal SD95 2.095
  (4,5,na,na,na,na,5)
- Electrode, positive, LaNi5, at plant [GLO]: 0.33484 kg; lognormal SD95 1.1963
  (3,4,3,2,1,3,4)
- Sheet rolling, steel [RER]: 0.10459 kg; lognormal SD95 1.3083
  (4,5,2,2,1,3,4)
- Zinc coating, pieces [RER]: 4.812e-5 m2; lognormal SD95 1.5698
  (5,5,2,2,1,3,4)
- Heat, natural gas, at industrial furnace 1MW [CH]: 8.35 MJ; lognormal SD95 1.1253
  (1,4,1,2,1,3,1)
- Disposal, hazardous waste, 25% water, to hazardous waste incineration [CH]: 0.88357 kg; lognormal SD95 1.5212
  (1,4,1,2,1,3,31)

## Emissions to nature
- Heat, waste [emissions to air, high. pop.]: 77.325 MJ; lognormal SD95 1.1253
  (1,4,1,2,1,3,13)

## Sampling procedure
Literature, measurements

## Extrapolations
see technology & general comments

## Sources
- Hischier R., Classen M., Lehmann M., Scharnhorst W., 2007, 2007 - LCI electric and electronic equipment - Hischier, Final report ecoinvent Data v2.0, 18, Swiss Centre for LCI, Empa - TSL, Duebendorf and St. Gallen, CH
Hischier R., Classen M., Lehmann M., Scharnhorst W. (2007) Life Cycle Inventories of Electric and Electronic Equipment - Production, Use & Disposal. Final report ecoinvent Data v2.0. Volume: 18. Swiss Centre for LCI, Empa - TSL. Duebendorf and St. Gallen, CH.
Type: Measurement on site
Source: CD-ROM
First author: Hischier R.
Other authors: Classen M., Lehmann M., Scharnhorst W.
Year: 2007
Title of anthology: Final report ecoinvent Data v2.0
Place of publication: Duebendorf and St. Gallen, CH
Publisher: Swiss Centre for LCI, Empa - TSL
Volume No: 18
Original title: Life Cycle Inventories of Electric and Electronic Equipment - Production, Use & Disposal

## Validation
Proof reading validation: passed; Other validation: none;
