# Disposal, outside air intake, stainless steel, DN 370

Dataset: EcoSpold 1, unit process
Functional unit: 1 p
Category: construction waste / unspecified
Geography: CH
Time period: 2000-01 to 2000-12
Generated by: Alex Primas
accessRestrictedTo: 0
copyright: true

## General comment
Disposal of an outside mounted stainless steel tube with air inlet of 400 mm diameter. Weight per element 32 kg;

## Included processes
Transport to dismantling facilities, machines for handling in sorting plant, electricity demand for sorting plant, final disposal of waste material. Cut-off to recycling for metals.

## Geography
Specific to the technology mix encountered in sorting plants in Switzerland

## Technology
Disposal to a sorting plant assumed. Metal pieces and copper in cables and electronic devices are recycled, plastic parts are incinerated, inert wastes (e.g. rock wool) are landfilled.

## Time period
Amount of material investigated in 2003. Disposal technology mix as used in late 1990ies

## Reference product
- Disposal, outside air intake, stainless steel, DN 370 [CH]: 1 p
  SWITZERLAND

## Inputs from technosphere
- Disposal, building, polyethylene/polypropylene products, to final disposal [CH]: 2 kg; lognormal SD95 1.34
  (3,4,1,1,3,5); Estimation based on data of Questionnaire
- Disposal, building, bulk iron (excluding reinforcement), to sorting plant [CH]: 30 kg; lognormal SD95 1.34
  (3,4,1,1,3,5); Estimation based on data of Questionnaire

## Sampling procedure
Questionnaire and assumptions.

## Sources
- Haessig W., Primas A., 2007, 2007 - LCI comfort ventilation in dwellings - Haessig, Final report ecoinvent Data v2.0, 25, Swiss Centre for LCI, B+H, Duebendorf and Zuerich, CH
Hässig, W., Primas, A. (2007) Ökologische Aspekte der Komfortlüftungen im Wohnbereich. Final report ecoinvent Data v2.0. Volume: 25. Swiss Centre for LCI, B+H. Dübendorf and Zürich, CH.
Type: Measurement on site
Source: CD-ROM
First author: Hässig, W.
Other authors: Primas, A.
Year: 2007
Title of anthology: Final report ecoinvent Data v2.0
Place of publication: Dübendorf and Zürich, CH
Publisher: Swiss Centre for LCI, B+H
Volume No: 25

## Validation
Proof reading validation: passed; Other validation: none;
