# District heat, from sewage heat exchanger

Dataset: EcoSpold 1, unit process
Functional unit: 1 MJ
Category: energy supply, kbob recommendation / district heat, delivered
Geography: CH
Time period: 2004-01 to 2004-12
Generated by: Christian Bauer
accessRestrictedTo: 0
copyright: true

## Included processes
House heating. The module describes the demand of heating from central heating plant and the distribution. Losses are also included; Geography: Swiss conditions

## Geography
Swiss conditions

## Technology
typical losses of large distric heating nets

## Reference product
- District heat, from sewage heat exchanger [CH]: 1 MJ

## Inputs from technosphere
- Transport, district heat, average [CH]: 1 MJ; lognormal SD95 3.1045
  (4,4,2,1,1,5); based on losses trough district heating
- Heat, from sewage heat exchanger [CH]: 1.11 MJ; lognormal SD95 2.1091
  (4,4,2,1,1,5); based on losses trough district heating

## Sampling procedure
literature

## Extrapolations
see Geography/Text

## Sources
- Dones R., Bauer C., Roeder A., 2007, 2007 - Coal - Dones, Sachbilanzen von Energiesystemen. Final report No. 6 ecoinvent data v2.0, 6, Swiss Centre for LCI, PSI, Duebendorf and Villigen, CH
Röder, A., Ch. Bauer, R. Dones (2007) Kohle. Sachbilanzen von Energiesystemen. Final report No. 6 ecoinvent data v2.0. Editors: Dones R.. Volume: 6. Swiss Centre for LCI, PSI. Dübendorf and Villigen, CH.
Type: Measurement on site
Source: CD-ROM
First author: Röder, A.
Other authors: Ch. Bauer, R. Dones
Year: 2007
Name of editors: Dones R.
Title of anthology: Sachbilanzen von Energiesystemen. Final report No. 6 ecoinvent data v2.0
Place of publication: Dübendorf and Villigen, CH
Publisher: Swiss Centre for LCI, PSI
Volume No: 6

## Validation
Proof reading validation: passed; Other validation: Z:\ESU-Docs\Projekte laufend\388 Aktualisierung PEF Energie\EcoSpold\[388_14_district_heat_fuels.xls]X-Process;
