# Titanium zinc plate, without pre-weathering, at plant

Dataset: EcoSpold 1, unit process
Functional unit: 1 kg
Category: metals / non ferro
Geography: DE
Time period: 1997-01 to 2002-12
Production volume: 160´000 t/a (Titanium zinc plus refined zinc)
Generated by: Martin Lehmann
accessRestrictedTo: 0
copyright: true

## General comment
The production steps pre-alloying, melting, casting, rolling, coiling, stretch forming and cutting are approximated using "casting, brass", "contour brass" and "sheet rolling, aluminium".;

## Included processes
The dataset describes the production of titanium zinc alloy from primary zinc and the fabrication of titanium zinc plates with all included fabrication steps. Pre-weathering of the plate is not included.

## Technology
Induction furnace for all the pre-alloying and melting steps, roll stands with 5 rolling pairs for the rolling step. Coiling facilities.

## Reference product
- Titanium zinc plate, without pre-weathering, at plant [DE]: 1 kg
  GERMANY

## Inputs from technosphere
- Aluminium, primary, at plant [RER]: 0.00101 kg; lognormal SD95 1.24
  (1,4,1,3,1,5,3)
- Contour, brass [RER]: 1 kg; lognormal SD95 1.33
  (3,3,1,1,3,5,3)
- Brass, at plant [CH]: -0.0396 kg; lognormal SD95 1.33
  (3,3,1,1,3,5,3)
- Aluminium, production mix, at plant [RER]: 0.000159 kg; lognormal SD95 1.24
  (1,4,1,3,1,5,3)
- Casting, brass [CH]: 2.11 kg; lognormal SD95 1.45
  composite
- Copper, at regional storage [RER]: 0.00127 kg; lognormal SD95 1.24
  (1,4,1,3,1,5,3)
- Zinc, primary, at regional storage [RER]: 1.06 kg; lognormal SD95 1.24
  (1,4,1,3,1,5,3)
- Aluminium casting, plant [RER]: 1.01e-10 p; lognormal SD95 3.06
  composite
- Electricity, medium voltage, production ENTSO-E, at grid: 0.435 kWh; lognormal SD95 1.24
  composite

## Emissions to nature
- Zinc [emissions to air, unspecified]: 0.000318 kg; lognormal SD95 1.58
  (2,4,1,3,1,5,31)
- Heat, waste [emissions to air, unspecified]: 1.57 MJ; lognormal SD95 1.24
  (2,4,1,3,1,5,13)

## Sampling procedure
Environmental report, certificate

## Extrapolations
see Geography

## Uncertainty adjustments
The assumption that Germany is representative for the Central Europe is considered in the uncertainties.

## Sources
- Kellenberger D., Althaus H.-J., Jungbluth N., Kuenniger T., Lehmann M., Thalmann P., 2007, 2007 - LCI building products - Kellenberger, Final report ecoinvent data v2.0, 7, Swiss Centre for LCI, Empa - TSL, ESU-services Ltd., Bau- und Umweltchimie, Duebendorf, CH
Kellenberger D., Althaus H.-J., Jungbluth N., Künniger T. (2007) Life Cycle Inventories of Building Products. Final report ecoinvent data v2.0. Volume: 7. Swiss Centre for LCI, Empa - TSL. Dübendorf, CH.
Type: Measurement on site
Source: CD-ROM
First author: Kellenberger D.
Other authors: Althaus H.-J., Jungbluth N., Künniger T.
Year: 2007
Title of anthology: Final report ecoinvent data v2.0
Place of publication: Dübendorf, CH
Publisher: Swiss Centre for LCI, Empa - TSL
Volume No: 7

## Validation
Proof reading validation: passed; Other validation: none;
