# Ventilation system, Pflegezentrum Witikon, various components

Dataset: EcoSpold 1, unit process
Functional unit: 1 p
Category: ventilation / production of components
Geography: CH
Time period: 2014-01 to 2014-12
Generated by: Alex Primas
accessRestrictedTo: 0
copyright: true

## General comment
Production of various components for a ventilation system for a residential care home with apartments, kitchen, cafe/restaurant, multi-purpose hall, laundry and car park. The inventory is based on a building with a total heated gross floor area of 11358 m2 and a total nominal air flow of 74580 m3/h, total weight of the components: 7039 kg/Unit, building with a specific air flow rate of 6.6 m3/h per m2 heated gross floor area. Data from call of bid including components for air valves, air intake, roof-hoods, dampers, fire dampers, silencers and sensors.;

## Included processes
Materials used for the production. Energy use for the different production steps and for heating the production building. Transport of raw materials to the plant. Estimation for infrastructure of the production site included.

## Technology
Technology, materials and components used for ventilation systems in commercial and public buildings

## Time period
Amount of material investigated in 2013. Process information partly from 2003 to 2012

## Reference product
- Ventilation system, Pflegezentrum Witikon, various components [CH]: 1 p
  SWITZERLAND

## Inputs from technosphere
- Metal working factory [RER]: 3.224e-6 p; lognormal SD95 3.07
  (2,4,2,1,3,4); Avarage value for similar production
- Sheet rolling, steel [RER]: 5431.8 kg; lognormal SD95 1.26
  (3,4,1,1,1,5); Data related to material input
- Sheet rolling, chromium steel [RER]: 17.443 kg; lognormal SD95 1.26
  (3,4,1,1,1,5); Data related to material input
- Autoclaved aerated concrete block, at plant [CH]: 69.281 kg; lognormal SD95 1.34
  (3,4,1,1,3,5); Data for similar product, estimations
- Metal working factory operation, average heat energy [RER]: 7039.3 kg; lognormal SD95 1.27
  (2,4,2,1,3,4); Avarage value for similar production
- Powder coating, steel [RER]: 1.7772 m2; lognormal SD95 1.32
  (4,4,1,1,1,5); Data estimated from material input
- Printed wiring board, through-hole mounted, unspec., solder mix, at plant [GLO]: 4.1428 kg; lognormal SD95 1.26
  (3,4,1,1,1,5); Data from building considered, estimations
- Copper, at regional storage [RER]: 2.72 kg; lognormal SD95 1.26
  (3,4,1,1,1,5); Data from building considered, estimations
- Rock wool, at plant [CH]: 721.9 kg; lognormal SD95 1.26
  (3,4,1,1,1,5); Data from building considered, estimations
- Wire drawing, copper [RER]: 15.088 kg; lognormal SD95 1.26
  (3,4,1,1,1,5); Data related to material input
- Casting, bronze [CH]: 4.88 kg; lognormal SD95 1.34
  (3,4,1,1,3,5); Data for similar process, estimations
- Aluminium, production mix, wrought alloy, at plant [RER]: 716.23 kg; lognormal SD95 1.26
  (3,4,1,1,1,5); Data from building considered, estimations
- Polycarbonate, at plant [RER]: 52.498 kg; lognormal SD95 1.26
  (3,4,1,1,1,5); Data from building considered, estimations
- Zinc, primary, at regional storage [RER]: 4.88 kg; lognormal SD95 1.26
  (3,4,1,1,1,5); Data from building considered, estimations
- Synthetic rubber, at plant [RER]: 3.1178 kg; lognormal SD95 1.26
  (3,4,1,1,1,5); Data from building considered, estimations
- Transport, freight, rail [RER]: 3597.2 tkm; lognormal SD95 2.14
  (4,5,1,1,1,5); Standard distance of ecoinvent used
- Sheet rolling, aluminium [RER]: 716.23 kg; lognormal SD95 1.26
  (3,4,1,1,1,5); Data related to material input
- Powder coating, aluminium sheet [RER]: 1.7189 m2; lognormal SD95 1.32
  (4,4,1,1,1,5); Data estimated from material input
- Transport, freight, lorry, 16t-32t gross weight, fleet average [CH]: 351.97 tkm; lognormal SD95 2.14
  (4,5,1,1,1,5); Standard distance of ecoinvent used
- Chromium steel 18/8, at plant [RER]: 17.443 kg; lognormal SD95 1.26
  (3,4,1,1,1,5); Data from building considered, estimations
- Polyvinylchloride, at regional storage [RER]: 2.96 kg; lognormal SD95 1.26
  (3,4,1,1,1,5); Data from building considered, estimations
- Steel, converter, unalloyed, at plant [RER]: 3422 kg; lognormal SD95 1.26
  (3,4,1,1,1,5); Data from building considered, estimations
- Zinc coating, coils [RER]: 582.98 m2; lognormal SD95 1.26
  (3,4,1,1,1,5); Data related to material input
- Steel, electric, un- and low-alloyed, at plant [RER]: 2009.8 kg; lognormal SD95 1.26
  (3,4,1,1,1,5); Data from building considered, estimations
- Injection moulding [RER]: 55.458 kg; lognormal SD95 1.26
  (3,4,1,1,1,5); Data related to material input
- Electricity, medium voltage, production ENTSO-E, at grid: 4223.6 kWh; lognormal SD95 1.26
  (3,4,1,1,1,5); Data from companies, estimations
- Brass, at plant [CH]: 12.368 kg; lognormal SD95 1.26
  (3,4,1,1,1,5); Data from building considered, estimations

## Emissions to nature
- Heat, waste [emissions to air, high. pop.]: 15205 MJ; lognormal SD95 1.26
  (3,4,1,1,1,5); Calculated from electricity use

## Sampling procedure
Data from call of bids for a ventilation system of a specific building used. Data completed with information from literature and from manufacturers

## Sources
- Klingler M., Kasser U., Savi D., Primas A., Stettler Y., Gujer P., 2014, 2014 - LCA ventilation and heating systems - Klingler, Schlussbericht, BFE, Buero fuer Umweltchemie, B&H AG, Zuerich, CH
Klingler M., Kasser U., Savi D., Primas A., Stettler Y., Gujer P. (2014) Ökobilanzdaten für Lüftungs- und Wärmeanlagen. Schlussbericht, BFE. Bundesamt für Energie (BFE). Bern.
Type: Separate publication
Source: Report
First author: Klingler M.
Other authors: Kasser U., Savi D., Primas A., Stettler Y., Gujer P.
Year: 2014
Title of anthology: Schlussbericht, BFE
Place of publication: Bern
Publisher: Bundesamt für Energie (BFE)
