# Use, computer, laptop, office use

Dataset: EcoSpold 1, unit process
Functional unit: 1 hr
Category: computers & network / use, obsolete\computers & network
Geography: RER
Time period: 2004-01 to 2004-12
Generated by: Martin Lehmann
accessRestrictedTo: 0
copyright: true

## General comment
The laptop computer office use is calculated according to the share between active (5.5 hrs/day), standby (2 hrs/day) and off (16.5 hrs/day) modes taken from literature information.;
Synonyms: Notebook, Lifebook;

## Included processes
Describes the use of a laptop computer in an office. Calculated per 1 hour of laptop use in an office. UCTE production mix applied for electricity consumption (low voltage).

## Technology
No technology involved, except for the production of the laptop computer, which is described in another dataset.

## Reference product
- Use, computer, laptop, office use [RER]: 1 hr
  Europe

## Inputs from technosphere
- Use, computer, laptop, standby/sleep mode [RER]: 0.083333 hr; lognormal SD95 1.3223
  (3,5,1,2,1,5,3)
- Use, computer, laptop, off mode [RER]: 0.6875 hr; lognormal SD95 1.3223
  (3,5,1,2,1,5,3)
- Use, computer, laptop, active mode [RER]: 0.22917 hr; lognormal SD95 1.3223
  (3,5,1,2,1,5,3)

## Sampling procedure
Literature, producer information and own assumptions

## Extrapolations
see Geography and Technology

## Uncertainty adjustments
Daily experiences confirm retrieved data from literature.

## Sources
- Hischier R., Classen M., Lehmann M., Scharnhorst W., 2007, 2007 - LCI electric and electronic equipment - Hischier, Final report ecoinvent Data v2.0, 18, Swiss Centre for LCI, Empa - TSL, Duebendorf and St. Gallen, CH
Hischier R., Classen M., Lehmann M., Scharnhorst W. (2007) Life Cycle Inventories of Electric and Electronic Equipment - Production, Use & Disposal. Final report ecoinvent Data v2.0. Volume: 18. Swiss Centre for LCI, Empa - TSL. Duebendorf and St. Gallen, CH.
Type: Measurement on site
Source: CD-ROM
First author: Hischier R.
Other authors: Classen M., Lehmann M., Scharnhorst W.
Year: 2007
Title of anthology: Final report ecoinvent Data v2.0
Place of publication: Duebendorf and St. Gallen, CH
Publisher: Swiss Centre for LCI, Empa - TSL
Volume No: 18
Original title: Life Cycle Inventories of Electric and Electronic Equipment - Production, Use & Disposal
