# Soil nailing, sprayed concrete, reinforced, Schulhaus Sandgruben Basel

Dataset: EcoSpold 1, unit process
Functional unit: 1 m2
Category: construction processes / civil engineering
Geography: CH
Time period: 2014-01 to 2014-12
Share of production covered: 0 %
Generated by: René Itten
accessRestrictedTo: 0
copyright: true

## General comment
Spritzbeton 15 cm, bewehrt, Nägel Gewi d 25 Raster 1.5/1.5 m l = 6 bis8 m, Schulhaus Sandgruben, Basel;

## Included processes
This data set includes the material use of construction pit supporting structures.

## Reference product
- Soil nailing, sprayed concrete, reinforced, Schulhaus Sandgruben Basel [CH]: 1 m2
  SWITZERLAND

## Inputs from technosphere
- Transport, freight, rail, electricity with shunting [CH]: 14.1 tkm; lognormal SD95 2.0301
  (3,3,1,3,1,4,BU:2); 600 km for steel; standard distances ecoinvent v2.2
- Transport, freight, lorry, 32t-40t gross weight, fleet average [CH]: 15.125 tkm; lognormal SD95 2.0301
  (3,3,1,3,1,4,BU:2); 20 km for concrete, 50 km for steel; standard distances ecoinvent v2.2
- Diesel, burned in building machine, average [CH]: 148.99 MJ; lognormal SD95 1.165
  (3,3,1,3,1,4,BU:1.05); company data; Marti AG, 2014, pers. communication Roger Hartmann
- Reinforcing steel, at regional storage [CH]: 22 kg; lognormal SD95 1.165
  (3,3,1,3,1,4,BU:1.05); company data; APT Ingenieure 2014, pers. communication Andreas Lutz
- Concrete for drilled piles, unspecific, at plant [CH]: 0.3 m3; lognormal SD95 1.165
  (3,3,1,3,1,4,BU:1.05); company data; APT Ingenieure 2014, pers. communication Andreas Lutz
- Rolled steel, at regional storage [CH]: 1.5 kg; lognormal SD95 1.165
  (3,3,1,3,1,4,BU:1.05); company data; APT Ingenieure 2014, pers. communication Andreas Lutz

## Inputs from nature
- Gravel, resource correction [resources, in ground]: -278.53 kg; lognormal SD95 1.165
  (3,3,1,3,1,4,BU:1.05); calculated; based on material use
- Sand, resource correction [resources, in ground]: -156.56 kg; lognormal SD95 1.165
  (3,3,1,3,1,4,BU:1.05); calculated; based on material use

## Sources
- Frischknecht R., Itten R., Wyss F., Stolz P., 2014, 2014 - LCA civil eng. works in building const. - Frischknecht, Project report, 489, treeze Ltd., Zuerich, CH
Frischknecht R., Wyss F., Itten R. (2014) Ökobilanzen von Tiefbauarbeiten bei Hochbauten. Project report. Volume: 489. treeze Ltd.. Uster, CH.
Type: Separate publication
Source: Report
First author: Frischknecht R.
Other authors: Wyss F., Itten R.
Year: 2014
Title of anthology: Project report
Place of publication: Uster, CH
Publisher: treeze Ltd.
Volume No: 489

## Validation
Proof reading validation: 15.08.2016; Other validation: \\SRV01\ESU-Docs\Projektablage\489 Erweiterung KBOB-Liste BFE\EcoSpold\Baugrubenabschluss\[489-Ecospold-Baugrubensicherung-Tiefgründung-v0.25.xlsx]X-Process;
