# Disposal, asphalt construction waste

Dataset: EcoSpold 1, unit process
Functional unit: 1 kg
Category: waste management / construction waste landfill
Geography: CH
Time period: 2025 to 2030
Synonyms: 0
Generated by: Thomas Pohl
accessRestrictedTo: 0
copyright: true

## General comment
Modern Swiss und European technologies are applied to building machines, material production and building processes.

## Included processes
This dataset includes the phases C1–C4 of asphalt disposal.
C1: Deconstruction with a road milling machine (removal of asphalt from the pavement). The deconstruction data are taken from Project 3 ‘Standardized Method for the Life Cycle Assessment of Pavements’ of the platform Gravel for Generations. Emissions are based on the study from "J. Lenk, «Ökobilanz (LCA) von Gussasphalt als Deckschicht auf Schweizer Nationalstrassen, Anhang,» Masterthesis, Burgdorf, 2023".
C2: Transport to waste treatment.
C3: Waste treatment. The environmental impacts of recycling reclaimed asphalt are allocated economically between the disposal service (C3) and the new life cycle (material provision of RAP, A1). Since the RAP data refer to 1 t of output (RAP), they were converted to the treatment of 1 t of reclaimed asphalt. The scaling factor of 0.935 results from the 935 kg of RAP obtained from processing 1 t of reclaimed asphalt.
C4: Transport to landfill.

## Geography
Europe

## Technology
This process involves the use of a road milling machine for asphalt removal from the pavement, transport with a EURO6 truck, and processing into RAP taking into account the allocation factor.

## Time period
Review of data currency scheduled after 5 years.

## Reference product
- Disposal, asphalt construction waste [CH]: 1 kg

## Inputs from technosphere
- Building machine [RER]: 5.56e-9 p; lognormal SD95 3.0055
  (2,2,2,1,1,2,BU:3); Process for phase C1: Deconstruction. Provision of road milling machine. ;
- Diesel, at regional storage [CH]: 0.000916 kg; lognormal SD95 1.0834
  (2,2,2,1,1,2,BU:1.05); Process for phase C1: Deconstruction. Diesel consumption of the road milling machine. ;
- Transport, freight, lorry, 16t-32t gross weight, fleet average [RER]: 0.0182 tkm; lognormal SD95 2.0058
  (2,2,2,1,1,2,BU:2); Process for phase C1: Deconstruction. Transport of the building machine. ;
- Transport, freight, lorry, 16t-32t gross weight, fleet average [RER]: 0.00816 tkm; lognormal SD95 2.0171
  (2,1,3,1,1,2,BU:2); Process for phase C2: Transport to waste processing. Transport after demolition: 816 kg to recycling plant, assumed distance 10 km.; Data from Asphaltsuisse, Asphalt Calculator Project by Umtec Technologie AG (survey of 21 asphalt mixing plants).
- Transport, freight, lorry, 16t-32t gross weight, fleet average [RER]: 0.00154 tkm; lognormal SD95 2.0171
  (2,1,3,1,1,2,BU:2); Process for phase C2: Transport to waste processing. Transport after demolition: 154 kg for use in loose application, assumed distance 10 km.; Data from Asphaltsuisse, Asphalt Calculator Project by Umtec Technologie AG (survey of 21 asphalt mixing plants).
- Transport, freight, lorry, 16t-32t gross weight, fleet average [RER]: 0.00096 tkm; lognormal SD95 2.0171
  (2,1,3,1,1,2,BU:2); Process for phase C2: Transport to waste processing. Transport after demolition: 30 kg directly to landfill type B, assumed distance 32 km.; Data from Asphaltsuisse, Asphalt Calculator Project by Umtec Technologie AG (survey of 21 asphalt mixing plants).
- Reclaimed asphalt pavement (RAP), at plant [CH]: 5.8678 kg; lognormal SD95 1.0744
  (2,1,1,1,1,2,BU:1.05); Process for phase C3: Processing of reclaimed asphalt. The total amount was adjusted from the allocation factor for material provision of RAP (0.137) to the allocation factor for disposal services (0.863) and scaled to one ton of reclaimed asphalt using the factor 0.9315. Calculations: 1 ton / 0.137 x 0.863 x 0.9315; Data from Asphaltsuisse, Asphalt Calculator Project by Umtec Technologie AG (survey of 11 asphalt mixing plants).
- Disposal, asphalt, 0.1% water, to sanitary landfill [CH]: 0.03 kg; lognormal SD95 1.2423
  (2,1,3,1,1,5,BU:1.05); Process for phase C3: Final disposal. Of the 86 kg that are landfilled, 30 kg go directly from the construction site to the landfill. The remaining 56 kg result from processing and are therefore accounted for in C2, respectively A1 of Reclaimed Asphalt Pavement RAP.; Data from Asphaltsuisse, Asphalt Calculator Project by Umtec Technologie AG

## Emissions to nature
- Carbon dioxide, fossil [emissions to air, unspecified]: 0.00287 kg; lognormal SD95 1.2152
  (2,1,1,1,1,5,BU:1.05); Process for phase C1: Deconstruction; J. Lenk, «Ökobilanz (LCA) von Gussasphalt als Deckschicht auf Schweizer Nationalstrassen, Anhang,» Masterthesis, Burgdorf, 2023.
- Carbon monoxide, fossil [emissions to air, unspecified]: 1.7e-5 kg; lognormal SD95 5.0554
  (2,1,1,1,1,5,BU:5); Process for phase C1: Deconstruction; J. Lenk, «Ökobilanz (LCA) von Gussasphalt als Deckschicht auf Schweizer Nationalstrassen, Anhang,» Masterthesis, Burgdorf, 2023.
- Carbon black [emissions to air, unspecified]: 1.05e-8 kg; lognormal SD95 1.564
  (2,1,1,1,1,5,BU:1.5); Process for phase C1: Deconstruction; J. Lenk, «Ökobilanz (LCA) von Gussasphalt als Deckschicht auf Schweizer Nationalstrassen, Anhang,» Masterthesis, Burgdorf, 2023.
- NMVOC, non-methane volatile organic compounds, unspecified origin [emissions to air, unspecified]: 1.39e-6 kg; lognormal SD95 1.564
  (same comment as for Carbon black)
- Particulates, > 2.5 um, and < 10um [emissions to air, unspecified]: 2.22e-7 kg; lognormal SD95 2.0511
  (2,1,1,1,1,5,BU:2); Process for phase C1: Deconstruction; J. Lenk, «Ökobilanz (LCA) von Gussasphalt als Deckschicht auf Schweizer Nationalstrassen, Anhang,» Masterthesis, Burgdorf, 2023.
- Methane, fossil [emissions to air, unspecified]: 1.58e-8 kg; lognormal SD95 1.564
  (same comment as for Carbon black)
- Ammonia [emissions to air, unspecified]: 1.05e-8 kg; lognormal SD95 1.3001
  (2,1,1,1,1,5,BU:1.2); Process for phase C1: Deconstruction; J. Lenk, «Ökobilanz (LCA) von Gussasphalt als Deckschicht auf Schweizer Nationalstrassen, Anhang,» Masterthesis, Burgdorf, 2023.
- Dinitrogen monoxide [emissions to air, unspecified]: 1.84e-7 kg; lognormal SD95 1.564
  (same comment as for Carbon black)
- Nitrogen oxides [emissions to air, unspecified]: 3.69e-5 kg; lognormal SD95 1.564
  (same comment as for Carbon black)
- Particulates, < 10 um [emissions to air, unspecified]: 2.37e-7 kg; lognormal SD95 1.564
  (same comment as for Carbon black)

## Sampling procedure
Survey

## Sources
- Pohl T., Spitzhofer N., Osterwalder D., 2025, 2025 - Asphalt calculator - Pohl, 51, Umtec Technologie AG, Zuerich, CH
