# Solar system, 30 m2 Al-Cu flat plate collector, on slanted roof, hot water

Dataset: EcoSpold 1, unit process, infrastructure
Functional unit: 1 p
Category: heat / solar\infrastructure
Geography: CH
Time period: 2000-01 to 2010-12
Production volume: 10'433 systems with flat plate collectors were sold in 2008. 27.4% of the area is installed on multiple dwellings for hot water.
Generated by: Matthias Stucki
accessRestrictedTo: 0
copyright: true

## General comment
Solar system with a flat plate collector on a multiple family dwelling for hot water. 25 years life time, 57 m pipe length and 1500 l heat storage. ;

## Included processes
Production and disposal of a complete solar system (excluding auxiliary heating). Including different components, heat exchange fluid, warm water pipes, transports of parts to CH, and delivery with a van.

## Technology
Solar collector system for hot water installed on the roof of a house.

## Time period
Time of simulation.

## Reference product
- Solar system, 30 m2 Al-Cu flat plate collector, on slanted roof, hot water [CH]: 1 p
  SWITZERLAND

## Inputs from technosphere
- Transport, freight, lorry, 16t-32t gross weight, fleet average [CH]: 7.0979 tkm; lognormal SD95 3.7597
  (4,5,na,na,na,na); Standard distance 50km
- Disposal, plastics, mixture, 15.3% water, to municipal incineration [CH]: 14.111 kg; lognormal SD95 3.0735
  (3,5,3,1,1,na); Estimation for disposal of plastics
- Transport, freight, lorry, 3.5t gross weight, fleet average [CH]: 660 tkm; lognormal SD95 3.7855
  (3,5,3,1,1,5); Questionnaire 50km per m2
- Propylene glycol, liquid, at plant [RER]: 33.381 kg; lognormal SD95 3.0735
  (3,5,3,1,1,na); Plant data, exchange after 10a life time
- Pump 40W, at plant [CH]: 1.9444 p; lognormal SD95 4.8073
  (3,5,3,1,1,na); Estimation, extrapolation for life time of 15a
- Packaging film, LDPE, at plant [RER]: 1.2177 kg; lognormal SD95 3.0735
  (3,5,3,1,1,na); Tube coating
- Tube insulation, elastomere, at plant [DE]: 12.893 kg; lognormal SD95 3.0735
  (3,5,3,1,1,na); Plant data
- Transport, freight, rail [RER]: 85.175 tkm; lognormal SD95 3.7597
  (4,5,na,na,na,na); Standard distance 600km
- Treatment, heat carrier liquid, 40% C3H8O2, to wastewater treatment, class 2 [CH]: 0.090256 m3; lognormal SD95 3.0735
  (3,5,3,1,1,na); Estimation
- Powder coating, aluminium sheet [RER]: 1.05 m2; lognormal SD95 3.0735
  (3,5,3,1,1,na); Foundation lacquering
- Drawing of pipes, steel [RER]: 16.592 kg; lognormal SD95 3.1191
  (3,5,3,1,3,na); Estimation for pipes
- Flat plate collector, aluminium copper absorber, at plant [CH]: 30 m2; lognormal SD95 4.8073
  (3,5,3,1,1,na); Estimation
- Heat storage 2000l, at plant [CH]: 0.91848 p; lognormal SD95 4.8073
  (3,5,3,1,1,na); Extrapolated by weight
- Water, completely softened, at plant [RER]: 56.875 kg; lognormal SD95 3.0735
  (3,5,3,1,1,na); Plant data, exchange after 10a life time
- Chromium steel 18/8, at plant [RER]: 16.592 kg; lognormal SD95 3.0735
  (3,5,3,1,1,na); Plant data, warm water pipes
- Aluminium, production mix, wrought alloy, at plant [RER]: 21 kg; lognormal SD95 3.0735
  (3,5,3,1,1,na); Foundation
- Expansion vessel 80l, at plant [CH]: 1.75 p; lognormal SD95 4.8073
  (3,5,3,1,1,na); Estimation
- Sheet rolling, aluminium [RER]: 21 kg; lognormal SD95 3.0735
  (3,5,3,1,1,na); Foundation

## Sampling procedure
Own simulation.

## Sources
- Stucki M., Jungbluth N., 2012, 2012 - Update LCI solar collectors - Stucki, -, 352, ESU-services Ltd., Uster, CH
Stucki M., Jungbluth N. (2010) Update of the Life Cycle Inventories of Solar Collectors. Volume: 352. ESU-services Ltd.. Uster, CH.
Type: Separate publication
First author: Stucki M.
Other authors: Jungbluth N.
Year: 2010
Place of publication: Uster, CH
Publisher: ESU-services Ltd.
Volume No: 352

## Validation
Proof reading validation: 17.12.2010; Other validation: \\Server\E\ESU-Docs\Projekte laufend\352 Sonnenkollektoranlagen\Berechnung\[neueingabe-Kollektoren-2.2+V1.0.xlsx]X-Process;
