# Battery cell, NCA

Dataset: EcoSpold 1, unit process
Functional unit: 1 kg
Category: transport systems / road\Vehicle components\Energy storage\Lithium-ion battery
Geography: GLO
Time period: 2020-01 to 2020-12
Generated by: Romain Sacchi
accessRestrictedTo: 0
copyright: False

## General comment
Datasets for mobility applications, originally published in a paper about batteries for stationary applications. Original source: Tobias S. Schmidt, Martin Beuse, Xiaojin Zhang, Bjarne Steffen, Simon F. Schneider, Alejandro Pena-Bello, Christian Bauer, and David Parra, Additional Emissions and Cost from Storing Electricity in Stationary Battery Systems, Environmental Science & Technology 2019 53 (7), 3379-3390, doi: 10.1021/acs.est.8b05317.

## Time period
Base technology year of 2020

## Reference product
- Battery cell, NCA [GLO]: 1 kg

## Inputs from technosphere
All rows: lognormal SD95 1.23828
- Cathode paste, NCA [JP]: 0.257 kg
  Uncertainty from pedigree matrix: (3, 3, 2, 2, 3, 1)
- Anode paste, NCA [JP]: 0.189 kg
  Uncertainty from pedigree matrix: (3, 3, 2, 2, 3, 1)
- Cathode current collector, NCA [JP]: 0.0646 kg
  Uncertainty from pedigree matrix: (3, 3, 2, 2, 3, 1)
- Anode current collector, NCA [JP]: 0.128 kg
  Uncertainty from pedigree matrix: (3, 3, 2, 2, 3, 1)
- Electrolyte, NCA [JP]: 0.258 kg
  Uncertainty from pedigree matrix: (3, 3, 2, 2, 3, 1)
- Separator, NCA [JP]: 0.0723 kg
  Uncertainty from pedigree matrix: (3, 3, 2, 2, 3, 1)
- Cell container [GLO]: 0.0308 kg
  Uncertainty from pedigree matrix: (3, 3, 2, 2, 3, 1)
- Water, decarbonised, at plant [RER]: 5.01 kg
  Uncertainty from pedigree matrix: (3, 3, 2, 2, 3, 1)
- Electricity mix [CN]: 4 kWh
  Uncertainty from pedigree matrix: (3, 3, 2, 2, 3, 1)
- Heat, natural gas, at industrial furnace 1MW [CH]: 10.8 MJ
  Uncertainty from pedigree matrix: (3, 3, 2, 2, 3, 1)

## Sources
- Sacchi R., Bauer C., 2023, 2023 - LCI on-road vehicles - Sacchi, PSI, Villigen, CH
doi: 10.5281/ZENODO.5156043
