# Gas motor 206kW

Dataset: EcoSpold 1, unit process, infrastructure
Functional unit: 1 p
Category: heat / natural gas\cogeneration\power unit\infrastructure
Geography: RER
Time period: 1990-01 to 2000-12
Generated by: Thomas Heck
accessRestrictedTo: 0
copyright: true

## General comment
Inventory refers to infrastructure of an existing natural gas cogeneration plant (lambda=1 motor, 160kWe, operation start 1987) at Jakobsberg, Basel, Switzerland. Module can be used generally for a gas motor. (Life time for operation assumed 70'000 h.);

## Included processes
The module includes the most important materials used for production. It includes also the transport of these materials and the energy and water needed for production.

## Geography
Production in Germany, assumed valid for Europe (RER).

## Technology
Component of a specific cogeneration unit installed in Switzerland. Technology at end of 1980s.

## Reference product
- Gas motor 206kW [RER]: 1 p
  Europe

## Inputs from technosphere
- Steel, low-alloyed, at plant [RER]: 200 kg; lognormal SD95 2.06
  basic uncertainty:2;(4,na,3,1,1,na);
- Cast iron, at plant [RER]: 1000 kg; lognormal SD95 2.06
  basic uncertainty:2;(4,na,3,1,1,na);
- Light fuel oil, burned in industrial furnace 1MW, non-modulating [CH]: 7880 MJ; lognormal SD95 1.55
  (3,3,3,3,4,3);
- Transport, freight, rail [RER]: 700 tkm; lognormal SD95 2.49
  uncertainty of transport distance and of amount of material
- Natural gas, burned in industrial furnace 1MWth [CH]: 7880 MJ; lognormal SD95 1.55
  (3,3,3,3,4,3);
- Treatment, pig iron production effluent, to wastewater treatment, class 3 [CH]: 1.68 m3; lognormal SD95 3
  rough estimate, uncertainty refers to amount of water only; not quantified here: composition of waste water unkown, therefore high uncertainty of applicability of modul.
- Reinforcing steel, at plant [RER]: 100 kg; lognormal SD95 2.06
  basic uncertainty:2;(4,na,3,1,1,na);
- Transport, freight, lorry, fleet average [RER]: 210 tkm; lognormal SD95 2.49
  uncertainty of transport distance and of amount of material
- Electricity, medium voltage, production ENTSO-E, at grid: 161 kWh; lognormal SD95 1.55
  (3,3,3,3,4,3);
- Chromium steel 18/8, at plant [RER]: 100 kg; lognormal SD95 2.06
  basic uncertainty:2;(4,na,3,1,1,na);

## Inputs from nature
- Water, unspecified natural origin/m3 [resources, in water]: 2.1 m3; lognormal SD95 3
  rough estimate

## Emissions to nature
- Heat, waste [emissions to air, unspecified]: 578 MJ; lognormal SD95 1.55
  (3,3,3,3,4,3);
- Water [emissions to water, unspecified]: 1995 kg; lognormal SD95 2.5196
  (5,5,5,5,5,BU:1.05); All uncertainty-values set to 5.0 by default. Balance of input water

## Sampling procedure
Operator and manufacturer information

## Sources
- Heck T., 2007, 2007 - Combined heat power generation - Heck, Sachbilanzen von Energiesystemen. Final report No. 6 ecoinvent data v2.0, 6, Swiss Centre for LCI, PSI, Duebendorf and Villigen, CH
Heck, T. (2007) Wärme-Kraft-Kopplung. Sachbilanzen von Energiesystemen. Final report No. 6 ecoinvent data v2.0. Editors: Dones R.. Volume: 6. Swiss Centre for LCI, PSI. Dübendorf and Villigen, CH.
Type: Measurement on site
Source: CD-ROM
First author: Heck, T.
Year: 2007
Name of editors: Dones R.
Title of anthology: Sachbilanzen von Energiesystemen. Final report No. 6 ecoinvent data v2.0
Place of publication: Dübendorf and Villigen, CH
Publisher: Swiss Centre for LCI, PSI
Volume No: 6

## Validation
Proof reading validation: had passed; Other validation: none;
