# Photovoltaic cell, multi-Si, at plant

Dataset: EcoSpold 1, unit process
Functional unit: 1 m2
Category: photovoltaic / production of components
Geography: RER
Time period: 2004-01 to 2021-12
Production volume: Approximately 105000 MW for total c-Si in 2018
Share of production covered: 0 %
Generated by: Philippe Stolz
accessRestrictedTo: 0
copyright: true

## General comment
Production of photovoltaic cells (156.75x156.75 mm2). Some inputs and emissions aggregated to protect sensitive data.;
Synonyms: polycrystalline, multi-crystalline, silicon;

## Included processes
Cleaning, damage etching, texture etching, covering of backside, phosphor dotation, phosphor glass etching, printing of contacts, cleaning and quality testing.

## Technology
Average production technology of photovoltaic cells from wafers.

## Time period
Data investigated in 2004. Demand of electricity and metallisation paste updated for 2018.

## Reference product
- Photovoltaic cell, multi-Si, at plant [RER]: 1 m2
  Europe

## Inputs from technosphere
- Electricity, medium voltage, production ENTSO-E, at grid: 17.747 kWh; lognormal SD95 1.0907
  (2,2,1,1,1,3); Woodhouse et al. (2019): c-Si PV Manufacturing Costs 2018
- Photovoltaic cell factory [DE]: 3.9982e-7 p; lognormal SD95 3.0525
  (2,2,4,1,1,3); de Wild-Scholten (2014) Life Cycle Assessment of Photovoltaics Status 2011, Part 1 Data Collection (Table 30,31)
- Metallization paste, back side, aluminium, at plant [RER]: 0.055414 kg; lognormal SD95 1.0907
  (2,2,1,1,1,3); Woodhouse et al. (2019): c-Si PV Manufacturing Costs 2018
- Metallization paste, back side, at plant [RER]: 0.0011111 kg; lognormal SD95 1.0907
  (2,2,1,1,1,3); Woodhouse et al. (2019): c-Si PV Manufacturing Costs 2018
- Lime, hydrated, packed, at plant [CH]: 0.21778 kg; lognormal SD95 1.2238
  (same comment as for Photovoltaic cell factory)
- Sodium hydroxide, 50% in H2O, production mix, at plant [RER]: 0.070677 kg; lognormal SD95 1.2238
  (same comment as for Photovoltaic cell factory)
- Multi-Si wafer, at regional storage [RER]: 1.04 m2; lognormal SD95 3.0082
  (2,2,2,1,1,3); de Wild-Scholten (2014) Life Cycle Assessment of Photovoltaics Status 2011, Part 1 Data Collection (Table 30,31)
- Phosphoryl chloride, at plant [RER]: 0.027408 kg; lognormal SD95 1.2238
  (same comment as for Photovoltaic cell factory)
- Hydrochloric acid, 30% in H2O, at plant [RER]: 0.0085881 kg; lognormal SD95 1.2238
  (same comment as for Photovoltaic cell factory)
- Phosphoric acid, fertiliser grade, 70% in H2O, at plant [GLO]: 0.0086292 kg; lognormal SD95 1.2238
  (same comment as for Photovoltaic cell factory)
- Refrigerant R134a, at plant [RER]: 2.7285e-5 kg; lognormal SD95 1.2238
  (same comment as for Photovoltaic cell factory)
- Tap water, water balance according to MoeK 2013, at user [RER]: 251.07 kg; lognormal SD95 1.2238
  (same comment as for Photovoltaic cell factory)
- Solvents, organic, unspecified, at plant [GLO]: 0.0113 kg; lognormal SD95 1.2238
  (same comment as for Photovoltaic cell factory)
- Potassium hydroxide, at regional storage [RER]: 0.029997 kg; lognormal SD95 1.2238
  (same comment as for Photovoltaic cell factory)
- Isopropanol, at plant [RER]: 0.0008095 kg; lognormal SD95 1.2238
  (same comment as for Photovoltaic cell factory)
- Light fuel oil, burned in industrial furnace 1MW, non-modulating [RER]: 0.0026997 MJ; lognormal SD95 1.2238
  (same comment as for Photovoltaic cell factory)
- Sulphuric acid, liquid, at plant [RER]: 0.10108 kg; lognormal SD95 1.2238
  (same comment as for Photovoltaic cell factory)
- Ammonia, liquid, at regional storehouse [RER]: 0.0089168 kg; lognormal SD95 1.2238
  (same comment as for Photovoltaic cell factory)
- Hydrogen fluoride, at plant [GLO]: 0.40311 kg; lognormal SD95 1.2238
  (same comment as for Photovoltaic cell factory)
- Nitric acid, 50% in H2O, at plant [RER]: 0.29339 kg; lognormal SD95 1.2238
  (same comment as for Photovoltaic cell factory)
- Disposal, solvents mixture, 16.5% water, to hazardous waste incineration [CH]: 0.010807 kg; lognormal SD95 1.2238
  (same comment as for Photovoltaic cell factory)
- Transport, freight, rail [RER]: 0.39448 tkm; lognormal SD95 2.095
  (4,5,na,na,na,na); de Wild-Scholten (2014) Life Cycle Assessment of Photovoltaics Status 2011, Part 1 Data Collection (Table 30,31)
- Nitrogen, liquid, at plant [RER]: 1.3478 kg; lognormal SD95 1.2238
  (same comment as for Photovoltaic cell factory)
- Metallization paste, front side, at plant [RER]: 0.003373 kg; lognormal SD95 1.0907
  (2,2,1,1,1,3); Woodhouse et al. (2019): c-Si PV Manufacturing Costs 2018
- Disposal, waste, Si waferprod., inorg, 9.4% water, to residual material landfill [CH]: 2.7449 kg; lognormal SD95 1.2238
  (same comment as for Photovoltaic cell factory)
- Transport, freight, lorry, fleet average [RER]: 0.52186 tkm; lognormal SD95 2.095
  (same comment as for Transport, freight, rail)
- Silane, at plant [RER]: 0.0026093 kg; lognormal SD95 1.2238
  (same comment as for Photovoltaic cell factory)
- Oxygen, liquid, at plant [RER]: 0.0082183 kg; lognormal SD95 1.2238
  (same comment as for Photovoltaic cell factory)
- Calcium chloride, CaCl2, at regional storage [CH]: 0.031476 kg; lognormal SD95 1.2238
  (same comment as for Photovoltaic cell factory)
- Hydrogen peroxide, 50% in H2O, at plant [RER]: 0.00045201 kg; lognormal SD95 1.2238
  (same comment as for Photovoltaic cell factory)
- Natural gas, burned in industrial furnace 1MW [CH]: 0.24696 MJ; lognormal SD95 1.2238
  (same comment as for Photovoltaic cell factory)
- Ammonium sulphate, as N, at regional storehouse [RER]: 0.020957 kg; lognormal SD95 1.2238
  (same comment as for Photovoltaic cell factory)
- Treatment, PV cell production effluent, to wastewater treatment, class 3 [CH]: 0.22596 m3; lognormal SD95 1.2238
  (2,2,4,1,1,3); Calculation based on water withdrawal and water emissions

## Emissions to nature
- Ammonia [emissions to air, high. pop.]: 0.00052186 kg; lognormal SD95 1.3069
  (same comment as for Photovoltaic cell factory)
- Water, RER [emissions to air, unspecified]: 25.107 kg; lognormal SD95 1.6255
  (2,3,4,3,1,5); Assumption: 10% evaporation of process water; Frischknecht & Büsser Knöpfel (2013)
- Ethane, 1,1,1,2-tetrafluoro-, HFC-134a [emissions to air, high. pop.]: 2.7285e-5 kg; lognormal SD95 1.5688
  (same comment as for Photovoltaic cell factory)
- Hydrogen fluoride [emissions to air, unspecified]: 0.00069034 kg; lognormal SD95 1.5688
  (same comment as for Photovoltaic cell factory)
- Silver [emissions to air, high. pop.]: 7.7252e-6 kg; lognormal SD95 5.0598
  (same comment as for Photovoltaic cell factory)
- Carbon dioxide, fossil [emissions to air, high. pop.]: 0.68212 kg; lognormal SD95 1.2238
  (same comment as for Photovoltaic cell factory)
- Nitrogen oxides [emissions to air, high. pop.]: 0.01241, 0.0036407 kg (2 entries); lognormal SD95 1.5688
  (same comment as for Photovoltaic cell factory)
- NMVOC, non-methane volatile organic compounds, unspecified origin [emissions to air, high. pop.]: 0.00035298 kg; lognormal SD95 1.5688
  (same comment as for Photovoltaic cell factory)
- Silicon [emissions to air, high. pop.]: 0.00014711, 3.1681e-8, 5.9993e-6 kg (3 entries); lognormal SD95 5.0598
  (same comment as for Photovoltaic cell factory)
- Heat, waste [emissions to air, high. pop.]: 51.775 MJ; lognormal SD95 1.2238
  (same comment as for Photovoltaic cell factory)
- Lead [emissions to air, high. pop.]: 7.7252e-6 kg; lognormal SD95 5.0598
  (same comment as for Photovoltaic cell factory)
- Nitric acid [emissions to air, high. pop.]: 0.00011917 kg; lognormal SD95 1.5688
  (same comment as for Photovoltaic cell factory)
- Aluminium [emissions to air, high. pop.]: 7.7252e-6 kg; lognormal SD95 5.0598
  (same comment as for Photovoltaic cell factory)
- Hydrogen [emissions to air, high. pop.]: 0.00044379 kg; lognormal SD95 1.5688
  (same comment as for Photovoltaic cell factory)
- Tin [emissions to air, high. pop.]: 7.7252e-6 kg; lognormal SD95 5.0598
  (same comment as for Photovoltaic cell factory)

## Sampling procedure
Data collected from 5 specific processes and companies (4 multi-Si + 1 single-Si processing company).

## Extrapolations
Data 2005 calculated from data 2004 by multiplying amounts of materials by solar cell area factor of 156*156/(125*125) = 1.56; energy scaled linearly with cell side length.

## Sources
- Frischknecht R., Itten R., Sinha P., de Wild-Scholten M., Zhank J., 2020, 2015 - LCI and LCA photovoltaic systems - Frischknecht, Project report, 174, IEA PVPS Task 12, Petten, NL
Frischknecht R.,, Stolz P., Sinha P., de Wild-Scholten M. (2020) Life Cycle Inventories and Life Cycle Assessments of Photovoltaic Systems. Project report. Volume: 174. IEA PVPS Task 12.
Type: Separate publication
Source: Report
First author: Frischknecht R.,
Other authors: Stolz P., Sinha P., de Wild-Scholten M.
Year: 2020
Title of anthology: Project report
Publisher: IEA PVPS Task 12
Volume No: 174
Original title: Life Cycle Inventories and Life Cycle Assessments of Photovoltaic Systems

## Validation
Proof reading validation: 30.09.2020; Other validation: G:\Projekte laufend\174 Photovoltaic, IEA Task 12\2017 Global supply chain\EcoSpold\[174-photovoltaics-global-supply-chain-v2.5.xlsx]X-Process;
