# xx Refinery gas, burned in furnace

Dataset: EcoSpold 1, unit process
Functional unit: 1 kg
Category: energy, obsolete / heat, obsolete\gas, obsolete\furnace, obsolete
Geography: CH
Time period: 1980-01 to 2000-12
Production volume: 168 thousand tonnes of refinery gas were burned in 2000.
Share of production covered: 100 %
Generated by: Niels Jungbluth
accessRestrictedTo: 0
copyright: true

## General comment
Description of the direct emissions due to the combustion of refinery gas in refinery furnaces and generators not including the infrastructure of the furnace.;

## Included processes
Consumption of refinery gas and combustion emissions.

## Technology
Average technology in use.

## Time period
New Swiss data for regulated emissions like CO2, NOx, SOx etc. have been provided by the refineries. They have been compared and discussed with older literature data.

## Reference product
- xx Refinery gas, burned in furnace [CH]: 1 kg
  SWITZERLAND

## Inputs from technosphere
- Refinery gas, at refinery [CH]: 1 kg; lognormal SD95 1.1
  (1,1,1,1,1,1); Input

## Emissions to nature
- Mercury [emissions to air, high. pop.]: 7e-8 kg; lognormal SD95 5.1
  (3,4,4,3,1,4); Literature data
- Methane, fossil [emissions to air, high. pop.]: 0.00025 kg; lognormal SD95 1.6
  (3,4,4,3,1,4); Literature data
- Sulfur dioxide [emissions to air, high. pop.]: 0.00029 kg; lognormal SD95 14.1
  Range for RER refineries, Share for combustion
- Particulates, < 2.5 um [emissions to air, high. pop.]: 0.000274 kg; lognormal SD95 2
  (2,4,2,1,1,4); Literature data
- Heat, waste [emissions to air, high. pop.]: 41.4 MJ; lognormal SD95 1.2
  (3,3,3,3,1,3); Literature data, 75% waste heat to air
- Carbon monoxide, fossil [emissions to air, high. pop.]: 0.000754 kg; lognormal SD95 5.1
  (3,4,4,3,1,4); Literature data
- Carbon dioxide, fossil [emissions to air, high. pop.]: 2.82 kg; lognormal SD95 1.3
  (3,4,4,3,1,4); Literature data
- Heat, waste [emissions to water, river]: 13.8 MJ; lognormal SD95 1.3
  (3,4,4,3,1,4); Literature data, 25% waste heat to cooling water
- NMVOC, non-methane volatile organic compounds, unspecified origin [emissions to air, high. pop.]: 0.00025 kg; lognormal SD95 2.1
  (3,4,4,3,1,4); Literature data
- Radon-222 [emissions to air, low. pop.]: 0.00636 kBq; lognormal SD95 2
  (2,4,2,1,1,4); Literature data
- Nitrogen oxides [emissions to air, high. pop.]: 0.00252 kg; lognormal SD95 2.9
  44.5% of Range for RER refineries

## Sampling procedure
Literature survey and plant data.

## Extrapolations
Methane, CO, Hg and particulates are estimated with European figures.

## Sources
- Jungbluth N., 2007, 2007 - Crude oil - Jungbluth, Sachbilanzen von Energiesystemen. Final report No. 6 ecoinvent data v2.0, 6, Swiss Centre for LCI, ESU-services Ltd., Duebendorf and Uster, CH
Jungbluth, N. (2007) Erdöl. Sachbilanzen von Energiesystemen. Final report No. 6 ecoinvent data v2.0. Editors: Dones R.. Volume: 6. Swiss Centre for LCI, PSI. Dübendorf and Villigen, CH.
Type: Measurement on site
Source: CD-ROM
First author: Jungbluth, N.
Year: 2007
Name of editors: Dones R.
Title of anthology: Sachbilanzen von Energiesystemen. Final report No. 6 ecoinvent data v2.0
Place of publication: Dübendorf and Villigen, CH
Publisher: Swiss Centre for LCI, PSI
Volume No: 6

## Validation
Proof reading validation: passed; Other validation: none;
