# Ammonia, steam reforming, liquid, at plant

Dataset: EcoSpold 1, unit process
Functional unit: 1 kg
Category: chemicals / inorganic
Geography: RER
Time period: 2000-01 to 2000-12
Generated by: Maggie Osses
accessRestrictedTo: 0
copyright: true

## General comment
Maunfacturing process starting with natural gas, air and electricity is considered, plus auxiliaries, energy, transportation, infrastructure and land use, as well as wastes and emissions into air and water. Transport of the raw materials, auxiliaries and wastes is included, transport and storage of the product are not included. Carbon Dioxide is the byproduct generated. Transcient or unstable operations are not considered, but the production during stable operation conditions. Emissions to air are considered as emanating in a high population density area. Emissions into water are assumed to be emitted into rivers. Values are taken principally from EFMA 2000 and Frischknecht 1999 (see report). Inventory refers to 1 kg 100% ammonia, liquid, at plant.;
CAS number: 007664-41-7;
Formula: NH3;

## Geography
European average values

## Technology
mostly present state of the art technology used in european ammonia production plants

## Time period
Values based on reports from 1995 and 2000, and on literature with data from unknown date.

## Reference product
- Ammonia, steam reforming, liquid, at plant [RER]: 1 kg
  Europe

## Inputs from technosphere
- Natural gas, high pressure, at consumer [RER]: 23.4 MJ; lognormal SD95 1.24
  (3,2,1,1,1,5); data from survey from literature (EFMA 2000)
- Nickel, 99.5%, at plant [GLO]: 0.00035 kg; lognormal SD95 1.26
  (3,2,3,1,1,5); data from survey from literature (Frischknecht 1999)
- Electricity, medium voltage, production ENTSO-E, at grid: 0.0694 kWh; lognormal SD95 1.22
  (2,2,2,1,1,5); data from survey from literature (Davis 1999)
- Solvents, organic, unspecified, at plant [GLO]: 3e-5 kg; lognormal SD95 1.24
  (3,2,1,1,1,5); data from survey from literature (EFMA 2000)
- Disposal, municipal solid waste, 22.9% water, to sanitary landfill [CH]: 0.0002 kg; lognormal SD95 1.24
  (3,2,1,1,1,5); data from survey from literature (EFMA 2000)
- Transport, freight, rail [RER]: 0.000228 tkm; lognormal SD95 2.05
  (4,na,na,na,na,na); Standard distances
- Heavy fuel oil, at regional storage [RER]: 0.197 kg; lognormal SD95 1.24
  (3,2,1,1,1,5); data from survey from literature (EFMA 2000)
- Chemical plant, organics [RER]: 4e-10 p; lognormal SD95 3.96
  (4,1,5,3,5,4); Estimation
- Transport, freight, lorry, fleet average [RER]: 4e-5 tkm; lognormal SD95 2.05
  (4,na,na,na,na,na); Standard distances

## Inputs from nature
- Water, unspecified natural origin/m3 [resources, in water]: 0.0011 m3; lognormal SD95 1.24
  (3,2,1,1,1,5); data from survey from literature (EFMA 2000)

## Emissions to nature
- Hydrocarbons, aromatic [emissions to air, high. pop.]: 1.21e-6 kg; lognormal SD95 1.88
  (2,5,2,1,4,5); estimation, based on industrial heating modules of energy carriers used
- Sodium [emissions to air, high. pop.]: 6.08e-6 kg; lognormal SD95 5.37
  (2,5,2,1,4,5); estimation, based on industrial heating modules of energy carriers used
- Molybdenum [emissions to air, high. pop.]: 1.3e-7 kg; lognormal SD95 5.37
  (2,5,2,1,4,5); estimation, based on industrial heating modules of energy carriers used
- Benzo(a)pyrene [emissions to air, high. pop.]: 4.61e-10 kg; lognormal SD95 1.88
  (2,5,2,1,4,5); estimation, based on industrial heating modules of energy carriers used
- Chromium VI [emissions to air, high. pop.]: 1.3e-9 kg; lognormal SD95 5.37
  (2,5,2,1,4,5); estimation, based on industrial heating modules of energy carriers used
- Cadmium [emissions to air, high. pop.]: 2.67e-7 kg; lognormal SD95 5.37
  (2,5,2,1,4,5); estimation, based on industrial heating modules of energy carriers used
- Chromium [emissions to air, high. pop.]: 1.28e-7 kg; lognormal SD95 5.37
  (2,5,2,1,4,5); estimation, based on industrial heating modules of energy carriers used
- Butane [emissions to air, high. pop.]: 1.64e-5 kg; lognormal SD95 3.32
  (2,5,2,1,4,5); estimation, based on industrial heating modules of energy carriers used
- Ammonia [emissions to air, high. pop.]: 8.1e-8 kg; lognormal SD95 1.88
  (2,5,2,1,4,5); estimation, based on industrial heating modules of energy carriers used
- Hydrocarbons, aliphatic, alkanes, unspecified [emissions to air, high. pop.]: 4.86e-6 kg; lognormal SD95 1.88
  (2,5,2,1,4,5); estimation, based on industrial heating modules of energy carriers used
- Nitrogen [emissions to water, river]: 0.0001 kg; lognormal SD95 1.58
  (3,2,1,1,1,5); data from survey from literature (EFMA 2000)
- Acetaldehyde [emissions to air, high. pop.]: 1.24e-6 kg; lognormal SD95 1.88
  (2,5,2,1,4,5); estimation, based on industrial heating modules of energy carriers used
- Carbon monoxide, fossil [emissions to air, high. pop.]: 8.4e-5 kg; lognormal SD95 5.08
  (3,2,3,1,1,5); data from survey from literature (Frischknecht 1999)
- Mercury [emissions to air, high. pop.]: 1.92e-9 kg; lognormal SD95 5.37
  (2,5,2,1,4,5); estimation, based on industrial heating modules of energy carriers used
- Methanol [emissions to air, high. pop.]: 4.13e-6 kg; lognormal SD95 1.88
  (2,5,2,1,4,5); estimation, based on industrial heating modules of energy carriers used
- Methane, fossil [emissions to air, high. pop.]: 1.2e-5 kg; lognormal SD95 1.59
  (3,2,3,1,1,5); data from survey from literature (Frischknecht 1999)
- Heat, waste [emissions to air, high. pop.]: 34.6 MJ; lognormal SD95 1.26
  (3,2,3,1,1,5); calculated, based on fuel & electricity input
- Benzene [emissions to air, high. pop.]: 9.36e-6 kg; lognormal SD95 1.88
  (2,5,2,1,4,5); estimation, based on industrial heating modules of energy carriers used
- Acetone [emissions to air, high. pop.]: 1.21e-6 kg; lognormal SD95 1.88
  (2,5,2,1,4,5); estimation, based on industrial heating modules of energy carriers used
- Copper [emissions to air, high. pop.]: 3.97e-7 kg; lognormal SD95 5.37
  (2,5,2,1,4,5); estimation, based on industrial heating modules of energy carriers used
- Vanadium [emissions to air, high. pop.]: 2.11e-5 kg; lognormal SD95 5.37
  (2,5,2,1,4,5); estimation, based on industrial heating modules of energy carriers used
- PAH, polycyclic aromatic hydrocarbons [emissions to air, high. pop.]: 2.39e-7 kg; lognormal SD95 1.88
  (2,5,2,1,4,5); estimation, based on industrial heating modules of energy carriers used
- Arsenic [emissions to air, high. pop.]: 1.05e-7 kg; lognormal SD95 1.88
  (2,5,2,1,4,5); estimation, based on industrial heating modules of energy carriers used
- Cobalt [emissions to air, high. pop.]: 2.67e-7 kg; lognormal SD95 5.37
  (2,5,2,1,4,5); estimation, based on industrial heating modules of energy carriers used
- Ethanol [emissions to air, high. pop.]: 2.43e-6 kg; lognormal SD95 1.88
  (2,5,2,1,4,5); estimation, based on industrial heating modules of energy carriers used
- Pentane [emissions to air, high. pop.]: 2.81e-5 kg; lognormal SD95 1.88
  (2,5,2,1,4,5); estimation, based on industrial heating modules of energy carriers used
- Particulates, > 2.5 um, and < 10um [emissions to air, high. pop.]: 4.05e-5 kg; lognormal SD95 2.29
  (2,5,2,1,4,5); estimation, based on industrial heating modules of energy carriers used
- Carbon dioxide, fossil [emissions to air, high. pop.]: 1.46 kg; lognormal SD95 1.26
  (3,2,3,1,1,5); data from survey from literature (Frischknecht 1999)
- Dinitrogen monoxide [emissions to air, high. pop.]: 1.53e-5 kg; lognormal SD95 1.88
  (2,5,2,1,4,5); estimation, based on industrial heating modules of energy carriers used
- Toluene [emissions to air, high. pop.]: 4.92e-6 kg; lognormal SD95 1.88
  (2,5,2,1,4,5); estimation, based on industrial heating modules of energy carriers used
- Selenium [emissions to air, high. pop.]: 9.72e-8 kg; lognormal SD95 5.37
  (2,5,2,1,4,5); estimation, based on industrial heating modules of energy carriers used
- Dioxin, 2,3,7,8 Tetrachlorodibenzo-p- [emissions to air, high. pop.]: 4.35e-15 kg; lognormal SD95 1.88
  (2,5,2,1,4,5); estimation, based on industrial heating modules of energy carriers used
- Nickel [emissions to air, high. pop.]: 5.27e-6 kg; lognormal SD95 5.37
  (2,5,2,1,4,5); estimation, based on industrial heating modules of energy carriers used
- Sulfur dioxide [emissions to air, high. pop.]: 1e-5 kg; lognormal SD95 1.24
  (3,2,1,1,1,5); data from survey from literature (EFMA 2000)
- Lead [emissions to air, high. pop.]: 4.62e-7 kg; lognormal SD95 5.37
  (2,5,2,1,4,5); estimation, based on industrial heating modules of energy carriers used
- Hydrogen fluoride [emissions to air, high. pop.]: 1.17e-6 kg; lognormal SD95 1.88
  (2,5,2,1,4,5); estimation, based on industrial heating modules of energy carriers used
- Acetic acid [emissions to air, high. pop.]: 8.37e-6 kg; lognormal SD95 1.88
  (2,5,2,1,4,5); estimation, based on industrial heating modules of energy carriers used
- Hydrogen chloride [emissions to air, high. pop.]: 1.17e-5 kg; lognormal SD95 1.88
  (2,5,2,1,4,5); estimation, based on industrial heating modules of energy carriers used
- Iron [emissions to air, high. pop.]: 1.46e-6 kg; lognormal SD95 5.37
  (2,5,2,1,4,5); estimation, based on industrial heating modules of energy carriers used
- Propionic acid [emissions to air, high. pop.]: 4.68e-7 kg; lognormal SD95 1.88
  (2,5,2,1,4,5); estimation, based on industrial heating modules of energy carriers used
- Hydrocarbons, aliphatic, unsaturated [emissions to air, high. pop.]: 2.43e-7 kg; lognormal SD95 1.88
  (2,5,2,1,4,5); estimation, based on industrial heating modules of energy carriers used
- Propane [emissions to air, high. pop.]: 4.92e-6 kg; lognormal SD95 1.88
  (2,5,2,1,4,5); estimation, based on industrial heating modules of energy carriers used
- Zinc [emissions to air, high. pop.]: 3.24e-7 kg; lognormal SD95 5.37
  (2,5,2,1,4,5); estimation, based on industrial heating modules of energy carriers used
- Particulates, < 2.5 um [emissions to air, high. pop.]: 0.000288 kg; lognormal SD95 3.32
  (2,5,2,1,4,5); estimation, based on industrial heating modules of energy carriers used
- Nitrogen oxides [emissions to air, high. pop.]: 0.001 kg; lognormal SD95 1.58
  (3,2,1,1,1,5); data from survey from literature (EFMA 2000)
- Formaldehyde [emissions to air, high. pop.]: 5.99e-6 kg; lognormal SD95 1.88
  (2,5,2,1,4,5); estimation, based on industrial heating modules of energy carriers used
- Particulates, > 10 um [emissions to air, high. pop.]: 8.1e-5 kg; lognormal SD95 1.88
  (2,5,2,1,4,5); estimation, based on industrial heating modules of energy carriers used
- Calcium [emissions to air, high. pop.]: 6.48e-7 kg; lognormal SD95 3.32
  (2,5,2,1,4,5); estimation, based on industrial heating modules of energy carriers used
- Water [emissions to water, unspecified]: 1.045 kg; lognormal SD95 2.5196
  (5,5,5,5,5,BU:1.05); All uncertainty-values set to 5.0 by default. Balance of input water

## Sampling procedure
Sampling procedure: see OtherPeriodText

## Extrapolations
Transports based on standard distances of Ecoinvent. Infrastructure: proxy module used (chemical plant, organics)

## Sources
- Althaus H.-J., Chudacoff M., Hellweg S., Hischier R., Jungbluth N., Osses M., Primas A., 2007, 2007 - LCI chemicals - Althaus, Final report ecoinvent data v2.0, 8, Swiss Centre for LCI, Empa - TSL, ETH, ESU-services Ltd., Chudacoff Oekoscience, Duebendorf, CH
Althaus H.-J., Chudacoff M., Hischier R., Jungbluth N., Osses M., Primas A. (2007) Life Cycle Inventories of Chemicals. Final report ecoinvent data v2.0. Volume: 8. Swiss Centre for LCI, Empa - TSL. Dübendorf, CH.
Type: Measurement on site
Source: CD-ROM
First author: Althaus H.-J.
Other authors: Chudacoff M., Hischier R., Jungbluth N., Osses M., Primas A.
Year: 2007
Title of anthology: Final report ecoinvent data v2.0
Place of publication: Dübendorf, CH
Publisher: Swiss Centre for LCI, Empa - TSL
Volume No: 8

## Validation
Proof reading validation: Passed; Other validation: none;
