# Sawnwood, board, softwood, dried (u=20%), planed, at sawmill

Dataset: EcoSpold 1, unit process
Functional unit: 1 m3
Category: wood / wooden materials\new processes\other material
Geography: RER
Time period: 2000-01 to 2016-12
Generated by: Frank Werner
accessRestrictedTo: 0
copyright: true

## Reference product
- Sawnwood, board, softwood, dried (u=20%), planed, at sawmill [RER]: 1 m3

## Inputs from technosphere
- Planing mill [RER]: 7.17e-7 p; lognormal SD95 1.92775
  Pedigree: (2,1,2,1,1).
- Electricity, medium voltage, production ENTSO-E, at grid: 18.6 kWh; lognormal SD95 1.56535
  Pedigree: (2,1,2,1,1).
- Sawnwood, board, softwood, raw, kiln dried (u=20%), at sawmill [RER]: 0.862 m3; lognormal SD95 1.08192
  Pedigree: (1,1,2,1,1).
- Sawnwood, board, softwood, raw, air dried (u=20%), at sawmill [RER]: 0.215 m3; lognormal SD95 1.08192
  Pedigree: (1,1,2,1,1).

## Inputs from nature
- Energy, gross calorific value, in biomass [resources, biotic]: -636 MJ
  Pedigree: (1,1,2,1,1).
- Carbon dioxide, in air [resources, in air]: -56.5 kg; lognormal SD95 1.17204
  Pedigree: (1,1,2,1,1).

## Sources
- Werner F., 2017, 2017 - LCI wood and wood based products - Werner, Project Report, 0, Environment & Development, Zuerich, CH
