# Grass from meadow intensive IP, at field

Dataset: EcoSpold 1, unit process
Functional unit: 1 kg
Category: agricultural / animal production\animal foods
Geography: CH
Time period: 2000-01 to 2004-12
Generated by: Fredy Dinkel
accessRestrictedTo: 0
copyright: true

## General comment
Refers to 1 kg dry matter of fresh gras from intensive IP production with 1.66 kg CO2 and 17.9 MJ per kg dry matter. The dry matter content of fresh gras is about 10-15% ;

## Included processes
The inventories include the cultivation of gras on a temporary meadow. Included steps are soil cultivation, pestizides against Rumex, fertilisation (slurry and mineral fertilizer), harvest, loading for transport.

## Geography
Refers to a production in the Swiss plateau (lowlands <700m).

## Technology
Intensive IP production.

## Reference product
- Grass from meadow intensive IP, at field [CH]: 1 kg
  SWITZERLAND

## Inputs from technosphere
- Grass seed IP, at regional storehouse [CH]: 0.00098765 kg; lognormal SD95 1.2165
  (2,2,1,1,1,5); As in Hersener et al. (1997), 40 kg/ha. Assumed cultivation time about 3 years.
- Tillage, harrowing, by rotary harrow [CH]: 2.4691e-5 ha; lognormal SD95 1.2165
  (2,2,1,1,3,1); Cultivation of soil as in Hersener et al. 1997, assumed cultivation time 3 years.
- Mowing, by rotary mower [CH]: 0.00037037 ha; lognormal SD95 1.2165
  (2,2,1,1,3,1); 4-6 harvests (Walter et al. 2004), 5 harvests assumed
- Ammonium nitrate, as N, at regional storehouse [RER]: 0.0022222 kg; lognormal SD95 1.2165
  (2,2,1,1,3,1); One application of mineral fertilizer as for hay on permanent meadow in Nemecek et al. (2004)
- Transport, barge [RER]: 0.00625 tkm; lognormal SD95 2.0517
  (2,2,1,1,1,5); As in Nemecek et al. (2004), transport distances for mineral fertilizer 900 km
- Tillage, cultivating, chiselling [CH]: 2.4691e-5 ha; lognormal SD95 1.2165
  (same comment as for Tillage, harrowing, by rotary harrow)
- Tillage, rolling [CH]: 2.4691e-5 ha; lognormal SD95 1.2165
  (same comment as for Tillage, harrowing, by rotary harrow)
- Transport, freight, lorry, 16t-32t gross weight, fleet average [CH]: 0.00069444 tkm; lognormal SD95 2.0517
  (2,2,1,1,1,5); As in Nemecek et al. (2004), transport distances for mineral fertzilizer 100 km
- MCPA, at regional storehouse [CH]: 0.00012346 kg; lognormal SD95 1.2226
  (2,3,1,1,1,5); 4-6 l MCPB before seeding, as in Burgrain investigations fields (FAL 52 2004). Assumed cultivation time about 3 years
- Transport, freight, rail [RER]: 0.00069444 tkm; lognormal SD95 2.0517
  (same comment as for Transport, freight, lorry, 16t-32t gross weight, fleet average)
- Sowing [CH]: 2.4691e-5 ha; lognormal SD95 1.2165
  (same comment as for Tillage, harrowing, by rotary harrow)
- Transport, freight, lorry, 3.5t gross weight, fleet average [CH]: 1.6667e-5 tkm; lognormal SD95 2.0517
  (2,2,1,1,1,5); As in Nemecek et al. (2004), transport distances for seed and pesticides 15 km from storehouse
- Slurry spreading, by vacuum tanker [CH]: 0.0066667 m3; lognormal SD95 1.2165
  (2,2,1,1,3,1); Amount N corresponding to the fertilization recommendations in Walter et al. (2004). Portion of organic and mineral fertilizer as for hay from natural intensive meadow in ecoinvent report No.15 (Nemecek et al. 2004). Initial fertilization of slurry before seeding considered addtionally.
- Fodder loading, by self-loading trailer [CH]: 0.056 m3; lognormal SD95 1.2165
  (2,2,1,1,3,1); Calculation with 120 kg/m3 and moisture of about 10-15% (=0.056 m3 / kg DM)
- Fertilising, by broadcaster [CH]: 7.4074e-5 ha; lognormal SD95 1.2165
  (2,2,1,1,3,1); Yearly application of mineral fertilizer as for hay on permanent meadow in Nemecek et al. (2004)

## Inputs from nature
- Energy, gross calorific value, in biomass [resources, biotic]: 17.9 MJ; lognormal SD95 1.0931
  (2,2,1,3,1,3); Calculation with 17.9 MJ/kg DM (Nemecek et al. 2004, Tab. 4.7))
- Occupation, pasture, man made, intensive [resources, land]: 0.74074 m2a; lognormal SD95 1.5095
  (2,2,1,1,1,3); Cultivation of a hectare over one year with a yield of 13500 kg DM per year.
- Transformation, to annual crop, non-irrigated [resources, land]: 0.24691 m2; lognormal SD95 2.0483
  (4,2,1,1,1,1); Cultivation of one ha for 3 years with a netto yield of 13'500 kg DM/year (experts assumption R. Tschachtli, LBBZ, 2005: 2-3 years cultivation in regions high arable use, 3-4 years in regions with low arable use ). Assumption 30% used as meadow before and 70% as arable land.
- Transformation, from annual crop, non-irrigated [resources, land]: 0.17284 m2; lognormal SD95 2.0483
  (same comment as for Transformation, to annual crop, non-irrigated)
- Transformation, from pasture, man made [resources, land]: 0.074074 m2; lognormal SD95 2.0483
  (4,2,1,1,1,1); Cultivation of one ha for 3 years with a netto yield of 13'500 kg DM/year (experts assumption R. Tschachtli, LBBZ, 2005: 2-3 years cultivation in regions high arable use, 3-4 years in regions with low arable use ). Assumption all area used as arable land afterwards.
- Carbon dioxide, in air [resources, in air]: 1.6596 kg; lognormal SD95 1.0931
  (2,2,1,3,1,3); Calculation with uptake of 0.453 kg carbon per kg DM grass (Maier et al. 1998), which equals a total amount of 1.661 kg CO2 / kg DM grass. A correction of -0.00132 kg CO2 is considered for the direct input within grass seed.

## Emissions to nature
- Phosphate [emissions to water, groundwater]: 1.4281e-5 kg; lognormal SD95 1.8071
  (2,2,3,3,4,4); Formula as in ecoinvent report No. 15, chapter 4.4 (Nemecek et al. 2004)
- Mercury [emissions to soil, agricultural]: -2.9852e-8 kg; lognormal SD95 1.6367
  (2,1,4,3,3,4); Calculation input - output bilance using data about metal content of grass, seed and fertilizers summarized in Nemecek et al. (2004)
- MCPB [emissions to soil, agricultural]: 0.00012346 kg; lognormal SD95 1.302
  (2,2,1,3,1,5); Calculation input - output bilance
- Ammonia [emissions to air, low. pop.]: 0.0055553 kg; lognormal SD95 1.5967
  (2,2,3,3,4,4); Formula as in ecoinvent report No. 15, chapter 4.4 (Nemecek et al. 2004)
- Nitrogen oxides [emissions to air, low. pop.]: 8.6248e-5 kg; lognormal SD95 1.8071
  (2,2,3,3,4,4); Formula as in ecoinvent report No. 15, chapter 4.4 (Nemecek et al. 2004)
- Phosphorus [emissions to water, river]: 2.2874e-5 kg; lognormal SD95 1.8071
  (2,2,3,3,4,4); Formula as in ecoinvent report No. 15, chapter 4.4 (Nemecek et al. 2004)
- Nickel [emissions to soil, agricultural]: -2.8323e-7 kg; lognormal SD95 1.6367
  (same comment as for Mercury)
- Copper [emissions to soil, agricultural]: 2.5985e-6 kg; lognormal SD95 1.6367
  (same comment as for Mercury)
- Phosphate [emissions to water, river]: 5.2958e-5 kg; lognormal SD95 1.8071
  (2,2,3,3,4,4); Formula as in ecoinvent report No. 15, chapter 4.4 (Nemecek et al. 2004)
- Cadmium [emissions to soil, agricultural]: -7.6138e-8 kg; lognormal SD95 1.6367
  (same comment as for Mercury)
- Zinc [emissions to soil, agricultural]: 9.1106e-6 kg; lognormal SD95 1.6367
  (same comment as for Mercury)
- Chromium [emissions to soil, agricultural]: 1.133e-7 kg; lognormal SD95 1.6367
  (same comment as for Mercury)
- Lead [emissions to soil, agricultural]: -2.1514e-6 kg; lognormal SD95 1.6367
  (same comment as for Mercury)
- Dinitrogen monoxide [emissions to air, low. pop.]: 0.0004107 kg; lognormal SD95 1.8071
  (2,2,3,3,4,4); Formula as in ecoinvent report No. 15, chapter 4.4 (Nemecek et al. 2004)
- Nitrate [emissions to water, groundwater]: 0.0056125 kg; lognormal SD95 1.8071
  (2,2,3,3,4,4); Formula as in ecoinvent report No. 15, chapter 4.4 (Nemecek et al. 2004)

## Sampling procedure
Data were compiled from statistics, fertilising recommendations, documents from extension services and expert knowledge.

## Sources
- Jungbluth N., Chudacoff M., Dauriat A., Dinkel F., Doka G., Faist Emmenegger M., Gnansounou E., Kljun N., Spielmann M., Stettler C., Sutter J., 2007, 2007 - LCI bioenergy - Jungbluth, Final report ecoinvent data v2.0, 17, Swiss Centre for LCI, ESU-services Ltd., Duebendorf and Uster, CH
Jungbluth N., Chudacoff M., Dauriat A., Dinkel F., Doka G., Faist Emmenegger M., Gnansounou E., Kljun N., Spielmann M., Stettler C., Sutter J. (2007) Life Cycle Inventories of Bioenergy. Final report ecoinvent data v2.0. Volume: 17. Swiss Centre for LCI, ESU. Duebendorf and Uster, CH.
Type: Measurement on site
Source: CD-ROM
First author: Jungbluth N.
Other authors: Chudacoff M., Dauriat A., Dinkel F., Doka G., Faist Emmenegger M., Gnansounou E., Kljun N., Spielmann M., Stettler C., Sutter J.
Year: 2007
Title of anthology: Final report ecoinvent data v2.0
Place of publication: Duebendorf and Uster, CH
Publisher: Swiss Centre for LCI, ESU
Volume No: 17

## Validation
Proof reading validation: Passed.; Other validation: none;
