# Disposal, wire plastic, 3.55% water, to municipal incineration

Dataset: EcoSpold 1, unit process
Functional unit: 1 kg
Category: waste management / municipal incineration
Geography: CH
Time period: 2000-01 to 2000-12
Generated by: Gabor Doka
accessRestrictedTo: 0
copyright: true

## General comment
This dataset represents the activity of waste disposal of waste wire plastic in a municipal solid waste incinerator (MSWI) Recommended use of this dataset: For disposal of small amounts of wiring isolation, which goes to incineration as wire in a part of a larger item or in small amounts only. Large amounts of separated wire will not be disposed in incinerators, but rather go to recycling. Waste composition (wet, in ppm): upper heating value 26.81 MJ/kg; lower heating value 25.95 MJ/kg; H2O 35500; O 22438; H 72167; C 530500; S 806.42; N 1069; P n.a.; B n.a.; Cl 305150; Br 50.232; F 14.281; I n.a.; Ag n.a.; As 1.8346; Ba 198.45; Cd 12.007; Co 21.87; Cr 31.397; Cu 24205; Hg 0.58871; Mn 63.112; Mo n.a.; Ni 14.22; Pb 17.077; Sb 32.095; Se 2.0277; Sn 252.09; V 860.3; Zn 141.51; Be 0.4828; Sc n.a.; Sr 85.455; Ti 965.59; Tl 0.38624; W n.a.; Si n.a.; Fe 2982.5; Ca 781.16; Al 193.12; K n.a.; Mg 28.932; Na 1415.1; Share of carbon in waste that is biogenic 0%. Share of metals in waste not oxidised and bulk-recyclable (exclude very small or thin parts) Iron: 0%; Alu: 0%; Copper: 0%. One kg of this waste produces 0.05754 kg of slag and 0.1527 kg of residues, which are landfilled. Additional solidification with 0.06106 kg of cement. Net energy production: 2.98MJ/kg electric energy and 6.49MJ/kg thermal energy. Recovery of metal scrap to recycling: 0g iron scrap, 0g aluminium scrap, 0g copper scrap.;;

## Included processes
Waste incineration from waste reception gate further downstream (excluding transport to the MSWI plant). Waste-specific air and water emisions from incineration, auxiliary material consumption for flue gas cleaning. Short-term emissions to river water and long-term emisisons to ground water from slag compartment (from bottom ash) and residual material landfill (from solidified fly ashes and scrubber slugde). Waste-specific process energy demands for MSWI and net energy generation.

## Geography
Specific to the technology mix encountered in Switzerland in 2010. Well applicable to modern incineration practices in Europe, North America or Japan.

## Technology
average Swiss MSWI plants in 2010 (grate incinerators) with electrostatic precipitator for fly ash (ESP), wet flue gas scrubber and 25% SNCR , 42.77% SCR-high dust , 32.68% SCR-low dust -DeNOx facilities and 0% without Denox (weighted according to mass of burnt waste, representing Swiss average). Efficiency of iron scrap separation from slag : 58%. Efficiency of non-ferrous scrap separation from slag : 31%. Gross electric efficiency technology mix 15.84% and Gross thermal efficiency technology mix 28.51%

## Time period
Waste composition as given in literature reference, theoretical data or other source. Transfer coefficients for modern MSWI.

## Reference product
- Disposal, wire plastic, 3.55% water, to municipal incineration [CH]: 1 kg
  SWITZERLAND

## Inputs from technosphere
- Chemicals organic, at plant [GLO]: 1.2905e-5 kg; lognormal SD95 9.8362
  auxilliary inputs for the wastewater treatment stage of the incinerator plant. Proxy for (pure) Trisodium-trimercapto-s-triazine (CAS 17766-26-6), used as 15% diluted solution, aka TMT15. uncertainty calculated from uncertainty in average TMT15 input, of transfer coefficients in the incinerator, and the uncertainty of the waste composition of this waste
- Quicklime, milled, packed, at plant [CH]: 0.16236 kg; lognormal SD95 1.4844
  auxilliary inputs for the flue gas treatment stage of the incinerator plant. uncertainty calculated from uncertainty in average CaO input, of transfer coefficients in the incinerator, and the uncertainty of the waste composition of this waste
- Hydrochloric acid, 30% in H2O, at plant [RER]: 0.0023778 kg; lognormal SD95 1.4819
  auxilliary inputs for the wastewater treatment stage of the incinerator plant. uncertainty calculated from uncertainty in average HCl input, of transfer coefficients in the incinerator, and the uncertainty of the waste composition of this waste
- Slag compartment [CH]: 1.0041e-10 p; lognormal SD95 1.6928
  landfill infrastructure required for landfilling of bottom ash. uncertainty is calculated from uncertainties in waste composition and transfer coefficients in incinerator
- Cement, unspecified, at plant [CH]: 0.061065 kg; lognormal SD95 1.5363
  Cement required for solidification of landfilled residual material. Uncertainty calculated from uncertainty of the waste composition of this waste, of transfer coefficients in the incinerator and of the solidification recipe.
- Transport, freight, rail [RER]: 0.096652 tkm; lognormal SD95 1.1879
  Transport services to transport incineration residues to landfills and to transport auxilliary inputs of the incinerator plant. uncertainty calculated from uncertainty in average auxiliary material input, the uncertainty of the waste composition of this waste and the uncertainty in generic transportation distances
- Process-specific burdens, residual material landfill [CH]: 0.15266 kg; lognormal SD95 1.4692
  mass-specific expenditures required for landfilling of incineration residues. uncertainty is calculated from uncertainties in waste composition and transfer coefficients in incinerator
- Titanium dioxide, production mix, at plant [RER]: 4.8553e-5 kg; lognormal SD95 4.4427
  Input to DeNOx stage (TiO2 catalyst carrier) uncertainty calculated from uncertainty in average DeNOx input, uncertainty in the share of thermal NOx, uncertainty of nitrogen content in average municipal waste and the uncertainty in nitrogen content in *this* waste.
- Process-specific burdens, slag compartment [CH]: 0.056481 kg; lognormal SD95 1.6928
  mass-specific expenditures required for landfilling of bottom ash. uncertainty is calculated from uncertainties in waste composition and transfer coefficients in incinerator
- Water, decarbonised, at plant [RER]: 57.681 kg; lognormal SD95 2.8625
  Incinerator process water used in flue gas scrubber stage. uncertainty calculated from uncertainty in average water input, and the uncertainty of the waste composition of this waste
- Disposal, cement, hydrated, 0% water, to residual material landfill [CH]: 0.15266 kg; lognormal SD95 1.5363
  Hydrated cement output for solidification of landfilled residual material. Uncertainty calculated from uncertainty of the waste composition of this waste and transfer coefficients in the incinerator and of the solidification recipe.
- Sodium hydroxide, 50% in H2O, production mix, at plant [RER]: 0.031313 kg; lognormal SD95 1.4787
  auxilliary inputs for the flue gas treatment stage of the incinerator plant. uncertainty calculated from uncertainty in average NaOH input, of transfer coefficients in the incinerator, and the uncertainty of the waste composition of this waste
- Transport, freight, lorry, 16t-32t gross weight, fleet average [CH]: 0.02744 tkm; lognormal SD95 1.1637
  (same comment as for Transport, freight, rail)
- Natural gas, burned in industrial furnace 1MW [CH]: 0.14492 MJ; lognormal SD95 2.7445
  Input to DeNOx stage, to heat up flue gas in low-dust SCR. uncertainty calculated from uncertainty in average DeNOx input, uncertainty in the share of thermal NOx, uncertainty of nitrogen content in average municipal waste and the uncertainty in nitrogen content in *this* waste.
- Chromium oxide, flakes, at plant [RER]: 9.9087e-7 kg; lognormal SD95 4.4427
  Input to DeNOx stage. uncertainty calculated from uncertainty in average DeNOx input, uncertainty in the share of thermal NOx, uncertainty of nitrogen content in average municipal waste and the uncertainty in nitrogen content in *this* waste.
- Residual material landfill facility [CH]: 3.1805e-10 p; lognormal SD95 1.4692
  landfill infrastructure required for landfilling of incineration residues. uncertainty is calculated from uncertainties in waste composition and transfer coefficients in incinerator
- Ammonia, liquid, at regional storehouse [CH]: 0.00077495 kg; lognormal SD95 2.7445
  Input to DeNOx stage (100% NH3). uncertainty calculated from uncertainty in average DeNOx input, uncertainty in the share of thermal NOx, uncertainty of nitrogen content in average municipal waste and the uncertainty in nitrogen content in *this* waste.
- Chemicals inorganic, at plant [GLO]: 0.0090463 kg; lognormal SD95 1.4819
  auxilliary inputs for the wastewater treatment stage of the incinerator plant. Proxy for Polyelectrolyte. uncertainty calculated from uncertainty in average Polyelectrolyte input, of transfer coefficients in the incinerator, and the uncertainty of the waste composition of this waste
- Municipal waste incineration plant [CH]: 2.5e-10 p; lognormal SD95 1
  demands per kilogram waste. uncertainty is heeded in the module
- Iron (III) chloride, 40% in H2O, at plant [CH]: 0.00020424 kg; lognormal SD95 2.8625
  auxilliary inputs for the wastewater treatment stage of the incinerator plant. uncertainty calculated from uncertainty in average FeCl3 input, of transfer coefficients in the incinerator, and the uncertainty of the waste composition of this waste

## Emissions to nature
- Bromine [emissions to air, high. pop.]: 2.5091e-8 kg; lognormal SD95 7.9524
  Emission to air from waste composition and transfer coefficients. uncertainty is calculated from uncertainties in waste composition and transfer coefficients in incinerator
- Heat, waste [emissions to water, river]: 4.741 MJ; lognormal SD95 1.3981
  Waste heat generated from heating value of this waste plus any electricity required to process it. uncertainty is calculated from uncertainties in waste composition and uncertainties in energy efficiency and the uncertainty in internal energy demand
- Strontium [emissions to water, river]: 5.3805e-8 kg; lognormal SD95 13.511
  Emissions to water from waste composition and transfer coefficients in incinerator and landfills. uncertainty is calculated from uncertainties in waste composition and transfer coefficients in incinerator and landfills
- Strontium [emissions to water, groundwater, long-term]: 8.5343e-5 kg; lognormal SD95 7.2602
  Long-term emissions from landfilling of incineration residues. uncertainty is calculated from uncertainties in waste composition and transfer coefficients in incinerator and landfills.
- Chromium VI [emissions to water, river]: 8.7749e-7 kg; lognormal SD95 8.893
  (same comment as for Strontium)
- Magnesium [emissions to water, groundwater, long-term]: 2.5622e-5 kg; lognormal SD95 8.1112
  (same comment as for Strontium)
- Sulfur dioxide [emissions to air, high. pop.]: 8.5759e-6 kg; lognormal SD95 5.3147
  (same comment as for Bromine)
- Selenium [emissions to water, river]: 6.8501e-7 kg; lognormal SD95 8.734
  (same comment as for Strontium)
- Calcium [emissions to water, groundwater, long-term]: 0.00058185 kg; lognormal SD95 4.9744
  (same comment as for Strontium)
- Lead [emissions to water, river]: 1.6335e-9 kg; lognormal SD95 7.4369
  (same comment as for Strontium)
- Cyanide [emissions to air, high. pop.]: 3.4253e-6 kg; lognormal SD95 10.867
  Nitrogen species emitted to air after DeNOx stage. uncertainty calculated from uncertainty in average N-emissions and uncertainty in the share of thermal NOx and the uncertainty in nitrogen content in *this* waste.
- Bromine [emissions to water, groundwater, long-term]: 4.8416e-6 kg; lognormal SD95 7.8049
  (same comment as for Strontium)
- Carbon dioxide, fossil [emissions to air, high. pop.]: 1.9334 kg; lognormal SD95 1.2426
  (same comment as for Bromine)
- Zinc [emissions to water, river]: 1.2767e-8 kg; lognormal SD95 5.7043
  (same comment as for Strontium)
- Sodium [emissions to water, groundwater, long-term]: 0.001019 kg; lognormal SD95 3.0096
  (same comment as for Strontium)
- Antimony [emissions to air, high. pop.]: 2.571e-11 kg; lognormal SD95 8.8209
  (same comment as for Bromine)
- Strontium [emissions to air, high. pop.]: 8.5455e-9 kg; lognormal SD95 7.5076
  (same comment as for Bromine)
- Titanium [emissions to water, river]: 3.6002e-7 kg; lognormal SD95 4.1866
  (same comment as for Strontium)
- Iron [emissions to air, high. pop.]: 5.3451e-9 kg; lognormal SD95 4.5796
  (same comment as for Bromine)
- Manganese [emissions to water, groundwater, long-term]: 3.8935e-5 kg; lognormal SD95 17.007
  (same comment as for Strontium)
- Calcium [emissions to air, high. pop.]: 6.1476e-6 kg; lognormal SD95 5.3361
  (same comment as for Bromine)
- Bromine [emissions to water, river]: 4.5366e-5 kg; lognormal SD95 4.1644
  (same comment as for Strontium)
- Hydrogen chloride [emissions to air, high. pop.]: 0.00017414 kg; lognormal SD95 1.6399
  (same comment as for Bromine)
- Fluoride [emissions to water, groundwater, long-term]: 1.2804e-5 kg; lognormal SD95 5.5223
  (same comment as for Strontium)
- Nitrate [emissions to water, groundwater, long-term]: 3.8448e-5 kg; lognormal SD95 5.0426
  (same comment as for Strontium)
- Arsenic [emissions to water, river]: 1.2709e-6 kg; lognormal SD95 10.451
  (same comment as for Strontium)
- Chromium VI [emissions to water, groundwater, long-term]: 2.8801e-6 kg; lognormal SD95 12.385
  (same comment as for Strontium)
- Calcium [emissions to water, river]: 8.6479e-6 kg; lognormal SD95 4.245
  (same comment as for Strontium)
- Aluminium [emissions to air, high. pop.]: 1.5745e-10 kg; lognormal SD95 7.0225
  (same comment as for Bromine)
- Tin [emissions to water, groundwater, long-term]: 9.6481e-5 kg; lognormal SD95 13.815
  (same comment as for Strontium)
- Sulfate [emissions to water, river]: 0.0004091 kg; lognormal SD95 3.1189
  (same comment as for Strontium)
- Barium [emissions to air, high. pop.]: 7.7895e-7 kg; lognormal SD95 6.5536
  (same comment as for Bromine)
- Zinc [emissions to water, groundwater, long-term]: 4.3032e-5 kg; lognormal SD95 32.626
  (same comment as for Strontium)
- Carbon monoxide, fossil [emissions to air, high. pop.]: 3.6841e-5 kg; lognormal SD95 6.0063
  Incomplete combustion product emitted to air. uncertainty calculated from uncertainty in average operation emissions, and the uncertainty of the flue gas volume from this waste.
- Cobalt [emissions to air, high. pop.]: 3.9774e-8 kg; lognormal SD95 8.7616
  (same comment as for Bromine)
- Titanium [emissions to water, groundwater, long-term]: 0.00028866 kg; lognormal SD95 5.9235
  (same comment as for Strontium)
- Cadmium [emissions to water, groundwater, long-term]: 8.7619e-7 kg; lognormal SD95 177.02
  (same comment as for Strontium)
- Copper [emissions to water, groundwater, long-term]: 0.021621 kg; lognormal SD95 2.7786
  (same comment as for Strontium)
- Nitrogen oxides [emissions to air, high. pop.]: 0.00028853 kg; lognormal SD95 2.972
  sum of fuel-Nox and thermal-NOx emitted to air after DeNOx stage. uncertainty calculated from uncertainty in average N-emissions and uncertainty in the share of thermal NOx and the uncertainty in nitrogen content in *this* waste.
- Copper [emissions to water, river]: 3.1365e-6 kg; lognormal SD95 3.4401
  (same comment as for Strontium)
- Chromium [emissions to water, river]: 2.4379e-9 kg; lognormal SD95 8.5557
  (same comment as for Strontium)
- Vanadium [emissions to water, river]: 1.3736e-6 kg; lognormal SD95 6.2862
  (same comment as for Strontium)
- DOC, Dissolved Organic Carbon [emissions to water, river]: 0.000271 kg; lognormal SD95 1.4488
  (same comment as for Strontium)
- Particulates, < 2.5 um [emissions to air, high. pop.]: 2.5876e-6 kg; lognormal SD95 3.6038
  (same comment as for Carbon monoxide, fossil)
- Cobalt [emissions to water, river]: 3.9623e-9 kg; lognormal SD95 11.348
  (same comment as for Strontium)
- Tin [emissions to air, high. pop.]: 1.6467e-10 kg; lognormal SD95 6.76
  (same comment as for Bromine)
- Cobalt [emissions to water, groundwater, long-term]: 1.7815e-5 kg; lognormal SD95 8.055
  (same comment as for Strontium)
- Lead [emissions to water, groundwater, long-term]: 8.2564e-6 kg; lognormal SD95 64.351
  (same comment as for Strontium)
- Chromium [emissions to air, high. pop.]: 2.7416e-8 kg; lognormal SD95 8.41
  (same comment as for Bromine)
- Selenium [emissions to air, high. pop.]: 2.4191e-8 kg; lognormal SD95 11.424
  (same comment as for Bromine)
- Titanium [emissions to air, high. pop.]: 8.011e-7 kg; lognormal SD95 5.2441
  (same comment as for Bromine)
- Selenium [emissions to water, groundwater, long-term]: 1.317e-6 kg; lognormal SD95 7.9986
  (same comment as for Strontium)
- Fluoride [emissions to water, river]: 1.092e-6 kg; lognormal SD95 5.8951
  (same comment as for Strontium)
- Aluminium [emissions to water, groundwater, long-term]: 0.00013965 kg; lognormal SD95 5.9654
  (same comment as for Strontium)
- Barium [emissions to water, river]: 2.671e-8 kg; lognormal SD95 8.7215
  (same comment as for Strontium)
- Magnesium [emissions to air, high. pop.]: 3.0517e-8 kg; lognormal SD95 8.5264
  (same comment as for Bromine)
- Cadmium [emissions to air, high. pop.]: 6.1203e-9 kg; lognormal SD95 9.4864
  (same comment as for Bromine)
- Beryllium [emissions to water, river]: 3.0239e-10 kg; lognormal SD95 19.127
  (same comment as for Strontium)
- TOC, Total Organic Carbon [emissions to water, river]: 0.000271 kg; lognormal SD95 1.4488
  (same comment as for Strontium)
- Zinc [emissions to air, high. pop.]: 9.4846e-8 kg; lognormal SD95 6.9169
  (same comment as for Bromine)
- DOC, Dissolved Organic Carbon [emissions to water, groundwater, long-term]: 0.0015764 kg; lognormal SD95 1.3135
  (same comment as for Strontium)
- Barium [emissions to water, groundwater, long-term]: 9.9946e-5 kg; lognormal SD95 19.916
  (same comment as for Strontium)
- Nickel [emissions to water, river]: 9.5543e-9 kg; lognormal SD95 14.303
  (same comment as for Strontium)
- Thallium [emissions to water, river]: 2.3661e-10 kg; lognormal SD95 15.365
  (same comment as for Strontium)
- Dioxin, 2,3,7,8 Tetrachlorodibenzo-p- [emissions to air, high. pop.]: 4.3343e-14 kg; lognormal SD95 3.6038
  (same comment as for Carbon monoxide, fossil)
- Iron [emissions to water, river]: 7.8405e-8 kg; lognormal SD95 6.0319
  (same comment as for Strontium)
- Arsenic [emissions to air, high. pop.]: 1.4371e-8 kg; lognormal SD95 11.56
  (same comment as for Bromine)
- Phenol, pentachloro- [emissions to air, high. pop.]: 9.4382e-12 kg; lognormal SD95 1.8019
  (same comment as for Carbon monoxide, fossil)
- Sulfate [emissions to water, groundwater, long-term]: 0.0019973 kg; lognormal SD95 3.513
  (same comment as for Strontium)
- COD, Chemical Oxygen Demand [emissions to water, groundwater, long-term]: 0.0039838 kg; lognormal SD95 1.3135
  (same comment as for Strontium)
- Benzene [emissions to air, high. pop.]: 2.1673e-8 kg; lognormal SD95 1.8019
  (same comment as for Carbon monoxide, fossil)
- Sodium [emissions to water, river]: 0.00038448 kg; lognormal SD95 3.0546
  (same comment as for Strontium)
- Hydrogen fluoride [emissions to air, high. pop.]: 9.6349e-8 kg; lognormal SD95 9.2053
  (same comment as for Bromine)
- Benzene, pentachloro- [emissions to air, high. pop.]: 1.1451e-10 kg; lognormal SD95 1.8019
  (same comment as for Carbon monoxide, fossil)
- Copper [emissions to air, high. pop.]: 2.217e-6 kg; lognormal SD95 2.9929
  (same comment as for Bromine)
- Tin [emissions to water, river]: 6.6692e-9 kg; lognormal SD95 11.706
  (same comment as for Strontium)
- Arsenic [emissions to water, groundwater, long-term]: 5.4939e-7 kg; lognormal SD95 11.5
  (same comment as for Strontium)
- Chloride [emissions to water, river]: 0.23427 kg; lognormal SD95 1.4119
  (same comment as for Strontium)
- Nitrate [emissions to water, river]: 1.3627e-5 kg; lognormal SD95 3.841
  (same comment as for Strontium)
- Ammonia [emissions to air, high. pop.]: 9.1115e-7 kg; lognormal SD95 2.972
  (same comment as for Cyanide)
- Toluene [emissions to air, high. pop.]: 4.3346e-8 kg; lognormal SD95 1.8019
  (same comment as for Carbon monoxide, fossil)
- Mercury [emissions to water, groundwater, long-term]: 3.7495e-8 kg; lognormal SD95 35.535
  (same comment as for Strontium)
- Benzene, hexachloro- [emissions to air, high. pop.]: 4.5317e-11 kg; lognormal SD95 1.8019
  (same comment as for Carbon monoxide, fossil)
- Nickel [emissions to air, high. pop.]: 1.7863e-8 kg; lognormal SD95 9.3025
  (same comment as for Bromine)
- Cadmium [emissions to water, river]: 1.1509e-9 kg; lognormal SD95 7.6657
  (same comment as for Strontium)
- Iron [emissions to water, groundwater, long-term]: 0.0015046 kg; lognormal SD95 5.2975
  (same comment as for Strontium)
- BOD5, Biological Oxygen Demand [emissions to water, groundwater, long-term]: 0.0013031 kg; lognormal SD95 1.3135
  (same comment as for Strontium)
- TOC, Total Organic Carbon [emissions to water, groundwater, long-term]: 0.0015764 kg; lognormal SD95 1.3135
  (same comment as for Strontium)
- BOD5, Biological Oxygen Demand [emissions to water, river]: 0.00061259 kg; lognormal SD95 1.4549
  (same comment as for Strontium)
- Sodium [emissions to air, high. pop.]: 1.1618e-5 kg; lognormal SD95 4.84
  (same comment as for Bromine)
- Chloride [emissions to water, groundwater, long-term]: 0.070712 kg; lognormal SD95 1.5047
  (same comment as for Strontium)
- Heat, waste [emissions to air, high. pop.]: 20.219 MJ; lognormal SD95 1.3981
  (same comment as for Heat, waste)
- Thallium [emissions to air, high. pop.]: 3.8624e-10 kg; lognormal SD95 13.69
  (same comment as for Bromine)
- Beryllium [emissions to water, groundwater, long-term]: 4.4124e-7 kg; lognormal SD95 12.383
  (same comment as for Strontium)
- Manganese [emissions to air, high. pop.]: 1.2053e-8 kg; lognormal SD95 7.7841
  (same comment as for Bromine)
- Lead [emissions to air, high. pop.]: 1.4069e-9 kg; lognormal SD95 9.1809
  (same comment as for Bromine)
- Manganese [emissions to water, river]: 9.824e-9 kg; lognormal SD95 6.5386
  (same comment as for Strontium)
- Particulates, > 2.5 um, and < 10um [emissions to air, high. pop.]: 1.3003e-8 kg; lognormal SD95 2.4025
  (same comment as for Carbon monoxide, fossil)
- Antimony [emissions to water, groundwater, long-term]: 2.041e-5 kg; lognormal SD95 7.9826
  (same comment as for Strontium)
- Magnesium [emissions to water, river]: 1.35e-7 kg; lognormal SD95 9.1668
  (same comment as for Strontium)
- Aluminium [emissions to water, river]: 2.0899e-8 kg; lognormal SD95 8.23
  (same comment as for Strontium)
- NMVOC, non-methane volatile organic compounds, unspecified origin [emissions to air, high. pop.]: 9.8633e-7 kg; lognormal SD95 1.8019
  (same comment as for Carbon monoxide, fossil)
- Mercury [emissions to air, high. pop.]: 1.6692e-8 kg; lognormal SD95 12.96
  (same comment as for Bromine)
- COD, Chemical Oxygen Demand [emissions to water, river]: 0.00062057 kg; lognormal SD95 1.448
  (same comment as for Strontium)
- Thallium [emissions to water, groundwater, long-term]: 2.2538e-7 kg; lognormal SD95 9.5055
  (same comment as for Strontium)
- Antimony [emissions to water, river]: 1.1062e-5 kg; lognormal SD95 8.2538
  (same comment as for Strontium)
- Mercury [emissions to water, river]: 6.3935e-10 kg; lognormal SD95 8.6187
  (same comment as for Strontium)
- Dinitrogen monoxide [emissions to air, high. pop.]: 1.5944e-5 kg; lognormal SD95 10.867
  (same comment as for Cyanide)
- Vanadium [emissions to air, high. pop.]: 1.8246e-5 kg; lognormal SD95 5.2441
  (same comment as for Bromine)
- Nickel [emissions to water, groundwater, long-term]: 1.365e-5 kg; lognormal SD95 8.8747
  (same comment as for Strontium)
- Benzo(a)pyrene [emissions to air, high. pop.]: 4.8229e-13 kg; lognormal SD95 3.6038
  (same comment as for Carbon monoxide, fossil)
- Vanadium [emissions to water, groundwater, long-term]: 0.00040103 kg; lognormal SD95 4.1631
  (same comment as for Strontium)
- Methane, fossil [emissions to air, high. pop.]: 3.2509e-7 kg; lognormal SD95 1.8019
  (same comment as for Carbon monoxide, fossil)

## Sampling procedure
fully waste-specific calculation based on literature data for average MSWI operation performance

## Extrapolations
Typical elemental transfer coefficients from current studies for modern MSWI, completed with data from coal power plants and estimates, adapted for inert/burnable waste.

## Uncertainty adjustments
uncertainty of waste input composition data derived from generic formula GSD(c) = N*ln(c)+1

## Sources
- Doka G., 2013, 2013 - Updates LCI waste treatment services - Doka, -, Doka LCA, Zuerich, CH
Doka G. (2013) Updates to Life Cycle Inventories of Waste Treatment Services - part II: waste incineration. Doka LCA. Zurich.
Type: Separate publication
Source: Report to document the 2013 changes to the MSWI incinerator model and datasets (URL: http://www.doka.ch/ecoinventMSWIupdateLCI2013.pdf). To be read with the ecoinvent Nr 13 report (Doka 2009, Life Cycle Inventories of Waste Treatment Services) for ecoinvent v2.2.
First author: Doka G.
Year: 2013
Place of publication: Zurich
Publisher: Doka LCA
Original title: Updates to Life Cycle Inventories of Waste Treatment Services - part II: waste incineration

## Validation
Proof reading validation: Passed.; Other validation: none;
