# Green beans organic, at farm

Dataset: EcoSpold 1, unit process
Functional unit: 1 kg
Category: agricultural / agricultural production\plant protection
Geography: CH
Time period: 2017-01 to 2020-12
Generated by: Melina Glimmann
accessRestrictedTo: 0
copyright: true

## General comment
The inventory refers to the organic production of 1 kg of green beans in Switzerland

## Geography
The inventory is modelled for Switzerland

## Reference product
- Green beans organic, at farm [CH]: 1 kg

## Inputs from technosphere
- Pea seed organic, at regional storehouse [CH]: 0.0069231 kg; lognormal SD95 1.32211
  (4,1,3,1,1,5,BU:1.05);
- Tillage, ploughing [CH]: 0.00015385 ha; lognormal SD95 1.32211
  (4,1,3,1,1,5,BU:1.05);
- Tillage, currying, by weeder [CH]: 0.00015385 ha; lognormal SD95 1.32211
  (4,1,3,1,1,5,BU:1.05);
- Sowing [CH]: 0.00015385 ha; lognormal SD95 1.32211
  (4,1,3,1,1,5,BU:1.05);
- Irrigation, sprinkler [CH]: 0.046154 m3; lognormal SD95 3.3171
  (4,1,1,1,4,5,BU:3);
- Hoeing [CH]: 0.00015385 ha; lognormal SD95 1.32211
  (4,1,3,1,1,5,BU:1.05);
- Green manure organic, until April [CH]: 0.00015385 ha; lognormal SD95 1.32211
  (4,1,3,1,1,5,BU:1.05);
- Transport, freight, lorry, fleet average [CH]: 0.010354 tkm; lognormal SD95 2.10781
  (4,1,3,1,1,5,BU:2);
- Combine harvesting [CH]: 0.00015385 ha; lognormal SD95 1.32211
  (4,1,3,1,1,5,BU:1.05);
- Tillage, harrowing, by spring tine harrow [CH]: 0.00030769 ha; lognormal SD95 1.32211
  (4,1,3,1,1,5,BU:1.05);

## Inputs from nature
- Transformation, from annual crop, non-irrigated [resources, land]: 1.5385 m2; lognormal SD95 1.31639
  (4,1,1,1,1,5,BU:1.1);
- Transformation, to annual crop, non-irrigated [resources, land]: 1.5385 m2; lognormal SD95 1.31639
  (4,1,1,1,1,5,BU:1.1);
- Energy, gross calorific value, in biomass [resources, biotic]: 15.215 MJ; lognormal SD95 1.3001
  (4,1,1,1,1,5,BU:1.05);
- Occupation, annual crop, non-irrigated [resources, land]: 0.76923 m2a; lognormal SD95 1.31639
  (4,1,1,1,1,5,BU:1.1);
- Carbon dioxide, in air [resources, in air]: 1.1985 kg; lognormal SD95 1.3001
  (4,1,1,1,1,5,BU:1.05);

## Emissions to nature
All rows: lognormal SD95 1.8752
- Nitrogen oxides [emissions to air, low. pop.]: 2.9538e-5 kg
  (4,1,1,1,4,5,BU:1.5);
- Dinitrogen monoxide [emissions to air, low. pop.]: 0.00014065 kg
  (4,1,1,1,4,5,BU:1.5);
- Nitrate [emissions to water, groundwater]: 0.020154 kg
  (4,1,1,1,4,5,BU:1.5);
- Phosphorus [emissions to water, groundwater]: 1.0769e-5 kg
  (4,1,1,1,4,5,BU:1.5);
- Water, CH [emissions to air, unspecified]: 3.2308e-5 kg
  (4,1,1,1,4,5,BU:1.5);
- Water, CH [emissions to water, unspecified]: 0.012892 m3
  (4,1,1,1,4,5,BU:1.5);
- Phosphorus [emissions to water, river]: 0.00011343 kg
  (4,1,1,1,4,5,BU:1.5);

## Sampling procedure
Literature

## Extrapolations
Data for fiel work activities were exrapolated from fava beans

## Sources
- Kaegi T., Glimmann M., Conte F., Roberts G., 2021, 2021 - LCA tomatoes and green beans production - Kaegi, Carbotech on behalf of BAFU, Carbotech AG, Zuerich, CH

## Validation
15.12.2021 \\tsclient\Schreibtisch\WinShare\BAFU Gemuese\2021-12-15\[EcoSpold_Bafu_Gemuese_Green beans organic_CH v1.xlsx]X-Process
