# xx Ammonium chloride from chlorosilane, at plant

Dataset: EcoSpold 1, unit process
Functional unit: 1 kg
Category: material, obsolete / chemicals, obsolete\inorganic, obsolete
Geography: GLO
Time period: 2000-01 to 2006-12
Share of production covered: 100 %
Generated by: Juergen Sutter
accessRestrictedTo: 0
copyright: true

## General comment
The multioutput-process "Chlorosilane amination" delivers the co-products ammonium chloride and hexamethyldisilazane. The allocation is based on stoechiometric calculation.;

## Included processes
Chlorosilane amination including materials, energy uses, infrastructure and emissions.

## Geography
The inventory is modelled for the world..

## Technology
Amination of chlorosilane

## Time period
Time of publications.

## Reference product
- xx Ammonium chloride from chlorosilane, at plant [GLO]: 1 kg
  Global

## Inputs from technosphere
- Heat, natural gas, at industrial furnace 1MW [CH]: 1.91918 MJ; lognormal SD95 1.3001
  (4,5,na,na,na,na); Estimation
- Chemical plant, organics [RER]: 3.8384e-10 p; lognormal SD95 3.0909
  (4,5,na,na,na,na); Estimation
- Ammonia, liquid, at regional storehouse [RER]: 0.19294 kg; lognormal SD95 1.3765
  (4,5,1,1,1,5); Stoechiometric calculation
- Electricity, medium voltage, production ENTSO-E, at grid: 0.31954 kWh; lognormal SD95 1.3001
  (4,5,na,na,na,na); Estimation
- Transport, freight, rail [RER]: 0.60606 tkm; lognormal SD95 2.095
  (4,5,na,na,na,na); Standard distance 600km
- Silicone product, at plant [RER]: 0.81716 kg; lognormal SD95 1.3765
  (4,5,1,1,1,5); Stoechiometric calculation
- Transport, freight, lorry, fleet average [RER]: 0.10101 tkm; lognormal SD95 2.095
  (4,5,na,na,na,na); Standard distance 100km

## Inputs from nature
- Water, cooling, unspecified natural origin/m3 [resources, in water]: 0.02303 m3; lognormal SD95 1.3001
  (4,5,na,na,na,na); Estimation

## Emissions to nature
- Chloride [emissions to water, river]: 0.012712 kg; lognormal SD95 3.0909
  (4,5,na,na,na,na); Estimation
- Ammonia [emissions to air, high. pop.]: 0.00038588 kg; lognormal SD95 1.3713
  (4,5,na,na,na,na); Estimation
- Carbon dioxide, fossil [emissions to air, high. pop.]: 0.043146 kg; lognormal SD95 1.3001
  (4,5,na,na,na,na); Estimation
- Silicon [emissions to water, river]: 0.010169 kg; lognormal SD95 1.3001
  (4,5,na,na,na,na); Estimation
- Heat, waste [emissions to air, high. pop.]: 1.1504 MJ; lognormal SD95 1.3001
  (4,5,na,na,na,na); Calculated from the electricity input
- Chlorosilane, trimethyl- [emissions to air, high. pop.]: 0.0016343 kg; lognormal SD95 1.6169
  (4,5,na,na,na,na); Estimation
- Ammonium, ion [emissions to water, river]: 0.0046306 kg; lognormal SD95 1.6169
  (4,5,na,na,na,na); Estimation
- Water [emissions to water, unspecified]: 21.8785 kg; lognormal SD95 2.5196
  (5,5,5,5,5,BU:1.05); All uncertainty-values set to 5.0 by default. Balance of input water

## Sampling procedure
Literature data

## Extrapolations
Energy consumptions and emissions are estimated. Infrastructure and transports are calculated with standard values.

## Sources
- Sutter J., 2007, 2007 - LCI highly pure chemicals - Sutter, Final report ecoinvent Data v2.0, 19, Swiss Centre for LCI, ETH, Duebendorf and Uster, CH
Sutter, J., 0 (2007) Life Cycle Inventories of Highly Pure Chemicals. Final report ecoinvent Data v2.0. Editors: 0. Volume: 19. Swiss Centre for LCI, ETHZ. Duebendorf and St. Gallen, CH.
Type: Measurement on site
Source: CD-ROM
First author: Sutter, J.
Other authors: 0
Year: 2007
Name of editors: 0
Title of anthology: Final report ecoinvent Data v2.0
Place of publication: Duebendorf and St. Gallen, CH
Publisher: Swiss Centre for LCI, ETHZ
Volume No: 19

## Validation
Proof reading validation: passed.; Other validation: none;
