# xx Samarium europium gadolinium concentrate, 94% rare earth oxide, at plant

Dataset: EcoSpold 1, unit process
Functional unit: 1 kg
Category: material, obsolete / minerals, obsolete
Geography: CN
Time period: 2000-01 to 2005-12
Share of production covered: 45 %
Generated by: Alex Primas
accessRestrictedTo: 0
copyright: true

## General comment
In- and outputs are calculated for rare earth oxide processing with sulphuric acid as used in China. Infrastructure approximated with a chemical plant. Some inputs of auxiliary materials are calculated according to stoechiometry. Rough estimation for energy consumption, solvent use and waste generation.;

## Included processes
The process includes raw materials, processing chemicals and processing energy, emissions to water and wastes. Transport and infrastructure are estimated. The multi output-process "rare earth oxide production from bastnasite" delivers the co-products "cerium concentrate, 60% cerium oxide, at plant", "lanthanum oxide, at plant", "neodymium oxide, at plant","praseodymium oxide, at plant", "samarium europium gadolinium concentrate 94% rare earth oxide, at plant". The revenue is used as allocation scheme.

## Technology
Process includes roasting and cracking of the rare earth concentrate with 98% sulphuric acid at 500°C in a rotary kiln. For the following separation of the different rare earth oxides solvent extraction (SX) is used. The obtained rare earth oxide product has a purity of up to 99.9%.

## Reference product
- xx Samarium europium gadolinium concentrate, 94% rare earth oxide, at plant [CN]: 1 kg
  CHINA

## Inputs from technosphere
- Disposal, sulfidic tailings, off-site [GLO]: 7.683 kg; lognormal SD95 1.4797
  (4,5,3,5,3,5); estimated process for solid wastes
- Transport, freight, rail [RER]: 16.6011 tkm; lognormal SD95 2.095
  (4,5,nA,nA,nA,nA); standard distances used
- Electricity, medium voltage, at grid [CN]: 1.365 kWh; lognormal SD95 2.3738
  (4,5,5,3,5,5); estimation data from oil extraction
- Kerosene, at refinery [RER]: 7.8 kg; lognormal SD95 1.4797
  (4,5,3,5,3,5); estimation on solvent use
- Transport, freight, lorry, fleet average [RER]: 3.0225 tkm; lognormal SD95 2.095
  (4,5,nA,nA,nA,nA); standard distances used
- Chemical plant, organics [RER]: 2.691e-8 p; lognormal SD95 3.1835
  (4,5,2,2,3,5); chemical plant used as proxy
- Chemicals organic, at plant [GLO]: 6.045 kg; lognormal SD95 1.4797
  (4,5,3,5,3,5); estimation on solvent use
- Hydrochloric acid, 30% in H2O, at plant [RER]: 1.755 kg; lognormal SD95 1.4447
  (4,5,nA,nA,3,5); stoechiometric calculated value
- Sulphuric acid, liquid, at plant [RER]: 5.07 kg; lognormal SD95 1.4447
  (4,5,nA,nA,3,5); stoechiometric calculated value
- Disposal, solvents mixture, 16.5% water, to hazardous waste incineration [CH]: 11.7 kg; lognormal SD95 1.4797
  (4,5,3,5,3,5); estimated input and process route
- Rare earth concentrate, 70% REO, from bastnasite, at beneficiation [CN]: 1.59 kg; lognormal SD95 1.0907
  (2,2,1,1,1,3); input 90% yield assumed
- Heavy fuel oil, burned in industrial furnace 1MW, non-modulating [RER]: 5.733 MJ; lognormal SD95 1.691
  (4,5,3,3,4,5); estimation based on phosphoric acid production
- Sodium hydroxide, 50% in H2O, production mix, at plant [RER]: 2.73 kg; lognormal SD95 1.4447
  (4,5,nA,nA,3,5); stoechiometric calculated value

## Emissions to nature
- Nickel [emissions to water, river]: 4.1438e-6 kg; lognormal SD95 5.3933
  (3,5,3,3,4,5); data only from one source
- Hydrogen fluoride [emissions to air, low. pop.]: 0.02106 kg; lognormal SD95 1.7251
  (4,5,nA,nA,3,5); calculated from input, assumed emission control
- Chloride [emissions to water, river]: 0.023964 kg; lognormal SD95 3.3428
  (3,5,3,3,4,5); data only from one source
- Antimony [emissions to water, river]: 1.8415e-5 kg; lognormal SD95 5.3933
  (3,5,3,3,4,5); data only from one source
- Manganese [emissions to water, river]: 0.00034479 kg; lognormal SD95 5.3933
  (3,5,3,3,4,5); data only from one source
- TOC, Total Organic Carbon [emissions to water, river]: 0.00018095 kg; lognormal SD95 1.9028
  (3,5,3,3,4,5); data only from one source
- Magnesium [emissions to water, river]: 0.0071109 kg; lognormal SD95 5.3933
  (3,5,3,3,4,5); data only from one source
- Chromium [emissions to water, river]: 9.6135e-7 kg; lognormal SD95 3.3428
  (3,5,3,3,4,5); data only from one source
- Thorium-232 [emissions to water, river]: 0.39753 kBq; lognormal SD95 3.5931
  (4,5,5,3,4,5); estimation, high uncertainty
- Beryllium [emissions to water, river]: 1.8233e-7 kg; lognormal SD95 5.3933
  (3,5,3,3,4,5); data only from one source
- Iron [emissions to water, river]: 3.3863e-5 kg; lognormal SD95 5.3933
  (3,5,3,3,4,5); data only from one source
- Cobalt [emissions to water, river]: 9.8288e-6 kg; lognormal SD95 3.3428
  (3,5,3,3,4,5); data only from one source
- Sulfide [emissions to water, river]: 5.6355e-7 kg; lognormal SD95 1.9028
  (3,5,3,3,4,5); data only from one source
- Carbon dioxide, fossil [emissions to air, low. pop.]: 3.3345 kg; lognormal SD95 1.4447
  (4,5,nA,nA,3,5); calculated from input
- Selenium [emissions to water, river]: 1.6741e-6 kg; lognormal SD95 5.3933
  (3,5,3,3,4,5); data only from one source
- Lead [emissions to water, river]: 8.3207e-6 kg; lognormal SD95 5.3933
  (3,5,3,3,4,5); data only from one source
- Radium-226 [emissions to water, river]: 0.078566 kBq; lognormal SD95 3.5931
  (4,5,5,3,4,5); estimation, high uncertainty
- Mercury [emissions to water, river]: 8.2875e-10 kg; lognormal SD95 5.3933
  (3,5,3,3,4,5); data only from one source
- Thallium [emissions to water, river]: 8.2875e-6 kg; lognormal SD95 5.3933
  (3,5,3,3,4,5); data only from one source
- Heat, waste [emissions to air, low. pop.]: 4.914 MJ; lognormal SD95 1.691
  (4,5,3,3,4,5); calculated from inputs
- Silver [emissions to water, river]: 1.7238e-6 kg; lognormal SD95 5.3933
  (3,5,3,3,4,5); data only from one source
- Sulfate [emissions to water, river]: 0.0035918 kg; lognormal SD95 1.9028
  (3,5,3,3,4,5); data only from one source
- Fluoride [emissions to water, river]: 5.0057e-5 kg; lognormal SD95 1.9028
  (3,5,3,3,4,5); data only from one source
- Sulfur dioxide [emissions to air, low. pop.]: 0.00351 kg; lognormal SD95 1.4447
  (4,5,nA,nA,3,5); calculated from input, assumed emission control
- Copper [emissions to water, river]: 3.6465e-6 kg; lognormal SD95 3.3428
  (3,5,3,3,4,5); data only from one source
- Molybdenum [emissions to water, river]: 1.6575e-6 kg; lognormal SD95 5.3933
  (3,5,3,3,4,5); data only from one source
- Arsenic [emissions to water, river]: 1.6741e-6 kg; lognormal SD95 5.3933
  (3,5,3,3,4,5); data only from one source
- Aluminium [emissions to water, river]: 0.00011897 kg; lognormal SD95 5.3933
  (3,5,3,3,4,5); data only from one source
- Uranium-238 [emissions to water, river]: 0.0010528 kBq; lognormal SD95 3.5931
  (4,5,5,3,4,5); estimation, high uncertainty
- Barium [emissions to water, river]: 1.7735e-6 kg; lognormal SD95 5.3933
  (3,5,3,3,4,5); data only from one source
- Cadmium [emissions to water, river]: 1.7901e-7 kg; lognormal SD95 3.3428
  (3,5,3,3,4,5); data only from one source
- Suspended solids, unspecified [emissions to water, river]: 0.015713 kg; lognormal SD95 1.9028
  (3,5,3,3,4,5); data only from one source
- Vanadium [emissions to water, river]: 1.6575e-6 kg; lognormal SD95 5.3933
  (3,5,3,3,4,5); data only from one source
- Cyanide [emissions to water, river]: 1.4918e-7 kg; lognormal SD95 3.3428
  (3,5,3,3,4,5); data only from one source
- Zinc [emissions to water, river]: 2.6852e-5 kg; lognormal SD95 5.3933
  (3,5,3,3,4,5); data only from one source

## Sampling procedure
based on literature

## Sources
- Althaus H.-J., Chudacoff M., Hellweg S., Hischier R., Jungbluth N., Osses M., Primas A., 2007, 2007 - LCI chemicals - Althaus, Final report ecoinvent data v2.0, 8, Swiss Centre for LCI, Empa - TSL, ETH, ESU-services Ltd., Chudacoff Oekoscience, Duebendorf, CH
Althaus H.-J., Chudacoff M., Hischier R., Jungbluth N., Osses M., Primas A. (2007) Life Cycle Inventories of Chemicals. Final report ecoinvent data v2.0. Volume: 8. Swiss Centre for LCI, Empa - TSL. Dübendorf, CH.
Type: Measurement on site
Source: CD-ROM
First author: Althaus H.-J.
Other authors: Chudacoff M., Hischier R., Jungbluth N., Osses M., Primas A.
Year: 2007
Title of anthology: Final report ecoinvent data v2.0
Place of publication: Dübendorf, CH
Publisher: Swiss Centre for LCI, Empa - TSL
Volume No: 8

## Validation
Proof reading validation: passed; Other validation: none;
