# Hard coal briquette, burned in stove 5-15kW (proj. 210)

Dataset: EcoSpold 1, unit process
Functional unit: 1.03 MJ
Category: energy supply, kbob recommendation / fuels (heating), fossil
Geography: RER
Time period: 2004-01 to 2004-12
Generated by: Christian Bauer
accessRestrictedTo: 0
copyright: true

## General comment
adapted from ecoinvent v2.0, with modification in order to express the heat as the upper heating value. This dataset is based on the input of fuel with a lower heating value of 31.4 MJ per kg;

## Included processes
House heating. The module describes the combustion process and includes coal transport and ash disposal.

## Geography
German conditions.

## Technology
Average used in early 1990s.

## Reference product
- Hard coal briquette, burned in stove 5-15kW (proj. 210) [RER]: 1.03 MJ

## Inputs from technosphere
- Disposal, hard coal ash, 0% water, to residual material landfill [PL]: 0.0031 kg; lognormal SD95 1.51
  (5,1,2,3,1,3); assumption: no reuse
- Transport, freight, lorry, fleet average [RER]: 0.000793 tkm; lognormal SD95 2.1
  (4,2,1,3,1,5); based on theoretical calculations
- Hard coal briquettes, at plant [RER]: 1 MJ; lognormal SD95 1.22
  (4,2,2,3,1,3); fuel input
- Transport, freight, rail [RER]: 0.0032 tkm; lognormal SD95 2.1
  (4,2,1,3,1,5); based on theoretical calculations
- Transport, barge [RER]: 0.0223 tkm; lognormal SD95 2.1
  (4,2,1,3,1,5); based on theoretical calculations

## Emissions to nature
- Hydrogen chloride [emissions to air, high. pop.]: 2.42e-5 kg; lognormal SD95 1.69
  (4,5,3,3,1,5); from trace element balance; see report for details
- Thorium [emissions to air, high. pop.]: 5.76e-9 kg; lognormal SD95 5.17
  (4,5,3,3,1,5); from trace element balance; see report for details
- Thallium [emissions to air, high. pop.]: 6.32e-9 kg; lognormal SD95 5.17
  (4,5,3,3,1,5); from trace element balance; see report for details
- Tin [emissions to air, high. pop.]: 2.53e-9 kg; lognormal SD95 5.17
  (4,5,3,3,1,5); from trace element balance; see report for details
- Calcium [emissions to air, high. pop.]: 5.04e-6 kg; lognormal SD95 5.17
  (4,5,3,3,1,5); from trace element balance; see report for details
- Particulates, > 2.5 um, and < 10um [emissions to air, high. pop.]: 4e-5 kg; lognormal SD95 2.16
  (4,5,3,3,1,5); total PM and profile estimates
- Particulates, < 2.5 um [emissions to air, high. pop.]: 2e-5 kg; lognormal SD95 3.15
  (4,5,3,3,1,5); total PM and profile estimates
- NMVOC, non-methane volatile organic compounds, unspecified origin [emissions to air, high. pop.]: 1.78e-5 kg; lognormal SD95 1.57
  (2,3,4,3,1,3); total NMVOC and profile estimate
- Toluene [emissions to air, high. pop.]: 1e-6 kg; lognormal SD95 1.57
  (2,3,4,3,1,3); total NMVOC and profile estimate
- Uranium-238 [emissions to air, high. pop.]: 4e-5 kBq; lognormal SD95 5.17
  (4,5,3,3,1,5); from radioactivity of the elements; see report for details
- Boron [emissions to air, high. pop.]: 4.46e-7 kg; lognormal SD95 5.17
  (4,5,3,3,1,5); from trace element balance; see report for details
- Radium-228 [emissions to air, high. pop.]: 0.00026 kBq; lognormal SD95 5.17
  (4,5,3,3,1,5); from radioactivity of the elements; see report for details
- Radon-220 [emissions to air, high. pop.]: 4e-6 kBq; lognormal SD95 5.17
  (4,5,3,3,1,5); from radioactivity of the elements; see report for details
- Ethane [emissions to air, high. pop.]: 1.5e-5 kg; lognormal SD95 1.57
  (2,3,4,3,1,3); total NMVOC and profile estimate
- Carbon monoxide, fossil [emissions to air, high. pop.]: 0.005 kg; lognormal SD95 5.06
  (2,3,4,3,1,3); typical value
- Cobalt [emissions to air, high. pop.]: 1.8e-8 kg; lognormal SD95 5.17
  (4,5,3,3,1,5); from trace element balance; see report for details
- Manganese [emissions to air, high. pop.]: 1.26e-7 kg; lognormal SD95 5.17
  (4,5,3,3,1,5); from trace element balance; see report for details
- Potassium-40 [emissions to air, high. pop.]: 5.4e-5 kBq; lognormal SD95 5.17
  (4,5,3,3,1,5); from radioactivity of the elements; see report for details
- Dioxin, 2,3,7,8 Tetrachlorodibenzo-p- [emissions to air, high. pop.]: 2e-13 kg; lognormal SD95 3.06
  (2,3,4,3,1,3);
- Zinc [emissions to air, high. pop.]: 6.3e-7 kg; lognormal SD95 5.17
  (4,5,3,3,1,5); from trace element balance; see report for details
- Hydrogen fluoride [emissions to air, high. pop.]: 1.42e-6 kg; lognormal SD95 1.69
  (4,5,3,3,1,5); from trace element balance; see report for details
- Dinitrogen monoxide [emissions to air, high. pop.]: 1.5e-6 kg; lognormal SD95 1.57
  (2,3,4,3,1,3); typical value
- Beryllium [emissions to air, high. pop.]: 5.04e-9 kg; lognormal SD95 5.17
  (4,5,3,3,1,5); from trace element balance; see report for details
- Mercury [emissions to air, high. pop.]: 2.67e-9 kg; lognormal SD95 5.17
  (4,5,3,3,1,5); from trace element balance; see report for details
- Uranium [emissions to air, high. pop.]: 7.2e-9 kg; lognormal SD95 5.17
  (4,5,3,3,1,5); from trace element balance; see report for details
- Radium-226 [emissions to air, high. pop.]: 4.8e-5 kBq; lognormal SD95 5.17
  (4,5,3,3,1,5); from radioactivity of the elements; see report for details
- Hydrocarbons, aliphatic, alkanes, unspecified [emissions to air, high. pop.]: 5e-6 kg; lognormal SD95 1.57
  (2,3,4,3,1,3); total NMVOC and profile estimate
- Chromium [emissions to air, high. pop.]: 3.56e-8 kg; lognormal SD95 5.17
  (4,5,3,3,1,5); from trace element balance; see report for details
- Ethyne [emissions to air, high. pop.]: 5e-6 kg; lognormal SD95 1.57
  (2,3,4,3,1,3); total NMVOC and profile estimate
- Scandium [emissions to air, high. pop.]: 5.04e-9 kg; lognormal SD95 5.17
  (4,5,3,3,1,5); from trace element balance; see report for details
- Ethene [emissions to air, high. pop.]: 3e-5 kg; lognormal SD95 1.57
  (2,3,4,3,1,3); total NMVOC and profile estimate
- Xylene [emissions to air, high. pop.]: 1e-6 kg; lognormal SD95 1.57
  (2,3,4,3,1,3); total NMVOC and profile estimate
- Aluminium [emissions to air, high. pop.]: 4.28e-5 kg; lognormal SD95 5.17
  (4,5,3,3,1,5); from trace element balance; see report for details
- Phosphorus [emissions to air, high. pop.]: 2.53e-7 kg; lognormal SD95 5.17
  (4,5,3,3,1,5); from trace element balance; see report for details
- Lead [emissions to air, high. pop.]: 4.32e-7 kg; lognormal SD95 5.17
  (4,5,3,3,1,5); from trace element balance; see report for details
- Sodium [emissions to air, high. pop.]: 2.53e-6 kg; lognormal SD95 5.17
  (4,5,3,3,1,5); from trace element balance; see report for details
- Silicon [emissions to air, high. pop.]: 6.32e-5 kg; lognormal SD95 5.17
  (4,5,3,3,1,5); from trace element balance; see report for details
- Iron [emissions to air, high. pop.]: 1.77e-5 kg; lognormal SD95 5.17
  (4,5,3,3,1,5); from trace element balance; see report for details
- Arsenic [emissions to air, high. pop.]: 1e-7 kg; lognormal SD95 5.17
  (4,5,3,3,1,5); from trace element balance; see report for details
- Thorium-228 [emissions to air, high. pop.]: 2.2e-5 kBq; lognormal SD95 5.17
  (4,5,3,3,1,5); from radioactivity of the elements; see report for details
- Phenol [emissions to air, high. pop.]: 5e-8 kg; lognormal SD95 1.57
  (2,3,4,3,1,3); total NMVOC and profile estimate
- Formaldehyde [emissions to air, high. pop.]: 1e-7 kg; lognormal SD95 1.57
  (2,3,4,3,1,3); total NMVOC and profile estimate
- Molybdenum [emissions to air, high. pop.]: 1.08e-8 kg; lognormal SD95 5.17
  (4,5,3,3,1,5); from trace element balance; see report for details
- Polonium-210 [emissions to air, high. pop.]: 0.00034 kBq; lognormal SD95 5.17
  (4,5,3,3,1,5); from radioactivity of the elements; see report for details
- Magnesium [emissions to air, high. pop.]: 1.52e-5 kg; lognormal SD95 5.17
  (4,5,3,3,1,5); from trace element balance; see report for details
- Copper [emissions to air, high. pop.]: 6.21e-8 kg; lognormal SD95 5.17
  (4,5,3,3,1,5); from trace element balance; see report for details
- Carbon dioxide, fossil [emissions to air, high. pop.]: 0.0825 kg; lognormal SD95 1.1
  (2,2,2,3,1,3); from carbon balance
- Barium [emissions to air, high. pop.]: 3.6e-7 kg; lognormal SD95 5.17
  (4,5,3,3,1,5); from trace element balance; see report for details
- Radon-222 [emissions to air, high. pop.]: 4e-6 kBq; lognormal SD95 5.17
  (4,5,3,3,1,5); from radioactivity of the elements; see report for details
- Propene [emissions to air, high. pop.]: 5e-6 kg; lognormal SD95 1.57
  (2,3,4,3,1,3); total NMVOC and profile estimate
- Benzo(a)pyrene [emissions to air, high. pop.]: 4e-8 kg; lognormal SD95 1.57
  (2,3,4,3,1,3); total NMVOC and profile estimate
- Lead-210 [emissions to air, high. pop.]: 0.000186 kBq; lognormal SD95 5.17
  (4,5,3,3,1,5); from radioactivity of the elements; see report for details
- Propane [emissions to air, high. pop.]: 1e-5 kg; lognormal SD95 1.57
  (2,3,4,3,1,3); total NMVOC and profile estimate
- Sulfur dioxide [emissions to air, high. pop.]: 0.00045 kg; lognormal SD95 1.4
  (4,5,3,3,1,5); from S-balance
- Nickel [emissions to air, high. pop.]: 1.19e-7 kg; lognormal SD95 5.17
  (4,5,3,3,1,5); from trace element balance; see report for details
- Hydrocarbons, aliphatic, unsaturated [emissions to air, high. pop.]: 5e-6 kg; lognormal SD95 1.57
  (2,3,4,3,1,3); total NMVOC and profile estimate
- Iodine [emissions to air, high. pop.]: 4.55e-8 kg; lognormal SD95 5.17
  (4,5,3,3,1,5); from trace element balance; see report for details
- Hydrogen sulfide [emissions to air, high. pop.]: 1e-6 kg; lognormal SD95 1.57
  (2,3,4,3,1,3); typical value
- Vanadium [emissions to air, high. pop.]: 1.44e-7 kg; lognormal SD95 5.17
  (4,5,3,3,1,5); from trace element balance; see report for details
- Antimony [emissions to air, high. pop.]: 7.2e-9 kg; lognormal SD95 5.17
  (4,5,3,3,1,5); from trace element balance; see report for details
- Potassium [emissions to air, high. pop.]: 5.04e-6 kg; lognormal SD95 5.17
  (4,5,3,3,1,5); from trace element balance; see report for details
- Benzene [emissions to air, high. pop.]: 5e-6 kg; lognormal SD95 1.57
  (2,3,4,3,1,3); total NMVOC and profile estimate
- Bromine [emissions to air, high. pop.]: 3.79e-8 kg; lognormal SD95 5.17
  (4,5,3,3,1,5); from trace element balance; see report for details
- Strontium [emissions to air, high. pop.]: 5.4e-7 kg; lognormal SD95 5.17
  (4,5,3,3,1,5); from trace element balance; see report for details
- Methane, fossil [emissions to air, high. pop.]: 0.0003 kg; lognormal SD95 1.57
  (2,3,4,3,1,3); typical value
- Titanium [emissions to air, high. pop.]: 1.52e-6 kg; lognormal SD95 5.17
  (4,5,3,3,1,5); from trace element balance; see report for details
- Nitrogen oxides [emissions to air, high. pop.]: 5e-5 kg; lognormal SD95 1.57
  (2,3,4,3,1,3); typical value
- Cadmium [emissions to air, high. pop.]: 6.3e-9 kg; lognormal SD95 5.17
  (4,5,3,3,1,5); from trace element balance; see report for details
- Selenium [emissions to air, high. pop.]: 1.8e-8 kg; lognormal SD95 5.17
  (4,5,3,3,1,5); from trace element balance; see report for details
- Particulates, > 10 um [emissions to air, high. pop.]: 0.00014 kg; lognormal SD95 1.69
  (4,5,3,3,1,5); total PM and profile estimates
- Chromium VI [emissions to air, high. pop.]: 3.6e-10 kg; lognormal SD95 4
  based on range of data
- Heat, waste [emissions to air, high. pop.]: 1.03 MJ; lognormal SD95 1.22
  (4,1,1,1,1,3); from theoretical considerations
- Thorium-232 [emissions to air, high. pop.]: 1.4e-5 kBq; lognormal SD95 5.17
  (4,5,3,3,1,5); from radioactivity of the elements; see report for details

## Sampling procedure
literature

## Extrapolations
see Geography/Text

## Sources
- Dones R., Bauer C., Roeder A., 2007, 2007 - Coal - Dones, Sachbilanzen von Energiesystemen. Final report No. 6 ecoinvent data v2.0, 6, Swiss Centre for LCI, PSI, Duebendorf and Villigen, CH
Röder, A., Ch. Bauer, R. Dones (2007) Kohle. Sachbilanzen von Energiesystemen. Final report No. 6 ecoinvent data v2.0. Editors: Dones R.. Volume: 6. Swiss Centre for LCI, PSI. Dübendorf and Villigen, CH.
Type: Measurement on site
Source: CD-ROM
First author: Röder, A.
Other authors: Ch. Bauer, R. Dones
Year: 2007
Name of editors: Dones R.
Title of anthology: Sachbilanzen von Energiesystemen. Final report No. 6 ecoinvent data v2.0
Place of publication: Dübendorf and Villigen, CH
Publisher: Swiss Centre for LCI, PSI
Volume No: 6

## Validation
Proof reading validation: passed; Other validation: none;
