# Strawberry seedling, organic, for planting, in unheated greenhouse

Dataset: EcoSpold 1, unit process
Functional unit: 1 p
Category: agricultural / agricultural means of production\seed
Geography: RER
Time period: 2017-01 to 2020-12
Generated by: Tanja Laube
accessRestrictedTo: 0
copyright: true

## General comment
This inventory refers to 1 strawberry seedling.

## Geography
The inventory is modelled for Europe

## Reference product
- Strawberry seedling, organic, for planting, in unheated greenhouse [RER]: 1 p

## Inputs from technosphere
- Electricity, low voltage, production ENTSO-E, at grid: 0.0001224 kWh; lognormal SD95 1.6906
  (4,4,4,2,4,5,BU:1.05); ;
- Plastic tunnel, type almeria [ES]: 7.6923e-7 m2a; lognormal SD95 3.37589
  (4,4,4,2,4,5,BU:3); ;
- Installation for drip irrigation [CH]: 0.00051 m3; lognormal SD95 3.37589
  (4,4,4,2,4,5,BU:3); ;

## Inputs from nature
- Water, river [resources, in water]: 0.00051 m3; lognormal SD95 1.6906
  (4,4,4,2,4,5,BU:1.05); ;
- Peat [resources, biotic]: 0.0003 kg; lognormal SD95 1.6906
  (4,4,4,2,4,5,BU:1.05); ;

## Emissions to nature
- Water [emissions to water, river]: 4.59e-7 kg; lognormal SD95 1.93789
  (4,4,4,2,4,5,BU:1.5); ;
- Water [emissions to water, groundwater]: 1.02e-5 kg; lognormal SD95 1.93789
  (4,4,4,2,4,5,BU:1.5); ;
- Ammonia [emissions to air, low. pop.]: 1.27e-5 kg; lognormal SD95 1.7396
  (4,4,4,2,4,5,BU:1.2); ;
- Water [emissions to air, low. pop.]: 4.59e-7 kg; lognormal SD95 1.93789
  (4,4,4,2,4,5,BU:1.5); ;
- Dinitrogen monoxide [emissions to air, low. pop.]: 9.717e-6 kg; lognormal SD95 1.93789
  (4,4,4,2,4,5,BU:1.5); ;
- Nitrogen oxides [emissions to air, low. pop.]: 1.53e-5 kg; lognormal SD95 1.93789
  (4,4,4,2,4,5,BU:1.5); ;
- Water [emissions to water, unspecified]: 0.4845 kg; lognormal SD95 2.5196
  (5,5,5,5,5,BU:1.05); All uncertainty-values set to 5.0 by default. Balance of input water

## Sampling procedure
The data is based on literature and expert judgements.

## Sources
- Kaegi T., Conte F., Laube T., Roberts G., 2022, 2022 - LCA strawberry and asparagus production - Kaegi, Carbotech on behalf of BAFU, Carbotech AG, Zuerich, CH

## Validation
16.08.2022 \\tsclient\Schreibtisch\WinShare\BAFU Gemuese\Spargeln und Erdbeeren\[EcoSpold_Bafu_Gemuese_Strawberry seedling_organic_unheated greenhouse_RER.xlsx]X-Process
