# Disposal, ash coffee ground pellets, to sanitary landfill

Dataset: EcoSpold 1, unit process
Functional unit: 1 kg
Category: landfill / sanitary landfill
Geography: CH
Time period: 2008-01 to 2008-12
Generated by: Gabor Doka
accessRestrictedTo: 0
copyright: true

## General comment
Inventoried waste contains . waste composition (wet, in ppm): H2O n.a.; O 401500; H n.a.; C 12000; S 9200; N n.a.; P 9800; B n.a.; Cl 3200; Br n.a.; F n.a.; I n.a.; Ag n.a.; As 6.7; Ba n.a.; Cd 9.9055; Co 34.483; Cr 31.997; Cu 1020.7; Hg n.a.; Mn 2172.4; Mo 3.7; Ni 65.2; Pb 156.72; Sb 206.9; Se n.a.; Sn 1172.4; V 34.483; Zn 2777.2; Be n.a.; Sc n.a.; Sr n.a.; Ti 1380; Tl n.a.; W n.a.; Si 82600; Fe 22800; Ca 284000; Al 79310; K 54500; Mg 32100; Na n.a.; Share of carbon in waste that is biogenic 100%. Overall degradability of waste during 100 years: 5%.;;

## Included processes
Waste-specific short-term emissions to air via landfill gas incineration and landfill leachate. Burdens from treatment of short-term leachate (0-100a) in wastewater treatment plant (including WWTP sludge disposal in municipal incinerator). Long-term emissions from landfill to groundwater (after base lining failure).

## Geography
Technology encountered in Switzerland in 2000. Landfill includes base seal, leachate collection system, treatment of leachate in municipal wastewater treatment plant.

## Technology
Swiss municipal sanitary landfill for biogenic or untreated municipal waste ("reactive organic landfill"). Landfill gas and leachate collection system. Recultivation and monitoring for 150 years after closure.

## Reference product
- Disposal, ash coffee ground pellets, to sanitary landfill [CH]: 1 kg
  SWITZERLAND

## Inputs from technosphere
- Process-specific burdens, municipal waste incineration [CH]: 0.002471 kg; lognormal SD95 2.2048
  burden from incineration of sludge from wastewater treatment of the short-term leachate (0-100a).
- Process-specific burdens, sanitary landfill [CH]: 1.0001 kg; lognormal SD95 1
  demands per kilogram waste. uncertainty is heeded in the module
- Sodium hydroxide, 50% in H2O, production mix, at plant [RER]: 4.3585e-8 kg; lognormal SD95 6.9502
  burden from incineration of sludge from wastewater treatment of the short-term leachate (0-100a). uncertainty is calculated from uncertainties in waste composition and transfer coefficients in incinerator and uncertainty of waste decomposition and short-term leaching in sanitary landfill
- Chemicals organic, at plant [GLO]: 1.3324e-7 kg; lognormal SD95 13.301
  (same comment as for Sodium hydroxide, 50% in H2O, production mix, at plant)
- Iron (III) chloride, 40% in H2O, at plant [CH]: 0.00017853 kg; lognormal SD95 6.6777
  (same comment as for Sodium hydroxide, 50% in H2O, production mix, at plant)
- Electricity from waste, at municipal waste incineration plant [CH]: 0.00035525 kWh; lognormal SD95 3.0387
  (same comment as for Sodium hydroxide, 50% in H2O, production mix, at plant)
- Disposal, plastics, mixture, 15.3% water, to municipal incineration [CH]: 3.875e-5 kg; lognormal SD95 1.1261
  burden from wastewater treatment of the short-term leachate (0-100a). Uncertainty calculated from unertainty of the waste composition of this waste, uncertainty in waste decomposition and short-term leaching in sanitary landfill
- Process-specific burdens, residual material landfill [CH]: 0.00017248 kg; lognormal SD95 2.3115
  (same comment as for Sodium hydroxide, 50% in H2O, production mix, at plant)
- Iron sulphate, at plant [RER]: 0.00012992 kg; lognormal SD95 6.7223
  (same comment as for Disposal, plastics, mixture, 15.3% water, to municipal incineration)
- Disposal, paper, 11.2% water, to municipal incineration [CH]: 3.875e-5 kg; lognormal SD95 1.1261
  (same comment as for Disposal, plastics, mixture, 15.3% water, to municipal incineration)
- Chemicals inorganic, at plant [GLO]: 7.5928e-9 kg; lognormal SD95 3.526
  (same comment as for Sodium hydroxide, 50% in H2O, production mix, at plant)
- Disposal, cement, hydrated, 0% water, to residual material landfill [CH]: 0.00017248 kg; lognormal SD95 2.3275
  (same comment as for Sodium hydroxide, 50% in H2O, production mix, at plant)
- Transport, freight, rail [RER]: 0.00021447 tkm; lognormal SD95 6.3613
  (same comment as for Sodium hydroxide, 50% in H2O, production mix, at plant)
- Wastewater treatment plant, class 3 [CH]: 1.422e-11 p; lognormal SD95 1.1025
  (same comment as for Disposal, plastics, mixture, 15.3% water, to municipal incineration)
- Hydrochloric acid, 30% in H2O, at plant [RER]: 4.5557e-9 kg; lognormal SD95 3.526
  (same comment as for Sodium hydroxide, 50% in H2O, production mix, at plant)
- Natural gas, burned in boiler modulating >100kW [RER]: 0.0012145 MJ; lognormal SD95 2.2841
  (same comment as for Disposal, plastics, mixture, 15.3% water, to municipal incineration)
- Transport, freight, lorry, 16t-32t gross weight, fleet average [CH]: 0.00012724 tkm; lognormal SD95 2.4737
  (same comment as for Sodium hydroxide, 50% in H2O, production mix, at plant)
- Residual material landfill facility [CH]: 3.5934e-13 p; lognormal SD95 2.3115
  (same comment as for Sodium hydroxide, 50% in H2O, production mix, at plant)
- Aluminium sulphate, powder, at plant [RER]: 3.5112e-5 kg; lognormal SD95 6.7223
  (same comment as for Disposal, plastics, mixture, 15.3% water, to municipal incineration)
- Light fuel oil, burned in boiler 100kW, non-modulating [CH]: 0.00089998 MJ; lognormal SD95 2.2841
  (same comment as for Disposal, plastics, mixture, 15.3% water, to municipal incineration)
- Heat from waste, at municipal waste incineration plant [CH]: 0.0020724 MJ; lognormal SD95 2.2058
  (same comment as for Sodium hydroxide, 50% in H2O, production mix, at plant)
- Sanitary landfill facility [CH]: 5.556e-10 p; lognormal SD95 1
  demands per kilogram waste. uncertainty is heeded in the module
- Slag compartment [CH]: 2.3132e-12 p; lognormal SD95 2.3753
  (same comment as for Sodium hydroxide, 50% in H2O, production mix, at plant)
- Quicklime, milled, packed, at plant [CH]: 7.9021e-9 kg; lognormal SD95 6.9742
  (same comment as for Sodium hydroxide, 50% in H2O, production mix, at plant)
- Cement, unspecified, at plant [CH]: 6.8993e-5 kg; lognormal SD95 2.3275
  (same comment as for Sodium hydroxide, 50% in H2O, production mix, at plant)
- Electricity, low voltage, at grid [CH]: 0.00046905 kWh; lognormal SD95 2.1004
  (same comment as for Disposal, plastics, mixture, 15.3% water, to municipal incineration)
- Municipal waste incineration plant [CH]: 6.1775e-13 p; lognormal SD95 2.2048
  (same comment as for Process-specific burdens, municipal waste incineration)
- Process-specific burdens, slag compartment [CH]: 0.0013012 kg; lognormal SD95 2.3753
  (same comment as for Sodium hydroxide, 50% in H2O, production mix, at plant)
- Sewer grid, class 3 [CH]: 5.4455e-10 km; lognormal SD95 1.1025
  (same comment as for Disposal, plastics, mixture, 15.3% water, to municipal incineration)

## Emissions to nature
- Antimony [emissions to water, groundwater, long-term]: 2.0986e-5 kg; lognormal SD95 19.069
  Emissions from long-term leachate (>100a) directly from MSW landfill and indirectly via incineration of treatement sludge from leachate treatement. Uncertainty calculated depending on waste input and uncertainty of long-term transfer coefficents in landfill.
- Iron [emissions to air, low. pop.]: 3.9146e-9 kg; lognormal SD95 17.607
  burden from direct release or incineration of landfill biogas. Uncertainty calculated from unertainty of the waste composition of this waste, uncertainty in waste decomposition and short-term leaching in sanitary landfill
- Sulfur dioxide [emissions to air, low. pop.]: 6.0031e-5 kg; lognormal SD95 6.5222
  (same comment as for Iron)
- Potassium [emissions to water, river]: 0.0019923 kg; lognormal SD95 3.5273
  Emissions from short-term leachate treatment. Uncertainty calculated depending on waste input and uncertainty of transfer coefficents in landfill and wastewater treatment.
- Aluminium [emissions to air, high. pop.]: 2.9975e-7 kg; lognormal SD95 5.2321
  Emissions from short-term leachate treatment and incineration of resulting sludge. Uncertainty calculated depending on waste input and uncertainty of transfer coefficents in landfill, wastewater treatment and incineration model.
- TOC, Total Organic Carbon [emissions to water, groundwater, long-term]: 0.0029224 kg; lognormal SD95 6.1839
  (same comment as for Antimony)
- Magnesium [emissions to water, groundwater, long-term]: 0.031199 kg; lognormal SD95 2.625
  (same comment as for Antimony)
- Molybdenum [emissions to air, high. pop.]: 1.9216e-11 kg; lognormal SD95 15.487
  (same comment as for Aluminium)
- Cobalt [emissions to water, river]: 2.8129e-7 kg; lognormal SD95 10.78
  (same comment as for Aluminium)
- Carbon dioxide, biogenic [emissions to air, low. pop.]: 0.0015023 kg; lognormal SD95 4.3377
  (same comment as for Iron)
- Nickel [emissions to air, low. pop.]: 4.7382e-11 kg; lognormal SD95 25.465
  (same comment as for Iron)
- Arsenic [emissions to water, river]: 5.3023e-8 kg; lognormal SD95 13.55
  (same comment as for Aluminium)
- Antimony [emissions to air, high. pop.]: 5.3729e-11 kg; lognormal SD95 16.379
  (same comment as for Aluminium)
- NMVOC, non-methane volatile organic compounds, unspecified origin [emissions to air, low. pop.]: 1.6111e-9 kg; lognormal SD95 4.5794
  (same comment as for Iron)
- Aluminium [emissions to water, river]: 1.1905e-5 kg; lognormal SD95 5.2347
  (same comment as for Aluminium)
- COD, Chemical Oxygen Demand [emissions to water, river]: 1.1019e-5 kg; lognormal SD95 7.0462
  (same comment as for Aluminium)
- Calcium [emissions to water, river]: 0.0016683 kg; lognormal SD95 3.8729
  (same comment as for Aluminium)
- Manganese [emissions to air, low. pop.]: 3.1101e-8 kg; lognormal SD95 14.307
  (same comment as for Iron)
- Magnesium [emissions to air, high. pop.]: 1.3379e-7 kg; lognormal SD95 4.1384
  (same comment as for Aluminium)
- Phosphate [emissions to water, river]: 2.9557e-5 kg; lognormal SD95 6.6134
  (same comment as for Aluminium)
- Tin [emissions to water, groundwater, long-term]: 0.0011722 kg; lognormal SD95 4.9328
  (same comment as for Antimony)
- Phosphate [emissions to water, groundwater, long-term]: 0.0002046 kg; lognormal SD95 170.81
  (same comment as for Antimony)
- Particulates, < 2.5 um [emissions to air, low. pop.]: 2.8588e-8 kg; lognormal SD95 6.249
  (same comment as for Iron)
- Chromium [emissions to water, river]: 2.8624e-11 kg; lognormal SD95 15.441
  (same comment as for Aluminium)
- Carbon monoxide, biogenic [emissions to air, high. pop.]: 5.8068e-7 kg; lognormal SD95 3.3773
  (same comment as for Aluminium)
- Zinc [emissions to water, groundwater, long-term]: 0.0022887 kg; lognormal SD95 4.3178
  (same comment as for Antimony)
- Silicon [emissions to air, high. pop.]: 4.518e-7 kg; lognormal SD95 5.397
  (same comment as for Aluminium)
- Zinc [emissions to air, high. pop.]: 7.4248e-11 kg; lognormal SD95 8.4161
  (same comment as for Aluminium)
- Iron [emissions to water, groundwater, long-term]: 0.0016505 kg; lognormal SD95 16.794
  (same comment as for Antimony)
- Copper [emissions to water, river]: 6.4827e-8 kg; lognormal SD95 11.527
  (same comment as for Aluminium)
- Chromium [emissions to air, high. pop.]: 6.6409e-16 kg; lognormal SD95 16.365
  (same comment as for Aluminium)
- Zinc [emissions to air, low. pop.]: 1.4618e-9 kg; lognormal SD95 19.012
  (same comment as for Iron)
- Cobalt [emissions to water, groundwater, long-term]: 3.4167e-5 kg; lognormal SD95 8.091
  (same comment as for Antimony)
- Calcium [emissions to air, high. pop.]: 3.0237e-7 kg; lognormal SD95 4.0673
  (same comment as for Aluminium)
- Lead [emissions to water, river]: 5.0754e-9 kg; lognormal SD95 13.776
  (same comment as for Aluminium)
- Calcium [emissions to air, low. pop.]: 4.6224e-7 kg; lognormal SD95 11.956
  (same comment as for Iron)
- Chromium [emissions to air, low. pop.]: 4.559e-12 kg; lognormal SD95 30.536
  (same comment as for Iron)
- Molybdenum [emissions to water, groundwater, long-term]: 1.4622e-6 kg; lognormal SD95 12.615
  (same comment as for Antimony)
- Manganese [emissions to air, high. pop.]: 3.3361e-13 kg; lognormal SD95 6.47
  (same comment as for Aluminium)
- Aluminium [emissions to air, low. pop.]: 4.9557e-8 kg; lognormal SD95 14.232
  (same comment as for Iron)
- Manganese [emissions to water, river]: 6.3138e-5 kg; lognormal SD95 5.5241
  (same comment as for Aluminium)
- Nickel [emissions to water, river]: 1.1498e-7 kg; lognormal SD95 11.921
  (same comment as for Aluminium)
- Tin [emissions to air, low. pop.]: 8.6357e-11 kg; lognormal SD95 24.051
  (same comment as for Iron)
- Antimony [emissions to water, river]: 7.401e-7 kg; lognormal SD95 9.881
  (same comment as for Aluminium)
- DOC, Dissolved Organic Carbon [emissions to water, groundwater, long-term]: 0.0029224 kg; lognormal SD95 6.1839
  (same comment as for Antimony)
- Copper [emissions to air, high. pop.]: 1.3663e-12 kg; lognormal SD95 12.215
  (same comment as for Aluminium)
- Nickel [emissions to air, high. pop.]: 3.2195e-15 kg; lognormal SD95 13.08
  (same comment as for Aluminium)
- Lead [emissions to air, high. pop.]: 1.527e-12 kg; lognormal SD95 14.369
  (same comment as for Aluminium)
- Magnesium [emissions to water, river]: 0.00089359 kg; lognormal SD95 3.943
  (same comment as for Aluminium)
- DOC, Dissolved Organic Carbon [emissions to water, river]: 2.6764e-6 kg; lognormal SD95 7.0614
  (same comment as for Aluminium)
- Carbon dioxide, biogenic [emissions to air, high. pop.]: 5.0159e-5 kg; lognormal SD95 7.0511
  (same comment as for Aluminium)
- Cadmium [emissions to air, low. pop.]: 5.8099e-10 kg; lognormal SD95 20.699
  (same comment as for Iron)
- Iron [emissions to water, river]: 7.9865e-6 kg; lognormal SD95 7.168
  (same comment as for Aluminium)
- Molybdenum [emissions to air, low. pop.]: 4.8773e-12 kg; lognormal SD95 30.552
  (same comment as for Iron)
- Vanadium [emissions to water, river]: 9.2333e-8 kg; lognormal SD95 12.04
  (same comment as for Aluminium)
- Cobalt [emissions to air, high. pop.]: 8.6655e-15 kg; lognormal SD95 11.92
  (same comment as for Aluminium)
- Hydrogen sulfide [emissions to water, groundwater, long-term]: 0.00065547 kg; lognormal SD95 3.417
  (same comment as for Antimony)
- Zinc [emissions to water, river]: 2.0342e-6 kg; lognormal SD95 7.9125
  (same comment as for Aluminium)
- Arsenic [emissions to air, low. pop.]: 8.4351e-10 kg; lognormal SD95 20.03
  (same comment as for Iron)
- Tin [emissions to air, high. pop.]: 2.6657e-10 kg; lognormal SD95 11.475
  (same comment as for Aluminium)
- Vanadium [emissions to air, low. pop.]: 4.5454e-11 kg; lognormal SD95 25.591
  (same comment as for Iron)
- NMVOC, non-methane volatile organic compounds, unspecified origin [emissions to air, high. pop.]: 4.4619e-10 kg; lognormal SD95 8.308
  (same comment as for Aluminium)
- Methane, biogenic [emissions to air, low. pop.]: 0.00023033 kg; lognormal SD95 4.5794
  (same comment as for Iron)
- Arsenic [emissions to water, groundwater, long-term]: 6.6461e-6 kg; lognormal SD95 9.9426
  (same comment as for Antimony)
- Antimony [emissions to air, low. pop.]: 2.7273e-10 kg; lognormal SD95 22.014
  (same comment as for Iron)
- Vanadium [emissions to air, high. pop.]: 8.9545e-12 kg; lognormal SD95 12.53
  (same comment as for Aluminium)
- Manganese [emissions to water, groundwater, long-term]: 0.0020556 kg; lognormal SD95 4.306
  (same comment as for Antimony)
- Methane, biogenic [emissions to air, high. pop.]: 1.1393e-7 kg; lognormal SD95 6.3199
  (same comment as for Aluminium)
- Sulfate [emissions to water, river]: 0.00063501 kg; lognormal SD95 4.2065
  (same comment as for Potassium)
- Lead [emissions to air, low. pop.]: 1.5391e-11 kg; lognormal SD95 27.695
  (same comment as for Iron)
- Silicon [emissions to water, groundwater, long-term]: 0.0015937 kg; lognormal SD95 55.021
  (same comment as for Antimony)
- Molybdenum [emissions to water, river]: 1.1542e-8 kg; lognormal SD95 15.107
  (same comment as for Aluminium)
- Copper [emissions to water, groundwater, long-term]: 0.0010206 kg; lognormal SD95 5.0445
  (same comment as for Antimony)
- Carbon monoxide, biogenic [emissions to air, low. pop.]: 8.5157e-8 kg; lognormal SD95 8.8232
  (same comment as for Iron)
- Aluminium [emissions to water, groundwater, long-term]: 0.079254 kg; lognormal SD95 2.124
  (same comment as for Antimony)
- Cadmium [emissions to air, high. pop.]: 2.3828e-12 kg; lognormal SD95 13.635
  (same comment as for Aluminium)
- Potassium [emissions to water, groundwater, long-term]: 0.052507 kg; lognormal SD95 2.3309
  (same comment as for Antimony)
- Titanium [emissions to water, river]: 1.7504e-6 kg; lognormal SD95 8.5649
  (same comment as for Aluminium)
- Cadmium [emissions to water, groundwater, long-term]: 9.8182e-6 kg; lognormal SD95 9.5118
  (same comment as for Antimony)
- Heat, waste [emissions to air, high. pop.]: 0.0018015 MJ; lognormal SD95 2.0747
  (same comment as for Sodium hydroxide, 50% in H2O, production mix, at plant)
- Titanium [emissions to water, groundwater, long-term]: 0.0013771 kg; lognormal SD95 4.8003
  (same comment as for Antimony)
- Cadmium [emissions to water, river]: 4.4247e-8 kg; lognormal SD95 13.048
  (same comment as for Aluminium)
- Copper [emissions to air, low. pop.]: 7.1402e-11 kg; lognormal SD95 24.423
  (same comment as for Iron)
- Hydrogen chloride [emissions to air, low. pop.]: 5.8077e-6 kg; lognormal SD95 8.0506
  (same comment as for Iron)
- Nickel [emissions to water, groundwater, long-term]: 6.508e-5 kg; lognormal SD95 7.5166
  (same comment as for Antimony)
- TOC, Total Organic Carbon [emissions to water, river]: 2.7882e-6 kg; lognormal SD95 7.0496
  (same comment as for Aluminium)
- Sulfate [emissions to water, groundwater, long-term]: 0.025145 kg; lognormal SD95 3.417
  (same comment as for Antimony)
- Cobalt [emissions to air, low. pop.]: 1.3854e-10 kg; lognormal SD95 23.373
  (same comment as for Iron)
- BOD5, Biological Oxygen Demand [emissions to water, river]: 3.4683e-6 kg; lognormal SD95 7.0663
  (same comment as for Aluminium)
- Arsenic [emissions to air, high. pop.]: 1.6939e-11 kg; lognormal SD95 13.994
  (same comment as for Aluminium)
- Silicon [emissions to water, river]: 1.2423e-5 kg; lognormal SD95 5.3223
  (same comment as for Aluminium)
- Iron [emissions to air, high. pop.]: 3.8946e-9 kg; lognormal SD95 6.4531
  (same comment as for Aluminium)
- Lead [emissions to water, groundwater, long-term]: 0.00015668 kg; lognormal SD95 6.682
  (same comment as for Antimony)
- Potassium [emissions to air, low. pop.]: 4.9808e-7 kg; lognormal SD95 11.121
  (same comment as for Iron)
- COD, Chemical Oxygen Demand [emissions to water, groundwater, long-term]: 0.0031964 kg; lognormal SD95 6.1837
  (same comment as for Antimony)
- Vanadium [emissions to water, groundwater, long-term]: 1.0005e-5 kg; lognormal SD95 11.421
  (same comment as for Antimony)
- Phosphorus [emissions to air, high. pop.]: 1.7386e-8 kg; lognormal SD95 6.8565
  (same comment as for Aluminium)
- Silicon [emissions to air, low. pop.]: 5.1612e-8 kg; lognormal SD95 14.192
  (same comment as for Iron)
- Calcium [emissions to water, groundwater, long-term]: 0.28231 kg; lognormal SD95 1.5071
  (same comment as for Antimony)
- Tin [emissions to water, river]: 1.4451e-7 kg; lognormal SD95 11.12
  (same comment as for Aluminium)
- Magnesium [emissions to air, low. pop.]: 2.476e-7 kg; lognormal SD95 11.85
  (same comment as for Iron)
- Chloride [emissions to water, river]: 0.00051938 kg; lognormal SD95 3.8055
  (same comment as for Potassium)
- Titanium [emissions to air, low. pop.]: 8.6228e-10 kg; lognormal SD95 19.901
  (same comment as for Iron)
- Chromium VI [emissions to water, groundwater, long-term]: 1.4581e-7 kg; lognormal SD95 328.77
  (same comment as for Antimony)
- Chromium VI [emissions to water, river]: 9.5475e-9 kg; lognormal SD95 15.079
  (same comment as for Aluminium)
- Titanium [emissions to air, high. pop.]: 1.6987e-9 kg; lognormal SD95 8.8574
  (same comment as for Aluminium)
- Heat, waste [emissions to air, low. pop.]: 0.0081699 MJ; lognormal SD95 5.18
  (same comment as for Iron)
- BOD5, Biological Oxygen Demand [emissions to water, groundwater, long-term]: 0.00075671 kg; lognormal SD95 6.1837
  (same comment as for Antimony)
- Chloride [emissions to water, groundwater, long-term]: 0.0027914 kg; lognormal SD95 4.1662
  (same comment as for Antimony)
- Heat, waste [emissions to water, river]: 0.00031949 MJ; lognormal SD95 7.0418
  (same comment as for Sodium hydroxide, 50% in H2O, production mix, at plant)

## Sampling procedure
Landfill model based on observed leachate concentrations in literature. Extrapolated to 60'000 years heeding chemical characteristics. Initial waste composition from various literature sources.

## Uncertainty adjustments
uncertainty of waste input composition data derived from generic formula GSD(c) = N*ln(c)+1. Mean long-term emissions are the emissions until the next glacial period occurs (in 60'000a) and the landfill is eroded. Maximal long-term emissions are the complete emissions of all landfilled material (except Cr). Minimal long-term emissions are derived implicitly from the mean and maximal values assuming a lognormal distribution.

## Sources
- Itten R., Stucki M., Jungbluth N., 2011, 2011 - LCA burning diff. solid biomass substrates - Itten, Project report, 321, ESU-services Ltd., Uster, CH
Itten R.,, Jungbluth N. (2011) Life Cycle Assessment of Burning Different Biomass Substrates. Project report. Volume: 321. ESU-services Ltd.. Uster, CH.
Type: Separate publication
Source: Report
First author: Itten R.,
Other authors: Jungbluth N.
Year: 2011
Title of anthology: Project report
Place of publication: Uster, CH
Publisher: ESU-services Ltd.
Volume No: 321
