# Operation, passenger car, ethanol 5%

Dataset: EcoSpold 1, unit process
Functional unit: 1 km
Category: transport systems / road\operations
Geography: CH
Time period: 2004-01 to 2004-12
Share of production covered: 0 %
Generated by: Natascha Kljun
accessRestrictedTo: 0
copyright: true

## General comment
Average data for the operation of an Euro-3 Swiss passenger car.;

## Included processes
ethanol, 99.7% in H2O, from biomass, at service station, petrol, low-sulphur, at regional storage supplies are included. Direct airborne emissions of gaseous substances, particulate matters and heavy metals are accounted for. Heavy metal emissions to water and to soil are included. Tyre abrasion is included.

## Geography
Data refers to average transport conditions and kilometric performance of different passenger car categories in Switzerland.

## Technology
Euro3

## Reference product
- Operation, passenger car, ethanol 5% [CH]: 1 km
  SWITZERLAND

## Inputs from technosphere
- Ethanol, 99.7% in H2O, from biomass, production BR, at service station [CH]: 0.00335 kg; lognormal SD95 1.22
  (,,,,,); Same as for carbon dioxide. However, value might be much higher since fuel consumption calculated following ecoinvent convention differs from lab values.
- Petrol, at regional storage [CH]: 0.0599 kg; lognormal SD95 1.22
  (same comment as for Ethanol, 99.7% in H2O, from biomass, production BR, at service station)

## Emissions to nature
- Noise, road, passenger car, average [non material emissions, unspecified]: 1 km
- Cadmium [emissions to air, unspecified]: 1.17e-9 kg; lognormal SD95 5.1
  (4,5,1,2,1,1); 14_transports, table 4.33 plus 95% of value in table 4.62
- Nickel [emissions to water, unspecified]: 2.31e-8 kg; lognormal SD95 6
  14_transports, table 4.34
- Sulfur dioxide [emissions to air, unspecified]: 5.99e-6 kg; lognormal SD95 1.22
  (1,3,1,1,1,5); NewEuropeanDrivingCycle, Lehmann 2002
- Carbon dioxide, fossil [emissions to air, unspecified]: 0.189 kg; lognormal SD95 1.22
  (1,3,1,1,1,5); NewEuropeanDrivingCycle, Lehmann 2002
- Cadmium [emissions to water, unspecified]: 2.89e-9 kg; lognormal SD95 6
  14_transports, table 4.34
- Zinc [emissions to soil, unspecified]: 2.32e-6 kg; lognormal SD95 6
  14_transports, table 4.34
- Toluene [emissions to air, unspecified]: 1.03e-5 kg; lognormal SD95 1.56
  (1,3,1,1,1,5); NewEuropeanDrivingCycle, Lehmann 2002
- Copper [emissions to air, unspecified]: 8.66e-8 kg; lognormal SD95 5.1
  (4,5,1,2,1,1); 14_transports, table 4.33 plus 95% of value in table 4.62
- Chromium [emissions to water, unspecified]: 2.6e-8 kg; lognormal SD95 6
  14_transports, table 4.34
- Chromium VI [emissions to air, unspecified]: 4.45e-12 kg; lognormal SD95 5.1
  (4,5,1,2,1,1); 14_transports, table 4.63
- Nickel [emissions to air, unspecified]: 8.95e-9 kg; lognormal SD95 5.1
  (4,5,1,2,1,1); 14_transports, table 4.33 plus 95% of value in table 4.62
- Particulates, > 2.5 um, and < 10um [emissions to air, unspecified]: 1.35e-5 kg; lognormal SD95 2.05
  (2,3,1,1,1,5); NewEuropeanDrivingCycle, Lehmann 2002, ratio particles 14_transports, table 4.61, non-exhaust table 4.23
- Copper [emissions to soil, unspecified]: 4.33e-8 kg; lognormal SD95 6
  14_transports, table 4.34
- Copper [emissions to water, unspecified]: 4.33e-8 kg; lognormal SD95 6
  14_transports, table 4.34
- Methane, biogenic [emissions to air, unspecified]: 1.61e-7 kg; lognormal SD95 1.56
  (1,3,1,1,1,5); NewEuropeanDrivingCycle, Lehmann 2002
- Benzene [emissions to air, unspecified]: 2.3e-6 kg; lognormal SD95 1.56
  (1,3,1,1,1,5); NewEuropeanDrivingCycle, Lehmann 2002
- Chromium [emissions to air, unspecified]: 8.79e-9 kg; lognormal SD95 5.1
  (4,5,1,2,1,1); 14_transports, table 4.33 plus 95% of value in table 4.62
- Chromium [emissions to soil, unspecified]: 2.6e-8 kg; lognormal SD95 6
  14_transports, table 4.34
- Heat, waste [emissions to air, unspecified]: 2.81 MJ; lognormal SD95 1.11
  14_transports, table 4.63
- Xylene [emissions to air, unspecified]: 9.84e-6 kg; lognormal SD95 1.56
  (1,3,1,1,1,5); NewEuropeanDrivingCycle, Lehmann 2002
- Carbon monoxide, biogenic [emissions to air, unspecified]: 2.95e-5 kg; lognormal SD95 5.06
  (1,3,1,1,1,5); NewEuropeanDrivingCycle, Lehmann 2002
- Lead [emissions to air, unspecified]: 4.54e-9 kg; lognormal SD95 5.01
  (3,2,1,1,1,1); 14_transports, table 4.33 plus 95% of value in table 4.62
- Methane, fossil [emissions to air, unspecified]: 4.79e-6 kg; lognormal SD95 1.56
  (1,3,1,1,1,5); NewEuropeanDrivingCycle, Lehmann 2002
- Cadmium [emissions to soil, unspecified]: 2.89e-9 kg; lognormal SD95 6
  14_transports, table 4.34
- Selenium [emissions to air, unspecified]: 4.45e-10 kg; lognormal SD95 5.1
  (4,5,1,2,1,1); 14_transports, 95% of value in table 4.62
- Carbon monoxide, fossil [emissions to air, unspecified]: 0.000875 kg; lognormal SD95 5.06
  (1,3,1,1,1,5); NewEuropeanDrivingCycle, Lehmann 2002
- Particulates, > 10 um [emissions to air, unspecified]: 7.81e-5 kg; lognormal SD95 1.57
  (same comment as for Particulates, > 2.5 um, and < 10um)
- Zinc [emissions to air, unspecified]: 6.3e-7 kg; lognormal SD95 5.1
  (4,5,1,2,1,1); 14_transports, table 4.33 plus 95% of value in table 4.62
- Ammonia [emissions to air, unspecified]: 1.9e-5 kg; lognormal SD95 1.31
  (2,1,1,1,3,3); Handbook Emissionfactors V2.1
- Mercury [emissions to air, unspecified]: 3.12e-12 kg; lognormal SD95 5.1
  (4,5,1,2,1,1); 14_transports, 95% of value in table 4.62
- Dinitrogen monoxide [emissions to air, unspecified]: 2.57e-6 kg; lognormal SD95 1.56
  (1,3,1,1,1,5); NewEuropeanDrivingCycle, Lehmann 2002
- Carbon dioxide, biogenic [emissions to air, unspecified]: 0.00636 kg; lognormal SD95 1.22
  (1,3,1,1,1,5); NewEuropeanDrivingCycle, Lehmann 2002
- Zinc [emissions to water, unspecified]: 2.32e-6 kg; lognormal SD95 6
  14_transports, table 4.34
- Lead [emissions to water, unspecified]: 1.44e-8 kg; lognormal SD95 6
  14_transports, table 4.34
- Particulates, < 2.5 um [emissions to air, unspecified]: 8.46e-6 kg; lognormal SD95 3.05
  (same comment as for Particulates, > 2.5 um, and < 10um)
- NMVOC, non-methane volatile organic compounds, unspecified origin [emissions to air, unspecified]: 0.000111 kg; lognormal SD95 1.56
  (1,3,1,1,1,5); NewEuropeanDrivingCycle, Lehmann 2002
- Nickel [emissions to soil, unspecified]: 2.31e-8 kg; lognormal SD95 6
  14_transports, table 4.34
- Nitrogen oxides [emissions to air, unspecified]: 5.84e-5 kg; lognormal SD95 1.56
  (1,3,1,1,1,5); NewEuropeanDrivingCycle, Lehmann 2002
- Lead [emissions to soil, unspecified]: 1.44e-8 kg; lognormal SD95 6
  14_transports, table 4.34
- PAH, polycyclic aromatic hydrocarbons [emissions to air, unspecified]: 3.18e-9 kg; lognormal SD95 3.05
  (1,3,1,1,1,5); NewEuropeanDrivingCycle, Lehmann 2002

## Sampling procedure
National statistics, data from technical institutions and literature data.

## Sources
- Jungbluth N., Chudacoff M., Dauriat A., Dinkel F., Doka G., Faist Emmenegger M., Gnansounou E., Kljun N., Spielmann M., Stettler C., Sutter J., 2007, 2007 - LCI bioenergy - Jungbluth, Final report ecoinvent data v2.0, 17, Swiss Centre for LCI, ESU-services Ltd., Duebendorf and Uster, CH
Jungbluth N., Chudacoff M., Dauriat A., Dinkel F., Doka G., Faist Emmenegger M., Gnansounou E., Kljun N., Spielmann M., Stettler C., Sutter J. (2007) Life Cycle Inventories of Bioenergy. Final report ecoinvent data v2.0. Volume: 17. Swiss Centre for LCI, ESU. Duebendorf and Uster, CH.
Type: Measurement on site
Source: CD-ROM
First author: Jungbluth N.
Other authors: Chudacoff M., Dauriat A., Dinkel F., Doka G., Faist Emmenegger M., Gnansounou E., Kljun N., Spielmann M., Stettler C., Sutter J.
Year: 2007
Title of anthology: Final report ecoinvent data v2.0
Place of publication: Duebendorf and Uster, CH
Publisher: Swiss Centre for LCI, ESU
Volume No: 17

## Validation
Proof reading validation: Passed.; Other validation: none;
