# MG-silicon, at plant

Dataset: EcoSpold 1, unit process
Functional unit: 1 kg
Category: metals / extraction
Geography: APAC
Time period: 1990-01 to 1992-12
Production volume: 1'000'000t world wide production in 2000.
Share of production covered: 0 %
Generated by: Philippe Stolz
accessRestrictedTo: 0
copyright: true

## General comment
MG-silicon with a purity of 99%. Used for the production of aluminium compounds, silicones and semiconductors. For the use in semiconductors further purification is necessary.;
CAS number: 7440-21-3;
Formula: Si;
Synonyms: metal grade silicon;

## Included processes
Gate to gate inventory for production of MG-silicon from silica sand including materials, energy use, wastes and air emissions. Emissions to water are not available.

## Geography
Generic production efforts with specific electricity mixes.

## Technology
Modern technology, waste heat is partly recovered and used for electricity generation and/or district heating.

## Time period
Time of investigation

## Reference product
- MG-silicon, at plant [APAC]: 1 kg

## Inputs from technosphere
- Petroleum coke, at refinery [RER]: 0.5 kg; lognormal SD95 1.2238
  (2,2,4,1,1,3); Literature
- Graphite, at plant [RER]: 0.1 kg; lognormal SD95 1.2238
  (2,2,4,1,1,3); Literature, graphite electrodes
- Charcoal, at plant [GLO]: 0.17 kg; lognormal SD95 1.2238
  (2,2,4,1,1,3); Literature
- Wood chips, production mix, wet, measured as dry mass, at forest road & at sawmill [RER]: 0.003253 kg; lognormal SD95 1.2238
  (2,2,4,1,1,3); Literature, 1.35 kg
- Hard coal coke, at plant [RER]: 23.12 MJ; lognormal SD95 1.2238
  (2,2,4,1,1,3); Literature, coal
- Disposal, slag from MG silicon prod., 0% water, to construction waste landfill [CH]: 0.025 kg; lognormal SD95 1.2238
  (2,2,4,1,1,3); Literature
- Transport, transoceanic freight ship [OCE]: 2.55 tkm; lognormal SD95 2.095
  (4,5,na,na,na,na); Charcoal from Asia 15000km
- Silica sand, at plant [DE]: 2.7 kg; lognormal SD95 1.2238
  (2,2,4,1,1,3); Literature
- Transport, freight, lorry, fleet average [RER]: 0.15599 tkm; lognormal SD95 2.095
  (4,5,na,na,na,na); Standard distance 50km, 20km for sand
- Silicone plant [RER]: 1e-11 p; lognormal SD95 3.0947
  (1,2,4,1,3,3); Estimation
- Electricity, medium voltage, at grid [KR]: 11 kWh; lognormal SD95 1.2238
  (2,2,4,1,1,3); Literature, lower range to account for heat recovery
- Oxygen, liquid, at plant [RER]: 0.02 kg; lognormal SD95 1.596
  (3,4,5,3,1,5); Literature
- Transport, freight, rail [RER]: 0.069 tkm; lognormal SD95 2.095
  (4,5,na,na,na,na); Standard distance 100km

## Emissions to nature
- Tin [emissions to air, unspecified]: 7.8519e-9 kg; lognormal SD95 5.3402
  (3,4,5,3,1,5); Literature, in dust
- Mercury [emissions to air, unspecified]: 7.8519e-9 kg; lognormal SD95 5.3402
  (3,4,5,3,1,5); Literature, in dust
- Hydrogen sulfide [emissions to air, unspecified]: 0.0005 kg; lognormal SD95 1.8532
  (3,4,5,3,1,5); Estimation
- Nitrogen oxides [emissions to air, unspecified]: 0.0097432 kg; lognormal SD95 1.5805
  (3,2,4,1,1,3); Calculation based on environmental report
- Carbon monoxide, fossil [emissions to air, high. pop.]: 0.0013797 kg; lognormal SD95 5.3402
  (3,4,5,3,1,5); Literature
- Arsenic [emissions to air, unspecified]: 9.4223e-9 kg; lognormal SD95 5.3402
  (3,4,5,3,1,5); Literature, in dust
- Heat, waste [emissions to air, unspecified]: 71.267 MJ; lognormal SD95 1.2238
  (2,2,4,1,1,3); Calculation based on fuel and electricity use minus 25 MJ/kg
- Fluorine [emissions to air, low. pop.]: 3.8769e-8 kg; lognormal SD95 1.8532
  (3,4,5,3,1,5); Literature, in dust
- Cyanide [emissions to air, unspecified]: 6.8704e-6 kg; lognormal SD95 1.8532
  (3,4,5,3,1,5); Estimation
- Carbon dioxide, fossil [emissions to air, high. pop.]: 3.5808 kg; lognormal SD95 1.2238
  (2,2,4,1,1,3); Calculation, fossil fuels
- Hydrogen fluoride [emissions to air, unspecified]: 0.0005 kg; lognormal SD95 1.8532
  (3,4,5,3,1,5); Estimation
- NMVOC, non-methane volatile organic compounds, unspecified origin [emissions to air, unspecified]: 9.6e-5 kg; lognormal SD95 1.8532
  (3,4,5,3,1,5); Literature
- Cadmium [emissions to air, unspecified]: 3.1408e-10 kg; lognormal SD95 5.3402
  (3,4,5,3,1,5); Literature, in dust
- Silicon [emissions to air, low. pop.]: 0.0075134 kg; lognormal SD95 5.3402
  (3,4,5,3,1,5); Literature, SiO2 in dust
- Lead [emissions to air, unspecified]: 3.4352e-7 kg; lognormal SD95 5.3402
  (3,4,5,3,1,5); Literature, in dust
- Sodium [emissions to air, low. pop.]: 7.7538e-7 kg; lognormal SD95 5.3402
  (3,4,5,3,1,5); Literature, in dust
- Chromium [emissions to air, unspecified]: 7.8519e-9 kg; lognormal SD95 5.3402
  (3,4,5,3,1,5); Literature, in dust
- Particulates, > 10 um [emissions to air, unspecified]: 0.0077538 kg; lognormal SD95 1.5805
  (3,2,4,1,1,3); Calculation based on environmental report
- Calcium [emissions to air, low. pop.]: 7.7538e-7 kg; lognormal SD95 5.3402
  (3,4,5,3,1,5); Literature, in dust
- Potassium [emissions to air, low. pop.]: 6.203e-5 kg; lognormal SD95 5.3402
  (3,4,5,3,1,5); Literature, in dust
- Antimony [emissions to air, unspecified]: 7.8519e-9 kg; lognormal SD95 5.3402
  (3,4,5,3,1,5); Literature, in dust
- Boron [emissions to air, low. pop.]: 2.7914e-7 kg; lognormal SD95 5.3402
  (3,4,5,3,1,5); Literature, in dust
- Sulfur dioxide [emissions to air, unspecified]: 0.012241 kg; lognormal SD95 1.2435
  (3,2,4,1,1,3); Calculation based on environmental report
- Iron [emissions to air, low. pop.]: 3.8769e-6 kg; lognormal SD95 5.3402
  (3,4,5,3,1,5); Literature, in dust
- Aluminium [emissions to air, low. pop.]: 1.5508e-6 kg; lognormal SD95 5.3402
  (3,4,5,3,1,5); Literature, in dust
- Chlorine [emissions to air, high. pop.]: 7.8519e-8 kg; lognormal SD95 1.8532
  (3,4,5,3,1,5); Literature
- Carbon monoxide, biogenic [emissions to air, high. pop.]: 0.00062027 kg; lognormal SD95 5.3402
  (3,4,5,3,1,5); Literature
- Carbon dioxide, biogenic [emissions to air, high. pop.]: 1.6098 kg; lognormal SD95 1.2238
  (2,2,4,1,1,3); Calculation, biogenic fuels

## Sampling procedure
Publication of plant specific data in a European survey.

## Extrapolations
Air emissions of different pollutants are extrapolated from environmental reports. Extrapolation of European LCI inventory data by changing the consumed electricity mix to the South Korean electricity mix.

## Sources
- Frischknecht R., Itten R., Sinha P., de Wild-Scholten M., Zhank J., 2020, 2015 - LCI and LCA photovoltaic systems - Frischknecht, Project report, 174, IEA PVPS Task 12, Petten, NL
Frischknecht R.,, Stolz P., Sinha P., de Wild-Scholten M. (2020) Life Cycle Inventories and Life Cycle Assessments of Photovoltaic Systems. Project report. Volume: 174. IEA PVPS Task 12.
Type: Separate publication
Source: Report
First author: Frischknecht R.,
Other authors: Stolz P., Sinha P., de Wild-Scholten M.
Year: 2020
Title of anthology: Project report
Publisher: IEA PVPS Task 12
Volume No: 174
Original title: Life Cycle Inventories and Life Cycle Assessments of Photovoltaic Systems

## Validation
Proof reading validation: 30.09.2020; Other validation: G:\Projekte laufend\174 Photovoltaic, IEA Task 12\2017 Global supply chain\EcoSpold\[174-photovoltaics-global-supply-chain-v2.5.xlsx]X-Process;
