# Energy-saving bulb, 11W, incl. integrated adapter, at plant

Dataset: EcoSpold 1, unit process, infrastructure
Functional unit: 1 p
Category: private consumption / lighting
Geography: RER
Time period: 2000-01 to 2000-12
Share of production covered: 0 %
Generated by: Matthias Stucki
accessRestrictedTo: 0
copyright: true

## General comment
An energy saving lamp uses the same principle as a fluorescence or neon (TL) tube. Mercury gas in a partially vacuum tube emits UV light when electrical current is sent trough the tube. A convert on the inside the tube converts the light into the visible spectrum. Energy saving lamps need an adaptor containing the electric swtiches. Energy saving lamps have a much longer life time than normal light bulbs (6-8000 hrs compared to 1000 hrs). Note that when comparing light bulbs with energy saving lamps they should be compared on the basis of the amount of light produced, expressed in lumen. On average a lamp produces aroung 600 lumen. Inventory includes production, production waste, packaging, transport, and waste treatment of the full product.
Technology: unknown
Version: 1

0.0
Production volume: unknown
Local category: Privater Konsum
Local subcategory: Beleuchtung

## Included processes
Light bulb SL11 (E-saving) ETH (11W energy saving lamp (8kh) with ARCO-Adapter (30kh), without energy use) ,

## Reference product
- Energy-saving bulb, 11W, incl. integrated adapter, at plant [RER]: 1 p
  Europe

## Inputs from technosphere
- Cerium concentrate, 60% cerium oxide, at plant [CN]: 6.856e-5 kg; lognormal SD95 1.05
  (1,1,1,1,1,1,BU:1.05);
- Lead, at regional storage [RER]: 0.000144 kg; lognormal SD95 1.05
  (1,1,1,1,1,1,BU:1.05);
- Polyvinylchloride, at regional storage [RER]: 0.000912 kg; lognormal SD95 1.05
  (1,1,1,1,1,1,BU:1.05);
- Polyester resin, unsaturated, at plant [RER]: 0.0008637 kg; lognormal SD95 1.05
  (1,1,1,1,1,1,BU:1.05);
- Alkyd paint, white, 60% in H2O, at plant [RER]: 0.00024 kg; lognormal SD95 1.05
  (1,1,1,1,1,1,BU:1.05);
- Polyurethane, flexible foam, at plant [RER]: 0.0018 kg; lognormal SD95 1.05
  (1,1,1,1,1,1,BU:1.05);
- Polycarbonate, at plant [RER]: 0.00141 kg; lognormal SD95 1.05
  (1,1,1,1,1,1,BU:1.05);
- Disposal, packaging cardboard, 19.6% water, to municipal incineration [CH]: 0.013 kg; lognormal SD95 1.05
  (1,1,1,1,1,1,BU:1.05);
- Chromium, at regional storage [RER]: 0.0001 kg; lognormal SD95 1.05
  (1,1,1,1,1,1,BU:1.05);
- Argon, liquid, at plant [RER]: 2.19e-7 kg; lognormal SD95 1.05
  (1,1,1,1,1,1,BU:1.05);
- Heat, natural gas, at industrial furnace 1MW [CH]: 7.6 MJ; lognormal SD95 1.05
  (1,1,1,1,1,1,BU:1.05);
- Aluminium, primary, at plant [RER]: 0.002 kg; lognormal SD95 1.05
  (1,1,1,1,1,1,BU:1.05);
- Water, decarbonised, at plant [RER]: 6.7 kg; lognormal SD95 1.05
  (1,1,1,1,1,1,BU:1.05);
- Hydrochloric acid, 30% in H2O, at plant [RER]: 1e-6 kg; lognormal SD95 1.05
  (1,1,1,1,1,1,BU:1.05);
- Disposal, glass, 0% water, to construction waste landfill [CH]: 0.00161 kg; lognormal SD95 1.05
  (1,1,1,1,1,1,BU:1.05);
- Antimony, at refinery [CN]: 3.574e-5 kg; lognormal SD95 1.05
  (1,1,1,1,1,1,BU:1.05);
- Disposal, plastics, mixture, 15.3% water, to municipal incineration [CH]: 0.000792 kg; lognormal SD95 1.05
  (1,1,1,1,1,1,BU:1.05);
- Ceramic tiles, at regional storage [CH]: 0.0001 kg; lognormal SD95 1.05
  (1,1,1,1,1,1,BU:1.05);
- Tin, at regional storage [RER]: 0.000288 kg; lognormal SD95 1.05
  (1,1,1,1,1,1,BU:1.05);
- Mercury, liquid, at plant [GLO]: 9.597e-6 kg; lognormal SD95 1.05
  (1,1,1,1,1,1,BU:1.05);
- MG-silicon, at plant [NO]: 0.0001 kg; lognormal SD95 1.05
  (1,1,1,1,1,1,BU:1.05);
- Heat, light fuel oil, at industrial furnace 1MW [RER]: 7.6 MJ; lognormal SD95 1.05
  (1,1,1,1,1,1,BU:1.05);
- Epoxy resin, liquid, at plant [RER]: 0.0008637 kg; lognormal SD95 1.05
  (1,1,1,1,1,1,BU:1.05);
- Transport, freight, lorry, fleet average [RER]: 0.0704 tkm; lognormal SD95 2
  (1,1,1,1,1,1,BU:2);
- Flat glass, uncoated, at plant [RER]: 0.039 kg; lognormal SD95 1.05
  (1,1,1,1,1,1,BU:1.05);
- Disposal, energy saving bulb, burnable, 0.6% water, to municipal incineration [CH]: 0.056 kg; lognormal SD95 1.05
  (1,1,1,1,1,1,BU:1.05);
- Steel, low-alloyed, at plant [RER]: 0.0045 kg; lognormal SD95 1.05
  (1,1,1,1,1,1,BU:1.05);
- Barite, at plant [RER]: 2e-6 kg; lognormal SD95 1.05
  (1,1,1,1,1,1,BU:1.05);
- Corrugated board, mixed fibre, single wall, at plant [RER]: 0.013 kg; lognormal SD95 1.05
  (1,1,1,1,1,1,BU:1.05);
- Oxygen, liquid, at plant [RER]: 0.0325 kg; lognormal SD95 1.05
  (1,1,1,1,1,1,BU:1.05);
- Nitrogen, liquid, at plant [RER]: 0.0187 kg; lognormal SD95 1.05
  (1,1,1,1,1,1,BU:1.05);
- Transport, freight, rail [RER]: 0.0186 tkm; lognormal SD95 2
  (1,1,1,1,1,1,BU:2);
- Zinc, primary, at regional storage [RER]: 0.0004 kg; lognormal SD95 1.05
  (1,1,1,1,1,1,BU:1.05);
- xx Samarium europium gadolinium concentrate, 94% rare earth oxide, at plant [CN]: 0.0017613 kg; lognormal SD95 1.05
  (1,1,1,1,1,1,BU:1.05); assumed for europium and yttrium
- Electricity, medium voltage, production ENTSO-E, at grid: 0.088889 kWh; lognormal SD95 1.05
  (1,1,1,1,1,1,BU:1.05);
- Nickel, 99.5%, at plant [GLO]: 3e-5 kg; lognormal SD95 1.05
  (1,1,1,1,1,1,BU:1.05);
- Paper, woodfree, coated, at regional storage [RER]: 0.0003 kg; lognormal SD95 1.05
  (1,1,1,1,1,1,BU:1.05);
- Copper, at regional storage [RER]: 0.0046 kg; lognormal SD95 1.05
  (1,1,1,1,1,1,BU:1.05);
- Disposal, energy saving bulb, inert, 0% water, to municipal incineration [CH]: 0.0187 kg; lognormal SD95 1.05
  (1,1,1,1,1,1,BU:1.05);
- Ferrite, at plant [GLO]: 0.003887 kg; lognormal SD95 1.05
  (1,1,1,1,1,1,BU:1.05);

## Emissions to nature
- Heat, waste [emissions to air, unspecified]: 0.32 MJ; lognormal SD95 1.05
  (1,1,1,1,1,1,BU:1.05);
- Mercury [emissions to air, unspecified]: 2.02e-7 kg; lognormal SD95 5
  (1,1,1,1,1,1,BU:5);
- NMVOC, non-methane volatile organic compounds, unspecified origin [emissions to air, unspecified]: 0.00048 kg; lognormal SD95 1.5
  (1,1,1,1,1,1,BU:1.5);
- Sulfur dioxide [emissions to air, unspecified]: 2.09e-5 kg; lognormal SD95 1.05
  (1,1,1,1,1,1,BU:1.05);

## Sources
- Bauer C., Frischknecht R., Eckle P., Flury K., Neal T., Papp K., Schori S., Simons A., Stucki M., Treyer K., 2012, 2012 - LCA electricity generation in Switzerland - Uster, -, 407, Swiss Centre for LCI, ESU-services Ltd., PSI, Uster and Villigen, CH
Ch. Bauer, Frischknecht (2012) Umweltauswirkungen Strom. Volume: 407. PSI. Uster und Villigen, CH.
Type: Separate publication
Source: CD-ROM
First author: Ch. Bauer
Other authors: Frischknecht
Year: 2012
Place of publication: Uster und Villigen, CH
Publisher: PSI
Volume No: 407

## Validation
Proof reading validation: 23.08.2010; Other validation: C:\Dokumente und Einstellungen\Matthias S\Eigene Dateien\1_Projekte\198 Vorträge\Pusch\[198-Lamps-v0.2.xls]X-Process;
