# xxx Electricity, production mix DE

Dataset: EcoSpold 1, unit process
Functional unit: 1 kWh
Category: electricity / notMaintained
Geography: DE
Time period: 2000-01 to 2000-12
Production volume: 637 TWh
Share of production covered: 100 %
Generated by: René Itten
accessRestrictedTo: 0
copyright: true

## General comment
Electricity domestic net production shares are based on IEA statistics for the year 2008.;

## Included processes
It includes the shares of domestic electricity production by technology at the busbar. It does not include transformation, transport nor distribution losses.

## Geography
Data apply to public and self producers in Germany.

## Technology
No technology description is provided because the dataset just describes the power plant portfolio of the respective country using current (2004) average technology per energy carrier.

## Time period
Time period of statistics used (2008).

## Reference product
- xxx Electricity, production mix DE [DE]: 1 kWh
  GERMANY

## Inputs from technosphere
- Electricity, production mix photovoltaic, at plant [DE]: 0.0070709 kWh; lognormal SD95 1.05
  (1,1,1,1,1,1); assumption for solar power production in Germany, value: IEA statistics 2008
- Electricity, from natural gas [DE]: 0.13479 kWh; lognormal SD95 1.05
  (1,1,1,1,1,1); assumption for natural gas power production in Germany, value: IEA statistics 2008
- Electricity, industrial gas, at power plant [DE]: 0.014562 kWh; lognormal SD95 1.05
  (1,1,1,1,1,1); assumption for industrial gas, coke gas and blast furnace gas power production in Germany, value: IEA statistics 2008
- Electricity, at wind farm [RER]: 0.069081 kWh; lognormal SD95 1.0511
  (1,1,1,2,1,1); assumption for wind, geothermal, solar thermal, tidal and other power production in Germany, value: IEA statistics 2008
- Electricity, nuclear, at power plant boiling water reactor [DE]: 0.050629 kWh; lognormal SD95 1.05
  (1,1,1,1,1,1); assumption for nuclear power production in Germany using BWR, value: IEA statistics 2008, fraction: IAEA Database 2010 (PRIS)
- Electricity, at cogen with biogas engine, allocation exergy [CH]: 0.016747 kWh; lognormal SD95 1.0541
  (1,1,1,3,1,1); assumption for power production from biogas, sewage sludge and landfill gases in Germany, value: IEA statistics 2008
- Electricity, hydropower, at pumped storage power plant [DE]: 0.010145 kWh; lognormal SD95 1.05
  (1,1,1,1,1,1); estimated share of pumped storage production in Germany: 22.33%
- Electricity from waste, at municipal waste incineration plant [CH]: 0.014405 kWh; lognormal SD95 1.0541
  (1,1,1,3,1,1); assumption for power production from municipal and industrial waste in Germany, value: IEA statistics 2008
- Electricity, nuclear, at power plant pressure water reactor [DE]: 0.18693 kWh; lognormal SD95 1.05
  (1,1,1,1,1,1); assumption for nuclear power production in Germany using PWR, value: IEA statistics 2008, fraction: IAEA Database 2010 (PRIS)
- Electricity, hydropower, at run-of-river power plant [RER]: 0.029639 kWh; lognormal SD95 1.0511
  (1,1,1,2,1,1); estimated share of ROR hydropower production in Germany: 84%
- Electricity, hydropower, at reservoir power plant, non alpine regions [RER]: 0.0056455 kWh; lognormal SD95 1.0511
  (1,1,1,2,1,1); estimated share of reservoir hydropower production in Germany: 16%
- Electricity, lignite, at power plant [DE]: 0.23887 kWh; lognormal SD95 1.05
  (1,1,1,1,1,1); assumption for lignite power production in Germany, value: IEA statistics 2008
- Electricity, at cogen 1MWth, wood chips, allocation exergy [CH]: 0.013778 kWh; lognormal SD95 1.0541
  (1,1,1,3,1,1); assumption for cogeneration power production in Germany, value: IEA statistics 2008
- Electricity, hard coal, at power plant [DE]: 0.19349 kWh; lognormal SD95 1.05
  (1,1,1,1,1,1); assumption for hard coal power production in Germany, value: IEA statistics 2008
- Electricity, oil, at power plant [DE]: 0.013072 kWh; lognormal SD95 1.05
  (1,1,1,1,1,1); assumption for petroleum product and fuel oil power production in Germany, value: IEA statistics 2008
- Electricity, at cogen 300kWth, diesel, allocation exergy [CH]: 0.0011425 kWh; lognormal SD95 1.0541
  (1,1,1,3,1,1); assumption for diesel and other fossil fuel power production in Germany, value: IEA statistics 2008

## Sampling procedure
Statistical data

## Sources
- Frischknecht R., Itten R., Flury K., 2012, 2012 - GHG emis. from Swiss elec. mixes - Frischknecht, Project reports, 401, ESU-services Ltd., Uster, CH
Itten, R., Frischknecht, R. (2012) Life Cycle Inventories of electricity mixes. Project reports. Volume: 401. ESU-services Ltd.. Uster, CH.
Type: Separate publication
First author: Itten, R.
Other authors: Frischknecht, R.
Year: 2012
Title of anthology: Project reports
Place of publication: Uster, CH
Publisher: ESU-services Ltd.
Volume No: 401

## Validation
Proof reading validation: automatic validation in Excel; Other validation: Z:\ESU-Docs\Projekte laufend\401 Update Strommix v3.0\EcoSpold\_Europa\[401-electricity-mix-germany-DE-v1.0.xlsx]X-Process;
