# Use of cable, fixed IP access network per GB

Dataset: EcoSpold 1, unit process
Functional unit: 1 p
Category: computers & network / use cases
Geography: CH
Time period: 2023-01 to 2029-12
Synonyms: Übertragungsnetz; Zugriff; Festnetz; Kabel
Generated by: Lugas Raka Adrianto, Maulana Permana Ajie, Didier Beloin-Saint-Pierre
accessRestrictedTo: 0
copyright: false

## General comment
The data set represents the cable fixed network in Switzerland;

## Included processes
The dataset represents the copper cable network in Switzerland. The reference year for network traffic is 2014. The equipment is based on information in 2010 but is deemed the most actual. A lifetime of 5 years is assumed. The amount of electricity consumed is assumed to be the same as cable since the main source used does not distinguish between copper and xDSL. Both are referred to as "copper network". Amount of electricity consumed is based on the network electricity intensity (kWh/GB) information from the Telefonica Access Network reference. The functional unit = 1 GB.

## Geography
Data for Swiss networks

## Technology
The mix of Swiss access transmission network, fixed.

## Reference product
- Use of cable, fixed IP access network per GB [CH]: 1 p
  1 unit = 1 GB data (Total value of data volume for 2014 taken from datahub.itu.int)

## Inputs from technosphere
All rows: lognormal SD95 1.33
- Network access devices, internet, at user [GLO]: 0.000753 p
  (2,3,3,2,3,5,BU:1.05) Based on data from SFOE 2015 (table 23) and lifetime of 5 years
- Router, IP network, at server [GLO]: 6.39e-6 p
  (2,3,3,2,3,5,BU:1.05) Based on data from SFOE 2015 (table 23) and lifetime of 8 years
- Cable, data cable in infrastructure, at plant [GLO]: 0.0123 m
  (2,3,3,2,3,5,BU:1.05) Based on data from SFOE 2015 (table 23) and lifetime of 50 years
- Points of presence, network equipment [GLO]: 1.89e-5 p
  (2,3,3,2,3,5,BU:1.05) Based on data from SFOE 2015 (table 23) and lifetime of 7 years
- Electricity, low voltage, at grid [CH]: 1.05 kWh
  (2,3,3,2,3,5,BU:1.05) Based on data from SFOE 2015 (table 3) HFC + PoP network

## Sampling procedure
Literature & own estimations

## Extrapolations
Average technology

## Sources
- Raka Adrianto L., Permana Ajie M., Beloin-Saint-Pierre D., 2024, 2024 - LCI ICT sector - Raka Adrianto, Empa, St. Gallen, CH

## Validation
Proof reading validation: Passed, Other validation: none, Validator: Mischa Zschokke, Company: Carbotech, Country: CH
