# Fatty alcohol sulfate, mix, at plant

Dataset: EcoSpold 1, unit process
Functional unit: 1 kg
Category: chemicals / washing agents\tensides
Geography: RER
Time period: 1992-01 to 1995-12
Generated by: Rainer Zah
accessRestrictedTo: 0
copyright: true

## General comment
data represent unweighted average of four different FAS types;

## Included processes
This module represents an unspecified mix of the four different FAS datasets that are included into this database

## Geography
Data based on the different FAS production

## Technology
unweighted average of FAS petrochemical, from palm kernel oil, from coconut oil and from palm oil

## Time period
data of used literature sources

## Reference product
- Fatty alcohol sulfate, mix, at plant [RER]: 1 kg
  Europe

## Inputs from technosphere
- Fatty alcohol sulfate, palm kernel oil, at plant [RER]: 0.25 kg; lognormal SD95 1.3
  (2,3,3,2,1,4);
- Fatty alcohol sulfate, petrochemical, at plant [RER]: 0.25 kg; lognormal SD95 1.3
  (2,3,3,2,1,4);
- Fatty alcohol sulfate, coconut oil, at plant [RER]: 0.25 kg; lognormal SD95 1.3
  (2,3,3,2,1,4);
- Fatty alcohol sulfate, palm oil, at plant [RER]: 0.25 kg; lognormal SD95 1.3
  (2,3,3,2,1,4);

## Sampling procedure
see technology

## Sources
- Zah R., Hischier R., 2007, 2007 - LCI detergents - Zah, Final report ecoinvent data v2.0, 12, Swiss Centre for LCI, Empa - TSL, Duebendorf and St. Gallen, CH
Zah R., Hischier R. (2007) Life Cycle Inventories of Detergents. Final report ecoinvent data v2.0. Volume: 12. Swiss Centre for LCI, Empa - TSL. Dübendorf, CH.
Type: Measurement on site
Source: CD-ROM
First author: Zah R.
Other authors: Hischier R.
Year: 2007
Title of anthology: Final report ecoinvent data v2.0
Place of publication: Dübendorf, CH
Publisher: Swiss Centre for LCI, Empa - TSL
Volume No: 12

## Validation
Proof reading validation: Passed.; Other validation: none;
