# Integrated circuit, QFP, at plant

Dataset: EcoSpold 1, unit process
Functional unit: 1 p
Category: electronics / production of components
Geography: RER
Time period: 2000-01 to 2000-12
Share of production covered: 0 %
Generated by: Mireille Faist Emmenegger
accessRestrictedTo: 0
copyright: true

## General comment
This data is based on confidential data from a company. The data refers to one unit integrated circuit. Input of multi-Si wafer linked to an updated unit process by Philippe Stolz, August 2016.
Geography: Data describes requirements for a mobile phone's chips from Germany.
Technology: Fabrication of a QFP chip
Time period: Period of company data.
Version: 1

0.0
Production volume: unknown

## Included processes
The data describes the materials and energy requirements for a SQFP chip (1.0 g).

## Technology
Fabrication of a QFP chip

## Time period
Period of company data.

## Reference product
- Integrated circuit, QFP, at plant [RER]: 1 p
  Europe

## Inputs from technosphere
- Tin, at regional storage [RER]: 3e-6 kg; lognormal SD95 1.5723
- Aluminium, primary, at plant [RER]: 1.54e-5 kg; lognormal SD95 1.5723
- Transport, freight, lorry, fleet average [RER]: 4.524e-5 tkm; lognormal SD95 2.095
- Multi-Si wafer, at plant [RER]: 0.00077496 m2; lognormal SD95 1.3117
  Input of mc-Si wafer (FU: p) replaced and converted to m2; Size: 100mm x 100mm; Conversion factor: 0.01 m2/p
- Transport, freight, rail [RER]: 0.000152 tkm; lognormal SD95 2.095
- Gold, at regional storage [RER]: 4e-7 kg; lognormal SD95 1.2226
- Bisphenol A, powder, at plant [RER]: 0.0001538 kg; lognormal SD95 1.2226
- Copper, at regional storage [RER]: 0.0002103 kg; lognormal SD95 1.2226
- Lead, at regional storage [RER]: 3e-6 kg; lognormal SD95 1.2226
- Electricity, medium voltage, production ENTSO-E, at grid: 0.21385 kWh; lognormal SD95 1.2226
- Epoxy resin, liquid, at plant [RER]: 6.31e-5 kg; lognormal SD95 1.2226
- Transport, aircraft, freight, long-haul [RER]: 0.01 tkm; lognormal SD95 2.095

## Emissions to nature
- Heat, waste [emissions to air, low. pop.]: 0.76986 MJ; lognormal SD95 1.2226

## Sources
- Hischier R., Classen M., Lehmann M., Scharnhorst W., 2007, 2007 - LCI electric and electronic equipment - Hischier, 0, 0, Swiss Centre for LCI, Empa - TSL, Duebendorf and St. Gallen, CH
Faist Emmenegger M., Jungbluth N., Frischknecht R. (2004) Life Cycle Inventories. Project reports. Volume: 0. ESU-services. Uster, CH.

## Validation
Proof reading validation: 1; Other validation: none;
