# Maintenance, long-distance train

Dataset: EcoSpold 1, unit process, infrastructure
Functional unit: 1 p
Category: transport systems / train\operations\infrastructure
Geography: CH
Time period: 2000-01 to 2000-12
Generated by: Michael Spielmann
accessRestrictedTo: 0
copyright: true

## General comment
The life span of the train is assumed to be 40 years resulting in a life time performance of 20’000’000 vkm. ;

## Included processes
This inventory includes expenditures for one major revision as well as a regular substitution of break shoes (40 kg break shoes/car). Also, the disposal of wood, glass and plastics is addressed. Land use and material expenditures due to buildings of service garages are not included.

## Geography
Data represents a train maintenance in Switzerland.

## Reference product
- Maintenance, long-distance train [CH]: 1 p
  SWITZERLAND

## Inputs from technosphere
- Electricity, medium voltage, at grid [CH]: 542000 kWh; lognormal SD95 2.08
  (4,3,2,1,1,3); literature studies, rough estimate
- Sodium hydroxide, 50% in H2O, production mix, at plant [RER]: 40000 kg; lognormal SD95 1.21
  (2,2,2,3,3,3); literature studies; estimate based on ICE maintenace figures
- Tap water, at user [CH]: 457000 kg; lognormal SD95 1.27
  (4,3,2,1,1,3); literature studies, rough estimate
- Copper, at regional storage [RER]: 125 kg; lognormal SD95 1.27
  (4,3,2,1,1,3); literature studies; estimate based on ICE maintenace figures
- Reinforcing steel, at plant [RER]: 99000 kg; lognormal SD95 1.27
  (4,3,2,1,1,3); literature studies
- Heat, natural gas, at industrial furnace 1MW [CH]: 64600 MJ; lognormal SD95 2.08
  (4,3,2,1,1,3); literature studies, rough estimate
- Alkyd paint, white, 60% in solvent, at plant [RER]: 6180 kg; lognormal SD95 1.21
  (2,2,2,3,3,3); literature studies; estimate based on ICE maintenace figures
- Synthetic rubber, at plant [RER]: 13200 kg; lognormal SD95 1.27
  (4,3,2,1,1,3); literature studies
- Bitumen, at refinery [CH]: 4840 kg; lognormal SD95 1.21
  (2,2,2,3,3,3); literature studies
- Aluminium, production mix, at plant [RER]: 13000 kg; lognormal SD95 1.27
  (4,3,2,1,1,3); literature studies
- Transport, freight, lorry, 16t-32t gross weight, fleet average [CH]: 10800 tkm; lognormal SD95 2.28
  (4,5,na,na,na,na); standard transport distances
- Disposal, emulsion paint, 0% water, to municipal incineration [CH]: 645 kg; lognormal SD95 1.27
  (4,3,2,1,1,3); literature studies
- Disposal, plastics, mixture, 15.3% water, to sanitary landfill [CH]: 13000 kg; lognormal SD95 1.27
  (4,3,2,1,1,3); literature studies
- Tempering, flat glass [RER]: 26100 kg; lognormal SD95 1.21
  (2,2,2,3,3,3); literature studies; estimate based on ICE maintenace figures
- Treatment, sewage, to wastewater treatment, class 1 [CH]: 457 m3; lognormal SD95 1.27
  (4,3,2,1,1,3); literature studies
- Flat glass, coated, at plant [RER]: 26100 kg; lognormal SD95 1.21
  (2,2,2,3,3,3); literature studies; estimate based on ICE maintenace figures
- Disposal, glass, 0% water, to municipal incineration [CH]: 26100 kg; lognormal SD95 1.27
  (4,3,2,1,1,3); literature studies
- Heat, light fuel oil, at industrial furnace 1MW [CH]: 4.38e6 MJ; lognormal SD95 2.08
  (4,3,2,1,1,3); literature studies, rough estimate
- Solvents, organic, unspecified, at plant [GLO]: 500 kg; lognormal SD95 1.21
  (2,2,2,3,3,3); literature studies; estimate based on ICE maintenace figures
- Paper, woodfree, uncoated, at regional storage [RER]: 20700 kg; lognormal SD95 1.27
  (4,3,2,1,1,3); literature studies; estimate based on ICE maintenace figures
- Transport, freight, rail, electricity with shunting [CH]: 43300 tkm; lognormal SD95 2.28
  (4,5,na,na,na,na); standard transport distances
- Lubricating oil, at plant [RER]: 500 kg; lognormal SD95 1.27
  (4,3,2,1,1,3); literature studies; estimate based on ICE maintenace figures
- Polyethylene, HDPE, granulate, at plant [RER]: 78200 kg; lognormal SD95 1.27
  (4,3,2,1,1,3); literature studies

## Emissions to nature
- NMVOC, non-methane volatile organic compounds, unspecified origin [emissions to air, low. pop.]: 3100 kg; lognormal SD95 1.21
  (2,2,2,3,3,3); Derived from the used paint and solvent, assuming all solvent is emitted to air.
- Heat, waste [emissions to air, unspecified]: 1.95e6 MJ; lognormal SD95 1.27
  (4,3,2,1,1,3); standard value

## Sampling procedure
The data of the material composition and energy consumption is based on literature studies.

## Sources
- Spielmann M., Bauer C., Dones R., Tuchschmid M., 2007, 2007 - Transport services - Spielmann, Final report ecoinvent Data v2.0, 14, Swiss Centre for LCI, PSI, ESU-services Ltd., Duebendorf, Villigen and Uster, CH
Spielmann M., Dones R; Bauer C. (2007) Life Cycle Inventories of Transport Services. Final report ecoinvent Data v2.0. Volume: 14. Issue: 0. Swiss Centre for LCI, PSI. Dübendorf and Villigen, CH.
Type: Measurement on site
Source: CD-ROM
First author: Spielmann M.
Other authors: Dones R; Bauer C.
Year: 2007
Title of anthology: Final report ecoinvent Data v2.0
Place of publication: Dübendorf and Villigen, CH
Publisher: Swiss Centre for LCI, PSI
Volume No: 14
Issue No: 0

## Validation
Proof reading validation: Passed.; Other validation: none;
