# Thermo-mechanical pulp, at plant

Dataset: EcoSpold 1, unit process
Functional unit: 1 kg
Category: paper+ board / pulp
Geography: RER
Time period: 2000-01 to 2000-12
Production volume: Total European market mechanical pulp production in 2000: 901 kt
Generated by: Roland Hischier
accessRestrictedTo: 0
copyright: true

## Included processes
This module includes the production of bleached Thermomechanical pulp (TMP) - including transports to the pulp mill, wood handling, mechanical pulping and bleaching, drying process, energy production on-site and internal waste water treatment.; Geography: Data from a Swiss and a German LCA study, from several European newsprint producers and from the Swedish EPA used as European average data.

## Technology
Modern average technology.

## Reference product
- Thermo-mechanical pulp, at plant [RER]: 1 kg
  Europe

## Inputs from technosphere
- Chemicals inorganic, at plant [GLO]: 0.00453 kg; lognormal SD95 1.14
  (2,3,2,3,1,4); average data from German LCA study
- Slab and siding, softwood, wet, measured as dry mass, at sawmill [RER]: 0.4293 kg
  (2,3,2,3,1,3); average data from several LCA studies
- Light fuel oil, burned in industrial furnace 1MW, non-modulating [RER]: 9.8e-5 MJ; lognormal SD95 1.1
  (2,3,1,3,1,3); average data from a recent newsprint LCA study
- Disposal, textiles, soiled, 25% water, to municipal incineration [CH]: 2.41e-5 kg; lognormal SD95 1.1
  (2,3,1,3,1,3); average swedish data from SE-EPA
- Transport, freight, lorry, fleet average [RER]: 0.201 tkm; lognormal SD95 2.09
  (4,5,na,na,na,na); standard distances
- Disposal, municipal solid waste, 22.9% water, to sanitary landfill [CH]: 0.00057 kg; lognormal SD95 1.1
  (2,3,1,3,1,3); average swedish data from SE-EPA
- Pulp plant [RER]: 5e-11 p; lognormal SD95 3.05
  (4,na,na,na,na,na); assumption
- Heavy fuel oil, burned in industrial furnace 1MW, non-modulating [RER]: 0.0173 MJ; lognormal SD95 1.1
  (2,3,1,3,1,3); average data from a recent newsprint LCA study
- Sodium hydroxide, 50% in H2O, production mix, at plant [RER]: 0.0142 kg; lognormal SD95 1.14
  (2,3,2,3,1,4); average data from German LCA study
- Hydrogen peroxide, 50% in H2O, at plant [RER]: 0.0286 kg; lognormal SD95 1.14
  (2,3,2,3,1,4); average data from German LCA study
- Sodium silicate, spray powder 80%, at plant [RER]: 0.0164 kg; lognormal SD95 1.14
  (2,3,2,3,1,4); average data from German LCA study
- Natural gas, burned in industrial furnace 1MWth [CH]: 0.0653 MJ; lognormal SD95 1.1
  (2,3,1,3,1,3); average data from a recent newsprint LCA study
- Disposal, wood ash mixture, pure, 0% water, to sanitary landfill [CH]: 0.00225 kg; lognormal SD95 1.1
  (2,3,1,3,1,3); average swedish data from SE-EPA
- Wood chips, softwood, wet, measured as dry mass, at sawmill [RER]: 0.9405 kg
  (2,3,2,3,1,3); average data from several LCA studies
- Wood chips, from industry, softwood, burned in furnace 300kW [CH]: 0.119 MJ; lognormal SD95 1.1
  (2,3,1,3,1,3); average data from a recent newsprint LCA study
- Disposal, wood untreated, 20% water, to municipal incineration [CH]: 1.3e-5 kg; lognormal SD95 1.1
  (2,3,1,3,1,3); average swedish data from SE-EPA
- Electricity, medium voltage, production ENTSO-E, at grid: 0.676 kWh; lognormal SD95 1.11
  (2,3,2,3,1,3); average data from several LCA studies
- Disposal, steel, 0% water, to municipal incineration [CH]: 2.59e-5 kg; lognormal SD95 1.1
  (2,3,1,3,1,3); average swedish data from SE-EPA
- Hard coal, burned in industrial furnace 1-10MW [RER]: 0.00376 MJ; lognormal SD95 1.1
  (2,3,1,3,1,3); average data from a recent newsprint LCA study
- Transport, freight, rail [RER]: 0.0853 tkm; lognormal SD95 2.09
  (4,5,na,na,na,na); standard distances
- Disposal, paper, 11.2% water, to municipal incineration [CH]: 7.4e-5 kg; lognormal SD95 1.1
  (2,3,1,3,1,3); average swedish data from SE-EPA
- Disposal, plastics, mixture, 15.3% water, to municipal incineration [CH]: 0.000233 kg; lognormal SD95 1.1
  (2,3,1,3,1,3); average swedish data from SE-EPA
- Electricity, medium voltage, production NORDEL, at grid [NORDEL]: 1.48 kWh; lognormal SD95 1.11
  (2,3,2,3,1,3); average data from several LCA studies

## Inputs from nature
- Water, unspecified natural origin/m3 [resources, in water]: 0.023 m3; lognormal SD95 1.1
  (2,3,1,3,1,3); average swedish data from SE-EPA

## Emissions to nature
- TOC, Total Organic Carbon [emissions to water, river]: 0.00158 kg; lognormal SD95 1.58
  (1,3,3,3,1,5); data from former Swiss LCA of packaging
- Suspended solids, unspecified [emissions to water, river]: 0.00124 kg; lognormal SD95 1.52
  (2,3,2,3,1,3); average data from several LCA studies
- BOD5, Biological Oxygen Demand [emissions to water, river]: 0.0009 kg; lognormal SD95 1.52
  (2,3,2,3,1,3); average data from several LCA studies
- Heat, waste [emissions to air, high. pop.]: 7.78 MJ; lognormal SD95 1.11
  (2,3,2,3,1,3); calculated from input
- COD, Chemical Oxygen Demand [emissions to water, river]: 0.00437 kg; lognormal SD95 1.52
  (2,3,2,3,1,3); average data from several LCA studies
- Nitrogen [emissions to water, river]: 6e-5 kg; lognormal SD95 1.52
  (2,3,2,3,1,3); average data from several LCA studies
- Phosphorus [emissions to water, river]: 1e-5 kg; lognormal SD95 1.52
  (2,3,2,3,1,3); average data from several LCA studies
- Nitrogen oxides [emissions to air, high. pop.]: 0.00155 kg; lognormal SD95 1.51
  (2,3,1,3,1,3); average swedish data from SE-EPA
- Water [emissions to water, unspecified]: 21.85 kg; lognormal SD95 2.5196
  (5,5,5,5,5,BU:1.05); All uncertainty-values set to 5.0 by default. Balance of input water

## Sources
- Hischier R., 2007, 2007 - LCI packagings and graphical papers - Hischier, Final report ecoinvent data v2.0, 11, Swiss Centre for LCI, Empa - TSL, Duebendorf and St. Gallen, CH
Hischier R. (2007) Life Cycle Inventories of Packaging and Graphical Paper. Final report ecoinvent data v2.0. Volume: 11. Swiss Centre for LCI, Empa - TSL. Dübendorf, CH.
Type: Measurement on site
Source: CD-ROM
First author: Hischier R.
Year: 2007
Title of anthology: Final report ecoinvent data v2.0
Place of publication: Dübendorf, CH
Publisher: Swiss Centre for LCI, Empa - TSL
Volume No: 11

## Validation
Proof reading validation: Passed; Other validation: none;
