# Chromium steel sheet 18/8, recycling share 70 %, with resource correction, at plant

Dataset: EcoSpold 1, unit process
Functional unit: 1 m2
Category: construction / kitchen
Geography: CH
Time period: 2014-01 to 2014-12
Share of production covered: 0 %
Generated by: Franziska Wyss
accessRestrictedTo: 0
copyright: true

## Included processes
This data set describes the production of chromium steel sheets with a share of 70% secondary material according to Franke Küchentechnik AG. Resourcecorrection is included.; Geography: Data valid for Switzerland

## Geography
Data valid for Switzerland

## Technology
Average disposal

## Reference product
- Chromium steel sheet 18/8, recycling share 70 %, with resource correction, at plant [CH]: 1 m2
  SWITZERLAND

## Inputs from technosphere
- Steel, converter, chromium steel 18/8, at plant [RER]: 0.3 kg; lognormal SD95 1.113
  (1,1,1,1,1,4,BU:1.05); Anteil Blasstahl;
- Hot rolling, steel [RER]: 1 kg; lognormal SD95 1.113
  (1,1,1,1,1,4,BU:1.05); Walzen;
- Steel, electric, chromium steel 18/8, at plant [RER]: 0.7 kg; lognormal SD95 1.2355
  (1,1,1,1,3,4,BU:1.05); Anteil Elektrostahl;

## Inputs from nature
- Nickel, resource correction [resources, in ground]: -0.086292 kg; lognormal SD95 1.1194
  (1,1,2,3,1,4,BU:1.05); Ressourcenkorrektur MoeK13;
- Iron, resource correction [resources, in ground]: -0.14233 kg; lognormal SD95 1.1194
  (1,1,2,3,1,4,BU:1.05); Ressourcenkorrektur MoeK13;
- Chromium, resource correction [resources, in ground]: -0.071382 kg; lognormal SD95 1.1194
  (1,1,2,3,1,4,BU:1.05); Ressourcenkorrektur MoeK13;

## Sources
- Kasser U., R. Frischknecht, M. Klingler, D. Savi, R. Itten, F. Wyss,P. Stolz, L. Tschuemperlin, 2016, 2016 - Renewal and exp. of LCA data in KBOB - Kasser, Project report, 489, Buero fuer Umweltchemie, treeze Ltd., Zuerich and Uster, CH
Franziska Wyss, Rolf Frischknecht, Philippe Stolz (2014) Ökobilanzen von Kücheneinbauten und -möbeln. Project report. Volume: 489. treeze Ltd.. Uster, CH.
Type: Separate publication
Source: Report
First author: Franziska Wyss
Other authors: Rolf Frischknecht, Philippe Stolz
Year: 2014
Title of anthology: Project report
Place of publication: Uster, CH
Publisher: treeze Ltd.
Volume No: 489

## Validation
Proof reading validation: 05.11.2015; Other validation: \\SRV01\ESU-Docs\Projekte laufend\489 Erweiterung KBOB-Liste BFE\EcoSpold\Küche\[489_Küche_v1.10.xlsx]X-Process;
