# Cogen unit ORC 1400kWth, wood burning, components for electricity only

Dataset: EcoSpold 1, unit process, infrastructure
Functional unit: 1 p
Category: heat / wood\cogeneration\power unit\infrastructure
Geography: CH
Time period: 2000-01 to 2001-12
Generated by: Christian Bauer
accessRestrictedTo: 0
copyright: true

## General comment
Assumed lifetime: 20 years. Operation time for heat production 6250 h/a, for electricity production 1110 h/a, calculated from reported annual production.;

## Included processes
Infrastructure includes the generator and a control cabinet.

## Geography
Could be used for central European conditions.

## Technology
Specific cogeneration unit installed in Switzerland.

## Reference product
- Cogen unit ORC 1400kWth, wood burning, components for electricity only [CH]: 1 p
  SWITZERLAND

## Inputs from technosphere
- Generator 200kWe [RER]: 1 p; lognormal SD95 2.06
  basic uncertainty:2;(4,na,3,1,1,na);
- Control cabinet cogen unit 160kWe [RER]: 3 p; lognormal SD95 2.06
  basic uncertainty:2;(4,na,3,1,1,na);
- Transport, freight, rail, electricity with shunting [CH]: 200 tkm; lognormal SD95 1.66
  basic uncertainty:1.6;(4,na,na,1,na,na);
- Transport, freight, lorry, 16t-32t gross weight, fleet average [CH]: 100 tkm; lognormal SD95 1.66
  basic uncertainty:1.6;(4,na,na,1,na,na);

## Sampling procedure
literature

## Sources
- Bauer C., 2007, 2007 - Wood energy - Bauer, Sachbilanzen von Energiesystemen. Final report No. 6 ecoinvent data v2.0, 6, Swiss Centre for LCI, PSI, Duebendorf and Villigen, CH
Bauer, C. (2007) Holzenergie. Sachbilanzen von Energiesystemen. Final report No. 6 ecoinvent data v2.0. Editors: Dones R.. Volume: 6. Swiss Centre for LCI, PSI. Dübendorf and Villigen, CH.
Type: Measurement on site
Source: CD-ROM
First author: Bauer, C.
Year: 2007
Name of editors: Dones R.
Title of anthology: Sachbilanzen von Energiesystemen. Final report No. 6 ecoinvent data v2.0
Place of publication: Dübendorf and Villigen, CH
Publisher: Swiss Centre for LCI, PSI
Volume No: 6

## Validation
Proof reading validation: passed; Other validation: none;
