# Industrial residue wood, softwood, air, kiln dried, u=6%, holzpur, at plant

Dataset: EcoSpold 1, unit process
Functional unit: 1 m3
Category: wood / wooden materials\extraction
Geography: CH
Generated by: Philippe Stolz
accessRestrictedTo: 0
copyright: true

## General comment
The economic allocation of the process to the two coproducts holzpur and industrial residue wood is done according to specific data on the volume shares and prices of the products. Data on the energy and material use are specific for the Walter Küng AG, which produces holzpur elements. The manufacturing plant is modelled by a sawmill.;

## Included processes
Includes transport from the sawmill to the manufacturing plant and the manufacturing of holzpur elements from sawn timber.

## Geography
Data apply to the Walter Küng AG in Switzerland.

## Technology
Industry data.

## Time period
Time of publications.

## Reference product
- Industrial residue wood, softwood, air, kiln dried, u=6%, holzpur, at plant [CH]: 1 m3
  SWITZERLAND

## Inputs from technosphere
- Transport, freight, lorry, 32t-40t gross weight, fleet average [CH]: 1.3669 tkm; lognormal SD95 2.095
  (4,5,na,na,na,na,BU:2); Transport of wood from sawmill to manufacturing plant and transport of other materials; Stalder 2013
- Electricity, low voltage, electric utility Obwalden, at grid [CH]: 2.9505 kWh; lognormal SD95 1.2152
  (2,1,1,1,1,5,BU:1.05); ; Patrick Stalder, personal communication 10.02.2015
- Sawmill [RER]: 2.5247e-8 p; lognormal SD95 3.0162
  (1,3,3,3,1,1,BU:3); Approximation of the manufacturing plant by a sawmill; ecoinvent report 9
- District heat, at consumer, wood chips cogen 1MWth, allocation exergy [CH]: 6.4096 MJ; lognormal SD95 1.2152
  (2,1,1,1,1,5,BU:1.05); Heating of the manufacturing plant; Patrick Stalder, personal communication 26.02.2015
- Sawn timber, softwood, raw, air, kiln dried, u=6%, holzpur, at plant [CH]: 1 m3; lognormal SD95 1.05
  (1,1,1,1,1,1,BU:1.05); ;
- Wood chips, from holzpur manufacturing, softwood, burned in furnace 300kW [CH]: 0.62179 MJ; lognormal SD95 1.2152
  (2,1,1,1,1,5,BU:1.05); Heating of the offices; Patrick Stalder, personal communication 26.02.2015

## Emissions to nature
- Heat, waste [emissions to air, low. pop.]: 10.622 MJ; lognormal SD95 1.2152
  (2,1,1,1,1,5,BU:1.05); ;

## Sampling procedure
Data survey at the Walter Küng AG in Alpnach-Dorf (Switzerland).

## Sources
- Stolz P., Frischknecht R., 2015, 2015 - LCA solid wood system holzpur - Stolz, Project report, 527, treeze Ltd., Uster, CH
Stolz P., Frischknecht R. (2015) Ökobilanz Vollholzsystem holzpur. Project report. Volume: 527. treeze Ltd.. Uster, CH.
Type: Separate publication
Source: Report
First author: Stolz P.
Other authors: Frischknecht R.
Year: 2015
Title of anthology: Project report
Place of publication: Uster, CH
Publisher: treeze Ltd.
Volume No: 527

## Validation
Proof reading validation: 08.05.2015; Other validation: \\SRV01\ESU-Docs\Projekte laufend\527 Bilanz Holzpur\EcoSpold\[527-Ökobilanz-holzpur-v0.16.xlsx]X-Process;
