# Glass fibre-reinforced polymer panel, polyester resin, at regional storage

Dataset: EcoSpold 1, unit process
Functional unit: 1 m2
Category: construction materials / fiberglass reinforced plastic sheets
Geography: CH
Time period: 2000-01 to 2016-12
Generated by: Daniel Savi
accessRestrictedTo: 0
copyright: true

## General comment
Glasfaserverstärkte Kunststoffplatte, Polyester, Regionallager CH
1m2 Fassadenplatte für Aussenanwendung, Stärke 1.6mm, Flächengewicht 2.41 kg/m2
Mittelwert aus Wellplatten und ebenen Platten gemäss dem Produktionsmix eines Herstellers.
Version: 0.0

Local category: construction materials
Local subcategory: GFK-Platten

## Reference product
- Glass fibre-reinforced polymer panel, polyester resin, at regional storage [CH]: 1 m2
  SWITZERLAND

## Inputs from technosphere
- Glass fibre-reinforced polymer panel, polyester resin, at plant [TR]: 1.05 m2; lognormal SD95 1.56399
  (5;5;1;1;1)
- Glass fibre-reinforced polymer panel, polyester resin, packaging [RER]: 1.05 m2; lognormal SD95 1.12487
  (3;3;1;1;1)
- Glass fibre-reinforced polymer panel, transport TR->CH [RER]: 1.05 m2; lognormal SD95 2.01651
  (3;3;1;1;1)

## Sources
- Kasser U., R. Frischknecht, M. Klingler, D. Savi, R. Itten, F. Wyss,P. Stolz, L. Tschuemperlin, 2016, 2016 - Renewal and exp. of LCA data in KBOB - Kasser, -, Buero fuer Umweltchemie, treeze Ltd., Zuerich and Uster, CH
U. Kasser, R. Frischknecht, M. Klingler, D. Savi, R. Itten, F. Wyss,P. Stolz, L. Tschümperlin 2016 (2015Z) Erneuerung und Erweiterung der Ökobilanzdaten in der KBOB-Liste "Ökobilanzdaten im Baubereich", Projekt QualiBOB. unknown.

First author: U. Kasser, R. Frischknecht, M. Klingler, D. Savi, R. Itten, F. Wyss,P. Stolz, L. Tschümperlin 2016
Year: 2015Z
Place of publication: unknown
Original title: Erneuerung und Erweiterung der Ökobilanzdaten in der KBOB-Liste "Ökobilanzdaten im Baubereich", Projekt QualiBOB
