# [sulfonyl]urea-compounds, at regional storehouse

Dataset: EcoSpold 1, unit process, infrastructure
Functional unit: 1 kg
Category: chemicals / pesticides
Geography: CH
Time period: 1987-01 to 1987-12
Share of production covered: 100 %
Generated by: Juergen Sutter
accessRestrictedTo: 0
copyright: true

## General comment
Production of (sulfonyl)urea-compounds including materials, energy uses, infrastructure and emissions.;

## Geography
Switzerland

## Technology
pesticides

## Time period
Time of publications

## Reference product
- [sulfonyl]urea-compounds, at regional storehouse [CH]: 1 kg
  SWITZERLAND

## Inputs from technosphere
- Cumene, at plant [RER]: 0.089398 kg; lognormal SD95 1.3765
  (4,5,1,1,1,5); Stoechiometric calculation
- Propylene, at plant [RER]: 0.045024 kg; lognormal SD95 1.3765
  (4,5,1,1,1,5); Stoechiometric calculation
- Toluene, liquid, at plant [RER]: 0.13576 kg; lognormal SD95 1.3765
  (4,5,1,1,1,5); Stoechiometric calculation
- Aluminium, production mix, at plant [RER]: 0.011198 kg; lognormal SD95 1.3765
  (4,5,1,1,1,5); Stoechiometric calculation
- Oxygen, liquid, at plant [RER]: 0.056992 kg; lognormal SD95 1.3765
  (4,5,1,1,1,5); Stoechiometric calculation
- Sulphur dioxide, liquid, at plant [RER]: 0.039389 kg; lognormal SD95 1.3765
  (4,5,1,1,1,5); Stoechiometric calculation
- Dimethyl sulphate, at plant [RER]: 0.099038 kg; lognormal SD95 1.3765
  (4,5,1,1,1,5); Stoechiometric calculation
- Hydrogen sulphide, H2S, at plant [RER]: 0.033191 kg; lognormal SD95 1.3765
  (4,5,1,1,1,5); Stoechiometric calculation
- O-dichlorobenzene, at plant [RER]: 0.11383 kg; lognormal SD95 1.3765
  (4,5,1,1,1,5); Stoechiometric calculation
- Dichloromethane, at plant [RER]: 0.060657 kg; lognormal SD95 1.3765
  (4,5,1,1,1,5); Stoechiometric calculation
- Acrylonitrile from Sohio process, at plant [RER]: 0.024514 kg; lognormal SD95 1.3765
  (4,5,1,1,1,5); Stoechiometric calculation
- Dimethylamine, at plant [RER]: 0.012248 kg; lognormal SD95 1.3765
  (4,5,1,1,1,5); Stoechiometric calculation
- Ammonium chloride, at plant [GLO]: 0.081558 kg; lognormal SD95 1.3765
  (4,5,1,1,1,5); Stoechiometric calculation
- Transport, freight, lorry, fleet average [RER]: 1.0673 tkm; lognormal SD95 2.095
  (4,5,na,na,na,na); Standard distances
- Methanol, at plant [GLO]: 0.15134 kg; lognormal SD95 1.3765
  (4,5,1,1,1,5); Stoechiometric calculation
- Sulphuric acid, liquid, at plant [RER]: 0.077328 kg; lognormal SD95 1.3765
  (4,5,1,1,1,5); Stoechiometric calculation
- Water, decarbonised, at plant [RER]: 0.088821 kg; lognormal SD95 1.3765
  (4,5,1,1,1,5); Stoechiometric calculation
- Nitric acid, 50% in H2O, at plant [RER]: 0.17861 kg; lognormal SD95 1.3765
  (4,5,1,1,1,5); Stoechiometric calculation
- Ethanol from ethylene, at plant [RER]: 0.021348 kg; lognormal SD95 1.3765
  (4,5,1,1,1,5); Stoechiometric calculation
- Chlorine, liquid, production mix, at plant [RER]: 0.72929 kg; lognormal SD95 1.3765
  (4,5,1,1,1,5); Stoechiometric calculation
- Hydrogen, liquid, at plant [RER]: 0.014446 kg; lognormal SD95 1.3765
  (4,5,1,1,1,5); Stoechiometric calculation
- Sodium hydroxide, 50% in H2O, production mix, at plant [RER]: 1.0819 kg; lognormal SD95 1.3765
  (4,5,1,1,1,5); Stoechiometric calculation
- Heat, unspecific, in chemical plant [RER]: 14.436 MJ; lognormal SD95 1.3765
  (4,5,1,1,1,5); Estimation
- Hydrochloric acid, 30% in H2O, at plant [RER]: 0.093233 kg; lognormal SD95 1.3765
  (4,5,1,1,1,5); Stoechiometric calculation
- Hydrogen cyanide, at plant [RER]: 0.047406 kg; lognormal SD95 1.3765
  (4,5,1,1,1,5); Stoechiometric calculation
- Hydrogen fluoride, at plant [GLO]: 0.072016 kg; lognormal SD95 1.3765
  (4,5,1,1,1,5); Stoechiometric calculation
- Nitrogen, liquid, at plant [RER]: 0.06416 kg; lognormal SD95 1.3765
  (4,5,1,1,1,5); Stoechiometric calculation
- Electricity, medium voltage, at grid [CH]: 1.9644 kWh; lognormal SD95 1.3765
  (4,5,1,1,1,5); Estimation
- Sodium chloride, powder, at plant [RER]: 0.00024581 kg; lognormal SD95 1.3765
  (4,5,1,1,1,5); Stoechiometric calculation
- 1-propanol, at plant [RER]: 0.020006 kg; lognormal SD95 1.3765
  (4,5,1,1,1,5); Stoechiometric calculation
- P-dichlorobenzene, at plant [RER]: 0.044378 kg; lognormal SD95 1.3765
  (4,5,1,1,1,5); Stoechiometric calculation
- Secondary sulphur, at refinery [RER]: 0.0070046 kg; lognormal SD95 1.3765
  (4,5,1,1,1,5); Stoechiometric calculation
- Chemical plant, organics [RER]: 2.5948e-9 p; lognormal SD95 3.0909
  (4,5,na,na,na,na); Estimation
- Natural gas, production mix, at service station [CH]: 0.0070046 kg; lognormal SD95 1.3765
  (4,5,1,1,1,5); Stoechiometric calculation
- Sulphur trioxide, at plant [RER]: 0.12191 kg; lognormal SD95 1.3765
  (4,5,1,1,1,5); Stoechiometric calculation
- Acetonitrile, at plant [RER]: 0.11563 kg; lognormal SD95 1.3765
  (4,5,1,1,1,5); Stoechiometric calculation
- Acetic anhydride, at plant [RER]: 0.1199 kg; lognormal SD95 1.3765
  (4,5,1,1,1,5); Stoechiometric calculation
- Phosgene, liquid, at plant [RER]: 0.37476 kg; lognormal SD95 1.3765
  (4,5,1,1,1,5); Stoechiometric calculation
- Disposal, inert waste, 5% water, to construction waste landfill [CH]: 0.0062228 kg; lognormal SD95 1.3765
  (4,5,1,1,1,5); Stoechiometric calculation
- Calcium carbide, technical grade, at plant [RER]: 0.14665 kg; lognormal SD95 1.3765
  (4,5,1,1,1,5); Stoechiometric calculation
- Transport, freight, rail [RER]: 6.3897 tkm; lognormal SD95 2.095
  (4,5,na,na,na,na); Standard distances
- Ammonia, liquid, at regional storehouse [RER]: 0.04204 kg; lognormal SD95 1.3765
  (4,5,1,1,1,5); Stoechiometric calculation
- Carbon dioxide liquid, at plant [RER]: 0.095782 kg; lognormal SD95 1.3765
  (4,5,1,1,1,5); Stoechiometric calculation

## Inputs from nature
- Water, cooling, unspecified natural origin/m3 [resources, in water]: 0.15569 m3; lognormal SD95 1.3765
  (4,5,1,1,1,5); Estimation

## Emissions to nature
- Methanol [emissions to air, high. pop.]: 0.00021241 kg; lognormal SD95 1.6169
  (4,5,na,na,na,na); Estimation
- Chloroacetic acid [emissions to water, river]: 0.00042882 kg; lognormal SD95 3.0909
  (4,5,na,na,na,na); Estimation
- Sulfur trioxide [emissions to air, high. pop.]: 0.00021288 kg; lognormal SD95 1.6169
  (4,5,na,na,na,na); Estimation
- Formate [emissions to water, river]: 0.016844 kg; lognormal SD95 3.0909
  (4,5,na,na,na,na); Estimation
- Toluene [emissions to air, high. pop.]: 0.00027153 kg; lognormal SD95 1.6169
  (4,5,na,na,na,na); Estimation
- Ethanol [emissions to air, high. pop.]: 4.2695e-5 kg; lognormal SD95 1.6169
  (4,5,na,na,na,na); Estimation
- Benzene, 1,2-dichloro- [emissions to air, high. pop.]: 0.00022766 kg; lognormal SD95 1.6169
  (4,5,na,na,na,na); Estimation
- Methylamine [emissions to air, high. pop.]: 2.4496e-5 kg; lognormal SD95 1.6169
  (4,5,na,na,na,na); Estimation
- Toluene [emissions to water, river]: 0.00046735 kg; lognormal SD95 3.0909
  (4,5,na,na,na,na); Estimation
- Methanol [emissions to water, river]: 0.00062477 kg; lognormal SD95 3.0909
  (4,5,na,na,na,na); Estimation
- Chlorosulfonic acid [emissions to water, river]: 0.00024062 kg; lognormal SD95 3.0909
  (4,5,na,na,na,na); Estimation
- Nitrogen oxides [emissions to air, high. pop.]: 4.727e-5 kg; lognormal SD95 1.6169
  (4,5,na,na,na,na); Estimation
- Chlorine [emissions to air, high. pop.]: 0.0010961 kg; lognormal SD95 1.6169
  (4,5,na,na,na,na); Estimation
- Acetonitrile [emissions to water, river]: 6.617e-5 kg; lognormal SD95 3.0909
  (4,5,na,na,na,na); Estimation
- Propene [emissions to water, river]: 0.00021612 kg; lognormal SD95 3.0909
  (4,5,na,na,na,na); Estimation
- Cyanoacetic acid [emissions to air, high. pop.]: 7.9021e-5 kg; lognormal SD95 1.6169
  (4,5,na,na,na,na); Estimation
- Methane, fossil [emissions to air, high. pop.]: 0.00062796 kg; lognormal SD95 1.6169
  (4,5,na,na,na,na); Estimation
- Dimethylamine [emissions to water, river]: 0.00048049 kg; lognormal SD95 3.0909
  (4,5,na,na,na,na); Estimation
- Ammonium, ion [emissions to water, river]: 0.010687 kg; lognormal SD95 1.6169
  (4,5,na,na,na,na); Estimation
- Hydrogen [emissions to air, high. pop.]: 2.8892e-5 kg; lognormal SD95 1.6169
  (4,5,na,na,na,na); Estimation
- Carbonate [emissions to water, river]: 0.12826 kg; lognormal SD95 3.0909
  (4,5,na,na,na,na); Estimation
- Benzene, 1,2-dichloro- [emissions to water, river]: 0.00054638 kg; lognormal SD95 3.0909
  (4,5,na,na,na,na); Estimation
- 1-Propanol [emissions to air, high. pop.]: 4.0011e-5 kg; lognormal SD95 1.6169
  (4,5,na,na,na,na); Estimation
- Sulfate [emissions to water, river]: 0.088695 kg; lognormal SD95 1.6169
  (4,5,na,na,na,na); Estimation
- Sodium [emissions to water, river]: 0.56542 kg; lognormal SD95 5.1037
  (4,5,na,na,na,na); Estimation
- Chlorosulfonic acid [emissions to air, high. pop.]: 9.6489e-5 kg; lognormal SD95 1.6169
  (4,5,na,na,na,na); Estimation
- Chloroacetic acid [emissions to air, high. pop.]: 0.00027066 kg; lognormal SD95 1.6169
  (4,5,na,na,na,na); Estimation
- Propene [emissions to air, high. pop.]: 9.0048e-5 kg; lognormal SD95 1.6169
  (4,5,na,na,na,na); Estimation
- Dimethyl malonate [emissions to air, high. pop.]: 9.9092e-5 kg; lognormal SD95 1.6169
  (4,5,na,na,na,na); Estimation
- Chloride [emissions to water, river]: 0.91455 kg; lognormal SD95 3.0909
  (4,5,na,na,na,na); Estimation
- Fluoride [emissions to water, river]: 0.0095927 kg; lognormal SD95 1.6169
  (4,5,na,na,na,na); Estimation
- Heat, waste [emissions to air, high. pop.]: 7.072 MJ; lognormal SD95 1.3765
  (4,5,1,1,1,5); Calculated from the electricity input
- Methane, dichloro-, HCC-30 [emissions to air, high. pop.]: 0.00012131 kg; lognormal SD95 1.6169
  (4,5,na,na,na,na); Estimation
- Hydrogen chloride [emissions to air, high. pop.]: 6.4273e-5 kg; lognormal SD95 1.6169
  (4,5,na,na,na,na); Estimation
- Nitrate [emissions to water, river]: 0.0084027 kg; lognormal SD95 1.6169
  (4,5,na,na,na,na); Estimation
- t-Butylamine [emissions to water, river]: 0.00013116 kg; lognormal SD95 3.0909
  (4,5,na,na,na,na); Estimation
- Sulfur dioxide [emissions to air, high. pop.]: 0.026149 kg; lognormal SD95 1.3001
  (4,5,na,na,na,na); Estimation
- Hydrogen sulfide [emissions to air, high. pop.]: 2.9687e-5 kg; lognormal SD95 1.6169
  (4,5,na,na,na,na); Estimation
- Ammonia [emissions to air, high. pop.]: 0.00011145 kg; lognormal SD95 1.3713
  (4,5,na,na,na,na); Estimation
- Methane, dichloro-, HCC-30 [emissions to water, river]: 0.00029115 kg; lognormal SD95 3.0909
  (4,5,na,na,na,na); Estimation
- Sulfur [emissions to water, river]: 0.00035023 kg; lognormal SD95 1.6169
  (4,5,na,na,na,na); Estimation
- Methylamine [emissions to water, river]: 5.8792e-5 kg; lognormal SD95 3.0909
  (4,5,na,na,na,na); Estimation
- Calcium [emissions to water, river]: 0.085507 kg; lognormal SD95 3.0909
  (4,5,na,na,na,na); Estimation
- Acetic acid [emissions to air, high. pop.]: 0.0002398 kg; lognormal SD95 1.6169
  (4,5,na,na,na,na); Estimation
- Ethanol [emissions to water, river]: 0.016157 kg; lognormal SD95 3.0909
  (4,5,na,na,na,na); Estimation
- t-Butylamine [emissions to air, high. pop.]: 5.4649e-5 kg; lognormal SD95 1.6169
  (4,5,na,na,na,na); Estimation
- 1-Propanol [emissions to water, river]: 9.6026e-5 kg; lognormal SD95 3.0909
  (4,5,na,na,na,na); Estimation
- Acetic acid [emissions to water, river]: 0.001194 kg; lognormal SD95 3.0909
  (4,5,na,na,na,na); Estimation
- Carbon dioxide, fossil [emissions to air, high. pop.]: 0.56976 kg; lognormal SD95 1.3001
  (4,5,na,na,na,na); Estimation
- Methanesulfonic acid [emissions to air, high. pop.]: 7.9853e-5 kg; lognormal SD95 1.6169
  (4,5,na,na,na,na); Estimation
- Water [emissions to water, unspecified]: 147.905 kg; lognormal SD95 2.5196
  (5,5,5,5,5,BU:1.05); All uncertainty-values set to 5.0 by default. Balance of input water

## Sampling procedure
Literature data

## Extrapolations
Transports and emissions are modelled with standard methods.

## Sources
- Nemecek T., Kaegi T., 2007, 2007 - LCI agricultural prod. systems - Nemecek, Ecoinvent report version 2.0, 15, Swiss Centre for LCI, ART, Duebendorf and Zuerich, CH
Nemecek, T., Kägi, T., Blaser, S. (2007) Life Cycle Inventories of Agricultural Production Systems. Ecoinvent report version 2.0. Editors: 0. Volume: 15. Swiss Centre for LCI, ART. Duebendorf and Zurich, CH.
Type: Measurement on site
Source: CD-ROM
First author: Nemecek, T.
Other authors: Kägi, T., Blaser, S.
Year: 2007
Name of editors: 0
Title of anthology: Ecoinvent report version 2.0
Place of publication: Duebendorf and Zurich, CH
Publisher: Swiss Centre for LCI, ART
Volume No: 15

## Validation
Proof reading validation: Passed.; Other validation: none;
