# xxx Photovoltaic panel, pc-Si, at plant

Dataset: EcoSpold 1, unit process, infrastructure
Functional unit: 1 p
Category: material, obsolete / others, obsolete
Geography: RER
Production volume: Worldwide module production in 2000, 238MW (60%pc-Si, 40% mc-Si). Europe 23MW.
Generated by: Niels Jungbluth
accessRestrictedTo: 0
copyright: true

## General comment
Production of solar panels with 72 solar cells a 125*125cm2 with a capacity of 166Wp. Production of 18000 panels per year.;
Synonyms: PV-module;

## Included processes
Production of the cell matrix, cutting of foils and washing of glass, production of laminate, isolation. Aluminium frame of the panel.

## Technology
Modern production plant.

## Time period
Date of publication.

## Reference product
- xxx Photovoltaic panel, pc-Si, at plant [RER]: 1 p
  Europe

## Inputs from technosphere
- Transport, freight, rail [RER]: 9.7414 tkm; lognormal SD95 2.095
  (4,5,na,na,na,na); Standard distance 600km
- Brazing solder, cadmium free, at plant [RER]: 0.0121 kg; lognormal SD95 1.286
  (3,4,3,3,1,5); Hagedorn 1992
- Lubricating oil, at plant [RER]: 0.0019556 kg; lognormal SD95 1.1267
  (1,4,1,3,1,3); Environmental report, GSS
- Polyvinylidenchloride, granulate, at plant [RER]: 0.05454 kg; lognormal SD95 1.286
  (3,4,3,3,1,5); Hagedorn 1992, PVF 36% in foil
- Glass fibre reinforced plastic, polyamide, injection moulding, at plant [RER]: 0.021 kg; lognormal SD95 1.286
  (3,4,3,3,1,5); Hagedorn 1992
- Calcium borates, at plant [TR]: 0.0133 kg; lognormal SD95 1.1267
  (1,4,1,3,1,3); Environmental report, GSS
- Natural gas, burned in industrial furnace 1MW [CH]: 14 MJ; lognormal SD95 1.1267
  (1,4,1,3,1,3); Environmental report, GSS
- Disposal, aluminium, 0% water, to municipal incineration [CH]: 0.224 kg; lognormal SD95 1.286
  (3,4,3,3,1,5); Hagedorn 1992, foil
- Photovoltaic panel factory [GLO]: 4e-6 p; lognormal SD95 3.0162
  (1,4,1,3,1,3); Environmental report, GSS
- Disposal, polyvinylfluoride, 0.2% water, to municipal incineration [CH]: 0.05454 kg; lognormal SD95 1.286
  (3,4,3,3,1,5); Hagedorn 1992
- Treatment, sewage, from residence, to wastewater treatment, class 2 [CH]: 0.027 m3; lognormal SD95 1.1267
  (1,4,1,3,1,3); Environmental report, GSS
- Epoxy resin, liquid, at plant [RER]: 0.005 kg; lognormal SD95 1.286
  (3,4,3,3,1,5); Hagedorn 1992
- Disposal, plastics, mixture, 15.3% water, to municipal incineration [CH]: 1.646 kg; lognormal SD95 1.286
  (3,4,3,3,1,5); Hagedorn 1992
- Aluminium alloy, AlMg3, at plant [RER]: 2.4 kg; lognormal SD95 1.1267
  (1,4,1,3,1,3); Environmental report, GSS
- Vinyl acetate, at plant [RER]: 0.002 kg; lognormal SD95 1.1267
  (1,4,1,3,1,3); Ethylacetat, environmental report, GSS
- Solar glass, low-iron, at regional storage [RER]: 11.5 kg; lognormal SD95 1.286
  (3,4,3,3,1,5); Hagedorn 1992
- Polystyrene, high impact, HIPS, at plant [RER]: 0.08 kg; lognormal SD95 1.286
  (3,4,3,3,1,5); Häne 1991, ABS packaging
- Electricity, medium voltage, production ENTSO-E, at grid: 8 kWh; lognormal SD95 3
  Environmental report, GSS, large variations in literature
- Methanol, at regional storage [CH]: 0.0026233 kg; lognormal SD95 1.1267
  (1,4,1,3,1,3); Environmental report, GSS
- Polyethylene, LDPE, granulate, at plant [RER]: 0.02 kg; lognormal SD95 1.286
  (3,4,3,3,1,5); Hagedorn 1992, foil
- Acetone, liquid, at plant [RER]: 4.3933e-5 kg; lognormal SD95 1.1267
  (1,4,1,3,1,3); Environmental report, GSS
- xxx Photovoltaic cell, pc-Si , at plant [RER]: 112.5 p; lognormal SD95 1.2077
  (4,na,1,1,1,na); Estimation 72 cells a 1.56dm2 = 112.5 cells a 1dm2
- Copper, at regional storage [RER]: 6.7e-7 kg; lognormal SD95 1.1267
  (1,4,1,3,1,3); Environmental report, GSS
- Polyester resin, unsaturated, at plant [RER]: 0.06604 kg; lognormal SD95 1.286
  (3,4,3,3,1,5); Hagedorn 1992, backside-foil
- Synthetic rubber, at plant [RER]: 0.36 kg; lognormal SD95 1.286
  (3,4,3,3,1,5); Hagedorn 1992
- Ethylvinylacetate, foil, at plant [RER]: 1.11 kg; lognormal SD95 1.1267
  (1,4,1,3,1,3); EVA foil, environmental report, GSS
- Disposal, used mineral oil, 10% water, to hazardous waste incineration [CH]: 0.0071111 kg; lognormal SD95 1.1267
  (1,4,1,3,1,3); Environmental report, GSS
- Corrugated board, mixed fibre, single wall, at plant [RER]: 0.1 kg; lognormal SD95 1.286
  (3,4,3,3,1,5); Packaging, Häne 1991
- Aluminium, production mix, wrought alloy, at plant [RER]: 0.224 kg; lognormal SD95 1.286
  (3,4,3,3,1,5); Hagedorn 1992, backside-foil
- Tempering, flat glass [RER]: 11.5 kg; lognormal SD95 1.286
  (3,4,3,3,1,5); Estimation
- Tap water, at user [RER]: 27 kg; lognormal SD95 1.1267
  (1,4,1,3,1,3); Environmental report, GSS
- Silica sand, at plant [DE]: 0.006 kg; lognormal SD95 1.286
  (3,4,3,3,1,5); Hagedorn 1992
- Disposal, municipal solid waste, 22.9% water, to municipal incineration [CH]: 1 kg; lognormal SD95 1.1267
  (1,4,1,3,1,3); Environmental report, GSS
- Aluminium, production mix, cast alloy, at plant [RER]: 0.253 kg; lognormal SD95 1.286
  (3,4,3,3,1,5); Hagedorn 1992, connection box
- Transport, freight, lorry, fleet average [RER]: 2.0613 tkm; lognormal SD95 2.095
  (4,5,na,na,na,na); Standard distance 100km, cells 500km
- Silicone product, at plant [RER]: 0.004 kg; lognormal SD95 1.1267
  (1,4,1,3,1,3); silicon rubber, environmental report, GSS

## Emissions to nature
- Heat, waste [emissions to air, unspecified]: 28.8 MJ; lognormal SD95 1.286
  (3,4,3,3,1,5); Calculation

## Sampling procedure
Environmental reports and publication of plant data.

## Extrapolations
Number of cells 112.5 because of smaller size of cells.

## Sources
- Jungbluth N., Stucki M., Frischknecht R., 2009, 2009 - Photovoltaics - Jungbluth, Sachbilanzen von Energiesystemen. Final report No. 6 ecoinvent v2.1, 6, Swiss Centre for LCI, ESU-services Ltd., Duebendorf, CH
Jungbluth, N., Stucki, M., Frischknecht, R. (2009) Photovoltaics. Sachbilanzen von Energiesystemen. Final report No. 6 ecoinvent v2.1. Editors: Bauer C.. Volume: 6. Swiss Centre for LCI, PSI. Dübendorf and Villigen, CH.
Type: Measurement on site
Source: CD-ROM
First author: Jungbluth, N.
Other authors: Stucki, M., Frischknecht, R.
Year: 2009
Name of editors: Bauer C.
Title of anthology: Sachbilanzen von Energiesystemen. Final report No. 6 ecoinvent v2.1
Place of publication: Dübendorf and Villigen, CH
Publisher: Swiss Centre for LCI, PSI
Volume No: 6

## Validation
Proof reading validation: Passed.; Other validation: none;
