# Heat, olive pomace, burned in furnace, ash to municipal incineration

Dataset: EcoSpold 1, unit process
Functional unit: 1 MJ
Category: heat / biomass\heating systems
Geography: CH
Time period: 2006-01 to 2006-12
Share of production covered: 0 %
Generated by: Matthias Stucki
accessRestrictedTo: 0
copyright: true

## General comment
Provision of heat with efficiency factor 0.85 (estimated);

## Included processes
This data set describes the efficiency of the combustion

## Geography
The inventory is modelled for a typical production area for olives in the Lythrodontas region in Cyprus.

## Technology
Boiler Furnace

## Time period
Collection of data and publication.

## Reference product
- Heat, olive pomace, burned in furnace, ash to municipal incineration [CH]: 1 MJ
  SWITZERLAND

## Inputs from technosphere
- Olive pomace, burned in furnace, ash to municipal incineration [CY]: 1.1765 MJ; lognormal SD95 2.3401
  (1,5,5,5,5,5,BU:1.05); Estimated efficiency factor 0.85

## Sampling procedure
Literature

## Sources
- Itten R., Stucki M., Jungbluth N., 2011, 2011 - LCA burning diff. solid biomass substrates - Itten, Project report, 321, ESU-services Ltd., Uster, CH
Itten R.,, Jungbluth N. (2011) Life Cycle Assessment of Burning Different Biomass Substrates. Project report. Volume: 321. ESU-services Ltd.. Uster, CH.
Type: Separate publication
Source: Report
First author: Itten R.,
Other authors: Jungbluth N.
Year: 2011
Title of anthology: Project report
Place of publication: Uster, CH
Publisher: ESU-services Ltd.
Volume No: 321

## Validation
Proof reading validation: 29.04.2011; Other validation: Z:\ESU-Docs\Projekte laufend\321 FP Biomasse Verbrennung Feste Substrate\EcoSpold\[321_Biomasse_6-30kW-v1.0.xlsx]X-Process;
