# Anhydrite floor screed, matured

Dataset: EcoSpold 1, unit process
Functional unit: 1 kg
Category: construction materials / subfloors
Geography: CH
Time period: 2000-01 to 2016-12
Generated by: Daniel Savi
accessRestrictedTo: 0
copyright: true

## General comment
Anhydrit-UB, ausgehärtet
Version: 0.0

Local category: construction materials
Local subcategory: Unterlagsboeden

## Reference product
- Anhydrite floor screed, matured [CH]: 1 kg
  SWITZERLAND

## Inputs from technosphere
- Anhydrite floor screed, per m2 [CH]: 0.00830565 m2; lognormal SD95 1.61689
  (4;5;1;1;1)

## Emissions to nature
- Water [emissions to air, high. pop.]: 0.1189 kg; lognormal SD95 1.61689
  (4;5;1;1;1)

## Sources
- Kasser U., R. Frischknecht, M. Klingler, D. Savi, R. Itten, F. Wyss,P. Stolz, L. Tschuemperlin, 2016, 2016 - Renewal and exp. of LCA data in KBOB - Kasser, -, Buero fuer Umweltchemie, treeze Ltd., Zuerich and Uster, CH
U. Kasser, R. Frischknecht, M. Klingler, D. Savi, R. Itten, F. Wyss,P. Stolz, L. Tschümperlin 2016 (2015Z) Erneuerung und Erweiterung der Ökobilanzdaten in der KBOB-Liste "Ökobilanzdaten im Baubereich", Projekt QualiBOB. unknown.

First author: U. Kasser, R. Frischknecht, M. Klingler, D. Savi, R. Itten, F. Wyss,P. Stolz, L. Tschümperlin 2016
Year: 2015Z
Place of publication: unknown
Original title: Erneuerung und Erweiterung der Ökobilanzdaten in der KBOB-Liste "Ökobilanzdaten im Baubereich", Projekt QualiBOB
