# Barge

Dataset: EcoSpold 1, unit process, infrastructure
Functional unit: 1 p
Category: water / operations\infrastructure
Geography: RER
Time period: 2000-01 to 2000-12
Generated by: Michael Spielmann
accessRestrictedTo: 0
copyright: true

## General comment
The exchanges of the barge manufacturing are derived from an assessment of one barge, with a load capacity of 2800t. This data was adjusted to model a barge, representing the current average total capacity for solid goods transports (1000 tonnes/barge). Energy consumption in manufacturing was estimated as 50% of the cumulative energy of the used materials. The split of energies is 10% electricity and 90% heavy fuel oil.;

## Included processes
This inventory calls processes of material production, representing the material composition of an average water vehicle used for solid goods transportation. For manufacturing, electricity and heavy oil burned in industrial furnace are included. For the transportation of materials standandard distance are applied. Also, waste treatment processes for non metal components of a water vehicle are accounted for.

## Geography
Manufacturing data represents conditions in Europe.

## Technology
The modelled barge is considered as a mix for motorships and push tugs.

## Reference product
- Barge [RER]: 1 p
  Europe

## Inputs from technosphere
- Synthetic rubber, at plant [RER]: 471 kg; lognormal SD95 1.38
  (3,4,3,3,3,4); literatures studies
- Cast iron, at plant [RER]: 17300 kg; lognormal SD95 1.38
  (3,4,3,3,3,4); literatures studies
- Cement, unspecified, at plant [CH]: 3610 kg; lognormal SD95 1.38
  (3,4,3,3,3,4); literatures studies
- Transport, freight, lorry, fleet average [RER]: 30000 tkm; lognormal SD95 2.28
  (4,5,na,na,na,na); calculation based on standadard distances
- Chromium steel 18/8, at plant [RER]: 3450 kg; lognormal SD95 1.38
  (3,4,3,3,3,4); literatures studies
- Electricity, medium voltage, production ENTSO-E, at grid: 105000 kWh; lognormal SD95 1.94
  (4,5,4,3,5,4); literatures studies
- Ceramic tiles, at regional storage [CH]: 1100 kg; lognormal SD95 1.38
  (3,4,3,3,3,4); literatures studies
- Disposal, plastics, mixture, 15.3% water, to sanitary landfill [CH]: 2350 kg; lognormal SD95 1.87
  (3,4,3,3,5,5); own estimate, based on material composition
- Disposal, emulsion paint, 0% water, to municipal incineration [CH]: 628 kg; lognormal SD95 1.87
  (3,4,3,3,5,5); own estimate, based on material composition
- Glued laminated timber, average glue mix, at plant [RER]: 1.17 m3; lognormal SD95 1.38
  (3,4,3,3,3,4); literatures studies
- Copper, at regional storage [RER]: 2200 kg; lognormal SD95 1.38
  (3,4,3,3,3,4); literatures studies
- Rock wool, packed, at plant [CH]: 2830 kg; lognormal SD95 1.38
  (3,4,3,3,3,4); literatures studies
- Polyethylene, LDPE, granulate, at plant [RER]: 1570 kg; lognormal SD95 1.38
  (3,4,3,3,3,4); literatures studies
- Reinforcing steel, at plant [RER]: 265000 kg; lognormal SD95 1.38
  (3,4,3,3,3,4); literatures studies
- Heavy fuel oil, burned in industrial furnace 1MW, non-modulating [RER]: 3.4e6 MJ; lognormal SD95 1.94
  (4,5,4,3,5,4); literatures studies
- Aluminium, production mix, at plant [RER]: 157 kg; lognormal SD95 1.38
  (3,4,3,3,3,4); literatures studies
- Alkyd paint, white, 60% in solvent, at plant [RER]: 1570 kg; lognormal SD95 1.38
  (3,4,3,3,3,4); literatures studies
- Disposal, wood untreated, 20% water, to municipal incineration [CH]: 629 kg; lognormal SD95 2.28
  (5,5,3,3,5,5); own estimate, based on material composition
- Transport, freight, rail [RER]: 60100 tkm; lognormal SD95 2.28
  (4,5,na,na,na,na); calculation based on standadard distances
- Polyethylene, HDPE, granulate, at plant [RER]: 784 kg; lognormal SD95 1.38
  (3,4,3,3,3,4); literatures studies

## Emissions to nature
- Heat, waste [emissions to air, unspecified]: 378000 MJ; lognormal SD95 1.27
  (4,3,2,1,1,3); standard value
- NMVOC, non-methane volatile organic compounds, unspecified origin [emissions to air, unspecified]: 942 kg; lognormal SD95 1.68
  (3,4,3,3,3,4); estimated from the used paint (60%B solvent as NMVOC)

## Sampling procedure
literature studies and own calculations.

## Sources
- Spielmann M., Bauer C., Dones R., Tuchschmid M., 2007, 2007 - Transport services - Spielmann, Final report ecoinvent Data v2.0, 14, Swiss Centre for LCI, PSI, ESU-services Ltd., Duebendorf, Villigen and Uster, CH
Spielmann M., Dones R; Bauer C. (2007) Life Cycle Inventories of Transport Services. Final report ecoinvent Data v2.0. Volume: 14. Issue: 0. Swiss Centre for LCI, PSI. Dübendorf and Villigen, CH.
Type: Measurement on site
Source: CD-ROM
First author: Spielmann M.
Other authors: Dones R; Bauer C.
Year: 2007
Title of anthology: Final report ecoinvent Data v2.0
Place of publication: Dübendorf and Villigen, CH
Publisher: Swiss Centre for LCI, PSI
Volume No: 14
Issue No: 0

## Validation
Proof reading validation: Passed.; Other validation: none;
