# Footpath, gravel pavement, complete pavement structure

Dataset: EcoSpold 1, unit process, infrastructure
Functional unit: 1 m2
Category: construction / infrastructure
Geography: CH
Time period: 2025 to 2030
Synonyms: 0
Generated by: Thomas Pohl
accessRestrictedTo: 0
copyright: true

## General comment
Modern Swiss and European technologies are applied to regional storage facilities, material extraction, and production processes.

## Included processes
This dataset combines the production, installation, deconstruction and end-of-life treatment of all layer types of 1 m2 gravel footpath in Switzerland. Service life 30 years

## Geography
Switzerland

## Technology
Width 1.5 m incl. foundation; curbstones 12×30 cm; concrete foundation 20×25 cm with curbstone embedded 15 cm centrally. layers: 15 cm reused excavation, 20 cm crushed stone/ gravel, 5 cm fine gravel as surface layer; Based on assumptions.

## Time period
Review of data currency scheduled after 5 years.

## Reference product
- Footpath, gravel pavement, complete pavement structure [CH]: 1 m2

## Inputs from technosphere
- Footpath, gravel pavement, production and installation [CH]: 1 m2; lognormal SD95 3.1365
  (4,5,1,1,1,5,BU:3); ;
- Disposal, footpath, gravel pavement [CH]: 1 m2; lognormal SD95 3.1365
  (4,5,1,1,1,5,BU:3); ;

## Sources
- Pohl T., Stamm R., 2025, 2025 - Datasets construction machinery and infra. - Pohl, Hintergrundbericht, Umtec Technologie AG, Bern, CH
