# Fuel elements PWR, UO2 4.2% centrifuge & MOX, at nuclear fuel fabrication plant

Dataset: EcoSpold 1, unit process
Functional unit: 1 kg
Category: fuels / uranium\fuel element
Geography: CH
Time period: 2000-01 to 2000-12
Generated by: Roberto Dones
accessRestrictedTo: 0
copyright: true

## General comment
The shares are based on the real total energy that will be obtained by MOX fuels in current Swiss PWRs over their entire lifetime. This module belongs to the chain with enrichment from centrifuge only. Hence, the indication of data validity inputted in "TimePeriod" only says that the shares represent the knowledge available today of the fuel management for the Swiss PWRs.;

## Included processes
The module consists of the share of UO2 and MOX fuel elements.

## Geography
Hypothetical use of centrifuge enrichment only, for the Swiss PWRs

## Technology
Data reflects the use of UO2 and MOX fuel elements in current nuclear reactors.

## Reference product
- Fuel elements PWR, UO2 4.2% centrifuge & MOX, at nuclear fuel fabrication plant [CH]: 1 kg
  SWITZERLAND

## Inputs from technosphere
- U enriched 4.2%, centrifugal enrichment, at nuclear fuel fabrication plant [CH]: 0.92 kg; lognormal SD95 1.01
  reliable source
- MOX fuel element for LWR, at nuclear fuel fabrication plant [UCTE]: 0.08 kg; lognormal SD95 1.05
  reliable source

## Sampling procedure
Literature

## Sources
- Dones R., Bauer C., Doka G., 2009, 2009 - Nuclear energy - Dones, Sachbilanzen von Energiesystemen. Final report No. 6 ecoinvent v2.1, 6, Swiss Centre for LCI, PSI, Doka LCA, Duebendorf and Villigen, CH
Dones, R., Doka G. (2009) Kernenergie. Sachbilanzen von Energiesystemen. Final report No. 6 ecoinvent v2.1. Editors: Bauer C.. Volume: 6. Swiss Centre for LCI, PSI. Dübendorf and Villigen, CH.
Type: Measurement on site
Source: CD-ROM
First author: Dones, R.
Other authors: Doka G.
Year: 2009
Name of editors: Bauer C.
Title of anthology: Sachbilanzen von Energiesystemen. Final report No. 6 ecoinvent v2.1
Place of publication: Dübendorf and Villigen, CH
Publisher: Swiss Centre for LCI, PSI
Volume No: 6

## Validation
Proof reading validation: passed; Other validation: for final calculation August 2003;
