# Asphalt plant operation

Dataset: EcoSpold 1, unit process, infrastructure
Functional unit: 1 kg
Category: construction materials / infrastructure
Geography: CH
Time period: 2025 to 2030
Synonyms: 0
Production volume: 80'000 tons
Share of production covered: 50 %
Generated by: Thomas Pohl
accessRestrictedTo: 0
copyright: true

## General comment
The data on the technical infrastructure originates from Ammann Schweiz AG, one of the world’s leading manufacturers of mixing plants and machinery for the construction industry, with core expertise in road construction and transport infrastructure.

## Included processes
The process includes the plant buildings, process technology, silos, tanks, exhaust ducts, and conveyor belts.

## Geography
Switzerland

## Technology
According to Ammann Schweiz AG, an average asphalt mixing plant has a service life of around 25 years, with an operating time of 750 h/a and an annual production of approximately 80'000 tons.

## Time period
Review of data currency scheduled after 5 years.

## Reference product
- Asphalt plant operation [CH]: 1 kg

## Inputs from technosphere
- Industrial machine, heavy, unspecified, at plant [RER]: 1.25e-5 kg; lognormal SD95 3.0611
  (2,4,1,1,1,5,BU:3); Screens: 1 vibrating screen with 6 decks, separating fractions 0/2, 2/4, 4/8, 8/11, 11/16, 16/22, with a weight of 10 tons, throughput 80'000 t/a, service life 10 years. ; Based on information from Ammann Switzerland AG. Data for a typical asphalt plant in Switzerland.
- Steel, low-alloyed, at plant [RER]: 1.5e-5 kg; lognormal SD95 1.2423
  (2,4,1,1,1,5,BU:1.05); Hot mineral silo, 30 tons, throughput 80'000 t/a, service life 25 years. ; Based on information from Ammann Switzerland AG. Data for a typical asphalt plant in Switzerland.
- Industrial machine, heavy, unspecified, at plant [RER]: 1.25e-5 kg; lognormal SD95 3.0611
  (2,4,1,1,1,5,BU:3); White drum: 25 tons, throughput 80'000 t/a, service life 25 years.; Based on information from Ammann Switzerland AG. Data for a typical asphalt plant in Switzerland.
- Industrial machine, heavy, unspecified, at plant [RER]: 1e-5 kg; lognormal SD95 3.0611
  (2,4,1,1,1,5,BU:3); Black drum: 20 tons, throughput 80'000 t/a, service life 25 years.; Based on information from Ammann Switzerland AG. Data for a typical asphalt plant in Switzerland.
- Industrial machine, heavy, unspecified, at plant [RER]: 3.5e-6 kg; lognormal SD95 3.0611
  (2,4,1,1,1,5,BU:3); Mixer: 7 tons, throughput 80'000 t/a, service life 25 years.; Based on information from Ammann Switzerland AG. Data for a typical asphalt plant in Switzerland.
- Industrial machine, heavy, unspecified, at plant [RER]: 1.35e-5 kg; lognormal SD95 3.0611
  (2,4,1,1,1,5,BU:3); Bucket elevators (hot elevator, filler elevator, and RAP elevator): 27 tons, throughput 80'000 t/a, service life 25 years.; Based on information from Ammann Switzerland AG. Data for a typical asphalt plant in Switzerland.
- Industrial machine, heavy, unspecified, at plant [RER]: 2e-5 kg; lognormal SD95 3.0611
  (2,4,1,1,1,5,BU:3); Feeders: 10 feeders for virgin minerals, 2 feeders for RAP material, total 40 tons, throughput 80'000 t/a, service life 25 years.; Based on information from Ammann Switzerland AG. Data for a typical asphalt plant in Switzerland.
- Steel, low-alloyed, at plant [RER]: 4.5e-5 kg; lognormal SD95 1.2423
  (2,4,1,1,1,5,BU:1.05); Bitumen tanks: 5 tanks of 18 tons each, throughput 80'000 t/a, service life 25 years.; Based on information from Ammann Switzerland AG. Data for a typical asphalt plant in Switzerland.
- Industrial machine, heavy, unspecified, at plant [RER]: 3.75e-5 kg; lognormal SD95 3.0611
  (2,4,1,1,1,5,BU:3); Dedusting unit: 30 tons, throughput 80'000 t/a, service life 10 years.; Based on information from Ammann Switzerland AG. Data for a typical asphalt plant in Switzerland.
- Steel, low-alloyed, at plant [RER]: 9.5e-5 kg; lognormal SD95 1.2423
  (2,4,1,1,1,5,BU:1.05); Silos: mixed material silo with 5 chambers, 170 tons + filler tower, 20 tons; throughput 80'000 t/a; service life: 25 years.; Based on information from Ammann Switzerland AG. Data for a typical asphalt plant in Switzerland.
- Steel, low-alloyed, at plant [RER]: 1.5e-5 kg; lognormal SD95 1.2423
  (2,4,1,1,1,5,BU:1.05); Exhaust pipes: raw and clean gas ducts for virgin mineral and RAP, as well as a steel chimney (grade 37), 30 tons; throughput: 80'000 t/a; service life: 25 years.; Based on information from Ammann Switzerland AG. Data for a typical asphalt plant in Switzerland.
- Conveyor belt, at plant [RER]: 1e-7 m; lognormal SD95 3.0611
  (2,4,1,1,1,5,BU:3); Conveyor belts: 200 m; throughput: 80'000 t/a; service life: 25 years.; Based on information from Ammann Switzerland AG. Data for a typical asphalt plant in Switzerland.
- Diesel, burned in building machine, with particle filter [CH]: 0.00376 MJ; lognormal SD95 2.0641
  (2,4,1,1,1,5,BU:2); Wheel loader: diesel consumption 8,500 L/a; density 0.83 kg/L; calorific value 11.89 kWh/kg; throughput: 80'000 t/a.; Based on information from Ammann Switzerland AG. Data for a typical asphalt plant in Switzerland.
- Lubricating oil, at plant [RER]: 1.62e-6 kg; lognormal SD95 1.2423
  (2,4,1,1,1,5,BU:1.05); Lubricating oil: consumption 150 L/a; density 0.865 kg/L; throughput: 80'000 t/a.; Based on information from Ammann Switzerland AG. Data for a typical asphalt plant in Switzerland.
- Building, hall, steel construction [CH]: 1.5e-6 m2; lognormal SD95 3.0611
  (2,4,1,1,1,5,BU:3); Building envelope: 3'000 m²; throughput: 80'000 t/a; service life: 25 years.; Based on information from Ammann Switzerland AG. Data for a typical asphalt plant in Switzerland.

## Inputs from nature
- Occupation, industrial area, built up [resources, land]: 0.0001 m2a; lognormal SD95 1.5798
  (2,4,1,1,1,5,BU:1.5); Plant buildings, including storage and handling areas. Building envelope: 3'000 m²; storage and handling space: 5'000 m²; throughput: 80'000 t/a; service life: 25 years.; Based on information from Ammann Switzerland AG. Data for a typical asphalt plant in Switzerland.
- Transformation, from unknown [resources, land]: 4e-6 m2; lognormal SD95 2.0641
  (2,4,1,1,1,5,BU:2); Plant buildings, including storage and handling areas. Building envelope: 3,000 m²; storage and handling space: 5,000 m²; throughput: 80,000 t/a; service life: 25 years. Calculations: 8000 m²/ 80'000 t/a / 25a; Based on information from Ammann Switzerland AG. Data for a typical asphalt plant in Switzerland.
- Transformation, to industrial area, built up [resources, land]: 4e-6 m2; lognormal SD95 2.0641
  (2,4,1,1,1,5,BU:2); Plant buildings, including storage and handling areas. Building envelope: 3,000 m²; storage and handling space: 5,000 m²; throughput: 80'000 t/a; service life: 25 years. Calculations: 8000 m²/ 80'000 t/a / 25a; Based on information from Ammann Switzerland AG. Data for a typical asphalt plant in Switzerland.

## Sampling procedure
Survey

## Sources
- Pohl T., Spitzhofer N., Osterwalder D., 2025, 2025 - Asphalt calculator - Pohl, 51, Umtec Technologie AG, Zuerich, CH
