# Refractory, high aluminium oxide, packed, at plant

Dataset: EcoSpold 1, unit process
Functional unit: 1 kg
Category: construction / bricks
Geography: DE
Time period: 2000-01 to 2000-12
Generated by: Tina Kuenniger
accessRestrictedTo: 0
copyright: true

## Included processes
Includes the whole manufacturing process, internal processes (transport, etc.), packing and infrastructure. No administration is included.; Geography: German, European and global modules used as proxy. Manufacturing data from Germany for German module. Switzerland is not producing any high alumina refractories.

## Technology
typical technology for German production

## Reference product
- Refractory, high aluminium oxide, packed, at plant [DE]: 1 kg
  GERMANY

## Inputs from technosphere
- Transport, transoceanic freight ship [OCE]: 10.4 tkm; lognormal SD95 2.06
  (2,4,1,2,1,5);
- Lime, hydrated, packed, at plant [CH]: 0.015 kg; lognormal SD95 1.24
  (2,4,1,3,1,5);
- Transport, freight, rail [RER]: 0.522 tkm; lognormal SD95 2.06
  (2,4,1,2,1,5);
- Mine, clay [CH]: 2e-11 p; lognormal SD95 3.1
  (1,5,1,3,4,5);
- Packing, clay products [CH]: 1 kg; lognormal SD95 1.12
  (3,n.A.,n.A.,3,1,n.A.);
- Lubricating oil, at plant [RER]: 1.31e-5 kg; lognormal SD95 1.1
  (1,5,1,2,4,5);
- Natural gas, burned in industrial furnace 1MW [CH]: 5.7 MJ; lognormal SD95 1.24
  (2,4,1,2,1,5);
- Clay, at mine [CH]: 0.055 kg; lognormal SD95 1.24
  (2,4,1,3,1,5);
- Diesel, burned in building machine, average [CH]: 2.64 MJ; lognormal SD95 1.24
  (2,4,1,2,1,5);
- Transport, freight, lorry, 16t-32t gross weight, fleet average [CH]: 0.00275 tkm; lognormal SD95 2.06
  (2,4,1,3,1,5);
- Bauxite, at mine [GLO]: 1.04 kg; lognormal SD95 1.24
  (2,4,1,2,1,5);
- Transport, freight, lorry, 3.5t gross weight, fleet average [CH]: 0.00237 tkm; lognormal SD95 2.06
  (2,4,1,3,1,5);
- Disposal, municipal solid waste, 22.9% water, to municipal incineration [CH]: 0.005 kg; lognormal SD95 1.24
  (2,4,1,3,1,5);
- Transport, freight, lorry, 7.5t-16t gross weight, fleet average [CH]: 0.00025 tkm; lognormal SD95 2.06
  (2,4,1,3,1,5);
- Industrial machine, heavy, unspecified, at plant [RER]: 0.000167 kg; lognormal SD95 4.1
  (5,4,1,2,1,5);
- Electricity, medium voltage, at grid [DE]: 0.129 kWh; lognormal SD95 1.24
  (2,4,1,1,1,5);

## Inputs from nature
- Water, unspecified natural origin/m3 [resources, in water]: 2e-5 m3; lognormal SD95 1.24
  (2,4,1,3,1,5);

## Emissions to nature
- Heat, waste [emissions to air, unspecified]: 0.464 MJ; lognormal SD95 1.24
  (2,4,1,2,1,5);
- Water [emissions to water, unspecified]: 0.019 kg; lognormal SD95 2.5196
  (5,5,5,5,5,BU:1.05); All uncertainty-values set to 5.0 by default. Balance of input water

## Sampling procedure
Measured data of one German plant

## Extrapolations
See geography

## Sources
- Kellenberger D., Althaus H.-J., Jungbluth N., Kuenniger T., Lehmann M., Thalmann P., 2007, 2007 - LCI building products - Kellenberger, Final report ecoinvent data v2.0, 7, Swiss Centre for LCI, Empa - TSL, ESU-services Ltd., Bau- und Umweltchimie, Duebendorf, CH
Kellenberger D., Althaus H.-J., Jungbluth N., Künniger T. (2007) Life Cycle Inventories of Building Products. Final report ecoinvent data v2.0. Volume: 7. Swiss Centre for LCI, Empa - TSL. Dübendorf, CH.
Type: Measurement on site
Source: CD-ROM
First author: Kellenberger D.
Other authors: Althaus H.-J., Jungbluth N., Künniger T.
Year: 2007
Title of anthology: Final report ecoinvent data v2.0
Place of publication: Dübendorf, CH
Publisher: Swiss Centre for LCI, Empa - TSL
Volume No: 7

## Validation
Proof reading validation: passed; Other validation: none;
