# Hot rolling, electric steel

Dataset: EcoSpold 1, unit process
Functional unit: 1 kg
Category: metals / chipless shaping
Geography: RER
Time period: 2020 to 2025
Generated by: Jonas Giger
accessRestrictedTo: 0
copyright: true

## General comment
This process was created based on the following process: "Hot rolling, steel {RER}". The material input for the loss consists of 100% secondary material. The ‘sheet rolling, electric’ process with secondary material was used to have only secondary material flows in the upstream process chain.

To achieve greater toughness, shock resistance and tensile strength, the raw steel production outputs cast ingots, slabs, billets and beam blanks are hot rolled to long or flat products or semifinished products.

Synonyms: Hot forming

## Geography
Data relate to plants in Europe

## Technology
Average technique for EU. Assumption: heating 100% with natural gas. Furnaces of about 10 MW are approxi-mated by furnace "> 100 kW"

## Time period
Time of publications.

## Reference product
- Hot rolling, electric steel [RER]: 1 kg

## Inputs from technosphere
- Disposal, municipal solid waste, 22.9% water, to municipal incineration [CH]: 7.08e-11 kg; lognormal SD95 1.30001
  (2,5,1,1,3,3);
- Propane, butane, at refinery [RER]: 0.00053 kg; lognormal SD95 1.20001
  (1,5,1,1,1,3);
- Disposal, basic oxygen furnace wastes, 0% water, to residual material landfill [CH]: 0.000483 kg; lognormal SD95 4.5
  calculated from max value assuming lognormal distribution
- Electricity, medium voltage, production ENTSO-E, at grid [ENTSO-E]: 0.14 kWh; lognormal SD95 1.1
  (3,3,1,1,1,3);
- Disposal, sludge from steel rolling, 20% water, to residual material landfill [CH]: 0.0163 kg; lognormal SD95 1.20001
  (2,5,1,1,1,3);
- Oxygen, liquid, at plant [RER]: 0.00714 kg; lognormal SD95 1.20001
  (1,5,1,1,1,3);
- Disposal, dust, unalloyed EAF steel, 15.4% water, to residual material landfill [CH]: 0.00131 kg; lognormal SD95 8.70002
  calculated from max value assuming lognormal distribution
- Transport, freight, lorry, fleet average [RER]: 0.0171 tkm; lognormal SD95 2.10001
  (4,5,n.a.,n.a.,n.a.,n.a.);
- Chemicals inorganic, at plant [GLO]: 1.45e-8 kg; lognormal SD95 1.99999
  calculated from max value assuming lognormal distribution
- Lubricating oil, at plant [RER]: 0.00404 kg; lognormal SD95 2.8
  calculated from max value assuming lognormal distribution
- Rolling mill [RER]: 1.62e-9 p; lognormal SD95 3
  (3,4,1,1,1,4);
- Natural gas, burned in industrial furnace 1MWth [CH]: 1.56 MJ; lognormal SD95 1.40001
  calculated from max value assuming lognormal distribution
- Disposal, used mineral oil, 10% water, to hazardous waste incineration [CH]: 0.000213 kg; lognormal SD95 9.50002
  calculated from max value assuming lognormal distribution
- Packaging, corrugated board, mixed fibre, single wall, at plant [RER]: 4.72e-12 kg; lognormal SD95 1.40001
  (4,5,1,1,3,3);
- Sheet rolling, electric steel [RER]: 2.36e-11 kg; lognormal SD95 1.4
  (4,5,1,1,3,3);
- Disposal, average incineration residue, 0% water, to residual material landfill [CH]: 0.000223 kg; lognormal SD95 21.7
  calculated from max value assuming lognormal distribution
- Steel, electric, un- and low-alloyed, at plant [RER]: 0.05 kg; lognormal SD95 1.3
  (4,5,1,1,1,3);
- Lime, hydrated, loose, at plant [CH]: 4.97e-5 kg; lognormal SD95 1.20001
  calculated from max value assuming lognormal distribution
- Packaging film, LDPE, at plant [RER]: 1.89e-11 kg; lognormal SD95 1.40001
  (4,5,1,1,3,3);
- Sawnwood, production mix, softwood, raw, dried (u=20%), at sawmill [RER]: 1.6e-17 m3; lognormal SD95 1.40001
  (4,5,1,1,3,3);

## Inputs from nature
- Water, unspecified natural origin/m3 [resources, in water]: 0.0055 m3; lognormal SD95 1.99999
  calculated from max value assuming lognormal distribution

## Emissions to nature
- Particulates, < 2.5 um [emissions to air, unspecified]: 1.79e-5 kg; lognormal SD95 8.90002
  calculated from max value assuming lognormal distribution
- Particulates, > 10 um [emissions to air, unspecified]: 2.75e-5 kg; lognormal SD95 1.6
  (1,5,1,1,1,3);
- Copper [emissions to air, unspecified]: 7.18e-8 kg; lognormal SD95 1.1
  calculated from max value assuming lognormal distribution
- Copper ion [emissions to water, unspecified]: 2.66e-7 kg; lognormal SD95 5.4
  calculated from max value assuming lognormal distribution
- Chloride [emissions to water, unspecified]: 1.23e-6 kg; lognormal SD95 2.2
  calculated from max value assuming lognormal distribution
- Lead [emissions to water, unspecified]: 2.75e-7 kg; lognormal SD95 1.99999
  calculated from max value assuming lognormal distribution
- Manganese [emissions to water, unspecified]: 5.61e-7 kg; lognormal SD95 2.6
  calculated from max value assuming lognormal distribution
- Carbon monoxide, fossil [emissions to air, unspecified]: 2.24e-5 kg; lognormal SD95 1.20001
  (1,5,1,1,1,3);
- COD, Chemical Oxygen Demand [emissions to water, unspecified]: 3.78e-5 kg; lognormal SD95 1.7
  calculated from max value assuming lognormal distribution
- Chromium VI [emissions to water, unspecified]: 2.75e-8 kg; lognormal SD95 1.99999
  calculated from max value assuming lognormal distribution
- Nickel [emissions to water, unspecified]: 7.78e-7 kg; lognormal SD95 14.1
  calculated from max value assuming lognormal distribution
- Nickel [emissions to air, unspecified]: 2.44e-7 kg; lognormal SD95 1.8
  calculated from max value assuming lognormal distribution
- NMVOC, non-methane volatile organic compounds, unspecified origin [emissions to air, unspecified]: 0.000283 kg; lognormal SD95 2.8
  calculated from max value assuming lognormal distribution
- DOC, Dissolved Organic Carbon [emissions to water, unspecified]: 1.2e-5 kg; lognormal SD95 3.4
  twice the uncertainty of COD (assumption)
- Chromium III [emissions to water, unspecified]: 4.95e-7 kg; lognormal SD95 1.99999
  calculated from max value assuming lognormal distribution
- Hydrocarbons, unspecified [emissions to water, unspecified]: 1.73e-6 kg; lognormal SD95 1.7
  calculated from max value assuming lognormal distribution
- Heat, waste [emissions to air, unspecified]: 0.504 MJ; lognormal SD95 1.1
  (2,1,1,1,1,3);
- TOC, Total Organic Carbon [emissions to water, unspecified]: 1.2e-5 kg; lognormal SD95 3.4
  twice the uncertainty of COD (assumption)
- BOD5, Biological Oxygen Demand [emissions to water, unspecified]: 3.8e-5 kg; lognormal SD95 3.4
  twice the uncertainty of COD (assumption)
- Particulates, > 2.5 um, and < 10um [emissions to air, unspecified]: 2.75e-5 kg; lognormal SD95 2.10001
  (1,5,1,1,1,3);
- Iron [emissions to water, unspecified]: 4.26e-6 kg; lognormal SD95 2.6
  calculated from max value assuming lognormal distribution
- Mercury [emissions to water, unspecified]: 2.75e-8 kg; lognormal SD95 1.99999
  calculated from max value assuming lognormal distribution
- Cadmium [emissions to water, unspecified]: 1.37e-7 kg; lognormal SD95 1.99999
  calculated from max value assuming lognormal distribution
- Aluminium [emissions to water, unspecified]: 1.3e-7 kg; lognormal SD95 5.89999
  calculated from max value assuming lognormal distribution
- Chromium III [emissions to air, unspecified]: 3.74e-7 kg; lognormal SD95 5.80001
  calculated from max value assuming lognormal distribution
- Nitrogen oxides [emissions to air, unspecified]: 1.31e-5 kg; lognormal SD95 2.10001
  (1,5,1,1,1,3);
- Zinc [emissions to water, unspecified]: 2.06e-7 kg; lognormal SD95 9.39999
  calculated from max value assuming lognormal distribution
- Suspended solids, unspecified [emissions to water, unspecified]: 0.000146 kg; lognormal SD95 7.29999
  calculated from max value assuming lognormal distribution
- Iron [emissions to air, unspecified]: 6.06e-6 kg; lognormal SD95 8.90002
  calculated from max value assuming lognormal distribution
- Lead [emissions to air, unspecified]: 1.77e-8 kg; lognormal SD95 1.20001
  calculated from max value assuming lognormal distribution
- Manganese [emissions to air, unspecified]: 2.19e-7 kg; lognormal SD95 1.6
  calculated from max value assuming lognormal distribution

## Sampling procedure
Data from literature

## Sources
- Zschokke M., Giger J., 2025, 2025 - Update and suppl. LCI reinforcing steel - Zchokke, Carbotech AG, Zuerich, CH
On behalf of the Federal Office for the Environment, Bern
