# CRT screen, 17 inches, at plant

Dataset: EcoSpold 1, unit process
Functional unit: 1 p
Category: electronics / devices
Geography: GLO
Time period: 2004-01 to 2004-12
Generated by: Roland Hischier
accessRestrictedTo: 0
copyright: true

## General comment
Data about the CRT screen production, taken from a US LCA study of CRT and LCD screens. Data represent the production of an average 17inch CRT computer screen in the late 1990s.;

## Included processes
This module includes the following production steps: production of the heat sinks (on printed wiring boards), production of housing parts, production of deflection yoke, CRT magnet assembly, CRT shield assembly, audio cable assembly, video cable assembly, connectors, final assembly of the 17 inch computer screen, subsequent packaging and palletising until the complete CRT computer screen is ready to be shipped to the customer.

## Geography
Data from a US LCA study used as global average data

## Technology
average CRT production technology in the late 1990s

## Reference product
- CRT screen, 17 inches, at plant [GLO]: 1 p
  Global

## Inputs from technosphere
- Polyvinylchloride, at regional storage [RER]: 0.1321 kg; lognormal SD95 1.096
  (1,3,2,3,1,3,3); data from an US-EPA LCA study
- Wire drawing, copper [RER]: 0.11605 kg; lognormal SD95 1.096
  (1,3,2,3,1,3,3); data from an US-EPA LCA study
- Kraft paper, bleached, at plant [RER]: 0.1134 kg; lognormal SD95 1.096
  (1,3,2,3,1,3,3); data from an US-EPA LCA study
- Cyclohexane, at plant [RER]: 0.000188 kg; lognormal SD95 1.096
  (1,3,2,3,1,3,3); data from an US-EPA LCA study
- Styrene-acrylonitrile copolymer, SAN, at plant [RER]: 0.827 kg; lognormal SD95 1.096
  (1,3,2,3,1,3,3); data from an US-EPA LCA study
- Transport, freight, rail [RER]: 6.1629 tkm; lognormal SD95 2.095
  (4,5,na,na,na,na,5); standard values
- Steel, low-alloyed, at plant [RER]: 0.28711 kg; lognormal SD95 1.096
  (1,3,2,3,1,3,3); data from an US-EPA LCA study
- Chromium steel 18/8, at plant [RER]: 3.45 kg; lognormal SD95 1.096
  (1,3,2,3,1,3,3); data from an US-EPA LCA study
- Printed wiring board mounting plant [GLO]: 2.08e-7 p; lognormal SD95 3.1827
  (4,5,4,3,1,5,9); Estimation, based on printed wiring board mounting plant
- Cable, connector for computer, without plugs, at plant [GLO]: 1 m; lognormal SD95 1.096
  (1,3,2,3,1,3,3); data from an US-EPA LCA study
- Cathode-ray tube, CRT screen, at plant [GLO]: 10.7 kg; lognormal SD95 1.096
  (1,3,2,3,1,3,3); data from an US-EPA LCA study
- Sheet rolling, steel [RER]: 0.32013 kg; lognormal SD95 1.096
  (1,3,2,3,1,3,3); data from an US-EPA LCA study
- Injection moulding [RER]: 3.3566 kg; lognormal SD95 1.096
  (1,3,2,3,1,3,3); data from an US-EPA LCA study
- Plugs, inlet and outlet, for computer cable, at plant [GLO]: 1 p; lognormal SD95 1.096
  (1,3,2,3,1,3,3); data from an US-EPA LCA study
- Acrylonitrile-butadiene-styrene copolymer, ABS, at plant [RER]: 0.424 kg; lognormal SD95 1.096
  (1,3,2,3,1,3,3); data from an US-EPA LCA study
- Phosphoric acid, industrial grade, 85% in H2O, at plant [RER]: 0.08421 kg; lognormal SD95 1.096
  (1,3,2,3,1,3,3); data from an US-EPA LCA study
- Polyethylene, HDPE, granulate, at plant [RER]: 0.89952 kg; lognormal SD95 1.096
  (1,3,2,3,1,3,3); data from an US-EPA LCA study
- Electricity, medium voltage, production ENTSO-E, at grid: 3.6944 kWh; lognormal SD95 1.096
  (1,3,2,3,1,3,2); data from an US-EPA LCA study
- Aluminium, production mix, wrought alloy, at plant [RER]: 0.39302 kg; lognormal SD95 1.096
  (1,3,2,3,1,3,3); data from an US-EPA LCA study
- Isopropanol, at plant [RER]: 0.0194 kg; lognormal SD95 1.096
  (1,3,2,3,1,3,3); data from an US-EPA LCA study
- Polycarbonate, at plant [RER]: 0.923 kg; lognormal SD95 1.096
  (1,3,2,3,1,3,3); data from an US-EPA LCA study
- Polystyrene, expandable, at plant [RER]: 1 kg; lognormal SD95 1.2423
  (4,4,1,1,1,3,3); own calculation, based on internet survey from current models
- Copper, at regional storage [RER]: 0.11605 kg; lognormal SD95 1.096
  (1,3,2,3,1,3,3); data from an US-EPA LCA study
- Cable, ribbon cable, 20-pin, with plugs, at plant [GLO]: 0.394 kg; lognormal SD95 1.096
  (1,3,2,3,1,3,3); data from an US-EPA LCA study
- Chemicals organic, at plant [GLO]: 0.0011825 kg; lognormal SD95 1.096
  (1,3,2,3,1,3,3); data from an US-EPA LCA study
- Section bar rolling, steel [RER]: 3.45 kg; lognormal SD95 1.096
  (1,3,2,3,1,3,3); data from an US-EPA LCA study
- Ferrite, at plant [GLO]: 0.17 kg; lognormal SD95 1.096
  (1,3,2,3,1,3,3); data from an US-EPA LCA study
- Polystyrene, high impact, HIPS, at plant [RER]: 0.151 kg; lognormal SD95 1.096
  (1,3,2,3,1,3,3); data from an US-EPA LCA study
- Polyurethane, flexible foam, at plant [RER]: 0.0126 kg; lognormal SD95 1.096
  (1,3,2,3,1,3,3); data from an US-EPA LCA study
- Transport, freight, lorry, fleet average [RER]: 1.0271 tkm; lognormal SD95 2.095
  (4,5,na,na,na,na,5); standard values
- Section bar extrusion, aluminium [RER]: 0.36 kg; lognormal SD95 1.096
  (1,3,2,3,1,3,3); data from an US-EPA LCA study
- Whitelined chipboard, WLC, at plant [RER]: 1.4 kg; lognormal SD95 1.2423
  (4,4,1,1,1,3,3); own calculation, based on internet survey from current models
- Printed wiring board, mixed mounted, unspec., solder mix, at plant [GLO]: 0.8737 kg; lognormal SD95 1.096
  (1,3,2,3,1,3,3); data from an US-EPA LCA study

## Emissions to nature
- Heat, waste [emissions to air, high. pop.]: 13.3 MJ; lognormal SD95 1.096
  (1,3,2,3,1,3,13); calculated from electricity input

## Sampling procedure
literature

## Extrapolations
see generalComment

## Sources
- Hischier R., Classen M., Lehmann M., Scharnhorst W., 2007, 2007 - LCI electric and electronic equipment - Hischier, Final report ecoinvent Data v2.0, 18, Swiss Centre for LCI, Empa - TSL, Duebendorf and St. Gallen, CH
Hischier R., Classen M., Lehmann M., Scharnhorst W. (2007) Life Cycle Inventories of Electric and Electronic Equipment - Production, Use & Disposal. Final report ecoinvent Data v2.0. Volume: 18. Swiss Centre for LCI, Empa - TSL. Duebendorf and St. Gallen, CH.
Type: Measurement on site
Source: CD-ROM
First author: Hischier R.
Other authors: Classen M., Lehmann M., Scharnhorst W.
Year: 2007
Title of anthology: Final report ecoinvent Data v2.0
Place of publication: Duebendorf and St. Gallen, CH
Publisher: Swiss Centre for LCI, Empa - TSL
Volume No: 18
Original title: Life Cycle Inventories of Electric and Electronic Equipment - Production, Use & Disposal

## Validation
Proof reading validation: passed.; Other validation: none;
