# Docking station, at plant

Dataset: EcoSpold 1, unit process
Functional unit: 1 p
Category: electronics / devices
Geography: GLO
Time period: 2023-01 to 2029-12
Synonyms: Zusatzgeräte; Dockingstation
Generated by: Lugas Raka Adrianto, Maulana Permana Ajie, Didier Beloin-Saint-Pierre
accessRestrictedTo: 0
copyright: false

## General comment
The dataset represents the typical docking station productions;

## Included processes
The dataset is developed using modeling parameters from the LCA study of Dell docking stations family. The total mass of the docking station is 0.6 kg. The docking comprises a power supply unit 180W, power adapter, aluminum and plastics casing, plugs, ports and cables. The bill of materials are taken from the manufacturers' datasheets.

## Geography
Data for global average docking stations.

## Technology
Standard docking station for laptops.

## Reference product
- Docking station, at plant [GLO]: 1 p

## Inputs from technosphere
- Acrylonitrile-butadiene-styrene copolymer, ABS, at plant [RER]: 0.15 kg; lognormal SD95 1.23
  (2,3,1,3,2,5,BU:1.04)
- Aluminium, production mix, wrought alloy, at plant [RER]: 0.3 kg; lognormal SD95 1.23
  (2,3,1,3,2,5,BU:1.04)
- Cable, connector for computer, without plugs, at plant [GLO]: 2 m; lognormal SD95 1.23
  (2,3,1,3,2,5,BU:1.04)
- Connector, computer, peripherical type, at plant [GLO]: 0.05 kg; lognormal SD95 1.23
  (2,3,1,3,2,5,BU:1.04); 5 ports USB type A and C
- Corrugated board, mixed fibre, single wall, at plant [RER]: 0.9 kg; lognormal SD95 1.23
  (2,3,1,3,2,5,BU:1.04)
- Electricity, medium voltage, production RAS, at grid [RAS]: 0.22224 kWh; lognormal SD95 1.23
  (2,3,1,3,2,5,BU:1.04)
- Extrusion, plastic pipes [RER]: 0.3 kg; lognormal SD95 1.23
  (2,3,1,3,2,5,BU:1.04)
- Packaging film, LDPE, at plant [RER]: 0.045 kg; lognormal SD95 1.23
  (2,3,1,3,2,5,BU:1.04)
- Packaging, corrugated board, mixed fibre, single wall, at plant [RER]: 0.045 kg; lognormal SD95 1.23
  (2,3,1,3,2,5,BU:1.04)
- Plugs, inlet and outlet, for computer cable, at plant [GLO]: 1 p; lognormal SD95 1.23
  (2,3,1,3,2,5,BU:1.04)
- Polycarbonate, at plant [RER]: 0.15 kg; lognormal SD95 1.23
  (2,3,1,3,2,5,BU:1.04)
- Power adapter, for laptop, at plant [GLO]: 1 p; lognormal SD95 1.23
  (2,3,1,3,2,5,BU:1.04)
- Power supply unit, at plant [GLO]: 0.8 p; lognormal SD95 1.23
  (2,3,1,3,2,5,BU:1.04); 1 PSU with power of 180W ~ 0.8x capacity of the original dataset
- Sheet rolling, aluminium [RER]: 0.3 kg; lognormal SD95 1.23
  (2,3,1,3,2,5,BU:1.04)
- Transport, freight, lorry, fleet average [RER]: 0.14 tkm; lognormal SD95 2.06
  (2,3,1,3,2,5,BU:2.00)
- Transport, transoceanic container ship [OCE]: 29.8 tkm; lognormal SD95 2.06
  (2,3,1,3,2,5,BU:2.00)

## Sampling procedure
Literature & own estimations

## Extrapolations
Average technology

## Sources
- Raka Adrianto L., Permana Ajie M., Beloin-Saint-Pierre D., 2024, 2024 - LCI ICT sector - Raka Adrianto, Empa, St. Gallen, CH

## Validation
Proof reading validation: Passed, Other validation: none, Validator: Mischa Zschokke, Company: Carbotech, Country: CH
