# Hydrogen production, gaseous, 1 bar, from SOEC electrolysis, with steam input, from grid electricity

Dataset: EcoSpold 1, unit process
Functional unit: 1 kg
Category: fuels / synthetic\transformation
Geography: CH
Time period: 2024-01 to 2024-01
Generated by: Romain Sacchi
accessRestrictedTo: 0
copyright: true

## General comment
1 kg H2 produced using a SOEC electrolyzer, with steam input, powered by Swiss grid electricity. Source: Niklas Gerloff, Comparative Life-Cycle-Assessment analysis of three major water electrolysis technologies while applying various energy scenarios for a greener hydrogen production, Journal of Energy Storage, Volume 43, 2021, https://doi.org/10.1/j.est0.20.1. Stack lifetime of 20'000 hours over 2.5 years. Further refined (with respect to stack and system lifetime and water use, notably) from data from manufacturer's specifications and IndWEDe project report (https://www.now-gmbh.de/wp-content/uploads/2020/09/181127_bro_a4_indwede-studie_kurzfassung_de_v03.pdf). For further secifications (e.g., efficiency, lifetime, etc.), refer to Sacchi, R. and Bauer, C. LCA of Power-to-X processes and applications in the residential sector. Paul Scherrer Institut, 2023. Stack lifetime [hours] 20'000: IndWEDe Stack lifetime [years] 2.5: IndWEDe, based on the lower estimate of 8,000 hours per year, from manufacturers' data. Balance of Plant lifetime [years]: Same as system. System lifetime [years] 20: IndWEDe Stack replacement over system's lifetime, excluding initial unit [unit]: 7 Calculated. Water demand [kg water/kg H2]: 8.9, corrected to 14 to represent “real worldâ€� operation.: (Simoes et al. 2021) Electricity demand [kWh/kg H2] 39: IndWEDe. Electrical Efficiency [%, based on H2 LHV]: 85%: : From row above. Productivity [kg H2/hour]: 23.6: From row above. Operating temperature [°C]: 650-1000: Manufacturers' data. Operating pressure [bar] ~1: IndWEDe Produced amount over system's lifetime years [kg H2] 3,776,000: Calculated based on the system's lifetime (fourth row), and 8,000 hours stack operation per year (from manufacturers' data) and hourly productivity.

## Reference product
- Hydrogen production, gaseous, 1 bar, from SOEC electrolysis, with steam input, from grid electricity [CH]: 1 kg
  not defined

## Inputs from technosphere
- Water, deionised, at plant [CH]: 14 kg; lognormal SD95 1.329
  A perfect reaction of H2O results in 1 kg H2 and 8 kg O2, and needs 9 kg H2O, however, considering some losses we assume 14 kg H2O (Simoes et al., 2021). {2;4;1;3;3;5;1.05;}
- Electricity, low voltage, at grid [CH]: 39 kWh; lognormal SD95 1.329
  Electricity consumption with 79% eff. {2;4;1;3;3;5;1.05;}
- Electrolyzer production, 1MWe, SOEC, Stack [RER]: 2.119e-6 p; lognormal SD95 3.107
  Stack, 7 years lifetime. {2;4;1;3;3;5;3;}
- Steam, for chemical processes, at plant [RER]: 5.76 kg; lognormal SD95 1.329
  16 MJ heat needed/kg H2 {2;4;1;3;3;5;1.05;}
- Electrolyzer production, 1MWe, SOEC, Balance of Plant [RER]: 2.648e-7 p; lognormal SD95 3.107
  BoP, 20 years lifetime. {2;4;1;3;3;5;3;}
- Treatment of fuel cell stack, 1MWe, SOEC [RER]: 2.119e-6 p; lognormal SD95 3.107
  Stack EoL {2;4;1;3;3;5;3;}
- Treatment of fuel cell balance of plant, 1MWe, SOEC [RER]: 2.648e-7 p; lognormal SD95 3.107
  BoP EoL {2;4;1;3;3;5;3;}

## Inputs from nature
- Transformation, from industrial area, vegetation [resources, land]: 1.324e-5 m2; lognormal SD95 1.637
  {2;4;1;3;3;5;1.5;}
- Occupation, industrial area, vegetation [resources, land]: 0.0002648 m2a; lognormal SD95 1.637
  {2;4;1;3;3;5;1.5;}
- Transformation, to industrial area, vegetation [resources, land]: 1.324e-5 m2; lognormal SD95 1.637
  {2;4;1;3;3;5;1.5;}

## Emissions to nature
- Hydrogen [emissions to air, unspecified]: 0.0024 kg; lognormal SD95 1.329
  Hydrogen loss. {2;4;1;3;3;5;1.05;}

## Sampling procedure
Sampling procedure: Literature data

## Sources
- Sacchi R., Bauer C., 2024, 2024 - LCA power-to-X in residential sector - Sacchi, Project report, PSI, Villigen, CH

## Validation
Proof reading validation: Passed, Other validation: none, Validator: Rolf Frischknecht, Telephone: 0041 44 940 61 91, E-mail: frischknecht@treeze.ch, Company: treeze, Country: CH
