# Electricity, supply mix GO

Dataset: EcoSpold 1, unit process
Functional unit: 1 kWh
Category: electricity / supply mix
Geography: CH
Time period: 2020 to 2020
Synonyms: 0
Share of production covered: 100 %
Generated by: Rolf Frischknecht
accessRestrictedTo: 0
copyright: true

## General comment
Electricity domestic net production shares are based on annual averages for the year 2019;

## Included processes
Included are the shares of domestic electricity production and imports by technology at the busbar. Not included are transformation, transport or distribution losses

## Geography
Data apply to public and self producers in Switzerland and from imports.
Wind power plants are European averages.

## Technology
No technology description is provided because the dataset just describes the power plant portfolio of the respective country using current average technology per energy carrier.

## Time period
Time period of statistics used.

## Reference product
- Electricity, supply mix GO [CH]: 1 kWh

## Inputs from technosphere
All rows: lognormal SD95 1.0714
- Electricity, hydropower, at run-of-river power plant [CH]: 0.22609 kWh
  (1,1,1,1,1,3,BU:1.05); BFE Elektrizitätsstatistik 2020, Flury & Frischknecht 2012
- Electricity, hydropower, net, at reservoir power plant [CH]: 0.29371 kWh
  (1,1,1,1,1,3,BU:1.05); BFE Elektrizitätsstatistik 2020, own calculations
- Electricity, hydropower, at small hydropower plant [CH]: 0.053953 kWh
  (1,1,1,1,1,3,BU:1.05); BFE Elektrizitätsstatistik 2020, Flury & Frischknecht 2012
- Electricity, production mix photovoltaic, at plant [CH]: 0.028698 kWh
  (1,1,1,1,1,3,BU:1.05); BFE Elektrizitätsstatistik 2020, Pronovo Cockpit Stromkennzeichnung 2020, Pronovo Jahresbericht EVS, MKF 2020, BFE Statistik der erneuerbaren Energien 2020, own calculations
- Electricity, at wind farm [CH]: 0.0028068 kWh
  (same comment as for Electricity, production mix photovoltaic, at plant)
- Electricity, at cogen 1MWth, wood chips, allocation exergy [CH]: 0.0065412 kWh
  (same comment as for Electricity, production mix photovoltaic, at plant)
- Electricity, at cogen with biogas engine, agricultural covered, alloc. exergy [CH]: 0.0029141 kWh
  (same comment as for Electricity, production mix photovoltaic, at plant)
- Electricity, at cogen 300kWth, biomethane, allocation exergy [CH]: 0.0035329 kWh
  (same comment as for Electricity, production mix photovoltaic, at plant)
- Electricity from waste, at municipal waste incineration plant [CH]: 0.015452 kWh
  (same comment as for Electricity, production mix photovoltaic, at plant)
- Electricity, nuclear, at power plant pressure water reactor [CH]: 0.12845 kWh
  (1,1,1,1,1,3,BU:1.05); BFE Elektrizitätsstatistik 2020
- Electricity, nuclear, at power plant boiling water reactor [CH]: 0.083531 kWh
  (1,1,1,1,1,3,BU:1.05); BFE Elektrizitätsstatistik 2020
- Electricity, at cogen 300kWth, diesel, allocation exergy [CH]: 0.00010744 kWh
  (1,1,1,1,1,3,BU:1.05); BFE Elektrizitätsstatistik 2020
- Electricity, at cogen 1MWth, natural gas, allocation exergy [CH]: 0.0011819 kWh
  (1,1,1,1,1,3,BU:1.05); BFE Elektrizitätsstatistik 2020
- Electricity from waste, at municipal waste incineration plant [CH]: 0.0074136, 0.00017513 kWh (2 entries)
  (1,1,1,1,1,3,BU:1.05); BFE Elektrizitätsstatistik 2020, Pronovo Cockpit Stromkennzeichnung 2020, own calculations
- Electricity, hydropower, at run-of-river power plant [RER]: 0.14341 kWh
  (same comment as for Electricity from waste, at municipal waste incineration plant)
- Electricity, hydropower, at reservoir power plant, non alpine regions [RER]: 0.027316 kWh
  (same comment as for Electricity from waste, at municipal waste incineration plant)
- Electricity, production mix photovoltaic, at plant [DE]: 0.00010744 kWh
  (same comment as for Electricity from waste, at municipal waste incineration plant)
- Electricity, at wind farm [RER]: 0.014075 kWh
  (same comment as for Electricity from waste, at municipal waste incineration plant)
- Electricity, at cogen 1MWth, wood chips, allocation exergy [CH]: 7.4136e-5 kWh
  (same comment as for Electricity from waste, at municipal waste incineration plant)
- Electricity, at cogen with biogas engine, agricultural covered, alloc. exergy [CH]: 3.3028e-5 kWh
  (same comment as for Electricity from waste, at municipal waste incineration plant)
- Electricity, at cogen 300kWth, biomethane, allocation exergy [CH]: 4.004e-5 kWh
  (same comment as for Electricity from waste, at municipal waste incineration plant)
- Electricity, nuclear, at power plant pressure water reactor [FR]: 0.0017191 kWh
  (same comment as for Electricity from waste, at municipal waste incineration plant)
- Electricity, from natural gas [ENTSO-E]: 0.008488 kWh
  (same comment as for Electricity from waste, at municipal waste incineration plant)
- Electricity, hard coal, at power plant [DE]: 0.0025786 kWh
  (same comment as for Electricity from waste, at municipal waste incineration plant)
- Electricity, residual mix [CH]: 0.022026 kWh
  (1,1,1,1,1,3,BU:1.05); Non-verfied electricity; BFE Elektrizitätsstatistik 2020, Pronovo Cockpit Stromkennzeichnung 2020, own calculations

## Sampling procedure
Statistical data

## Sources
- Frischknecht R., 2022, 2022 - Energy label for passenger cars - Frischknecht, Project reports, 754, treeze Ltd., Bern, CH

## Validation
automatic validation in Excel
G:\Projekte laufend\754 Aktualisierung Energieetikette 2022 BFE\EcoSpold\Strommix Schweiz 2020\[754-StrommixSchweiz2020_v0.1.xlsx]X-Process
