# Emulsion polymerisation, polyvinylchlorid

Dataset: EcoSpold 1, unit process
Functional unit: 1 kg
Category: chemicals / processing
Geography: RER
Time period: 2006-01 to 2006-12
Generated by: Philippe Stolz
accessRestrictedTo: 0
copyright: true

## General comment
This process contains the auxiliaries and energy demand for the mentioned conversion process of plastics. The converted amount of plastics is NOT included into the dataset. To produce 1 kg of polymerised product 1.017 kg material is needed.;

## Included processes
Included are energy consumption and auxiliary materials.

## Geography
Europe

## Technology
Polymerisation takes place in water.

## Time period
Time of publications.

## Reference product
- Emulsion polymerisation, polyvinylchlorid [RER]: 1 kg
  Europe

## Inputs from technosphere
All rows: lognormal SD95 1.301
- Nitrogen, liquid, at plant [RER]: 0.00125 kg
  (1,2,1,1,3,5); plastics europe (2006) polymerisation of vinyl chloride monomers
- Compressed air, average installation, >30kW, 8 bar gauge, at supply network [RER]: 1.732 m3
  (1,2,1,1,3,5); plastics europe (2006) polymerisation of vinyl chloride monomers
- Tap water, at user [RER]: 2.475 kg
  (1,2,1,1,3,5); plastics europe (2006) polymerisation of vinyl chloride monomers
- Natural gas, burned in industrial furnace 1MWth [CH]: 0.885 MJ
  (1,2,1,1,3,5); plastics europe (2006) polymerisation of vinyl chloride monomers
- Steam, for chemical processes, at plant [RER]: 1.3953 kg
  (1,2,1,1,3,5); plastics europe (2006) polymerisation of vinyl chloride monomers
- Electricity, medium voltage, production ENTSO-E, at grid: 0.37639 kWh
  (1,2,1,1,3,5); plastics europe (2006) polymerisation of vinyl chloride monomers
- Chemicals organic, at plant [GLO]: 0.025 kg
  (1,2,1,1,3,5); plastics europe (2006) polymerisation of vinyl chloride monomers
- Treatment, sewage, unpolluted, to wastewater treatment, class 3 [CH]: 0.002475 m3
  (1,2,1,1,3,5); treatment of process water
- Dichloromethane, at plant [RER]: 1.355 kg
  (1,2,1,1,3,5); due to electricity consumption

## Inputs from nature
- Water, cooling, unspecified natural origin/m3 [resources, in water]: 0.031392 m3; lognormal SD95 1.301
  (1,2,1,1,3,5); plastics europe (2006) polymerisation of vinyl chloride monomers

## Emissions to nature
- Water [emissions to water, unspecified]: 29.8224 kg; lognormal SD95 2.5196
  (5,5,5,5,5,BU:1.05); All uncertainty-values set to 5.0 by default. Balance of input water

## Sampling procedure
Literature data.

## Sources
- Frischknecht R., Itten R., Sinha P., de Wild-Scholten M., Zhank J., 2020, 2015 - LCI and LCA photovoltaic systems - Frischknecht, Project report, 174, IEA PVPS Task 12, Petten, NL
Frischknecht R.,, Stolz P., Sinha P., de Wild-Scholten M. (2020) Life Cycle Inventories and Life Cycle Assessments of Photovoltaic Systems. Project report. Volume: 174. IEA PVPS Task 12.
Type: Separate publication
Source: Report
First author: Frischknecht R.,
Other authors: Stolz P., Sinha P., de Wild-Scholten M.
Year: 2020
Title of anthology: Project report
Publisher: IEA PVPS Task 12
Volume No: 174
Original title: Life Cycle Inventories and Life Cycle Assessments of Photovoltaic Systems

## Validation
Proof reading validation: 30.09.2020; Other validation: G:\Projekte laufend\174 Photovoltaic, IEA Task 12\2017 Global supply chain\EcoSpold\[174-photovoltaics-global-supply-chain-v2.5.xlsx]X-Process;
