# Underground mine, hard coal

Dataset: EcoSpold 1, unit process, infrastructure
Functional unit: 1 p
Category: fuels / coal\produced coal\mined coal\infrastructure
Geography: CN
Time period: 1999-01 to 2002-12
Generated by: Roberto Dones
accessRestrictedTo: 0
copyright: true

## General comment
Generic information for ecoinvent "underground mine, hard coal" GLO dataset was available only for a few mines. For the preparation of the GLO dataset only amounts per tonne were available. The dataset has to be considered as a first approximation and may not reflect specific (CN) mines. Lifetime is assumed to be 30 years to take into account the lifetime of machinery. The main mine shaft is assumed to be filled with concrete after the end of the lifetime, therefore the corrosion of the wood in the galleries is not accounted for. For defining the total production of a unit model mine, one million tonne per year has been estimated as an average worldwide (excluding small mines in China). This estimation includes open pit as well as underground mines. Therefore the total lifetime production of 30 million tonne shall be considered as a normalisation factor more than an actual average value for the real underground mines. Explosives are assumed to be used only during operation. In this CN dataset, electricity (total amount assumed for GLO) is arbitrarily assumed to be half from grid and half from local small coal power plants.;

## Included processes
This module includes an estimation of the most important construction materials and energy (electricity: CN) use for a model (GLO) mine. The landuse for the infrastructure is also included. The machinery used for mining operation has been included in this module, because the relevant material use is not separated from the total material use in the available references.

## Technology
No specific information available.

## Reference product
- Underground mine, hard coal [CN]: 1 p
  CHINA

## Inputs from technosphere
- Transport, freight, lorry, fleet average [RER]: 2.47e6 tkm; lognormal SD95 3
  own assumption; original 2 standard for transports
- Reinforcing steel, at plant [RER]: 1.5e7 kg; lognormal SD95 5
  own assumption
- Electricity, hard coal, at power plant [CN]: 6e6 kWh; lognormal SD95 3
  own assumption
- Steel, low-alloyed, at plant [RER]: 3e6 kg; lognormal SD95 5
  own assumption
- Concrete, normal, at plant [CH]: 91000 m3; lognormal SD95 3
  own assumption
- Plywood, outdoor use, at plant [RER]: 165 m3; lognormal SD95 3
  own assumption
- Sawnwood, production mix, hardwood, raw, dried (u=20%), at sawmill [RER]: 389000 m3; lognormal SD95 3
  own assumption
- Blasting [RER]: 3e6 kg; lognormal SD95 3
  own assumption
- Transport, coal freight, rail [CN]: 4.21e6 tkm; lognormal SD95 3
  own assumption; original 2 standard for transports
- Diesel, burned in building machine, average [CH]: 1.8e8 MJ; lognormal SD95 3
  own assumption
- Disposal, wood untreated, 20% water, to sanitary landfill [CH]: 89900 kg; lognormal SD95 3
  own assumption
- Copper, at regional storage [RER]: 60000 kg; lognormal SD95 5
  own assumption
- Heat, heavy fuel oil, at industrial furnace 1MW [RER]: 1.8e8 MJ; lognormal SD95 3
  own assumption
- Electricity, medium voltage, at grid [CN]: 6e6 kWh; lognormal SD95 3
  own assumption

## Inputs from nature
- Transformation, from unknown [resources, land]: 2.22e6 m2; lognormal SD95 5
  large spread in data
- Occupation, industrial area [resources, land]: 4.44e7 m2a; lognormal SD95 5
  large spread in data
- Transformation, to industrial area [resources, land]: 2.22e6 m2; lognormal SD95 5
  large spread in data

## Emissions to nature
- Heat, waste [emissions to air, low. pop.]: 4.32e7 MJ; lognormal SD95 3
  own assumption

## Sampling procedure
literature

## Extrapolations
see Geography/Text

## Sources
- Dones R., Bauer C., Roeder A., 2007, 2007 - Coal - Dones, Sachbilanzen von Energiesystemen. Final report No. 6 ecoinvent data v2.0, 6, Swiss Centre for LCI, PSI, Duebendorf and Villigen, CH
Röder, A., Ch. Bauer, R. Dones (2007) Kohle. Sachbilanzen von Energiesystemen. Final report No. 6 ecoinvent data v2.0. Editors: Dones R.. Volume: 6. Swiss Centre for LCI, PSI. Dübendorf and Villigen, CH.
Type: Measurement on site
Source: CD-ROM
First author: Röder, A.
Other authors: Ch. Bauer, R. Dones
Year: 2007
Name of editors: Dones R.
Title of anthology: Sachbilanzen von Energiesystemen. Final report No. 6 ecoinvent data v2.0
Place of publication: Dübendorf and Villigen, CH
Publisher: Swiss Centre for LCI, PSI
Volume No: 6

## Validation
Proof reading validation: passed; Other validation: none;
