# Sinter, iron, at plant

Dataset: EcoSpold 1, unit process
Functional unit: 1 kg
Category: metals / extraction
Geography: RER
Time period: 2018-01 to 2020-12
Generated by: Mischa Zschokke
accessRestrictedTo: 0
copyright: true

## General comment
The date was taken from the publication by the European Commission 2013 with the Best Available Techniques (BAT) for iron and steel production (Remus, 2013).
Specific input factors and specific emissions factors have been determined for sinter plants. These data show a significant number of sinter plants in Europe representing 91.13 million tonnes of sinter production in 2004. Other input data, which include water input and the input of compressed air, were collected from five sinter plants in Europe representing 52.6 million tonnes of sinter production in 1999.

Air emissions are average values and relate to European plants after abatement for sinter production in the EU-25 in 2004.;
Synonyms: In UVEK2018 enthalten;

## Included processes
Blending, mixing and sintering. Emissions are abated

## Technology
Industry data.

## Time period
Time of publications.

## Reference product
- Sinter, iron, at plant [RER]: 1 kg
  Europe

## Inputs from technosphere
- Dolomite, at plant [RER]: 0.131 kg; lognormal SD95 1.1267
  (2,2,3,1,1,nA,BU:1.05); Limestone / Dolomite; Remus (2013)
- Pellets, iron, at plant [RER]: 0.0518 kg; lognormal SD95 1.1267
  (2,2,3,1,1,nA,BU:1.05); returned materials, Materials from different I&S production activities including recovered fluxes; Remus (2013)
- Aluminium oxide, plant [RER]: 2.5e-11 p; lognormal SD95 3.0162
  (2,2,3,1,1,nA,BU:3); based on UVEK:2018; as proxy
- Disposal, sludge, pig iron production, 8.6% water, to residual material landfill [CH]: 0.00248 kg; lognormal SD95 1.1267
  (2,2,3,1,1,nA,BU:1.05); Sludge; Remus (2013)
- Transport, transoceanic freight ship [OCE]: 2.835 tkm; lognormal SD95 2.0171
  (2,2,3,1,1,nA,BU:2); based on UVEK:2018;
- Quicklime, in pieces, loose, at plant [CH]: 0.0102 kg; lognormal SD95 1.1267
  (2,2,3,1,1,nA,BU:1.05); lime; Remus (2013)
- Compressed air, average installation, <30kW, 8 bar gauge, at supply network [RER]: 0.0021 m3; lognormal SD95 1.1267
  (2,2,3,1,1,nA,BU:1.05); compressed air; Remus (2013)
- Pellets, iron, at plant [RER]: 0.031 kg; lognormal SD95 1.1267
  (2,2,3,1,1,nA,BU:1.05); Includes pellets and direct charge lump ores creenings, undersized sinter from other strands, etc.); Remus (2013)
- Transport, barge [RER]: 0.0315 tkm; lognormal SD95 2.0171
  (2,2,3,1,1,nA,BU:2); based on UVEK:2018;
- Disposal, dust, unalloyed EAF steel, 15.4% water, to residual material landfill [CH]: 0.00191 kg; lognormal SD95 1.1267
  (2,2,3,1,1,nA,BU:1.05); BF gas dust, coarse dust from the blast furnace gas treatment; Remus (2013)
- Blast furnace gas, burned in power plant [RER]: 0.067 MJ; lognormal SD95 1.1267
  (2,2,3,1,1,nA,BU:1.05); COG/ BF gas/natural gas; Remus (2013)
- Hard coal coke, at plant [RER]: 1.28 MJ; lognormal SD95 1.1267
  (2,2,3,1,1,nA,BU:1.05); Solid fuel, E.g.coke breeze, anthracite, excluding the energy contribution by BF gas dus; Remus (2013)
- Electricity, medium voltage, production ENTSO-E, at grid: 0.1235 kWh; lognormal SD95 1.1267
  (2,2,3,1,1,nA,BU:1.05); Total electricity; Remus (2013)
- Sinter, iron, at plant [RER]: 0.063 kg; lognormal SD95 1.1267
  (2,2,3,1,1,nA,BU:1.05); BF returned fines, Undersized sinter screened out prior to charging to the blast furnace; Remus (2013)
- Transport, freight, lorry, fleet average [RER]: 0.002 tkm; lognormal SD95 2.0171
  (2,2,3,1,1,nA,BU:2); based on UVEK:2018;
- Sinter, iron, at plant [RER]: 0.251 kg; lognormal SD95 1.1267
  (2,2,3,1,1,nA,BU:1.05); internal return fines, Undersized sinter product collected within the sinter process; Remus (2013)
- Transport, freight, rail [RER]: 0.30875 tkm; lognormal SD95 2.0171
  (2,2,3,1,1,nA,BU:2); based on UVEK:2018;
- Iron ore, 65% Fe, at beneficiation [GLO]: 0.813 kg; lognormal SD95 1.1267
  (2,2,3,1,1,nA,BU:1.05); ; Remus (2013)
- Treatment, pig iron production effluent, to wastewater treatment, class 3 [CH]: 4.5e-5 m3; lognormal SD95 1.1267
  (2,2,3,1,1,nA,BU:1.05); wastewater; Remus (2013)

## Inputs from nature
- Water, cooling, unspecified natural origin/m3 [resources, in water]: 4.5e-5 m3; lognormal SD95 1.1267
  (2,2,3,1,1,nA,BU:1.05); Water for cooling;

## Emissions to nature
- Chromium VI [emissions to air, unspecified]: 6.43e-8 kg; lognormal SD95 5.0184
  (2,2,3,1,1,nA,BU:5); ; Remus (2013)
- Methane, fossil [emissions to air, unspecified]: 0.000224 kg; lognormal SD95 1.5217
  (2,2,3,1,1,nA,BU:1.5); ; Remus (2013)
- PAH, polycyclic aromatic hydrocarbons [emissions to air, unspecified]: 2.96e-7 kg; lognormal SD95 3.0162
  (2,2,3,1,1,nA,BU:3); ; Remus (2013)
- Lead [emissions to air, unspecified]: 2.84e-6 kg; lognormal SD95 5.0184
  (2,2,3,1,1,nA,BU:5); ; Remus (2013)
- Particulates, < 2.5 um [emissions to air, unspecified]: 0.00020767 kg; lognormal SD95 3.0162
  (2,2,3,1,1,nA,BU:3); dust, main stack emissions +blending and mixing + secondary dedusting + sinter cooling after abatement (< 2.5um); Remus (2013)
- Carbon monoxide, fossil [emissions to air, unspecified]: 0.0229 kg; lognormal SD95 5.0184
  (2,2,3,1,1,nA,BU:5); ; Remus (2013)
- Water [emissions to water, unspecified]: 0.045 kg; lognormal SD95 1.5217
  (2,2,3,1,1,nA,BU:1.5); waste water; Remus (2013)
- Carbon dioxide, fossil [emissions to air, unspecified]: 0.265 kg; lognormal SD95 1.1267
  (2,2,3,1,1,nA,BU:1.05); ; Remus (2013)
- Nickel [emissions to air, unspecified]: 8.85e-8 kg; lognormal SD95 5.0184
  (2,2,3,1,1,nA,BU:5); ; Remus (2013)
- Hydrogen chloride [emissions to air, unspecified]: 0.000425 kg; lognormal SD95 1.5217
  (2,2,3,1,1,nA,BU:1.5); ; Remus (2013)
- Nitrogen oxides [emissions to air, unspecified]: 0.000667 kg; lognormal SD95 1.5217
  (2,2,3,1,1,nA,BU:1.5); ; Remus (2013)
- Dioxin, 2,3,7,8 Tetrachlorodibenzo-p- [emissions to air, unspecified]: 8.08e-12 kg; lognormal SD95 3.0162
  (2,2,3,1,1,nA,BU:3); ; Remus (2013)
- Copper [emissions to air, unspecified]: 3.01e-7 kg; lognormal SD95 5.0184
  (2,2,3,1,1,nA,BU:5); ; Remus (2013)
- Arsenic [emissions to air, unspecified]: 7.8e-9 kg; lognormal SD95 5.0184
  (2,2,3,1,1,nA,BU:5); ; Remus (2013)
- Zinc [emissions to air, unspecified]: 9.67e-7 kg; lognormal SD95 5.0184
  (2,2,3,1,1,nA,BU:5); ; Remus (2013)
- Benzo(a)pyrene [emissions to air, unspecified]: 2.08e-8 kg; lognormal SD95 3.0162
  (2,2,3,1,1,nA,BU:3); ; Remus (2013)
- Sulfur dioxide [emissions to air, unspecified]: 0.000597 kg; lognormal SD95 1.1267
  (2,2,3,1,1,nA,BU:1.05); ; Remus (2013)
- Polychlorinated biphenyls [emissions to air, unspecified]: 1.01e-13 kg; lognormal SD95 3.0162
  (2,2,3,1,1,nA,BU:3); ; Remus (2013)
- Manganese [emissions to air, unspecified]: 2.71e-7 kg; lognormal SD95 5.0184
  (2,2,3,1,1,nA,BU:5); ; Remus (2013)
- NMVOC, non-methane volatile organic compounds, unspecified origin [emissions to air, unspecified]: 0.000131 kg; lognormal SD95 1.5217
  (2,2,3,1,1,nA,BU:1.5); ; Remus (2013)
- Hydrogen fluoride [emissions to air, unspecified]: 4.3e-6 kg; lognormal SD95 1.5217
  (2,2,3,1,1,nA,BU:1.5); ; Remus (2013)
- Vanadium [emissions to air, unspecified]: 7.96e-8 kg; lognormal SD95 5.0184
  (2,2,3,1,1,nA,BU:5); ; Remus (2013)
- Selenium [emissions to air, unspecified]: 7.12e-8 kg; lognormal SD95 5.0184
  (2,2,3,1,1,nA,BU:5); ; Remus (2013)
- Mercury [emissions to air, unspecified]: 1.04e-7 kg; lognormal SD95 5.0184
  (2,2,3,1,1,nA,BU:5); ; Remus (2013)
- Particulates, > 2.5 um, and < 10um [emissions to air, unspecified]: 0.00017241 kg; lognormal SD95 2.0171
  (2,2,3,1,1,nA,BU:2); PM10, main stack emissions +blending and mixing + secondary dedusting + sinter cooling; Remus (2013)
- Cadmium [emissions to air, unspecified]: 1.38e-7 kg; lognormal SD95 5.0184
  (2,2,3,1,1,nA,BU:5); ; Remus (2013)
- Water [emissions to water, unspecified]: 0.171 kg; lognormal SD95 2.5196
  (5,5,5,5,5,BU:1.05); All uncertainty-values set to 5.0 by default. Balance of input water

## Sampling procedure
Data from literature

## Extrapolations
Some generic datasets from ecoinvent have been used.

## Sources
- Zschokke M., Bolt P., Conrad S., 2021, 2021 - LCI steel and iron processes - Zschokke, Project report, Carbotech AG, Zuerich, CH
M. Zschokke, S. Conrad, P. Bolt (2020) Life cycle inventories of steel and iron processes for UVEK:2020. Project report. carbotech. Zurich, CH.
Type: Separate publication
Source: Report
First author: M. Zschokke
Other authors: S. Conrad, P. Bolt
Year: 2020
Title of anthology: Project report
Place of publication: Zurich, CH
Publisher: carbotech
Original title: Life cycle inventories of steel and iron processes for UVEK:2020

## Validation
Proof reading validation: 30.01.2021; Other validation: [sinter, iron, at plant, RER v0.2.xlsx]X-Process;
