# Ethanol from ethylene, at plant

Dataset: EcoSpold 1, unit process
Functional unit: 1 kg
Category: chemicals / organic
Geography: RER
Time period: 2000-01 to 2005-12
Share of production covered: 100 %
Generated by: Juergen Sutter
accessRestrictedTo: 0
copyright: true

## General comment
The multioutput-process "ethylene hydration process" delivers the co-products ethanol 99.7% in H2O and diethyl ether 99.95% in H2O. The allocation is based on mass balance.;

## Included processes
Direct hydration of ethylene including materials, energy uses, infrastructure and emissions.

## Geography
The inventory is modelled with data from plants in Europe and India.

## Technology
Direct hydration of ethylene

## Time period
Time of publications.

## Reference product
- Ethanol from ethylene, at plant [RER]: 1 kg
  Europe

## Inputs from technosphere
- Chemical plant, organics [RER]: 2.4877e-10 p; lognormal SD95 3.0909
  (4,5,na,na,na,na); Estimation
- Sodium hydroxide, 50% in H2O, production mix, at plant [RER]: 0.0017854 kg; lognormal SD95 1.1267
  (1,2,3,1,1,3); Meyers 1986
- Transport, freight, lorry, fleet average [RER]: 0.063369 tkm; lognormal SD95 2.095
  (4,5,na,na,na,na); Standard distance 100km
- Water, deionised, at plant [CH]: 0.69433 kg; lognormal SD95 1.1267
  (1,2,3,1,1,3); Meyers 1986
- Heat, unspecific, in chemical plant [RER]: 2.8964 MJ; lognormal SD95 1.1358
  (1,3,1,5,1,3); Naran Lala 2004
- Transport, freight, rail [RER]: 0.37862 tkm; lognormal SD95 2.095
  (4,5,na,na,na,na); Standard distance 600km
- Electricity, medium voltage, production ENTSO-E, at grid: 0.016862 kWh; lognormal SD95 1.1358
  (1,3,1,5,1,3); Naran Lala 2004
- Hydrochloric acid, 30% in H2O, at plant [RER]: 0.0011903 kg; lognormal SD95 1.1267
  (1,2,3,1,1,3); Meyers 1986
- Ethylene, average, at plant [RER]: 0.62193 kg; lognormal SD95 1.1267
  (1,2,3,1,1,3);
- Benzene, at plant [RER]: 0.0033923 kg; lognormal SD95 1.1358
  (1,3,1,5,1,3); Naran Lala 2004
- Treatment, sewage, unpolluted, to wastewater treatment, class 3 [CH]: 0.012964 m3; lognormal SD95 1.3001
  (4,5,na,na,na,na); Calculated from the water input
- Phosphoric acid, industrial grade, 85% in H2O, at plant [RER]: 0.00069433 kg; lognormal SD95 1.1267
  (1,2,3,1,1,3); Meyers 1986

## Inputs from nature
- Water, cooling, unspecified natural origin/m3 [resources, in water]: 0.012895 m3; lognormal SD95 1.1267
  (1,2,3,1,1,3); Meyers 1986

## Emissions to nature
- Phosphate [emissions to water, river]: 0.0010911 kg; lognormal SD95 1.5217
  (1,2,3,1,1,3); Meyers 1986
- Heat, waste [emissions to air, high. pop.]: 0.060706 MJ; lognormal SD95 1.3001
  (4,5,na,na,na,na); Calculated from the electricity input
- Carbon dioxide, fossil [emissions to air, high. pop.]: 0.011522 kg; lognormal SD95 1.1267
  (1,2,3,1,1,3); from burning of co-products
- Ethene [emissions to air, high. pop.]: 0.0012439 kg; lognormal SD95 1.6169
  (4,5,na,na,na,na); Estimation
- Sodium [emissions to water, river]: 0.0016862 kg; lognormal SD95 5.0184
  (1,2,3,1,1,3); Meyers 1986
- Chloride [emissions to water, river]: 0.0018846 kg; lognormal SD95 3.0162
  (1,2,3,1,1,3); Meyers 1986
- Water [emissions to water, unspecified]: 12.2502 kg; lognormal SD95 2.5196
  (5,5,5,5,5,BU:1.05); All uncertainty-values set to 5.0 by default. Balance of input water

## Sampling procedure
Literature data

## Extrapolations
Some data are derived from other or unknown plants or have been estimated.

## Sources
- Sutter J., 2007, 2007 - LCI petrochemical solvents - Sutter, Final report ecoinvent Data v2.0, 22, Swiss Centre for LCI, ETH, Duebendorf and Uster, CH
Sutter, J., 0 (2007) Life Cycle Inventories of Petrochemical Solvents. Final report ecoinvent Data v2.0. Editors: 0. 0. Volume: 22. Issue: 0. Swiss Centre for LCI, ETHZ. Duebendorf and St. Gallen, CH.
Type: Measurement on site
Source: CD-ROM
First author: Sutter, J.
Other authors: 0
Year: 2007
Name of editors: 0
Title of anthology: Final report ecoinvent Data v2.0
Place of publication: Duebendorf and St. Gallen, CH
Publisher: Swiss Centre for LCI, ETHZ
Journal: 0
Volume No: 22
Issue No: 0

## Validation
Proof reading validation: passed.; Other validation: none;
