# Glider, for passenger car

Dataset: EcoSpold 1, unit process, infrastructure
Functional unit: 1 kg
Category: transport systems / road
Geography: RER
Time period: 2014-01 to 2014-12
Production volume: 48000000000 kg
Generated by: Frank Werner
accessRestrictedTo: 0
copyright: true

## General comment
This dataset describes the production of a passenger car glider. The glider includes: the body of the car, the steering, braking and suspension system, tyres, cockpit equipment (seats, belts, etc.) and non propulsion related electronics. Entries are given per kg glider. The data has been derived for a glider of about 800kg, corresponding to a compact size car of approximately 1200 to 1400kg.;

## Included processes
The dataset takes as input the raw materials and the energy inputs required for the production process and includes the production facility. The dataset returns the finished glider as well as the output scrap fractions from the production process.

## Technology
The dataset is based on averages over passenger car technologies spanning from 2000 to 2010 which are expected to be representative up to 2015.

## Reference product
- Glider, for passenger car [RER]: 1 kg
  Europe

## Inputs from technosphere
All rows: lognormal SD95 1.2263
- Acrylonitrile-butadiene-styrene copolymer, ABS, at plant [RER]: 0.0055858 kg
  (1,3,4,4,2,na)
  Materialization based on average from literature values.
- Zinc, primary, at regional storage [RER]: 0.001702 kg
  (1,3,4,4,2,na)
  Materialization based on average from literature values.
- Polyethylene, LDPE, granulate, at plant [RER]: 0.018619 kg
  (1,3,4,4,2,na)
  Materialization based on average from literature values.
- Viscose fibres, at plant [GLO]: 0.02201 kg
  (1,3,4,4,2,na)
  Materialization based on average from literature values.
- Synthetic rubber, at plant [RER]: 0.0565 kg
  (1,3,4,4,2,na)
  Materialization based on average from literature values.
- Lead, at regional storage [RER]: 0.002978 kg
  (1,3,4,4,2,na)
  Materialization based on average from literature values.
- Glass fibre reinforced plastic, polyester resin, hand lay-up, at plant [RER]: 0.00053323 kg
  (1,3,4,4,2,na)
  Materialization based on average from literature values.
- Flat glass, uncoated, at plant [RER]: 0.04002 kg
  (1,3,4,4,2,na)
  Materialization based on average from literature values.
- Transport, freight, rail [RER]: 0.27897 tkm
  (1,3,4,4,2,na)
  Transport of all input materials and wastes calculated based on ecoinvent standard distances
- Polyethylene terephthalate, granulate, amorphous, at plant [RER]: 0.0018619 kg
  (1,3,4,4,2,na)
  Materialization based on average from literature values.
- Coating powder, at plant [RER]: 0.01467 kg
  (1,3,4,4,2,na)
  Materialization based on average from literature values.
- Disposal, glider, for passenger car [RER]: 1 kg
  Materialization based on average from literature values.
  Production Volume Amount: 48000000000
- Magnesium, at plant [RER]: 0.0008509 kg
  (1,3,4,4,2,na)
  Materialization based on average from literature values.
- Polypropylene, granulate, at plant [RER]: 0.063306 kg
  (1,3,4,4,2,na)
  Materialization based on average from literature values.
- Wire drawing, copper [RER]: 0.004212 kg
  (1,3,4,4,2,na)
  Materialization based on average from literature values.
- Aluminium, production mix, wrought alloy, at plant [RER]: 0.0013545 kg
  (1,3,4,4,2,na)
  Materialization based on average from literature values.
- Polyvinylchloride, suspension polymerised, at plant [RER]: 0.012413 kg
  (1,3,4,4,2,na)
  Materialization based on average from literature values.
- Aluminium, production mix, cast alloy, at plant [RER]: 0.0047678 kg
  (1,3,4,4,2,na)
  Materialization based on average from literature values.
- Chromium steel 18/8, at plant [RER]: 0.025826 kg
  (1,3,4,4,2,na)
  Materialization based on average from literature values.
- Tempering, flat glass [RER]: 0.04002 kg
  (1,3,4,4,2,na)
  Materialization based on average from literature values.
- Printed wiring board, mounted, Desktop PC mainboard, Pb free, at plant [GLO]: 0.002535 kg
  (1,3,4,4,2,na)
  Materialization based on average from literature values.
- Steel, low-alloyed, at plant [RER]: 0.16357 kg
  (1,3,4,4,2,na)
  Materialization based on average from literature values.
- Nylon 6, at plant [RER]: 0.0037239 kg
  (1,3,4,4,2,na)
  Materialization based on average from literature values.
- Polyurethane, flexible foam, at plant [RER]: 0.034949 kg
  (1,3,4,4,2,na)
  Materialization based on average from literature values.
- Road vehicle plant [RER]: 2.747e-10 p
  (1,3,4,4,2,na)
  Materialization based on average from literature values.
- Lubricating oil, at plant [RER]: 0.00379 kg
  (1,3,4,4,2,na)
  Materialization based on average from literature values.
- Sheet rolling, aluminium [RER]: 0.005418 kg
  (1,3,4,4,2,na)
  Materialization based on average from literature values.
- Copper, at regional storage [RER]: 0.008467 kg
  (1,3,4,4,2,na)
  Materialization based on average from literature values.
- Transport, freight, lorry, fleet average [RER]: 0.14153 tkm
  (same comment as for Transport, freight, rail)
- Sheet rolling, steel [RER]: 0.6887 kg
  (1,3,4,4,2,na)
  Materialization based on average from literature values.
- Light emitting diode, LED, at plant [GLO]: 0.0001334 kg
  (1,3,4,4,2,na)
  Materialization based on average from literature values.
- Reinforcing steel, at plant [RER]: 0.80578 kg
  (1,3,4,4,2,na)
  Materialization based on average from literature values.
- Hot rolling, steel [RER]: 0.16357, 0.025826 kg (2 entries)
  (1,3,4,4,2,na)
  Materialization based on average from literature values.
- Epoxy resin, liquid, at plant [RER]: 0.01467 kg
  (1,3,4,4,2,na)
  Materialization based on average from literature values.
- Disposal, plastic, industr. electronics, 15.3% water, to municipal incineration [CH]: 0.0052 kg
  (1,3,4,4,2,na)
  Scrap fraction from production process.Details in F. Habermacher ""Modeling material inventories and environmental impacts of electric passenger cars"", Matser Thesis, Department of Environmental Sciences, ETH Zurich, 2011.
  Production Volume Amount: 249600000
- Tap water, at user [RER]: 3.039 kg
  (1,3,4,4,2,na)
  Values derived from Ecoinvent Transport Report. Value for entire passenger car scaled and split over glider and drivetrain (about 70% glider, 30% drivetrain).

## Emissions to nature
- COD, Chemical Oxygen Demand [emissions to water, unspecified]: 0.0001822 kg; lognormal SD95 1.5154
  (1,4,1,4,2,na)
  Extrapolated from ecoinvent v2.2 passenger car.
- NMVOC, non-methane volatile organic compounds, unspecified origin [emissions to air, unspecified]: 0.004531 kg; lognormal SD95 1.5074
  (1,4,1,3,1,na)
  Extrapolated from ecoinvent v2.2 passenger car.
- Phosphate [emissions to water, unspecified]: 9.439e-7 kg; lognormal SD95 1.5074
  (1,4,1,3,1,na)
  Extrapolated from ecoinvent v2.2 passenger car.
- Waste water/m3 [emissions to water, unspecified]: 0.0025832 m3; lognormal SD95 1.8344
  (4,4,3,2,4,na)
  Calculated value based on literature values and expert opinion. See comments in the parametres' comment field.
- Water [emissions to air, unspecified]: 0.45585 kg; lognormal SD95 1.8344
  (same comment as for Waste water/m3)
- DOC, Dissolved Organic Carbon [emissions to water, unspecified]: 6.7481e-5 kg; lognormal SD95 1.5154
  (1,4,1,4,2,na)
  Derived from COD as described in ecoinvent 3 Data Quality Guidelines (p. 49, paragraph 5.9.7). The same Pedigree matrix value as COD has been used.
- TOC, Total Organic Carbon [emissions to water, unspecified]: 6.7481e-5 kg; lognormal SD95 1.5154
  (same comment as for DOC, Dissolved Organic Carbon)
- BOD5, Biological Oxygen Demand [emissions to water, unspecified]: 2.454e-5 kg; lognormal SD95 1.5723
  (1,4,4,4,2,na)
  Extrapolated from ecoinvent v2.2 passenger car.

## Sampling procedure
Average of material compositions published in literature between 2000 and 2010.

## Sources
- Frischknecht R., Messmer A., Stolz P., 2016, 2016 - Mobitool - Frischknecht, Project Report, 0, treeze Ltd., Bern, CH
