# Disposal, granite-acrylresin, to municipal incineration

Dataset: EcoSpold 1, unit process
Functional unit: 1 kg
Category: waste management / municipal incineration
Geography: CH
Time period: 2015-01 to 2015-12
Generated by: Philippe Stolz
accessRestrictedTo: 0
copyright: true

## General comment
Inventoried waste contains 7% PP; 13% PET; 80% inert material (as cement); . waste composition (wet, in ppm): upper heating value 5.537 MJ/kg; lower heating value 5.278 MJ/kg; H2O 16165; O 588420; H 68813; C 120560; S 3995.2; N 916.06; P 185.56; B n.a.; Cl 188.91; Br 9.5373; F 2.388; I n.a.; Ag n.a.; As 3.0677; Ba 20.578; Cd 2.9148; Co 5.5403; Cr 18.55; Cu 7.072; Hg 0.02806; Mn 155.89; Mo n.a.; Ni 13.74; Pb 25.55; Sb 21.362; Se 0.38815; Sn 1.417; V 315.47; Zn 93.568; Be 0.092416; Sc n.a.; Sr 16.358; Ti 184.83; Tl 0.22798; W n.a.; Si 30741; Fe 8140; Ca 146640; Al 10763; K n.a.; Mg 5.6681; Na 3563.1; Share of carbon in waste that is biogenic 0%. Share of iron in waste that is metallic/recyclable 0%. Net energy produced in MSWI: 0.17MJ/kg waste electric energy and 0.51MJ/kg waste thermal energy Allocation of energy production: no substitution or expansion. Total burden allocated to waste disposal function of MSWI. One kg of this waste produces 0.3741 kg of slag and 0.001014 kg of residues, which are landfilled. Additional solidification with 0.0004057 kg of cement.;;

## Included processes
waste-specific air and water emisions from incineration, auxiliary material consumption for flue gas cleaning. Short-term emissions to river water and long-term emisisons to ground water from slag compartment (from bottom slag) and residual material landfill (from solidified fly ashes and scrubber slugde). Process energy demands for MSWI.

## Geography
Specific to the technology mix encountered in Switzerland in 2000. Well applicable to modern incineration practices in Europe, North America or Japan.

## Technology
average Swiss MSWI plants in 2000 (grate incinerators) with electrostatic precipitator for fly ash (ESP), wet flue gas scrubber and 29.4% SNCR , 32.2% SCR-high dust , 24.6% SCR-low dust -DeNOx facilities and 13.8% without Denox (by burnt waste, according to Swiss average). Share of waste incinerated in plants with magnetic scrap separation from slag : 50%. Gross electric efficiency technology mix 12.997% and Gross thermal efficiency technology mix 25.57%

## Time period
Waste composition as given in literature reference, theoretical data or other source. Transfer coefficients for modern Swiss MSWI. Emission speciation based on early 90ies data.

## Reference product
- Disposal, granite-acrylresin, to municipal incineration [CH]: 1 kg
  SWITZERLAND

## Inputs from technosphere
- Process-specific burdens, slag compartment [CH]: 0.37409 kg; lognormal SD95 1.3358
  uncertainty is calculated from uncertainties in waste composition and transfer coefficients in incinerator
- Chemicals organic, at plant [GLO]: 1.0875e-7 kg; lognormal SD95 8.3706
  Proxy for TMT15. uncertainty calculated from uncertainty in average auxiliary material input, and the unertainty of the waste composition of this waste
- Process-specific burdens, residual material landfill [CH]: 0.0010143 kg; lognormal SD95 1.5817
  (same comment as for Process-specific burdens, slag compartment)
- Process-specific burdens, municipal waste incineration [CH]: 1 kg; lognormal SD95 1
  demands per kilogram waste. uncertainty is heeded in the module
- Disposal, cement, hydrated, 0% water, to residual material landfill [CH]: 0.0010143 kg; lognormal SD95 1.643
  Hydrated cement for solidification of landfilled residual material. Uncertainty calculated from unertainty of the waste composition of this waste and transfer coefficients in the incinerator and of the solidification recipe.
- Slag compartment [CH]: 6.6505e-10 p; lognormal SD95 1.3358
  (same comment as for Process-specific burdens, slag compartment)
- Transport, freight, lorry, 16t-32t gross weight, fleet average [CH]: 0.015062 tkm; lognormal SD95 1.333
  uncertainty calculated from calculated from uncertainties in waste composition, in transfer coefficients in incinerator, uncertainty in average auxiliary material input, the unertainty of the waste composition of this waste and the uncertainty in generic transportation distances
- Chemicals inorganic, at plant [GLO]: 1.0711e-6 kg; lognormal SD95 2.8355
  Proxy for Polyelectrolyte. uncertainty calculated from uncertainty in average auxiliary material input, and the unertainty of the waste composition of this waste
- Hydrochloric acid, 30% in H2O, at plant [RER]: 6.4264e-7 kg; lognormal SD95 2.8355
  uncertainty calculated from uncertainty in average auxiliary material input, and the unertainty of the waste composition of this waste
- Chromium oxide, flakes, at plant [RER]: 2.6998e-8 kg; lognormal SD95 20.68
  Proxy for vanadium pentoxide V2O5 in SCR catalyst, uncertainty calculated from uncertainty in average DeNOx input, uncertainty in the share of thermal NOx, uncertainty of nitrogen content in average municipal waste and the unertainty in nitrogen content in *this* waste.
- Sodium hydroxide, 50% in H2O, production mix, at plant [RER]: 0.00015356 kg; lognormal SD95 5.7371
  (same comment as for Hydrochloric acid, 30% in H2O, at plant)
- Iron (III) chloride, 40% in H2O, at plant [CH]: 1.1401e-5 kg; lognormal SD95 4.9788
  (same comment as for Hydrochloric acid, 30% in H2O, at plant)
- Cement, unspecified, at plant [CH]: 0.0004057 kg; lognormal SD95 1.643
  Cement for solidification of landfilled residual material. Uncertainty calculated from unertainty of the waste composition of this waste, of transfer coefficients in the incinerator and of the solidification recipe.
- Transport, freight, rail [RER]: 0.00048006 tkm; lognormal SD95 4.4716
  uncertainty calculated from uncertainty in average auxiliary material input, the unertainty of the waste composition of this waste and the uncertainty in generic transportation distances
- Titanium dioxide, production mix, at plant [RER]: 1.3229e-6 kg; lognormal SD95 20.68
  uncertainty calculated from uncertainty in average DeNOx input, uncertainty in the share of thermal NOx, uncertainty of nitrogen content in average municipal waste and the unertainty in nitrogen content in *this* waste.
- Residual material landfill facility [CH]: 2.113e-12 p; lognormal SD95 1.5817
  (same comment as for Process-specific burdens, slag compartment)
- Natural gas, burned in industrial furnace 1MW [CH]: 0.004507 MJ; lognormal SD95 12.422
  (same comment as for Titanium dioxide, production mix, at plant)
- Ammonia, liquid, at regional storehouse [CH]: 4.6215e-5 kg; lognormal SD95 12.422
  (same comment as for Titanium dioxide, production mix, at plant)
- Municipal waste incineration plant [CH]: 2.5e-10 p; lognormal SD95 1
  demands per kilogram waste. uncertainty is heeded in the module
- Quicklime, milled, packed, at plant [CH]: 2.448e-5 kg; lognormal SD95 6.3225
  (same comment as for Hydrochloric acid, 30% in H2O, at plant)

## Emissions to nature
- Beryllium [emissions to air, high. pop.]: 9.2416e-11 kg; lognormal SD95 16.241
  (same comment as for Process-specific burdens, slag compartment)
- Selenium [emissions to water, groundwater, long-term]: 2.5216e-7 kg; lognormal SD95 9.483
  Long-term emissions from landfilling of incineration residues. uncertainty is calculated from uncertainties in waste composition and transfer coefficients in incinerator and landfills.
- Dinitrogen monoxide [emissions to air, high. pop.]: 3.8683e-6 kg; lognormal SD95 13.538
  uncertainty calculated from uncertainty in average N-emissions, uncertainty in the share of thermal NOx, uncertainty of nitrogen content in average municipal waste and the unertainty in nitrogen content in *this* waste.
- DOC, Dissolved Organic Carbon [emissions to water, groundwater, long-term]: 0.00059961 kg; lognormal SD95 1.7766
  (same comment as for Selenium)
- Cobalt [emissions to water, river]: 9.4513e-10 kg; lognormal SD95 14.293
  uncertainty is calculated from uncertainties in waste composition and transfer coefficients in incinerator and landfills
- Chloride [emissions to water, groundwater, long-term]: 4.3788e-5 kg; lognormal SD95 6.4749
  (same comment as for Selenium)
- Copper [emissions to air, high. pop.]: 3.6483e-10 kg; lognormal SD95 10.24
  (same comment as for Process-specific burdens, slag compartment)
- Titanium [emissions to air, high. pop.]: 1.5341e-7 kg; lognormal SD95 6.6564
  (same comment as for Process-specific burdens, slag compartment)
- Beryllium [emissions to water, groundwater, long-term]: 7.4418e-8 kg; lognormal SD95 13.407
  (same comment as for Selenium)
- Methane, fossil [emissions to air, high. pop.]: 6.3821e-6 kg; lognormal SD95 1.57
  (2,3,4,2,1,2) & basic uncertainty of 1.5; confidential data from 5 plants in Switzerland and Germany
- Strontium [emissions to air, high. pop.]: 1.6358e-9 kg; lognormal SD95 9.2416
  (same comment as for Process-specific burdens, slag compartment)
- Heat, waste [emissions to water, river]: 0.84303 MJ; lognormal SD95 2.3188
  uncertainty is calculated from uncertainties in waste composition and uncertainties in energy efficiency and the uncertainty in internal energy demand
- Carbon monoxide, fossil [emissions to air, high. pop.]: 0.0002229 kg; lognormal SD95 5.01
  (1,3,2,2,1,2) & basic uncertainty of 5; literature data from switzerland and germany adapted to plant age distribution in switzerland
- Lead [emissions to water, groundwater, long-term]: 2.4489e-5 kg; lognormal SD95 8.8056
  (same comment as for Selenium)
- Magnesium [emissions to water, groundwater, long-term]: 5.0197e-6 kg; lognormal SD95 9.8537
  (same comment as for Selenium)
- TOC, Total Organic Carbon [emissions to water, river]: 6.1587e-5 kg; lognormal SD95 2.0212
  (same comment as for Cobalt)
- Magnesium [emissions to air, high. pop.]: 5.9515e-9 kg; lognormal SD95 10.304
  (same comment as for Process-specific burdens, slag compartment)
- Aluminium [emissions to water, river]: 1.4494e-7 kg; lognormal SD95 12.094
  (same comment as for Cobalt)
- Zinc [emissions to water, river]: 4.5459e-9 kg; lognormal SD95 9.71
  (same comment as for Cobalt)
- Thallium [emissions to air, high. pop.]: 7.3932e-11 kg; lognormal SD95 14.516
  (same comment as for Process-specific burdens, slag compartment)
- Cadmium [emissions to water, river]: 4.8274e-10 kg; lognormal SD95 13.403
  (same comment as for Cobalt)
- Calcium [emissions to air, high. pop.]: 1.507e-6 kg; lognormal SD95 2.1025
  (same comment as for Process-specific burdens, slag compartment)
- Chromium [emissions to water, river]: 1.1187e-10 kg; lognormal SD95 9.2823
  (same comment as for Cobalt)
- Cobalt [emissions to water, groundwater, long-term]: 4.7741e-6 kg; lognormal SD95 9.6715
  (same comment as for Selenium)
- Magnesium [emissions to water, river]: 2.6456e-8 kg; lognormal SD95 10.853
  (same comment as for Cobalt)
- Zinc [emissions to water, groundwater, long-term]: 7.3272e-5 kg; lognormal SD95 8.0758
  (same comment as for Selenium)
- Calcium [emissions to water, groundwater, long-term]: 0.14595 kg; lognormal SD95 1.8154
  (same comment as for Selenium)
- Nitrogen oxides [emissions to air, high. pop.]: 2.9145e-5 kg; lognormal SD95 13.538
  (same comment as for Dinitrogen monoxide)
- Mercury [emissions to water, groundwater, long-term]: 1.4249e-8 kg; lognormal SD95 14.763
  (same comment as for Selenium)
- Manganese [emissions to water, groundwater, long-term]: 0.00015432 kg; lognormal SD95 6.6812
  (same comment as for Selenium)
- Titanium [emissions to water, groundwater, long-term]: 5.526e-5 kg; lognormal SD95 7.2731
  (same comment as for Selenium)
- Arsenic [emissions to air, high. pop.]: 2.7497e-9 kg; lognormal SD95 11.089
  (same comment as for Process-specific burdens, slag compartment)
- Sulfate [emissions to water, groundwater, long-term]: 0.010881 kg; lognormal SD95 3.9843
  (same comment as for Selenium)
- Lead [emissions to water, river]: 6.2534e-10 kg; lognormal SD95 16.441
  (same comment as for Cobalt)
- Barium [emissions to air, high. pop.]: 8.087e-8 kg; lognormal SD95 8.8209
  (same comment as for Process-specific burdens, slag compartment)
- Beryllium [emissions to water, river]: 5.7429e-11 kg; lognormal SD95 18.74
  (same comment as for Cobalt)
- Manganese [emissions to air, high. pop.]: 7.798e-10 kg; lognormal SD95 7.0756
  (same comment as for Process-specific burdens, slag compartment)
- Manganese [emissions to water, river]: 8.4056e-9 kg; lognormal SD95 15.521
  (same comment as for Cobalt)
- Cyanide [emissions to air, high. pop.]: 8.2445e-7 kg; lognormal SD95 13.538
  (same comment as for Dinitrogen monoxide)
- Cadmium [emissions to water, groundwater, long-term]: 6.6259e-7 kg; lognormal SD95 111.25
  (same comment as for Selenium)
- Nitrate [emissions to water, groundwater, long-term]: 3.2942e-5 kg; lognormal SD95 5.1679
  (same comment as for Selenium)
- Copper [emissions to water, groundwater, long-term]: 6.6467e-6 kg; lognormal SD95 9.7882
  (same comment as for Selenium)
- Selenium [emissions to water, river]: 1.3115e-7 kg; lognormal SD95 10.347
  (same comment as for Cobalt)
- Zinc [emissions to air, high. pop.]: 1.9526e-8 kg; lognormal SD95 7.3984
  (same comment as for Process-specific burdens, slag compartment)
- Arsenic [emissions to water, groundwater, long-term]: 2.8176e-6 kg; lognormal SD95 10.871
  (same comment as for Selenium)
- Cobalt [emissions to air, high. pop.]: 7.5274e-9 kg; lognormal SD95 10.368
  (same comment as for Process-specific burdens, slag compartment)
- Strontium [emissions to water, groundwater, long-term]: 1.6336e-5 kg; lognormal SD95 8.9614
  (same comment as for Selenium)
- Thallium [emissions to water, groundwater, long-term]: 1.9709e-7 kg; lognormal SD95 12.576
  (same comment as for Selenium)
- Bromine [emissions to water, river]: 8.6183e-6 kg; lognormal SD95 5.01
  (same comment as for Cobalt)
- Antimony [emissions to air, high. pop.]: 1.7054e-11 kg; lognormal SD95 9.2416
  (same comment as for Process-specific burdens, slag compartment)
- Hydrogen fluoride [emissions to air, high. pop.]: 1.6113e-8 kg; lognormal SD95 11.275
  (same comment as for Process-specific burdens, slag compartment)
- Mercury [emissions to air, high. pop.]: 4.0804e-10 kg; lognormal SD95 16.08
  (same comment as for Process-specific burdens, slag compartment)
- Vanadium [emissions to water, river]: 4.8244e-7 kg; lognormal SD95 6.8337
  (same comment as for Cobalt)
- Aluminium [emissions to air, high. pop.]: 3.0127e-11 kg; lognormal SD95 4.0401
  (same comment as for Process-specific burdens, slag compartment)
- Nickel [emissions to water, river]: 8.6765e-9 kg; lognormal SD95 16.117
  (same comment as for Cobalt)
- Chromium VI [emissions to water, river]: 4.0761e-8 kg; lognormal SD95 9.2515
  (same comment as for Cobalt)
- Antimony [emissions to water, river]: 7.3378e-6 kg; lognormal SD95 8.6763
  (same comment as for Cobalt)
- Barium [emissions to water, groundwater, long-term]: 1.0372e-5 kg; lognormal SD95 22.818
  (same comment as for Selenium)
- Hydrogen chloride [emissions to air, high. pop.]: 1.078e-7 kg; lognormal SD95 6.6734
  (same comment as for Process-specific burdens, slag compartment)
- Strontium [emissions to water, river]: 1.0299e-8 kg; lognormal SD95 15.914
  (same comment as for Cobalt)
- COD, Chemical Oxygen Demand [emissions to water, groundwater, long-term]: 0.0015153 kg; lognormal SD95 1.7766
  (same comment as for Selenium)
- Vanadium [emissions to air, high. pop.]: 6.2956e-6 kg; lognormal SD95 6.1009
  (same comment as for Process-specific burdens, slag compartment)
- Sodium [emissions to water, river]: 0.00047544 kg; lognormal SD95 4.1086
  (same comment as for Cobalt)
- Nitrate [emissions to water, river]: 1.1677e-5 kg; lognormal SD95 3.9232
  (same comment as for Cobalt)
- Tin [emissions to air, high. pop.]: 2.3089e-13 kg; lognormal SD95 12.674
  (same comment as for Process-specific burdens, slag compartment)
- Lead [emissions to air, high. pop.]: 1.6918e-10 kg; lognormal SD95 8.9401
  (same comment as for Process-specific burdens, slag compartment)
- Fluoride [emissions to water, river]: 1.8254e-7 kg; lognormal SD95 7.1676
  (same comment as for Cobalt)
- Tin [emissions to water, groundwater, long-term]: 1.1928e-6 kg; lognormal SD95 11.719
  (same comment as for Selenium)
- Bromine [emissions to water, groundwater, long-term]: 9.1927e-7 kg; lognormal SD95 9.5607
  (same comment as for Selenium)
- Arsenic [emissions to water, river]: 2.4733e-7 kg; lognormal SD95 9.6218
  (same comment as for Cobalt)
- Vanadium [emissions to water, groundwater, long-term]: 0.00014028 kg; lognormal SD95 4.8217
  (same comment as for Selenium)
- Fluoride [emissions to water, groundwater, long-term]: 2.1402e-6 kg; lognormal SD95 6.7255
  (same comment as for Selenium)
- Thallium [emissions to water, river]: 1.423e-10 kg; lognormal SD95 18.377
  (same comment as for Cobalt)
- Chromium [emissions to air, high. pop.]: 1.2586e-9 kg; lognormal SD95 9.1204
  (same comment as for Process-specific burdens, slag compartment)
- Sulfur dioxide [emissions to air, high. pop.]: 4.73e-7 kg; lognormal SD95 4.2164
  (same comment as for Process-specific burdens, slag compartment)
- Chromium VI [emissions to water, groundwater, long-term]: 2.4413e-7 kg; lognormal SD95 58.727
  (same comment as for Selenium)
- Silicon [emissions to water, groundwater, long-term]: 0.00026303 kg; lognormal SD95 129.07
  (same comment as for Selenium)
- Barium [emissions to water, river]: 2.7715e-9 kg; lognormal SD95 10.989
  (same comment as for Cobalt)
- DOC, Dissolved Organic Carbon [emissions to water, river]: 6.1587e-5 kg; lognormal SD95 2.0212
  (same comment as for Cobalt)
- BOD5, Biological Oxygen Demand [emissions to water, groundwater, long-term]: 0.00049565 kg; lognormal SD95 1.7766
  (same comment as for Selenium)
- Bromine [emissions to air, high. pop.]: 4.7687e-9 kg; lognormal SD95 9.7344
  (same comment as for Process-specific burdens, slag compartment)
- Heat, waste [emissions to air, high. pop.]: 5.0436 MJ; lognormal SD95 2.3188
  (same comment as for Heat, waste)
- Cadmium [emissions to air, high. pop.]: 1.2389e-9 kg; lognormal SD95 11.156
  (same comment as for Process-specific burdens, slag compartment)
- Phosphate [emissions to water, river]: 1.2532e-8 kg; lognormal SD95 17.347
  (same comment as for Cobalt)
- Selenium [emissions to air, high. pop.]: 4.6189e-9 kg; lognormal SD95 13.542
  (same comment as for Process-specific burdens, slag compartment)
- Titanium [emissions to water, river]: 6.8914e-8 kg; lognormal SD95 5.0893
  (same comment as for Cobalt)
- Silicon [emissions to water, river]: 1.1343e-6 kg; lognormal SD95 10.008
  (same comment as for Cobalt)
- TOC, Total Organic Carbon [emissions to water, groundwater, long-term]: 0.00059961 kg; lognormal SD95 1.7766
  (same comment as for Selenium)
- Copper [emissions to water, river]: 6.234e-10 kg; lognormal SD95 10.6
  (same comment as for Cobalt)
- Iron [emissions to water, river]: 6.9962e-8 kg; lognormal SD95 13.062
  (same comment as for Cobalt)
- Iron [emissions to air, high. pop.]: 1.8527e-10 kg; lognormal SD95 4.1209
  (same comment as for Process-specific burdens, slag compartment)
- Chloride [emissions to water, river]: 0.00014503 kg; lognormal SD95 5.5209
  (same comment as for Cobalt)
- Antimony [emissions to water, groundwater, long-term]: 1.3549e-5 kg; lognormal SD95 8.383
  (same comment as for Selenium)
- Nickel [emissions to air, high. pop.]: 7.173e-10 kg; lognormal SD95 9.4864
  (same comment as for Process-specific burdens, slag compartment)
- Carbon dioxide, fossil [emissions to air, high. pop.]: 0.43906 kg; lognormal SD95 1.9122
  (same comment as for Process-specific burdens, slag compartment)
- Aluminium [emissions to water, groundwater, long-term]: 0.0087888 kg; lognormal SD95 3.3683
  (same comment as for Selenium)
- Sulfate [emissions to water, river]: 0.0011034 kg; lognormal SD95 4.6838
  (same comment as for Cobalt)
- Phosphate [emissions to water, groundwater, long-term]: 7.5066e-6 kg; lognormal SD95 111.79
  (same comment as for Selenium)
- Nickel [emissions to water, groundwater, long-term]: 1.3709e-5 kg; lognormal SD95 9.1458
  (same comment as for Selenium)
- Sodium [emissions to water, groundwater, long-term]: 0.0030856 kg; lognormal SD95 3.9581
  (same comment as for Selenium)
- Calcium [emissions to water, river]: 0.00064113 kg; lognormal SD95 4.423
  (same comment as for Cobalt)
- Sodium [emissions to air, high. pop.]: 2.2238e-6 kg; lognormal SD95 4.2025
  (same comment as for Process-specific burdens, slag compartment)
- Iron [emissions to water, groundwater, long-term]: 0.0042328 kg; lognormal SD95 4.1068
  (same comment as for Selenium)
- Mercury [emissions to water, river]: 3.7432e-10 kg; lognormal SD95 18.644
  (same comment as for Cobalt)
- COD, Chemical Oxygen Demand [emissions to water, river]: 0.00014103 kg; lognormal SD95 2.0184
  (same comment as for Cobalt)
- Tin [emissions to water, river]: 2.6369e-11 kg; lognormal SD95 20.247
  (same comment as for Cobalt)
- Ammonia [emissions to air, high. pop.]: 7.2585e-7 kg; lognormal SD95 13.538
  (same comment as for Dinitrogen monoxide)
- BOD5, Biological Oxygen Demand [emissions to water, river]: 0.00013922 kg; lognormal SD95 2.0394
  (same comment as for Cobalt)

## Sampling procedure
waste-specific calculation based on literature data

## Extrapolations
Typical elemental transfer coefficients from current studies for modern MSWI, completed with data from coal power plants and estimates, adapted for inert/burnable waste.

## Uncertainty adjustments
uncertainty of waste input composition data derived from generic formula GSD(c) = N*ln(c)+1

## Sources
- Doka G., 2009, 2009 - LCI waste treatment services - Doka, Final report ecoinvent data v2.0, 13, Swiss Centre for LCI, Doka LCA, Duebendorf and St. Gallen, CH
Doka G. (2007) Life Cycle Inventories of Waste Treatment Services. Final report ecoinvent data v2.0. Volume: 13. Swiss Centre for LCI, Empa - TSL. Dübendorf, CH.
Type: Separate publication
Source: CD-ROM
First author: Doka G.
Year: 2007
Title of anthology: Final report ecoinvent data v2.0
Place of publication: Dübendorf, CH
Publisher: Swiss Centre for LCI, Empa - TSL
Volume No: 13

## Validation
Proof reading validation: automatic validation; Other validation: none;
