# Fibreboard, hard, at regional storage

Dataset: EcoSpold 1, unit process
Functional unit: 1 kg
Category: wood / wooden materials\at regional storage\other material
Geography: CH
Time period: 2000-01 to 2016-12
Generated by: default
accessRestrictedTo: 0
copyright: true

## Reference product
- Fibreboard, hard, at regional storage [CH]: 1 kg
  SWITZERLAND

## Inputs from technosphere
- Transport, freight, rail [RER]: 0 tkm
- Transport, freight, lorry, fleet average [RER]: 0.6 tkm
  600 km
- Fibreboard, hard, at plant [RER]: 0.00105 m3
  955 kg/m3

## Sources
- Werner F., 2017, 2017 - LCI wood and wood based products - Werner, Project Report, 0, Environment & Development, Zuerich, CH
