# Electricity mix, DB

Dataset: EcoSpold 1, unit process
Functional unit: 1 kWh
Category: electricity / supply mix
Geography: DE
Time period: 2014-01 to 2014-12
Production volume: GWh
Share of production covered: 100 %
Generated by: Luana Krebs
accessRestrictedTo: 0
copyright: true

## General comment
Technology shares determined based on information from DB and information on gross electricity generation in Germany;

## Included processes
This dataset includes the shares of different technologies of the DB production mix in Germany .

## Geography
Germany

## Technology
Average technology

## Time period
Time of publications

## Reference product
- Electricity mix, DB [DE]: 1 kWh
  GERMANY

## Inputs from technosphere
All rows: lognormal SD95 1.05
- Electricity, industrial gas, at power plant [DE]: 0.005 kWh
  (1,1,1,1,1,1,BU:1,05); ; personal communication SBB (2020), gross electricity generation DE
- Electricity, hydropower, at power plant [DE]: 0.047252 kWh
  (same comment as for Electricity, industrial gas, at power plant)
- Electricity, hard coal, at power plant [DE]: 0.079113 kWh
  (same comment as for Electricity, industrial gas, at power plant)
- Electricity, nuclear, at power plant [DE]: 0.096 kWh
  (same comment as for Electricity, industrial gas, at power plant)
- Electricity, at wind farm [RER]: 0.30465 kWh
  (1,1,1,1,1,1,BU:1,05); ; personal communication SBB (2020), gross electricity generation AT
- Electricity, at cogen with biogas engine, allocation exergy [CH]: 0.10694 kWh
  (same comment as for Electricity, industrial gas, at power plant)
- Electricity, production mix photovoltaic, at plant [DE]: 0.11316 kWh
  (same comment as for Electricity, industrial gas, at power plant)
- Electricity, lignite, at power plant [DE]: 0.16489 kWh
  (same comment as for Electricity, industrial gas, at power plant)
- Electricity, natural gas, at power plant [DE]: 0.083 kWh
  (same comment as for Electricity, industrial gas, at power plant)

## Sampling procedure
Statistics

## Extrapolations
Some generic datasets from ecoinvent have been used.

## Sources
- Krebs L., Frischknecht R., 2020, 2020 - Update Mobitool 2020 - Krebs, Project report, 713, treeze Ltd., Uster, CH
L. Krebs, R. Frischknecht (2020) Aktualisierung Ökobilanzdaten mobitool 2020, Teil 1. Project report. Volume: 713. treeze Ltd.. Uster, CH.
Type: Separate publication
Source: Report
First author: L. Krebs
Other authors: R. Frischknecht
Year: 2020
Title of anthology: Project report
Place of publication: Uster, CH
Publisher: treeze Ltd.
Volume No: 713

## Validation
Proof reading validation: 02.11.2020; Other validation: G:\Projekte laufend\713 Aktualisierung mobitool 2020\EcoSpold\[713-Strommix-Übertragung-Verteilung-Bahnstrom-EIv2-v0.4.xlsx]X-Process;
