# Disposal, exhaust air system for kitchen and bathroom in appartment buildings

Dataset: EcoSpold 1, unit process
Functional unit: 1 m2
Category: waste management / building demolition
Geography: CH
Time period: 1994-01 to 2008-12
Generated by: Alex Primas
accessRestrictedTo: 0
copyright: true

## General comment
Disposal of a exhaust air system for kitchen and bathroom in appartment buildings. The reference value of the inventory is 1 m2 heated gross floor area. The inventory is based on a study of one large appartment building with a heated gross floor area of 30800 m2.The inventory includes materials needed for fans, ducts, insulations and silencers. The data represents ductwork mainly made of galvanized steel. It includes duct fans and radial fans without heat recovery and a nominal air flow rate of 100-5700 m3/h per unit.;

## Included processes
Metals not included (Cut-off to recycling). For other materials: transport to dismantling facilities, machines for handling in sorting plant, electricity demand for sorting plant, final disposal of waste material.

## Geography
Specific to the technology mix encountered in sorting plants in Switzerland.

## Technology
Cut-off to recycling for all metals, disposal to a sorting plant for other materials assumed. plastic parts are incinerated, inert wastes (e.g. rock wool) are landfilled.

## Time period
Amount of material investigated in 1998. Process information partly from 1998 to 2008. Disposal technology mix as used in late 1990ies

## Reference product
- Disposal, exhaust air system for kitchen and bathroom in appartment buildings [CH]: 1 m2
  SWITZERLAND

## Inputs from technosphere
- Transport, freight, lorry, 16t-32t gross weight, fleet average [CH]: -2.3525e-5 tkm; lognormal SD95 2.14
  (4,5,1,1,1,5); Data related to production process
- Disposal, inert material, 0% water, to sanitary landfill [CH]: -0.0023525 kg; lognormal SD95 1.24
  (2,4,2,1,1,5); Data related to production process
- Disposal, building, polyethylene/polypropylene products, to final disposal [CH]: 0.040977 kg; lognormal SD95 1.24
  (2,4,2,1,1,5); Data related to production process
- Disposal, building, mineral wool, to final disposal [CH]: 0.15861 kg; lognormal SD95 1.24
  (2,4,2,1,1,5); Data related to production process
- Disposal, building, brick, to final disposal [CH]: 0.0018573 kg; lognormal SD95 1.24
  (2,4,2,1,1,5); Data related to production process
- Disposal, building, brick, to sorting plant [CH]: 0.0058814 kg; lognormal SD95 1.24
  (2,4,2,1,1,5); Data related to production process

## Sampling procedure
Waste-specific calculation based on production input data

## Sources
- Primas A., 2008, 2008 - LCA building tech. inst. SIA 2032 - Primas, Schlussbericht, B&H AG, Zuerich, CH
Primas A. (2008) Ökologische Bewertung von Gebäudetechnikanlagen für SIA 2032. Schlussbericht. Amt für Hochbauten der Stadt Zürich. Zürich.
Type: Separate publication
Source: Report
First author: Primas A.
Year: 2008
Title of anthology: Schlussbericht
Place of publication: Zürich
Publisher: Amt für Hochbauten der Stadt Zürich
