# Process specific emissions and resources, from uranium milling, underground mine

Dataset: EcoSpold 1, unit process
Functional unit: 1 kg
Category: minerals / new uranium ds
Geography: GLO
Time period: 2011-01 to 2011-12
Generated by: Roberto Dones
accessRestrictedTo: 0
copyright: true

## General comment
PSI data (BFE project 407, Christian Bauer, April 2012).;

## Included processes
The module includes: diesel used in generators for all mining uses; transport of the diesel fuel; radioactive and non-radioactive emissions to air and water; water use (mining water).

## Technology
Average conditions in early 1980s.

## Reference product
- Process specific emissions and resources, from uranium milling, underground mine [GLO]: 1 kg
  Global

## Inputs from technosphere
- Transport, freight, lorry, fleet average [RER]: 0.23 tkm; lognormal SD95 2.5
  v2.2
- Blasting [RER]: 0.26 kg; lognormal SD95 3
  v2.2
- Transport, freight, rail [RER]: 1.37 tkm; lognormal SD95 2.5
  v2.2

## Inputs from nature
- Transformation, from mineral extraction site [resources, land]: 0.005 m2; lognormal SD95 2
  v2.2
- Water, unspecified natural origin/m3 [resources, in water]: 0.1 m3; lognormal SD95 3
  v2.2
- Transformation, to mineral extraction site [resources, land]: 0.005 m2; lognormal SD95 2
  v2.2
- Transformation, to unknown [resources, land]: 0.005 m2; lognormal SD95 2
  v2.2
- Occupation, mineral extraction site [resources, land]: 0.1 m2a; lognormal SD95 2.5
  v2.2
- Transformation, from unknown [resources, land]: 0.005 m2; lognormal SD95 2
  v2.2

## Emissions to nature
- Nitrate [emissions to water, river]: 0.041 kg; lognormal SD95 3
  v2.2
- Uranium alpha [emissions to water, river]: 310 kBq; lognormal SD95 10
  v2.2
- Particulates, > 10 um [emissions to air, low. pop.]: 0.033 kg; lognormal SD95 5
  v2.2
- Selenium [emissions to water, river]: 0.00041 kg; lognormal SD95 3
  v2.2
- Zinc [emissions to water, river]: 0.00089 kg; lognormal SD95 3
  v2.2
- Thorium-230 [emissions to water, river]: 300 kBq; lognormal SD95 10
  v2.2
- Beryllium [emissions to air, low. pop.]: 9.8e-7 kg; lognormal SD95 5
  v2.2
- Chloride [emissions to water, river]: 0.6 kg; lognormal SD95 10
  v2.2
- Uranium alpha [emissions to air, low. pop.]: 23 kBq; lognormal SD95 10
  v2.2
- Cadmium [emissions to air, low. pop.]: 2e-6 kg; lognormal SD95 5
  v2.2
- Vanadium [emissions to water, river]: 0.0048 kg; lognormal SD95 3
  v2.2
- Aluminium [emissions to water, river]: 0.0023 kg; lognormal SD95 3
  v2.2
- Radon-222 [emissions to air, low. pop.]: 1e6 kBq; lognormal SD95 10
  v2.2
- Suspended solids, unspecified [emissions to water, river]: 0.15 kg; lognormal SD95 3
  v2.2
- Magnesium [emissions to water, river]: 0.082 kg; lognormal SD95 3
  v2.2
- Sulfate [emissions to water, river]: 3.4 kg; lognormal SD95 3
  v2.2
- Cadmium [emissions to water, river]: 6.8e-5 kg; lognormal SD95 3
  v2.2
- Zinc [emissions to air, low. pop.]: 2e-5 kg; lognormal SD95 5
  v2.2
- Sodium [emissions to water, river]: 4.7 kg; lognormal SD95 3
  v2.2
- Molybdenum [emissions to water, river]: 0.018 kg; lognormal SD95 3
  v2.2
- Manganese [emissions to water, river]: 0.00075 kg; lognormal SD95 3
  v2.2
- Radium-226 [emissions to water, river]: 1600 kBq; lognormal SD95 10
  v2.2
- Arsenic [emissions to water, river]: 6.8e-5 kg; lognormal SD95 3
  v2.2
- Barium [emissions to water, river]: 0.0014 kg; lognormal SD95 3
  v2.2
- Benzo(a)pyrene [emissions to air, low. pop.]: 6.7e-8 kg; lognormal SD95 5
  v2.2
- Radium-226 [emissions to air, low. pop.]: 13 kBq; lognormal SD95 5
  v2.2
- Lead [emissions to water, river]: 0.013 kg; lognormal SD95 3
  v2.2
- Lead [emissions to air, low. pop.]: 2e-5 kg; lognormal SD95 5
  v2.2
- Iron [emissions to water, river]: 0.11 kg; lognormal SD95 10
  v2.2
- Ammonium, ion [emissions to water, river]: 0.065 kg; lognormal SD95 3
  v2.2
- Water [emissions to water, unspecified]: 95 kg; lognormal SD95 2.5196
  (5,5,5,5,5,BU:1.05); All uncertainty-values set to 5.0 by default. Balance of input water

## Sampling procedure
Literature

## Sources
- Bauer C., Frischknecht R., Eckle P., Flury K., Neal T., Papp K., Schori S., Simons A., Stucki M., Treyer K., 2012, 2012 - LCA electricity generation in Switzerland - Uster, -, 407, Swiss Centre for LCI, ESU-services Ltd., PSI, Uster and Villigen, CH
Ch. Bauer, Frischknecht (2012) Umweltauswirkungen Strom. Volume: 407. PSI. Uster und Villigen, CH.
Type: Separate publication
Source: CD-ROM
First author: Ch. Bauer
Other authors: Frischknecht
Year: 2012
Place of publication: Uster und Villigen, CH
Publisher: PSI
Volume No: 407
