# Points of presence, network equipment

Dataset: EcoSpold 1, unit process
Functional unit: 1 p
Category: electronics / internet network
Geography: GLO
Time period: 2023-01 to 2029-12
Synonyms: Netzwerkkomponente; Präsenzpunkte
Generated by: Lugas Raka Adrianto, Maulana Permana Ajie, Didier Beloin-Saint-Pierre
accessRestrictedTo: 0
copyright: false

## General comment
The data set represents the production of PoPs for data centers;

## Included processes
The dataset for points of presence (PoP) consists of router, network access device, and chassis. The total weight found for an average PoP is 1.41 kg. The dataset is normalized to 1 kg of PoP mass.

## Geography
Data for global average for PoPs

## Technology
Typical PoPs for data centers

## Reference product
- Points of presence, network equipment [GLO]: 1 p

## Inputs from technosphere
- Router, IP network, at server [GLO]: 0.003 p; lognormal SD95 1.26
  (2,3,3,2,2,5,BU:1.05)
- Network access devices, internet, at user [GLO]: 0.91 p; lognormal SD95 1.26
  (2,3,3,2,2,5,BU:1.05)
- Chassis, network main devices, at plant [GLO]: 1.14 kg; lognormal SD95 1.26
  (2,3,3,2,2,5,BU:1.05)

## Sampling procedure
Literature & own estimations

## Extrapolations
Average technology

## Sources
- Raka Adrianto L., Permana Ajie M., Beloin-Saint-Pierre D., 2024, 2024 - LCI ICT sector - Raka Adrianto, Empa, St. Gallen, CH

## Validation
Proof reading validation: Passed, Other validation: none, Validator: Mischa Zschokke, Company: Carbotech, Country: CH
