# Basic oxygen furnace gas, burned in power plant

Dataset: EcoSpold 1, unit process
Functional unit: 1 MJ
Category: metals / production
Geography: RER
Time period: 2018-01 to 2020-12
Generated by: Mischa Zschokke
accessRestrictedTo: 0
copyright: true

## Included processes
The module does not include input of fuel (basic oxygen furnace gas) because BOF gas is treated as a waste product of steel production (i.e. zero allocation to blast furnace gas). Nevertheless, the module includes the emissions caused by the burning of the gas in the power plant. It includes also power plant infrastructure.The inventory includes specific emissions to air from a basic oxygen furnace with supressed combustion after abatement.

## Geography
Data from literature, referring to Europe

## Technology
Industry data.

## Time period
Time of publications.

## Reference product
- Basic oxygen furnace gas, burned in power plant [RER]: 1 MJ
  Europe

## Inputs from technosphere
- Disposal, sludge, pig iron production, 8.6% water, to residual material landfill [CH]: 0.00028571 kg; lognormal SD95 1.1267
  (2,2,3,1,1,nA,BU:1.05); Dust from secondary dedusting - filtered dust - sludge;

## Emissions to nature
- Arsenic [emissions to air, unspecified]: 1.9048e-8 kg; lognormal SD95 5.0184
  (2,2,3,1,1,nA,BU:5); Remus (2013);
- Dioxin, 2,3,7,8 Tetrachlorodibenzo-p- [emissions to air, unspecified]: 1.0571e-13 kg; lognormal SD95 3.0162
  (2,2,3,1,1,nA,BU:3); Remus (2013);
- PAH, polycyclic aromatic hydrocarbons [emissions to air, unspecified]: 2.2857e-10 kg; lognormal SD95 3.0162
  (2,2,3,1,1,nA,BU:3); Remus (2013);
- Particulates, < 2.5 um [emissions to air, unspecified]: 5.9048e-5 kg; lognormal SD95 3.0162
  (2,2,3,1,1,nA,BU:3); Dust from charging and tapping after secondary dedusting;
- Sulfur dioxide [emissions to air, unspecified]: 5.619e-6 kg; lognormal SD95 1.1267
  (2,2,3,1,1,nA,BU:1.05); Remus (2013);
- Lead [emissions to air, unspecified]: 4.1905e-6 kg; lognormal SD95 5.0184
  (2,2,3,1,1,nA,BU:5); Remus (2013);
- Copper [emissions to air, unspecified]: 7.619e-8 kg; lognormal SD95 5.0184
  (2,2,3,1,1,nA,BU:5); Remus (2013);
- Mercury [emissions to air, unspecified]: 1.9048e-8 kg; lognormal SD95 5.0184
  (2,2,3,1,1,nA,BU:5); Remus (2013);
- Particulates, < 2.5 um [emissions to air, unspecified]: 5.5238e-5 kg; lognormal SD95 3.0162
  (2,2,3,1,1,nA,BU:3); Dust from oxygen blowing - After primary (BOF gas) dedusting;
- Nitrogen oxides [emissions to air, unspecified]: 2.381e-5 kg; lognormal SD95 1.5217
  (2,2,3,1,1,nA,BU:1.5); Remus (2013);
- Aluminium [emissions to air, unspecified]: 1.219e-6 kg; lognormal SD95 5.0184
  (2,2,3,1,1,nA,BU:5); Remus (2013);
- Carbon monoxide, fossil [emissions to air, unspecified]: 0.021905 kg; lognormal SD95 5.0043
  (2,2,1,1,1,nA,BU:5); calculated value for BOF-gas. based on information provided by https://link.springer.com/article/10.1007/s11367-011-0370-y => 72.5 Vol.-% CO, 16 Vol.-% CO2;
- Carbon dioxide, fossil [emissions to air, unspecified]: 0.55771 kg; lognormal SD95 1.1267
  (2,2,3,1,1,nA,BU:1.05); Remus (2013);
- Chromium [emissions to air, unspecified]: 3.8095e-8 kg; lognormal SD95 5.0184
  (2,2,3,1,1,nA,BU:5); Remus (2013);
- Hydrogen fluoride [emissions to air, unspecified]: 1.7143e-8 kg; lognormal SD95 1.5217
  (2,2,3,1,1,nA,BU:1.5); Remus (2013);
- Zinc [emissions to air, unspecified]: 1.5619e-5 kg; lognormal SD95 5.0184
  (2,2,3,1,1,nA,BU:5); Remus (2013);
- Iron [emissions to air, unspecified]: 8.1714e-5 kg; lognormal SD95 5.0184
  (2,2,3,1,1,nA,BU:5); Remus (2013);
- Cadmium [emissions to air, unspecified]: 2.5714e-7 kg; lognormal SD95 5.0184
  (2,2,3,1,1,nA,BU:5); Remus (2013);
- Manganese [emissions to air, unspecified]: 5.9714e-5 kg; lognormal SD95 5.0184
  (2,2,3,1,1,nA,BU:5); Remus (2013);

## Sampling procedure
Data from literature

## Extrapolations
Some generic datasets from ecoinvent have been used.

## Sources
- Zschokke M., Bolt P., Conrad S., 2021, 2021 - LCI steel and iron processes - Zschokke, Project report, Carbotech AG, Zuerich, CH
M. Zschokke, S. Conrad, P. Bolt (2020) Life cycle inventories of steel and iron processes for UVEK:2020. Project report. carbotech. Zurich, CH.
Type: Separate publication
Source: Report
First author: M. Zschokke
Other authors: S. Conrad, P. Bolt
Year: 2020
Title of anthology: Project report
Place of publication: Zurich, CH
Publisher: carbotech
Original title: Life cycle inventories of steel and iron processes for UVEK:2020

## Validation
Proof reading validation: 23.02.2021; Other validation: [basic oxygen furnace gas, burned in power plant, RER v0.5.xlsx]X-Process;
