# xxx Three layered laminated board, at plant

Dataset: EcoSpold 1, unit process
Functional unit: 1 m3
Category: material, obsolete / wooden material updated processes, obsolete\other material, obsolete
Geography: CH
Time period: 2000-01 to 2000-12
Generated by: Hans-Joerg Althaus
accessRestrictedTo: 0
copyright: true

## General comment
The multi-output process "three layered laminated board, production" delivers the two coproducts "three layered laminated board, at plant" and "industrial residue wood, 3-layered LB production, softwood, u=20%, at plant". Allocation is based on the over-all proceeds of the process. Inventory adjusted to Swiss production by changing wood and electricity inputs, Philippe Stolz, September 2016.;

## Included processes
Includes the inputs to the production processes and transports of those inputs. No process emission data are available.

## Technology
Medium enterprised technology (1995)

## Reference product
- xxx Three layered laminated board, at plant [CH]: 1 m3
  SWITZERLAND

## Inputs from technosphere
- Sawnwood, board, softwood, raw, kiln dried (u=10%), at sawmill [CH]: 2.425 m3; lognormal SD95 1.13
  (2,4,2,3,1,1,3); changed to Swiss wood supply chain
- Wood chips, from industry, softwood, burned in furnace 300kW [CH]: 1649 MJ; lognormal SD95 1.13
  (2,4,2,3,1,1,1)
- Electricity, medium voltage, at grid [CH]: 188.18 kWh; lognormal SD95 1.13
  (2,4,2,3,1,1,2); changed to Swiss supply mix
- Wooden board manufacturing plant, organic bonded boards [RER]: 3.2301e-8 p; lognormal SD95 3.36
  (4,5,2,3,4,5,9)
- Transport, freight, rail [RER]: 135.8 tkm; lognormal SD95 2.09
  (4,5,nA,nA,nA,nA,5)
- Vinyl acetate, at plant [RER]: 7.76 kg; lognormal SD95 1.13
  (2,4,2,3,1,1,4)
- Softwood, allocation correction, 1 [RER]: -1.15 m3
  calculated correction term; adjusted to (real) basic wood density 422.4 kg/m3 from 450 kg/m3 as assumed in ecoinvent 2.2
- Diesel, burned in building machine, average [CH]: 17.46 MJ; lognormal SD95 2.02
  (2,4,2,3,1,1,5)
- Transport, freight, lorry, fleet average [RER]: 66.251 tkm; lognormal SD95 2.09
  (4,5,nA,nA,nA,nA,5)
- Lubricating oil, at plant [RER]: 0.004074 kg; lognormal SD95 1.13
  (2,4,2,3,1,1,4)
- Wood chips, softwood, wet, measured as dry mass, at sawmill [CH]: -87.84 kg

## Emissions to nature
- Heat, waste [emissions to air, unspecified]: 677.06 MJ; lognormal SD95 1.13
  (2,4,2,3,1,1,13)

## Sampling procedure
Literature

## Extrapolations
see Geography and Technology

## Uncertainty adjustments
The assumption that the technology is representative for central Europe is considered in the uncertainties.

## Sources
- Werner F., Althaus H.-J., Kuenniger T., Richter K., Jungbluth N., 2007, 2007 - LCI wood as fuel and const. mat. - Werner, Final report ecoinvent data v2.0, 9, Swiss Centre for LCI, Empa - TSL, ESU-services Ltd., Duebendorf, CH
Werner F., Althaus H.-J., Künniger T., Richter K., Jungbluth N. (2007) 1Life Cycle Inventories of Wood as Fuel and Construction Material. Final report ecoinvent data v2.0. Volume: 9. Issue: 0. Swiss Centre for LCI, Empa - TSL. Dübendorf, CH.
Type: Measurement on site
Source: CD-ROM
First author: Werner F.
Other authors: Althaus H.-J., Künniger T., Richter K., Jungbluth N.
Year: 2007
Title of anthology: Final report ecoinvent data v2.0
Place of publication: Dübendorf, CH
Publisher: Swiss Centre for LCI, Empa - TSL
Volume No: 9
Issue No: 0
