# Battery-cooling-system, passive, at plant

Dataset: EcoSpold 1, unit process
Functional unit: 1 kg
Category: electronics / component
Geography: RAS
Time period: 2011-01 to 2014-12
Generated by: Annika Messmer
accessRestrictedTo: 0
copyright: true

## General comment
na;
CAS number: 7719-12-4;

## Included processes
All components of the cooling system: radiator, manifolds, clamps, pie fitting, thermal gap pad, coolant, as well as all the material, electricity, transport and facility required for the production of each component and the cooling system.

## Technology
Industry data.

## Time period
Time of publications.

## Reference product
- Battery-cooling-system, passive, at plant [RAS]: 1 kg
  Asia and the Pacific

## Inputs from technosphere
- Aluminium product manufacturing, average metal working [RER]: 0.038244 kg; lognormal SD95 1.3431
  (1,4,1,5,3,5,BU:1.05); ; Ellingsen, 2014 supporting information
- Transport, freight, lorry, 32t-40t gross weight, fleet average [RER]: 0.1955 tkm; lognormal SD95 2.1207
  (1,4,1,5,3,5,BU:2); ; Ellingsen, 2014 supporting information
- Glass fibre, at plant [RER]: 0.0019866 kg; lognormal SD95 1.3431
  (1,4,1,5,3,5,BU:1.05); ; Ellingsen, 2014 supporting information
- Steel product manufacturing, average metal working [RER]: 0.022923 kg; lognormal SD95 1.3431
  (1,4,1,5,3,5,BU:1.05); ; Ellingsen, 2014 supporting information
- Sheet rolling, aluminium [RER]: 0.87297 kg; lognormal SD95 1.3431
  (1,4,1,5,3,5,BU:1.05); ; Ellingsen, 2014 supporting information
- Aluminium, production mix, at plant [RER]: 0.91121 kg; lognormal SD95 1.3431
  (1,4,1,5,3,5,BU:1.05); ; Ellingsen, 2014 supporting information
- Polyvinylchloride, at regional storage [RER]: 0.0007164 kg; lognormal SD95 1.3431
  (1,4,1,5,3,5,BU:1.05); ; Ellingsen, 2014 supporting information
- Metal working factory [RER]: 1.0499e-11 p; lognormal SD95 3.1158
  (1,4,1,5,3,5,BU:3); ; Ellingsen, 2014 supporting information
- Injection moulding [RER]: 0.020821 kg; lognormal SD95 1.3431
  (1,4,1,5,3,5,BU:1.05); ; Ellingsen, 2014 supporting information
- Transport, freight, rail [RER]: 0.41011 tkm; lognormal SD95 2.1207
  (1,4,1,5,3,5,BU:2); ; Ellingsen, 2014 supporting information
- Synthetic rubber, at plant [RER]: 0.0002388 kg; lognormal SD95 1.3431
  (1,4,1,5,3,5,BU:1.05); ; Ellingsen, 2014 supporting information
- Aluminium casting, plant [RER]: 1.4019e-10 p; lognormal SD95 3.1158
  (1,4,1,5,3,5,BU:3); ; Ellingsen, 2014 supporting information
- Acrylonitrile-butadiene-styrene copolymer, ABS, at plant [RER]: 0.01192 kg; lognormal SD95 1.3431
  (1,4,1,5,3,5,BU:1.05); ; Ellingsen, 2014 supporting information
- Silicon, electronic grade, at plant [DE]: 0.0059599 kg; lognormal SD95 1.3431
  (1,4,1,5,3,5,BU:1.05); ; Ellingsen, 2014 supporting information
- Steel, low-alloyed, at plant [RER]: 0.022923 kg; lognormal SD95 1.3431
  (1,4,1,5,3,5,BU:1.05); ; Ellingsen, 2014 supporting information
- Ethylene glycol, at plant [RER]: 0.047755 kg; lognormal SD95 1.3431
  (1,4,1,5,3,5,BU:1.05); ; Ellingsen, 2014 supporting information
- Plastics processing factory [RER]: 1.5564e-11 p; lognormal SD95 3.1158
  (1,4,1,5,3,5,BU:3); ; Ellingsen, 2014 supporting information

## Sources
- Stolz P., Messmer A., Frischknecht R., 2016, 2016 - LCI road and non-road transport services - Stolz, Project report, 544, treeze Ltd., Uster, CH
Stolz P., Frischknecht R. (2016) Life Cycle Inventories of Road and Non-Road Transport Services. Project report. Volume: 544. treeze Ltd.. Uster, CH.
Type: Separate publication
Source: Report
First author: Stolz P.
Other authors: Frischknecht R.
Year: 2016
Title of anthology: Project report
Place of publication: Uster, CH
Publisher: treeze Ltd.
Volume No: 544

## Validation
Proof reading validation: 06.05.2017; Other validation: \\SRV01\ESU-Docs\Projektablage\536 PV-Batterie-Systeme ewz\EcoSpold\[536-Batterie_v0.2.xlsx]X-Process;
