# Operation, coal freight train, electricity

Dataset: EcoSpold 1, unit process
Functional unit: 1 tkm
Category: transport systems / train\operations
Geography: CN
Time period: 1999-01 to 2004-12
Generated by: Roberto Dones
accessRestrictedTo: 0
copyright: true

## General comment
Based on "operation, freight train, electricity" dataset for RER. Electricity use per tkm is from CN 2004 statistics (very low rate compared to European statistics), adjusted by a factor of two assuming that the original data are referring to gross tkm. Diesel use for shunting is directly from RER dataset for lack of information on CN. This dataset should not be used for comparisons of locomotive types nor of transport means across different countries but only when transport is not a major contributor to total environmental burdens of a process or product being analyzed.;

## Included processes
Based on "operation, freight train, electricity" dataset for RER but with specific Chinese electricity consumption.

## Geography
RER operation model with specific CN electricity intensity.

## Reference product
- Operation, coal freight train, electricity [CN]: 1 tkm
  CHINA

## Inputs from technosphere
- Electricity, medium voltage, at grid [CN]: 0.0296 kWh; lognormal SD95 2
  own assumption (original dataset for Europe 1.09)
- Diesel, at regional storage [RER]: 0.000677 kg; lognormal SD95 2
  own assumption (original dataset for Europe 1.09)

## Emissions to nature
- Mercury [emissions to air, unspecified]: 1.35e-14 kg; lognormal SD95 5.1
  (4,5,1,2,1,1); expert estimate quoted from literature
- Carbon dioxide, fossil [emissions to air, unspecified]: 0.00213 kg; lognormal SD95 1.09
  (2,3,1,3,1,1); International Rail study
- Sulfur hexafluoride [emissions to air, unspecified]: 2.1e-9 kg; lognormal SD95 1.63
  (3,5,1,2,3,1); literature
- Noise, rail, freight train [non material emissions, unspecified]: 1 tkm
- Benzene [emissions to air, unspecified]: 6.77e-8 kg; lognormal SD95 2.06
  (2,3,1,3,3,1); handbook emission factors for HGV
- Zinc [emissions to air, unspecified]: 6.77e-10 kg; lognormal SD95 5.1
  (4,5,1,2,1,1); expert estimate quoted from literature
- Methane, fossil [emissions to air, unspecified]: 8.79e-8 kg; lognormal SD95 1.57
  (2,3,1,3,3,1); handbook emission factors for HGV
- Iron [emissions to soil, unspecified]: 3.81e-6 kg; lognormal SD95 3
  (-,-,-,-,-,1); own calculation based on literature
- Particulates, > 2.5 um, and < 10um [emissions to air, unspecified]: 2.68e-6 kg; lognormal SD95 2.02
  (3,3,1,3,1,1); own calculation base on PM figures of int. Rail study
- Dinitrogen monoxide [emissions to air, unspecified]: 6.77e-8 kg; lognormal SD95 1.57
  (2,3,1,3,3,1); handbook emission factors for HGV
- Nitrogen oxides [emissions to air, unspecified]: 3.71e-5 kg; lognormal SD95 1.51
  (2,3,1,3,1,1); International Rail study
- Particulates, < 2.5 um [emissions to air, unspecified]: 8.67e-7 kg; lognormal SD95 3.02
  (3,3,1,3,1,1); own calculation base on PM figures of int. Rail study
- Toluene [emissions to air, unspecified]: 2.7e-8 kg; lognormal SD95 2.06
  (3,3,1,3,3,1); handbook emission factors for HGV
- Nickel [emissions to air, unspecified]: 4.73e-11 kg; lognormal SD95 5.1
  (4,5,1,2,1,1); expert estimate quoted from literature
- Xylene [emissions to air, unspecified]: 2.7e-8 kg; lognormal SD95 2.06
  (3,3,1,3,3,1); handbook emission factors for HGV
- Copper [emissions to air, unspecified]: 1.15e-9 kg; lognormal SD95 5.1
  (4,5,1,2,1,1); expert estimate quoted from literature
- Sulfur dioxide [emissions to air, unspecified]: 4.06e-7 kg; lognormal SD95 1.09
  (2,3,1,3,1,1); International Rail study
- Cadmium [emissions to air, unspecified]: 6.77e-12 kg; lognormal SD95 5.1
  (4,5,1,2,1,1); expert estimate quoted from literature
- Lead [emissions to air, unspecified]: 7.4e-14 kg; lognormal SD95 5.1
  (4,5,1,2,1,1); expert estimate quoted from literature
- Heat, waste [emissions to air, unspecified]: 0.137 MJ; lognormal SD95 1.07
  (2,1,1,1,1,1); standard value
- Chromium [emissions to air, unspecified]: 3.38e-11 kg; lognormal SD95 5.1
  (4,5,1,2,1,1); expert estimate quoted from literature
- NMVOC, non-methane volatile organic compounds, unspecified origin [emissions to air, unspecified]: 3.42e-6 kg; lognormal SD95 1.57
  (2,3,1,3,3,1); handbook emission factors for HGV
- Carbon monoxide, fossil [emissions to air, unspecified]: 1.07e-5 kg; lognormal SD95 5.01
  (2,3,1,3,1,1); International Rail study
- Ammonia [emissions to air, unspecified]: 1.35e-8 kg; lognormal SD95 1.57
  (2,3,1,3,3,1); handbook emission factors for HGV
- Particulates, > 10 um [emissions to air, unspecified]: 1.96e-6 kg; lognormal SD95 1.52
  (3,3,1,3,1,1); own calculation base on PM figures of int. Rail study
- Selenium [emissions to air, unspecified]: 6.77e-12 kg; lognormal SD95 5.1
  (4,5,1,2,1,1); expert estimate quoted from literature

## Sources
- Spielmann M., Bauer C., Dones R., Tuchschmid M., 2007, 2007 - Transport services - Spielmann, Final report ecoinvent Data v2.0, 14, Swiss Centre for LCI, PSI, ESU-services Ltd., Duebendorf, Villigen and Uster, CH
Spielmann M., Dones R; Bauer C. (2007) Life Cycle Inventories of Transport Services. Final report ecoinvent Data v2.0. Volume: 14. Issue: 0. Swiss Centre for LCI, PSI. Dübendorf and Villigen, CH.
Type: Measurement on site
Source: CD-ROM
First author: Spielmann M.
Other authors: Dones R; Bauer C.
Year: 2007
Title of anthology: Final report ecoinvent Data v2.0
Place of publication: Dübendorf and Villigen, CH
Publisher: Swiss Centre for LCI, PSI
Volume No: 14
Issue No: 0

## Validation
Proof reading validation: passed; Other validation: none;
