# Disposal of heat distribution system, apartment building

Dataset: EcoSpold 1, unit process
Functional unit: 1 m2
Category: waste management / building demolition
Geography: CH
Generated by: Matthias Klingler
accessRestrictedTo: 0
copyright: true

## General comment
Disposal of components for the heat distribution system;

## Included processes
Transport to dismantling facilities, machines for handling in sorting plant, electricity demand for sorting plant, final disposal of waste material. Cut-off to recycling for metals.

## Geography
Specific to the technology mix encountered in sorting plants in Switzerland.

## Technology
Disposal to a sorting plant assumed. Metal pieces, copper in cables and electronic devices are recycled, plastic parts are incinerated, inert wastes are landfilled.

## Time period
Amount of material investigated in 2013. Disposal technology mix as used in late 1990ies

## Reference product
- Disposal of heat distribution system, apartment building [CH]: 1 m2
  SWITZERLAND

## Inputs from technosphere
- Disposal of heat distribution system, apartment building MCS Leimbach [CH]: 0.25 m2; lognormal SD95 1.1358
  (2,3,1,1,1,4); uncertainty of average value, Basic uncertainty: 1.05
- Disposal of heat distribution system, apartment building Ecofaubourg A [CH]: 0.25 m2; lognormal SD95 1.1358
  (2,3,1,1,1,4); uncertainty of average value, Basic uncertainty: 1.05
- Disposal of heat distribution system, apartment building Rautistrasse [CH]: 0.25 m2; lognormal SD95 1.1358
  (2,3,1,1,1,4); uncertainty of average value, Basic uncertainty: 1.05
- Disposal of heat distribution system, apartment building Ecofaubourg B [CH]: 0.25 m2; lognormal SD95 1.1358
  (2,3,1,1,1,4); uncertainty of average value, Basic uncertainty: 1.05

## Sampling procedure
Waste-specific calculation based on average input from different call of bids for the heating system used.

## Sources
- Klingler M., Kasser U., Savi D., Primas A., Stettler Y., Gujer P., 2014, 2014 - LCA ventilation and heating systems - Klingler, Schlussbericht, BFE, Buero fuer Umweltchemie, B&H AG, Zuerich, CH
Klingler M., Kasser U., Savi D., Primas A., Stettler Y., Gujer P. (2014) Ökobilanzdaten für Lüftungs- und Wärmeanlagen. Schlussbericht, BFE. Bundesamt für Energie (BFE). Bern.
Type: Separate publication
Source: Report
First author: Klingler M.
Other authors: Kasser U., Savi D., Primas A., Stettler Y., Gujer P.
Year: 2014
Title of anthology: Schlussbericht, BFE
Place of publication: Bern
Publisher: Bundesamt für Energie (BFE)
