# Blast furnace

Dataset: EcoSpold 1, unit process, infrastructure
Functional unit: 1 p
Category: metals / ferro\production\infrastructure
Geography: RER
Time period: 2001-01 to 2002-12
Generated by: Hans-Joerg Althaus
accessRestrictedTo: 0
copyright: true

## General comment
Assumptions for medium sized plant. Output: 1'500'000 t/a, life time: 50 years. Site is shared with BOF converter.;

## Included processes
Infrastructure for input material unloading and storage, blast furnace processes and casting and for administrative buildings

## Geography
Some Swiss datasets are used for European processes.

## Technology
Assumed technology of medium sized plant.

## Reference product
- Blast furnace [RER]: 1 p
  Europe

## Inputs from technosphere
All rows: lognormal SD95 5
- Refractory, basic, packed, at plant [DE]: 200000 kg
  (5,nA,nA,nA,nA,nA,9); rough estimation
- Reinforcing steel, at plant [RER]: 793800 kg
  (5,nA,nA,nA,nA,nA,9); rough estimation
- Disposal, building, brick, to final disposal [CH]: 200000 kg
  (5,nA,nA,nA,nA,nA,9); rough estimation
- Industrial machine, heavy, unspecified, at plant [RER]: 2.02e7 kg
  (5,nA,nA,nA,nA,nA,9); rough estimation
- Steel, low-alloyed, at plant [RER]: 467970 kg
  (5,nA,nA,nA,nA,nA,9); rough estimation
- Concrete, sole plate and foundation, at plant [CH]: 9181.8 m3
  (5,nA,nA,nA,nA,nA,9); rough estimation
- Building, hall [CH]: 19500 m2
  (5,nA,nA,nA,nA,nA,9); rough estimation
- Disposal, building, reinforced concrete, to final disposal [CH]: 3.3163e6 kg
  (5,nA,nA,nA,nA,nA,9); rough estimation
- Building, multi-storey [RER]: 25000 m3
  (5,nA,nA,nA,nA,nA,9); rough estimation
- Disposal, building, concrete, not reinforced, to final disposal [CH]: 2.02e7 kg
  (5,nA,nA,nA,nA,nA,9); rough estimation
- Concrete, normal, at plant [CH]: 1146.6 m3
  (5,nA,nA,nA,nA,nA,9); rough estimation
- Conveyor belt, at plant [RER]: 1800 m
  (5,nA,nA,nA,nA,nA,9); rough estimation

## Inputs from nature
All rows: lognormal SD95 5
- Occupation, industrial area, vegetation [resources, land]: 9.76e6 m2a
  (5,nA,nA,nA,nA,nA,7); rough estimation
- Occupation, industrial area, built up [resources, land]: 3.904e7 m2a
  (5,nA,nA,nA,nA,nA,7); rough estimation
- Transformation, to industrial area, built up [resources, land]: 780800 m2
  (5,nA,nA,nA,nA,nA,8); rough estimation
- Transformation, from unknown [resources, land]: 976000 m2
  (5,nA,nA,nA,nA,nA,8); rough estimation
- Transformation, to industrial area, vegetation [resources, land]: 195200 m2
  (5,nA,nA,nA,nA,nA,8); rough estimation

## Sampling procedure
Internet search

## Extrapolations
see Geography

## Sources
- Classen M., Althaus H.-J., Blaser S., Scharnhorst W., Tuchschmid M., Jungbluth N., Faist Emmenegger M., 2009, 2009 - LCI metals - Classen, Final report ecoinvent data v2.1, 10, Swiss Centre for LCI, Empa, ESU-services Ltd., Duebendorf, CH
Classen M., Althaus H.-J., Blaser S., Doka G., Jungbluth N., Tuchschmid M. (2008) Life Cycle Inventories of Metals. Final report ecoinvent data v2.1. Volume: 10. Issue: 0. Swiss Centre for LCI, Empa - TSL. Dübendorf, CH.
Type: Measurement on site
Source: CD-ROM
First author: Classen M.
Other authors: Althaus H.-J., Blaser S., Doka G., Jungbluth N., Tuchschmid M.
Year: 2008
Title of anthology: Final report ecoinvent data v2.1
Place of publication: Dübendorf, CH
Publisher: Swiss Centre for LCI, Empa - TSL
Volume No: 10
Issue No: 0

## Validation
Proof reading validation: passed; Other validation: none;
