# Disposal, copper in car shredder residue, 0% water, to municipal incineration

Dataset: EcoSpold 1, unit process
Functional unit: 1 kg
Category: waste management / municipal incineration
Geography: CH
Time period: 2000-01 to 2000-12
Generated by: Gabor Doka
accessRestrictedTo: 0
copyright: true

## General comment
This dataset represents the activity of waste disposal of copper in car shredder residue in a municipal solid waste incinerator (MSWI) Recommended use of this dataset: For disposal of rather fine or dusty copper, which goes to incineration as part of Automotive Shredder Residue (ASR). Due to fine grain size of the particles, 50% burnability is assumed, therefore not suited for less fine copper parts in waste. Pure, isolated copper fractions will not be disposed in incinerators, but rather go to recycling. Inventoried waste contains 50% Cu in ASR burnable; 50% Cu in ASR inert; . Waste composition (wet, in ppm): H2O n.a.; O n.a.; H n.a.; C n.a.; S 0.0000028372; N n.a.; P n.a.; B n.a.; Cl n.a.; Br n.a.; F n.a.; I n.a.; Ag 489.05; As n.a.; Ba n.a.; Cd n.a.; Co n.a.; Cr 2.7346; Cu 924870; Hg n.a.; Mn 1483.2; Mo n.a.; Ni 4062.3; Pb 0.0044823; Sb 3438.1; Se n.a.; Sn 8733.9; V 0.00002178; Zn 1075.5; Be n.a.; Sc n.a.; Sr n.a.; Ti n.a.; Tl n.a.; W n.a.; Si 6428.2; Fe 9181.1; Ca n.a.; Al 40233; K n.a.; Mg n.a.; Na n.a.; Share of carbon in waste that is biogenic 60.4%. Share of metals in waste not oxidised and bulk-recyclable (exclude very small or thin parts) Iron: 0%; Alu: 0%; Copper: 50%. One kg of this waste produces 1.135 kg of slag and 0.07842 kg of residues, which are landfilled. Additional solidification with 0.03137 kg of cement. Net energy production: 0MJ/kg electric energy and 0MJ/kg thermal energy. Recovery of metal scrap to recycling: 0g iron scrap, 0g aluminium scrap, 135.4g copper scrap.; Formula: Cu;;

## Included processes
Waste incineration from waste reception gate further downstream (excluding transport to the MSWI plant). Waste-specific air and water emisions from incineration, auxiliary material consumption for flue gas cleaning. Short-term emissions to river water and long-term emisisons to ground water from slag compartment (from bottom ash) and residual material landfill (from solidified fly ashes and scrubber slugde). Waste-specific process energy demands for MSWI and net energy generation.

## Geography
Specific to the technology mix encountered in Switzerland in 2010. Well applicable to modern incineration practices in Europe, North America or Japan.

## Technology
average Swiss MSWI plants in 2010 (grate incinerators) with electrostatic precipitator for fly ash (ESP), wet flue gas scrubber and 25% SNCR , 42.77% SCR-high dust , 32.68% SCR-low dust -DeNOx facilities and 0% without Denox (weighted according to mass of burnt waste, representing Swiss average). Efficiency of iron scrap separation from slag : 58%. Efficiency of non-ferrous scrap separation from slag : 31%. Gross electric efficiency technology mix 15.84% and Gross thermal efficiency technology mix 28.51%

## Time period
Waste composition as given in literature reference, theoretical data or other source. Transfer coefficients for modern MSWI.

## Reference product
- Disposal, copper in car shredder residue, 0% water, to municipal incineration [CH]: 1 kg
  SWITZERLAND

## Inputs from technosphere
- Heat from waste, at municipal waste incineration plant [CH]: 0.071185 MJ; lognormal SD95 1.05
  Net heat required to incinerate this waste (subsidiesed from high-calorific waste fractions). uncertainty is calculated from uncertainties in waste composition and uncertainties in energy efficiency and the uncertainty in internal energy demand
- Chromium oxide, flakes, at plant [RER]: 6.5555e-8 kg; lognormal SD95 4.409
  Input to DeNOx stage. uncertainty calculated from uncertainty in average DeNOx input, uncertainty in the share of thermal NOx, uncertainty of nitrogen content in average municipal waste and the uncertainty in nitrogen content in *this* waste.
- Chemicals inorganic, at plant [GLO]: 2.2249e-5 kg; lognormal SD95 1.3201
  auxilliary inputs for the wastewater treatment stage of the incinerator plant. Proxy for Polyelectrolyte. uncertainty calculated from uncertainty in average Polyelectrolyte input, of transfer coefficients in the incinerator, and the uncertainty of the waste composition of this waste
- Hydrochloric acid, 30% in H2O, at plant [RER]: 5.848e-6 kg; lognormal SD95 1.3201
  auxilliary inputs for the wastewater treatment stage of the incinerator plant. uncertainty calculated from uncertainty in average HCl input, of transfer coefficients in the incinerator, and the uncertainty of the waste composition of this waste
- Ammonia, liquid, at regional storehouse [CH]: 5.127e-5 kg; lognormal SD95 2.3217
  Input to DeNOx stage (100% NH3). uncertainty calculated from uncertainty in average DeNOx input, uncertainty in the share of thermal NOx, uncertainty of nitrogen content in average municipal waste and the uncertainty in nitrogen content in *this* waste.
- Slag compartment [CH]: 2.0178e-9 p; lognormal SD95 1.137
  landfill infrastructure required for landfilling of bottom ash. uncertainty is calculated from uncertainties in waste composition and transfer coefficients in incinerator
- Transport, freight, rail [RER]: 0.0049821 tkm; lognormal SD95 1.1602
  Transport services to transport incineration residues to landfills and to transport auxilliary inputs of the incinerator plant. uncertainty calculated from uncertainty in average auxiliary material input, the uncertainty of the waste composition of this waste and the uncertainty in generic transportation distances
- Natural gas, burned in industrial furnace 1MW [CH]: 0.0095874 MJ; lognormal SD95 2.3217
  Input to DeNOx stage, to heat up flue gas in low-dust SCR. uncertainty calculated from uncertainty in average DeNOx input, uncertainty in the share of thermal NOx, uncertainty of nitrogen content in average municipal waste and the uncertainty in nitrogen content in *this* waste.
- Process-specific burdens, residual material landfill [CH]: 0.078425 kg; lognormal SD95 1.1197
  mass-specific expenditures required for landfilling of incineration residues. uncertainty is calculated from uncertainties in waste composition and transfer coefficients in incinerator
- Electricity from waste, at municipal waste incineration plant [CH]: 0.054497 kWh; lognormal SD95 1.05
  Net electricity required to incinerate this waste (subsidiesed from high-calorific waste fractions). uncertainty is calculated from uncertainties in waste composition and uncertainties in energy efficiency and the uncertainty in internal energy demand
- Municipal waste incineration plant [CH]: 2.5e-10 p; lognormal SD95 1
  demands per kilogram waste. uncertainty is heeded in the module
- Sodium hydroxide, 50% in H2O, production mix, at plant [RER]: 4.9031e-13 kg; lognormal SD95 10.553
  auxilliary inputs for the flue gas treatment stage of the incinerator plant. uncertainty calculated from uncertainty in average NaOH input, of transfer coefficients in the incinerator, and the uncertainty of the waste composition of this waste
- Titanium dioxide, production mix, at plant [RER]: 3.2122e-6 kg; lognormal SD95 4.409
  Input to DeNOx stage (TiO2 catalyst carrier) uncertainty calculated from uncertainty in average DeNOx input, uncertainty in the share of thermal NOx, uncertainty of nitrogen content in average municipal waste and the uncertainty in nitrogen content in *this* waste.
- Transport, freight, lorry, 16t-32t gross weight, fleet average [CH]: 0.050745 tkm; lognormal SD95 1.1222
  (same comment as for Transport, freight, rail)
- Water, decarbonised, at plant [RER]: 0.14186 kg; lognormal SD95 1.3351
  Incinerator process water used in flue gas scrubber stage. uncertainty calculated from uncertainty in average water input, and the uncertainty of the waste composition of this waste
- Cement, unspecified, at plant [CH]: 0.03137 kg; lognormal SD95 1.2481
  Cement required for solidification of landfilled residual material. Uncertainty calculated from uncertainty of the waste composition of this waste, of transfer coefficients in the incinerator and of the solidification recipe.
- Iron (III) chloride, 40% in H2O, at plant [CH]: 0.0010536 kg; lognormal SD95 1.3351
  auxilliary inputs for the wastewater treatment stage of the incinerator plant. uncertainty calculated from uncertainty in average FeCl3 input, of transfer coefficients in the incinerator, and the uncertainty of the waste composition of this waste
- Process-specific burdens, slag compartment [CH]: 1.135 kg; lognormal SD95 1.137
  mass-specific expenditures required for landfilling of bottom ash. uncertainty is calculated from uncertainties in waste composition and transfer coefficients in incinerator
- Residual material landfill facility [CH]: 1.6338e-10 p; lognormal SD95 1.1197
  landfill infrastructure required for landfilling of incineration residues. uncertainty is calculated from uncertainties in waste composition and transfer coefficients in incinerator
- Disposal, cement, hydrated, 0% water, to residual material landfill [CH]: 0.078425 kg; lognormal SD95 1.2481
  Hydrated cement output for solidification of landfilled residual material. Uncertainty calculated from uncertainty of the waste composition of this waste and transfer coefficients in the incinerator and of the solidification recipe.

## Emissions to nature
- Vanadium [emissions to water, river]: 2.2219e-14 kg; lognormal SD95 13.842
  Emissions to water from waste composition and transfer coefficients in incinerator and landfills. uncertainty is calculated from uncertainties in waste composition and transfer coefficients in incinerator and landfills
- Carbon monoxide, biogenic [emissions to air, high. pop.]: 4.9382e-5 kg; lognormal SD95 6.4138
  Incomplete combustion product emitted to air. uncertainty calculated from uncertainty in average operation emissions, and the uncertainty of the flue gas volume from this waste.
- Zinc [emissions to air, high. pop.]: 3.6043e-7 kg; lognormal SD95 5.1529
  Emission to air from waste composition and transfer coefficients. uncertainty is calculated from uncertainties in waste composition and transfer coefficients in incinerator
- Nickel [emissions to water, river]: 2.6438e-6 kg; lognormal SD95 8.3069
  (same comment as for Vanadium)
- Silicon [emissions to water, river]: 9.0662e-7 kg; lognormal SD95 5.0652
  (same comment as for Vanadium)
- Copper [emissions to air, high. pop.]: 4.2355e-5 kg; lognormal SD95 1.4884
  (same comment as for Zinc)
- Manganese [emissions to air, high. pop.]: 1.4163e-7 kg; lognormal SD95 4.9729
  (same comment as for Zinc)
- Iron [emissions to water, groundwater, long-term]: 0.0047039 kg; lognormal SD95 4.1215
  Long-term emissions from landfilling of incineration residues. uncertainty is calculated from uncertainties in waste composition and transfer coefficients in incinerator and landfills.
- Lead [emissions to air, high. pop.]: 1.8464e-13 kg; lognormal SD95 16.484
  (same comment as for Zinc)
- Tin [emissions to water, groundwater, long-term]: 0.0060139 kg; lognormal SD95 4.1388
  (same comment as for Iron)
- Aluminium [emissions to water, groundwater, long-term]: 0.03098 kg; lognormal SD95 2.4764
  (same comment as for Iron)
- Sulfate [emissions to water, river]: 1.1078e-12 kg; lognormal SD95 10.01
  (same comment as for Vanadium)
- Copper [emissions to water, groundwater, long-term]: 0.74009 kg; lognormal SD95 1.0809
  (same comment as for Iron)
- Manganese [emissions to water, river]: 1.5339e-7 kg; lognormal SD95 6.2321
  (same comment as for Vanadium)
- Iron [emissions to air, high. pop.]: 8.227e-9 kg; lognormal SD95 3.8025
  (same comment as for Zinc)
- Nickel [emissions to water, groundwater, long-term]: 0.0039796 kg; lognormal SD95 3.9357
  (same comment as for Iron)
- Heat, waste [emissions to water, river]: 0.036509 MJ; lognormal SD95 1.0649
  Waste heat generated from heating value of this waste plus any electricity required to process it. uncertainty is calculated from uncertainties in waste composition and uncertainties in energy efficiency and the uncertainty in internal energy demand
- Antimony [emissions to water, river]: 0.00059366 kg; lognormal SD95 4.1691
  (same comment as for Vanadium)
- Silver [emissions to water, groundwater, long-term]: 0.00040355 kg; lognormal SD95 5.5366
  (same comment as for Iron)
- Silicon [emissions to air, high. pop.]: 5.0061e-9 kg; lognormal SD95 4.0804
  (same comment as for Zinc)
- Phenol, pentachloro- [emissions to air, high. pop.]: 2.0942e-11 kg; lognormal SD95 1.9241
  (same comment as for Carbon monoxide, biogenic)
- Sulfate [emissions to water, groundwater, long-term]: 7.3813e-12 kg; lognormal SD95 12.935
  (same comment as for Iron)
- Vanadium [emissions to air, high. pop.]: 2.3097e-13 kg; lognormal SD95 16.08
  (same comment as for Zinc)
- Chromium VI [emissions to water, groundwater, long-term]: 1.3437e-7 kg; lognormal SD95 31.108
  (same comment as for Iron)
- Chromium [emissions to water, river]: 1.0617e-10 kg; lognormal SD95 11.386
  (same comment as for Vanadium)
- Toluene [emissions to air, high. pop.]: 9.6177e-8 kg; lognormal SD95 1.9241
  (same comment as for Carbon monoxide, biogenic)
- Chromium VI [emissions to water, river]: 3.8252e-8 kg; lognormal SD95 11.595
  (same comment as for Vanadium)
- Aluminium [emissions to water, river]: 2.4413e-6 kg; lognormal SD95 4.9669
  (same comment as for Vanadium)
- Lead [emissions to water, river]: 2.5529e-13 kg; lognormal SD95 14.143
  (same comment as for Vanadium)
- Sulfur dioxide [emissions to air, high. pop.]: 1.5086e-14 kg; lognormal SD95 16.174
  (same comment as for Zinc)
- Antimony [emissions to air, high. pop.]: 1.3771e-9 kg; lognormal SD95 4.5796
  (same comment as for Zinc)
- Zinc [emissions to water, groundwater, long-term]: 0.00070125 kg; lognormal SD95 7.9996
  (same comment as for Iron)
- NMVOC, non-methane volatile organic compounds, unspecified origin [emissions to air, high. pop.]: 2.1885e-6 kg; lognormal SD95 1.9241
  (same comment as for Carbon monoxide, biogenic)
- Benzene, hexachloro- [emissions to air, high. pop.]: 1.0055e-10 kg; lognormal SD95 1.9241
  (same comment as for Carbon monoxide, biogenic)
- Dioxin, 2,3,7,8 Tetrachlorodibenzo-p- [emissions to air, high. pop.]: 9.617e-14 kg; lognormal SD95 3.8483
  (same comment as for Carbon monoxide, biogenic)
- Benzene [emissions to air, high. pop.]: 4.8088e-8 kg; lognormal SD95 1.9241
  (same comment as for Carbon monoxide, biogenic)
- Copper [emissions to water, river]: 7.1276e-5 kg; lognormal SD95 3.4499
  (same comment as for Vanadium)
- Antimony [emissions to water, groundwater, long-term]: 0.001342 kg; lognormal SD95 3.8314
  (same comment as for Iron)
- Silver [emissions to water, river]: 9.1594e-7 kg; lognormal SD95 5.5351
  (same comment as for Vanadium)
- Benzene, pentachloro- [emissions to air, high. pop.]: 2.5407e-10 kg; lognormal SD95 1.9241
  (same comment as for Carbon monoxide, biogenic)
- Lead [emissions to water, groundwater, long-term]: 3.3247e-9 kg; lognormal SD95 36.896
  (same comment as for Iron)
- Ammonia [emissions to air, high. pop.]: 6.028e-8 kg; lognormal SD95 2.5981
  Nitrogen species emitted to air after DeNOx stage. uncertainty calculated from uncertainty in average N-emissions and uncertainty in the share of thermal NOx and the uncertainty in nitrogen content in *this* waste.
- Chromium [emissions to air, high. pop.]: 1.1939e-9 kg; lognormal SD95 11.222
  (same comment as for Zinc)
- Aluminium [emissions to air, high. pop.]: 1.6401e-8 kg; lognormal SD95 2.9241
  (same comment as for Zinc)
- Vanadium [emissions to water, groundwater, long-term]: 6.1409e-12 kg; lognormal SD95 16.279
  (same comment as for Iron)
- Methane, fossil [emissions to air, high. pop.]: 2.8557e-7 kg; lognormal SD95 1.9241
  (same comment as for Carbon monoxide, biogenic)
- Heat, waste [emissions to air, high. pop.]: 0.15968 MJ; lognormal SD95 1.0649
  (same comment as for Heat, waste)
- Nickel [emissions to air, high. pop.]: 2.5516e-6 kg; lognormal SD95 4.1209
  (same comment as for Zinc)
- Carbon monoxide, fossil [emissions to air, high. pop.]: 3.2363e-5 kg; lognormal SD95 6.4138
  (same comment as for Carbon monoxide, biogenic)
- Benzo(a)pyrene [emissions to air, high. pop.]: 1.0701e-12 kg; lognormal SD95 3.8483
  (same comment as for Carbon monoxide, biogenic)
- Tin [emissions to water, river]: 1.8538e-7 kg; lognormal SD95 7.6048
  (same comment as for Vanadium)
- Tin [emissions to air, high. pop.]: 2.8525e-9 kg; lognormal SD95 3.9204
  (same comment as for Zinc)
- Particulates, < 2.5 um [emissions to air, high. pop.]: 5.7414e-6 kg; lognormal SD95 3.8483
  (same comment as for Carbon monoxide, biogenic)
- Nitrogen oxides [emissions to air, high. pop.]: 1.9089e-5 kg; lognormal SD95 2.5981
  sum of fuel-Nox and thermal-NOx emitted to air after DeNOx stage. uncertainty calculated from uncertainty in average N-emissions and uncertainty in the share of thermal NOx and the uncertainty in nitrogen content in *this* waste.
- Iron [emissions to water, river]: 1.5909e-7 kg; lognormal SD95 7.4274
  (same comment as for Vanadium)
- Manganese [emissions to water, groundwater, long-term]: 0.001199 kg; lognormal SD95 6.3241
  (same comment as for Iron)
- Zinc [emissions to water, river]: 6.4523e-8 kg; lognormal SD95 5.7498
  (same comment as for Vanadium)
- Methane, biogenic [emissions to air, high. pop.]: 4.3575e-7 kg; lognormal SD95 1.9241
  (same comment as for Carbon monoxide, biogenic)
- Particulates, > 2.5 um, and < 10um [emissions to air, high. pop.]: 2.8851e-8 kg; lognormal SD95 2.5655
  (same comment as for Carbon monoxide, biogenic)
- Silicon [emissions to water, groundwater, long-term]: 0.00035212 kg; lognormal SD95 111.19
  (same comment as for Iron)

## Sampling procedure
fully waste-specific calculation based on literature data for average MSWI operation performance

## Extrapolations
Typical elemental transfer coefficients from current studies for modern MSWI, completed with data from coal power plants and estimates, adapted for inert/burnable waste.

## Uncertainty adjustments
uncertainty of waste input composition data derived from generic formula GSD(c) = N*ln(c)+1

## Sources
- Doka G., 2013, 2013 - Updates LCI waste treatment services - Doka, -, Doka LCA, Zuerich, CH
Doka G. (2013) Updates to Life Cycle Inventories of Waste Treatment Services - part II: waste incineration. Doka LCA. Zurich.
Type: Separate publication
Source: Report to document the 2013 changes to the MSWI incinerator model and datasets (URL: http://www.doka.ch/ecoinventMSWIupdateLCI2013.pdf). To be read with the ecoinvent Nr 13 report (Doka 2009, Life Cycle Inventories of Waste Treatment Services) for ecoinvent v2.2.
First author: Doka G.
Year: 2013
Place of publication: Zurich
Publisher: Doka LCA
Original title: Updates to Life Cycle Inventories of Waste Treatment Services - part II: waste incineration

## Validation
Proof reading validation: Passed.; Other validation: none;
