# xx Lime from lithium carbonate hydration

Dataset: EcoSpold 1, unit process
Functional unit: 1 kg
Category: material, obsolete / chemicals, obsolete\inorganic, obsolete
Geography: GLO
Time period: 2000-01 to 2007-12
Share of production covered: 100 %
Generated by: Juergen Sutter
accessRestrictedTo: 0
copyright: true

## General comment
The multioutput-process "lithium carbonate hydration" delivers the co-products lime and lithium hydroxide. The allocation is based on stoechiometric calculation.;

## Included processes
Hydration of lithium carbonate including materials, energy uses, infrastructure and emissions.

## Geography
The inventory is modelled for the world..

## Technology
Hydration of lithium carbonate

## Time period
Time of publications.

## Reference product
- xx Lime from lithium carbonate hydration [GLO]: 1 kg
  Global

## Inputs from technosphere
- Lime, hydrated, loose, at plant [CH]: 0.52631 kg; lognormal SD95 1.3765
  (4,5,1,1,1,5); Stoechiometric calculation
- Electricity, medium voltage, production ENTSO-E, at grid: 0.333 kWh; lognormal SD95 1.3001
  (4,5,na,na,na,na); Estimation
- Transport, freight, lorry, fleet average [RER]: 0.10526 tkm; lognormal SD95 2.095
  (4,5,na,na,na,na); Standard distance 100km
- Heat, natural gas, at industrial furnace 1MW [CH]: 1.99999 MJ; lognormal SD95 1.3001
  (4,5,na,na,na,na); Estimation
- Chemical plant, organics [RER]: 4e-10 p; lognormal SD95 3.0909
  (4,5,na,na,na,na); Estimation
- Lithium carbonate, at plant [GLO]: 0.52631 kg; lognormal SD95 1.3765
  (4,5,1,1,1,5); Stoechiometric calculation
- Transport, freight, rail [RER]: 0.63158 tkm; lognormal SD95 2.095
  (4,5,na,na,na,na); Standard distance 600km

## Inputs from nature
- Water, cooling, unspecified natural origin/m3 [resources, in water]: 0.024 m3; lognormal SD95 1.3001
  (4,5,na,na,na,na); Estimation

## Emissions to nature
- Heat, waste [emissions to air, high. pop.]: 1.19878 MJ; lognormal SD95 1.3001
  (4,5,na,na,na,na); Calculated from the electricity input
- Hydroxide [emissions to water, river]: 0.012091 kg; lognormal SD95 1.6169
  (4,5,na,na,na,na); Estimation
- DOC, Dissolved Organic Carbon [emissions to water, river]: 0.0051894 kg; lognormal SD95 1.6169
  (4,5,na,na,na,na); from water emissions
- Lithium [emissions to water, river]: 0.0049787 kg; lognormal SD95 1.6169
  (4,5,na,na,na,na); Estimation
- Carbonate [emissions to water, river]: 0.021337 kg; lognormal SD95 3.0909
  (4,5,na,na,na,na); Estimation
- TOC, Total Organic Carbon [emissions to water, river]: 0.0051894 kg; lognormal SD95 1.6169
  (4,5,na,na,na,na); from water emissions
- Calcium [emissions to water, river]: 0.014225 kg; lognormal SD95 3.0909
  (4,5,na,na,na,na); Estimation
- Water [emissions to water, unspecified]: 22.8 kg; lognormal SD95 2.5196
  (5,5,5,5,5,BU:1.05); All uncertainty-values set to 5.0 by default. Balance of input water

## Sampling procedure
Literature data

## Extrapolations
Energy consumptions and emissions are estimated. Infrastructure and transports are calculated with standard values.

## Sources
- Sutter J., 2007, 2007 - LCI highly pure chemicals - Sutter, Final report ecoinvent Data v2.0, 19, Swiss Centre for LCI, ETH, Duebendorf and Uster, CH
Sutter, J., 0 (2007) Life Cycle Inventories of Highly Pure Chemicals. Final report ecoinvent Data v2.0. Editors: 0. Volume: 19. Swiss Centre for LCI, ETHZ. Duebendorf and St. Gallen, CH.
Type: Measurement on site
Source: CD-ROM
First author: Sutter, J.
Other authors: 0
Year: 2007
Name of editors: 0
Title of anthology: Final report ecoinvent Data v2.0
Place of publication: Duebendorf and St. Gallen, CH
Publisher: Swiss Centre for LCI, ETHZ
Volume No: 19

## Validation
Proof reading validation: passed.; Other validation: none;
