# Diaphragm compressor module, high pressure

Dataset: EcoSpold 1, unit process
Functional unit: 1 p
Category: fuels / hydrogen\Transformation\Infrastructure
Geography: GLO
Time period: 2020-01 to 2020-12
Generated by: Romain Sacchi
accessRestrictedTo: 0
copyright: False

## General comment
Datasets for hydrogen production and refuelling station. Original source: Simons, A. and Bauer, C. (2015). A life-cycle perspective on automotive fuel cells, Applied Energy, doi:10.1016/j.apenergy.2015.02.049.

## Time period
Base technology year of 2020

## Reference product
- Diaphragm compressor module, high pressure [GLO]: 1 p

## Inputs from technosphere
- Frequency converter, for diaphragm compressor [GLO]: 1 p; lognormal SD95 1.1557
  Uncertainty from pedigree matrix: (3, 2, 3, 1, 1, 3)
- Diaphragms, for diaphragm compressor [GLO]: 1 p; lognormal SD95 1.1557
  Uncertainty from pedigree matrix: (3, 2, 3, 1, 1, 3)
- Container, with pipes and fittings, for diaphragm compressor [GLO]: 1 p; lognormal SD95 1.1557
  Uncertainty from pedigree matrix: (3, 2, 3, 1, 1, 3)

## Sources
- Sacchi R., Bauer C., 2023, 2023 - LCI on-road vehicles - Sacchi, PSI, Villigen, CH
doi: 10.5281/ZENODO.5156043
