# Permanent magnet, for electric motor

Dataset: EcoSpold 1, unit process
Functional unit: 1 kg
Category: metals / extraction
Geography: RER
Time period: 2014-01 to 2014-12
Production volume: 18000 kg
Generated by: Frank Werner
accessRestrictedTo: 0
copyright: true

## Included processes
Includes liquid aluminium production (with its plant) used as proxy for the permanent magnets production and the materials used. It returns the produced magnets, the waste flows and emissions.; Geography: Some Swiss datasets are used for European processes.

## Technology
Proxy for the production of a permanent magnet based on the alumium technology.

## Reference product
- Permanent magnet, for electric motor [RER]: 1 kg
  Europe

## Inputs from technosphere
- Disposal, bitumen, 1.4% water, to sanitary landfill [CH]: 0.0011988 kg; lognormal SD95 2.5006
  (5,5,5,5,5,na)
  Original value taken from ""aluminium production, primary, liquid"". Uncertainty changed accordingly.
  Production Volume Amount: 21.5784
- Transport, freight, lorry, fleet average [RER]: 0.35815 tkm; lognormal SD95 1.2495
  (2,3,3,4,3,na)
  Transport of all input materials and wastes calculated based on ecoinvent standard distances
- Electricity, medium voltage, production ENTSO-E, at grid: 15.558 kWh; lognormal SD95 1.4189
  (5,5,5,5,5,na)
  Original value taken from ""aluminium production, primary, liquid"". Uncertainty changed accordingly.
- Disposal, refractory SPL, Al elec.lysis, 0% water, to residual material landfill [CH]: 0.0018981 kg; lognormal SD95 2.5006
  (5,5,5,5,5,na)
  Original value taken from ""aluminium production, primary, liquid"". Uncertainty changed accordingly.
  Production Volume Amount: 34.1658
- Aluminium electrolysis, plant [RER]: 1.5385e-10 p; lognormal SD95 4.1133
  (same comment as for Electricity, medium voltage, production ENTSO-E, at grid)
- Pig iron, at plant [RER]: 2.11 kg; lognormal SD95 2.2954
  (3,5,5,5,5,na)
  Stochiometric calculation,
- Cathode, aluminium electrolysis [RER]: 0.018082 kg; lognormal SD95 2.5006
  (same comment as for Electricity, medium voltage, production ENTSO-E, at grid)
- Disposal, filter dust Al electrolysis, 0% water, to residual material landfill [CH]: 0.001998 kg; lognormal SD95 2.5006
  (5,5,5,5,5,na)
  Original value taken from ""aluminium production, primary, liquid"". Uncertainty changed accordingly.
  Production Volume Amount: 35.964
- Cryolite, at plant [RER]: 0.0015984 kg; lognormal SD95 2.5006
  (same comment as for Electricity, medium voltage, production ENTSO-E, at grid)
- Heat, light fuel oil, at industrial furnace 1MW [RER]: 0.089 MJ; lognormal SD95 1.4189
  (same comment as for Electricity, medium voltage, production ENTSO-E, at grid)
- Neodymium oxide, at plant [CN]: 0.908 kg; lognormal SD95 2.2954
  (3,5,5,5,5,na)
  Stochiometric calculation,
- Boric oxide, at plant [GLO]: 0.09344 kg; lognormal SD95 2.2954
  (3,5,5,5,5,na)
  Stochiometric calculation,
- Transport, freight, rail [RER]: 0.71573 tkm; lognormal SD95 1.2495
  (same comment as for Transport, freight, lorry, fleet average)
- Heat, natural gas, at industrial furnace 1MW [CH]: 0.084 MJ; lognormal SD95 1.4189
  (same comment as for Electricity, medium voltage, production ENTSO-E, at grid)
- Anode, for metal electrolysis [RER]: 0.44755 kg; lognormal SD95 2.5006
  (same comment as for Electricity, medium voltage, production ENTSO-E, at grid)
- Disposal, inert waste, 5% water, to construction waste landfill [CH]: 0.004995 kg; lognormal SD95 2.5006
  (5,5,5,5,5,na)
  Original value taken from ""aluminium production, primary, liquid"". Uncertainty changed accordingly.
  Production Volume Amount: 89.91

## Emissions to nature
- Particulates, < 2.5 um [emissions to air, unspecified]: 0.0026074 kg; lognormal SD95 4.1715
  (same comment as for Electricity, medium voltage, production ENTSO-E, at grid)
- Hydrogen fluoride [emissions to air, unspecified]: 0.00053946 kg; lognormal SD95 2.7183
  (same comment as for Electricity, medium voltage, production ENTSO-E, at grid)
- Particulates, > 2.5 um, and < 10um [emissions to air, unspecified]: 0.00060939 kg; lognormal SD95 3.1548
  (same comment as for Electricity, medium voltage, production ENTSO-E, at grid)
- PAH, polycyclic aromatic hydrocarbons [emissions to air, unspecified]: 4.5654e-5 kg; lognormal SD95 4.1715
  (same comment as for Electricity, medium voltage, production ENTSO-E, at grid)
- Carbon monoxide, fossil [emissions to air, unspecified]: 0.091708 kg; lognormal SD95 6.3899
  (same comment as for Electricity, medium voltage, production ENTSO-E, at grid)
- Sulfur dioxide [emissions to air, unspecified]: 0.0088312 kg; lognormal SD95 2.5006
  (same comment as for Electricity, medium voltage, production ENTSO-E, at grid)
- Nitrogen oxides [emissions to air, unspecified]: 6.3936e-5 kg; lognormal SD95 2.6639
  (same comment as for Electricity, medium voltage, production ENTSO-E, at grid)
- Ethane, hexafluoro-, HFC-116 [emissions to air, unspecified]: 2.7972e-5 kg; lognormal SD95 2.7183
  (same comment as for Electricity, medium voltage, production ENTSO-E, at grid)
- Methane, tetrafluoro-, CFC-14 [emissions to air, unspecified]: 0.00025175 kg; lognormal SD95 2.7183
  (same comment as for Electricity, medium voltage, production ENTSO-E, at grid)
- Benzo(a)pyrene [emissions to air, unspecified]: 1.2987e-6 kg; lognormal SD95 4.1715
  (same comment as for Electricity, medium voltage, production ENTSO-E, at grid)
- Carbon dioxide, fossil [emissions to air, unspecified]: 1.4965 kg; lognormal SD95 2.5006
  (same comment as for Electricity, medium voltage, production ENTSO-E, at grid)

## Sampling procedure
Literature / Survey/Adaptation as proxy

## Sources
- Frischknecht R., Messmer A., Stolz P., 2016, 2016 - Mobitool - Frischknecht, Project Report, 0, treeze Ltd., Bern, CH
