# Solid unbleached board, SUB, at plant

Dataset: EcoSpold 1, unit process
Functional unit: 1 kg
Category: paper+ board / board
Geography: RER
Time period: 2000-01 to 2000-12
Production volume: Total European boxboard production in 2000: 11'664 kt (CEPI statistics)
Generated by: Roland Hischier
accessRestrictedTo: 0
copyright: true

## Included processes
This module includes the European production of solid unbleached board (SUB) in an integrated mill - including transports to paper mill, wood handling, chemical pulping, board production, energy production on-site and internal waste water treatment.; Geography: Estimation of European average data, based on data about unbleached sulphate pulp production and kraft paper production

## Technology
Average of present used technology

## Reference product
- Solid unbleached board, SUB, at plant [RER]: 1 kg
  Europe

## Inputs from technosphere
- Limestone, milled, loose, at plant [CH]: 0.0705 kg; lognormal SD95 1.64
  (3,5,1,3,4,5); estimated from solid bleached board data
- Sulphuric acid, liquid, at plant [RER]: 0.0041 kg; lognormal SD95 1.64
  (3,5,1,3,4,5); estimated from solid bleached board data
- Carboxymethyl cellulose, powder, at plant [RER]: 0.0004 kg; lognormal SD95 1.64
  (3,5,1,3,4,5); estimated from solid bleached board data
- Pulpwood, spruce, sustainable forest management, measured as solid wood under bark, at forest road [SE]: 0.000995 m3
  (3,5,1,3,4,5); estimated from unbleached kraft paper data; DS
- Paper mill, integrated [RER]: 5.44e-11 p; lognormal SD95 3.05
  (4,na,na,na,na,na); own assumption
- Chemicals inorganic, at plant [GLO]: 0.014 kg; lognormal SD95 1.64
  (3,5,1,3,4,5); estimated from solid bleached board data
- Light fuel oil, at regional storage [RER]: 0.00794 kg; lognormal SD95 1.64
  (3,5,1,3,4,5); estimated from unbleached kraft paper data
- Disposal, ash from paper prod. sludge, 0% water, to residual material landfill [CH]: 0.00304 kg; lognormal SD95 1.64
  (3,5,1,3,4,5); estimated from unbleached kraft paper data
- Pulpwood, beech, sustainable forest management, measured as solid wood under bark, at forest road [DE]: 0.00226 m3; lognormal SD95 1.64
  (3,5,1,3,4,5); estimated from unbleached kraft paper data
- AKD sizer, in paper production, at plant [RER]: 0.0002 kg; lognormal SD95 1.64
  (3,5,1,3,4,5); estimated from solid bleached board data
- Transport, freight, lorry, 3.5t gross weight, fleet average [RER]: 0.0014 tkm; lognormal SD95 2.34
  (3,5,1,3,4,5); estimated from unbleached kraft paper data
- Heavy fuel oil, at regional storage [RER]: 0.035 kg; lognormal SD95 1.64
  (3,5,1,3,4,5); estimated from unbleached kraft paper data
- Disposal, wood ash mixture, pure, 0% water, to sanitary landfill [CH]: 0.0277 kg; lognormal SD95 1.64
  (3,5,1,3,4,5); estimated from unbleached kraft paper data
- Hard coal, at regional storage [WEU]: 0.00255 kg; lognormal SD95 1.64
  (3,5,1,3,4,5); estimated from unbleached kraft paper data
- Chemicals organic, at plant [GLO]: 0.003 kg; lognormal SD95 1.64
  (3,5,1,3,4,5); estimated from solid bleached board data
- Transport, freight, lorry, fleet average [RER]: 0.933 tkm; lognormal SD95 2.34
  (3,5,1,3,4,5); estimated from unbleached kraft paper data
- Electricity, medium voltage, production ENTSO-E, at grid: 0.503 kWh; lognormal SD95 1.64
  (3,5,1,3,4,5); estimated from unbleached kraft paper data
- Sodium hydroxide, 50% in H2O, production mix, at plant [RER]: 0.011 kg; lognormal SD95 1.64
  (3,5,1,3,4,5); estimated from solid bleached board data
- Disposal, bilge oil, 90% water, to hazardous waste incineration [CH]: 0.0004 kg; lognormal SD95 1.64
  (3,5,1,3,4,5); estimated from unbleached kraft paper data
- Quicklime, milled, loose, at plant [CH]: 0.0066 kg; lognormal SD95 1.64
  (3,5,1,3,4,5); estimated from solid bleached board data
- Sodium dithionite, anhydrous, at plant [RER]: 0.0042 kg; lognormal SD95 1.64
  (3,5,1,3,4,5); estimated from solid bleached board data
- Potato starch, at plant [DE]: 0.0133 kg; lognormal SD95 1.64
  (3,5,1,3,4,5); estimated from solid bleached board data
- Electricity, medium voltage, production NORDEL, at grid [NORDEL]: 0.443 kWh; lognormal SD95 1.64
  (3,5,1,3,4,5); estimated from unbleached kraft paper data
- Sulphur dioxide, liquid, at plant [RER]: 0.0009 kg; lognormal SD95 1.64
  (3,5,1,3,4,5); estimated from solid bleached board data
- Nitrogen, liquid, at plant [RER]: 0.00027 kg; lognormal SD95 1.64
  (3,5,1,3,4,5); estimated from solid bleached board data
- Pulpwood, pine, sustainable forest management, measured as solid wood under bark, at forest road [SE]: 0.000995 m3
  (3,5,1,3,4,5); estimated from unbleached kraft paper data; DS
- Transport, freight, rail [RER]: 0.294 tkm; lognormal SD95 2.34
  (3,5,1,3,4,5); estimated from unbleached kraft paper data
- Latex, at plant [RER]: 0.012 kg; lognormal SD95 1.64
  (3,5,1,3,4,5); estimated from solid bleached board data
- Disposal, sludge from pulp and paper production, 25% water, to sanitary landfill [CH]: 0.0108 kg; lognormal SD95 1.64
  (3,5,1,3,4,5); estimated from unbleached kraft paper data
- Kaolin, at plant [RER]: 0.0675 kg; lognormal SD95 1.64
  (3,5,1,3,4,5); estimated from solid bleached board data
- Natural gas, high pressure, at consumer [RER]: 0.551 MJ; lognormal SD95 1.64
  (3,5,1,3,4,5); estimated from unbleached kraft paper data
- Phosphorus, white, liquid, at plant [RER]: 1e-5 kg; lognormal SD95 1.64
  (3,5,1,3,4,5); estimated from solid bleached board data

## Inputs from nature
- Water, cooling, unspecified natural origin/m3 [resources, in water]: 0.103 m3; lognormal SD95 1.64
  (3,5,1,3,4,5); estimated from unbleached kraft paper data
- Water, unspecified natural origin/m3 [resources, in water]: 0.024 m3; lognormal SD95 1.64
  (3,5,1,3,4,5); estimated from unbleached kraft paper data

## Emissions to nature
- Antimony [emissions to air, high. pop.]: 1.16e-10 kg; lognormal SD95 1.88
  (2,5,2,1,4,5); estimation - based on respective heating modules
- Phosphorus [emissions to water, river]: 2e-5 kg; lognormal SD95 1.89
  (3,5,1,3,4,5); estimated from unbleached kraft paper data
- Propene [emissions to air, high. pop.]: 3.68e-8 kg; lognormal SD95 1.88
  (2,5,2,1,4,5); estimation - based on respective heating modules
- Propane [emissions to air, high. pop.]: 2.34e-7 kg; lognormal SD95 1.88
  (2,5,2,1,4,5); estimation - based on respective heating modules
- Iodine [emissions to air, high. pop.]: 8.4e-10 kg; lognormal SD95 1.88
  (2,5,2,1,4,5); estimation - based on respective heating modules
- Propionic acid [emissions to air, high. pop.]: 1.1e-8 kg; lognormal SD95 1.88
  (2,5,2,1,4,5); estimation - based on respective heating modules
- Ethane [emissions to air, high. pop.]: 1.11e-7 kg; lognormal SD95 1.88
  (2,5,2,1,4,5); estimation - based on respective heating modules
- Radium-226 [emissions to air, high. pop.]: 8.84e-7 kBq; lognormal SD95 3.32
  (2,5,2,1,4,5); estimation - based on respective heating modules
- Carbon monoxide, fossil [emissions to air, high. pop.]: 2e-5 kg; lognormal SD95 5.37
  (2,5,2,1,4,5); estimation - based on respective heating modules
- Carbon dioxide, biogenic [emissions to air, high. pop.]: 2.03 kg; lognormal SD95 1.64
  (3,5,1,3,4,5); estimated from unbleached kraft paper data
- Formaldehyde [emissions to air, high. pop.]: 3.79e-6 kg; lognormal SD95 1.88
  (2,5,2,1,4,5); estimation - based on respective heating modules
- Thorium-228 [emissions to air, high. pop.]: 4.05e-7 kBq; lognormal SD95 3.32
  (2,5,2,1,4,5); estimation - based on respective heating modules
- Chromium VI [emissions to air, high. pop.]: 1.29e-9 kg; lognormal SD95 5.37
  (2,5,2,1,4,5); estimation - based on respective heating modules
- Molybdenum [emissions to air, high. pop.]: 2.34e-8 kg; lognormal SD95 5.37
  (2,5,2,1,4,5); estimation - based on respective heating modules
- Aluminium [emissions to air, high. pop.]: 7.89e-7 kg; lognormal SD95 1.88
  (2,5,2,1,4,5); estimation - based on respective heating modules
- Phosphorus [emissions to air, high. pop.]: 6.42e-6 kg; lognormal SD95 1.88
  (2,5,2,1,4,5); estimation - based on respective heating modules
- Magnesium [emissions to air, high. pop.]: 7.98e-6 kg; lognormal SD95 5.37
  (2,5,2,1,4,5); estimation - based on respective heating modules
- Silicon [emissions to air, high. pop.]: 1.16e-6 kg; lognormal SD95 5.37
  (2,5,2,1,4,5); estimation - based on respective heating modules
- NMVOC, non-methane volatile organic compounds, unspecified origin [emissions to air, high. pop.]: 1.3e-5 kg; lognormal SD95 1.88
  (2,5,2,1,4,5); estimation - based on respective heating modules
- Heat, waste [emissions to air, high. pop.]: 29.2 MJ; lognormal SD95 1.64
  (3,5,1,3,4,5); calculated from input
- Potassium-40 [emissions to air, high. pop.]: 9.95e-7 kBq; lognormal SD95 3.32
  (2,5,2,1,4,5); estimation - based on respective heating modules
- Sulfur dioxide [emissions to air, high. pop.]: 0.00085 kg; lognormal SD95 1.64
  (3,5,1,3,4,5); estimated from unbleached kraft paper data
- Methane, biogenic [emissions to air, high. pop.]: 8.55e-6 kg; lognormal SD95 1.88
  (2,5,2,1,4,5); estimation - based on respective heating modules
- Benzo(a)pyrene [emissions to air, high. pop.]: 1.07e-8 kg; lognormal SD95 1.88
  (2,5,2,1,4,5); estimation - based on respective heating modules
- Nickel [emissions to air, high. pop.]: 1.07e-6 kg; lognormal SD95 5.37
  (2,5,2,1,4,5); estimation - based on respective heating modules
- Copper [emissions to air, high. pop.]: 7.79e-7 kg; lognormal SD95 5.37
  (2,5,2,1,4,5); estimation - based on respective heating modules
- Particulates, > 2.5 um, and < 10um [emissions to air, high. pop.]: 4.5e-5 kg; lognormal SD95 2.34
  (3,5,1,3,4,5); estimated from unbleached kraft paper data
- Boron [emissions to air, high. pop.]: 3.49e-8 kg; lognormal SD95 5.37
  (2,5,2,1,4,5); estimation - based on respective heating modules
- Radium-228 [emissions to air, high. pop.]: 4.79e-6 kBq; lognormal SD95 3.32
  (2,5,2,1,4,5); estimation - based on respective heating modules
- BOD5, Biological Oxygen Demand [emissions to water, river]: 0.00023 kg; lognormal SD95 1.89
  (3,5,1,3,4,5); estimated from unbleached kraft paper data
- Arsenic [emissions to air, high. pop.]: 4.2e-8 kg; lognormal SD95 1.88
  (2,5,2,1,4,5); estimation - based on respective heating modules
- Ethene [emissions to air, high. pop.]: 2.21e-7 kg; lognormal SD95 5.37
  (2,5,2,1,4,5); estimation - based on respective heating modules
- Radon-220 [emissions to air, high. pop.]: 7.37e-8 kBq; lognormal SD95 3.32
  (2,5,2,1,4,5); estimation - based on respective heating modules
- Toluene [emissions to air, high. pop.]: 6.59e-6 kg; lognormal SD95 1.88
  (2,5,2,1,4,5); estimation - based on respective heating modules
- Carbon monoxide, biogenic [emissions to air, high. pop.]: 0.00103 kg; lognormal SD95 5.37
  (2,5,2,1,4,5); estimation - based on respective heating modules
- Dinitrogen monoxide [emissions to air, high. pop.]: 5.61e-5 kg; lognormal SD95 1.88
  (2,5,2,1,4,5); estimation - based on respective heating modules
- Hydrocarbons, aliphatic, unsaturated [emissions to air, high. pop.]: 6.64e-5 kg; lognormal SD95 1.88
  (2,5,2,1,4,5); estimation - based on respective heating modules
- Zinc [emissions to air, high. pop.]: 6.71e-6 kg; lognormal SD95 5.37
  (2,5,2,1,4,5); estimation - based on respective heating modules
- Phenol, pentachloro- [emissions to air, high. pop.]: 1.73e-10 kg; lognormal SD95 1.88
  (2,5,2,1,4,5); estimation - based on respective heating modules
- Calcium [emissions to air, high. pop.]: 0.000125 kg; lognormal SD95 3.32
  (2,5,2,1,4,5); estimation - based on respective heating modules
- Selenium [emissions to air, high. pop.]: 1.8e-8 kg; lognormal SD95 5.37
  (2,5,2,1,4,5); estimation - based on respective heating modules
- Sodium [emissions to air, high. pop.]: 2.89e-5 kg; lognormal SD95 5.37
  (2,5,2,1,4,5); estimation - based on respective heating modules
- Benzene, ethyl- [emissions to air, high. pop.]: 6.42e-7 kg; lognormal SD95 1.88
  (2,5,2,1,4,5); estimation - based on respective heating modules
- Acetone [emissions to air, high. pop.]: 2.16e-7 kg; lognormal SD95 1.88
  (2,5,2,1,4,5); estimation - based on respective heating modules
- Polonium-210 [emissions to air, high. pop.]: 6.26e-6 kBq; lognormal SD95 3.32
  (2,5,2,1,4,5); estimation - based on respective heating modules
- Ethyne [emissions to air, high. pop.]: 3.68e-8 kg; lognormal SD95 1.88
  (2,5,2,1,4,5); estimation - based on respective heating modules
- Vanadium [emissions to air, high. pop.]: 3.75e-6 kg; lognormal SD95 5.37
  (2,5,2,1,4,5); estimation - based on respective heating modules
- Suspended solids, unspecified [emissions to water, river]: 0.001 kg; lognormal SD95 1.89
  (3,5,1,3,4,5); estimated from unbleached kraft paper data
- Ammonia [emissions to air, high. pop.]: 3.71e-5 kg; lognormal SD95 1.88
  (2,5,2,1,4,5); estimation - based on respective heating modules
- Tin [emissions to air, high. pop.]: 4.66e-11 kg; lognormal SD95 5.37
  (2,5,2,1,4,5); estimation - based on respective heating modules
- COD, Chemical Oxygen Demand [emissions to water, river]: 0.00184 kg; lognormal SD95 1.89
  (3,5,1,3,4,5); estimated from unbleached kraft paper data
- Thorium-232 [emissions to air, high. pop.]: 2.58e-7 kBq; lognormal SD95 3.32
  (2,5,2,1,4,5); estimation - based on respective heating modules
- Dioxin, 2,3,7,8 Tetrachlorodibenzo-p- [emissions to air, high. pop.]: 2.14e-12 kg; lognormal SD95 1.88
  (2,5,2,1,4,5); estimation - based on respective heating modules
- Uranium [emissions to air, high. pop.]: 1.86e-10 kg; lognormal SD95 5.37
  (2,5,2,1,4,5); estimation - based on respective heating modules
- Nitrogen oxides [emissions to air, high. pop.]: 0.00158 kg; lognormal SD95 1.89
  (3,5,1,3,4,5); estimated from unbleached kraft paper data
- Pentane [emissions to air, high. pop.]: 7.32e-7 kg; lognormal SD95 1.88
  (2,5,2,1,4,5); estimation - based on respective heating modules
- Bromine [emissions to air, high. pop.]: 1.28e-6 kg; lognormal SD95 1.88
  (2,5,2,1,4,5); estimation - based on respective heating modules
- Chromium [emissions to air, high. pop.]: 1.09e-7 kg; lognormal SD95 5.37
  (2,5,2,1,4,5); estimation - based on respective heating modules
- Scandium [emissions to air, high. pop.]: 9.29e-11 kg; lognormal SD95 5.37
  (2,5,2,1,4,5); estimation - based on respective heating modules
- Hydrocarbons, aliphatic, alkanes, unspecified [emissions to air, high. pop.]: 2.05e-5 kg; lognormal SD95 1.88
  (2,5,2,1,4,5); estimation - based on respective heating modules
- Lead [emissions to air, high. pop.]: 6.22e-7 kg; lognormal SD95 5.37
  (2,5,2,1,4,5); estimation - based on respective heating modules
- Methane, fossil [emissions to air, high. pop.]: 6.51e-6 kg; lognormal SD95 1.88
  (2,5,2,1,4,5); estimation - based on respective heating modules
- Fluorine [emissions to air, high. pop.]: 1.07e-6 kg; lognormal SD95 1.88
  (2,5,2,1,4,5); estimation - based on respective heating modules
- Radon-222 [emissions to air, high. pop.]: 7.37e-8 kBq; lognormal SD95 3.32
  (2,5,2,1,4,5); estimation - based on respective heating modules
- Potassium [emissions to air, high. pop.]: 0.000501 kg; lognormal SD95 5.37
  (2,5,2,1,4,5); estimation - based on respective heating modules
- Particulates, > 10 um [emissions to air, high. pop.]: 4e-5 kg; lognormal SD95 1.89
  (3,5,1,3,4,5); estimated from unbleached kraft paper data
- Nitrogen [emissions to water, river]: 0.0002 kg; lognormal SD95 1.89
  (3,5,1,3,4,5); estimated from unbleached kraft paper data
- Titanium [emissions to air, high. pop.]: 2.79e-8 kg; lognormal SD95 5.37
  (2,5,2,1,4,5); estimation - based on respective heating modules
- Hydrocarbons, aromatic [emissions to air, high. pop.]: 2.27e-7 kg; lognormal SD95 1.88
  (2,5,2,1,4,5); estimation - based on respective heating modules
- Beryllium [emissions to air, high. pop.]: 9.29e-11 kg; lognormal SD95 5.37
  (2,5,2,1,4,5); estimation - based on respective heating modules
- Carbon dioxide, fossil [emissions to air, high. pop.]: 0.175 kg; lognormal SD95 1.64
  (3,5,1,3,4,5); estimated from unbleached kraft paper data
- Benzene, hexachloro- [emissions to air, high. pop.]: 1.54e-13 kg; lognormal SD95 1.88
  (2,5,2,1,4,5); estimation - based on respective heating modules
- Thallium [emissions to air, high. pop.]: 1.16e-10 kg; lognormal SD95 5.37
  (2,5,2,1,4,5); estimation - based on respective heating modules
- Hydrogen chloride [emissions to air, high. pop.]: 5.1e-6 kg; lognormal SD95 1.88
  (2,5,2,1,4,5); estimation - based on respective heating modules
- Manganese [emissions to air, high. pop.]: 3.64e-6 kg; lognormal SD95 5.37
  (2,5,2,1,4,5); estimation - based on respective heating modules
- Particulates, < 2.5 um [emissions to air, high. pop.]: 0.000415 kg; lognormal SD95 3.33
  (3,5,1,3,4,5); estimated from unbleached kraft paper data
- Chlorine [emissions to air, high. pop.]: 3.85e-6 kg; lognormal SD95 3.32
  (2,5,2,1,4,5); estimation - based on respective heating modules
- Acetaldehyde [emissions to air, high. pop.]: 1.52e-6 kg; lognormal SD95 1.88
  (2,5,2,1,4,5); estimation - based on respective heating modules
- Benzene [emissions to air, high. pop.]: 1.97e-5 kg; lognormal SD95 1.88
  (2,5,2,1,4,5); estimation - based on respective heating modules
- Cobalt [emissions to air, high. pop.]: 4.78e-8 kg; lognormal SD95 5.37
  (2,5,2,1,4,5); estimation - based on respective heating modules
- Uranium-238 [emissions to air, high. pop.]: 7.37e-7 kBq; lognormal SD95 3.32
  (2,5,2,1,4,5); estimation - based on respective heating modules
- m-Xylene [emissions to air, high. pop.]: 2.57e-6 kg; lognormal SD95 1.88
  (2,5,2,1,4,5); estimation - based on respective heating modules
- Barium [emissions to air, high. pop.]: 9.29e-9 kg; lognormal SD95 5.37
  (2,5,2,1,4,5); estimation - based on respective heating modules
- Hydrogen fluoride [emissions to air, high. pop.]: 3.04e-7 kg; lognormal SD95 1.88
  (2,5,2,1,4,5); estimation - based on respective heating modules
- Xylene [emissions to air, high. pop.]: 7.37e-9 kg; lognormal SD95 1.88
  (2,5,2,1,4,5); estimation - based on respective heating modules
- Cadmium [emissions to air, high. pop.]: 6.27e-8 kg; lognormal SD95 5.37
  (2,5,2,1,4,5); estimation - based on respective heating modules
- Mercury [emissions to air, high. pop.]: 7.03e-9 kg; lognormal SD95 5.37
  (2,5,2,1,4,5); estimation - based on respective heating modules
- Thorium [emissions to air, high. pop.]: 1.4e-10 kg; lognormal SD95 5.37
  (2,5,2,1,4,5); estimation - based on respective heating modules
- Lead-210 [emissions to air, high. pop.]: 3.43e-6 kBq; lognormal SD95 3.32
  (2,5,2,1,4,5); estimation - based on respective heating modules
- Ethanol [emissions to air, high. pop.]: 4.33e-7 kg; lognormal SD95 1.88
  (2,5,2,1,4,5); estimation - based on respective heating modules
- PAH, polycyclic aromatic hydrocarbons [emissions to air, high. pop.]: 2.44e-7 kg; lognormal SD95 1.88
  (2,5,2,1,4,5); estimation - based on respective heating modules
- Acetic acid [emissions to air, high. pop.]: 9.48e-7 kg; lognormal SD95 1.88
  (2,5,2,1,4,5); estimation - based on respective heating modules
- Strontium [emissions to air, high. pop.]: 1.4e-8 kg; lognormal SD95 5.37
  (2,5,2,1,4,5); estimation - based on respective heating modules
- Iron [emissions to air, high. pop.]: 5.85e-7 kg; lognormal SD95 5.37
  (2,5,2,1,4,5); estimation - based on respective heating modules
- Methanol [emissions to air, high. pop.]: 7.36e-7 kg; lognormal SD95 1.88
  (2,5,2,1,4,5); estimation - based on respective heating modules
- Butane [emissions to air, high. pop.]: 4.92e-7 kg; lognormal SD95 3.32
  (2,5,2,1,4,5); estimation - based on respective heating modules
- Water [emissions to water, unspecified]: 97.85, 22.8 kg (2 entries); lognormal SD95 2.5196
  (5,5,5,5,5,BU:1.05); All uncertainty-values set to 5.0 by default. Balance of input water

## Extrapolations
see Geography

## Sources
- Hischier R., 2007, 2007 - LCI packagings and graphical papers - Hischier, Final report ecoinvent data v2.0, 11, Swiss Centre for LCI, Empa - TSL, Duebendorf and St. Gallen, CH
Hischier R. (2007) Life Cycle Inventories of Packaging and Graphical Paper. Final report ecoinvent data v2.0. Volume: 11. Swiss Centre for LCI, Empa - TSL. Dübendorf, CH.
Type: Measurement on site
Source: CD-ROM
First author: Hischier R.
Year: 2007
Title of anthology: Final report ecoinvent data v2.0
Place of publication: Dübendorf, CH
Publisher: Swiss Centre for LCI, Empa - TSL
Volume No: 11

## Validation
Proof reading validation: passed; Other validation: none;
