# Disposal, lignite ash, 0% water, to opencast refill

Dataset: EcoSpold 1, unit process
Functional unit: 1 kg
Category: Others / unspecified
Geography: BA
Time period: 2000-01 to 2000-12
Generated by: Gabor Doka
accessRestrictedTo: 0
copyright: true

## General comment
backfilled waste composition is (in ppm): H2O n.a.;
Synonyms: ashes form lignite incineration disposed as backfill in opencast lignite mines;

## Included processes
This module contains only direct emissions from lignite ash used as backfill in opencast lignite mines: short-term emissions (0-100a) and long-term emissions (>100a) both to ground water. E.g. land-use and energy consumption is *not* included.

## Geography
Ash composition calculated from country-specific coal composition (BA) and technology-specific transfer coefficients in power plant.

## Technology
Lignite ash as backfill in lignite opencast mine (together with tailings)

## Reference product
- Disposal, lignite ash, 0% water, to opencast refill [BA]: 1 kg
  BOSNIA AND HERZEGOVINA

## Emissions to nature
- Magnesium [emissions to water, groundwater]: 3.2687e-6 kg; lognormal SD95 8.6405
  Short-term emission from lignite ash backfill. Uncertainty derived from uncertainty in ash composition and uncertainty in transfer coefficients.
- Manganese [emissions to water, groundwater]: 1.5842e-9 kg; lognormal SD95 18.931
  (same comment as for Magnesium)
- Molybdenum [emissions to water, groundwater, long-term]: 2.1663e-11 kg; lognormal SD95 9.1899
  Long-term emission from lignite ash backfill. Uncertainty derived from uncertainty in ash composition and uncertainty in transfer coefficients.
- Magnesium [emissions to water, groundwater, long-term]: 0.0068649 kg; lognormal SD95 3.615
  (same comment as for Molybdenum)
- Lead [emissions to water, groundwater, long-term]: 1.1068e-5 kg; lognormal SD95 9.394
  (same comment as for Molybdenum)
- Titanium [emissions to water, groundwater, long-term]: 0.00022865 kg; lognormal SD95 6.3342
  (same comment as for Molybdenum)
- Thallium [emissions to water, groundwater]: 6.8515e-11 kg; lognormal SD95 24.574
  (same comment as for Magnesium)
- Potassium [emissions to water, groundwater, long-term]: 0.0005985 kg; lognormal SD95 4.8734
  (same comment as for Molybdenum)
- Iron [emissions to water, groundwater, long-term]: 0.0082616 kg; lognormal SD95 3.4468
  (same comment as for Molybdenum)
- Antimony [emissions to water, groundwater]: 3.4615e-6 kg; lognormal SD95 9.8423
  (same comment as for Magnesium)
- Tungsten [emissions to water, groundwater, long-term]: 1.4065e-6 kg; lognormal SD95 11.281
  (same comment as for Molybdenum)
- Arsenic [emissions to water, groundwater]: 1.1048e-5 kg; lognormal SD95 9.396
  (same comment as for Magnesium)
- Boron [emissions to water, groundwater, long-term]: 0.00030247 kg; lognormal SD95 6.0331
  (same comment as for Molybdenum)
- Zinc [emissions to water, groundwater, long-term]: 6.1554e-5 kg; lognormal SD95 7.5871
  (same comment as for Molybdenum)
- Strontium [emissions to water, groundwater]: 2.4221e-7 kg; lognormal SD95 11.571
  (same comment as for Magnesium)
- Antimony [emissions to water, groundwater, long-term]: 5.5142e-6 kg; lognormal SD95 9.6806
  (same comment as for Molybdenum)
- Chloride [emissions to water, groundwater, long-term]: 1.4748e-6 kg; lognormal SD95 10.836
  (same comment as for Molybdenum)
- Tin [emissions to water, groundwater, long-term]: 3.6627e-6 kg; lognormal SD95 10.661
  (same comment as for Molybdenum)
- Cadmium [emissions to water, groundwater]: 3.8134e-11 kg; lognormal SD95 25.993
  (same comment as for Magnesium)
- Tungsten [emissions to water, groundwater]: 8.8291e-7 kg; lognormal SD95 11.457
  (same comment as for Magnesium)
- Manganese [emissions to water, groundwater, long-term]: 4.5786e-5 kg; lognormal SD95 7.885
  (same comment as for Molybdenum)
- Iodide [emissions to water, groundwater, long-term]: 4.5788e-14 kg; lognormal SD95 13.503
  (same comment as for Molybdenum)
- Thallium [emissions to water, groundwater, long-term]: 4.5113e-8 kg; lognormal SD95 16.487
  (same comment as for Molybdenum)
- Potassium [emissions to water, groundwater]: 0.00077513 kg; lognormal SD95 4.8663
  (same comment as for Magnesium)
- Molybdenum [emissions to water, groundwater]: 1.592e-5 kg; lognormal SD95 8.9952
  (same comment as for Magnesium)
- Selenium [emissions to water, groundwater, long-term]: 2.2672e-6 kg; lognormal SD95 10.708
  (same comment as for Molybdenum)
- Mercury [emissions to water, groundwater, long-term]: 2.3041e-8 kg; lognormal SD95 17.491
  (same comment as for Molybdenum)
- Mercury [emissions to water, groundwater]: 4.5563e-12 kg; lognormal SD95 30.366
  (same comment as for Magnesium)
- Scandium [emissions to water, groundwater]: 3.2351e-7 kg; lognormal SD95 12.491
  (same comment as for Magnesium)
- Calcium [emissions to water, groundwater, long-term]: 0.04577 kg; lognormal SD95 2.4274
  (same comment as for Molybdenum)
- Cobalt [emissions to water, groundwater]: 2.4591e-8 kg; lognormal SD95 14.639
  (same comment as for Magnesium)
- Copper [emissions to water, groundwater]: 2.1958e-9 kg; lognormal SD95 18.387
  (same comment as for Magnesium)
- Selenium [emissions to water, groundwater]: 1.4232e-6 kg; lognormal SD95 10.879
  (same comment as for Magnesium)
- Calcium [emissions to water, groundwater]: 1.7329e-5 kg; lognormal SD95 7.2158
  (same comment as for Magnesium)
- Vanadium [emissions to water, groundwater]: 4.8922e-7 kg; lognormal SD95 10.8
  (same comment as for Magnesium)
- Copper [emissions to water, groundwater, long-term]: 1.3616e-5 kg; lognormal SD95 9.1655
  (same comment as for Molybdenum)
- Bromine [emissions to water, groundwater]: 3.6011e-6 kg; lognormal SD95 10.661
  (same comment as for Magnesium)
- Phosphate [emissions to water, groundwater]: 2.6101e-7 kg; lognormal SD95 12.912
  (same comment as for Magnesium)
- Sulfate [emissions to water, groundwater]: 0.023812 kg; lognormal SD95 2.9266
  (same comment as for Magnesium)
- Silicon [emissions to water, groundwater]: 0.00062006 kg; lognormal SD95 4.3874
  (same comment as for Magnesium)
- Scandium [emissions to water, groundwater, long-term]: 8.2118e-7 kg; lognormal SD95 12.117
  (same comment as for Molybdenum)
- Cadmium [emissions to water, groundwater, long-term]: 1.341e-6 kg; lognormal SD95 11.881
  (same comment as for Molybdenum)
- Strontium [emissions to water, groundwater, long-term]: 0.00015948 kg; lognormal SD95 6.6663
  (same comment as for Molybdenum)
- Nickel [emissions to water, groundwater]: 5.1283e-8 kg; lognormal SD95 13.624
  (same comment as for Magnesium)
- Fluoride [emissions to water, groundwater, long-term]: 9.9535e-6 kg; lognormal SD95 9.3662
  (same comment as for Molybdenum)
- Arsenic [emissions to water, groundwater, long-term]: 1.1048e-14 kg; lognormal SD95 9.5955
  (same comment as for Molybdenum)
- Aluminium [emissions to water, groundwater]: 1.3379e-5 kg; lognormal SD95 7.2663
  (same comment as for Magnesium)
- Barium [emissions to water, groundwater, long-term]: 0.00022893 kg; lognormal SD95 6.3342
  (same comment as for Molybdenum)
- Nickel [emissions to water, groundwater, long-term]: 3.3767e-5 kg; lognormal SD95 8.1959
  (same comment as for Molybdenum)
- Iron [emissions to water, groundwater]: 1.0344e-7 kg; lognormal SD95 12.806
  (same comment as for Magnesium)
- Zinc [emissions to water, groundwater]: 3.1601e-9 kg; lognormal SD95 17.776
  (same comment as for Magnesium)
- Cobalt [emissions to water, groundwater, long-term]: 3.4316e-5 kg; lognormal SD95 8.1801
  (same comment as for Molybdenum)
- Sulfate [emissions to water, groundwater, long-term]: 0.064649 kg; lognormal SD95 2.7014
  (same comment as for Molybdenum)
- Chromium VI [emissions to water, groundwater]: 4.834e-6 kg; lognormal SD95 8.9377
  (same comment as for Magnesium)
- Beryllium [emissions to water, groundwater, long-term]: 2.2859e-6 kg; lognormal SD95 11.223
  (same comment as for Molybdenum)
- Titanium [emissions to water, groundwater]: 2.8466e-7 kg; lognormal SD95 11.362
  (same comment as for Magnesium)
- Iodide [emissions to water, groundwater]: 4.5788e-7 kg; lognormal SD95 13.259
  (same comment as for Magnesium)
- Phosphate [emissions to water, groundwater, long-term]: 0.00015635 kg; lognormal SD95 7.8253
  (same comment as for Molybdenum)
- Sodium [emissions to water, groundwater]: 0.0014275 kg; lognormal SD95 4.5154
  (same comment as for Magnesium)
- Chromium VI [emissions to water, groundwater, long-term]: 3.1788e-6 kg; lognormal SD95 8.7798
  (same comment as for Molybdenum)
- Aluminium [emissions to water, groundwater, long-term]: 0.010747 kg; lognormal SD95 3.3127
  (same comment as for Molybdenum)
- Bromine [emissions to water, groundwater, long-term]: 6.1944e-8 kg; lognormal SD95 10.87
  (same comment as for Molybdenum)
- Barium [emissions to water, groundwater]: 7.921e-9 kg; lognormal SD95 16.304
  (same comment as for Magnesium)
- Fluoride [emissions to water, groundwater]: 1.4933e-6 kg; lognormal SD95 10.193
  (same comment as for Magnesium)
- Lead [emissions to water, groundwater]: 2.4047e-10 kg; lognormal SD95 22.335
  (same comment as for Magnesium)
- Tin [emissions to water, groundwater]: 2.9074e-10 kg; lognormal SD95 21.967
  (same comment as for Magnesium)
- Chloride [emissions to water, groundwater]: 1.9593e-6 kg; lognormal SD95 10.821
  (same comment as for Magnesium)
- Boron [emissions to water, groundwater]: 3.7918e-6 kg; lognormal SD95 8.5125
  (same comment as for Magnesium)
- Beryllium [emissions to water, groundwater]: 3.4717e-9 kg; lognormal SD95 17.656
  (same comment as for Magnesium)
- Vanadium [emissions to water, groundwater, long-term]: 4.2812e-5 kg; lognormal SD95 8.0541
  (same comment as for Molybdenum)
- Silicon [emissions to water, groundwater, long-term]: 0.07836 kg; lognormal SD95 2.1211
  (same comment as for Molybdenum)
- Sodium [emissions to water, groundwater, long-term]: 0.00063291 kg; lognormal SD95 4.5771
  (same comment as for Molybdenum)

## Sampling procedure
country-specific calculation based on literature data

## Extrapolations
Ash composition calculated from coal composition and transfer coefficients in power plant (cf. ecoinvent coal report Röder 2003). Transfer coefficients in backfill estimated from data of residual material landfills and estimated carbonate phase of lignite ashes

## Uncertainty adjustments
uncertainty of waste input composition data derived from generic formula GSD(c) = N*ln(c)+1. Mean long-term emissions are the emissions until the next glacial period occurs (in 60'000a) and the landfill is eroded. Maximal long-term emissions are the complete emissions of all landfilled material (except Cr). Minimal long-term emissions are derived implicitly from the mean and maximal values assuming a lognormal distribution.

## Sources
- Doka G., 2009, 2009 - LCI waste treatment services - Doka, Final report ecoinvent data v2.1, 13, Swiss Centre for LCI, Doka LCA, Duebendorf and St. Gallen, CH
Doka G. (2008) Life Cycle Inventories of Waste Treatment Services. Final report ecoinvent data v2.1. Volume: 13. Issue: 0. Swiss Centre for LCI, Empa - TSL. Dübendorf, CH.
Type: Measurement on site
Source: CD-ROM
First author: Doka G.
Year: 2008
Title of anthology: Final report ecoinvent data v2.1
Place of publication: Dübendorf, CH
Publisher: Swiss Centre for LCI, Empa - TSL
Volume No: 13
Issue No: 0

## Validation
Proof reading validation: passed.; Other validation: none;
