# Transport, aircraft, passenger, medium-haul, Infrastruktur

Dataset: EcoSpold 1, unit process
Functional unit: 1 personkm
Category: transport systems / airplane
Geography: RER
Time period: 2016-01 to 2019-12
Production volume: 33'060'000'000pkm
Share of production covered: 100 %
Generated by: Rolf Frischknecht
accessRestrictedTo: 0
copyright: true

## General comment
Inventory refers to the entire transport life cycle. Airport infrastructure expenditures and environmental interventions are accounted for using the yearly transport performance at Zurich airport (73'526'350'051 pkm/a). Aircraft manufacturing is allocated based on the total life span of an aircraft (50'000LTO), the average distance of a flight (2800km) and its average number of passengers (132p/unit);

## Included processes
The dataset describes the operation of aircrafts including taxying, take-off and landing covering fuel consumption and operation emissions. Aircraft manufacture and maintenance, airport construction, operation and dismantling are inputs to this dataset

## Technology
Aircraft operation modelled based on passenger aircrafts operated by Lufthansa Group in 2019. The emission profiles distinguish between LTO and cruise.

## Time period
Start date refers to emission factor data. End date refers to year of reporting fuel consumption and transport activities

## Reference product
- Transport, aircraft, passenger, medium-haul, Infrastruktur [RER]: 1 personkm
  Europe

## Inputs from technosphere
- Airport [RER]: 2.0575e-13 p; lognormal SD95 3.0616
  (2,4,1,3,1,5,BU:3); assumed yearly throughput at the airport: passengers 4915200 p and freight 38093t; Airport Zürich, yearly report, 2014
- Operation, maintenance, airport [RER]: 2.0575e-11 p; lognormal SD95 2.0646
  (2,4,1,3,1,5,BU:2); same as airport multipied by the lifetime of the airport of 100 years;
- Disposal, airport [RER]: 2.0575e-13 p; lognormal SD95 3.0616
  (2,4,1,3,1,5,BU:3); same as airport;

## Sampling procedure
fuel consumption is based on corporate data, emission profiles are based on FOEN statistics

## Extrapolations
Allocation between passengers and freight based on weight (average passenger weight between 158kg and 163kg); allocation between booking classes based on seat area.

## Sources
- Messmer A., Frischknecht R., 2016, 2016 - LCI air transport services - Messmer, Project report, 544, treeze Ltd., Uster, CH
Messmer A., Frischknecht R. (2015) Life cycle inventories of air transport services. Project report. Volume: 544. treeze Ltd.. Uster, CH.
Type: Separate publication
Source: Report
First author: Messmer A.
Other authors: Frischknecht R.
Year: 2015
Title of anthology: Project report
Place of publication: Uster, CH
Publisher: treeze Ltd.
Volume No: 544

## Validation
Proof reading validation: 09.03.2021; Other validation: G:\Projekte laufend\735 Aktualisierung Flugtransporte\EcoSpold\[735_aircraftTransport_2021_v0.10.xlsx]X-Process;
