# Cooling system

Dataset: EcoSpold 1, unit process
Functional unit: 1 kg
Category: transport systems / road\Vehicle components\Energy storage\Lithium-ion battery
Geography: GLO
Time period: 2020-01 to 2020-12
Generated by: Romain Sacchi
accessRestrictedTo: 0
copyright: False

## General comment
Datasets for mobility applications, originally published in a paper about batteries for stationary applications. Original source: Tobias S. Schmidt, Martin Beuse, Xiaojin Zhang, Bjarne Steffen, Simon F. Schneider, Alejandro Pena-Bello, Christian Bauer, and David Parra, Additional Emissions and Cost from Storing Electricity in Stationary Battery Systems, Environmental Science & Technology 2019 53 (7), 3379-3390, doi: 10.1021/acs.est.8b05317.

## Time period
Base technology year of 2020

## Reference product
- Cooling system [GLO]: 1 kg

## Inputs from technosphere
All rows: lognormal SD95 1.23828
- Clamps and fasteners [GLO]: 0.023 kg
  Uncertainty from pedigree matrix: (3, 3, 2, 2, 3, 1)
- Manifolds [GLO]: 0.038 kg
  Uncertainty from pedigree matrix: (3, 3, 2, 2, 3, 1)
- Pipe fitting [GLO]: 0.00096 kg
  Uncertainty from pedigree matrix: (3, 3, 2, 2, 3, 1)
- Radiator [GLO]: 0.87 kg
  Uncertainty from pedigree matrix: (3, 3, 2, 2, 3, 1)
- Thermal pad [GLO]: 0.02 kg
  Uncertainty from pedigree matrix: (3, 3, 2, 2, 3, 1)
- Ethylene glycol, at plant [RER]: 0.048 kg
  Uncertainty from pedigree matrix: (3, 3, 2, 2, 3, 1)
- Transport, freight, rail [RER]: 0.22 tkm
  Uncertainty from pedigree matrix: (3, 3, 2, 2, 3, 1)
- Transport, freight, lorry, 16t-32t gross weight, fleet average [RER]: 0.1 tkm
  Uncertainty from pedigree matrix: (3, 3, 2, 2, 3, 1)

## Sources
- Sacchi R., Bauer C., 2023, 2023 - LCI on-road vehicles - Sacchi, PSI, Villigen, CH
doi: 10.5281/ZENODO.5156043
