# EV charger, level 3, plugin, 200 kW

Dataset: EcoSpold 1, unit process
Functional unit: 1 p
Category: transport systems / road\Transformation\Infrastructure
Geography: RER
Time period: 2020-01 to 2020-12
Generated by: Romain Sacchi
accessRestrictedTo: 0
copyright: False

## General comment
Level 2 charger for BEV. From https://doi.org/10.1016/S0306-2619(01)00032-0. Used for overnight charging. Can charge a regular passenger car in 3 hours. Assumed lifetime of 24 years. We upscale it to a 100 kW Level-3 charger by upscaling the charger component given a mass of 1290 kg given by AAB's 100 kW bus charger. Original source: https://doi.org/10.1016/S0306-2619(01)00032-0.

## Time period
Base technology year of 2020

## Reference product
- EV charger, level 3, plugin, 200 kW [RER]: 1 p

## Inputs from technosphere
- Storage battery [RER]: 1 p; lognormal SD95 1.5181
  Uncertainty from pedigree matrix: (3, 2, 5, 3, 1, 1)
- Charger [RER]: 4.3 p; lognormal SD95 1.5181
  Uncertainty from pedigree matrix: (3, 2, 5, 3, 1, 1)
- Charging stand [RER]: 1 p; lognormal SD95 1.5181
  Uncertainty from pedigree matrix: (3, 2, 5, 3, 1, 1)

## Sources
- Sacchi R., Bauer C., 2023, 2023 - LCI on-road vehicles - Sacchi, PSI, Villigen, CH
doi: 10.5281/ZENODO.5156043
