# Welding, arc, aluminium

Dataset: EcoSpold 1, unit process
Functional unit: 1 m
Category: metals / welding
Geography: RER
Time period: 2000-01 to 2000-12
Generated by: Hans-Joerg Althaus
accessRestrictedTo: 0
copyright: true

## General comment
Based on rather rough estimates. Not to be used if welding is of importance in the system considered.;
Synonyms: MAG;

## Included processes
Includes the arc welding of aluminium and the transports of the filler rod and the protective gas to the place of use.

## Technology
MIG Welding of aluminum with helium as protective gas.

## Reference product
- Welding, arc, aluminium [RER]: 1 m
  Europe

## Inputs from technosphere
- Transport, freight, lorry, fleet average [RER]: 0.00127 tkm; lognormal SD95 2.1
  (4,5,n.A.,n.A.,n.A.,n.A.);
- Argon, crude, liquid, at plant [RER]: 0.00357 kg; lognormal SD95 1.9
  (5,5,5,3,3,5);
- Aluminium, production mix, at plant [RER]: 0.0183 kg; lognormal SD95 1.9
  (5,5,5,3,3,5);
- Electricity, medium voltage, production ENTSO-E, at grid: 0.075 kWh; lognormal SD95 1.9
  (5,5,5,3,3,5);
- Transport, freight, rail [RER]: 0.0153 tkm; lognormal SD95 2.1
  (4,5,n.A.,n.A.,n.A.,n.A.);
- Electronics for control units [RER]: 1e-5 kg; lognormal SD95 3.6
  (5,5,5,3,3,5);

## Emissions to nature
- Particulates, < 2.5 um [emissions to air, unspecified]: 0.000141 kg; lognormal SD95 3.6
  (5,5,5,3,3,5);
- Ozone [emissions to air, unspecified]: 9.06e-6 kg; lognormal SD95 2.2
  (5,5,5,3,3,5);
- Carbon monoxide, fossil [emissions to air, unspecified]: 6.67e-5 kg; lognormal SD95 2.2
  (5,5,5,3,3,5);
- Nitrogen oxides [emissions to air, unspecified]: 2e-6 kg; lognormal SD95 2.2
  (5,5,5,3,3,5);
- Silicon [emissions to air, unspecified]: 1.41e-5 kg; lognormal SD95 2.2
  (5,5,5,3,3,5);
- Zinc [emissions to air, unspecified]: 4.23e-5 kg; lognormal SD95 2.2
  (5,5,5,3,3,5);
- Heat, waste [emissions to air, unspecified]: 0.27 MJ; lognormal SD95 1.9
  (5,5,5,3,3,5);
- Aluminium [emissions to air, unspecified]: 8.45e-5 kg; lognormal SD95 2.2
  (5,5,5,3,3,5);
- Helium [emissions to air, unspecified]: 3.57e-6 kg; lognormal SD95 2.2
  (5,5,5,3,3,5);

## Sampling procedure
Literature

## Sources
- Werner F., Althaus H.-J., Kuenniger T., Richter K., Jungbluth N., 2007, 2007 - LCI wood as fuel and const. mat. - Werner, Final report ecoinvent data v2.0, 9, Swiss Centre for LCI, Empa - TSL, ESU-services Ltd., Duebendorf, CH
Werner F., Althaus H.-J., Künniger T., Richter K., Jungbluth N. (2007) 1Life Cycle Inventories of Wood as Fuel and Construction Material. Final report ecoinvent data v2.0. Volume: 9. Issue: 0. Swiss Centre for LCI, Empa - TSL. Dübendorf, CH.
Type: Measurement on site
Source: CD-ROM
First author: Werner F.
Other authors: Althaus H.-J., Künniger T., Richter K., Jungbluth N.
Year: 2007
Title of anthology: Final report ecoinvent data v2.0
Place of publication: Dübendorf, CH
Publisher: Swiss Centre for LCI, Empa - TSL
Volume No: 9
Issue No: 0

## Validation
Proof reading validation: Passed.; Other validation: none;
