# Cabin, for lorry

Dataset: EcoSpold 1, unit process
Functional unit: 1 kg
Category: transport systems / road\Vehicle components
Geography: RER
Time period: 2020-01 to 2020-12
Generated by: Romain Sacchi
accessRestrictedTo: 0
copyright: False

## General comment
This is the inventory for 1 kg of cabin for a MDV/HDV. Original source: Wolff et al. 2020, Sustainability, DOI: 10.3390/su12135396.

## Time period
Base technology year of 2020

## Reference product
- Cabin, for lorry [RER]: 1 kg

## Inputs from technosphere
All rows: lognormal SD95 1.24511
- Magnesium, at plant [RER]: 0.000689 kg
  Uncertainty from pedigree matrix: (3, 3, 2, 2, 3, 3)
- Copper, at regional storage [RER]: 0.0219 kg
  Uncertainty from pedigree matrix: (3, 3, 2, 2, 3, 3)
- Aluminium product manufacturing, average metal working [RER]: 0.013 kg
  Uncertainty from pedigree matrix: (3, 3, 2, 2, 3, 3)
- Acetylene, at regional storehouse [CH]: 5.26e-6 kg
  Uncertainty from pedigree matrix: (3, 3, 2, 2, 3, 3)
- Electricity, low voltage, production ENTSO-E, at grid [ENTSO-E]: 0.595 kWh
  Uncertainty from pedigree matrix: (3, 3, 2, 2, 3, 3)
- Copper product manufacturing, average metal working [RER]: 0.0219 kg
  Uncertainty from pedigree matrix: (3, 3, 2, 2, 3, 3)
- Natural gas, from high pressure network (1-5 bar), at service station [CH]: 0.00139 kg
  Uncertainty from pedigree matrix: (3, 3, 2, 2, 3, 3)
- Heat, at cogen 1MWe lean burn, allocation heat [RER]: 1.48 MJ
  Uncertainty from pedigree matrix: (3, 3, 2, 2, 3, 3)
- Nitrogen, liquid, at plant [RER]: 0.000158 kg
  Uncertainty from pedigree matrix: (3, 3, 2, 2, 3, 3)
- Polypropylene, granulate, at plant [RER]: 0.185 kg
  Uncertainty from pedigree matrix: (3, 3, 2, 2, 3, 3)
- Oxygen, liquid, at plant [RER]: 7.87e-5 kg
  Uncertainty from pedigree matrix: (3, 3, 2, 2, 3, 3)
- Carbon dioxide liquid, at plant [RER]: 0.000341 kg
  Uncertainty from pedigree matrix: (3, 3, 2, 2, 3, 3)
- Flat glass, coated, at plant [RER]: 0.115 kg
  Uncertainty from pedigree matrix: (3, 3, 2, 2, 3, 3)
- Zinc concentrate, at beneficiation [GLO]: 0.000285 kg
  Uncertainty from pedigree matrix: (3, 3, 2, 2, 3, 3)
- Reinforcing steel, at plant [RER]: 0.44 kg
  Uncertainty from pedigree matrix: (3, 3, 2, 2, 3, 3)
- Tap water, at user [RER]: 0.0198 kg
  Uncertainty from pedigree matrix: (3, 3, 2, 2, 3, 3)
- Synthetic rubber, at plant [RER]: 0.00811 kg
  Uncertainty from pedigree matrix: (3, 3, 2, 2, 3, 3)
- Aluminium alloy, AlMg3, at plant [RER]: 0.013 kg
  Uncertainty from pedigree matrix: (3, 3, 2, 2, 3, 3)
- Alkyd paint, white, 60% in H2O, at plant [RER]: 0.0338 kg
  Uncertainty from pedigree matrix: (3, 3, 2, 2, 3, 3)
- Steel product manufacturing, average metal working [RER]: 0.44 kg
  Uncertainty from pedigree matrix: (3, 3, 2, 2, 3, 3)
- Phenolic resin, at plant [RER]: 0.153 kg
  Uncertainty from pedigree matrix: (3, 3, 2, 2, 3, 3)
- Transport, freight, rail [RER]: 0.29 tkm
  Uncertainty from pedigree matrix: (3, 3, 2, 2, 3, 3)
- Transport, freight, lorry, 16t-32t gross weight, fleet average [RER]: 0.0914 tkm
  Uncertainty from pedigree matrix: (3, 3, 2, 2, 3, 3)
- Treatment, sewage, from residence, to wastewater treatment, class 2 [CH]: 1.98e-5 m3
  Uncertainty from pedigree matrix: (3, 3, 2, 2, 3, 3)

## Sources
- Sacchi R., Bauer C., 2023, 2023 - LCI on-road vehicles - Sacchi, PSI, Villigen, CH
doi: 10.5281/ZENODO.5156043
