# Polyvinylbutyral foil, at plant

Dataset: EcoSpold 1, unit process
Functional unit: 1 kg
Category: plastics / others
Geography: RER
Time period: 2007-01 to 2009-12
Generated by: Philippe Stolz
accessRestrictedTo: 0
copyright: true

## General comment
The foil consists of 70% PVB and 30% plasticizer. Wastes are recycled internally.;

## Included processes
Included is polyvinylbutyral and a plasticizer which is commonly used in PVB sheets. Extrusion process and transports of raw materials are included as well.

## Technology
Extrusion of PVB and plasticizer to sheets.

## Time period
Time of publications.

## Reference product
- Polyvinylbutyral foil, at plant [RER]: 1 kg
  Europe

## Inputs from technosphere
- Transport, freight, lorry, fleet average [RER]: 0.10246 tkm; lognormal SD95 2.095
  (4,5,na,na,na,na); standard distances
- Polyvinylbutyral, powder, at plant [RER]: 0.71721 kg; lognormal SD95 1.078
  (1,3,2,1,1,1); 70% PVB
- Extrusion, plastic film [RER]: 1 kg; lognormal SD95 1.1194
  (1,4,2,3,1,1);
- Transport, freight, rail [RER]: 0.61475 tkm; lognormal SD95 2.095
  (4,5,na,na,na,na); standard distances
- Triethylene glycol, at plant [RER]: 0.30738 kg; lognormal SD95 1.218
  (1,3,2,1,3,1); 30% plasticizer

## Sampling procedure
Literature and industry data.

## Sources
- Frischknecht R., Itten R., Sinha P., de Wild-Scholten M., Zhank J., 2020, 2015 - LCI and LCA photovoltaic systems - Frischknecht, Project report, 174, IEA PVPS Task 12, Petten, NL
Frischknecht R.,, Stolz P., Sinha P., de Wild-Scholten M. (2020) Life Cycle Inventories and Life Cycle Assessments of Photovoltaic Systems. Project report. Volume: 174. IEA PVPS Task 12.
Type: Separate publication
Source: Report
First author: Frischknecht R.,
Other authors: Stolz P., Sinha P., de Wild-Scholten M.
Year: 2020
Title of anthology: Project report
Publisher: IEA PVPS Task 12
Volume No: 174
Original title: Life Cycle Inventories and Life Cycle Assessments of Photovoltaic Systems

## Validation
Proof reading validation: 30.09.2020; Other validation: G:\Projekte laufend\174 Photovoltaic, IEA Task 12\2017 Global supply chain\EcoSpold\[174-photovoltaics-global-supply-chain-v2.5.xlsx]X-Process;
