# Glass fibre-reinforced polymer panel, polyester resin, at plant

Dataset: EcoSpold 1, unit process
Functional unit: 1 m2
Category: construction materials / fiberglass reinforced plastic sheets
Geography: TR
Time period: 2000-01 to 2016-12
Generated by: Daniel Savi
accessRestrictedTo: 0
copyright: true

## General comment
Glasfaserverstärkte Kunststoffplatte, Polyester, Herstellung
1m2 Fassadenplatte für Aussenanwendung, Stärke 1.6mm, Flächengewicht 2.41 kg/m2
Mittelwert aus Wellplatten und ebenen Platten gemäss dem Produktionsmix eines Herstellers.
Technology: Producer data from swiss company. Production site in Turkey
Version: 0.0

Local category: construction materials
Local subcategory: GFK-Platten

## Reference product
- Glass fibre-reinforced polymer panel, polyester resin, at plant [TR]: 1 m2
  TURKEY

## Inputs from technosphere
- Polyester resin, unsaturated, at plant [RER]: 1.7201 kg; lognormal SD95 1.51313
  (2;3;1;1;4)
- Transport, freight, lorry, 32t-40t gross weight, fleet average [RER]: 1.39123 tkm; lognormal SD95 2.72779
  (5;5;5;2;4)
- Glass fibre, at plant [RER]: 0.7589 kg; lognormal SD95 1.51313
  (2;3;1;1;4)
- Heat, natural gas, at industrial furnace 1MW [CH]: 0.195974 MJ; lognormal SD95 1.09067
  (2;3;1;3;1)
- Polyester resin, unsaturated, at plant [RER]: 0.0519 kg
- Disposal, plastics, mixture, 15.3% water, to sanitary landfill [CH]: 0.1433 kg; lognormal SD95 1.52959
  (2;3;1;5;4)
- Extrusion, plastic film [RER]: 0.0519 kg
- Electricity, medium voltage, at grid [GR]: 0.0558516 kWh; lognormal SD95 1.09067
  (2;3;1;3;1)
- Plastics processing factory [RER]: 5e-10 p; lognormal SD95 4.19863
  (5;5;5;5;5)

## Sources
- Kasser U., R. Frischknecht, M. Klingler, D. Savi, R. Itten, F. Wyss,P. Stolz, L. Tschuemperlin, 2016, 2016 - Renewal and exp. of LCA data in KBOB - Kasser, -, Buero fuer Umweltchemie, treeze Ltd., Zuerich and Uster, CH
U. Kasser, R. Frischknecht, M. Klingler, D. Savi, R. Itten, F. Wyss,P. Stolz, L. Tschümperlin 2016 (2015Z) Erneuerung und Erweiterung der Ökobilanzdaten in der KBOB-Liste "Ökobilanzdaten im Baubereich", Projekt QualiBOB. unknown.

First author: U. Kasser, R. Frischknecht, M. Klingler, D. Savi, R. Itten, F. Wyss,P. Stolz, L. Tschümperlin 2016
Year: 2015Z
Place of publication: unknown
Original title: Erneuerung und Erweiterung der Ökobilanzdaten in der KBOB-Liste "Ökobilanzdaten im Baubereich", Projekt QualiBOB
