# Passenger car, plugin gasoline hybrid, Large, 2016, EURO-6ab

Dataset: EcoSpold 1, unit process
Functional unit: 1 p
Category: transport systems / road\Transformation\Infrastructure
Geography: RER
Time period: 2016-01 to 2016-12
Generated by: Romain Sacchi
accessRestrictedTo: 0
copyright: False

## General comment
Driving cycle: WLTC. Combustion engine power: 63 [kW]. Electric motor power: 98 [kW]. Power share from combustion engine: 40 [%]. Km over lifetime: 200000 [km]. Yearly mileage: 12000 [km/year]. Autonomy on a full tank/battery: 833 [km]. Tank-to-wheel efficiency: 47 [%]. Tank-to-wheel energy consumption: 1626 [kj/km]. Battery capacity: 10 [kWh]. Fuel tank capacity: 591 [kWh]. Mass of battery: 144 [kg]. Curb mass (excl. driver and cargo): 2024 [kg]. Driving mass (incl. driver and cargo): 2164 [kg]..

## Time period
EURO-6a/b emissions standards apply to car registrations from 2015-01 until 2017-12. Vehicle lightweighting factors match manufacture year of 2016

## Reference product
- Passenger car, plugin gasoline hybrid, Large, 2016, EURO-6ab [RER]: 1 p

## Inputs from technosphere
All rows: lognormal SD95 1.09366
- Battery BoP [GLO]: 82 kg
  Uncertainty from pedigree matrix: (2, 3, 2, 1, 1, 3)
- Battery cell, NMC-622 [GLO]: 62.6 kg
  Uncertainty from pedigree matrix: (2, 3, 2, 1, 1, 3)
- Glider lightweighting [GLO]: 167 kg
  Uncertainty from pedigree matrix: (2, 3, 2, 1, 1, 3)
- Charger, for electric passenger car [RER]: 5.98 kg
  Uncertainty from pedigree matrix: (2, 3, 2, 1, 1, 3)
- Converter, for electric passenger car [RER]: 4.48 kg
  Uncertainty from pedigree matrix: (2, 3, 2, 1, 1, 3)
- Electric motor, for electric passenger car [RER]: 60.8 kg
  Uncertainty from pedigree matrix: (2, 3, 2, 1, 1, 3)
- Glider, for passenger car [RER]: 1610 kg
  Uncertainty from pedigree matrix: (2, 3, 2, 1, 1, 3)
- Internal combustion engine, for passenger car [RER]: 315 kg
  Uncertainty from pedigree matrix: (2, 3, 2, 1, 1, 3)
- Inverter, for electric passenger car [RER]: 8.96 kg
  Uncertainty from pedigree matrix: (2, 3, 2, 1, 1, 3)
- Power distribution unit, for electric passenger car [RER]: 3.98 kg
  Uncertainty from pedigree matrix: (2, 3, 2, 1, 1, 3)
- Disposal, powertrain, for electric passenger car [RER]: 84.2 kg
  Uncertainty from pedigree matrix: (2, 3, 2, 1, 1, 3)
- Polyethylene, HDPE, granulate, at plant [RER]: 44.3 kg
  Uncertainty from pedigree matrix: (2, 3, 2, 1, 1, 3)
- Disposal, glider, for passenger car [RER]: 1490 kg
  Uncertainty from pedigree matrix: (2, 3, 2, 1, 1, 3)
- Disposal, internal combustion engine, for passenger car [RER]: 315 kg
  Uncertainty from pedigree matrix: (2, 3, 2, 1, 1, 3)
- Disposal, Li-ions batteries, mixed technology [GLO]: 145 kg
  Uncertainty from pedigree matrix: (2, 3, 2, 1, 1, 3)

## Sources
- Sacchi R., Bauer C., 2023, 2023 - LCI on-road vehicles - Sacchi, PSI, Villigen, CH
doi: 10.5281/ZENODO.5156043
