# Natural gas, sweet, burned in production flare

Dataset: EcoSpold 1, unit process
Functional unit: 1 Nm3
Category: fuels / natural gas\produced gas\processes
Geography: GLO
Time period: 2000-01 to 2020-01
Production volume: Total flaring (sweet+sour) ~150 billion m3 of natural gas in 2019
Share of production covered: 100 %
Generated by: Christoph Meili
accessRestrictedTo: 0
copyright: true

## General comment
CO2 and CO emissions from a global model, other emissions based on data for NO and own estimations.;

## Included processes
Emissions of (sweet) gas flaring. Excluded are SO2-, Nox- and CH4-emissions. They need to be assessed separately

## Geography
Global average.

## Technology
Burning of natural gas in production flare.

## Time period
Time of estimation.

## Reference product
- Natural gas, sweet, burned in production flare [GLO]: 1 Nm3

## Inputs from nature
- Gas, natural/m3 [resources, in ground]: 1 Nm3; lognormal SD95 1.05
  (1,1,1,1,1,BU:1.05);

## Emissions to nature
- Heat, waste [emissions to air, low. pop.]: 36 MJ; lognormal SD95 1.0541
  (1,2,1,1,1,BU:1.05); Lower heating value according to BP 2020
- Carbon monoxide, fossil [emissions to air, low. pop.]: 0.001 kg; lognormal SD95 5.0709
  (2,2,3,3,3,BU:5); Standard emission factor (EFDB 2011)
- Dinitrogen monoxide [emissions to air, low. pop.]: 2e-5 kg; lognormal SD95 1.6222
  (2,2,4,3,3,BU:1.5); Standard emission factor (EFDB 2011)
- Mercury [emissions to air, low. pop.]: 2e-7 kg; lognormal SD95 5.1086
  (2,2,4,3,3,BU:5); Estimation, average value (Schori 2012)
- NMVOC, non-methane volatile organic compounds, unspecified origin [emissions to air, low. pop.]: 2.9784e-5 kg; lognormal SD95 1.6222
  (2,2,4,3,3,BU:1.5); Faist 2007
- Carbon dioxide, fossil [emissions to air, low. pop.]: 2.4496 kg; lognormal SD95 1.2446
  (2,2,3,3,3,BU:1.05); Faist 2007
- Particulates, < 2.5 um [emissions to air, high. pop.]: 0.00054 kg; lognormal SD95 3.2756
  (2,2,5,3,3,BU:3); Estimation for refinery flare from (Jungbluth 2003)
- Radon-222 [emissions to air, low. pop.]: 0.4 kBq; lognormal SD95 3.0952
  (2,2,4,3,3,BU:3); Estimation, average value (Schori 2012)

## Sampling procedure
Literature

## Extrapolations
From country data to global situation

## Sources
- Meili C., Jungbluth N., Bussa M., 2021, 2021 - LCI crude oil and natural gas extraction - Meili, Project report, 614, ESU-services Ltd., Schaffhausen, CH
Meili C., Jungbluth N., Bussa M. (2021) Life cycle inventories of crude oil and natural gas extraction. Project report. Volume: 614. ESU-services Ltd.. Schaffhausen, CH.
Type: Separate publication
First author: Meili C.
Other authors: Jungbluth N., Bussa M.
Year: 2021
Title of anthology: Project report
Place of publication: Schaffhausen, CH
Publisher: ESU-services Ltd.
Volume No: 614

## Validation
26.05.2021 https://esuservices-my.sharepoint.com/personal/jungbluth_esuservices_onmicrosoft_com/Documents/ESU-intern/565 LCI oil and gas sector CH BAFU/EcoSpold/[EcoSpold-crude-gas exploration and extraction-2020-v3.0.xlsb]X-Process
