# Cadmium, primary, at plant

Dataset: EcoSpold 1, unit process
Functional unit: 1 kg
Category: metals / non ferro
Geography: GLO
Time period: 2005-01 to 2005-12
Production volume: 20'900 t in 2006
Generated by: Mischa Classen
accessRestrictedTo: 0
copyright: true

## General comment
The module describes the primary production of cadmium metal (99.9%) on a global average. No secondary sources from post consumer scrap are considered. Only the most important source, the cadmium sludges from hydrometallurgical zinc operations, is reflected with the dataset. For the use in applications where cadmium is a major constituent – e.g. in NiCd battery systems – the dataset should be complemented with additional specific emission factors and the secondary production process.;
CAS number: 007440-43-9;
Formula: Cd;

## Included processes
The module includes the treatment of cadmium sludge from hydrometallurgical zinc operations and subsequent refining by electrolysis. Transports and infrastructure are considered.

## Geography
This module represents the production of primary cadmium on a global average. The inventory however is compiled with European average data, e.g. for electricity production.

## Technology
Cadmium sludge formed in hydrometallurgical zinc operations by purification of zinc solution. Subsequent purification and oxidation of the sponge. Cadmium cathodes formed by electrowinning. Other sources from pyrometallurgical zinc wastes and post consumer scrap (batteries) disregarded.

## Reference product
- Cadmium, primary, at plant [GLO]: 1 kg
  Global

## Inputs from technosphere
- Electricity, medium voltage, production ENTSO-E, at grid: 1.25 kWh; lognormal SD95 1.1286
  (1,2,3,3,1,3,2)
- Cadmium sludge, from zinc electrolysis, at plant [GLO]: 2.2424 kg; lognormal SD95 1.1286
  normal dist +/- 5%
- Chemical plant, organics [RER]: 8e-10 p; lognormal SD95 3.1495
  (4,4,1,3,3,5,9)
- Sulphuric acid, liquid, at plant [RER]: 0.036 kg; lognormal SD95 1.3286
  (4,4,1,3,3,3,4)
- Transport, freight, lorry, fleet average [RER]: 0.25 tkm; lognormal SD95 2.1552
  (4,4,1,3,3,5,5)

## Emissions to nature
- Heat, waste [emissions to air, low. pop.]: 4.5 MJ; lognormal SD95 1.1286
  (1,2,3,3,1,3,13)

## Sampling procedure
literature

## Extrapolations
see Geography and Technology

## Sources
- Classen M., Althaus H.-J., Blaser S., Scharnhorst W., Tuchschmid M., Jungbluth N., Faist Emmenegger M., 2009, 2009 - LCI metals - Classen, Final report ecoinvent data v2.1, 10, Swiss Centre for LCI, Empa, ESU-services Ltd., Duebendorf, CH
Classen M., Althaus H.-J., Blaser S., Doka G., Jungbluth N., Tuchschmid M. (2008) Life Cycle Inventories of Metals. Final report ecoinvent data v2.1. Volume: 10. Issue: 0. Swiss Centre for LCI, Empa - TSL. Dübendorf, CH.
Type: Measurement on site
Source: CD-ROM
First author: Classen M.
Other authors: Althaus H.-J., Blaser S., Doka G., Jungbluth N., Tuchschmid M.
Year: 2008
Title of anthology: Final report ecoinvent data v2.1
Place of publication: Dübendorf, CH
Publisher: Swiss Centre for LCI, Empa - TSL
Volume No: 10
Issue No: 0

## Validation
Proof reading validation: Passed; Other validation: none;
