# Ventilation system, various components

Dataset: EcoSpold 1, unit process
Functional unit: 1 m3
Category: ventilation / production of components
Geography: CH
Time period: 2014-01 to 2014-12
Generated by: Alex Primas
accessRestrictedTo: 0
copyright: true

## General comment
Production of various components for a ventilation system with a nominal air flow rate of 5'000-20'000 m3/h at the air handling unit. Reference value of inventory is 1 m3/h nominal air flow of the air handling unit (at 2 m/s air speed in cross section of air filter or heat exchanger). The inventory is based on average data of 4 office buildings, 3 schools and 3 residential care homes with a total heated gross floor area of 61719 m2 and a total nominal air flow of 302190 m3/h, specific weight of the components: 0.17 kg/(m3/h), including average components for air valves, air intake, roof-hoods, dampers, fire dampers, silencers and sensors. The data represent a ventilation system mainly made of galvanized steel.

## Included processes
Materials used for the production. Energy use for the different production steps and for heating the production building. Transport of raw materials to the plant. Estimation for infrastructure of the production site included.

## Geography
Data sources from different buildings in Switzerland. Process applicable in central European conditions.

## Technology
Typical technology, materials and components used for ventilation systems in commercial and public buildings

## Time period
Amount of material investigated in 2013. Process information partly from 2003 to 2012

## Reference product
- Ventilation system, various components [CH]: 1 m3
  SWITZERLAND

## Inputs from technosphere
- Polyvinylchloride, at regional storage [RER]: 5.9016e-5 kg; lognormal SD95 1.26
  (3,4,1,1,1,5); Data from building considered, estimations
- Brass, at plant [CH]: 0.00044106 kg; lognormal SD95 1.26
  (3,4,1,1,1,5); Data from building considered, estimations
- Metal working factory operation, average heat energy [RER]: 0.17339 kg; lognormal SD95 1.27
  (2,4,2,1,3,4); Avarage value for similar production
- Transport, freight, lorry, 16t-32t gross weight, fleet average [CH]: 0.0086696 tkm; lognormal SD95 2.14
  (4,5,1,1,1,5); Standard distance of ecoinvent used
- Sheet rolling, aluminium [RER]: 0.0054554 kg; lognormal SD95 1.26
  (3,4,1,1,1,5); Data related to material input
- Powder coating, steel [RER]: 4.2098e-5 m2; lognormal SD95 1.32
  (4,4,1,1,1,5); Data estimated from material input
- Sheet rolling, steel [RER]: 0.13184 kg; lognormal SD95 1.26
  (3,4,1,1,1,5); Data related to material input
- Casting, bronze [CH]: 9.7296e-5 kg; lognormal SD95 1.34
  (3,4,1,1,3,5); Data for similar process, estimations
- Chromium steel 18/8, at plant [RER]: 0.014974 kg; lognormal SD95 1.26
  (3,4,1,1,1,5); Data from building considered, estimations
- Electricity, medium voltage, production ENTSO-E, at grid: 0.10404 kWh; lognormal SD95 1.26
  (3,4,1,1,1,5); Data from companies, estimations
- Steel, electric, un- and low-alloyed, at plant [RER]: 0.048782 kg; lognormal SD95 1.26
  (3,4,1,1,1,5); Data from building considered, estimations
- Polycarbonate, at plant [RER]: 0.001055 kg; lognormal SD95 1.26
  (3,4,1,1,1,5); Data from building considered, estimations
- Printed wiring board, through-hole mounted, unspec., solder mix, at plant [GLO]: 7.1793e-5 kg; lognormal SD95 1.26
  (3,4,1,1,1,5); Data from building considered, estimations
- Sheet rolling, chromium steel [RER]: 0.014974 kg; lognormal SD95 1.26
  (3,4,1,1,1,5); Data related to material input
- Injection moulding [RER]: 0.001114 kg; lognormal SD95 1.26
  (3,4,1,1,1,5); Data related to material input
- Zinc, primary, at regional storage [RER]: 9.7296e-5 kg; lognormal SD95 1.26
  (3,4,1,1,1,5); Data from building considered, estimations
- Synthetic rubber, at plant [RER]: 0.00031767 kg; lognormal SD95 1.26
  (3,4,1,1,1,5); Data from building considered, estimations
- Transport, freight, rail [RER]: 0.094543 tkm; lognormal SD95 2.14
  (4,5,1,1,1,5); Standard distance of ecoinvent used
- Zinc coating, coils [RER]: 0.013546 m2; lognormal SD95 1.26
  (3,4,1,1,1,5); Data related to material input
- Steel, converter, unalloyed, at plant [RER]: 0.083062 kg; lognormal SD95 1.26
  (3,4,1,1,1,5); Data from building considered, estimations
- Copper, at regional storage [RER]: 5.4231e-5 kg; lognormal SD95 1.26
  (3,4,1,1,1,5); Data from building considered, estimations
- Aluminium, production mix, wrought alloy, at plant [RER]: 0.0054554 kg; lognormal SD95 1.26
  (3,4,1,1,1,5); Data from building considered, estimations
- Rock wool, at plant [CH]: 0.012605 kg; lognormal SD95 1.26
  (3,4,1,1,1,5); Data from building considered, estimations
- Autoclaved aerated concrete block, at plant [CH]: 0.0042394 kg; lognormal SD95 1.34
  (3,4,1,1,3,5); Data for similar product, estimations
- Powder coating, aluminium sheet [RER]: 9.4366e-6 m2; lognormal SD95 1.32
  (4,4,1,1,1,5); Data estimated from material input
- Metal working factory [RER]: 7.9414e-11 p; lognormal SD95 3.07
  (2,4,2,1,3,4); Avarage value for similar production
- Wire drawing, copper [RER]: 0.00049529 kg; lognormal SD95 1.26
  (3,4,1,1,1,5); Data related to material input

## Emissions to nature
- Heat, waste [emissions to air, high. pop.]: 0.37453 MJ; lognormal SD95 1.26
  (3,4,1,1,1,5); Calculated from electricity use

## Sampling procedure
Data from different call of bids for ventilation system used. Data completed with information from literature and from manufacturers

## Sources
- Klingler M., Kasser U., Savi D., Primas A., Stettler Y., Gujer P., 2014, 2014 - LCA ventilation and heating systems - Klingler, Schlussbericht, BFE, Buero fuer Umweltchemie, B&H AG, Zuerich, CH
Klingler M., Kasser U., Savi D., Primas A., Stettler Y., Gujer P. (2014) Ökobilanzdaten für Lüftungs- und Wärmeanlagen. Schlussbericht, BFE. Bundesamt für Energie (BFE). Bern.
Type: Separate publication
Source: Report
First author: Klingler M.
Other authors: Kasser U., Savi D., Primas A., Stettler Y., Gujer P.
Year: 2014
Title of anthology: Schlussbericht, BFE
Place of publication: Bern
Publisher: Bundesamt für Energie (BFE)
