# Corrugated board, mixed fibre, single wall, at plant

Dataset: EcoSpold 1, unit process
Functional unit: 1 kg
Category: paper+ board / corrugated board
Geography: RER
Time period: 2000-01 to 2000-12
Generated by: Roland Hischier
accessRestrictedTo: 0
copyright: true

## Included processes
This module includes the production of corrugated board out of the corrugated base papers. The following steps are included: energy production, corrugated board production itself, waste water treatment.; Geography: Estimation based on average data from European producers, collecte from FEFCO

## Technology
Average of present used technology

## Reference product
- Corrugated board, mixed fibre, single wall, at plant [RER]: 1 kg
  Europe

## Inputs from technosphere
- Corrugated board base paper, testliner, at plant [RER]: 0.2987 kg; lognormal SD95 1.21
  (1,2,1,1,3,2); from average European data for board & box production (FEFCO)
- Tap water, at user [RER]: 0.41 kg; lognormal SD95 1.21
  (1,2,1,1,3,2); from average European data for board & box production (FEFCO)
- Corrugated board base paper, wellenstoff, at plant [RER]: 0.4326 kg; lognormal SD95 1.21
  (1,2,1,1,3,2); from average European data for board & box production (FEFCO)
- Transport, freight, lorry, 3.5t gross weight, fleet average [RER]: 0.00039058 tkm; lognormal SD95 2.05
  (1,2,1,1,3,2); from average European data for board & box production (FEFCO)
- Biocides, for paper production, unspecified, at plant [RER]: 4.6e-5 kg; lognormal SD95 1.21
  (1,2,1,1,3,2); from average European data for board & box production (FEFCO)
- Heavy fuel oil, at regional storage [RER]: 0.0030583 kg; lognormal SD95 1.21
  (1,2,1,1,3,2); from average European data for board & box production (FEFCO)
- Electricity, medium voltage, production NORDEL, at grid [NORDEL]: 0.0012422 kWh; lognormal SD95 1.21
  (1,2,1,1,3,2); from average European data for board & box production (FEFCO)
- Electricity, medium voltage, at grid [GB]: 0.0037267 kWh; lognormal SD95 1.21
  (1,2,1,1,3,2); from average European data for board & box production (FEFCO)
- Transport, freight, rail [RER]: 0.273 tkm; lognormal SD95 2.05
  (4,na,na,na,na,na); own assumption
- Natural gas, high pressure, at consumer [RER]: 0.5607 MJ; lognormal SD95 1.21
  (1,2,1,1,3,2); from average European data for board & box production (FEFCO)
- Light fuel oil, at regional storage [RER]: 0.0018075 kg; lognormal SD95 1.21
  (1,2,1,1,3,2); from average European data for board & box production (FEFCO)
- Disposal, zeolite, 5% water, to construction waste landfill [CH]: 0.0018 kg; lognormal SD95 1.21
  (1,2,1,1,3,2); from average European data for board & box production (FEFCO)
- Transport, freight, lorry, fleet average [RER]: 0.106 tkm; lognormal SD95 2.05
  (4,na,na,na,na,na); own assumption
- Corrugated board base paper, kraftliner, at plant [RER]: 0.2987 kg; lognormal SD95 1.21
  (1,2,1,1,3,2); from average European data for board & box production (FEFCO)
- Electricity, medium voltage, production ENTSO-E, at grid: 0.026087 kWh; lognormal SD95 1.21
  (1,2,1,1,3,2); from average European data for board & box production (FEFCO)
- Potato starch, at plant [DE]: 0.0263 kg; lognormal SD95 1.21
  (1,2,1,1,3,2); from average European data for board & box production (FEFCO)
- Paper mill, non-integrated [RER]: 5.44e-11 p; lognormal SD95 3.05
  (4,na,na,na,na,na); own assumption

## Inputs from nature
- Water, river [resources, in water]: 2e-6 m3; lognormal SD95 1.21
  (1,2,1,1,3,2); from average European data for board & box production (FEFCO)
- Water, well [resources, in water]: 6.5e-5 m3; lognormal SD95 1.21
  (1,2,1,1,3,2); from average European data for board & box production (FEFCO)

## Emissions to nature
- Suspended solids, unspecified [emissions to water, river]: 0.00016 kg; lognormal SD95 1.56
  (1,2,1,1,3,2); from average European data for board & box production (FEFCO)
- Arsenic [emissions to air, high. pop.]: 1.638e-9 kg; lognormal SD95 1.88
  (2,5,2,1,4,5); estimation - based on respective heating modules
- Cobalt [emissions to air, high. pop.]: 4.158e-9 kg; lognormal SD95 5.37
  (2,5,2,1,4,5); estimation - based on respective heating modules
- Sodium [emissions to air, high. pop.]: 9.45e-8 kg; lognormal SD95 5.37
  (2,5,2,1,4,5); estimation - based on respective heating modules
- Selenium [emissions to air, high. pop.]: 1.512e-9 kg; lognormal SD95 5.37
  (2,5,2,1,4,5); estimation - based on respective heating modules
- Particulates, > 2.5 um, and < 10um [emissions to air, high. pop.]: 1.8e-7 kg; lognormal SD95 2.05
  (1,2,1,1,3,2); from average European data for board & box production (FEFCO)
- BOD5, Biological Oxygen Demand [emissions to water, river]: 0.00012 kg; lognormal SD95 1.56
  (1,2,1,1,3,2); from average European data for board & box production (FEFCO)
- Acetic acid [emissions to air, high. pop.]: 1.5971e-7 kg; lognormal SD95 1.88
  (2,5,2,1,4,5); estimation - based on respective heating modules
- Copper [emissions to water, river]: 1.5e-6 kg; lognormal SD95 5.05
  (1,2,1,1,3,2); from average European data for board & box production (FEFCO)
- Particulates, > 10 um [emissions to air, high. pop.]: 1.68e-7 kg; lognormal SD95 1.56
  (1,2,1,1,3,2); from average European data for board & box production (FEFCO)
- Heat, waste [emissions to air, high. pop.]: 0.9468 MJ; lognormal SD95 1.21
  (1,2,1,1,3,2); calculated from input
- Mercury [emissions to air, high. pop.]: 7.4221e-11 kg; lognormal SD95 5.37
  (2,5,2,1,4,5); estimation - based on respective heating modules
- Carbon dioxide, fossil [emissions to air, high. pop.]: 0.0676 kg; lognormal SD95 1.21
  (1,2,1,1,3,2); from average European data for board & box production (FEFCO)
- Nitrogen oxides [emissions to air, high. pop.]: 4.3e-5 kg; lognormal SD95 1.56
  (1,2,1,1,3,2); from average European data for board & box production (FEFCO)
- Hydrocarbons, aliphatic, unsaturated [emissions to air, high. pop.]: 3.78e-9 kg; lognormal SD95 1.88
  (2,5,2,1,4,5); estimation - based on respective heating modules
- Toluene [emissions to air, high. pop.]: 1.1823e-7 kg; lognormal SD95 1.88
  (2,5,2,1,4,5); estimation - based on respective heating modules
- Iron [emissions to air, high. pop.]: 2.268e-8 kg; lognormal SD95 5.37
  (2,5,2,1,4,5); estimation - based on respective heating modules
- Hydrogen fluoride [emissions to air, high. pop.]: 1.8837e-8 kg; lognormal SD95 1.88
  (2,5,2,1,4,5); estimation - based on respective heating modules
- Ammonia [emissions to air, high. pop.]: 1.281e-8 kg; lognormal SD95 1.88
  (2,5,2,1,4,5); estimation - based on respective heating modules
- Propionic acid [emissions to air, high. pop.]: 1.1214e-8 kg; lognormal SD95 1.88
  (2,5,2,1,4,5); estimation - based on respective heating modules
- Cadmium [emissions to air, high. pop.]: 4.158e-9 kg; lognormal SD95 5.37
  (2,5,2,1,4,5); estimation - based on respective heating modules
- Benzo(a)pyrene [emissions to air, high. pop.]: 1.1291e-11 kg; lognormal SD95 1.88
  (2,5,2,1,4,5); estimation - based on respective heating modules
- Dinitrogen monoxide [emissions to air, high. pop.]: 3.0387e-7 kg; lognormal SD95 1.88
  (2,5,2,1,4,5); estimation - based on respective heating modules
- Butane [emissions to air, high. pop.]: 4.1675e-7 kg; lognormal SD95 3.32
  (2,5,2,1,4,5); estimation - based on respective heating modules
- Zinc [emissions to air, high. pop.]: 5.894e-8 kg; lognormal SD95 5.37
  (2,5,2,1,4,5); estimation - based on respective heating modules
- Methane, fossil [emissions to air, high. pop.]: 1.5764e-6 kg; lognormal SD95 1.88
  (2,5,2,1,4,5); estimation - based on respective heating modules
- Ethanol [emissions to air, high. pop.]: 3.78e-8 kg; lognormal SD95 1.88
  (2,5,2,1,4,5); estimation - based on respective heating modules
- Chromium [emissions to air, high. pop.]: 1.9908e-9 kg; lognormal SD95 5.37
  (2,5,2,1,4,5); estimation - based on respective heating modules
- Acetaldehyde [emissions to air, high. pop.]: 1.9461e-8 kg; lognormal SD95 1.88
  (2,5,2,1,4,5); estimation - based on respective heating modules
- Dioxin, 2,3,7,8 Tetrachlorodibenzo-p- [emissions to air, high. pop.]: 1.08e-16 kg; lognormal SD95 1.88
  (2,5,2,1,4,5); estimation - based on respective heating modules
- Hydrogen chloride [emissions to air, high. pop.]: 1.8868e-7 kg; lognormal SD95 1.88
  (2,5,2,1,4,5); estimation - based on respective heating modules
- Nickel [emissions to air, high. pop.]: 8.19e-8 kg; lognormal SD95 5.37
  (2,5,2,1,4,5); estimation - based on respective heating modules
- Zinc [emissions to water, river]: 7.5e-7 kg; lognormal SD95 5.05
  (1,2,1,1,3,2); from average European data for board & box production (FEFCO)
- Molybdenum [emissions to air, high. pop.]: 2.016e-9 kg; lognormal SD95 5.37
  (2,5,2,1,4,5); estimation - based on respective heating modules
- PAH, polycyclic aromatic hydrocarbons [emissions to air, high. pop.]: 5.7247e-9 kg; lognormal SD95 1.88
  (2,5,2,1,4,5); estimation - based on respective heating modules
- Hydrocarbons, aromatic [emissions to air, high. pop.]: 2.121e-8 kg; lognormal SD95 1.88
  (2,5,2,1,4,5); estimation - based on respective heating modules
- COD, Chemical Oxygen Demand [emissions to water, river]: 0.00026 kg; lognormal SD95 1.56
  (1,2,1,1,3,2); from average European data for board & box production (FEFCO)
- Methanol [emissions to air, high. pop.]: 6.426e-8 kg; lognormal SD95 1.88
  (2,5,2,1,4,5); estimation - based on respective heating modules
- Copper [emissions to air, high. pop.]: 6.0074e-8 kg; lognormal SD95 5.37
  (2,5,2,1,4,5); estimation - based on respective heating modules
- Benzene [emissions to air, high. pop.]: 2.2544e-7 kg; lognormal SD95 1.88
  (2,5,2,1,4,5); estimation - based on respective heating modules
- Acetone [emissions to air, high. pop.]: 1.89e-8 kg; lognormal SD95 1.88
  (2,5,2,1,4,5); estimation - based on respective heating modules
- Calcium [emissions to air, high. pop.]: 1.008e-8 kg; lognormal SD95 3.32
  (2,5,2,1,4,5); estimation - based on respective heating modules
- Carbon monoxide, fossil [emissions to air, high. pop.]: 2.3675e-6 kg; lognormal SD95 5.37
  (2,5,2,1,4,5); estimation - based on respective heating modules
- Hydrocarbons, aliphatic, alkanes, unspecified [emissions to air, high. pop.]: 1.1256e-7 kg; lognormal SD95 1.88
  (2,5,2,1,4,5); estimation - based on respective heating modules
- Lead [emissions to air, high. pop.]: 7.182e-9 kg; lognormal SD95 5.37
  (2,5,2,1,4,5); estimation - based on respective heating modules
- Propane [emissions to air, high. pop.]: 1.1747e-7 kg; lognormal SD95 1.88
  (2,5,2,1,4,5); estimation - based on respective heating modules
- Formaldehyde [emissions to air, high. pop.]: 1.8207e-7 kg; lognormal SD95 1.88
  (2,5,2,1,4,5); estimation - based on respective heating modules
- Vanadium [emissions to air, high. pop.]: 3.276e-7 kg; lognormal SD95 5.37
  (2,5,2,1,4,5); estimation - based on respective heating modules
- Chromium VI [emissions to air, high. pop.]: 2.016e-11 kg; lognormal SD95 5.37
  (2,5,2,1,4,5); estimation - based on respective heating modules
- Particulates, < 2.5 um [emissions to air, high. pop.]: 6.65e-6 kg; lognormal SD95 3.05
  (1,2,1,1,3,2); from average European data for board & box production (FEFCO)
- Sulfur dioxide [emissions to air, high. pop.]: 7.8e-5 kg; lognormal SD95 1.21
  (1,2,1,1,3,2); from average European data for board & box production (FEFCO)
- Pentane [emissions to air, high. pop.]: 6.8901e-7 kg; lognormal SD95 1.88
  (2,5,2,1,4,5); estimation - based on respective heating modules
- Water [emissions to water, unspecified]: 0.0019, 0.0585 kg (2 entries); lognormal SD95 2.5196
  (5,5,5,5,5,BU:1.05); All uncertainty-values set to 5.0 by default. Balance of input water

## Extrapolations
In FEFCO only a combined board and box production is show. For this study this has been split into two different datasets.

## Sources
- Hischier R., 2007, 2007 - LCI packagings and graphical papers - Hischier, Final report ecoinvent data v2.0, 11, Swiss Centre for LCI, Empa - TSL, Duebendorf and St. Gallen, CH
Hischier R. (2007) Life Cycle Inventories of Packaging and Graphical Paper. Final report ecoinvent data v2.0. Volume: 11. Swiss Centre for LCI, Empa - TSL. Dübendorf, CH.
Type: Measurement on site
Source: CD-ROM
First author: Hischier R.
Year: 2007
Title of anthology: Final report ecoinvent data v2.0
Place of publication: Dübendorf, CH
Publisher: Swiss Centre for LCI, Empa - TSL
Volume No: 11

## Validation
Proof reading validation: passed.; Other validation: none;
