# Pigments, paper production, unspecified, at plant

Dataset: EcoSpold 1, unit process
Functional unit: 1 kg
Category: chemicals / others
Geography: RER
Time period: 2000-01 to 2000-12
Generated by: Roland Hischier
accessRestrictedTo: 0
copyright: true

## General comment
The functional unit represent 1 kg a mixture of kaolin, calcium carbonate and talc (malusil) according to its use in the European paper industry.;

## Included processes
Mix of the three most used pigments in paper industry - kaolin, calcium carbonate and talcum. Only input of the three mentioned substances

## Technology
data represent a mixture of different pigment materials.

## Reference product
- Pigments, paper production, unspecified, at plant [RER]: 1 kg
  Europe

## Inputs from technosphere
- Kaolin, at plant [RER]: 0.44 kg; lognormal SD95 1.2
  (4,2,1,1,1,3); distribution according to statistical consumption data
- Limestone, milled, loose, at plant [CH]: 0.5 kg; lognormal SD95 1.2
  (4,2,1,1,1,3); distribution according to statistical consumption data
- Malusil, at plant [RER]: 0.06 kg; lognormal SD95 1.2
  (4,2,1,1,1,3); distribution according to statistical consumption data

## Sampling procedure
Distribution of the different used pigments according to statistical information.

## Sources
- Hischier R., 2007, 2007 - LCI packagings and graphical papers - Hischier, Final report ecoinvent data v2.0, 11, Swiss Centre for LCI, Empa - TSL, Duebendorf and St. Gallen, CH
Hischier R. (2007) Life Cycle Inventories of Packaging and Graphical Paper. Final report ecoinvent data v2.0. Volume: 11. Swiss Centre for LCI, Empa - TSL. Dübendorf, CH.
Type: Measurement on site
Source: CD-ROM
First author: Hischier R.
Year: 2007
Title of anthology: Final report ecoinvent data v2.0
Place of publication: Dübendorf, CH
Publisher: Swiss Centre for LCI, Empa - TSL
Volume No: 11

## Validation
Proof reading validation: passed; Other validation: none;
