# Mine, bauxite

Dataset: EcoSpold 1, unit process, infrastructure
Functional unit: 1 p
Category: minerals / infrastructure
Geography: GLO
Time period: 2000-01 to 2000-12
Generated by: Hans-Joerg Althaus
accessRestrictedTo: 0
copyright: true

## General comment
It is assumed that the mine is in use for 20 years and has a yearly output of 1E6 t/a;

## Included processes
Includes the infrastructure and their disposal (buildings with their land use and machines) needed to provide the dried bauxite. Does not include the land use for the mine itself nor that for the roads in the mine.

## Geography
European data are used for buildings and machines

## Technology
Average technology for the aluminium consumed in Europe

## Reference product
- Mine, bauxite [GLO]: 1 p
  Global

## Inputs from technosphere
- Building, multi-storey [RER]: 1500 m3; lognormal SD95 3.23
  (5,n.A.,n.A.,n.A.,n.A.,n.A.); rough guess
- Industrial machine, heavy, unspecified, at plant [RER]: 10000 kg; lognormal SD95 3.23
  (5,n.A.,n.A.,n.A.,n.A.,n.A.); rough guess
- Building, hall [CH]: 10000 m2; lognormal SD95 3.23
  (5,n.A.,n.A.,n.A.,n.A.,n.A.); rough guess

## Inputs from nature
- Transformation, to industrial area, built up [resources, land]: 15000 m2; lognormal SD95 2.23
  (5,n.A.,n.A.,n.A.,n.A.,n.A.); rough guess
- Transformation, from forest, extensive [resources, land]: 2700 m2; lognormal SD95 2.23
  (5,n.A.,n.A.,n.A.,n.A.,n.A.); rough guess
- Occupation, industrial area, built up [resources, land]: 300000 m2a; lognormal SD95 2.23
  (5,n.A.,n.A.,n.A.,n.A.,n.A.); rough guess
- Transformation, from annual crop [resources, land]: 12300 m2; lognormal SD95 2.23
  (5,n.A.,n.A.,n.A.,n.A.,n.A.); rough guess

## Sampling procedure
estimation

## Sources
- Classen M., Althaus H.-J., Blaser S., Scharnhorst W., Tuchschmid M., Jungbluth N., Faist Emmenegger M., 2009, 2009 - LCI metals - Classen, Final report ecoinvent data v2.1, 10, Swiss Centre for LCI, Empa, ESU-services Ltd., Duebendorf, CH
Classen M., Althaus H.-J., Blaser S., Doka G., Jungbluth N., Tuchschmid M. (2008) Life Cycle Inventories of Metals. Final report ecoinvent data v2.1. Volume: 10. Issue: 0. Swiss Centre for LCI, Empa - TSL. Dübendorf, CH.
Type: Measurement on site
Source: CD-ROM
First author: Classen M.
Other authors: Althaus H.-J., Blaser S., Doka G., Jungbluth N., Tuchschmid M.
Year: 2008
Title of anthology: Final report ecoinvent data v2.1
Place of publication: Dübendorf, CH
Publisher: Swiss Centre for LCI, Empa - TSL
Volume No: 10
Issue No: 0

## Validation
Proof reading validation: Passed.; Other validation: none;
