# Electricity, at 150MW wind farm, offshore, 5MW turbines

Dataset: EcoSpold 1, unit process
Functional unit: 1 kWh
Category: electricity by fuel / wind
Geography: RER
Time period: 2024 to 2024
Synonyms: 0
Share of production covered: 100 %
Generated by: Hanna Kroehnert
accessRestrictedTo: 0
copyright: true

## Included processes
Electricity from wind farm, fed to grid. Includes the operation of the wind farm with the necessary change of gear oil. A leackage of 5% of SF6 is assumed over the entire life cycle of the wind farm.
The modelled 150 MW wind farm is based on the Ormonde offshore wind farm, UK, consisting of 30 REpower 5M wind turbines with a nominal capacity of 5 MW and jacket substructure, as well as 1 offshore substation.
The distance to service port is 10 km. Total length of export cables is 129 km (assuming 3 parallel export cables of 43 km each). The total length of array cables is 27 km.
The model uses a capacity factor of 34.1%, representing the average capacity factor of offshore wind farms in Europe between 2016-2024 (source: ENTSO-E).
Assumed lifetime is 25 years. Annual electricity production is 448 GWh, applying a capacity factor of 34.1%.

## Reference product
- Electricity, at 150MW wind farm, offshore, 5MW turbines [RER]: 1 kWh

## Inputs from technosphere
- Wind turbine 5MW, offshore, moving parts [RER]: 2.6763e-9 unit; lognormal SD95 3
  (2,2,1,1,1,1,BU:3); Own calculation; number of wind turbines divided by total electricity production over a life cycle of 25 years with an annual electricity production of 448 GWh, calculated as 30/(25 × 448 GWh)
- Wind turbine 5MW, offshore, tower [RER]: 2.6763e-9 unit; lognormal SD95 3
  (same comment as for Wind turbine 5MW, offshore, moving parts)
- Wind turbine 5MW, offshore, jacket substructure [RER]: 2.6763e-9 unit; lognormal SD95 3
  (same comment as for Wind turbine 5MW, offshore, moving parts)
- Array cable, 66kV, offshore wind farm [RER]: 2.4087e-9 km; lognormal SD95 3
  (2,2,1,1,1,1,BU:3); Own calculation; total length of array cables of 27 km divided by total electricity production over a life cycle of 25 years with an annual electricity production of 448 GWh, calculated as 27 km/(25 × 448 GWh); average array cable of 740MW offshore wind farm used as proxy (no scaling factor applied).
- Export cable, 220kV, offshore wind farm [RER]: 2.3327e-9 km; lognormal SD95 3
  (2,2,1,1,4,1,BU:3); Own calculation; total length of export cables of 129 km divided by total electricity production over a life cycle of 25 years with an annual electricity production of 448 GWh, calculated as 129 km × (150/740 ) / (25 × 448 GWh); export cable of 740MW offshore wind farm used as proxy, scaled with the factor 150/740 according to the installed power capactiies of the wind farms.
- Substation,offshore, 150MW offshore wind farm [RER]: 8.921e-11 unit; lognormal SD95 3
  (2,2,1,1,4,1,BU:3); Own calculation; 1p divided by total electricity production over a life cycle of 25 years with an annual electricity production of 448 GWh, calculated as 1 / (25 × 448 GWh)
- Lubricating oil, at plant [RER]: 1.3489e-5 kg; lognormal SD95 1.05
  (2,5,5,2,1,5,BU:1.05); Own calculation, assuming exchange of lubrication oil every two years
- Transport, transoceanic freight ship [OCE]: 0.11113 tkm; lognormal SD95 2
  (4,5,5,2,1,5,BU:2); Own estimation; consumption of marine gasoil (MGO) due to O&M vessel activities: 6.4 t MGO/km per wind turbine (amount of km refer to distance to service port); assumption based on life cylce inventory for 740 MW offshore wind farm as published by Kainz, S. (2025); Heavy fuel oil used as proxy for MGO.
- Disposal, used mineral oil, 10% water, to hazardous waste incineration [CH]: 1.3489e-5 kg; lognormal SD95 1.05
  (2,5,5,2,1,5,BU:1.05); Own calculation; assuming that 100% of the lubricating oil is disposed of after use.

## Inputs from nature
- Energy, kinetic (in wind), converted [resources, in air]: 3.87 MJ; lognormal SD95 1.05
  (4,1,1,1,1,1,BU:1.05);

## Emissions to nature
- Sulfur hexafluoride [emissions to air, low. pop.]: 1.2919e-9 kg; lognormal SD95 1.5
  (4,5,1,2,1,5,BU:1.5); Estimated SF6 emissions due to 5% leackage over entire life cycle of wind farm

## Sources
- Kroehnert H., Frehner A., Stucki M., 2025, 2025 - LCI wind Energy - Kroehnert, Project report, 0, ZHAW, Waedenswil, CH

## Validation
22.07.2025
"S:\pools\n\N-IUNR-FG-LCA\Projekte\Wind LCA\LCI-Update\Sachbilanz"
