# Transport, municipal waste collection, lorry 21t

Dataset: EcoSpold 1, unit process
Functional unit: 1 tkm
Category: transport systems / road
Geography: CH
Time period: 2000-01 to 2000-12
Generated by: Gabor Doka
accessRestrictedTo: 0
copyright: true

## General comment
based on a vehicle lifetime of 540'000 vehicle-kilometers;

## Included processes
Diesel fuel consumption, air emissions from fuel combustion for Stop&Go driving, tyre abrasion, brake lining abrasion, road abrasion and re-suspended road dust.

## Technology
Waste collection and hydraulic compression vehicle. Gross load capactity 8.2 tons. Load factor 50%. Average load 4.1 tons. Emissions extrapolated from data for lorry 16t class (ecoinvent 2000 report No. 14). Adaptations for air emissions to Stop&Go driving from average driving emission factors.

## Reference product
- Transport, municipal waste collection, lorry 21t [CH]: 1 tkm
  SWITZERLAND

## Inputs from technosphere
- Disposal, road [RER]: 0.000641 my; lognormal SD95 1.1
  road infrastructure disposal. (3,1,1,1,1,na); basic uncertainty of 1
- Diesel, at regional storage [CH]: 0.336 kg; lognormal SD95 1.23
  literature average for various Swiss and German municipalities. uncertainty from range in literature data
- Lorry 21t, municipal waste collection [CH]: 4.52e-7 p; lognormal SD95 1.1
  lorry infrastructure. (3,1,1,1,1,na);
- Road [CH]: 0.000641 my; lognormal SD95 1.1
  road infrastructure maintenance. (3,1,1,1,1,na); basic uncertainty of 1
- Operation, maintenance, road [CH]: 0.000641 my; lognormal SD95 1.1
  road infrastructure construction. (3,1,1,1,1,na); basic uncertainty of 1

## Emissions to nature
- Ammonia [emissions to air, high. pop.]: 7.95e-6 kg; lognormal SD95 1.5
  fuel emissions. (2,1,1,1,1,1); basic uncertainty of 1.5. data from environmental agency
- Chromium [emissions to air, high. pop.]: 1.69e-8 kg; lognormal SD95 5.11
  fuel emissions. (4,5,1,2,1,3); basic uncertainty of 5. data from published expert estimate
- Zinc [emissions to air, high. pop.]: 3.33e-6 kg; lognormal SD95 5.11
  fuel emissions and tyre abrasion. (4,5,1,2,1,3); basic uncertainty of 5. data from published expert estimate
- Carbon dioxide, fossil [emissions to air, high. pop.]: 1.06 kg; lognormal SD95 1.07
  fuel emissions. (2,1,1,1,1,1); basic uncertainty of 1.05. data from environmental agency
- Toluene [emissions to air, high. pop.]: 2.71e-5 kg; lognormal SD95 1.5
  fuel emissions for stop&go operation. (2,1,1,1,1,1); basic uncertainty of 1.5. data from published expert estimate
- Sulfur dioxide [emissions to air, high. pop.]: 0.000202 kg; lognormal SD95 1.07
  fuel emissions. (2,1,1,1,1,1); basic uncertainty of 1.05. data from published expert estimate
- Nickel [emissions to air, high. pop.]: 2.35e-8 kg; lognormal SD95 5.11
  fuel emissions. (4,5,1,2,1,3); basic uncertainty of 5. data from published expert estimate
- Carbon monoxide, fossil [emissions to air, high. pop.]: 0.00273 kg; lognormal SD95 5
  fuel emissions for stop&go operation. (2,1,1,1,1,1); basic uncertainty of 5. data from environmental agency
- Cadmium [emissions to air, high. pop.]: 4.48e-9 kg; lognormal SD95 5.11
  (same comment as for Zinc)
- Selenium [emissions to air, high. pop.]: 3.36e-9 kg; lognormal SD95 5.11
  fuel emissions. (4,5,1,2,1,3); basic uncertainty of 5. data from published expert estimate
- Methane, fossil [emissions to air, high. pop.]: 8.46e-5 kg; lognormal SD95 1.5
  fuel emissions for stop&go operation. (2,1,1,1,1,1); basic uncertainty of 1.5. data from environmental agency
- Particulates, > 2.5 um, and < 10um [emissions to air, high. pop.]: 0.000105 kg; lognormal SD95 2.02
  fuel emissions for stop&go operation, abrasion of tyres, brake lining, road surface and road dust re-emission.. (3,3,1,2,1,1); basic uncertainty of 2. data from environmental agency
- Dinitrogen monoxide [emissions to air, high. pop.]: 5.25e-5 kg; lognormal SD95 1.5
  fuel emissions. (2,1,1,1,1,1); basic uncertainty of 1.5. data from environmental agency
- NMVOC, non-methane volatile organic compounds, unspecified origin [emissions to air, high. pop.]: 0.00345 kg; lognormal SD95 1.5
  (same comment as for Methane, fossil)
- Lead [emissions to air, high. pop.]: 4.87e-9 kg; lognormal SD95 5.11
  tyre abrasion. (4,5,1,2,1,3); basic uncertainty of 5. data from published expert estimate
- Particulates, < 2.5 um [emissions to air, high. pop.]: 0.000615 kg; lognormal SD95 2
  fuel emissions for stop&go operation, abrasion of tyres, brake lining, road surface and road dust re-emission.. (2,2,1,1,1,1); basic uncertainty of 2. data from environmental agency
- Xylene [emissions to air, high. pop.]: 2.71e-5 kg; lognormal SD95 1.5
  (same comment as for Toluene)
- Benzene [emissions to air, high. pop.]: 6.77e-5 kg; lognormal SD95 1.5
  (same comment as for Methane, fossil)
- Copper [emissions to air, high. pop.]: 5.71e-7 kg; lognormal SD95 5.11
  fuel emissions. (4,5,1,2,1,3); basic uncertainty of 5. data from published expert estimate
- Nitrogen oxides [emissions to air, high. pop.]: 0.00758 kg; lognormal SD95 1.5
  (same comment as for Methane, fossil)
- Particulates, > 10 um [emissions to air, high. pop.]: 0.000175 kg; lognormal SD95 2.06
  fuel emissions for stop&go operation, abrasion of tyres, brake lining, road surface and road dust re-emission.. (3,5,1,2,1,1); basic uncertainty of 2. data from environmental agency

## Sampling procedure
fuel consumption from specific literature data. Rest extrapolated from lorry 16t class (ecoinvent report No. 14).

## Sources
- Doka G., 2009, 2009 - LCI waste treatment services - Doka, Final report ecoinvent data v2.0, 13, Swiss Centre for LCI, Doka LCA, Duebendorf and St. Gallen, CH
Doka G. (2007) Life Cycle Inventories of Waste Treatment Services. Final report ecoinvent data v2.0. Volume: 13. Swiss Centre for LCI, Empa - TSL. Dübendorf, CH.
Type: Separate publication
Source: CD-ROM
First author: Doka G.
Year: 2007
Title of anthology: Final report ecoinvent data v2.0
Place of publication: Dübendorf, CH
Publisher: Swiss Centre for LCI, Empa - TSL
Volume No: 13

## Validation
Proof reading validation: Passed.; Other validation: none;
