# Polyvinylchloride, bulk polymerised, at plant

Dataset: EcoSpold 1, unit process
Functional unit: 1 kg
Category: plastics / thermoplasts
Geography: RER
Time period: 2000-01 to 2000-12
Generated by: Roland Hischier
accessRestrictedTo: 0
copyright: true

## General comment
see included processes;
CAS number: 009002-86-2;
Synonyms: PVC;

## Included processes
Data represent a mix of the two other types of PVC (suspension, emulsion PVC), according to their production volumes, due to a lack of respective data from PlasticsEurope about bulk PVC.

## Technology
see included processes

## Time period
time to which data refer

## Reference product
- Polyvinylchloride, bulk polymerised, at plant [RER]: 1 kg
  Europe

## Inputs from technosphere
- Polyvinylchloride, emulsion polymerised, at plant [RER]: 0.12766 kg; lognormal SD95 1.2
  (2,1,1,1,1,5); European distribution to the different PVC types
- Polyvinylchloride, suspension polymerised, at plant [RER]: 0.87234 kg; lognormal SD95 1.2
  (2,1,1,1,1,5); European distribution to the different PVC types

## Sampling procedure
see

## Sources
- Hischier R., 2007, 2007 - LCI packagings and graphical papers - Hischier, Final report ecoinvent data v2.0, 11, Swiss Centre for LCI, Empa - TSL, Duebendorf and St. Gallen, CH
Hischier R. (2007) Life Cycle Inventories of Packaging and Graphical Paper. Final report ecoinvent data v2.0. Volume: 11. Swiss Centre for LCI, Empa - TSL. Dübendorf, CH.
Type: Measurement on site
Source: CD-ROM
First author: Hischier R.
Year: 2007
Title of anthology: Final report ecoinvent data v2.0
Place of publication: Dübendorf, CH
Publisher: Swiss Centre for LCI, Empa - TSL
Volume No: 11

## Validation
Proof reading validation: passed.; Other validation: none;
