# Sound insulation cogen unit 160kWe

Dataset: EcoSpold 1, unit process, infrastructure
Functional unit: 1 p
Category: heat / natural gas\cogeneration\power unit\infrastructure
Geography: RER
Time period: 1990-01 to 2000-12
Generated by: Thomas Heck
accessRestrictedTo: 0
copyright: true

## General comment
Inventory refers to infrastructure of an existing natural gas cogeneration plant (lambda=1 motor, 160kWe, operation start 1987) at Jakobsberg, Basel, Switzerland. (Life time for operation assumed 100'000 h.);

## Included processes
The module includes the most important materials used for production. It includes also the transport of these materials and the water needed for production.

## Technology
Component of a specific cogeneration unit installed in Switzerland. Technology at end of 1980s.

## Reference product
- Sound insulation cogen unit 160kWe [RER]: 1 p
  Europe

## Inputs from technosphere
- Transport, freight, rail [RER]: 1150 tkm; lognormal SD95 2.49
  uncertainty of transport distance and of amount of material
- Disposal, mineral wool, 0% water, to construction waste landfill [CH]: 480 kg; lognormal SD95 1.55
  (3,3,3,3,4,3);
- Transport, freight, lorry, fleet average [RER]: 96 tkm; lognormal SD95 2.49
  uncertainty of transport distance and of amount of material
- Reinforcing steel, at plant [RER]: 1920 kg; lognormal SD95 2.06
  basic uncertainty:2;(4,na,3,1,1,na);
- Rock wool, at plant [CH]: 480 kg; lognormal SD95 2.06
  basic uncertainty:2;(4,na,3,1,1,na);
- Treatment, pig iron production effluent, to wastewater treatment, class 3 [CH]: 2.3 m3; lognormal SD95 3
  rough estimate, uncertainty refers to amount of water only; not quantified here: composition of waste water unkown, therefore high uncertainty of applicability of modul.

## Inputs from nature
- Water, unspecified natural origin/m3 [resources, in water]: 2.88 m3; lognormal SD95 3
  rough estimate

## Emissions to nature
- Water [emissions to water, unspecified]: 2736 kg; lognormal SD95 2.5196
  (5,5,5,5,5,BU:1.05); All uncertainty-values set to 5.0 by default. Balance of input water

## Sampling procedure
Operator and manufacturer information

## Extrapolations
see Geography/Text

## Sources
- Heck T., 2007, 2007 - Combined heat power generation - Heck, Sachbilanzen von Energiesystemen. Final report No. 6 ecoinvent data v2.0, 6, Swiss Centre for LCI, PSI, Duebendorf and Villigen, CH
Heck, T. (2007) Wärme-Kraft-Kopplung. Sachbilanzen von Energiesystemen. Final report No. 6 ecoinvent data v2.0. Editors: Dones R.. Volume: 6. Swiss Centre for LCI, PSI. Dübendorf and Villigen, CH.
Type: Measurement on site
Source: CD-ROM
First author: Heck, T.
Year: 2007
Name of editors: Dones R.
Title of anthology: Sachbilanzen von Energiesystemen. Final report No. 6 ecoinvent data v2.0
Place of publication: Dübendorf and Villigen, CH
Publisher: Swiss Centre for LCI, PSI
Volume No: 6

## Validation
Proof reading validation: had passed; Other validation: none;
