# Straw IP, at farm

Dataset: EcoSpold 1, unit process
Functional unit: 1 kg
Category: agricultural / plant production
Geography: CH
Time period: 2000-01 to 2000-12
Generated by: Angelika Heil
accessRestrictedTo: 0
copyright: true

## General comment
Production mix for straw from integrated production;

## Included processes
The inventory presents a production mix for integrated straw for Switzerland

## Technology
Integrated production of cereals

## Reference product
- Straw IP, at farm [CH]: 1 kg
  SWITZERLAND

## Inputs from technosphere
All rows: lognormal SD95 1.1
- Rye straw extensive, at farm [CH]: 0.0133 kg
  (1,1,1,1,1,1)
- Barley straw extensive, at farm [CH]: 0.241 kg
  (1,1,1,1,1,1)
- Barley straw IP, at farm [CH]: 0.141 kg
  (1,1,1,1,1,1)
- Rye straw IP, at farm [CH]: 0.0185 kg
  (1,1,1,1,1,1)
- Wheat straw IP, at farm [CH]: 0.341 kg
  (1,1,1,1,1,1)
- Wheat straw extensive, at farm [CH]: 0.245 kg
  (1,1,1,1,1,1)

## Sampling procedure
Based on statistics of the areas of cereals

## Sources
- Nemecek T., Kaegi T., 2007, 2007 - LCI agricultural prod. systems - Nemecek, Ecoinvent report version 2.0, 15, Swiss Centre for LCI, ART, Duebendorf and Zuerich, CH
Nemecek, T., Kägi, T., Blaser, S. (2007) Life Cycle Inventories of Agricultural Production Systems. Ecoinvent report version 2.0. Editors: 0. Volume: 15. Swiss Centre for LCI, ART. Duebendorf and Zurich, CH.
Type: Measurement on site
Source: CD-ROM
First author: Nemecek, T.
Other authors: Kägi, T., Blaser, S.
Year: 2007
Name of editors: 0
Title of anthology: Ecoinvent report version 2.0
Place of publication: Duebendorf and Zurich, CH
Publisher: Swiss Centre for LCI, ART
Volume No: 15

## Validation
Proof reading validation: Passed.; Other validation: none;
