# Light fuel oil, burned in boiler 100kW condensing, non-modulating

Dataset: EcoSpold 1, unit process
Functional unit: 1 MJ
Category: heat / oil\heating systems
Geography: CH
Time period: 2000-01 to 2000-12
Generated by: Niels Jungbluth
accessRestrictedTo: 0
copyright: true

## General comment
Inventory for the operation of an old light fuel oil boiler. Data related to light fuel oil input. This dataset should be used if fuel input is known.;

## Included processes
Direct air emissions from combustion, waste, effluents and auxiliary electricity use, input of fuel oil. Infrastructure is included.

## Geography
Assumption for operation in Switzerland.

## Technology
Non-modulating, condensing boiler sold in 2000.

## Time period
Statistical data for regulated emissions like NOx, particles, other figures are partly based on older literature data.

## Reference product
- Light fuel oil, burned in boiler 100kW condensing, non-modulating [CH]: 1 MJ
  SWITZERLAND

## Inputs from technosphere
- Oil boiler 100kW [CH]: 6.6138e-8 p; lognormal SD95 3.0281
  (3,3,3,1,1,na); Estimation 2100h use per year
- Treatment, condensate from light oil boiler, to wastewater treatment, class 2 [CH]: 9.7902e-6 m3; lognormal SD95 3.2412
  (3,3,5,1,1,na); Literature, basic uncertainity = 3
- Oil storage 3000l [CH]: 1.7637e-7 p; lognormal SD95 3.2412
  (3,3,5,1,1,na); Calculated
- Disposal, hazardous waste, 25% water, to hazardous waste incineration [CH]: 4.15e-6 kg; lognormal SD95 1.5253
  (3,3,5,1,1,na); Literature
- Chimney [CH]: 5.9524e-7 m; lognormal SD95 3.2412
  (3,3,5,1,1,na); Calculated
- Electricity, low voltage, at grid [CH]: 0.001655 kWh; lognormal SD95 1.5253
  (3,3,5,1,1,na); Literature
- Light fuel oil, at regional storage [CH]: 0.02331 kg; lognormal SD95 1.1249
  (3,3,1,1,1,na); Literature

## Emissions to nature
- Carbon monoxide, fossil [emissions to air, high. pop.]: 7.5e-6 kg; lognormal SD95 5.0178
  (3,3,1,1,1,na); Literature
- Dinitrogen monoxide [emissions to air, high. pop.]: 7e-7 kg; lognormal SD95 4.0297
  (3,3,3,1,1,na); Struschka 2008 basic uncertainty estimated = 4
- Heat, waste [emissions to air, high. pop.]: 1.0596 MJ; lognormal SD95 1.5253
  (3,3,5,1,1,na); Literature
- Propene [emissions to air, high. pop.]: 2e-8 kg; lognormal SD95 1.521
  (3,3,1,1,1,na); Literature
- Propane [emissions to air, high. pop.]: 3e-8 kg; lognormal SD95 1.521
  (3,3,1,1,1,na); Literature
- Hydrocarbons, aromatic [emissions to air, high. pop.]: 2e-8 kg; lognormal SD95 1.521
  (3,3,1,1,1,na); Literature
- Hydrogen chloride [emissions to air, high. pop.]: 9.4e-8 kg; lognormal SD95 1.521
  (3,3,1,1,1,na); Literature
- Toluene [emissions to air, high. pop.]: 1e-8 kg; lognormal SD95 1.521
  (3,3,1,1,1,na); Literature
- Sulfur dioxide [emissions to air, high. pop.]: 4.5455e-5 kg; lognormal SD95 1.1635
  (3,3,3,1,1,na); Calculated
- Acrolein [emissions to air, high. pop.]: 1.15e-8 kg; lognormal SD95 1.521
  (3,3,1,1,1,na); Literature
- Acetaldehyde [emissions to air, high. pop.]: 2.05e-8 kg; lognormal SD95 1.521
  (3,3,1,1,1,na); Literature
- Particulates, < 2.5 um [emissions to air, high. pop.]: 5e-7 kg; lognormal SD95 3.0281
  (3,3,3,1,1,na); Literature, basic uncertainty estimated = 3
- Zinc [emissions to air, high. pop.]: 5e-10 kg; lognormal SD95 5.032
  (3,3,3,1,1,na); Literature
- Copper [emissions to air, high. pop.]: 4e-10 kg; lognormal SD95 5.0178
  (3,3,1,1,1,na); Literature
- Benzaldehyde [emissions to air, high. pop.]: 6e-9 kg; lognormal SD95 1.521
  (3,3,1,1,1,na); Literature
- Pentane [emissions to air, high. pop.]: 1e-7 kg; lognormal SD95 1.521
  (3,3,1,1,1,na); Literature
- Nitrogen oxides [emissions to air, high. pop.]: 2.75e-5 kg; lognormal SD95 1.5044
  (2,1,1,1,1,na); Literature
- Nickel [emissions to air, high. pop.]: 1.1655e-7 kg; lognormal SD95 5.0178
  (3,3,1,1,1,na); Product properties
- Dioxin, 2,3,7,8 Tetrachlorodibenzo-p- [emissions to air, high. pop.]: 5.7e-17 kg; lognormal SD95 3.0281
  (3,3,3,1,1,na); Literature
- Ethene [emissions to air, high. pop.]: 5e-8 kg; lognormal SD95 1.521
  (3,3,1,1,1,na); Literature
- Hydrocarbons, aliphatic, unsaturated [emissions to air, high. pop.]: 2e-8 kg; lognormal SD95 1.521
  (3,3,1,1,1,na); Literature
- Acetone [emissions to air, high. pop.]: 5e-8 kg; lognormal SD95 1.521
  (3,3,1,1,1,na); Literature
- Benzene [emissions to air, high. pop.]: 2e-8 kg; lognormal SD95 3.0157
  (3,3,1,1,1,na); Literature
- Formaldehyde [emissions to air, high. pop.]: 6e-9 kg; lognormal SD95 1.521
  (3,3,1,1,1,na); Literature
- Ethyne [emissions to air, high. pop.]: 1e-8 kg; lognormal SD95 1.521
  (3,3,1,1,1,na); Literature
- Hydrogen fluoride [emissions to air, high. pop.]: 4.5e-9 kg; lognormal SD95 1.521
  (3,3,1,1,1,na); Literature
- Propanal [emissions to air, high. pop.]: 6e-9 kg; lognormal SD95 1.521
  (3,3,1,1,1,na); Literature
- Ethane [emissions to air, high. pop.]: 2e-8 kg; lognormal SD95 1.521
  (3,3,1,1,1,na); Literature
- Lead [emissions to air, high. pop.]: 1.1655e-7 kg; lognormal SD95 5.0178
  (3,3,1,1,1,na); Product properties
- PAH, polycyclic aromatic hydrocarbons [emissions to air, high. pop.]: 4.6e-10 kg; lognormal SD95 3.0281
  (3,3,3,1,1,na); Literature
- Hydrocarbons, aliphatic, alkanes, unspecified [emissions to air, high. pop.]: 2.5e-7 kg; lognormal SD95 1.521
  (3,3,1,1,1,na); Literature
- Carbon dioxide, fossil [emissions to air, high. pop.]: 0.073675 kg; lognormal SD95 1.1249
  (3,3,1,1,1,na); Literature
- Mercury [emissions to air, high. pop.]: 4.662e-10 kg; lognormal SD95 5.0178
  (3,3,1,1,1,na); Product properties
- Butane [emissions to air, high. pop.]: 1.5e-7 kg; lognormal SD95 1.521
  (3,3,1,1,1,na); Literature
- Methane, fossil [emissions to air, high. pop.]: 2e-7 kg; lognormal SD95 1.521
  (3,3,1,1,1,na); Literature

## Sampling procedure
Data published in literature based on measurements.

## Extrapolations
Some information from other European countries has been used to determine the emission factors.

## Sources
- Jungbluth N., Wenzel P., Meili C., 2018, 2018 - LCI oil heating systems - Jungbluth, Project report, 565, ESU-services Ltd., Schaffhausen, CH
Jungbluth N., Wenzel P., Meili C. (2018) Life cycle inventories of oil heating systems. Project report. Volume: 565. ESU-services Ltd.. Schaffhausen, CH.
Type: Separate publication
Source: Report
First author: Jungbluth N.
Other authors: Wenzel P., Meili C.
Year: 2018
Title of anthology: Project report
Place of publication: Schaffhausen, CH
Publisher: ESU-services Ltd.
Volume No: 565

## Validation
Proof reading validation: automatic validation in Excel; Other validation: https://esuservices-my.sharepoint.com/personal/mitarbeiter1_esuservices_onmicrosoft_com/Documents/565 LCI oil sector CH BAFU/EcoSpold/[EcoSpold-heating-2018-v6.0.xlsx]X-Process;
