# Packing, clay products

Dataset: EcoSpold 1, unit process
Functional unit: 1 kg
Category: Others / unspecified
Geography: CH
Time period: 2000-01 to 2000-12
Generated by: Daniel Kellenberger
accessRestrictedTo: 0
copyright: true

## General comment
The packing and loading process is normalized with an annual production volume of 1'000'000 kg/a and a density of 1'600 m3/kg. The estimated lifespan of the machines is assumed to be 25 years.;

## Included processes
Includes the process of packing, transportation within the plant and loading of the bags on paletts. The machines used therefore are included in the infrastructure. The waste treatment after use by the end-user and transports of the packing materials are included.

## Geography
Data are from one company (packing, lime products) in Switzerland and adjusted for clay products.

## Technology
Assumption that the same process is used as for packing lime products

## Reference product
- Packing, clay products [CH]: 1 kg
  SWITZERLAND

## Inputs from technosphere
- Transport, freight, lorry, 7.5t-16t gross weight, fleet average [RER]: 6.15e-7 tkm; lognormal SD95 1.8
  (5,na,na,na,4,na);
- Disposal, wood untreated, 20% water, to municipal incineration [CH]: 0.0018284 kg; lognormal SD95 1.7
  (4,5,1,1,4,5);
- Electricity, medium voltage, production ENTSO-E, at grid: 0.00309 kWh; lognormal SD95 1.5
  (1,2,1,1,4,1);
- Polyethylene, HDPE, granulate, at plant [RER]: 6.15e-5 kg; lognormal SD95 1.6
  (4,na,na,na,4,na);
- Disposal, polyethylene, 0.4% water, to municipal incineration [CH]: 6.15e-5 kg; lognormal SD95 1.6
  (4,na,na,na,4,na);
- Transport, freight, lorry, 16t-32t gross weight, fleet average [CH]: 0.00139 tkm; lognormal SD95 2.5
  (5,na,na,na,4,na);
- Transport, freight, rail, electricity with shunting [CH]: 0.00139 tkm; lognormal SD95 2.5
  (5,na,na,na,4,na);
- Industrial machine, heavy, unspecified, at plant [RER]: 0.0015 kg; lognormal SD95 3.5
  (5,na,na,na,4,na);
- EUR-flat pallet [RER]: 6.25e-5 p; lognormal SD95 1.7
  (4,5,1,1,4,5);
- Extrusion, plastic film [RER]: 6.15e-5 kg; lognormal SD95 1.6
  (4,na,na,na,4,na);

## Emissions to nature
- Heat, waste [emissions to air, unspecified]: 0.0111 MJ; lognormal SD95 1.6
  (1,3,1,1,4,5);

## Sampling procedure
Measured data of one Swiss plant

## Extrapolations
See geography

## Sources
- Kellenberger D., Althaus H.-J., Jungbluth N., Kuenniger T., Lehmann M., Thalmann P., 2007, 2007 - LCI building products - Kellenberger, Final report ecoinvent data v2.0, 7, Swiss Centre for LCI, Empa - TSL, ESU-services Ltd., Bau- und Umweltchimie, Duebendorf, CH
Kellenberger D., Althaus H.-J., Jungbluth N., Künniger T. (2007) Life Cycle Inventories of Building Products. Final report ecoinvent data v2.0. Volume: 7. Swiss Centre for LCI, Empa - TSL. Dübendorf, CH.
Type: Measurement on site
Source: CD-ROM
First author: Kellenberger D.
Other authors: Althaus H.-J., Jungbluth N., Künniger T.
Year: 2007
Title of anthology: Final report ecoinvent data v2.0
Place of publication: Dübendorf, CH
Publisher: Swiss Centre for LCI, Empa - TSL
Volume No: 7

## Validation
Proof reading validation: Passed; Other validation: none;
