# Railway track

Dataset: EcoSpold 1, unit process, infrastructure
Functional unit: 1 my
Category: transport systems / train\operations\infrastructure
Geography: CH
Time period: 2000-01 to 2000-12
Generated by: Michael Spielmann
accessRestrictedTo: 0
copyright: true

## General comment
All data is referred to meter*year. Life time of the rail track infrastructure is assumed to be 100 yrs. Inventory for a conventional gravel track bedding. Expenditures due to tunnel construction and bridge construction have been taken into account, according to the share of tunnels and bridges in the Swiss rail network. All data is referred to a two way track. Allocation between goods and passenger transport is not yet applied;

## Included processes
The inventory includes the construction of the rail track (track bedding, substructures, catenary system) as well as the construction of tunnels and bridges. Further components of rail track infrastructure, such as signalling infrastructure, train overtaking stations, sound insulation walls and buildings (stations, service garages) are not included in this study. Also land use is not considered, but accounted for in the maintenance and operation, railway track.

## Technology
Data represents current technologies

## Time period
Rail length is based on current statistical data (2000). The material consumption represents a situation in the early 1990ties and a recent high speed track in Germany

## Reference product
- Railway track [CH]: 1 my
  SWITZERLAND

## Inputs from technosphere
- Steel, low-alloyed, at plant [RER]: 0.56 kg; lognormal SD95 1.27
  LCA case study; (3,3,1,3,3,4)
- Diesel, burned in building machine, average [CH]: 9.5 MJ; lognormal SD95 2.09
  literature & oral comunication; (3,3,3,3,3,4)
- Excavation, skid-steer loader [RER]: 1.2 m3; lognormal SD95 2.09
  literature & oral comunication; (3,3,3,3,3,4)
- Transport, freight, lorry, 16t-32t gross weight, fleet average [CH]: 14 tkm; lognormal SD95 2.09
  standard distance; (4,5,na,na,na,na)
- Zinc, primary, at regional storage [RER]: 0.006 kg; lognormal SD95 1.29
  literature & oral comunication; (3,3,3,3,3,4)
- Concrete, exacting, at plant [CH]: 0.0431 m3; lognormal SD95 1.27
  LCA case study; (3,3,1,3,3,4)
- Transport, freight, rail, electricity with shunting [CH]: 8.48 tkm; lognormal SD95 2.09
  standard distance; (4,5,na,na,na,na)
- Gravel, crushed, at mine [CH]: 571 kg; lognormal SD95 1.27
  LCA case study; (3,3,1,3,3,4)
- Reinforcing steel, at plant [RER]: 13.5 kg; lognormal SD95 1.27
  LCA case study; (3,3,1,3,3,4)
- Electricity, medium voltage, at grid [CH]: 3.99 kWh; lognormal SD95 1.29
  literature & oral comunication; (3,3,3,3,3,4)
- Copper, at regional storage [RER]: 0.055 kg; lognormal SD95 1.29
  literature & oral comunication; (3,3,3,3,3,4)

## Emissions to nature
- Heat, waste [emissions to air, unspecified]: 14.3 MJ; lognormal SD95 1.29
  standard value; (3,3,3,3,3,4)

## Sampling procedure
national statistics and literature studies

## Sources
- Spielmann M., Bauer C., Dones R., Tuchschmid M., 2007, 2007 - Transport services - Spielmann, Final report ecoinvent Data v2.0, 14, Swiss Centre for LCI, PSI, ESU-services Ltd., Duebendorf, Villigen and Uster, CH
Spielmann M., Dones R; Bauer C. (2007) Life Cycle Inventories of Transport Services. Final report ecoinvent Data v2.0. Volume: 14. Issue: 0. Swiss Centre for LCI, PSI. Dübendorf and Villigen, CH.
Type: Measurement on site
Source: CD-ROM
First author: Spielmann M.
Other authors: Dones R; Bauer C.
Year: 2007
Title of anthology: Final report ecoinvent Data v2.0
Place of publication: Dübendorf and Villigen, CH
Publisher: Swiss Centre for LCI, PSI
Volume No: 14
Issue No: 0

## Validation
Proof reading validation: passed. (selfvalidation); Other validation: none;
