# Printed wiring board, power supply unit desktop PC, Pb containing, at plant

Dataset: EcoSpold 1, unit process
Functional unit: 1 kg
Category: electronics / devices\module\pwb
Geography: GLO
Time period: 2004-01 to 2004-12
Generated by: Roland Hischier
accessRestrictedTo: 0
copyright: true

## General comment
The data represent the PWB of a power supply unit, used in modern Desktop PCs. Material data are based on own dismantling activities. Infrastructure and production efforts are based on own assumptions.;

## Included processes
This dataset covers component input and production efforts (incl. PWB waste due to failure in mounting) for the production of a PWB used in the power supply unit of a desktop PC, using Pb-containing solder material.

## Technology
average PWB mounting technology (wave soldering)

## Reference product
- Printed wiring board, power supply unit desktop PC, Pb containing, at plant [GLO]: 1 kg
  Global

## Inputs from technosphere
- Printed wiring board, through-hole, lead-containing surface, at plant [GLO]: 0.049184 m2; lognormal SD95 1.3069
  (2,5,1,3,1,5,3); own dismantling activities of a Intel PII Desktop PC PSU
- Transport, transoceanic freight ship [OCE]: 0.80612 tkm; lognormal SD95 2.095
  (4,5,na,na,na,na,5); standard distances
- Capacitor, electrolyte type, > 2cm height, at plant [GLO]: 0.073878 kg; lognormal SD95 1.3069
  (2,5,1,3,1,5,3); own dismantling activities of a Intel PII Desktop PC PSU
- Transistor, wired, big size, through-hole mounting, at plant [GLO]: 0.036122 kg; lognormal SD95 1.3069
  (2,5,1,3,1,5,3); own dismantling activities of a Intel PII Desktop PC PSU
- Capacitor, electrolyte type, < 2cm height, at plant [GLO]: 0.043673 kg; lognormal SD95 1.3069
  (2,5,1,3,1,5,3); own dismantling activities of a Intel PII Desktop PC PSU
- Resistor, metal film type, through-hole mounting, at plant [GLO]: 0.012143 kg; lognormal SD95 1.3069
  (2,5,1,3,1,5,3); own dismantling activities of a Intel PII Desktop PC PSU
- Capacitor, film, through-hole mounting, at plant [GLO]: 0.022551 kg; lognormal SD95 1.3069
  (2,5,1,3,1,5,3); own dismantling activities of a Intel PII Desktop PC PSU
- Section bar extrusion, aluminium [RER]: 0.13 kg; lognormal SD95 1.3069
  (2,5,1,3,1,5,3); own dismantling activities of a Intel PII Desktop PC PSU
- Diode, glass-, through-hole mounting, at plant [GLO]: 0.0065 kg; lognormal SD95 1.3069
  (2,5,1,3,1,5,3); own dismantling activities of a Intel PII Desktop PC PSU
- Capacitor, unspecified, at plant [GLO]: 0.025 kg; lognormal SD95 1.3069
  (2,5,1,3,1,5,3); own dismantling activities of a Intel PII Desktop PC PSU
- Transformer, low voltage use, at plant [GLO]: 0.061531 kg; lognormal SD95 1.3069
  (2,5,1,3,1,5,3); own dismantling activities of a Intel PII Desktop PC PSU
- Aluminium, production mix, wrought alloy, at plant [RER]: 0.13 kg; lognormal SD95 1.3069
  (2,5,1,3,1,5,3); own dismantling activities of a Intel PII Desktop PC PSU
- Transport, freight, lorry, fleet average [RER]: 0.13265 tkm; lognormal SD95 2.095
  (4,5,na,na,na,na,5); standard distances
- Mounting, through-hole technology, Pb-containing solder [GLO]: 0.049184 m2; lognormal SD95 1.3069
  (2,5,1,3,1,5,3); own dismantling activities of a Intel PII Desktop PC PSU
- Inductor, ring core choke type, at plant [GLO]: 0.25612 kg; lognormal SD95 1.3069
  (2,5,1,3,1,5,3); own dismantling activities of a Intel PII Desktop PC PSU
- Integrated circuit, IC, logic type, at plant [GLO]: 0.0030918 kg; lognormal SD95 1.3069
  (2,5,1,3,1,5,3); own dismantling activities of a Intel PII Desktop PC PSU
- Transport, freight, rail [RER]: 0.14286 tkm; lognormal SD95 2.095
  (4,5,na,na,na,na,5); standard distances
- Disposal, treatment of printed wiring boards [GLO]: 0.020408 kg; lognormal SD95 1.2435
  (3,3,1,3,1,5,3); data from literature plus own assumptions
- Transistor, wired, small size, through-hole mounting, at plant [GLO]: 0.0017959 kg; lognormal SD95 1.3069
  (2,5,1,3,1,5,3); own dismantling activities of a Intel PII Desktop PC PSU
- Transformer, high voltage use, at plant [GLO]: 0.19388 kg; lognormal SD95 1.3069
  (2,5,1,3,1,5,3); own dismantling activities of a Intel PII Desktop PC PSU

## Sampling procedure
own dismanlting

## Extrapolations
see Geography & Technology

## Sources
- Hischier R., Classen M., Lehmann M., Scharnhorst W., 2007, 2007 - LCI electric and electronic equipment - Hischier, Final report ecoinvent Data v2.0, 18, Swiss Centre for LCI, Empa - TSL, Duebendorf and St. Gallen, CH
Hischier R., Classen M., Lehmann M., Scharnhorst W. (2007) Life Cycle Inventories of Electric and Electronic Equipment - Production, Use & Disposal. Final report ecoinvent Data v2.0. Volume: 18. Swiss Centre for LCI, Empa - TSL. Duebendorf and St. Gallen, CH.
Type: Measurement on site
Source: CD-ROM
First author: Hischier R.
Other authors: Classen M., Lehmann M., Scharnhorst W.
Year: 2007
Title of anthology: Final report ecoinvent Data v2.0
Place of publication: Duebendorf and St. Gallen, CH
Publisher: Swiss Centre for LCI, Empa - TSL
Volume No: 18
Original title: Life Cycle Inventories of Electric and Electronic Equipment - Production, Use & Disposal

## Validation
Proof reading validation: passed.; Other validation: none;
