# Roller shutters, at plant, with resource correction

Dataset: EcoSpold 1, unit process
Functional unit: 1 m2
Category: construction materials / sunshade
Geography: CH
Time period: 2000-01 to 2016-12
Generated by: Matthias Klingler
accessRestrictedTo: 0
copyright: true

## General comment
Herstellung Rollladen, Daten bezogen auf 1 m2 Fensterlichtmass. Grundlage für die Ökobilanzen war in Analogie zu den Daten für Fensterprofile die Dimensionen des Standard-Fensters 1.30 m x 1.75 m. Storenkästen, Rollen, Lager und andere Vorrichtungen sind dabei berücksichtigt worden. Als Antrieb wurde ein Motor gewählt.
Sachbilanz beruht auf dem System Alucolor der Firma Griesser. Resource correction added for primary share of aluminium and steel for KBOB recommendation 2016.
Version: 0.0

Local category: construction materials
Local subcategory: Sonnenschutz

## Reference product
- Roller shutters, at plant, with resource correction [CH]: 1 m2
  SWITZERLAND

## Inputs from technosphere
All rows: lognormal SD95 1.2321
- Sheet rolling, steel [RER]: 2.761 kg
  (2;4;1;1;1)
- Electric motor, electric vehicle, at plant [RER]: 0.7912 kg
  (2;4;1;1;1)
- Zinc coating, pieces [RER]: 1.082 m2
  (2;4;1;1;1)
- Aluminium, production mix, at plant [RER]: 5.015 kg
  (2;4;1;1;1)
- Injection moulding [RER]: 0.1234 kg
  (2;4;1;1;1)
- Aluminium product manufacturing, average metal working [RER]: 5.015 kg
  (2;4;1;1;1)
- Transport, freight, rail [RER]: 2.684 tkm
  (2;4;1;1;1)
- Sheet rolling, aluminium [RER]: 5.015 kg
  (2;4;1;1;1)
- Transport, freight, lorry, 16t-32t gross weight, fleet average [CH]: 0.395 tkm
  (2;4;1;1;1)
- Steel product manufacturing, average metal working [RER]: 2.761 kg
  (2;4;1;1;1)
- Steel, low-alloyed, at plant [RER]: 2.761 kg
  (2;4;1;1;1)
- Polystyrene, high impact, HIPS, at plant [RER]: 0.1234 kg
  (2;4;1;1;1)
- Powder coating, aluminium sheet [RER]: 1.85 m2
  (2;4;1;1;1)
- Anodising, aluminium sheet [RER]: 1.05 m2
  (2;4;1;1;1)

## Inputs from nature
- Aluminium, resource correction [resources, unspecified]: -2.56898 kg
  (1,1,1,1,1,1,BU:1.05); Aluminium production mix for Europe in 2013 according to Marlen Bertram, World Aluminium
- Iron, resource correction [resources, unspecified]: -1.73943 kg
  (1,1,1,1,1,1,BU:1.05); Recycling share in 2000: 37%

## Sources
- Created for EcoSpold 1 compatibility, Final report ecoinvent data v2.2, 16
Hischier, R., Althaus H.-J., Bauer, Chr., Büsser S., Doka, G., Frischknecht R., Kleijer A., Leuenberger M., Nemecek, T., Simons A. (2010) Documentation of changes implemented in ecoinvent Data v2.2. Final report ecoinvent data v2.2. Volume: 16. Swiss Centre for LCI. Dübendorf. CH.
Type: Measurement on site
Source: CD-ROM
First author: Hischier, R.
Other authors: Althaus H.-J., Bauer, Chr., Büsser S., Doka, G., Frischknecht R., Kleijer A., Leuenberger M., Nemecek, T., Simons A.
Year: 2010
Title of anthology: Final report ecoinvent data v2.2
Place of publication: Dübendorf. CH
Publisher: Swiss Centre for LCI
Volume No: 16
