# Treatment, effluent from NF3 production, to wastewater treatment, class 3

Dataset: EcoSpold 1, unit process
Functional unit: 1 m3
Category: waste management / wastewater treatment
Geography: CH
Time period: 1994-01 to 2007-12
Generated by: Philippe Stolz
accessRestrictedTo: 0
copyright: true

## General comment
Wastewater purified in a medium size municipal wastewater treatment plant (capacity class 3), with an average capacity size of 24900 per-captia-equivalents PCE. \nWastewater contains (in kg/m3): NH4-N: 0.0104 (GSD=122.5%);

## Included processes
Infrastructure materials for municipal wastewater treatment plant, transports, dismantling. Land use burdens.

## Technology
Three stage wastewater treatment (mechanical, biological, chemical) including sludge digestion (fermentation) according to the average technology in Switzerland

## Time period
Time of publications.

## Reference product
- Treatment, effluent from NF3 production, to wastewater treatment, class 3 [CH]: 1 m3
  SWITZERLAND

## Inputs from technosphere
- Residual material landfill facility [CH]: 2.9312e-10 p; lognormal SD95 1.4495
  burden from sludge incineration. Uncertainty calculated from wastewater composition and treatment model
- Heat from waste, at municipal waste incineration plant [CH]: 2.7942 MJ; lognormal SD95 1.2153
  (same comment as for Residual material landfill facility)
- Light fuel oil, burned in boiler 100kW, non-modulating [CH]: 1.3965 MJ; lognormal SD95 1.609
  direct wastewater treatment plant burden. Uncertainty calculated from wastewater composition and treatment model
- Disposal, paper, 11.2% water, to municipal incineration [CH]: 0.0155 kg; lognormal SD95 1.07
  (same comment as for Light fuel oil, burned in boiler 100kW, non-modulating)
- Disposal, plastics, mixture, 15.3% water, to municipal incineration [CH]: 0.0155 kg; lognormal SD95 1.07
  (same comment as for Light fuel oil, burned in boiler 100kW, non-modulating)
- Cement, unspecified, at plant [CH]: 0.05628 kg; lognormal SD95 1.5179
  (same comment as for Residual material landfill facility)
- Electricity from waste, at municipal waste incineration plant [CH]: 0.47899 kWh; lognormal SD95 3.8308
  (same comment as for Residual material landfill facility)
- Sodium hydroxide, 50% in H2O, production mix, at plant [RER]: 8.3128e-7 kg; lognormal SD95 1.8849
  (same comment as for Residual material landfill facility)
- Hydrochloric acid, 30% in H2O, at plant [RER]: 6.3192e-10 kg; lognormal SD95 1.8873
  (same comment as for Residual material landfill facility)
- Process-specific burdens, slag compartment [CH]: 0.87822 kg; lognormal SD95 1.4438
  (same comment as for Residual material landfill facility)
- Wastewater treatment plant, class 3 [CH]: 5.6882e-9 p; lognormal SD95 1
  uncertainty heeded in exchanges of the module
- Sewer grid, class 3 [CH]: 2.1782e-7 km; lognormal SD95 1
  uncertainty heeded in exchanges of the module
- Slag compartment [CH]: 1.5613e-9 p; lognormal SD95 1.4438
  (same comment as for Residual material landfill facility)
- Slurry spreading, by vacuum tanker [CH]: 0.0094024 m3; lognormal SD95 1.0802
  burden from sludge spreading. Uncertainty calculated from wastewater composition and treatment model
- Chemicals inorganic, at plant [GLO]: 1.0532e-9 kg; lognormal SD95 1.8873
  (same comment as for Residual material landfill facility)
- Disposal, cement, hydrated, 0% water, to residual material landfill [CH]: 0.1407 kg; lognormal SD95 1.5179
  (same comment as for Residual material landfill facility)
- Natural gas, burned in industrial furnace 1MW [CH]: 0.0016314 MJ; lognormal SD95 2.5098
  (same comment as for Residual material landfill facility)
- Ammonia, liquid, at regional storehouse [CH]: 1.6729e-5 kg; lognormal SD95 2.5098
  (same comment as for Residual material landfill facility)
- Electricity, low voltage, at grid [CH]: 0.70139 kWh; lognormal SD95 1.5343
  (same comment as for Light fuel oil, burned in boiler 100kW, non-modulating)
- Process-specific burdens, municipal waste incineration [CH]: 3.3317 kg; lognormal SD95 1.2078
  (same comment as for Residual material landfill facility)
- Natural gas, burned in boiler modulating >100kW [RER]: 1.8845 MJ; lognormal SD95 1.609
  (same comment as for Light fuel oil, burned in boiler 100kW, non-modulating)
- Quicklime, milled, packed, at plant [CH]: 1.5071e-7 kg; lognormal SD95 1.9048
  (same comment as for Residual material landfill facility)
- Chromium oxide, flakes, at plant [RER]: 9.7727e-9 kg; lognormal SD95 4.3174
  (same comment as for Residual material landfill facility)
- Process-specific burdens, residual material landfill [CH]: 0.1407 kg; lognormal SD95 1.4495
  (same comment as for Residual material landfill facility)
- Transport, freight, rail [RER]: 0.0056699 tkm; lognormal SD95 1.513
  direct wastewater treatment plant burden plus burden from sludge incineration. Uncertainty calculated from wastewater composition and treatment model
- Transport, freight, lorry, 32t-40t gross weight, fleet average [CH]: 0.27707 tkm; lognormal SD95 1.0777
  (same comment as for Transport, freight, rail)
- Municipal waste incineration plant [CH]: 8.3292e-10 p; lognormal SD95 1.2078
  (same comment as for Residual material landfill facility)
- Titanium dioxide, production mix, at plant [RER]: 4.7886e-7 kg; lognormal SD95 4.3174
  (same comment as for Residual material landfill facility)

## Emissions to nature
- Carbon monoxide, fossil [emissions to air, high. pop.]: 0.00046544 kg; lognormal SD95 5.0655
  emission from sludge incineration. Uncertainty calculated from wastewater composition and treatment model
- Nitrate [emissions to water, groundwater, long-term]: 1.1912e-5 kg; lognormal SD95 1.7556
  (same comment as for Carbon monoxide, fossil)
- Fluoride [emissions to water, river]: 3.52 kg; lognormal SD95 1.4882
  sewer overload discharge plus direct wastewater treatment plant emission plus emission from sludge incineration. Uncertainty calculated from wastewater composition and treatment model
- Calcium [emissions to soil, agricultural]: 0.64857 kg; lognormal SD95 1.6264
  emission from sludge spreading. Uncertainty calculated from wastewater composition and treatment model
- Ammonia [emissions to air, high. pop.]: 0.00011136 kg; lognormal SD95 2.8666
  direct digester gas emission plus emission from sludge incineration plus emission from sludge spreading. Uncertainty calculated from wastewater composition and treatment model
- Heat, waste [emissions to air, high. pop.]: 2.5253 MJ; lognormal SD95 1.5342
  direct wastewater treatment plant emission plus emission from sludge incineration. Uncertainty calculated from wastewater composition and treatment model
- Calcium [emissions to water, river]: 12.729 kg; lognormal SD95 1.4878
  (same comment as for Fluoride)
- Nitrate [emissions to water, river]: 0.019434 kg; lognormal SD95 1.506
  (same comment as for Fluoride)
- Nitrogen oxides [emissions to air, high. pop.]: 0.00018589 kg; lognormal SD95 1.7328
  direct digester gas emission plus emission from sludge incineration. Uncertainty calculated from wastewater composition and treatment model
- Nitrogen [emissions to water, river]: 0.00029386 kg; lognormal SD95 1.595
  direct wastewater treatment plant emission. Uncertainty calculated from wastewater composition and treatment model
- Calcium [emissions to water, groundwater, long-term]: 0.64016 kg; lognormal SD95 1.6417
  (same comment as for Carbon monoxide, fossil)
- Methane, fossil [emissions to air, high. pop.]: 1.3327e-5 kg; lognormal SD95 1.6307
  (same comment as for Carbon monoxide, fossil)
- Dinitrogen monoxide [emissions to air, high. pop.]: 4.5841e-5 kg; lognormal SD95 1.5502
  direct wastewater treatment plant emission plus direct digester gas emission plus emission from sludge incineration plus emission from sludge spreading. Uncertainty calculated from wastewater composition and treatment model
- Cyanide [emissions to air, high. pop.]: 2.9843e-7 kg; lognormal SD95 2.6321
  (same comment as for Carbon monoxide, fossil)
- Calcium [emissions to air, high. pop.]: 0.0012263 kg; lognormal SD95 1.7349
  (same comment as for Nitrogen oxides)
- Ammonium, ion [emissions to water, river]: 0.0042809 kg; lognormal SD95 1.5106
  (same comment as for Nitrogen)

## Sources
- Frischknecht R., Itten R., Sinha P., de Wild-Scholten M., Zhank J., 2020, 2015 - LCI and LCA photovoltaic systems - Frischknecht, Project report, 174, IEA PVPS Task 12, Petten, NL
Frischknecht R.,, Stolz P., Sinha P., de Wild-Scholten M. (2020) Life Cycle Inventories and Life Cycle Assessments of Photovoltaic Systems. Project report. Volume: 174. IEA PVPS Task 12.
Type: Separate publication
Source: Report
First author: Frischknecht R.,
Other authors: Stolz P., Sinha P., de Wild-Scholten M.
Year: 2020
Title of anthology: Project report
Publisher: IEA PVPS Task 12
Volume No: 174
Original title: Life Cycle Inventories and Life Cycle Assessments of Photovoltaic Systems

## Validation
Proof reading validation: 30.09.2020; Other validation: G:\Projekte laufend\174 Photovoltaic, IEA Task 12\2017 Global supply chain\EcoSpold\[174-photovoltaics-global-supply-chain-v2.5.xlsx]X-Process;
