# Printed wiring board, through-hole, at plant

Dataset: EcoSpold 1, unit process
Functional unit: 1 m2
Category: electronics / component
Geography: GLO
Time period: 2023-01 to 2029-12
Production volume: $ 18.9315 Billion in 1998 (includes all rigid PWB)
Generated by: Lugas Raka Adrianto, Maulana Permana Ajie, Didier Beloin-Saint-Pierre
accessRestrictedTo: 0
copyright: false

## General comment
The functional unit represents 1 m2 of a 2-layer FR-4 PWB, surface finished (mixture of Pb-containing and Pb-free methods), with soldermask, for through-hole mount applications, without mounted components. It is designed to be used in industry electronics and simple ICT applications.;

## Included processes
The module represents a 0:100 mixture of the datasets “printed wiring board, through-hole, Pb-containing surface, at plant” and “printed wiring board, through-hole, Pb-free surface, at plant”. It is assumed that after 2023 updates, no lead containing electronics are used in the market.

## Geography
This module is based on information from European producers that are seen as representative for the global situation.

## Technology
See included processes for the various surface finishing techniques.

## Reference product
- Printed wiring board, through-hole, at plant [GLO]: 1 m2
  Global

## Inputs from technosphere
- Printed wiring board, through-hole, lead-free surface, at plant [GLO]: 1 m2; lognormal SD95 1.33
  (3,3,2,3,3,5,BU:1.05). Update: entirely Pb free

## Sampling procedure
Mixture of surface finishing based on assumption

## Extrapolations
see Geography and Technology

## Sources
- Raka Adrianto L., Permana Ajie M., Beloin-Saint-Pierre D., 2024, 2024 - LCI ICT sector - Raka Adrianto, Empa, St. Gallen, CH

## Validation
Proof reading validation: Passed, Other validation: none, Validator: Mischa Zschokke, Company: Carbotech, Country: CH
