# Natural gas, production RU, at long-distance pipeline

Dataset: EcoSpold 1, unit process
Functional unit: 1 MJ
Category: natural gas / transport
Geography: TR
Time period: 2023 to 2024
Production volume: not known
Generated by: Niels Jungbluth
accessRestrictedTo: 0
copyright: true

## General comment
In 2023 96% of the imported Russian natural gas to TR was imported by pipeline and 4% as LNG. An average distance of 1200 km is estimated for the pipeline export from Russian Federation, of which are 400 km offshore pipeline. The estimated shipping distance for LNG are 8200 km. The net calorific value of natural is 36.0 MJ/Nm³.

## Included processes
This dataset describes the transport needed for an average export of Russian natural gas. Gas losses and emissions during seasonal storage are included.

## Geography
The data for storage emissions are based on global data. The amount of gas stored is a rough estimate based on European data. The average weighted transport distance is based on the trade movements 2019.

## Technology
The distance is an European average based on the European long-distance pipeline network and LNG shipping routes.

## Time period
Transport modes investigated for 2023.

## Reference product
- Natural gas, production RU, at long-distance pipeline [TR]: 1 MJ

## Inputs from technosphere
- Natural gas, at production [RU]: 0.026752 Nm3; lognormal SD95 1.209
  (4,2,1,1,1,BU:1.05); Imports via pipeline + losses
- Natural gas, production RU, at evaporation plant [TR]: 0.0010283 Nm3; lognormal SD95 1.209
  (4,2,1,1,1,BU:1.05); Imports via LNG
- Natural gas, burned in gas turbine [RU]: 0.00225 MJ; lognormal SD95 1.3042
  (4,2,2,3,3,BU:1.05); Energy expenditure of seasonal storage
- Transport, natural gas, offshore pipeline, long distance [RU]: 0.0081667 tkm; lognormal SD95 3.321
  (4,3,5,3,3,BU:3); based on estimated standard capacity
- Transport, natural gas, onshore pipeline, long distance [RU]: 0.016333 tkm; lognormal SD95 1.1541
  (3,4,1,1,1,BU:1.05); Average weighted distance is estimated based on trade statistics and pipeline network.

## Emissions to nature
- Methane, fossil [emissions to air, low. pop.]: 1.8413e-6 kg; lognormal SD95 1.5681
  (2,3,4,1,1,BU:1.5)
  Emissions from storage. Calculated based on average losses and gas composition
- Ethane [emissions to air, low. pop.]: 1.5251e-7 kg; lognormal SD95 1.5681
  (same comment as for Methane, fossil)
- Propane [emissions to air, low. pop.]: 3.4313e-8 kg; lognormal SD95 1.5681
  (same comment as for Methane, fossil)
- Butane [emissions to air, low. pop.]: 1.7645e-8 kg; lognormal SD95 1.5681
  (same comment as for Methane, fossil)
- NMVOC, non-methane volatile organic compounds, unspecified origin [emissions to air, low. pop.]: 1.2705e-9 kg; lognormal SD95 1.5681
  (same comment as for Methane, fossil)
- Carbon dioxide, fossil [emissions to air, low. pop.]: 6.3694e-8 kg; lognormal SD95 1.2226
  (2,3,4,1,1,BU:1.05)
  Emissions from storage. Calculated based on average losses and gas composition
- Mercury [emissions to air, low. pop.]: 2.7778e-14 kg; lognormal SD95 5.0592
  (2,3,4,1,1,BU:5)
  Emissions from storage. Calculated based on average losses and gas composition

## Sampling procedure
Literature.

## Sources
- Meili C., Jungbluth N., Bussa M., Stefanel A., 2025, 2025 - LCI long-distance transport crude oil - Meili, Project report, 234, ESU-services Ltd., Schaffhausen, CH
- Bussa M., Jungbluth N., Meili C., 2025, 2025 - LCI long-dist. transp. and distrib. natural gas - Bussa, Project report, 234, ESU-services Ltd., Schaffhausen, CH

## Validation
Passed.
https://esuservices-my.sharepoint.com/personal/jungbluth_esu-services_ch/Documents/ESU-intern/565 Beratung BAFU/EcoSpoldDataXML/[565-EcoSpold-gas-transport-2025-v2.0.xlsb]X-Process
