# Explosives, tovex, at plant

Dataset: EcoSpold 1, unit process
Functional unit: 1 kg
Category: chemicals / others
Geography: CH
Time period: 2000-01 to 2000-12
Generated by: Daniel Kellenberger
accessRestrictedTo: 0
copyright: true

## General comment
As almost no data are available most information is assumed. Only the information on the raw material is handed over in written form. This module should not be used if its relative importance would be high in a certain environmental inventory.;
Synonyms: blasting, agent;

## Included processes
includes the whole manufacturing process to produce Tovex (raw material provision, mixing process, packing, internal processes (transport, etc.) and infrastructure.

## Geography
For some exchanges RER- and DE-modules have been used as proxy

## Technology
The basic materials are poured by gravity in a mixer. When filled with 1"500kg the mixing procedure starts and lasts about 15min. To keep it warm it"s filled in a hot basin from where it is put in sausages by a cartridging machine and then packed in card board boxes. A conveyor belt transports the boxes and puts it on paletts for storing

## Reference product
- Explosives, tovex, at plant [CH]: 1 kg
  SWITZERLAND

## Inputs from technosphere
- Treatment, sewage, to wastewater treatment, class 3 [CH]: 0.00556 m3; lognormal SD95 1.62
  (5,5,1,1,1,5);
- Transport, freight, lorry, fleet average [RER]: 0.05 tkm; lognormal SD95 2.32
  (5,5,1,1,1,5);
- Transport, freight, lorry, 16t-32t gross weight, fleet average [CH]: 0.0004 tkm; lognormal SD95 2.32
  (5,5,1,1,1,5);
- Diesel, burned in building machine, average [CH]: 0.0214 MJ; lognormal SD95 2.15
  (4,5,1,1,5,5);
- Paper, woodcontaining, LWC, at plant [RER]: 0.0222 kg; lognormal SD95 2.33
  (5,5,1,1,5,5);
- Corrugated board, mixed fibre, single wall, at plant [RER]: 0.002 kg; lognormal SD95 1.62
  (5,5,1,1,1,5);
- Tap water, at user [RER]: 5.64 kg; lognormal SD95 2.33
  (5,5,1,1,5,5);
- Calcium nitrate, as N, at regional storehouse [RER]: 0.0566 kg; lognormal SD95 1.68
  (4,5,5,1,1,5);
- Aluminium, production mix, at plant [RER]: 0.08 kg; lognormal SD95 1.68
  (4,5,5,1,1,5);
- Industrial machine, heavy, unspecified, at plant [RER]: 0.000167 kg; lognormal SD95 3.32
  (5,5,1,1,1,5);
- Transport, freight, rail, electricity with shunting [CH]: 0.05 tkm; lognormal SD95 2.32
  (5,5,1,1,1,5);
- Transport, municipal waste collection, lorry 21t [CH]: 0.0756 tkm; lognormal SD95 2.32
  (5,5,1,1,1,5);
- Disposal, municipal solid waste, 22.9% water, to municipal incineration [CH]: 0.00606 kg; lognormal SD95 1.62
  (5,5,1,1,1,5);
- Light fuel oil, burned in boiler 100kW, non-modulating [CH]: 0.156 MJ; lognormal SD95 1.68
  (4,5,1,1,4,5);
- Ammonium nitrate, as N, at regional storehouse [RER]: 0.161 kg; lognormal SD95 1.68
  (4,5,5,1,1,5);
- Explosive production plant [CH]: 6.67e-9 p; lognormal SD95 3.99
  (5,5,1,1,5,5);
- Electricity, medium voltage, at grid [CH]: 0.0863 kWh; lognormal SD95 2.15
  (4,5,1,1,5,5);
- Flat glass, uncoated, at plant [RER]: 0.03 kg; lognormal SD95 1.68
  (4,5,5,1,1,5);
- EUR-flat pallet [RER]: 0.0004 p; lognormal SD95 1.68
  (4,5,1,1,4,5);
- Disposal, packaging cardboard, 19.6% water, to municipal incineration [CH]: 0.0015 kg; lognormal SD95 1.62
  (5,5,1,1,1,5);
- Potato starch, at plant [DE]: 0.009 kg; lognormal SD95 1.68
  (4,5,5,1,1,5);

## Emissions to nature
- Heat, waste [emissions to air, unspecified]: 0.311 MJ; lognormal SD95 2.15
  (4,5,1,1,5,5);

## Sampling procedure
Share of basic material by personal communication. All other In- and Output modules are estimations

## Extrapolations
See geography

## Sources
- Kellenberger D., Althaus H.-J., Jungbluth N., Kuenniger T., Lehmann M., Thalmann P., 2007, 2007 - LCI building products - Kellenberger, Final report ecoinvent data v2.0, 7, Swiss Centre for LCI, Empa - TSL, ESU-services Ltd., Bau- und Umweltchimie, Duebendorf, CH
Kellenberger D., Althaus H.-J., Jungbluth N., Künniger T. (2007) Life Cycle Inventories of Building Products. Final report ecoinvent data v2.0. Volume: 7. Swiss Centre for LCI, Empa - TSL. Dübendorf, CH.
Type: Measurement on site
Source: CD-ROM
First author: Kellenberger D.
Other authors: Althaus H.-J., Jungbluth N., Künniger T.
Year: 2007
Title of anthology: Final report ecoinvent data v2.0
Place of publication: Dübendorf, CH
Publisher: Swiss Centre for LCI, Empa - TSL
Volume No: 7

## Validation
Proof reading validation: passed; Other validation: none;
