# Butyl acrylate, at plant

Dataset: EcoSpold 1, unit process
Functional unit: 1 kg
Category: chemicals / organic
Geography: RER
Time period: 2000-01 to 2000-12
Generated by: Maggie Osses
accessRestrictedTo: 0
copyright: true

## General comment
The process considered is the production of butyl acrylat by means of the esterification of acrylic acid. Manufacturing process is considered with consumption of raw materials, energy, infrastructure and land use, as well as generation of solid wastes and emissions into air and water. Transport of the raw materials and solid wastes is included. No by-product is generated in the process. Transportation and consumption of auxiliaries are not included due to the lack of data. Transport and storage of the final product are not included. Transcient or unstable operations are not considered, but the production during stable operation conditions. Emissions to air are considered as emanating in a high population density area. Emissions into water are assumed to be emitted into rivers. Solid wastes are assumed to be sent to landfill. Inventory refers to 1 kg 100% butyl acrylate. In the source used (von Däniken et al. 1995) numbers for emissions are taken from the manufacturing of dimetylerephthalate, as an approximation.;
CAS number: 000141-32-2;
Formula: C7H11O;

## Included processes
The process considered is the production of butyl acrylat by means of the esterification of acrylic acid with metanol

## Geography
In the literature source used, the numbers for process emissions have been taken from the manufacture of dimetylerephthalate, as an approximation. Data concerning consumption of raw materials and energy base on information provided by a coating manufacturing company (Akzo). It is not known how representative are these values for the European butyl acrylat industry

## Time period
literature bases on data from the 1990s.

## Reference product
- Butyl acrylate, at plant [RER]: 1 kg
  Europe

## Inputs from technosphere
- Heat, heavy fuel oil, at industrial furnace 1MW [RER]: 3.02 MJ; lognormal SD95 1.34
  (3,5,3,3,1,5); data from survey in literature (von Däniken et al. 1995)
- Hard coal, burned in industrial furnace 1-10MW [RER]: 5.13 MJ; lognormal SD95 1.34
  (3,5,3,3,1,5); data from survey in literature (von Däniken et al. 1995)
- Acrylic acid, at plant [RER]: 0.59 kg; lognormal SD95 1.34
  (3,5,3,3,1,5); data from survey in literature (von Däniken et al. 1995)
- Electricity, medium voltage, production ENTSO-E, at grid: 0.03 kWh; lognormal SD95 1.34
  (3,5,3,3,1,5); data from survey in literature (von Däniken et al. 1995)
- Natural gas, burned in industrial furnace 1MWth [CH]: 7.67 MJ; lognormal SD95 1.34
  (3,5,3,3,1,5); data from survey in literature (von Däniken et al. 1995)
- Transport, freight, rail [RER]: 0.696 tkm; lognormal SD95 2.05
  (4,na,na,na,na,na); standard distances
- Heat, light fuel oil, at industrial furnace 1MW [RER]: 0.68 MJ; lognormal SD95 1.34
  (3,5,3,3,1,5); data from survey in literature (von Däniken et al. 1995)
- Chemical plant, organics [RER]: 4e-10 p; lognormal SD95 3.96
  (4,1,5,3,5,4); estimation
- Disposal, municipal solid waste, 22.9% water, to sanitary landfill [CH]: 0.00028 kg; lognormal SD95 2.29
  (3,5,3,3,1,5); data from survey in literature (von Däniken et al. 1995)
- Transport, freight, lorry, fleet average [RER]: 0.116 tkm; lognormal SD95 2.05
  (4,na,na,na,na,na); standard distances
- 1-butanol, propylene hydroformylation, at plant [RER]: 0.57 kg; lognormal SD95 1.34
  (3,5,3,3,1,5); data from survey in literature (von Däniken et al. 1995)

## Inputs from nature
- Water, cooling, unspecified natural origin/m3 [resources, in water]: 0.2 m3; lognormal SD95 1.34
  (3,5,3,3,1,5); data from survey in literature (Chauvet 1986)
- Water, unspecified natural origin/m3 [resources, in water]: 0.015 m3; lognormal SD95 1.34
  (3,5,3,3,1,5); data from survey in literature (Chauvet 1986)

## Emissions to nature
- Heat, waste [emissions to air, high. pop.]: 0.108 MJ; lognormal SD95 1.34
  (3,5,3,3,1,5); calculated from electricity input
- BOD5, Biological Oxygen Demand [emissions to water, river]: 0.00019 kg; lognormal SD95 1.9
  (3,5,3,3,4,5); data from survey in literature (von Däniken et al. 1995)
- COD, Chemical Oxygen Demand [emissions to water, river]: 0.000887 kg; lognormal SD95 1.9
  (3,5,3,3,4,5); data from survey in literature (von Däniken et al. 1995)
- Particulates, < 2.5 um [emissions to air, high. pop.]: 7.67e-5 kg; lognormal SD95 3.34
  (3,5,3,3,4,5); data from survey in literature (von Däniken et al. 1995)
- Particulates, > 10 um [emissions to air, high. pop.]: 7.67e-5 kg; lognormal SD95 1.9
  (3,5,3,3,4,5); data from survey in literature (von Däniken et al. 1995)
- Sulfur dioxide [emissions to air, high. pop.]: 0.00195 kg; lognormal SD95 1.9
  (3,5,3,3,4,5); data from survey in literature (von Däniken et al. 1995)
- Hydrocarbons, aliphatic, alkanes, unspecified [emissions to air, high. pop.]: 0.00303 kg; lognormal SD95 2.35
  (3,5,3,3,4,5); data from survey in literature (von Däniken et al. 1995)
- Particulates, > 2.5 um, and < 10um [emissions to air, high. pop.]: 7.67e-5 kg; lognormal SD95 2.35
  (3,5,3,3,4,5); data from survey in literature (von Däniken et al. 1995)
- Nitrogen oxides [emissions to air, high. pop.]: 0.00035 kg; lognormal SD95 1.9
  (3,5,3,3,4,5); data from survey in literature (von Däniken et al. 1995)
- Suspended solids, unspecified [emissions to water, river]: 0.00026 kg; lognormal SD95 1.9
  (3,5,3,3,4,5); data from survey in literature (von Däniken et al. 1995)
- Water [emissions to water, unspecified]: 190, 14.25 kg (2 entries); lognormal SD95 2.5196
  (5,5,5,5,5,BU:1.05); All uncertainty-values set to 5.0 by default. Balance of input water

## Sampling procedure
see geography

## Extrapolations
Transports based on standard distances of Ecoinvent. Infrastructure: proxy module used (chemical plant, organics)

## Sources
- Althaus H.-J., Chudacoff M., Hellweg S., Hischier R., Jungbluth N., Osses M., Primas A., 2007, 2007 - LCI chemicals - Althaus, Final report ecoinvent data v2.0, 8, Swiss Centre for LCI, Empa - TSL, ETH, ESU-services Ltd., Chudacoff Oekoscience, Duebendorf, CH
Althaus H.-J., Chudacoff M., Hischier R., Jungbluth N., Osses M., Primas A. (2007) Life Cycle Inventories of Chemicals. Final report ecoinvent data v2.0. Volume: 8. Swiss Centre for LCI, Empa - TSL. Dübendorf, CH.
Type: Measurement on site
Source: CD-ROM
First author: Althaus H.-J.
Other authors: Chudacoff M., Hischier R., Jungbluth N., Osses M., Primas A.
Year: 2007
Title of anthology: Final report ecoinvent data v2.0
Place of publication: Dübendorf, CH
Publisher: Swiss Centre for LCI, Empa - TSL
Volume No: 8

## Validation
Proof reading validation: Passed.; Other validation: none;
