# Flooring, from rubber granulate, at plant

Dataset: EcoSpold 1, unit process
Functional unit: 1 m2
Category: flooring / flooring kbob
Geography: CH
Time period: 2012-01 to 2012-12
Share of production covered: 0 %
Generated by: Matthias Klingler
accessRestrictedTo: 0
copyright: true

## General comment
Durchschnittliches Flächengewicht = 8.4 kg/m2;

## Included processes
Gebrauchsfertiger Bodenbelag inklusive Versiegelung. Die Verlegung ist in der Bilanz nicht berücksichtigt. Die verwendeten Daten für die Zusammensetzung des Belags stammen von M. Pöll (Amt für Hochbauten).

## Reference product
- Flooring, from rubber granulate, at plant [CH]: 1 m2

## Inputs from technosphere
- Electricity, medium voltage, production ENTSO-E, at grid: 0.521 kWh; lognormal SD95 1.2365
- Polyols, at plant [RER]: 1.261 kg; lognormal SD95 1.2365
- Latex, at plant [RER]: 2.269 kg; lognormal SD95 1.2365
- Transport, freight, lorry, 32t-40t gross weight, fleet average [CH]: 0.216 tkm; lognormal SD95 1.2477
- Chemicals organic, at plant [GLO]: 0.183 kg; lognormal SD95 1.2365
- Transport, freight, rail [RER]: 1.715 tkm; lognormal SD95 1.2477
- Titanium dioxide, production mix, at plant [RER]: 0.02 kg; lognormal SD95 1.199
- Methylene diphenyl diisocyanate, at plant [RER]: 0.437 kg; lognormal SD95 1.2365
- Kaolin, at plant [RER]: 4.169 kg; lognormal SD95 1.2365
- Chemical plant, organics [RER]: 3.3e-9 p; lognormal SD95 1.2656
- Acrylic dispersion, 65% in H2O, at plant [RER]: 0.061 kg; lognormal SD95 1.199

## Sources
- Werner F., 2017, 2017 - LCI wood and wood based products - Werner, Project Report, 0, Environment & Development, Zuerich, CH

## Validation
Proof reading validation: 13.03.2013; Other validation: \\SERVER\Users\Admin\Documents\Projekte laufend\297 BAFU Anfragen\Bodenbeläge\[c Ecospold alle Prozesse_v0.2.xlsx]X-Process;
