# Tram

Dataset: EcoSpold 1, unit process, infrastructure
Functional unit: 1 p
Category: transport systems / train\operations\infrastructure
Geography: RER
Time period: 2000-01 to 2000-12
Generated by: Michael Spielmann
accessRestrictedTo: 0
copyright: true

## General comment
Material consumption values refer to the production of one average tram (1 railcar and 0.55 trailer). Energy consumption is estimated from the energy content of the materials (50% energy of materials;

## Included processes
The inventory includes processes of material and energy consumption in vehicle manufacturing. Rail and road transport of materials is accounted for.

## Technology
Material composition represents a tram produced in the early 90ties.

## Reference product
- Tram [RER]: 1 p
  Europe

## Inputs from technosphere
- Transport, freight, rail [RER]: 4640 tkm; lognormal SD95 2.08
  standard transport distances
- Polyethylene, HDPE, granulate, at plant [RER]: 850 kg; lognormal SD95 2
  Literature data
- Alkyd paint, white, 60% in solvent, at plant [RER]: 371 kg; lognormal SD95 2
  Literature data
- Electricity, medium voltage, production ENTSO-E, at grid: 24200 kWh; lognormal SD95 3
  Literature data, very rough estimate
- Transport, freight, lorry, fleet average [RER]: 2090 tkm; lognormal SD95 2.08
  standard transport distances
- Light fuel oil, burned in industrial furnace 1MW, non-modulating [RER]: 174000 MJ; lognormal SD95 3
  Literature data, very rough estimate
- Reinforcing steel, at plant [RER]: 16700 kg; lognormal SD95 1.5
  Literature data
- Synthetic rubber, at plant [RER]: 196 kg; lognormal SD95 2
  Literature data
- Aluminium, production mix, at plant [RER]: 588 kg; lognormal SD95 2
  Literature data
- Copper, at regional storage [RER]: 1460 kg; lognormal SD95 2
  Literature data
- Flat glass, uncoated, at plant [RER]: 763 kg; lognormal SD95 1.5
  Literature data
- Lead, at regional storage [RER]: 64.1 kg; lognormal SD95 2
  Literature data

## Sampling procedure
Literature studies.

## Extrapolations
Data from one production site in Switzerland is used as an first estimate for Europe

## Sources
- Spielmann M., Bauer C., Dones R., Tuchschmid M., 2007, 2007 - Transport services - Spielmann, Final report ecoinvent Data v2.0, 14, Swiss Centre for LCI, PSI, ESU-services Ltd., Duebendorf, Villigen and Uster, CH
Spielmann M., Dones R; Bauer C. (2007) Life Cycle Inventories of Transport Services. Final report ecoinvent Data v2.0. Volume: 14. Issue: 0. Swiss Centre for LCI, PSI. Dübendorf and Villigen, CH.
Type: Measurement on site
Source: CD-ROM
First author: Spielmann M.
Other authors: Dones R; Bauer C.
Year: 2007
Title of anthology: Final report ecoinvent Data v2.0
Place of publication: Dübendorf and Villigen, CH
Publisher: Swiss Centre for LCI, PSI
Volume No: 14
Issue No: 0

## Validation
Proof reading validation: Passed.; Other validation: none;
