# Sawmill

Dataset: EcoSpold 1, unit process, infrastructure
Functional unit: 1 p
Category: wood / products\infrastructure
Geography: RER
Time period: 2000-01 to 2000-12
Generated by: Hans-Joerg Althaus
accessRestrictedTo: 0
copyright: true

## General comment
The service life is assumed to be 50 years. Thus the life time output is 2'500'000 m3 sawn timber. This data must only be used to consider the infrastructure needed for sawing wood if this is not relevant.;
Synonyms: Sägewerk, sawing mill;

## Included processes
The land area and the material and their transports needed for building and disposal of a sawmill with a yearly output of 50"000 m3 sawn timber is included. Land used for air drying of wood is not included.

## Technology
Sawmill with it"s input wood storage place, a lop station, a hall with the saw and a conveyer belt.

## Reference product
- Sawmill [RER]: 1 p
  Europe

## Inputs from technosphere
- Steel, low-alloyed, at plant [RER]: 855000 kg; lognormal SD95 3.2
  (3,5,1,3,3,5);
- Conveyor belt, at plant [RER]: 2240 m; lognormal SD95 3.2
  (3,5,1,3,3,5);
- Transport, freight, rail [RER]: 251000 tkm; lognormal SD95 2.1
  (4,5,nA,nA,nA,nA);
- Concrete, sole plate and foundation, at plant [CH]: 760 m3; lognormal SD95 3.2
  (3,5,1,3,3,5);
- Sheet rolling, steel [RER]: 855000 kg; lognormal SD95 3.2
  (3,5,1,3,3,5);
- Building, hall [CH]: 7780 m2; lognormal SD95 3.2
  (3,5,1,3,3,5);
- Cast iron, at plant [RER]: 817000 kg; lognormal SD95 3.2
  (3,5,1,3,3,5);
- Disposal, building, reinforced concrete, to final disposal [CH]: 1.67e6 kg; lognormal SD95 3.2
  (3,5,1,3,3,5);
- Transport, freight, lorry, fleet average [RER]: 335000 tkm; lognormal SD95 2.1
  (4,5,nA,nA,nA,nA);

## Inputs from nature
- Occupation, industrial area [resources, land]: 1.02e6 m2a; lognormal SD95 1.7
  (3,5,1,3,3,5);
- Transformation, to industrial area, vegetation [resources, land]: 50600 m2; lognormal SD95 2.2
  (3,5,1,3,3,5);
- Transformation, to industrial area, built up [resources, land]: 7780 m2; lognormal SD95 2.2
  (3,5,1,3,3,5);
- Occupation, industrial area, built up [resources, land]: 389000 m2a; lognormal SD95 1.7
  (3,5,1,3,3,5);
- Transformation, from unknown [resources, land]: 78800 m2; lognormal SD95 2.2
  (3,5,1,3,3,5);
- Transformation, to industrial area [resources, land]: 20400 m2; lognormal SD95 2.2
  (3,5,1,3,3,5);
- Occupation, industrial area, vegetation [resources, land]: 2.53e6 m2a; lognormal SD95 1.7
  (3,5,1,3,3,5);

## Sampling procedure
estimation

## Sources
- Werner F., Althaus H.-J., Kuenniger T., Richter K., Jungbluth N., 2007, 2007 - LCI wood as fuel and const. mat. - Werner, Final report ecoinvent data v2.0, 9, Swiss Centre for LCI, Empa - TSL, ESU-services Ltd., Duebendorf, CH
Werner F., Althaus H.-J., Künniger T., Richter K., Jungbluth N. (2007) 1Life Cycle Inventories of Wood as Fuel and Construction Material. Final report ecoinvent data v2.0. Volume: 9. Issue: 0. Swiss Centre for LCI, Empa - TSL. Dübendorf, CH.
Type: Measurement on site
Source: CD-ROM
First author: Werner F.
Other authors: Althaus H.-J., Künniger T., Richter K., Jungbluth N.
Year: 2007
Title of anthology: Final report ecoinvent data v2.0
Place of publication: Dübendorf, CH
Publisher: Swiss Centre for LCI, Empa - TSL
Volume No: 9
Issue No: 0

## Validation
Proof reading validation: Passed; Other validation: none;
