# Dipropylene glycol monomethyl ether, at plant

Dataset: EcoSpold 1, unit process
Functional unit: 1 kg
Category: chemicals / organic
Geography: RER
Time period: 2000-01 to 2006-12
Share of production covered: 100 %
Generated by: Juergen Sutter
accessRestrictedTo: 0
copyright: true

## General comment
The process " dipropylene glycol monomethyl ether, at plant, GLO" is modelled for the production of dipropylene glycol monomethyl ether rom propylene oxide and methanol in Europe. Raw materials are modelled with a stoechiometric calculation. Energy consumptions, emissions, infrastructure are estimated. Transports are calculated with standard values.;
CAS number: 034590-94-8;
Formula: CH3(OC3H6)2OH;
Synonyms: DPM, Methoxy propoxy propanol;

## Included processes
Production of dipropylene glycol monomethyl ether including materials, energy uses, infrastructure and emissions.

## Geography
The inventory is modelled for Europe.

## Technology
Etherification of propylene oxide

## Time period
Time of publications

## Reference product
- Dipropylene glycol monomethyl ether, at plant [RER]: 1 kg
  Europe

## Inputs from technosphere
- Propylene oxide, liquid, at plant [RER]: 0.82504 kg; lognormal SD95 1.3765
  (4,5,1,1,1,5); Stoechiometric calculation
- Transport, freight, rail [RER]: 0.63158 tkm; lognormal SD95 2.095
  (4,5,na,na,na,na); Standard distances
- Heat, natural gas, at industrial furnace 1MW [CH]: 2 MJ; lognormal SD95 1.3001
  (4,5,na,na,na,na); Estimation
- Chemical plant, organics [RER]: 4e-10 p; lognormal SD95 3.0909
  (4,5,na,na,na,na); Estimation
- Methanol, at plant [GLO]: 0.2276 kg; lognormal SD95 1.3765
  (4,5,1,1,1,5); Stoechiometric calculation
- Electricity, medium voltage, production ENTSO-E, at grid: 0.333 kWh; lognormal SD95 1.3001
  (4,5,na,na,na,na); Estimation
- Transport, freight, lorry, fleet average [RER]: 0.10526 tkm; lognormal SD95 2.095
  (4,5,na,na,na,na); Standard distances

## Inputs from nature
- Water, cooling, unspecified natural origin/m3 [resources, in water]: 0.024 m3; lognormal SD95 1.3001
  (4,5,na,na,na,na); Estimation

## Emissions to nature
- DOC, Dissolved Organic Carbon [emissions to water, river]: 0.00316 kg; lognormal SD95 1.6169
  (4,5,na,na,na,na); Calculated from the water emissions
- Heat, waste [emissions to air, high. pop.]: 1.1988 MJ; lognormal SD95 1.3001
  (4,5,na,na,na,na); Calculated from the electricity input
- TOC, Total Organic Carbon [emissions to water, river]: 0.00316 kg; lognormal SD95 1.6169
  (4,5,na,na,na,na); Calculated from the water emissions
- BOD5, Biological Oxygen Demand [emissions to water, river]: 0.0105 kg; lognormal SD95 1.6169
  (4,5,na,na,na,na); Calculated from the water emissions
- Propylene oxide [emissions to water, river]: 0.0039602 kg; lognormal SD95 3.0909
  (4,5,na,na,na,na); Estimation
- Methanol [emissions to air, high. pop.]: 0.00045519 kg; lognormal SD95 1.6169
  (4,5,na,na,na,na); Estimation
- COD, Chemical Oxygen Demand [emissions to water, river]: 0.0105 kg; lognormal SD95 1.6169
  (4,5,na,na,na,na); Calculated from the water emissions
- Carbon dioxide, fossil [emissions to air, high. pop.]: 0.094634 kg; lognormal SD95 1.3001
  (4,5,na,na,na,na); Estimation
- Propylene oxide [emissions to air, high. pop.]: 0.0016501 kg; lognormal SD95 1.6169
  (4,5,na,na,na,na); Estimation
- Methanol [emissions to water, river]: 0.0010925 kg; lognormal SD95 3.0909
  (4,5,na,na,na,na); Estimation
- Water [emissions to water, unspecified]: 22.8 kg; lognormal SD95 2.5196
  (5,5,5,5,5,BU:1.05); All uncertainty-values set to 5.0 by default. Balance of input water

## Sampling procedure
Standard values

## Sources
- Jungbluth N., Stucki M., Frischknecht R., 2009, 2009 - Photovoltaics - Jungbluth, Sachbilanzen von Energiesystemen. Final report No. 6 ecoinvent v2.1, 6, Swiss Centre for LCI, ESU-services Ltd., Duebendorf, CH
Jungbluth, N., Stucki, M., Frischknecht, R. (2009) Photovoltaics. Sachbilanzen von Energiesystemen. Final report No. 6 ecoinvent v2.1. Editors: Bauer C.. Volume: 6. Swiss Centre for LCI, PSI. Dübendorf and Villigen, CH.
Type: Measurement on site
Source: CD-ROM
First author: Jungbluth, N.
Other authors: Stucki, M., Frischknecht, R.
Year: 2009
Name of editors: Bauer C.
Title of anthology: Sachbilanzen von Energiesystemen. Final report No. 6 ecoinvent v2.1
Place of publication: Dübendorf and Villigen, CH
Publisher: Swiss Centre for LCI, PSI
Volume No: 6

## Validation
Proof reading validation: passed; Other validation: none;
