# Uranium natural, in yellowcake, at mill

Dataset: EcoSpold 1, unit process
Functional unit: 1 kg
Category: fuels / uranium\enriched
Geography: GLO
Time period: 2011-01 to 2011-12
Generated by: Gabor Doka
accessRestrictedTo: 0
copyright: true

## General comment
PSI data (BFE project 407, Christian Bauer, April 2012).;

## Included processes
The module includes: the land use for the operation (mostly tailings); diesel generators and industrial boilers burning light oil; transport of the chemicals and fuels; radioactive and non-radioactive emissions to air and water during operation; water use (mining water, but attributed to "unspecified natural origin").

## Technology
Average conditions.

## Reference product
- Uranium natural, in yellowcake, at mill [GLO]: 1 kg
  Global

## Inputs from technosphere
- Uranium natural, in yellowcake, at mill [UA]: 0.017 kg
- Uranium natural, in yellowcake, at mill [RU]: 0.073 kg
- Uranium natural, in yellowcake, at mill [CA]: 0.209 kg
- Uranium natural, in yellowcake, at mill [NE]: 0.066 kg
- Uranium natural, in yellowcake, at mill [MW]: 0.002 kg
- Uranium natural, in yellowcake, at mill [AU]: 0.164 kg
- Uranium natural, in yellowcake, at in-situ leaching mine [GLO]: 0.367 kg
- Uranium natural, in yellowcake, at mill [NA]: 0.095 kg
- Uranium natural, in yellowcake, at mill [BR]: 0.007 kg

## Sampling procedure
Literature

## Sources
- Bauer C., Frischknecht R., Eckle P., Flury K., Neal T., Papp K., Schori S., Simons A., Stucki M., Treyer K., 2012, 2012 - LCA electricity generation in Switzerland - Uster, -, 407, Swiss Centre for LCI, ESU-services Ltd., PSI, Uster and Villigen, CH
Ch. Bauer, Frischknecht (2012) Umweltauswirkungen Strom. Volume: 407. PSI. Uster und Villigen, CH.
Type: Separate publication
Source: CD-ROM
First author: Ch. Bauer
Other authors: Frischknecht
Year: 2012
Place of publication: Uster und Villigen, CH
Publisher: PSI
Volume No: 407

## Validation
Proof reading validation: Unknown; Other validation: \\Server\E\ESU-Docs\Projektablage\407 Update LCI Energiesysteme\EcoSpold\import in unit process library\[uranium natural.xls]X-Process;
