# Ethanol, 95% in H2O, from sugar beets, at fermentation plant

Dataset: EcoSpold 1, unit process
Functional unit: 1 kg
Category: fuels / biofuels\ethanol
Geography: CH
Time period: 2000-01 to 2004-12
Production volume: The world production of ethanol from sugar beets is around 10 Mio hl per year.
Share of production covered: 12 %
Generated by: Juergen Sutter
accessRestrictedTo: 0
copyright: true

## General comment
The multioutput-process "sugar beets, to fermentation" delivers the co-products Ethanol, 95% in H20, from sugar beets", "beets chips", and vinasse. The allocation is based on economic criteria. World production of ethanol from sugar beets is around 10 Mio hl per year.;

## Included processes
Fermentation of sugar beets including materials, energy uses, infrastructure, and emissions.

## Geography
The inventory is modelled with data from a plant in Finland.

## Technology
Production of ethanol from sugar beets with extraction, fermentation, and distillation of ethanol.

## Time period
Time of publications.

## Reference product
- Ethanol, 95% in H2O, from sugar beets, at fermentation plant [CH]: 1 kg
  SWITZERLAND

## Inputs from technosphere
- Sodium sulphate, from natural sources, at plant [RER]: 0.0038176 kg; lognormal SD95 1.1249
  (1,3,1,1,1,4); Eners 2005
- Electricity, medium voltage, at grid [CH]: 0.14817 kWh; lognormal SD95 1.1249
  (1,3,1,1,1,4); Eners 2005
- Transport, freight, rail, electricity with shunting [CH]: 0.62745 tkm; lognormal SD95 2.095
  (4,5,na,na,na,na); Fromentin 2000; Standard distances
- Ethanol fermentation plant [CH]: 3.3537e-10 p; lognormal SD95 3.086
  (2,4,1,5,3,4); Estimation
- Transport, freight, lorry, 16t-32t gross weight, fleet average [CH]: 0.15304 tkm; lognormal SD95 2.095
  (4,5,na,na,na,na); Fromentin 2000; Standard distances
- Sodium phosphate, at plant [RER]: 0.005726 kg; lognormal SD95 1.1249
  (1,3,1,1,1,4); Eners 2005
- Heat, at cogen with biogas engine, allocation exergy [CH]: 0.57451 MJ; lognormal SD95 1.1541
  (1,1,3,1,1,4); Kaltschmidt 1997
- Heat, natural gas, at industrial furnace 1MW [CH]: 3.15318 MJ; lognormal SD95 1.1249
  (1,3,1,1,1,4); Eners 2005
- Tap water, at user [CH]: 0.9127 kg; lognormal SD95 1.1249
  (1,3,1,1,1,4); Eners 2005
- Sugar beets IP, at farm [CH]: 7.55344 kg; lognormal SD95 1.1249
  (1,3,1,1,1,4); Eners 2005
- Sulphuric acid, liquid, at plant [RER]: 0.028651 kg; lognormal SD95 1.1249
  (1,3,1,1,1,4); Eners 2005

## Inputs from nature
- Water, cooling, unspecified natural origin/m3 [resources, in water]: 3.9532e-7 m3; lognormal SD95 1.1249
  (1,3,1,1,1,4); Eners 2005

## Emissions to nature
- Carbon dioxide, biogenic [emissions to air, high. pop.]: 0.52554 kg; lognormal SD95 1.2423
  (4,3,1,1,1,4); Calculated from the carbon balance
- Heat, waste [emissions to air, high. pop.]: 0.53339 MJ; lognormal SD95 1.2423
  (4,3,1,1,1,4); Calculated from the electricity input
- Water [emissions to water, unspecified]: 0.000375554 kg; lognormal SD95 2.5196
  (5,5,5,5,5,BU:1.05); All uncertainty-values set to 5.0 by default. Balance of input water

## Sampling procedure
Literature data

## Extrapolations
Some data are derived from other or unknown plants or have been estimated.

## Sources
- Jungbluth N., Chudacoff M., Dauriat A., Dinkel F., Doka G., Faist Emmenegger M., Gnansounou E., Kljun N., Spielmann M., Stettler C., Sutter J., 2007, 2007 - LCI bioenergy - Jungbluth, Final report ecoinvent data v2.0, 17, Swiss Centre for LCI, ESU-services Ltd., Duebendorf and Uster, CH
Jungbluth N., Chudacoff M., Dauriat A., Dinkel F., Doka G., Faist Emmenegger M., Gnansounou E., Kljun N., Spielmann M., Stettler C., Sutter J. (2007) Life Cycle Inventories of Bioenergy. Final report ecoinvent data v2.0. Volume: 17. Swiss Centre for LCI, ESU. Duebendorf and Uster, CH.
Type: Measurement on site
Source: CD-ROM
First author: Jungbluth N.
Other authors: Chudacoff M., Dauriat A., Dinkel F., Doka G., Faist Emmenegger M., Gnansounou E., Kljun N., Spielmann M., Stettler C., Sutter J.
Year: 2007
Title of anthology: Final report ecoinvent data v2.0
Place of publication: Duebendorf and Uster, CH
Publisher: Swiss Centre for LCI, ESU
Volume No: 17

## Validation
Proof reading validation: Passed.; Other validation: none;
