# Ethanol fermentation plant

Dataset: EcoSpold 1, unit process, infrastructure
Functional unit: 1 p
Category: fuels / biofuels\infrastructure
Geography: CH
Time period: 2000-01 to 2004-12
Production volume: 90000 tons per year
Share of production covered: 0 %
Generated by: Niels Jungbluth
accessRestrictedTo: 0
copyright: true

## General comment
Ethanol plant with an annual capacity of 90 000 tons ethanol and a life time of 20 years .;

## Included processes
Ethanol plant infrastructure including transformation and occupation of land, materials, energy uses, emissions, and dismanteling

## Geography
The inventory is modelled with data from a plant in the USA.

## Technology
Ethanol fermentation plant with wheat as resource.

## Time period
Literature

## Reference product
- Ethanol fermentation plant [CH]: 1 p
  SWITZERLAND

## Inputs from technosphere
- Transport, freight, lorry, 16t-32t gross weight, fleet average [CH]: 997800 tkm; lognormal SD95 2.095
  (4,5,na,na,na,na); Standard distances
- Electricity, medium voltage, at grid [CH]: 14778 kWh; lognormal SD95 1.3001
  (4,5,na,na,na,na); Estimation
- Steel, low-alloyed, at plant [RER]: 167000 kg; lognormal SD95 1.3001
  (4,5,na,na,na,na); Estimation
- Steel, converter, unalloyed, at plant [RER]: 394700 kg; lognormal SD95 1.209
  (1,1,1,3,1,5); Literature 2002
- Copper, at regional storage [RER]: 36000 kg; lognormal SD95 1.3001
  (4,5,na,na,na,na); Estimation
- Nickel, 99.5%, at plant [GLO]: 3200 kg; lognormal SD95 1.3001
  (4,5,na,na,na,na); Estimation
- Concrete, sole plate and foundation, at plant [CH]: 12409 m3; lognormal SD95 1.209
  (1,1,1,3,1,5); Literature 2002
- Chromium steel 18/8, at plant [RER]: 145000 kg; lognormal SD95 1.3001
  (4,5,na,na,na,na); Estimation
- Zinc, primary, at regional storage [RER]: 86000 kg; lognormal SD95 1.3001
  (4,5,na,na,na,na); Estimation
- Disposal, building, concrete, not reinforced, to final disposal [CH]: 2.73e7 kg; lognormal SD95 1.3001
  (4,5,na,na,na,na); Estimation
- Diesel, burned in building machine, average [CH]: 122000 MJ; lognormal SD95 1.3001
  (4,5,na,na,na,na); Estimation
- Transport, freight, rail, electricity with shunting [CH]: 499140 tkm; lognormal SD95 2.095
  (4,5,na,na,na,na); Standard distances

## Inputs from nature
- Occupation, industrial area, vegetation [resources, land]: 277500 m2a; lognormal SD95 1.5605
  (1,1,1,3,1,5); Literature 2005
- Transformation, to industrial area, built up [resources, land]: 23625 m2; lognormal SD95 2.0483
  (1,1,1,3,1,5); Literature 2005
- Transformation, from unknown [resources, land]: 37500 m2; lognormal SD95 2.0483
  (1,1,1,3,1,5); Literature 2005
- Transformation, to industrial area, vegetation [resources, land]: 13875 m2; lognormal SD95 2.0483
  (1,1,1,3,1,5); Literature 2005
- Occupation, industrial area, built up [resources, land]: 472500 m2a; lognormal SD95 1.5605
  (1,1,1,3,1,5); Literature 2005
- Occupation, construction site [resources, land]: 187500 m2a; lognormal SD95 1.5605
  (1,1,1,3,1,5); Literature 2005

## Emissions to nature
- Heat, waste [emissions to air, high. pop.]: 53201 MJ; lognormal SD95 1.2165
  (1,2,1,1,3,3); Estimation from electricity input

## Sampling procedure
Literature data

## Extrapolations
Some data are derived from other or unknown plants or have been estimated.

## Sources
- Jungbluth N., Chudacoff M., Dauriat A., Dinkel F., Doka G., Faist Emmenegger M., Gnansounou E., Kljun N., Spielmann M., Stettler C., Sutter J., 2007, 2007 - LCI bioenergy - Jungbluth, Final report ecoinvent data v2.0, 17, Swiss Centre for LCI, ESU-services Ltd., Duebendorf and Uster, CH
Jungbluth N., Chudacoff M., Dauriat A., Dinkel F., Doka G., Faist Emmenegger M., Gnansounou E., Kljun N., Spielmann M., Stettler C., Sutter J. (2007) Life Cycle Inventories of Bioenergy. Final report ecoinvent data v2.0. Volume: 17. Swiss Centre for LCI, ESU. Duebendorf and Uster, CH.
Type: Measurement on site
Source: CD-ROM
First author: Jungbluth N.
Other authors: Chudacoff M., Dauriat A., Dinkel F., Doka G., Faist Emmenegger M., Gnansounou E., Kljun N., Spielmann M., Stettler C., Sutter J.
Year: 2007
Title of anthology: Final report ecoinvent data v2.0
Place of publication: Duebendorf and Uster, CH
Publisher: Swiss Centre for LCI, ESU
Volume No: 17

## Validation
Proof reading validation: Passed.; Other validation: none;
