# Cable car infrastructure

Dataset: EcoSpold 1, unit process, infrastructure
Functional unit: 1 p
Category: transport systems / cable car
Geography: CH
Time period: 2009-01 to 2015-12
Production volume: 12
Share of production covered: 100 %
Generated by: Annika Messmer
accessRestrictedTo: 0
copyright: true

## Included processes
Included is the material used to build the cable car infrastrucutre of an average cable car with 2km length and 4 mast: rope, mast, building, motor; Geography: Switzerland

## Geography
Switzerland

## Technology
Average technology

## Time period
Time of publications

## Reference product
- Cable car infrastructure [CH]: 1 p
  SWITZERLAND

## Inputs from technosphere
- Concrete, exacting, at plant [CH]: 43.627 m3; lognormal SD95 1.6511
  (4,4,1,5,4,5,BU:1.05); concrete for the foundation of the 4 mast, 26t concrete required per mast; ewz, Hochspannungsmast
- Building, multi-storey [RER]: 1200 m3; lognormal SD95 3.9732
  (5,4,1,5,5,5,BU:3); own assumption of a 100m2 and three storey building for one station;
- Reinforcing steel, at plant [RER]: 121620 kg; lognormal SD95 1.6511
  (4,4,1,5,4,5,BU:1.05); steel for mast with a weight 24.7t and the assumption an anverage cable car has 4 masts; ewz, Hochspannungsmast
- Electric motor, electric vehicle, at plant [RER]: 2000 kg; lognormal SD95 1.344
  (3,4,1,3,3,5,BU:1.05); ; Technische Daten Elektromotor Kemmerich
- Reinforcing steel, at plant [RER]: 57073 kg; lognormal SD95 1.6511
  (4,4,1,5,4,5,BU:1.05); steel for rope of a length of 2km one way; Luftseilbahninventar, 2011

## Inputs from nature
- Occupation, construction site [resources, land]: 10000 m2a; lognormal SD95 2.5628
  (5,5,2,5,5,5,BU:1.5); ;
- Occupation, industrial area, built up [resources, land]: 10000 m2a; lognormal SD95 2.5628
  (5,5,2,5,5,5,BU:1.5); ;
- Transformation, to industrial area, built up [resources, land]: 200 m2; lognormal SD95 2.9929
  (5,5,2,5,5,5,BU:2); ;
- Transformation, from unknown [resources, land]: 200 m2; lognormal SD95 2.9929
  (5,5,2,5,5,5,BU:2); ;

## Extrapolations
Some generic datasets from ecoinvent have been used.

## Sources
- Messmer A., Frischknecht R., 2016, 2016 - LCI air transport services - Messmer, Project report, 544, treeze Ltd., Uster, CH
Messmer A., Frischknecht R. (2015) Life cycle inventories of air transport services. Project report. Volume: 544. treeze Ltd.. Uster, CH.
Type: Separate publication
Source: Report
First author: Messmer A.
Other authors: Frischknecht R.
Year: 2015
Title of anthology: Project report
Place of publication: Uster, CH
Publisher: treeze Ltd.
Volume No: 544

## Validation
Proof reading validation: 08.11.2016; Other validation: G:\Projekte laufend\544 Aktualisierung mobitool\Seilbahntransport\Ecospold\[544_Seilbahn_EIV2_v0.3.xlsx]X-Process;
