# Electricity, hydropower, at pumped storage power plant

Dataset: EcoSpold 1, unit process
Functional unit: 1 kWh
Category: electricity by fuel / hydro\pumping storage
Geography: IL
Time period: 1945-01 to 2000-12
Generated by: Marianne Leuenberger
accessRestrictedTo: 0
copyright: true

## General comment
This study adresses Swiss dams only. The data have been directly applied to preliminary describe dam-mixes in other alpine countries. Considering the difficulty to clearly seperate within the Swiss dams system for some of the dams function for normal electricity generation from pumping storage, the same basic information has been used for the modules describing the two functions. A representative sample of Swiss dams with a height of more than 30 metres is taken into account for calculating the numbers. Lifetime is assumed to be 150 years. The efficiency of the pumps is assumed to be 70%. The results of this module cannot be applied to describe a single unit.;

## Included processes
Includes the conversion of electricity from domestic high voltage grid to potential energy by pumping water up to the reservoir and generation of peak-load power when water flows back down to the turbine (reverse mode). The module has the same structure as the module for operation for reservoir plants.

## Geography
Data for Swiss avergage conditions, directly used here.

## Technology
The module describes average installed technology with an efficiency of 70% (best technology has 74%).

## Time period
Nicht spezifiziert

## Reference product
- Electricity, hydropower, at pumped storage power plant [IL]: 1 kWh
  ISRAEL

## Inputs from technosphere
- Electricity, high voltage, at grid [IL]: 1.43 kWh; lognormal SD95 1.24
  electricity for pumping
- Reservoir hydropower plant, non alpine regions [RER]: 3.9e-13 p; lognormal SD95 1.5
  own assumption on lifetime
- Disposal, used mineral oil, 10% water, to hazardous waste incineration [CH]: 7e-6 kg; lognormal SD95 1.8
  own assumption
- Lubricating oil, at plant [RER]: 7e-6 kg; lognormal SD95 1.8
  own assumption

## Inputs from nature
- Transformation, from unknown [resources, land]: 0.00023 m2; lognormal SD95 3
  own assumption
- Occupation, water bodies, artificial [resources, land]: 0.035 m2a; lognormal SD95 3
  own assumption
- Volume occupied, reservoir [resources, in water]: 0.15 m3y; lognormal SD95 3
  own assumption
- Transformation, to water bodies, artificial [resources, land]: 0.000228 m2; lognormal SD95 3
  own assumption
- Water, turbine use, unspecified natural origin [resources, in water]: 8.1 m3; lognormal SD95 1.05
  standard for resources
- Transformation, to industrial area, built up [resources, land]: 2.3e-6 m2; lognormal SD95 3
  own assumption

## Emissions to nature
- Heat, waste [emissions to water, river]: 1.55 MJ; lognormal SD95 1.05
  same uncertainty as for electricity input
- Dinitrogen monoxide [emissions to air, low. pop.]: 7.7e-8 kg; lognormal SD95 1.8
  extrapolation from literature
- Water [emissions to water, unspecified]: 8100 kg; lognormal SD95 2.5196
  (5,5,5,5,5,BU:1.05); All uncertainty-values set to 5.0 by default. Balance of input water

## Sampling procedure
literature

## Extrapolations
see Geography/Text

## Uncertainty adjustments
Data may not be representative for specific national conditions. The uncertainities calculated for the Swiss conditions have been somewhat increased, though large variation within the alpine region is not expected.

## Sources
- Bauer C., Bolliger R., Tuchschmid M., Faist-Emmenegger M., 2007, 2007 - Hydropower - Bauer, Sachbilanzen von Energiesystemen. Final report No. 6 ecoinvent data v2.0, 6, Swiss Centre for LCI, PSI, ESU-services Ltd., Duebendorf and Villigen, CH
Bolliger, R., Bauer, Ch. (2007) Wasserkraft. Sachbilanzen von Energiesystemen. Final report No. 6 ecoinvent data v2.0. Editors: Dones R.. Volume: 6. Swiss Centre for LCI, PSI. Dübendorf and Villigen, CH.
Type: Measurement on site
Source: CD-ROM
First author: Bolliger, R.
Other authors: Bauer, Ch.
Year: 2007
Name of editors: Dones R.
Title of anthology: Sachbilanzen von Energiesystemen. Final report No. 6 ecoinvent data v2.0
Place of publication: Dübendorf and Villigen, CH
Publisher: Swiss Centre for LCI, PSI
Volume No: 6
