# Water, completely softened, at plant

Dataset: EcoSpold 1, unit process
Functional unit: 1 kg
Category: water / industry water
Geography: RER
Time period: 1993-01 to 1991-12
Generated by: Niels Jungbluth
accessRestrictedTo: 0
copyright: true

## General comment
Rough estimation for the process.;
Formula: H2O;

## Included processes
Use of chemicals and some emissions for the treatment of water used in power plants.

## Technology
Water treatment by ion-exchanger for the use as cooling water in power plants.

## Time period
Time of publication.

## Reference product
- Water, completely softened, at plant [RER]: 1 kg
  Europe

## Inputs from technosphere
- Sodium hydroxide, 50% in H2O, production mix, at plant [RER]: 2.78e-7 kg; lognormal SD95 1.1
  (2,4,1,1,1,3); Literature information for a modern power plant
- Water, decarbonised, at plant [RER]: 1.05 kg; lognormal SD95 1.3
  (3,4,3,1,1,5); Estimation
- Transport, freight, rail [RER]: 9.11e-7 tkm; lognormal SD95 2.1
  (4,5,na,na,na,na); Standard distance 600km
- Transport, freight, lorry, fleet average [RER]: 1.52e-7 tkm; lognormal SD95 2.1
  (4,5,na,na,na,na); Standard distance 100km
- Treatment, sewage, unpolluted, to wastewater treatment, class 3 [CH]: 5e-5 m3; lognormal SD95 1.5
  (5,na,1,1,1,na); Estimation
- Hydrochloric acid, 30% in H2O, at plant [RER]: 1.24e-6 kg; lognormal SD95 1.1
  (2,4,1,1,1,3); Literature information for a modern power plant, split of old data

## Emissions to nature
- Chloride [emissions to water, river]: 1.24e-6 kg; lognormal SD95 1.6
  (3,4,3,1,1,5); Calculation
- AOX, Adsorbable Organic Halogen as Cl [emissions to water, river]: 2.5e-8 kg; lognormal SD95 1.6
  (3,4,3,1,1,5); Literature
- Sodium [emissions to water, river]: 2.78e-7 kg; lognormal SD95 1.6
  (3,4,3,1,1,5); Calculation

## Sampling procedure
Literature and information of plant manufacturer.

## Extrapolations
From single data to European situation.

## Sources
- Jungbluth N., 2007, 2007 - Crude oil - Jungbluth, Sachbilanzen von Energiesystemen. Final report No. 6 ecoinvent data v2.0, 6, Swiss Centre for LCI, ESU-services Ltd., Duebendorf and Uster, CH
Jungbluth, N. (2007) Erdöl. Sachbilanzen von Energiesystemen. Final report No. 6 ecoinvent data v2.0. Editors: Dones R.. Volume: 6. Swiss Centre for LCI, PSI. Dübendorf and Villigen, CH.
Type: Measurement on site
Source: CD-ROM
First author: Jungbluth, N.
Year: 2007
Name of editors: Dones R.
Title of anthology: Sachbilanzen von Energiesystemen. Final report No. 6 ecoinvent data v2.0
Place of publication: Dübendorf and Villigen, CH
Publisher: Swiss Centre for LCI, PSI
Volume No: 6

## Validation
Proof reading validation: passed.; Other validation: none;
