# Production efforts, inductors

Dataset: EcoSpold 1, unit process
Functional unit: 1 kg
Category: electronics / manufacturing
Geography: GLO
Time period: 2023-01 to 2029-12
Generated by: Lugas Raka Adrianto, Maulana Permana Ajie, Didier Beloin-Saint-Pierre
accessRestrictedTo: 0
copyright: false

## General comment
Data are a rough estimation of the average production efforts over all types of inductors. Data for auxillaries, energy, emissions and waste are ouf of an international LCI database plus estimations based on the production efforts of capacitors. Infrastructure and transportation efforts are based on own assumptions. Updates were made in 2023, showing that 20% energy reduction is achieved;

## Included processes
This module includes auxillary and energy consumption, emissions (air, water) and waste amounts, as well as an estimation of the efforts for transportation and of the infrastructure for the production of inductors.

## Geography
Data from literature and estimation based on capacitor production efforts – here representing the global situation for inductor production.

## Technology
average production comprising the following steps: core mounting; epxoy-curing; winding; welding; molding; marking; bending; testing and final control.

## Reference product
- Production efforts, inductors [GLO]: 1 kg
  Global

## Inputs from technosphere
- Acetone, liquid, at plant [RER]: 0.099 kg; lognormal SD95 1.65
  (3,4,4,1,4,5,BU:1.05); assumption from conclusion by analogy (using capacitors)
- Chemicals organic, at plant [GLO]: 0.099 kg; lognormal SD95 1.65
  (3,4,4,1,4,5,BU:1.05); assumption from conclusion by analogy (using capacitors)
- Electricity, medium voltage, production GLO, at grid [GLO]: 38.4 kWh; lognormal SD95 1.65
  (3,4,4,1,4,5,BU:1.05); value from literature
- Electronic component production plant [GLO]: 2e-8 p; lognormal SD95 3.85
  (4,5,4,3,5,5,BU:3.00); rough estimation of infrastructure
- Ethyl acetate from butane, at plant [RER]: 0.396 kg; lognormal SD95 1.65
  (3,4,4,1,4,5,BU:1.05); assumption from conclusion by analogy (using capacitors)
- Heat, natural gas, at industrial furnace 1MW [CH]: 0.07 MJ; lognormal SD95 1.65
  (3,4,4,1,4,5,BU:1.05); calculated from value in liteerature
- Methyl ethyl ketone from butane, at plant [RER]: 0.396 kg; lognormal SD95 1.65
  (3,4,4,1,4,5,BU:1.05); assumption from conclusion by analogy (using capacitors)
- Transport, freight, rail [RER]: 1.482 tkm; lognormal SD95 2.35
  (3,4,4,1,4,5,BU:2.00); standard distances
- Transport, freight, lorry, fleet average [RER]: 0.247 tkm; lognormal SD95 2.35
  (3,4,4,1,4,5,BU:2.00); standard distances
- Disposal, plastics, mixture, 15.3% water, to sanitary landfill [CH]: 0.24 kg; lognormal SD95 1.65
  (3,4,4,1,4,5,BU:1.05); assumption, based on literature & CER
- Disposal, solvents mixture, 16.5% water, to hazardous waste incineration [CH]: 0.65 kg; lognormal SD95 1.65
  (3,4,4,1,4,5,BU:1.05); average from literature & CER
- Disposal, waste, Si waferprod., inorg, 9.4% water, to residual material landfill [CH]: 0.24 kg; lognormal SD95 1.65
  (3,4,4,1,4,5,BU:1.05); assumption, based on literature & CER
- Treatment, sewage, to wastewater treatment, class 2 [CH]: 0.15 m3; lognormal SD95 1.65
  (3,4,4,1,4,5,BU:1.05); average from literature & CER

## Inputs from nature
- Water, cooling, unspecified natural origin/m3 [resources, in water]: 0.13 m3; lognormal SD95 1.9
  (3,4,4,1,4,5,BU:1.5); assumption from conclusion by analogy (using capacitors)
- Water, unspecified natural origin/m3 [resources, in water]: 0.15 m3; lognormal SD95 1.9
  (3,4,4,1,4,5,BU:1.5); average from literature & CER

## Emissions to nature
- Acetone [emissions to air, high. pop.]: 0.034 kg; lognormal SD95 2.35
  (3,4,4,1,4,5,BU:2.00); calculated from input of auxillaries
- Ethyl acetate [emissions to air, high. pop.]: 0.136 kg; lognormal SD95 2.35
  (3,4,4,1,4,5,BU:2.00); calculated from input of auxillaries
- Heat, waste [emissions to air, high. pop.]: 172.8 MJ; lognormal SD95 1.9
  (3,4,4,1,4,5,BU:1.50); calculated from electricity input
- Methyl ethyl ketone [emissions to air, high. pop.]: 0.136 kg; lognormal SD95 2.35
  (3,4,4,1,4,5,BU:2.00); calculated from input of auxillaries
- NMVOC, non-methane volatile organic compounds, unspecified origin [emissions to air, high. pop.]: 0.034 kg; lognormal SD95 1.9
  (3,4,4,1,4,5,BU:1.50); calculated from input of auxillaries
- Water [emissions to water, unspecified]: 123.5, 142.5 kg (2 entries); lognormal SD95 2.5196
  (5,5,5,5,5,BU:1.05); All uncertainty-values set to 5.0 by default. Balance of input water

## Sampling procedure
own estimation

## Extrapolations
see Geography & Technology

## Sources
- Raka Adrianto L., Permana Ajie M., Beloin-Saint-Pierre D., 2024, 2024 - LCI ICT sector - Raka Adrianto, Empa, St. Gallen, CH

## Validation
Proof reading validation: Passed, Other validation: none, Validator: Mischa Zschokke, Company: Carbotech, Country: CH
