# Waste wood chips, mixed, from industry, u=40%, at plant

Dataset: EcoSpold 1, unit process
Functional unit: 1 m3
Category: wood / byproducts
Geography: CH
Time period: 2004-01 to 2004-12
Production volume: Production of waste urban and demolition wood in CH in 2003 is 0.2 million m3.
Share of production covered: 1 %
Generated by: Edgard Gnansounou
accessRestrictedTo: 0
copyright: true

## General comment
The distribution of wood qualities between hard and soft wood is 28% hard wood and 72% soft wood. The volume refers to the bulked volume. The bulk density of wood chips is 239 and 169 kg/m3 of dry mass, for hard and soft wood respectively (i.e.188.6 kg/m3 of dry mass overall). Lower heating value = 3640 MJ/m3. Waste wood does not go through a specific treatment process.;

## Included processes
This process includes transport of waste urban and demolition wood to the chopping facility (50 km), infrastructure, chopping of the wood into chips in the sawmill, consumption of water and disposal of effluents and wastes from sorting. Includes also the carbon dioxide credit. No specific treatment of the wood is considered. The gross calorific value of the biomass is not included as the product comes from waste.

## Technology
Chopping of industrial residual wood in stationary electric chopper.

## Reference product
- Waste wood chips, mixed, from industry, u=40%, at plant [CH]: 1 m3
  SWITZERLAND

## Inputs from technosphere
- Treatment, particle board production effluent, to wastewater treatment, class 3 [CH]: 0.0082144 m3; lognormal SD95 1.238
  (1,4,2,1,1,5); Based on the data from a producer of waste wood chips in CH.
- Disposal, building wood, chrome preserved, 20% water, to municipal incineration [CH]: 0.28325 kg; lognormal SD95 1.238
  (1,4,2,1,1,5); Based on the data from a producer of waste wood chips in CH.
- Tap water, at user [CH]: 8.2144 kg; lognormal SD95 1.238
  (1,4,2,1,1,5); Based on the data from a producer of waste wood chips in CH.
- Wood chipping, industrial residual wood, stationary electric chipper [RER]: 188.6 kg; lognormal SD95 1.3223
  (3,5,1,2,3,na); Expert estimate
- Sawmill [RER]: 7.7999e-9 p; lognormal SD95 3.059
  (1,4,2,1,1,5); Based on the data from a producer of waste wood chips in CH.
- Transport, freight, lorry, 16t-32t gross weight, fleet average [CH]: 13.202 tkm; lognormal SD95 2.095
  (4,5,na,na,na,na); Based on ecoinvent Guidelines, standard distances

## Inputs from nature
- Carbon dioxide, in air [resources, in air]: 342 kg; lognormal SD95 1.3001
  (1,5,1,1,3,na); Calculated from composition of wood, and checked with carbon dioxide credit in other ecoinvent processes

## Sampling procedure
Federal office of statistics (CH) and IEA task 33 country reports.

## Sources
- Jungbluth N., Chudacoff M., Dauriat A., Dinkel F., Doka G., Faist Emmenegger M., Gnansounou E., Kljun N., Spielmann M., Stettler C., Sutter J., 2007, 2007 - LCI bioenergy - Jungbluth, Final report ecoinvent data v2.0, 17, Swiss Centre for LCI, ESU-services Ltd., Duebendorf and Uster, CH
Jungbluth N., Chudacoff M., Dauriat A., Dinkel F., Doka G., Faist Emmenegger M., Gnansounou E., Kljun N., Spielmann M., Stettler C., Sutter J. (2007) Life Cycle Inventories of Bioenergy. Final report ecoinvent data v2.0. Volume: 17. Swiss Centre for LCI, ESU. Duebendorf and Uster, CH.
Type: Measurement on site
Source: CD-ROM
First author: Jungbluth N.
Other authors: Chudacoff M., Dauriat A., Dinkel F., Doka G., Faist Emmenegger M., Gnansounou E., Kljun N., Spielmann M., Stettler C., Sutter J.
Year: 2007
Title of anthology: Final report ecoinvent data v2.0
Place of publication: Duebendorf and Uster, CH
Publisher: Swiss Centre for LCI, ESU
Volume No: 17

## Validation
Proof reading validation: Passed.; Other validation: none;
