# Rapeseed cultivation

Dataset: EcoSpold 1, unit process
Functional unit: 1 MJ
Category: fuels / biofuels\Ethanol\Transformation
Geography: RER
Time period: 2020-01 to 2020-12
Generated by: Romain Sacchi
accessRestrictedTo: 3
copyright: False

## General comment
Inventories on first, second and third generation biofuels production.Based on Masters thesis at PSI in 2018. Has not been thoroughly peer reviewed, though datasets have been used in several peer reviewed publications. Original source: Life Cycle Assessment of Biofuels in EU/CH, F. Cozzolini 2018, PSI.

## Time period
Base technology year of 2020

## Reference product
- Rapeseed cultivation [RER]: 1 MJ

## Inputs from technosphere
All rows: lognormal SD95 1.26103
- Natural gas, from medium pressure network (0.1-1 bar), at service station [CH]: 0.000132 kg
  Uncertainty from pedigree matrix: (3, 5, 3, 1, 1, 3)
- Diesel, at regional storage [RER]: 0.000897 kg
  Uncertainty from pedigree matrix: (3, 5, 3, 1, 1, 3)
- Limestone, at mine [CH]: 0.00405 kg
  Uncertainty from pedigree matrix: (3, 5, 3, 1, 1, 3)
- Potassium nitrate, as K2O, at regional storehouse [RER]: 0.00056 kg
  Uncertainty from pedigree matrix: (3, 5, 3, 1, 1, 3)
- Light fuel oil, at regional storage [RER]: 0.000153 kg
  Uncertainty from pedigree matrix: (3, 5, 3, 1, 1, 3)
- Nitro-compounds, at regional storehouse [RER]: 0.00184 kg
  Uncertainty from pedigree matrix: (3, 5, 3, 1, 1, 3)
- Ammonium nitrate phosphate, as P2O5, at regional storehouse [RER]: 0.00041 kg
  Uncertainty from pedigree matrix: (3, 5, 3, 1, 1, 3)
- Pesticide unspecified, at regional storehouse [CH]: 9e-5 kg
  Uncertainty from pedigree matrix: (3, 5, 3, 1, 1, 3)
- Rape seed conventional, at farm [DE]: 0.00036 kg
  Uncertainty from pedigree matrix: (3, 5, 3, 1, 1, 3)
- Transport, freight, rail [RER]: 0.000586 tkm
  Uncertainty from pedigree matrix: (3, 5, 3, 1, 1, 3)
- Transport, freight, lorry, 16t-32t gross weight, fleet average [RER]: 0.000582 tkm
  Uncertainty from pedigree matrix: (3, 5, 3, 1, 1, 3)
- Transport, barge tanker [RER]: 0.000703 tkm
  Uncertainty from pedigree matrix: (3, 5, 3, 1, 1, 3)

## Inputs from nature
- Energy, gross calorific value, in biomass [resources, biotic]: 1 MJ; lognormal SD95 1.26103
  Uncertainty from pedigree matrix: (3, 5, 3, 1, 1, 3)

## Emissions to nature
- Dinitrogen monoxide [emissions to air, unspecified]: 1.2e-7 kg; lognormal SD95 1.26103
  Uncertainty from pedigree matrix: (3, 5, 3, 1, 1, 3)

## Sources
- Sacchi R., Bauer C., 2023, 2023 - LCI on-road vehicles - Sacchi, PSI, Villigen, CH
doi: 10.5281/ZENODO.5156043
