# xxx Electricity, medium voltage, production CENTREL, at grid

Dataset: EcoSpold 1, unit process
Functional unit: 1 kWh
Category: electricity / notMaintained
Geography: CENTREL
Time period: 2000-01 to 2000-12
Generated by: René Itten
accessRestrictedTo: 0
copyright: true

## General comment
This dataset describes the transformation from high to medium voltage as well as the transmission of electricity at medium voltage.;

## Included processes
Included are the electricity production using , the transmission network and direct SF6-emissions to air. Electricity losses during medium-voltage transmission and transformation from high-voltage are accounted for.

## Geography
Data apply to public and self producers. Geographical classification according to IEA. Assumptions for transmission network, losses and emissions are based on Swiss data.

## Technology
Average technology used to transmit and distribute electricity. Includes underground and overhead lines, as well as air-, vacuum- and SF6-insulated high-to-medium voltage switching stations. Electricity production according to related datasets

## Time period
Statistics for 2008

## Reference product
- xxx Electricity, medium voltage, production CENTREL, at grid [CENTREL]: 1 kWh
  Central european power association

## Inputs from technosphere
- Sulphur hexafluoride, liquid, at plant [RER]: 1.13e-7 kg; lognormal SD95 1.078
  (1,1,2,1,1,3); based on emission data
- Transmission network, electricity, medium voltage [CH]: 1.86e-8 km; lognormal SD95 3.1614
  (3,1,4,5,3,5); based on consumption statistics
- xxx Electricity, high voltage, production CENTREL, at grid [CENTREL]: 1.0115 kWh; lognormal SD95 1.2355
  (3,1,1,1,3,1); specific losses of network estimated based on statistics

## Emissions to nature
- Heat, waste [emissions to air, unspecified]: 0.022774 MJ; lognormal SD95 1.3221
  (4,1,3,1,1,5); estimations based on losses
- Sulfur hexafluoride [emissions to air, unspecified]: 1.13e-7 kg; lognormal SD95 1.506
  (1,1,2,1,1,3); national statistics
- Heat, waste [emissions to soil, unspecified]: 0.018633 MJ; lognormal SD95 1.3221
  (4,1,3,1,1,5); estimations based on losses

## Sources
- Frischknecht R., Itten R., Flury K., 2012, 2012 - GHG emis. from Swiss elec. mixes - Frischknecht, Project reports, 401, ESU-services Ltd., Uster, CH
Itten, R., Frischknecht, R. (2012) Life Cycle Inventories of electricity mixes. Project reports. Volume: 401. ESU-services Ltd.. Uster, CH.
Type: Separate publication
First author: Itten, R.
Other authors: Frischknecht, R.
Year: 2012
Title of anthology: Project reports
Place of publication: Uster, CH
Publisher: ESU-services Ltd.
Volume No: 401

## Validation
Proof reading validation: 22.06.2012; Other validation: Z:\ESU-Docs\Projekte laufend\401 Update Strommix v3.0\EcoSpold\[401-electricity-mix-europe-RER-world-GLO-v1.0.xlsx]X-Process;
