# Crushing, rock

Dataset: EcoSpold 1, unit process
Functional unit: 1 kg
Category: Others / unspecified
Geography: RER
Time period: 2000-01 to 2000-12
Generated by: Daniel Kellenberger
accessRestrictedTo: 0
copyright: true

## General comment
Most data are taken from an LCA report and are based on a specific type of crusher (Nordberg HP 400 SX). The transportation distances are estimated and the transport requirements added. This module may not be used if having a high importance in a certain context. Crusher throughput capacity declared by the producer: 454 tons per hour;
Synonyms: Breaker;

## Included processes
Includes the machine, spares and wears, lubricating oil, and the transportation of the new parts to the assembly plant as well as transportation of the crusher to the operational sites. Electricity consumption and dust emissions are not included.

## Geography
Certain elementary flows or intermediate product flows are extrapolated from Swiss conditions.

## Technology
Rock crusher type Nordberg HP400 SX produced in the USA in 1999, used as basis

## Reference product
- Crushing, rock [RER]: 1 kg
  Europe

## Inputs from technosphere
- Cast iron, at plant [RER]: 7e-6 kg; lognormal SD95 1.38
  (1,5,1,3,3,5);
- Transport, freight, lorry, fleet average [RER]: 4.17e-7 tkm; lognormal SD95 2.32
  (5,5,1,1,1,5);
- Industrial machine, heavy, unspecified, at plant [RER]: 4.41e-7 kg; lognormal SD95 3.32
  (5,5,1,1,1,5);
- Lubricating oil, at plant [RER]: 4.5e-7 kg; lognormal SD95 1.38
  (1,5,1,3,3,5);

## Sampling procedure
most data from LCA study

## Extrapolations
See geography

## Sources
- Kellenberger D., Althaus H.-J., Jungbluth N., Kuenniger T., Lehmann M., Thalmann P., 2007, 2007 - LCI building products - Kellenberger, Final report ecoinvent data v2.0, 7, Swiss Centre for LCI, Empa - TSL, ESU-services Ltd., Bau- und Umweltchimie, Duebendorf, CH
Kellenberger D., Althaus H.-J., Jungbluth N., Künniger T. (2007) Life Cycle Inventories of Building Products. Final report ecoinvent data v2.0. Volume: 7. Swiss Centre for LCI, Empa - TSL. Dübendorf, CH.
Type: Measurement on site
Source: CD-ROM
First author: Kellenberger D.
Other authors: Althaus H.-J., Jungbluth N., Künniger T.
Year: 2007
Title of anthology: Final report ecoinvent data v2.0
Place of publication: Dübendorf, CH
Publisher: Swiss Centre for LCI, Empa - TSL
Volume No: 7

## Validation
Proof reading validation: passed; Other validation: none;
