# Electrolyzer production, 1MWe, SOEC, Stack

Dataset: EcoSpold 1, unit process
Functional unit: 1 p
Category: fuels / synthetic\infrastructure
Geography: RER
Time period: 2024-01 to 2024-01
Generated by: Romain Sacchi
accessRestrictedTo: 0
copyright: true

## General comment
1 MWe Solid Oxide electrolyzer based on Niklas Gerloff, Comparative Life-Cycle-Assessment analysis of three major water electrolysis technologies while applying various energy scenarios for a greener hydrogen production, Journal of Energy Storage, Volume 43, 2021, https://doi.org/10.1/j.est0.20.1. Stack lifetime of 20'000 hours or 2.5 years @ 8'000 hours/year. Produced amount of H2 over 20 years: 3,776,000 kg. Amounts of lanthanum oxide and strontium carbonate are unsure. Values have already account for 7 stack replacements over 20 years of use, excluding the initial component. For further secifications (e.g., efficiency, lifetime, etc.), refer to Sacchi, R. and Bauer, C. LCA of Power-to-X processes and applications in the residential sector. Paul Scherrer Institut, 2023.

## Reference product
- Electrolyzer production, 1MWe, SOEC, Stack [RER]: 1 p
  not defined

## Inputs from technosphere
- Transport, freight, rail [RER]: 1829 tkm; lognormal SD95 2.208
  Generic transport distances calculated based on Table 4.2 of the ecoinvent v.2 Methodology report. Distribution: 1306.54 kg over 1400.0 km.
- Transport, barge tanker [RER]: 33.63 tkm; lognormal SD95 2.208
  Generic transport distances calculated based on Table 4.2 of the ecoinvent v.2 Methodology report. Distribution: 48.04 kg over 700.0 km.
- Nickel, 99.5%, at plant [GLO]: 7.5 kg; lognormal SD95 1.329
  screen printing {2;4;1;3;3;5;1.05;}
- Electricity, low voltage, production GLO, at grid [GLO]: 366700 kWh; lognormal SD95 1.329
  assembly energy {2;4;1;3;3;5;1.05;}
- Silicone product, at plant [RER]: 6.4 kg; lognormal SD95 1.329
  electrolyte + H2 electrode {2;4;1;3;3;5;1.05;}
- Sheet rolling, chromium steel [RER]: 8976 kg; lognormal SD95 1.329
  air electrode {2;4;1;3;3;5;1.05;}
- xx Samarium europium gadolinium concentrate, 94% rare earth oxide, at plant [CN]: 22.9 kg; lognormal SD95 1.329
  screen printing {2;4;1;3;3;5;1.05;}
- Aluminium oxide, at plant [RER]: 6.4 kg; lognormal SD95 1.329
  electrolyte + H2 electrode {2;4;1;3;3;5;1.05;}
- Zirconium oxide, at plant [AU]: 170.7 kg; lognormal SD95 1.329
  blocking layer {2;4;1;3;3;5;1.05;}
- Boric oxide, at plant [GLO]: 6.4 kg; lognormal SD95 1.329
  electrolyte + H2 electrode {2;4;1;3;3;5;1.05;}
- Nickel, 99.5%, at plant [GLO]: 136.6 kg; lognormal SD95 1.329
  firing of cell {2;4;1;3;3;5;1.05;}
- xx Praseodymium oxide, at plant [CN]: 9 kg; lognormal SD95 1.329
  screen printing {2;4;1;3;3;5;1.05;}
- Lanthanum oxide, at plant [CN]: 21 kg; lognormal SD95 1.329
  electrolyte - to check {2;4;1;3;3;5;1.05;}
- Cerium concentrate, 60% cerium oxide, at plant [CN]: 91.5 kg; lognormal SD95 1.329
  screen printing {2;4;1;3;3;5;1.05;}
- Chromium steel 18/8, at plant [RER]: 8976 kg; lognormal SD95 1.329
  air electrode {2;4;1;3;3;5;1.05;}
- Transport, freight, lorry, 16t-32t gross weight, fleet average [RER]: 1115 tkm; lognormal SD95 2.208
  Generic transport distances calculated based on Table 4.2 of the ecoinvent v.2 Methodology report. Distribution: 237.25 kg over 4700.0 km.
- xx Samarium europium gadolinium concentrate, 94% rare earth oxide, at plant [CN]: 14.8 kg; lognormal SD95 1.329
  blocking layer {2;4;1;3;3;5;1.05;}

## Sampling procedure
Sampling procedure: Literature data

## Sources
- Sacchi R., Bauer C., 2024, 2024 - LCA power-to-X in residential sector - Sacchi, Project report, PSI, Villigen, CH

## Validation
Proof reading validation: Passed, Other validation: none, Validator: Rolf Frischknecht, Telephone: 0041 44 940 61 91, E-mail: frischknecht@treeze.ch, Company: treeze, Country: CH
