# Electric storage heater, per kg

Dataset: EcoSpold 1, unit process, infrastructure
Functional unit: 1 kg
Category: heat / heat pumps\heating systems
Geography: CH
Generated by: default
accessRestrictedTo: 0
copyright: true

## General comment
Inventory for the production of an electric storage heater, 5kW, usage at home, with a life time of 20 years and 2'100 hours of heating within one year. Efficiency of 100% is assumed.;
Synonyms: Elektrospeicherheizung;

## Included processes
Infrastructure of the electric storage heater, including all material input. Basic transportations of materials for the production included. No transportation to user, no end of life waste treatment included.

## Geography
Data apply to the supply in Switzerland. Production occurs at AEG Haustechnik / STIEBEL ELTRON GmbH & Co. KG (DE).

## Technology
Industry data.

## Time period
Materials and energy use based on AEG Nachtspeicherofen/ electric storage heater published in 2016.

## Reference product
- Electric storage heater, per kg [CH]: 1 kg
  SWITZERLAND

## Inputs from technosphere
- Electric storage heater, 5kW [CH]: 0.00625 p

## Sources
- Kaegi T., Waldburger L., Kern C., Roberts G., Zschokke M., Conte F., Weber L., 2021, 2021 - LCI heating systems - Kaegi, Carbotech im Auftrag des BAFU, Carbotech AG, Zuerich, CH
Kägi Thomas, Livia Waldburger, Cyril Kern, Gavin Roberts, Mischa Zschokke, Flora Conte, Lea Weber (2020) LCI of heating systems. Carbotech im Auftrag des BAFU. Carbotech AG. Zürich. CH.
Type: Separate publication
Source: Report
First author: Kägi Thomas
Other authors: Livia Waldburger, Cyril Kern, Gavin Roberts, Mischa Zschokke, Flora Conte, Lea Weber
Year: 2020
Title of anthology: Carbotech im Auftrag des BAFU
Place of publication: Zürich. CH
Publisher: Carbotech AG
