# Water supply network

Dataset: EcoSpold 1, unit process, infrastructure
Functional unit: 1 km
Category: water / drinking water\infrastructure
Geography: CH
Time period: 2000-01 to 2000-12
Production volume: 16040km are in use in CH.
Share of production covered: 10 %
Generated by: Niels Jungbluth
accessRestrictedTo: 0
copyright: true

## General comment
About 712 Mio m3 per year are transported in the Swiss water supply network. Life time 70 years.;

## Included processes
Materials, transports, disposal for the infrastructure. Estimation for building process. No land use for construction work.

## Technology
Supply network for drinking water.

## Time period
Time of publication.

## Reference product
- Water supply network [CH]: 1 km
  SWITZERLAND

## Inputs from technosphere
- Disposal, building, bitumen sheet, to final disposal [CH]: 535.09 kg; lognormal SD95 1.2226
  (2,3,1,1,1,5); Estimation for materials used
- Cast iron, at plant [RER]: 21278 kg; lognormal SD95 1.2226
  (2,3,1,1,1,5); Literature
- Tetrafluoroethylene, at plant [RER]: 0.059394 kg; lognormal SD95 1.2226
  (2,3,1,1,1,5); Literature
- Transport, freight, lorry, 16t-32t gross weight, fleet average [CH]: 1127.1 tkm; lognormal SD95 2.095
  (4,5,na,na,na,na); Standard distance 50km
- Synthetic rubber, at plant [RER]: 33.087 kg; lognormal SD95 1.2226
  (2,3,1,1,1,5); Literature
- Disposal, plastics, mixture, 15.3% water, to municipal incineration [CH]: 0.059394 kg; lognormal SD95 1.2226
  (2,3,1,1,1,5); Estimation for materials used
- Chromium steel 18/8, at plant [RER]: 12.273 kg; lognormal SD95 1.2226
  (2,3,1,1,1,5); Literature
- Diesel, burned in building machine, average [CH]: 29350 MJ; lognormal SD95 1.4145
  (3,5,3,1,3,5); Rough estimation with data for class 3 sewer system
- Excavation, hydraulic digger, average [CH]: 5447 m3; lognormal SD95 1.4145
  (3,5,3,1,3,5); Rough estimation with data for class 3 sewer system
- Transport, freight, rail, electricity with shunting [CH]: 13526 tkm; lognormal SD95 2.095
  (4,5,na,na,na,na); Standard distance 600km
- Brass, at plant [CH]: 2.1758 kg; lognormal SD95 1.2226
  (2,3,1,1,1,5); Literature
- Disposal, rubber, unspecified, 0% water, to municipal incineration [CH]: 33.087 kg; lognormal SD95 1.2226
  (2,3,1,1,1,5); Estimation for materials used
- Polyurethane, rigid foam, at plant [RER]: 535.09 kg; lognormal SD95 1.2226
  (2,3,1,1,1,5); Literature
- Disposal, polyurethane, 0.2% water, to municipal incineration [CH]: 535.09 kg; lognormal SD95 1.2226
  (2,3,1,1,1,5); Estimation for materials used
- Disposal, building, reinforcement steel, to sorting plant [CH]: 21278 kg; lognormal SD95 1.2226
  (2,3,1,1,1,5); Estimation for materials used
- Zinc, primary, at regional storage [RER]: 146.67 kg; lognormal SD95 1.2226
  (2,3,1,1,1,5); Literature
- Bitumen sealing, at plant [RER]: 535.09 kg; lognormal SD95 1.2226
  (2,3,1,1,1,5); Literature

## Sampling procedure
Literature and own estimations

## Extrapolations
From single data to Swiss situation.

## Sources
- Althaus H.-J., Chudacoff M., Hellweg S., Hischier R., Jungbluth N., Osses M., Primas A., 2007, 2007 - LCI chemicals - Althaus, Final report ecoinvent data v2.0, 8, Swiss Centre for LCI, Empa - TSL, ETH, ESU-services Ltd., Chudacoff Oekoscience, Duebendorf, CH
Althaus H.-J., Chudacoff M., Hischier R., Jungbluth N., Osses M., Primas A. (2007) Life Cycle Inventories of Chemicals. Final report ecoinvent data v2.0. Volume: 8. Swiss Centre for LCI, Empa - TSL. Dübendorf, CH.
Type: Measurement on site
Source: CD-ROM
First author: Althaus H.-J.
Other authors: Chudacoff M., Hischier R., Jungbluth N., Osses M., Primas A.
Year: 2007
Title of anthology: Final report ecoinvent data v2.0
Place of publication: Dübendorf, CH
Publisher: Swiss Centre for LCI, Empa - TSL
Volume No: 8

## Validation
Proof reading validation: Passed; Other validation: none;
