# Acrylic binder, 34% in H2O, at plant

Dataset: EcoSpold 1, unit process
Functional unit: 1 kg
Category: chemicals / organic
Geography: RER
Time period: 2000-01 to 2000-12
Generated by: Maggie Osses
accessRestrictedTo: 0
copyright: true

## General comment
Manufacturing process is considered with consumption of raw materials, energy, infrastructure and land use, as well as generation of solid wastes and emissions into air and water. Transport of the raw materials and solid wastes is included. No by-product is generated in the process. Transportation and consumption of auxiliaries are not included due to the lack of data. Transport and storage of the final product are not included. Transient or unstable operations are not considered, but the production during stable operation conditions. Emissions to air are considered as emanating in a high population density area. Emissions into water are assumed to be emitted into rivers. Solid wastes are assumed to be sent to hazardous waste incineration. Inventory refers to 1 kg 100% acrylic binder. The literature source is von Däniken et al. 1995.;

## Geography
The literature source used bases on information provided by European manufacturing companies. No further information is available on the location and characteristics of these manufacturers. Therefore, the representativeness of these values for the European acrylic binder industry is unknown.

## Time period
literature bases on data from the 1990s.

## Reference product
- Acrylic binder, 34% in H2O, at plant [RER]: 1 kg
  Europe

## Inputs from technosphere
- Heat, heavy fuel oil, at industrial furnace 1MW [RER]: 0.22 MJ; lognormal SD95 1.65
  (3,5,5,3,1,5); data from survey in literature (von Däniken et al. 1995)
- Hard coal, burned in industrial furnace 1-10MW [RER]: 0.37 MJ; lognormal SD95 1.65
  (3,5,5,3,1,5); data from survey in literature (von Däniken et al. 1995)
- Chemical plant, organics [RER]: 4e-10 p; lognormal SD95 3.96
  (4,1,5,3,5,4); estimation
- Butyl acrylate, at plant [RER]: 0.074 kg; lognormal SD95 1.65
  (3,5,5,3,1,5); data from survey in literature (von Däniken et al. 1995)
- Heat, light fuel oil, at industrial furnace 1MW [RER]: 0.05 MJ; lognormal SD95 1.65
  (3,5,5,3,1,5); data from survey in literature (von Däniken et al. 1995)
- Natural gas, burned in industrial furnace 1MWth [CH]: 0.55 MJ; lognormal SD95 1.65
  (3,5,5,3,1,5); data from survey in literature (von Däniken et al. 1995)
- Transport, freight, rail [RER]: 0.281 tkm; lognormal SD95 2.05
  (4,na,na,na,na,na); standard distances
- Electricity, medium voltage, production ENTSO-E, at grid: 0.1 kWh; lognormal SD95 1.65
  (3,5,5,3,1,5); data from survey in literature (von Däniken et al. 1995)
- Disposal, paint remains, 0% water, to hazardous waste incineration [CH]: 0.03 kg; lognormal SD95 2.29
  (3,5,5,3,1,5); data from survey in literature (von Däniken et al. 1995)
- Transport, freight, lorry, fleet average [RER]: 0.0472 tkm; lognormal SD95 2.05
  (4,na,na,na,na,na); standard distances
- Esters of versatic acid, at plant [RER]: 0.125 kg; lognormal SD95 1.65
  (3,5,5,3,1,5); data from survey in literature (von Däniken et al. 1995)
- Vinyl acetate, at plant [RER]: 0.27 kg; lognormal SD95 1.65
  (3,5,5,3,1,5); data from survey in literature (von Däniken et al. 1995)

## Inputs from nature
- Water, unspecified natural origin/m3 [resources, in water]: 0.00046 m3; lognormal SD95 1.65
  (3,5,5,3,1,5); data from survey in literature (von Däniken et al. 1995)

## Emissions to nature
- Suspended solids, unspecified [emissions to water, river]: 0.00036, 2.1e-5 kg (2 entries); lognormal SD95 1.9
  (3,5,5,3,1,5); data from survey in literature (von Däniken et al. 1995)
- COD, Chemical Oxygen Demand [emissions to water, river]: 0.00017 kg; lognormal SD95 1.9
  (3,5,5,3,1,5); data from survey in literature (von Däniken et al. 1995)
- Heat, waste [emissions to air, high. pop.]: 0.36 MJ; lognormal SD95 1.65
  (3,5,5,3,1,5); calculated from electricity input
- TOC, Total Organic Carbon [emissions to water, river]: 4e-5 kg; lognormal SD95 1.9
  (3,5,5,3,1,5); data from survey in literature (von Däniken et al. 1995)
- BOD5, Biological Oxygen Demand [emissions to water, river]: 1.8e-5 kg; lognormal SD95 1.9
  (3,5,5,3,1,5); data from survey in literature (von Däniken et al. 1995)
- DOC, Dissolved Organic Carbon [emissions to water, river]: 1.1e-5 kg; lognormal SD95 1.9
  (3,5,5,3,1,5); data from survey in literature (von Däniken et al. 1995)
- Hydrocarbons, aliphatic, alkanes, unspecified [emissions to air, high. pop.]: 7e-5 kg; lognormal SD95 2.12
  (3,5,5,3,1,5); data from survey in literature (von Däniken et al. 1995)
- Water [emissions to water, unspecified]: 0.437 kg; lognormal SD95 2.5196
  (5,5,5,5,5,BU:1.05); All uncertainty-values set to 5.0 by default. Balance of input water

## Sampling procedure
Sampling procedure: see geography

## Extrapolations
Transports based on standard distances of Ecoinvent. Infrastructure: proxy module used (chemical plant, organics)

## Sources
- Althaus H.-J., Chudacoff M., Hellweg S., Hischier R., Jungbluth N., Osses M., Primas A., 2007, 2007 - LCI chemicals - Althaus, Final report ecoinvent data v2.0, 8, Swiss Centre for LCI, Empa - TSL, ETH, ESU-services Ltd., Chudacoff Oekoscience, Duebendorf, CH
Althaus H.-J., Chudacoff M., Hischier R., Jungbluth N., Osses M., Primas A. (2007) Life Cycle Inventories of Chemicals. Final report ecoinvent data v2.0. Volume: 8. Swiss Centre for LCI, Empa - TSL. Dübendorf, CH.
Type: Measurement on site
Source: CD-ROM
First author: Althaus H.-J.
Other authors: Chudacoff M., Hischier R., Jungbluth N., Osses M., Primas A.
Year: 2007
Title of anthology: Final report ecoinvent data v2.0
Place of publication: Dübendorf, CH
Publisher: Swiss Centre for LCI, Empa - TSL
Volume No: 8

## Validation
Proof reading validation: Passed.; Other validation: none;
