# Acetamide-anillide-compounds, at regional storehouse

Dataset: EcoSpold 1, unit process
Functional unit: 1 kg
Category: chemicals / pesticides
Geography: RER
Time period: 1987-01 to 1987-12
Share of production covered: 100 %
Generated by: Juergen Sutter
accessRestrictedTo: 0
copyright: true

## General comment
Production of acetamide-anilide-compounds including materials, energy uses, infrastructure and emissions.;

## Geography
The inventory is modelled for Europe.

## Technology
pesticides

## Time period
Time of publications

## Reference product
- Acetamide-anillide-compounds, at regional storehouse [RER]: 1 kg
  Europe

## Inputs from technosphere
- Chemical plant, organics [RER]: 2.9509e-9 p; lognormal SD95 3.0909
  (4,5,na,na,na,na); Estimation
- Hydrogen fluoride, at plant [GLO]: 0.043625 kg; lognormal SD95 1.3765
  (4,5,1,1,1,5); Stoechiometric calculation
- Secondary sulphur, at refinery [RER]: 0.026816 kg; lognormal SD95 1.3765
  (4,5,1,1,1,5); Stoechiometric calculation
- Trichloromethane, at plant [RER]: 0.10605 kg; lognormal SD95 1.3765
  (4,5,1,1,1,5); Stoechiometric calculation
- Toluene, liquid, at plant [RER]: 0.19523 kg; lognormal SD95 1.3765
  (4,5,1,1,1,5); Stoechiometric calculation
- Acetaldehyde, at plant [RER]: 0.093245 kg; lognormal SD95 1.3765
  (4,5,1,1,1,5); Stoechiometric calculation
- Ethylene, average, at plant [RER]: 0.17083 kg; lognormal SD95 1.3765
  (4,5,1,1,1,5); Stoechiometric calculation
- Methanol, at plant [GLO]: 0.12337 kg; lognormal SD95 1.3765
  (4,5,1,1,1,5); Stoechiometric calculation
- Electricity, medium voltage, production ENTSO-E, at grid: 2.1115 kWh; lognormal SD95 1.3765
  (4,5,1,1,1,5); Estimation
- Cumene, at plant [RER]: 0.21942 kg; lognormal SD95 1.3765
  (4,5,1,1,1,5); Stoechiometric calculation
- Transport, freight, rail [RER]: 5.6828 tkm; lognormal SD95 2.095
  (4,5,na,na,na,na); Standard distances
- Sulphuric acid, liquid, at plant [RER]: 0.25107 kg; lognormal SD95 1.3765
  (4,5,1,1,1,5); Stoechiometric calculation
- Carbon monoxide, CO, at plant [RER]: 0.11396 kg; lognormal SD95 1.3765
  (4,5,1,1,1,5); Stoechiometric calculation
- Sodium hypochlorite, 15% in H2O, at plant [RER]: 0.073694 kg; lognormal SD95 1.3765
  (4,5,1,1,1,5); Stoechiometric calculation
- Hydrochloric acid, 30% in H2O, at plant [RER]: 0.20462 kg; lognormal SD95 1.3765
  (4,5,1,1,1,5); Stoechiometric calculation
- Xylene, at plant [RER]: 0.21083 kg; lognormal SD95 1.3765
  (4,5,1,1,1,5); Stoechiometric calculation
- P-dichlorobenzene, at plant [RER]: 0.065649 kg; lognormal SD95 1.3765
  (4,5,1,1,1,5); Stoechiometric calculation
- Phosgene, liquid, at plant [RER]: 0.10614 kg; lognormal SD95 1.3765
  (4,5,1,1,1,5); Stoechiometric calculation
- Oxygen, liquid, at plant [RER]: 0.058511 kg; lognormal SD95 1.3765
  (4,5,1,1,1,5); Stoechiometric calculation
- Nitrobenzene, at plant [RER]: 0.079679 kg; lognormal SD95 1.3765
  (4,5,1,1,1,5); Stoechiometric calculation
- Sodium hydroxide, 50% in H2O, production mix, at plant [RER]: 1.0032 kg; lognormal SD95 1.3765
  (4,5,1,1,1,5); Stoechiometric calculation
- Nitric acid, 50% in H2O, at plant [RER]: 0.50259 kg; lognormal SD95 1.3765
  (4,5,1,1,1,5); Stoechiometric calculation
- Sulphur dioxide, liquid, at plant [RER]: 0.053632 kg; lognormal SD95 1.3765
  (4,5,1,1,1,5); Stoechiometric calculation
- Acetic anhydride, at plant [RER]: 0.16479 kg; lognormal SD95 1.3765
  (4,5,1,1,1,5); Stoechiometric calculation
- Transport, freight, lorry, fleet average [RER]: 0.98028 tkm; lognormal SD95 2.095
  (4,5,na,na,na,na); Standard distances
- Disposal, inert waste, 5% water, to construction waste landfill [CH]: 0.21925 kg; lognormal SD95 1.3765
  (4,5,1,1,1,5); Stoechiometric calculation
- Chlorine, liquid, production mix, at plant [RER]: 0.76645 kg; lognormal SD95 1.3765
  (4,5,1,1,1,5); Stoechiometric calculation
- Hydrogen sulphide, H2S, at plant [RER]: 0.026623 kg; lognormal SD95 1.3765
  (4,5,1,1,1,5); Stoechiometric calculation
- Water, decarbonised, at plant [RER]: 0.082314 kg; lognormal SD95 1.3765
  (4,5,1,1,1,5); Stoechiometric calculation
- Ammonia, liquid, at regional storehouse [RER]: 0.053252 kg; lognormal SD95 1.3765
  (4,5,1,1,1,5); Stoechiometric calculation
- Propylene oxide, liquid, at plant [RER]: 0.038939 kg; lognormal SD95 1.3765
  (4,5,1,1,1,5); Stoechiometric calculation
- Hydrogen, liquid, at plant [RER]: 0.021403 kg; lognormal SD95 1.3765
  (4,5,1,1,1,5); Stoechiometric calculation
- Ethylenediamine, at plant [RER]: 0.042639 kg; lognormal SD95 1.3765
  (4,5,1,1,1,5); Stoechiometric calculation
- Naphtha, APME mix, at refinery [RER]: 0.078699 kg; lognormal SD95 1.3765
  (4,5,1,1,1,5); Stoechiometric calculation
- Hydrogen cyanide, at plant [RER]: 0.021142 kg; lognormal SD95 1.3765
  (4,5,1,1,1,5); Stoechiometric calculation
- Acetone, liquid, at plant [RER]: 0.074053 kg; lognormal SD95 1.3765
  (4,5,1,1,1,5); Stoechiometric calculation
- Heat, unspecific, in chemical plant [RER]: 21.418 MJ; lognormal SD95 1.3765
  (4,5,1,1,1,5); Estimation

## Inputs from nature
- Bromine [resources, in water]: 0.10355 kg; lognormal SD95 1.3765
  (4,5,1,1,1,5); Stoechiometric calculation
- Water, salt, sole [resources, in water]: 4.5022 m3; lognormal SD95 1.3765
  (4,5,1,1,1,5); Stoechiometric calculation
- Water, cooling, unspecified natural origin/m3 [resources, in water]: 0.18047 m3; lognormal SD95 1.3765
  (4,5,1,1,1,5); Estimation

## Emissions to nature
- Toluene, 2-chloro- [emissions to water, river]: 0.00031402 kg; lognormal SD95 3.0909
  (4,5,na,na,na,na); Estimation
- Sulfur dioxide [emissions to air, high. pop.]: 0.24739 kg; lognormal SD95 1.3001
  (4,5,na,na,na,na); Estimation
- Propionic acid [emissions to water, river]: 0.00050802 kg; lognormal SD95 3.0909
  (4,5,na,na,na,na); Estimation
- Ethylene oxide [emissions to water, river]: 0.00062516 kg; lognormal SD95 3.0909
  (4,5,na,na,na,na); Estimation
- Sodium [emissions to water, river]: 0.55802 kg; lognormal SD95 5.1037
  (4,5,na,na,na,na); Estimation
- Methanol [emissions to water, river]: 0.000686 kg; lognormal SD95 3.0909
  (4,5,na,na,na,na); Estimation
- Diethylamine [emissions to water, river]: 0.00020467 kg; lognormal SD95 3.0909
  (4,5,na,na,na,na); Estimation
- Acetone [emissions to water, river]: 0.00049292 kg; lognormal SD95 3.0909
  (4,5,na,na,na,na); Estimation
- Methanol [emissions to air, high. pop.]: 0.0001537 kg; lognormal SD95 1.6169
  (4,5,na,na,na,na); Estimation
- Propylene oxide [emissions to air, high. pop.]: 7.7877e-5 kg; lognormal SD95 1.6169
  (4,5,na,na,na,na); Estimation
- Chloride [emissions to water, river]: 0.88897 kg; lognormal SD95 3.0909
  (4,5,na,na,na,na); Estimation
- Chloramine [emissions to water, river]: 0.00086111 kg; lognormal SD95 3.0909
  (4,5,na,na,na,na); Estimation
- Acetone [emissions to air, high. pop.]: 0.00014209 kg; lognormal SD95 1.6169
  (4,5,na,na,na,na); Estimation
- Toluene [emissions to water, river]: 0.00055572 kg; lognormal SD95 3.0909
  (4,5,na,na,na,na); Estimation
- Toluene [emissions to air, high. pop.]: 0.0017419 kg; lognormal SD95 1.6169
  (4,5,na,na,na,na); Estimation
- Sulfate [emissions to water, river]: 0.06548 kg; lognormal SD95 1.6169
  (4,5,na,na,na,na); Estimation
- Carbon dioxide, fossil [emissions to air, high. pop.]: 0.663 kg; lognormal SD95 1.3001
  (4,5,na,na,na,na); Estimation
- Acetaldehyde [emissions to air, high. pop.]: 0.00018649 kg; lognormal SD95 1.6169
  (4,5,na,na,na,na); Estimation
- Nitrate [emissions to water, river]: 0.022987 kg; lognormal SD95 1.6169
  (4,5,na,na,na,na); Estimation
- Chloramine [emissions to air, high. pop.]: 9.6499e-5 kg; lognormal SD95 1.6169
  (4,5,na,na,na,na); Estimation
- Acetic acid [emissions to water, river]: 0.0018662 kg; lognormal SD95 3.0909
  (4,5,na,na,na,na); Estimation
- Formaldehyde [emissions to air, high. pop.]: 3.6091e-5 kg; lognormal SD95 1.6169
  (4,5,na,na,na,na); Estimation
- Chlorine [emissions to air, high. pop.]: 0.046974 kg; lognormal SD95 1.6169
  (4,5,na,na,na,na); Estimation
- Chloroacetic acid [emissions to air, high. pop.]: 0.00034954 kg; lognormal SD95 1.6169
  (4,5,na,na,na,na); Estimation
- Acetic acid [emissions to air, high. pop.]: 3.7399e-5 kg; lognormal SD95 1.6169
  (4,5,na,na,na,na); Estimation
- Hydrogen [emissions to air, high. pop.]: 0.0037307 kg; lognormal SD95 1.6169
  (4,5,na,na,na,na); Estimation
- Ammonium, ion [emissions to water, river]: 0.0012781 kg; lognormal SD95 1.6169
  (4,5,na,na,na,na); Estimation
- Sulfur [emissions to water, river]: 0.0033912 kg; lognormal SD95 1.6169
  (4,5,na,na,na,na); Estimation
- Nitrogen oxides [emissions to air, high. pop.]: 0.067476 kg; lognormal SD95 1.6169
  (4,5,na,na,na,na); Estimation
- Phenol [emissions to water, river]: 0.00022278 kg; lognormal SD95 3.0909
  (4,5,na,na,na,na); Estimation
- 2-Aminopropanol [emissions to water, river]: 0.0002296 kg; lognormal SD95 3.0909
  (4,5,na,na,na,na); Estimation
- Phenol [emissions to air, high. pop.]: 4.1539e-5 kg; lognormal SD95 1.6169
  (4,5,na,na,na,na); Estimation
- Ammonia [emissions to air, high. pop.]: 0.0001065 kg; lognormal SD95 1.3713
  (4,5,na,na,na,na); Estimation
- Bromide [emissions to water, river]: 0.047349 kg; lognormal SD95 5.1037
  (4,5,na,na,na,na); Estimation
- Fluoride [emissions to water, river]: 0.0020722 kg; lognormal SD95 1.6169
  (4,5,na,na,na,na); Estimation
- Chloroacetyl chloride [emissions to water, river]: 0.00030622 kg; lognormal SD95 3.0909
  (4,5,na,na,na,na); Estimation
- Diethylamine [emissions to air, high. pop.]: 8.5278e-5 kg; lognormal SD95 1.6169
  (4,5,na,na,na,na); Estimation
- Ethene [emissions to air, high. pop.]: 0.00034167 kg; lognormal SD95 1.6169
  (4,5,na,na,na,na); Estimation
- Heat, waste [emissions to air, high. pop.]: 7.7728 MJ; lognormal SD95 1.3765
  (4,5,1,1,1,5); Calculated from the electricity input
- Carbon monoxide, fossil [emissions to air, high. pop.]: 0.00022791 kg; lognormal SD95 5.1037
  (4,5,na,na,na,na); Estimation
- Acetaldehyde [emissions to water, river]: 0.00033568 kg; lognormal SD95 3.0909
  (4,5,na,na,na,na); Estimation
- Toluene, 2-chloro- [emissions to air, high. pop.]: 0.00013084 kg; lognormal SD95 1.6169
  (4,5,na,na,na,na); Estimation
- 2-Aminopropanol [emissions to air, high. pop.]: 9.5668e-5 kg; lognormal SD95 1.6169
  (4,5,na,na,na,na); Estimation
- Hydrogen sulfide [emissions to air, high. pop.]: 5.3246e-5 kg; lognormal SD95 1.6169
  (4,5,na,na,na,na); Estimation
- Formaldehyde [emissions to water, river]: 3.6091e-5 kg; lognormal SD95 3.0909
  (4,5,na,na,na,na); Estimation
- Propionic acid [emissions to air, high. pop.]: 0.00021168 kg; lognormal SD95 1.6169
  (4,5,na,na,na,na); Estimation
- Propylene oxide [emissions to water, river]: 0.0001869 kg; lognormal SD95 3.0909
  (4,5,na,na,na,na); Estimation
- Chloroacetic acid [emissions to water, river]: 0.056781 kg; lognormal SD95 3.0909
  (4,5,na,na,na,na); Estimation
- Water [emissions to water, unspecified]: 171.446 kg; lognormal SD95 2.5196
  (5,5,5,5,5,BU:1.05); All uncertainty-values set to 5.0 by default. Balance of input water

## Sampling procedure
Literature data

## Extrapolations
Transports and emissions are modelled with standard methods.

## Sources
- Sutter J., 2007, 2007 - LCI petrochemical solvents - Sutter, Final report ecoinvent Data v2.0, 22, Swiss Centre for LCI, ETH, Duebendorf and Uster, CH
Sutter, J., 0 (2007) Life Cycle Inventories of Petrochemical Solvents. Final report ecoinvent Data v2.0. Editors: 0. 0. Volume: 22. Issue: 0. Swiss Centre for LCI, ETHZ. Duebendorf and St. Gallen, CH.
Type: Measurement on site
Source: CD-ROM
First author: Sutter, J.
Other authors: 0
Year: 2007
Name of editors: 0
Title of anthology: Final report ecoinvent Data v2.0
Place of publication: Duebendorf and St. Gallen, CH
Publisher: Swiss Centre for LCI, ETHZ
Journal: 0
Volume No: 22
Issue No: 0

## Validation
Proof reading validation: Passed.; Other validation: none;
