# Molybdenum, at regional storage

Dataset: EcoSpold 1, unit process
Functional unit: 1 kg
Category: metals / non ferro
Geography: RER
Time period: 2000-01 to 2000-12
Generated by: Hans-Joerg Althaus
accessRestrictedTo: 0
copyright: true

## General comment
Molybdenum is used e.g. in catalytic converters. It is not used for alloying steel. For this, molybdenum trioxide or molybdenite is used. For a lack of specific data, the metallurgical process of the zinc production is used as a proxy. Only the input of the concentrate is adapted. Although zinc and molybdenum concentrate are both sulfidic and the metal content is almost the same, this is a crude assumption and the data quality therefore is poor.;
Formula: Mo;

## Included processes
The module includes the production of high grade primary molybdenum by pyro- and hydrometallurgical processes, the disposal of the slag and the treatment of the waste water.

## Technology
A mix of 80% hydrometallurgical and 20% pyrometallurgical production of zinc is chosen to represent the molybdenum production

## Reference product
- Molybdenum, at regional storage [RER]: 1 kg
  Europe

## Inputs from technosphere
- Zinc, primary, at regional storage [RER]: 1 kg; lognormal SD95 2.1454
  (4,5,1,2,5,5,4)
- Resource correction, PbZn, indium, positive [GLO]: 0.00065916 kg; lognormal SD95 1
  exact amount inventoried in zinc production
- Zinc concentrate, at beneficiation [GLO]: -1.9028 kg; lognormal SD95 1
  exact amount inventoried in zinc production
- Molybdenite, at plant [GLO]: 1.8336 kg; lognormal SD95 2.1454
  (4,5,1,2,5,5,12)
- Resource correction, PbZn, cadmium, positive [GLO]: 0.03955 kg; lognormal SD95 1
  exact amount inventoried in zinc production

## Sampling procedure
literature

## Extrapolations
see Technology

## Sources
- Classen M., Althaus H.-J., Blaser S., Scharnhorst W., Tuchschmid M., Jungbluth N., Faist Emmenegger M., 2009, 2009 - LCI metals - Classen, Final report ecoinvent data v2.1, 10, Swiss Centre for LCI, Empa, ESU-services Ltd., Duebendorf, CH
Classen M., Althaus H.-J., Blaser S., Doka G., Jungbluth N., Tuchschmid M. (2008) Life Cycle Inventories of Metals. Final report ecoinvent data v2.1. Volume: 10. Issue: 0. Swiss Centre for LCI, Empa - TSL. Dübendorf, CH.
Type: Measurement on site
Source: CD-ROM
First author: Classen M.
Other authors: Althaus H.-J., Blaser S., Doka G., Jungbluth N., Tuchschmid M.
Year: 2008
Title of anthology: Final report ecoinvent data v2.1
Place of publication: Dübendorf, CH
Publisher: Swiss Centre for LCI, Empa - TSL
Volume No: 10
Issue No: 0

## Validation
Proof reading validation: validated in version 1; Other validation: none;
