# Heat, from sewage heat exchanger

Dataset: EcoSpold 1, unit process
Functional unit: 1 MJ
Category: energy supply, kbob recommendation / heat pumps, waste water
Geography: CH
Time period: 2004-01 to 2004-12
Share of production covered: 0 %
Generated by: Matthias Tuchschmid
accessRestrictedTo: 0
copyright: true

## General comment
This data set describes the generation of heat.;

## Included processes
This data set includes energa and material requirements for the generation of heat from waste water

## Geography
This data represent the production in Switzerland.

## Technology
Data set for generation heat with a brine-water heat pump from sewage water

## Time period
Actual data.

## Reference product
- Heat, from sewage heat exchanger [CH]: 1 MJ

## Inputs from technosphere
- Construction work, coolant circuit [CH]: 1.4423e-8 p; lognormal SD95 1.2077
  (1,1,1,1,3,1); Questionnaire
- Heat exchanger, heat pump Limmatschulhaus [CH]: 1.4423e-8 p; lognormal SD95 1.2077
  (1,1,1,1,3,1); Questionnaire
- Electricity, medium voltage, at grid [CH]: 0.081343 kWh; lognormal SD95 1.2077
  (1,1,1,1,3,1); Questionnaire
- Disposal, heat pump, Limmatschulhaus [CH]: 2.8845e-8 p; lognormal SD95 1.2077
  (1,1,1,1,3,1); Questionnaire
- Heat pump Limmatschulhaus [CH]: 2.8845e-8 p; lognormal SD95 1.2077
  (1,1,1,1,3,1); Questionnaire
- Refrigerant R134a, at plant [RER]: 2.5961e-7 kg; lognormal SD95 1.2252
  (1,3,2,1,3,3); Literature

## Emissions to nature
- Ethane, 1,1,1,2-tetrafluoro-, HFC-134a [emissions to air, high. pop.]: 2.5961e-7 kg; lognormal SD95 1.5697
  (1,3,2,1,3,3); Literature

## Sources
- Faist Emmenegger M., Frischknecht R., 2005, 2005 - LCA heat pump raw sewage - Faist Emmenegger, -, ESU-services Ltd., Uster, CH
Rolf Frischknecht, Mireille Faist Emmenegger (2004) Nutzwärmebereitstellung mit Wärmepumpe für Rohabwasser. Uster.
Type: Separate publication
Source: Interner Bericht
First author: Rolf Frischknecht
Other authors: Mireille Faist Emmenegger
Year: 2004
Place of publication: Uster

## Validation
Proof reading validation: automatic validation in Excel; Other validation: none;
