# Coating powder, at plant

Dataset: EcoSpold 1, unit process
Functional unit: 1 kg
Category: chemicals / others
Geography: RER
Time period: 2000-01 to 2000-12
Generated by: Hans-Joerg Althaus
accessRestrictedTo: 0
copyright: true

## General comment
A 1:1 mixture of epoxy and polyester resin is assumed. Powders of this composition are mainly used for exterior architectural applications. The pigment inventoried is TiO2. Other pigments (and thus other colours) could have very different ecoprofiles. Since many different powders are available on the market, the representation of a specific powder can be poor.;

## Included processes
Powder fabrication and packing in buckets. The functional unit refers to 1 kg of powder. For transports the buckets (0.0133 kg/kg powder) have to be taken into account separately

## Geography
Swiss waste treatment assumed

## Technology
Extrusion and grinding. This technology is commonly used with thermosetting powders.

## Reference product
- Coating powder, at plant [RER]: 1 kg
  Europe

## Inputs from technosphere
- Disposal, emulsion paint remains, 0% water, to hazardous waste incineration [CH]: 0.01 kg; lognormal SD95 2.56
  (5,5,5,5,5,5,6)
- Epoxy resin, liquid, at plant [RER]: 0.293 kg; lognormal SD95 1.24
  (3,3,1,1,1,5,4)
- Extrusion, plastic pipes [RER]: 1.02 kg; lognormal SD95 1.33
  (3,3,1,1,3,5,2)
- Polyester resin, unsaturated, at plant [RER]: 0.293 kg; lognormal SD95 1.24
  (3,3,1,1,1,5,4)
- Transport, freight, lorry, fleet average [RER]: 0.102 tkm; lognormal SD95 2.09
  (4,5,n.a.,n.a.,n.a.,n.a.,5)
- Chemicals organic, at plant [GLO]: 0.0697 kg; lognormal SD95 1.24
  (3,3,1,1,1,5,4)
- Chemical plant, organics [RER]: 4e-10 p; lognormal SD95 3
  (5,5,5,5,5,5,10)
- Transport, freight, rail [RER]: 0.614 tkm; lognormal SD95 2.09
  (4,5,n.a.,n.a.,n.a.,n.a.,5)
- Electricity, medium voltage, production ENTSO-E, at grid: 1.83 kWh; lognormal SD95 1.33
  (3,3,1,1,3,5,2)
- Polyethylene, LDPE, granulate, at plant [RER]: 0.0133 kg; lognormal SD95 1.33
  (3,3,1,1,3,5,3)
- Titanium dioxide, production mix, at plant [RER]: 0.354 kg; lognormal SD95 1.24
  (3,3,1,1,1,5,4)

## Emissions to nature
- NMVOC, non-methane volatile organic compounds, unspecified origin [emissions to air, unspecified]: 0.0001 kg; lognormal SD95 3.22
  (5,5,5,5,5,5,23)
- Heat, waste [emissions to air, unspecified]: 6.59 MJ; lognormal SD95 1.33
  (3,3,1,1,3,5,13)

## Sampling procedure
Literature

## Sources
- Classen M., Althaus H.-J., Blaser S., Scharnhorst W., Tuchschmid M., Jungbluth N., Faist Emmenegger M., 2009, 2009 - LCI metals - Classen, Final report ecoinvent data v2.1, 10, Swiss Centre for LCI, Empa, ESU-services Ltd., Duebendorf, CH
Classen M., Althaus H.-J., Blaser S., Doka G., Jungbluth N., Tuchschmid M. (2008) Life Cycle Inventories of Metals. Final report ecoinvent data v2.1. Volume: 10. Issue: 0. Swiss Centre for LCI, Empa - TSL. Dübendorf, CH.
Type: Measurement on site
Source: CD-ROM
First author: Classen M.
Other authors: Althaus H.-J., Blaser S., Doka G., Jungbluth N., Tuchschmid M.
Year: 2008
Title of anthology: Final report ecoinvent data v2.1
Place of publication: Dübendorf, CH
Publisher: Swiss Centre for LCI, Empa - TSL
Volume No: 10
Issue No: 0

## Validation
Proof reading validation: passed.; Other validation: none;
