# Bark chips, production mix, wet, measured as dry mass, at sawmill & plant

Dataset: EcoSpold 1, unit process
Functional unit: 1 kg
Category: wood / wooden materials\new processes\other material
Geography: RER
Time period: 2014-01 to 2016-12
Generated by: default
accessRestrictedTo: 0
copyright: true

## Reference product
- Bark chips, production mix, wet, measured as dry mass, at sawmill & plant [RER]: 1 kg

## Inputs from technosphere
- Bark chips, wet, from soft fibreboard production, from wet & dry processes, measured as dry mass, at plant [RER]: 8.24e-5 kg
  Pedigree: (1,1,4,5,4).
- Transport, freight, rail [RER]: 0 tkm
  Pedigree: (1,1,4,5,4).
- Transport, barge [RER]: 0 tkm
  Pedigree: (1,1,4,5,4).
- Bark chips, wet, from particle board production, uncoated, average glue mix, measured as dry mass, at plant [RER]: 0.000464 kg
  Pedigree: (1,1,4,5,4).
- Bark chips, wet, from oriented strand board production, measured as dry mass, at plant [RER]: 0.00382 kg
  Pedigree: (1,1,4,5,4).
- Transport, freight, lorry, fleet average [RER]: 0 tkm
  Pedigree: (1,1,4,5,4).
- Bark chips, softwood, wet, measured as dry mass, at sawmill [RER]: 0.472 kg
  Pedigree: (1,1,4,5,4).
- Bark chips, wet, from hard fibreboard production, measured as dry mass, at plant [RER]: 0.00592 kg
  Pedigree: (1,1,4,5,4).
- Bark chips, hardwood, wet, measured as dry mass, at sawmill [RER]: 0.517 kg
  Pedigree: (1,1,4,5,4).

## Sources
- Werner F., 2017, 2017 - LCI wood and wood based products - Werner, Project Report, 0, Environment & Development, Zuerich, CH
