# Building machine

Dataset: EcoSpold 1, unit process, infrastructure
Functional unit: 1 p
Category: construction processes / building equipment\infrastructure
Geography: RER
Time period: 2000-01 to 2000-12
Generated by: Daniel Kellenberger
accessRestrictedTo: 0
copyright: true

## General comment
The module describes a fictitious machine made 100% of steel. The energy consumption for the production process is assumed to be the same as the energy consumption for the production of a car. The transportation distances for delivering the parts to the assembly plant are estimated. This module should not be used if its relative importance would be high in a certain environmental inventory. Average service life:10'000 hours.;
Synonyms: construction, engine;

## Included processes
Includes the most important materials, the transportation of the parts to the assembly plant and of the building machine to the end-user. Also included is the requirement of electricity and heating energy. No disposal is included as it is assumed that all materials used in the machine are 100% recycled.

## Geography
Certain elementary flows or intermediate product flows are extrapolated from Swiss conditions.

## Technology
Average current technology for one typical machine representing the category.

## Reference product
- Building machine [RER]: 1 p
  Europe

## Inputs from technosphere
- Transport, freight, lorry, 16t-32t gross weight, fleet average [CH]: 0.35 tkm; lognormal SD95 2.43
  (4,5,5,5,3,5);
- Natural gas, burned in industrial furnace 1MW [CH]: 100000 MJ; lognormal SD95 1.22
  (1,5,2,3,1,3);
- Transport, freight, lorry, 32t-40t gross weight, fleet average [CH]: 1000 tkm; lognormal SD95 2.05
  (1,5,2,3,1,3);
- Transport, freight, rail [RER]: 2000 tkm; lognormal SD95 2.05
  (1,5,2,3,1,3);
- Electricity, medium voltage, production ENTSO-E, at grid: 9170 kWh; lognormal SD95 1.22
  (1,5,2,3,1,3);
- Reinforcing steel, at plant [RER]: 7000 kg; lognormal SD95 1.22
  (1,5,2,3,1,3);
- Steel, low-alloyed, at plant [RER]: 3000 kg; lognormal SD95 1.22
  (1,5,2,3,1,3);

## Emissions to nature
- Heat, waste [emissions to air, unspecified]: 33000 MJ; lognormal SD95 1.22
  (1,5,2,3,1,3);

## Sampling procedure
Most data from the LCA study Oekoinventare von Energiesystemen 1996.

## Extrapolations
See geography

## Sources
- Kellenberger D., Althaus H.-J., Jungbluth N., Kuenniger T., Lehmann M., Thalmann P., 2007, 2007 - LCI building products - Kellenberger, Final report ecoinvent data v2.0, 7, Swiss Centre for LCI, Empa - TSL, ESU-services Ltd., Bau- und Umweltchimie, Duebendorf, CH
Kellenberger D., Althaus H.-J., Jungbluth N., Künniger T. (2007) Life Cycle Inventories of Building Products. Final report ecoinvent data v2.0. Volume: 7. Swiss Centre for LCI, Empa - TSL. Dübendorf, CH.
Type: Measurement on site
Source: CD-ROM
First author: Kellenberger D.
Other authors: Althaus H.-J., Jungbluth N., Künniger T.
Year: 2007
Title of anthology: Final report ecoinvent data v2.0
Place of publication: Dübendorf, CH
Publisher: Swiss Centre for LCI, Empa - TSL
Volume No: 7

## Validation
Proof reading validation: passed; Other validation: none;
