# Uranium, enriched 3.8% for pressure water reactor

Dataset: EcoSpold 1, unit process
Functional unit: 1 kg
Category: fuels / uranium\enriched
Geography: US
Time period: 1999-01 to 2002-12
Generated by: Roberto Dones
accessRestrictedTo: 0
copyright: true

## General comment
The shares are estimated based on data 2003-2006 from US EIA ;

## Included processes
The module includes the shares of enrichment services from different suppliers.

## Reference product
- Uranium, enriched 3.8% for pressure water reactor [US]: 1 kg
  UNITED STATES

## Inputs from technosphere
- Uranium, enriched 3.8%, at TENEX enrichment plant [RU]: 0.382 kg; lognormal SD95 2
  own estimation
- Uranium, enriched 3.8%, at EURODIF enrichment plant [FR]: 0.185 kg; lognormal SD95 1.1
  own estimation
- Uranium, enriched 3.8%, at CNNC centrifuge enrichment plant [CN]: 0.074 kg; lognormal SD95 2
  own estimation
- Uranium, enriched 3.8%, at USEC enrichment plant [US]: 0.118 kg; lognormal SD95 2
  own estimation
- Uranium, enriched 3.8%, at URENCO enrichment plant [RER]: 0.242 kg; lognormal SD95 1.2
  own estimation

## Sampling procedure
Literature

## Sources
- Dones R., Bauer C., Doka G., 2009, 2009 - Nuclear energy - Dones, Sachbilanzen von Energiesystemen. Final report No. 6 ecoinvent v2.1, 6, Swiss Centre for LCI, PSI, Doka LCA, Duebendorf and Villigen, CH
Dones, R., Doka G. (2009) Kernenergie. Sachbilanzen von Energiesystemen. Final report No. 6 ecoinvent v2.1. Editors: Bauer C.. Volume: 6. Swiss Centre for LCI, PSI. Dübendorf and Villigen, CH.
Type: Measurement on site
Source: CD-ROM
First author: Dones, R.
Other authors: Doka G.
Year: 2009
Name of editors: Bauer C.
Title of anthology: Sachbilanzen von Energiesystemen. Final report No. 6 ecoinvent v2.1
Place of publication: Dübendorf and Villigen, CH
Publisher: Swiss Centre for LCI, PSI
Volume No: 6

## Validation
Proof reading validation: Passed.; Other validation: none;
