# Electricity, photovoltaic mix facade, at plant

Dataset: EcoSpold 1, unit process
Functional unit: 1 kWh
Category: energy supply, kbob recommendation / electricity, delivered via network
Geography: CH
Time period: 2005-01 to 2018-12
Synonyms: 0
Share of production covered: 0 %
Generated by: Rolf Frischknecht
accessRestrictedTo: 0
copyright: true

## Included processes
This data set describes the share of the different facade PV technologies

## Time period
Time of publications.

## Reference product
- Electricity, photovoltaic mix facade, at plant [CH]: 1 kWh

## Inputs from technosphere
- Electricity, PV, at 3kWp facade, single-Si, laminated, integrated [CH]: 0.11541 kWh; lognormal SD95 1.05
  (1,1,1,1,1,1,BU:1.05); Swiss photovoltaic electricity mix, Jungbluth et al., 2010
- Electricity, PV, at 3kWp facade installation, single-Si, panel, mounted [CH]: 0.23082 kWh; lognormal SD95 1.05
  (1,1,1,1,1,1,BU:1.05); Swiss photovoltaic electricity mix, Jungbluth et al., 2010
- Electricity, PV, at 3kWp facade, multi-Si, laminated, integrated [CH]: 0.21792 kWh; lognormal SD95 1.05
  (1,1,1,1,1,1,BU:1.05); Swiss photovoltaic electricity mix, Jungbluth et al., 2012
- Electricity, PV, at 3kWp facade installation, multi-Si, panel, mounted [CH]: 0.43584 kWh; lognormal SD95 1.05
  (1,1,1,1,1,1,BU:1.05); Swiss photovoltaic electricity mix, Jungbluth et al., 2012

## Sources
- Ramseier L., Frischknecht R., 2022, 2022 - Prim. energy fact. of energy systems - Ramseier, Project report, 684, treeze Ltd., Uster, CH

## Validation
12.09.2023
G:\Projekte laufend\174 Photovoltaic, IEA Task 12\2017 Global supply chain\EcoSpold\[174-photovoltaics-global-supply-chain-CH-Mix_installationTypes_v2.6.xlsx]X-Process
