# Amine-based silica production, for sorbent-based direct air capture system

Dataset: EcoSpold 1, unit process
Functional unit: 1 kg
Category: fuels / synthetic\infrastructure
Geography: RER
Time period: 2024-01 to 2024-01
Generated by: Romain Sacchi
accessRestrictedTo: 0
copyright: true

## General comment
Synthesized by impregnate amines polyethylenimine (PEI) on solid silica gel. The LCI of amine-based silica is collected from literature and based on the composition that 1 kg amine-based silica requires of 0.64kg silica gel and 0.36 kg PEI. Source: Qiu, Y., Lamers, P., Daioglou, V. et al. Environmental trade-offs of direct air capture technologies in climate change mitigation toward 2100. Nat Commun 13, 3635 (2022). https://doi.org/10.1038/s41467-022-31146-1

## Reference product
- Amine-based silica production, for sorbent-based direct air capture system [RER]: 1 kg
  not defined

## Inputs from technosphere
- Heat, natural gas, at industrial furnace 1MW [CH]: 0.63 MJ; lognormal SD95 1.377
  64% silica gel {1;5;1;2;3;5;1.05;}
- Electricity, low voltage, production ENTSO-E, at grid: 0.12 kWh; lognormal SD95 1.377
  36% PEI {1;5;1;2;3;5;1.05;}
- Heat, natural gas, at industrial furnace 1MW [CH]: 2.69 MJ; lognormal SD95 1.377
  36% PEI {1;5;1;2;3;5;1.05;}
- Sodium silicate, furnace process, pieces, at plant [RER]: 0.13 kg; lognormal SD95 1.377
  64% silica gel {1;5;1;2;3;5;1.05;}
- Sulphuric acid, liquid, at plant [RER]: 0.02 kg; lognormal SD95 1.377
  64% silica gel {1;5;1;2;3;5;1.05;}
- Water, deionised, at plant [CH]: 1.29 kg; lognormal SD95 1.377
  64% silica gel {1;5;1;2;3;5;1.05;}
- Monoethanolamine, at plant [RER]: 0.71 kg; lognormal SD95 1.377
  36% PEI {1;5;1;2;3;5;1.05;}
- Sulphuric acid, liquid, at plant [RER]: 1.14 kg; lognormal SD95 1.377
  36% PEI {1;5;1;2;3;5;1.05;}
- Sodium hydroxide, 50% in H2O, production mix, at plant [RER]: 1 kg; lognormal SD95 1.377
  36% PEI {1;5;1;2;3;5;1.05;}
- Hydrochloric acid, 30% in H2O, at plant [RER]: 0.07 kg; lognormal SD95 1.377
  36% PEI {1;5;1;2;3;5;1.05;}
- Ethanol, 99.7% in H2O, from biomass, at distillation [CH]: 1.24 kg; lognormal SD95 1.377
  36% PEI {1;5;1;2;3;5;1.05;}
- Diethyl ether, at plant [RER]: 0.742 kg; lognormal SD95 1.377
  36% PEI, accounts for 95% recovery rate of the diethyl ether. {1;5;1;2;3;5;1.05;}
- Water, deionised, at plant [CH]: 5.24 kg; lognormal SD95 1.377
  36% PEI {1;5;1;2;3;5;1.05;}
- Sodium silicate, furnace process, pieces, at plant [RER]: 1.65 kg; lognormal SD95 1.377
  36% PEI {1;5;1;2;3;5;1.05;}
- Transport, freight, rail [RER]: 1.736 tkm; lognormal SD95 2.208
  Generic transport distances calculated based on Table 4.2 of the ecoinvent v.2 Methodology report. Distribution: 0.67 kg over 2600.0 km.
- Transport, freight, lorry, 16t-32t gross weight, fleet average [RER]: 2.548 tkm; lognormal SD95 2.208
  Generic transport distances calculated based on Table 4.2 of the ecoinvent v.2 Methodology report. Distribution: 0.88 kg over 2910.0 km.
- Transport, barge tanker [RER]: 0.3762 tkm; lognormal SD95 2.208
  Generic transport distances calculated based on Table 4.2 of the ecoinvent v.2 Methodology report. Distribution: 0.94 kg over 400.0 km.
- Treatment, sewage, to wastewater treatment, class 1 [CH]: 0.00112 m3; lognormal SD95 1.377
  64% silica gel {1;5;1;2;3;5;1.05;}
- Disposal, solvents mixture, 16.5% water, to hazardous waste incineration [CH]: 0.54 kg; lognormal SD95 1.377
  36% PEI {1;5;1;2;3;5;1.05;}
- Disposal, anion exchange resin f. water, 50% water, to municipal incineration [CH]: 0.36 kg; lognormal SD95 1.377
  EoL {1;5;1;2;3;5;1.05;}

## Emissions to nature
- Particulates, < 2.5 um [emissions to air, unspecified]: 4.2e-5 kg; lognormal SD95 3.137
  Emissions to air {1;5;1;2;3;5;3;}

## Sampling procedure
Sampling procedure: Literature data

## Sources
- Sacchi R., Bauer C., 2024, 2024 - LCA power-to-X in residential sector - Sacchi, Project report, PSI, Villigen, CH

## Validation
Proof reading validation: Passed, Other validation: none, Validator: Rolf Frischknecht, Telephone: 0041 44 940 61 91, E-mail: frischknecht@treeze.ch, Company: treeze, Country: CH
