# xx Electricity, at wind power plant Grenchenberg 150kW

Dataset: EcoSpold 1, unit process
Functional unit: 1 kWh
Category: electricity by fuel / wind
Geography: CH
Time period: 2000-01 to 2000-12
Generated by: Christian Bauer
accessRestrictedTo: 0
copyright: true

## General comment
The capacity factor is assumed to be 10.5 %, based on electricity proction statistics from this specific wind power plant, installed 1994 in Grenchenberg, Switzerland. Gear oil has to be changed every second year. The lifetime of moving and fixed parts is assumed to be 20 resp. 40 years.;

## Included processes
Includes the operation of the wind power plant with the necessary change of gear oil. Also includes the capacity factor, concerning the wind conditions

## Geography
Data for a specific Swiss wind power plant. Could be used for other alpine regions with similar wind conditions.

## Technology
Technology of a specific 150 kW wind power plant

## Reference product
- xx Electricity, at wind power plant Grenchenberg 150kW [CH]: 1 kWh
  SWITZERLAND

## Inputs from technosphere
- Disposal, used mineral oil, 10% water, to hazardous waste incineration [CH]: 6.6e-5 kg; lognormal SD95 1.76
  own estimation
- xx Wind power plant 150kW, fixed parts [CH]: 1.6e-7 p; lognormal SD95 1.1
  own estimation
- xx Wind power plant 150kW, moving parts [CH]: 4e-7 p; lognormal SD95 1.1
  own estimation
- Lubricating oil, at plant [RER]: 6.6e-5 kg; lognormal SD95 1.65
  own estimation
- Transport, passenger car, fleet average [CH]: 0.0001 km; lognormal SD95 2.2
  own estimation

## Inputs from nature
- Energy, kinetic (in wind), converted [resources, in air]: 3.87 MJ; lognormal SD95 1.3
  own assumption, based on interval of conversion efficiencies

## Sampling procedure
Literature and statistics.

## Sources
- Burger B., Bauer C., 2007, 2007 - Windpower - Buger, Sachbilanzen von Energiesystemen. Final report No. 6 ecoinvent data v2.0, 6, Swiss Centre for LCI, PSI, Duebendorf and Villigen, CH
Burger, B., Bauer, Ch. (2007) Windkraft. Sachbilanzen von Energiesystemen. Final report No. 6 ecoinvent data v2.0. Editors: Dones R.. Volume: 6. Swiss Centre for LCI, PSI. Dübendorf and Villigen, CH.
Type: Measurement on site
Source: CD-ROM
First author: Burger, B.
Other authors: Bauer, Ch.
Year: 2007
Name of editors: Dones R.
Title of anthology: Sachbilanzen von Energiesystemen. Final report No. 6 ecoinvent data v2.0
Place of publication: Dübendorf and Villigen, CH
Publisher: Swiss Centre for LCI, PSI
Volume No: 6

## Validation
Proof reading validation: passed; Other validation: none;
