# Shed

Dataset: EcoSpold 1, unit process, infrastructure
Functional unit: 1 m2
Category: agricultural / operations\infrastructure
Geography: CH
Time period: 2000-01 to 2000-12
Generated by: Dunja Dux
accessRestrictedTo: 0
copyright: true

## General comment
The module includes a timber construction, closed on three sides. One part of the shed is a fireproofed garage closed with doors. Size: 264 m2 whole shed, 102 m2 fireproofed garage. Lifetime of the building is 50 years.;
Synonyms: Maschinenhalle;

## Included processes
The inventory takes into account the use of construction materials and building machines for construction, repair and replacement including waste disposal and the transportation of the materials to the building site. Not taken into account were direct emission of the construction, disposal of production waste and the use of resources during utilization phase.

## Technology
The data of the inventory are based on one example of a typical agricultural building.

## Reference product
- Shed [CH]: 1 m2
  SWITZERLAND

## Inputs from technosphere
- Gravel, round, at mine [CH]: 309 kg; lognormal SD95 1.05
  (1,2,1,1,1,na)
- Excavation, skid-steer loader [RER]: 0.0128 m3; lognormal SD95 1.05
  (1,2,1,1,1,na)
- Disposal, building, polyethylene/polypropylene products, to final disposal [CH]: 0.0268 kg; lognormal SD95 1.05
  (1,2,1,1,1,na)
- Disposal, building, reinforced concrete, to final disposal [CH]: 631 kg; lognormal SD95 1.05
  (1,2,1,1,1,na)
- Polyethylene, HDPE, granulate, at plant [RER]: 0.0268 kg; lognormal SD95 1.05
  (1,2,1,1,1,na)
- Reinforcing steel, at plant [RER]: 8.28 kg; lognormal SD95 1.05
  (1,2,1,1,1,na)
- Disposal, building, concrete, not reinforced, to final disposal [CH]: 18.3 kg; lognormal SD95 1.05
  (1,2,1,1,1,na)
- Copper, at regional storage [RER]: 0.621 kg; lognormal SD95 1.05
  (1,2,1,1,1,na)
- Concrete, normal, at plant [CH]: 0.283 m3; lognormal SD95 1.05
  (1,2,1,1,1,na)
- Fibre cement corrugated slab, at plant [CH]: 6.73 kg; lognormal SD95 1.05
  (1,2,1,1,1,na)
- Fibre cement facing tile, at plant [CH]: 38.3 kg; lognormal SD95 1.05
  (1,2,1,1,1,na)
- Sawnwood, production mix, softwood, dried (u=20%), planed, at sawmill [CH]: 0.209 m3; lognormal SD95 1.05
  (1,2,1,1,1,na)
- Portland cement, strength class Z 42.5, at plant [CH]: 21.9 kg; lognormal SD95 1.05
  (1,2,1,1,1,na)
- Cast iron, at plant [RER]: 0.533 kg; lognormal SD95 1.05
  (1,2,1,1,1,na)
- Transport, freight, lorry, 16t-32t gross weight, fleet average [CH]: 56.6 tkm; lognormal SD95 2
  (1,2,1,1,1,na)
- Electricity, low voltage, at grid [CH]: 2.41 kWh; lognormal SD95 1.05
  (1,2,1,1,1,na)
- Disposal, building, waste wood, untreated, to final disposal [CH]: 77.2 kg; lognormal SD95 1.05
  (1,2,1,1,1,na)
- Disposal, building, waste wood, chrome preserved, to final disposal [CH]: 11 kg; lognormal SD95 1.05
  (1,2,1,1,1,na)
- Poor concrete, at plant [CH]: 0.00833 m3; lognormal SD95 1.05
  (1,2,1,1,1,na)
- Zinc coating, pieces [RER]: 0.0305 m2; lognormal SD95 1.05
  (1,2,1,1,1,na)
- Disposal, building, cement (in concrete) and mortar, to final disposal [CH]: 38.5 kg; lognormal SD95 1.05
  (1,2,1,1,1,na)
- Extrusion, plastic film [RER]: 0.0268 kg; lognormal SD95 1.05
  (1,2,1,1,1,na)
- Disposal, building, bulk iron (excluding reinforcement), to sorting plant [CH]: 1.18 kg; lognormal SD95 1.05
  (1,2,1,1,1,na)
- Excavation, hydraulic digger, average [CH]: 0.352 m3; lognormal SD95 1.05
  (1,2,1,1,1,na)
- Disposal, building, brick, to final disposal [CH]: 45.1 kg; lognormal SD95 1.05
  (1,2,1,1,1,na)

## Inputs from nature
- Transformation, from pasture, man made [resources, land]: 2.47 m2; lognormal SD95 2
  (1,2,1,1,1,na)
- Occupation, urban, discontinuously built [resources, land]: 124 m2a; lognormal SD95 1.5
  (1,2,1,1,1,na)
- Occupation, construction site [resources, land]: 2.47 m2a; lognormal SD95 1.5
  (1,2,1,1,1,na)
- Transformation, to urban, discontinuously built [resources, land]: 2.47 m2; lognormal SD95 2
  (1,2,1,1,1,na)

## Emissions to nature
- Heat, waste [emissions to air, low. pop.]: 8.67 MJ; lognormal SD95 1.05
  (1,2,1,1,1,na)

## Sampling procedure
The inventory is calculated based on a solid database of agricultural buildings.

## Sources
- Nemecek T., Kaegi T., 2007, 2007 - LCI agricultural prod. systems - Nemecek, Ecoinvent report version 2.0, 15, Swiss Centre for LCI, ART, Duebendorf and Zuerich, CH
Nemecek, T., Kägi, T., Blaser, S. (2007) Life Cycle Inventories of Agricultural Production Systems. Ecoinvent report version 2.0. Editors: 0. Volume: 15. Swiss Centre for LCI, ART. Duebendorf and Zurich, CH.
Type: Measurement on site
Source: CD-ROM
First author: Nemecek, T.
Other authors: Kägi, T., Blaser, S.
Year: 2007
Name of editors: 0
Title of anthology: Ecoinvent report version 2.0
Place of publication: Duebendorf and Zurich, CH
Publisher: Swiss Centre for LCI, ART
Volume No: 15

## Validation
Proof reading validation: Passed.; Other validation: none;
