# Autoclaved aerated concrete block, at plant

Dataset: EcoSpold 1, unit process
Functional unit: 1 kg
Category: construction / concrete
Geography: CH
Time period: 2000-01 to 2000-12
Generated by: Daniel Kellenberger
accessRestrictedTo: 0
copyright: true

## General comment
Hardening is assumed to be by air-drying. It is assumed that there is wastewater and solid waste, but as no exact description on the composition of the wastewater and solid waste is available a proxy for each ("treatment, concrete production effluent, to wastewater treatment, class 3" and "disposal, municipal solid waste, 22.9% water, to municipal incineration") is used. The lifespan of the plant is assumed to be 50 years.;
Synonyms: Bimshohlblockstein, Ytong;

## Included processes
includes the raw materials, their transport to the finishing plant, the energy for the autoclaving process, the packaging, the infrastructure and the disposal of wastewater and some solid household (e.g. packing material) waste

## Geography
For some exchanges CH, RER and GLO modules have been used as proxy.

## Technology
The raw materials (sand/gravel, quicklime, anhydrite, cement and aluminium powder) are mixed with water and poured into a mould. The aluminium powder is reacting with the alcaline and siliceous additives and forms, by hydrogen release, pores with a diameter between 2 and 3mm.

## Reference product
- Autoclaved aerated concrete block, at plant [CH]: 1 kg
  SWITZERLAND

## Inputs from technosphere
- Packing, clay products [CH]: 1 kg; lognormal SD95 5
  estimated
- Portland cement, strength class Z 42.5, at plant [CH]: 0.26 kg; lognormal SD95 1.64
  (3,5,5,3,1,5);
- Sand, at mine [CH]: 0.504 kg; lognormal SD95 1.64
  (3,5,5,3,1,5);
- Diesel, burned in building machine, average [CH]: 0.0252 MJ; lognormal SD95 1.64
  (3,5,5,3,1,5);
- Treatment, concrete production effluent, to wastewater treatment, class 3 [CH]: 8.33e-5 m3; lognormal SD95 5
  estimated
- Transport, freight, lorry, fleet average [RER]: 0.0381 tkm; lognormal SD95 2.34
  (3,5,5,3,1,5);
- Tap water, at user [RER]: 0.648 kg; lognormal SD95 1.64
  (3,5,5,3,1,5);
- Disposal, municipal solid waste, 22.9% water, to municipal incineration [CH]: 0.000125 kg; lognormal SD95 5
  estimated
- Heat, natural gas, at industrial furnace 1MW [CH]: 0.646 MJ; lognormal SD95 1.64
  (3,5,5,3,1,5);
- Electricity, medium voltage, production ENTSO-E, at grid: 0.0575 kWh; lognormal SD95 1.64
  (3,5,5,3,1,5);
- Anhydrite, at plant [CH]: 0.044 kg; lognormal SD95 1.64
  (3,5,5,3,1,5);
- Quicklime, milled, packed, at plant [CH]: 0.104 kg; lognormal SD95 1.64
  (3,5,5,3,1,5);
- Aluminium, secondary, from new scrap, at plant [RER]: 0.0007 kg; lognormal SD95 1.64
  (3,5,5,3,1,5);
- Mine, clay [CH]: 1.67e-10 p; lognormal SD95 5
  estimated

## Emissions to nature
- Heat, waste [emissions to air, unspecified]: 0.207 MJ; lognormal SD95 1.64
  (3,5,5,3,1,5);

## Sampling procedure
Literature

## Sources
- Kellenberger D., Althaus H.-J., Jungbluth N., Kuenniger T., Lehmann M., Thalmann P., 2007, 2007 - LCI building products - Kellenberger, Final report ecoinvent data v2.0, 7, Swiss Centre for LCI, Empa - TSL, ESU-services Ltd., Bau- und Umweltchimie, Duebendorf, CH
Kellenberger D., Althaus H.-J., Jungbluth N., Künniger T. (2007) Life Cycle Inventories of Building Products. Final report ecoinvent data v2.0. Volume: 7. Swiss Centre for LCI, Empa - TSL. Dübendorf, CH.
Type: Measurement on site
Source: CD-ROM
First author: Kellenberger D.
Other authors: Althaus H.-J., Jungbluth N., Künniger T.
Year: 2007
Title of anthology: Final report ecoinvent data v2.0
Place of publication: Dübendorf, CH
Publisher: Swiss Centre for LCI, Empa - TSL
Volume No: 7

## Validation
Proof reading validation: passed; Other validation: none;
