# Disposal, printer, laser jet, colour, to WEEE treatment

Dataset: EcoSpold 1, unit process
Functional unit: 1 p
Category: electronics waste / unspecified
Geography: CH
Time period: 2023-01 to 2029-12
Production volume: 82.5 kt total WEEE
Share of production covered: 100 %
Generated by: Lugas Raka Adrianto, Maulana Permana Ajie, Didier Beloin-Saint-Pierre
accessRestrictedTo: 0
copyright: false

## General comment
mix process of the two disposal ways - the manual dismantling and the mechanical treatment (in a shredder);

## Included processes
This dataset represents the statistical mixture of the two different disposal ways for WEEE devices in Switzerland.

## Geography
data of the situation in Switzerland. The split of manual and mechanical treatment for waste printers is taken from the recent data of SWICO and SENS technical report (SWICO & SENS, 2022).

## Technology
current mix of manual and mechanical treatment in Switzerland

## Reference product
- Disposal, printer, laser jet, colour, to WEEE treatment [CH]: 1 p
  SWITZERLAND

## Inputs from technosphere
- Dismantling, printer, laser, manually, at plant [CH]: 1.3501 kg; lognormal SD95 1.21
  (1,1,1,1,1,5,BU:1.05); data from Swiss WEEE systems - reported in Hischier (2005), with updates SWICO and SENS technical report (SWICO & SENS, 2022).
- Dismantling, printer, laser, mechanically, at plant [CH]: 4.5199 kg; lognormal SD95 1.21
  (same comment as for Dismantling, printer, laser, manually, at plant)

## Sampling procedure
statistical data

## Sources
- Raka Adrianto L., Permana Ajie M., Beloin-Saint-Pierre D., 2024, 2024 - LCI ICT sector - Raka Adrianto, Empa, St. Gallen, CH

## Validation
Proof reading validation: Passed, Other validation: none, Validator: Mischa Zschokke, Company: Carbotech, Country: CH
