# xx Carbofuran, at regional storehouse

Dataset: EcoSpold 1, unit process
Functional unit: 1 kg
Category: material, obsolete / wood, obsolete\extraction, obsolete\pesticides, obsolete
Geography: RER
Time period: 1987-01 to 1987-12
Share of production covered: 100 %
Generated by: Juergen Sutter
accessRestrictedTo: 0
copyright: true

## General comment
Production of carbofuran estimated with (thio)carbamate-compounds production.;

## Geography
The inventory is modelled for Europe.

## Technology
carbofuran

## Time period
Time of publications

## Reference product
- xx Carbofuran, at regional storehouse [RER]: 1 kg
  Europe

## Inputs from technosphere
- Methanol, at plant [GLO]: 0.092986 kg; lognormal SD95 1.3765
  (4,5,1,1,1,5); Stoechiometric calculation
- Sulphuric acid, liquid, at plant [RER]: 0.20032 kg; lognormal SD95 1.3765
  (4,5,1,1,1,5); Stoechiometric calculation
- Heat, unspecific, in chemical plant [RER]: 17.556 MJ; lognormal SD95 1.3765
  (4,5,1,1,1,5); Estimation
- Carbon monoxide, CO, at plant [RER]: 0.046947 kg; lognormal SD95 1.3765
  (4,5,1,1,1,5); Stoechiometric calculation
- Ammonia, liquid, at regional storehouse [RER]: 0.045968 kg; lognormal SD95 1.3765
  (4,5,1,1,1,5); Stoechiometric calculation
- Transport, freight, lorry, fleet average [RER]: 0.7626 tkm; lognormal SD95 2.095
  (4,5,na,na,na,na); Standard distances
- Water, decarbonised, at plant [RER]: 0.037454 kg; lognormal SD95 1.3765
  (4,5,1,1,1,5); Stoechiometric calculation
- Hydrochloric acid, 30% in H2O, at plant [RER]: 0.089299 kg; lognormal SD95 1.3765
  (4,5,1,1,1,5); Stoechiometric calculation
- Secondary sulphur, at refinery [RER]: 0.053653 kg; lognormal SD95 1.3765
  (4,5,1,1,1,5); Stoechiometric calculation
- Nitrogen, liquid, at plant [RER]: 0.020913 kg; lognormal SD95 1.3765
  (4,5,1,1,1,5); Stoechiometric calculation
- Toluene, liquid, at plant [RER]: 0.076122 kg; lognormal SD95 1.3765
  (4,5,1,1,1,5); Stoechiometric calculation
- Chemical plant, organics [RER]: 2.0143e-9 p; lognormal SD95 3.0909
  (4,5,na,na,na,na); Estimation
- Ethyl acetate, at plant [RER]: 0.12384 kg; lognormal SD95 1.3765
  (4,5,1,1,1,5); Stoechiometric calculation
- Sulphur trioxide, at plant [RER]: 0.11371 kg; lognormal SD95 1.3765
  (4,5,1,1,1,5); Stoechiometric calculation
- Electricity, medium voltage, production ENTSO-E, at grid: 1.629 kWh; lognormal SD95 1.3765
  (4,5,1,1,1,5); Estimation
- Acetic anhydride, at plant [RER]: 0.08528 kg; lognormal SD95 1.3765
  (4,5,1,1,1,5); Stoechiometric calculation
- Phosgene, liquid, at plant [RER]: 0.48383 kg; lognormal SD95 1.3765
  (4,5,1,1,1,5); Stoechiometric calculation
- Dimethyl sulphate, at plant [RER]: 0.066071 kg; lognormal SD95 1.3765
  (4,5,1,1,1,5); Stoechiometric calculation
- Chlorine, liquid, production mix, at plant [RER]: 0.174 kg; lognormal SD95 1.3765
  (4,5,1,1,1,5); Stoechiometric calculation
- Ethanol from ethylene, at plant [RER]: 0.10513 kg; lognormal SD95 1.3765
  (4,5,1,1,1,5); Stoechiometric calculation
- Calcium carbide, technical grade, at plant [RER]: 0.047802 kg; lognormal SD95 1.3765
  (4,5,1,1,1,5); Stoechiometric calculation
- Transport, freight, rail [RER]: 4.6034 tkm; lognormal SD95 2.095
  (4,5,na,na,na,na); Standard distances
- Hydrogen cyanide, at plant [RER]: 0.012178 kg; lognormal SD95 1.3765
  (4,5,1,1,1,5); Stoechiometric calculation
- Ethylenediamine, at plant [RER]: 0.11628 kg; lognormal SD95 1.3765
  (4,5,1,1,1,5); Stoechiometric calculation
- Hydrogen sulphide, H2S, at plant [RER]: 0.026332 kg; lognormal SD95 1.3765
  (4,5,1,1,1,5); Stoechiometric calculation
- Nitrobenzene, at plant [RER]: 0.092959 kg; lognormal SD95 1.3765
  (4,5,1,1,1,5); Stoechiometric calculation
- Oxygen, liquid, at plant [RER]: 0.022706 kg; lognormal SD95 1.3765
  (4,5,1,1,1,5); Stoechiometric calculation
- Propanal, at plant [RER]: 0.089838 kg; lognormal SD95 1.3765
  (4,5,1,1,1,5); Stoechiometric calculation
- Sodium hydroxide, 50% in H2O, production mix, at plant [RER]: 0.80098 kg; lognormal SD95 1.3765
  (4,5,1,1,1,5); Stoechiometric calculation
- Acetaldehyde, at plant [RER]: 0.019846 kg; lognormal SD95 1.3765
  (4,5,1,1,1,5); Stoechiometric calculation
- Aniline, at plant [RER]: 0.26221 kg; lognormal SD95 1.3765
  (4,5,1,1,1,5); Stoechiometric calculation
- Disposal, inert waste, 5% water, to construction waste landfill [CH]: 0.084035 kg; lognormal SD95 1.3765
  (4,5,1,1,1,5); Stoechiometric calculation
- Phosphorus, white, liquid, at plant [RER]: 0.0056111 kg; lognormal SD95 1.3765
  (4,5,1,1,1,5); Stoechiometric calculation
- Hydrogen, liquid, at plant [RER]: 0.0074057 kg; lognormal SD95 1.3765
  (4,5,1,1,1,5); Stoechiometric calculation
- Carbon dioxide liquid, at plant [RER]: 0.031221 kg; lognormal SD95 1.3765
  (4,5,1,1,1,5); Stoechiometric calculation
- Benzyl chloride, at plant [RER]: 0.092704 kg; lognormal SD95 1.3765
  (4,5,1,1,1,5); Stoechiometric calculation

## Inputs from nature
- Bromine [resources, in water]: 0.07853 kg; lognormal SD95 1.3765
  (4,5,1,1,1,5); Stoechiometric calculation
- Water, cooling, unspecified natural origin/m3 [resources, in water]: 0.11931 m3; lognormal SD95 1.3765
  (4,5,1,1,1,5); Estimation
- Water, salt, sole [resources, in water]: 3.7975 m3; lognormal SD95 1.3765
  (4,5,1,1,1,5); Stoechiometric calculation
- Iodine [resources, in water]: 0.11494 kg; lognormal SD95 1.3765
  (4,5,1,1,1,5); Stoechiometric calculation

## Emissions to nature
- Acetaldehyde [emissions to water, river]: 9.5262e-5 kg; lognormal SD95 3.0909
  (4,5,na,na,na,na); Estimation
- Sulfur trioxide [emissions to air, high. pop.]: 0.0056285 kg; lognormal SD95 1.6169
  (4,5,na,na,na,na); Estimation
- Acetic acid [emissions to air, high. pop.]: 0.0001705 kg; lognormal SD95 1.6169
  (4,5,na,na,na,na); Estimation
- Toluene [emissions to air, high. pop.]: 0.00015224 kg; lognormal SD95 1.6169
  (4,5,na,na,na,na); Estimation
- Calcium [emissions to water, river]: 0.028325 kg; lognormal SD95 3.0909
  (4,5,na,na,na,na); Estimation
- Toluene, 2-chloro- [emissions to air, high. pop.]: 0.00020642 kg; lognormal SD95 1.6169
  (4,5,na,na,na,na); Estimation
- Carbon dioxide, fossil [emissions to air, high. pop.]: 0.49825 kg; lognormal SD95 1.3001
  (4,5,na,na,na,na); Estimation
- Ammonium, ion [emissions to water, river]: 0.0026559 kg; lognormal SD95 1.6169
  (4,5,na,na,na,na); Estimation
- Ethanol [emissions to air, high. pop.]: 0.00021025 kg; lognormal SD95 1.6169
  (4,5,na,na,na,na); Estimation
- Acetaldehyde [emissions to air, high. pop.]: 3.9692e-5 kg; lognormal SD95 1.6169
  (4,5,na,na,na,na); Estimation
- Methyl lactate [emissions to air, high. pop.]: 0.00012781 kg; lognormal SD95 1.6169
  (4,5,na,na,na,na); Estimation
- Dipropylamine [emissions to water, river]: 0.00035669 kg; lognormal SD95 3.0909
  (4,5,na,na,na,na); Estimation
- Methanol [emissions to air, high. pop.]: 0.00018598 kg; lognormal SD95 1.6169
  (4,5,na,na,na,na); Estimation
- Hydrogen [emissions to air, high. pop.]: 1.4812e-5 kg; lognormal SD95 1.6169
  (4,5,na,na,na,na); Estimation
- Sulfate [emissions to water, river]: 0.078969 kg; lognormal SD95 1.6169
  (4,5,na,na,na,na); Estimation
- Iodide [emissions to water, river]: 0.011206 kg; lognormal SD95 5.1037
  (4,5,na,na,na,na); Estimation
- Chlorine [emissions to air, high. pop.]: 0.001685 kg; lognormal SD95 1.6169
  (4,5,na,na,na,na); Estimation
- Hydrogen chloride [emissions to air, high. pop.]: 0.00010233 kg; lognormal SD95 1.6169
  (4,5,na,na,na,na); Estimation
- Sulfide [emissions to water, river]: 0.0026827 kg; lognormal SD95 1.6169
  (4,5,na,na,na,na); Estimation
- Ethyl acetate [emissions to water, river]: 0.00059445 kg; lognormal SD95 3.0909
  (4,5,na,na,na,na); Estimation
- Propanal [emissions to air, high. pop.]: 0.00017968 kg; lognormal SD95 1.6169
  (4,5,na,na,na,na); Estimation
- Toluene [emissions to water, river]: 6.0897e-5 kg; lognormal SD95 3.0909
  (4,5,na,na,na,na); Estimation
- Dimethylamine [emissions to water, river]: 0.00022742 kg; lognormal SD95 3.0909
  (4,5,na,na,na,na); Estimation
- Heat, waste [emissions to air, high. pop.]: 5.8644 MJ; lognormal SD95 1.3765
  (4,5,1,1,1,5); Calculated from the electricity input
- Lactic acid [emissions to water, river]: 0.00027941 kg; lognormal SD95 3.0909
  (4,5,na,na,na,na); Estimation
- Ethanol [emissions to water, river]: 0.00084989 kg; lognormal SD95 3.0909
  (4,5,na,na,na,na); Estimation
- Sodium [emissions to water, river]: 0.49799 kg; lognormal SD95 5.1037
  (4,5,na,na,na,na); Estimation
- Carbon monoxide, fossil [emissions to air, high. pop.]: 9.3893e-5 kg; lognormal SD95 5.1037
  (4,5,na,na,na,na); Estimation
- Chloride [emissions to water, river]: 0.4931 kg; lognormal SD95 3.0909
  (4,5,na,na,na,na); Estimation
- Lactic acid [emissions to air, high. pop.]: 0.00011642 kg; lognormal SD95 1.6169
  (4,5,na,na,na,na); Estimation
- Sulfur dioxide [emissions to air, high. pop.]: 0.00018378 kg; lognormal SD95 1.3001
  (4,5,na,na,na,na); Estimation
- Acetic acid [emissions to water, river]: 0.00040933 kg; lognormal SD95 3.0909
  (4,5,na,na,na,na); Estimation
- Diethylamine [emissions to air, high. pop.]: 0.00023255 kg; lognormal SD95 1.6169
  (4,5,na,na,na,na); Estimation
- Ammonia [emissions to air, high. pop.]: 9.4402e-5 kg; lognormal SD95 1.3713
  (4,5,na,na,na,na); Estimation
- Diethylamine [emissions to water, river]: 0.00055813 kg; lognormal SD95 3.0909
  (4,5,na,na,na,na); Estimation
- Dipropylamine [emissions to air, high. pop.]: 0.00014862 kg; lognormal SD95 1.6169
  (4,5,na,na,na,na); Estimation
- Phosphate [emissions to water, river]: 0.017195 kg; lognormal SD95 1.6169
  (4,5,na,na,na,na); Estimation
- Ethyl acetate [emissions to air, high. pop.]: 0.00024769 kg; lognormal SD95 1.6169
  (4,5,na,na,na,na); Estimation
- Aniline [emissions to air, high. pop.]: 0.00052438 kg; lognormal SD95 1.6169
  (4,5,na,na,na,na); Estimation
- Carbonate [emissions to water, river]: 0.042487 kg; lognormal SD95 3.0909
  (4,5,na,na,na,na); Estimation
- Toluene, 2-chloro- [emissions to water, river]: 0.00043206 kg; lognormal SD95 3.0909
  (4,5,na,na,na,na); Estimation
- Bromide [emissions to water, river]: 0.1147 kg; lognormal SD95 5.1037
  (4,5,na,na,na,na); Estimation
- Methanol [emissions to water, river]: 0.00066302 kg; lognormal SD95 3.0909
  (4,5,na,na,na,na); Estimation
- Aniline [emissions to water, river]: 0.0012586 kg; lognormal SD95 3.0909
  (4,5,na,na,na,na); Estimation
- Water [emissions to water, unspecified]: 113.344 kg; lognormal SD95 2.5196
  (5,5,5,5,5,BU:1.05); All uncertainty-values set to 5.0 by default. Balance of input water

## Sampling procedure
Literature data

## Extrapolations
Transports and emissions are modelled with standard methods.

## Sources
- Nemecek T., Kaegi T., 2007, 2007 - LCI agricultural prod. systems - Nemecek, Ecoinvent report version 2.0, 15, Swiss Centre for LCI, ART, Duebendorf and Zuerich, CH
Nemecek, T., Kägi, T., Blaser, S. (2007) Life Cycle Inventories of Agricultural Production Systems. Ecoinvent report version 2.0. Editors: 0. Volume: 15. Swiss Centre for LCI, ART. Duebendorf and Zurich, CH.
Type: Measurement on site
Source: CD-ROM
First author: Nemecek, T.
Other authors: Kägi, T., Blaser, S.
Year: 2007
Name of editors: 0
Title of anthology: Ecoinvent report version 2.0
Place of publication: Duebendorf and Zurich, CH
Publisher: Swiss Centre for LCI, ART
Volume No: 15

## Validation
Proof reading validation: automatic validation in Excel; Other validation: none;
