# xxx Electricity, production mix FI

Dataset: EcoSpold 1, unit process
Functional unit: 1 kWh
Category: electricity / notMaintained
Geography: FI
Time period: 2000-01 to 2000-12
Production volume: 77 TWh
Share of production covered: 100 %
Generated by: René Itten
accessRestrictedTo: 0
copyright: true

## General comment
Electricity domestic net production shares are based on IEA statistics for the year 2008.;

## Included processes
It includes the shares of domestic electricity production by technology at the busbar. It does not include transformation, transport nor distribution losses.

## Geography
Data apply to public and self producers in Finland.

## Technology
No technology description is provided because the dataset just describes the power plant portfolio of the respective country using current (2004) average technology per energy carrier.

## Time period
Time period of statistics used (2008).

## Reference product
- xxx Electricity, production mix FI [FI]: 1 kWh
  FINLAND

## Inputs from technosphere
- Electricity from waste, at municipal waste incineration plant [CH]: 0.0060061 kWh; lognormal SD95 1.0541
  (1,1,1,3,1,1); assumption for power production from municipal and industrial waste in Finland, value: IEA statistics 2008
- Electricity, at cogen 300kWth, diesel, allocation exergy [CH]: 0.00023051 kWh; lognormal SD95 1.0541
  (1,1,1,3,1,1); assumption for diesel and other fossil fuel power production in Finland, value: IEA statistics 2008
- Electricity, nuclear, at power plant pressure water reactor [UCTE]: 0.10495 kWh; lognormal SD95 1.0511
  (1,1,1,2,1,1); assumption for nuclear power production in Finland using PWR, value: IEA statistics 2008, fraction: IAEA Database 2010 (PRIS)
- Electricity, peat, at power plant [NORDEL]: 0.066592 kWh; lognormal SD95 1.0511
  (1,1,1,2,1,1); assumption for peat power production in Finland, value: IEA statistics 2008
- Electricity, hydropower, at run-of-river power plant [RER]: 0.17194 kWh; lognormal SD95 1.0511
  (1,1,1,2,1,1); estimated share of ROR hydropower production in Finland: 75%
- Electricity, nuclear, at power plant boiling water reactor [UCTE]: 0.1871 kWh; lognormal SD95 1.0511
  (1,1,1,2,1,1); assumption for nuclear power production in Finland using BWR, value: IEA statistics 2008, fraction: IAEA Database 2010 (PRIS)
- Electricity, at cogen with biogas engine, allocation exergy [CH]: 0.0011141 kWh; lognormal SD95 1.0541
  (1,1,1,3,1,1); assumption for power production from biogas, sewage and landfill gas in Finland, value: IEA statistics 2008
- Electricity, at wind farm [RER]: 0.010012 kWh; lognormal SD95 1.0511
  (1,1,1,2,1,1); assumption for wind, geothermal, solar thermal, tidal and other power production in Finland, value: IEA statistics 2008
- Electricity, industrial gas, at power plant [NORDEL]: 0.0076581 kWh; lognormal SD95 1.0511
  (1,1,1,2,1,1); assumption for industrial, coke and blast furnace gas gas power production in Finland, value: IEA statistics 2008
- Electricity, hard coal, at power plant [ENTSO-E]: 0.10901 kWh; lognormal SD95 1.0511
  (1,1,1,2,1,1); assumption for hard coal power production in Finland, value: IEA statistics 2008
- Electricity, oil, at power plant [FI]: 0.0052121 kWh; lognormal SD95 1.05
  (1,1,1,1,1,1); assumption for petroleum product and fuel oil power production in Finland, value: IEA statistics 2008
- Electricity, at cogen 1MWth, wood chips, allocation exergy [CH]: 0.12879 kWh; lognormal SD95 1.0541
  (1,1,1,3,1,1); assumption for cogeneration power production in Finland, value: IEA statistics 2008
- Electricity, from natural gas [FI]: 0.14403 kWh; lognormal SD95 1.0511
  (1,1,1,2,1,1); assumption for natural gas power production in Finland, value: IEA statistics 2008
- Electricity, production mix photovoltaic, at plant [FI]: 5.0883e-5 kWh; lognormal SD95 1.05
  (1,1,1,1,1,1); assumption for solar power production in Finland, value: IEA statistics 2008
- Electricity, hydropower, at reservoir power plant, alpine region [RER]: 0.057314 kWh; lognormal SD95 1.0511
  (1,1,1,2,1,1); estimated share of reservoir hydropower production in Finland: 25%

## Sampling procedure
Statistical data

## Sources
- Frischknecht R., Itten R., Flury K., 2012, 2012 - GHG emis. from Swiss elec. mixes - Frischknecht, Project reports, 401, ESU-services Ltd., Uster, CH
Itten, R., Frischknecht, R. (2012) Life Cycle Inventories of electricity mixes. Project reports. Volume: 401. ESU-services Ltd.. Uster, CH.
Type: Separate publication
First author: Itten, R.
Other authors: Frischknecht, R.
Year: 2012
Title of anthology: Project reports
Place of publication: Uster, CH
Publisher: ESU-services Ltd.
Volume No: 401

## Validation
Proof reading validation: automatic validation in Excel; Other validation: \\Server\E\ESU-Docs\Projektablage\401 Update Strommix v3.0\EcoSpold\_Europa\[401-electricity-mix-finland-FI-v1.1.xlsx]X-Process;
