# Methanol, from biomass, at regional storage

Dataset: EcoSpold 1, unit process
Functional unit: 1 kg
Category: fuels / biofuels
Geography: CH
Time period: 2004-01 to 2004-12
Production volume: No commercial production of methanol-from-biomass. Laboratory-to-pilot scale.
Share of production covered: 0 %
Generated by: Edgard Gnansounou
accessRestrictedTo: 0
copyright: true

## General comment
Bottom-Up estimation based on plant data. Life time is 80 years. Product storage volume of storage tanks is 10'000 m3. The average storage time is 2 months. Thus total through flow in the life time is 4.8 mio. m3.;
CAS number: 000067-56-1;
Formula: CH3OH;
Synonyms: methyl alcohol, methyl hydroxide, monohydroxymethane;

## Included processes
This process includes the transport of biomass-based methanol from the plant to the end user. Operation of storage tanks and fuel station. Emissions from evaporation and treatment of effluents.

## Geography
Surveys mainly for DE and CH.

## Technology
Distribution of fuels

## Reference product
- Methanol, from biomass, at regional storage [CH]: 1 kg
  SWITZERLAND

## Inputs from technosphere
- Electricity, low voltage, at grid [CH]: 0.0067 kWh; lognormal SD95 1.1376
  (2,4,1,3,1,3); Environmental report
- Treatment, rainwater mineral oil storage, to wastewater treatment, class 2 [CH]: 7.5e-5 m3; lognormal SD95 1.323
  (4,5,3,3,1,na); Rainwater with pollutants
- Light fuel oil, burned in boiler 100kW, non-modulating [CH]: 0.000621 MJ; lognormal SD95 1.1376
  (2,4,1,3,1,3); Environmental report
- Disposal, municipal solid waste, 22.9% water, to sanitary landfill [CH]: 6.27e-6 kg; lognormal SD95 1.1376
  (2,4,1,3,1,3); Environmental report
- Methanol, from synthetic gas, at plant [CH]: 1.0005 kg; lognormal SD95 1.5226
  (3,2,1,2,4,2); Data derived from literature survey (>20 sources) 2000-2005
- Treatment, sewage, to wastewater treatment, class 2 [CH]: 6.89e-7 m3; lognormal SD95 1.1376
  (2,4,1,3,1,3); Used water
- Tap water, at user [CH]: 0.000689 kg; lognormal SD95 1.5642
  (5,5,1,2,1,na); Environmental report
- Transport, freight, rail, electricity with shunting [CH]: 0.1 tkm; lognormal SD95 2.095
  (4,5,na,na,na,na); Based on ecoinvent Guidelines, standard distances
- Disposal, separator sludge, 90% water, to hazardous waste incineration [CH]: 0.000168 kg; lognormal SD95 1.1739
  (2,4,3,3,1,3); Environmental report and literature
- Regional distribution, oil products [RER]: 2.6173e-10 p; lognormal SD95 3.0129
  (3,na,1,3,1,na); Calculation
- Transport, freight, lorry, 16t-32t gross weight, fleet average [CH]: 0.15 tkm; lognormal SD95 2.095
  (4,5,na,na,na,na); Based on ecoinvent Guidelines, standard distances

## Emissions to nature
- Heat, waste [emissions to air, high. pop.]: 0.02412 MJ; lognormal SD95 1.3003
  (1,1,1,2,3,5); Based on ecoinvent Guidelines and energy balance closure
- Methanol [emissions to air, high. pop.]: 0.0005 kg; lognormal SD95 1.526
  (2,4,1,3,1,3); Based on ecoinvent Guidelines

## Sampling procedure
Environmental reports and literature.

## Sources
- Jungbluth N., Chudacoff M., Dauriat A., Dinkel F., Doka G., Faist Emmenegger M., Gnansounou E., Kljun N., Spielmann M., Stettler C., Sutter J., 2007, 2007 - LCI bioenergy - Jungbluth, Final report ecoinvent data v2.0, 17, Swiss Centre for LCI, ESU-services Ltd., Duebendorf and Uster, CH
Jungbluth N., Chudacoff M., Dauriat A., Dinkel F., Doka G., Faist Emmenegger M., Gnansounou E., Kljun N., Spielmann M., Stettler C., Sutter J. (2007) Life Cycle Inventories of Bioenergy. Final report ecoinvent data v2.0. Volume: 17. Swiss Centre for LCI, ESU. Duebendorf and Uster, CH.
Type: Measurement on site
Source: CD-ROM
First author: Jungbluth N.
Other authors: Chudacoff M., Dauriat A., Dinkel F., Doka G., Faist Emmenegger M., Gnansounou E., Kljun N., Spielmann M., Stettler C., Sutter J.
Year: 2007
Title of anthology: Final report ecoinvent data v2.0
Place of publication: Duebendorf and Uster, CH
Publisher: Swiss Centre for LCI, ESU
Volume No: 17

## Validation
Proof reading validation: Passed.; Other validation: none;
