# xx Use, computer, desktop, mix, home use

Dataset: EcoSpold 1, unit process
Functional unit: 1 hr
Category: computers & network / use, obsolete\computers & network
Geography: CH
Time period: 2004-01 to 2004-12
Generated by: Martin Lehmann
accessRestrictedTo: 0
copyright: true

## General comment
The ratio 36/64 (CRT/LCD) is based on a survey carried out in Japan. Market information on selling volumes supports the trend towards more and more LCD monitors. The computer home use is calculated according to the share between active, standby and off modes taken from literature information.;
Synonyms: PC;

## Included processes
Describes a mixed use of a desktop computer with the ratio 36% CRT monitor and 64% LCD monitor. Calculated per 1 hour of computer use at home. Swiss supply mix applied for electricity consumption (low voltage).

## Technology
No technology involved, except for the production of the desktop computer, which is described in another dataset.

## Reference product
- xx Use, computer, desktop, mix, home use [CH]: 1 hr
  SWITZERLAND

## Inputs from technosphere
- Use, computer, desktop with LCD monitor, home use [CH]: 0.64 hr; lognormal SD95 1.3062
  (2,5,1,2,1,5,3)
- Use, computer, desktop with CRT monitor, home use [CH]: 0.36 hr; lognormal SD95 1.3062
  (2,5,1,2,1,5,3)

## Sampling procedure
Literature, survey and assumptions

## Extrapolations
see Geography and Technology

## Sources
- Hischier R., Classen M., Lehmann M., Scharnhorst W., 2007, 2007 - LCI electric and electronic equipment - Hischier, Final report ecoinvent Data v2.0, 18, Swiss Centre for LCI, Empa - TSL, Duebendorf and St. Gallen, CH
Hischier R., Classen M., Lehmann M., Scharnhorst W. (2007) Life Cycle Inventories of Electric and Electronic Equipment - Production, Use & Disposal. Final report ecoinvent Data v2.0. Volume: 18. Swiss Centre for LCI, Empa - TSL. Duebendorf and St. Gallen, CH.
Type: Measurement on site
Source: CD-ROM
First author: Hischier R.
Other authors: Classen M., Lehmann M., Scharnhorst W.
Year: 2007
Title of anthology: Final report ecoinvent Data v2.0
Place of publication: Duebendorf and St. Gallen, CH
Publisher: Swiss Centre for LCI, Empa - TSL
Volume No: 18
Original title: Life Cycle Inventories of Electric and Electronic Equipment - Production, Use & Disposal

## Validation
Proof reading validation: passed; Other validation: none;
