# Roundwood, eucalyptus ssp. (SFM), under bark, u=50%, at forest road

Dataset: EcoSpold 1, unit process
Functional unit: 1 m3
Category: wood / extraction
Geography: TH
Time period: 2000-01 to 2005-12
Generated by: Frank Werner
accessRestrictedTo: 0
copyright: true

## General comment
data refers to wood from sustainably managed plantation. uses Dutch data on forestry processes;
Synonyms: Eucalyptus camaldulensis;

## Included processes
includes plantation establishment and management, harvesting and hauling operations, incl biomass burning of branchings; fuel consumption and gravel for forest road construction is unknown; land use of forest roads and gravel are distregarded; branchings are left to rot on the ground

## Technology
the representativity of this data set for forestry conditions in Thailand is assumed to be low

## Reference product
- Roundwood, eucalyptus ssp. (SFM), under bark, u=50%, at forest road [TH]: 1 m3
  THAILAND

## Inputs from technosphere
- Power sawing, without catalytic converter [RER]: 0.25 hr; lognormal SD95 1.2621
  (3,4,1,3,1,5)
- Lubricating oil, at plant [RER]: 0.3 kg; lognormal SD95 1.2621
  (3,4,1,3,1,5)
- Diesel, burned in building machine, average [CH]: 64.8 MJ; lognormal SD95 1.2621
  (3,4,1,3,1,5)
- Eucalyptus ssp., standing, under bark, u=50%, in plantation [TH]: 1.2 m3; lognormal SD95 1.2621
  (3,4,1,3,1,5)

## Inputs from nature
- Wood, hard, standing [resources, biotic]: -0.22 m3; lognormal SD95 1.2621
  (3,4,1,3,1,5)
- Energy, gross calorific value, in biomass [resources, biotic]: -4866 MJ; lognormal SD95 1.2621
  (3,4,1,3,1,5)

## Emissions to nature
- Particulates, > 2.5 um, and < 10um [emissions to air, low. pop.]: 0.825 kg; lognormal SD95 1.592
  (3,4,1,3,1,5)
- Particulates, < 2.5 um [emissions to air, low. pop.]: 0.99 kg; lognormal SD95 1.592
  (3,4,1,3,1,5)
- Dinitrogen monoxide [emissions to air, low. pop.]: 0.0019725 kg; lognormal SD95 1.592
  (3,4,1,3,1,5)
- Methane, biogenic [emissions to air, low. pop.]: 0.28692 kg; lognormal SD95 1.592
  (3,4,1,3,1,5)
- Carbon dioxide, biogenic [emissions to air, unspecified]: 328.16 kg; lognormal SD95 1.2621
  (3,4,1,3,1,5)
- Particulates, > 10 um [emissions to air, low. pop.]: 0.66 kg; lognormal SD95 1.592
  (3,4,1,3,1,5)

## Sampling procedure
literature

## Uncertainty adjustments
see Technology and Geography

## Sources
- Althaus H.-J., Werner F., Stettler C., Dinkel F., 2007, 2007 - LCI renewable materials - Althaus, Final report ecoinvent Data v2.0, 21, Swiss Centre for LCI, Empa - TSL, Umwelt & Entwicklung, Carbotech AG, Duebendorf, CH
Althaus H.J., Dinkel F., Werner F. (2007) Life Cycle Inventories of Renewable Materials. Final report ecoinvent Data v2.0. Editors: 0. 0. Volume: 21. Issue: 0. Swiss Centre for LCI, Empa - TSL. Duebendorf, CH.
Type: Measurement on site
Source: CD-ROM
First author: Althaus H.J.
Other authors: Dinkel F., Werner F.
Year: 2007
Name of editors: 0
Title of anthology: Final report ecoinvent Data v2.0
Place of publication: Duebendorf, CH
Publisher: Swiss Centre for LCI, Empa - TSL
Journal: 0
Volume No: 21
Issue No: 0

## Validation
Proof reading validation: Passed; Other validation: none;
