# Holzpur, softwood, raw, air, kiln dried, u=6%, at plant, with resource correction

Dataset: EcoSpold 1, unit process
Functional unit: 1 m3
Category: wood / wooden materials\extraction
Geography: CH
Generated by: Philippe Stolz
accessRestrictedTo: 0
copyright: true

## General comment
Material production and disposal. Resource correction for 50% of the energy content of the wood.;

## Included processes
Includes the material use for the production and the disposal of the holzpur element. The recycling at the end of life is accounted for.

## Geography
Data apply to the Walter Küng AG in Switzerland.

## Technology
Industry data.

## Time period
Time of publications.

## Reference product
- Holzpur, softwood, raw, air, kiln dried, u=6%, at plant, with resource correction [CH]: 1 m3
  SWITZERLAND

## Inputs from technosphere
- Holzpur, softwood, raw, air, kiln dried, u=6%, at plant [CH]: 1 m3; lognormal SD95 1.05
  (1,1,1,1,1,1,BU:1.05); ;

## Inputs from nature
- Energy, gross calorific value, in biomass, resource correction [resources, biotic]: -2988.4 MJ; lognormal SD95 1.05
  (1,1,1,1,1,1,BU:1.05); Correction for recycling of wood; 684-Holzdaten-Ressourcenkorrektur

## Sampling procedure
Data survey at the Walter Küng AG in Alpnach-Dorf (Switzerland).

## Sources
- Stolz P., Frischknecht R., 2015, 2015 - LCA solid wood system holzpur - Stolz, Project report, 527, treeze Ltd., Uster, CH
Stolz P., Frischknecht R. (2015) Ökobilanz Vollholzsystem holzpur. Project report. Volume: 527. treeze Ltd.. Uster, CH.
Type: Separate publication
Source: Report
First author: Stolz P.
Other authors: Frischknecht R.
Year: 2015
Title of anthology: Project report
Place of publication: Uster, CH
Publisher: treeze Ltd.
Volume No: 527

## Validation
Proof reading validation: 08.05.2015; Other validation: \\SRV01\ESU-Docs\Projekte laufend\527 Bilanz Holzpur\EcoSpold\[527-Ökobilanz-holzpur-v0.16.xlsx]X-Process;
