# Production efforts, resistors

Dataset: EcoSpold 1, unit process
Functional unit: 1 kg
Category: electronics / manufacturing
Geography: GLO
Time period: 2023-01 to 2029-12
Generated by: Lugas Raka Adrianto, Maulana Permana Ajie, Didier Beloin-Saint-Pierre
accessRestrictedTo: 0
copyright: false

## General comment
Data are a rough estimation of the average production efforts over all types of resistors, incl. potentiometers. Data for auxillaries, energy, emissions and waste are taken from four datasets ouf of an international LCI database. Infrastructure and transportation efforts are based on own assumptions. Updates were made in 2023, showing that 20% energy reduction is achieved;

## Included processes
This module includes auxillary and energy consumption, emissions (air, water) and waste amounts, as well as an estimation of the efforts for transportation and of the infrastructure for the production of resistors.

## Geography
Data from literature – here representing the global situation.

## Technology
Average technology for the production of resistors and potentiometers - comprising terminmation printing; resistive body printing; glass coat printing; laser trimming; substrate stripping (SMT) resp. ceramic rods; deposition processes; ageing; capping (THT) resp. printing; curing; punching; revetting; molding (ptoentiom.)

## Reference product
- Production efforts, resistors [GLO]: 1 kg
  Global

## Inputs from technosphere
- Carboxymethyl cellulose, powder, at plant [RER]: 0.0032 kg; lognormal SD95 1.27
  (2,4,3,3,1,5,BU:1.05); average from literature
- Chemicals organic, at plant [GLO]: 0.0064 kg; lognormal SD95 1.27
  (2,4,3,3,1,5,BU:1.05); average from literature
- Electricity, medium voltage, production GLO, at grid [GLO]: 30.64 kWh; lognormal SD95 1.27
  (2,4,3,3,1,5,BU:1.05); average from literature
- Electronic component production plant [GLO]: 2e-8 p; lognormal SD95 3.85
  (4,5,4,3,5,5,BU:3.00); rough assumption
- Heat, light fuel oil, at industrial furnace 1MW [RER]: 8.32 MJ; lognormal SD95 1.27
  (2,4,3,3,1,5,BU:1.05); average from literature
- Solvents, organic, unspecified, at plant [GLO]: 0.0064 kg; lognormal SD95 1.27
  (2,4,3,3,1,5,BU:1.05); average from literature
- Transport, freight, rail [RER]: 0.7476 tkm; lognormal SD95 2.08
  (2,4,3,3,1,5,BU:2.00); standard distances
- Transport, freight, lorry, fleet average [RER]: 0.1246 tkm; lognormal SD95 2.08
  (2,4,3,3,1,5,BU:2.00); standard distances
- Disposal, plastics, mixture, 15.3% water, to sanitary landfill [CH]: 0.115 kg; lognormal SD95 1.27
  (2,4,3,3,1,5,BU:1.05); assumption, based on literature
- Disposal, solvents mixture, 16.5% water, to hazardous waste incineration [CH]: 0.0032 kg; lognormal SD95 1.27
  (2,4,3,3,1,5,BU:1.05); calculated from input of auxillaries
- Disposal, waste, Si waferprod., inorg, 9.4% water, to residual material landfill [CH]: 0.115 kg; lognormal SD95 1.27
  (2,4,3,3,1,5,BU:1.05); assumption, based on literature
- Treatment, sewage, to wastewater treatment, class 2 [CH]: 0.0205 m3; lognormal SD95 1.27
  (2,4,3,3,1,5,BU:1.05); assumption, based on literature

## Inputs from nature
- Water, cooling, unspecified natural origin/m3 [resources, in water]: 0.0205 m3; lognormal SD95 1.65
  (3,4,4,1,1,5,BU:1.50); assumption, based on literature
- Water, unspecified natural origin/m3 [resources, in water]: 0.0205 m3; lognormal SD95 1.65
  (3,4,4,1,1,5,BU:1.50); assumption, based on literature

## Emissions to nature
- Ethyl cellulose [emissions to air, high. pop.]: 0.0032 kg; lognormal SD95 1.6
  (2,4,3,3,1,5,BU:1.50); calculated from input of auxillaries
- Heat, waste [emissions to air, high. pop.]: 137.88 MJ; lognormal SD95 1.6
  (2,4,3,3,1,5,BU:1.50); calculated, from electricity input
- NMVOC, non-methane volatile organic compounds, unspecified origin [emissions to air, high. pop.]: 0.0096 kg; lognormal SD95 1.6
  (2,4,3,3,1,5,BU:1.50); calculated from input of auxillaries
- Water [emissions to water, unspecified]: 19.475, 19.475 kg (2 entries); lognormal SD95 2.5196
  (5,5,5,5,5,BU:1.05); All uncertainty-values set to 5.0 by default. Balance of input water

## Sampling procedure
estimation - based on literature

## Extrapolations
see Geography & Technology

## Sources
- Raka Adrianto L., Permana Ajie M., Beloin-Saint-Pierre D., 2024, 2024 - LCI ICT sector - Raka Adrianto, Empa, St. Gallen, CH

## Validation
Proof reading validation: Passed, Other validation: none, Validator: Mischa Zschokke, Company: Carbotech, Country: CH
