# Potassium permanganate, at plant

Dataset: EcoSpold 1, unit process
Functional unit: 1 kg
Category: chemicals / inorganic
Geography: RER
Time period: 2008-01 to 2008-12
Share of production covered: 100 %
Generated by: Juergen Sutter
accessRestrictedTo: 0
copyright: true

## General comment
The multioutput-process "Manganese dioxide oxidation" delivers the co-products potassium permanganate and hydrogen. The allocation is based on stoechiometric calculation.;

## Included processes
Manganese dioxide oxidation process including materials, energy uses, infrastructure and emissions.

## Technology
Oxidation of manganese dioxide

## Time period
Time of publications.

## Reference product
- Potassium permanganate, at plant [RER]: 1 kg
  Europe

## Inputs from technosphere
- Transport, freight, rail [RER]: 0.64732 tkm; lognormal SD95 2.095
  (4,5,na,na,na,na); Standard distance 600km
- Disposal, inert waste, 5% water, to construction waste landfill [CH]: 0.061181 kg; lognormal SD95 1.3765
  (4,5,1,1,1,5); Stoechiometric calculation
- Carbon dioxide liquid, at plant [RER]: 0.012484 kg; lognormal SD95 1.3765
  (4,5,1,1,1,5); Stoechiometric calculation
- Electricity, medium voltage, production ENTSO-E, at grid: 0.53608 kWh; lognormal SD95 1.5095
  (1,1,5,3,1,3); Pletcher/Walsh 1990
- Chemical plant, organics [RER]: 3.8987e-10 p; lognormal SD95 3.0909
  (4,5,na,na,na,na); Estimation
- Oxygen, liquid, at plant [RER]: 0.10127 kg; lognormal SD95 1.3765
  (4,5,1,1,1,5); Stoechiometric calculation
- Potassium hydroxide, at regional storage [RER]: 0.38385 kg; lognormal SD95 1.3765
  (4,5,1,1,1,5); Stoechiometric calculation
- Transport, freight, lorry, fleet average [RER]: 0.10789 tkm; lognormal SD95 2.095
  (4,5,na,na,na,na); Standard distance 100km
- Manganese concentrate, at beneficiation [GLO]: 0.61181 kg; lognormal SD95 1.3765
  (4,5,1,1,1,5); Stoechiometric calculation

## Inputs from nature
- Water, cooling, unspecified natural origin/m3 [resources, in water]: 0.023393 m3; lognormal SD95 1.3001
  (4,5,na,na,na,na); Estimation

## Emissions to nature
- Carbon dioxide, fossil [emissions to air, high. pop.]: 0.00024477 kg; lognormal SD95 1.3001
  (4,5,na,na,na,na); Estimation
- Heat, waste [emissions to air, high. pop.]: 1.9299 MJ; lognormal SD95 1.3001
  (4,5,na,na,na,na); Calculated from the electricity input
- Water [emissions to water, unspecified]: 22.2233 kg; lognormal SD95 2.5196
  (5,5,5,5,5,BU:1.05); All uncertainty-values set to 5.0 by default. Balance of input water

## Sampling procedure
Literature data

## Sources
- Althaus H.-J., Chudacoff M., Hellweg S., Hischier R., Jungbluth N., Osses M., Primas A., 2007, 2007 - LCI chemicals - Althaus, Final report ecoinvent data v2.0, 8, Swiss Centre for LCI, Empa - TSL, ETH, ESU-services Ltd., Chudacoff Oekoscience, Duebendorf, CH
Althaus H.-J., Chudacoff M., Hischier R., Jungbluth N., Osses M., Primas A. (2007) Life Cycle Inventories of Chemicals. Final report ecoinvent data v2.0. Volume: 8. Swiss Centre for LCI, Empa - TSL. Dübendorf, CH.
Type: Measurement on site
Source: CD-ROM
First author: Althaus H.-J.
Other authors: Chudacoff M., Hischier R., Jungbluth N., Osses M., Primas A.
Year: 2007
Title of anthology: Final report ecoinvent data v2.0
Place of publication: Dübendorf, CH
Publisher: Swiss Centre for LCI, Empa - TSL
Volume No: 8

## Validation
Proof reading validation: automatic validation in Excel; Other validation: none;
