# Goods wagon

Dataset: EcoSpold 1, unit process, infrastructure
Functional unit: 1 p
Category: transport systems / train\operations\infrastructure
Geography: RER
Time period: 2000-01 to 2000-12
Generated by: Michael Spielmann
accessRestrictedTo: 0
copyright: true

## General comment
For the average good wagon we assumed that 65% of the transport is performed by closed wagons and 35% by tank wagons. 50% of the wagon in each category are 2 axis vehicles. The life span of one wagon is assumed to be 40 years with a yearly kilometric performance of 21148km, resulting in a life time performance of 845'900 kilometres. The total weight of a wagon is assumed as about 27t);

## Included processes
This inventory calls processes of material production, representing the material composition of an average goods wagon. For manufacturing, electricity and light oil burned in industrial furnance are included. For the transportation of materials standandard distance are applied.

## Geography
Manufacturing data reflects an average material consumption of wagons used in Europe.

## Technology
The modelled goods wagons represent different technologies currently in use.

## Reference product
- Goods wagon [RER]: 1 p
  Europe

## Inputs from technosphere
- Electricity, medium voltage, production ENTSO-E, at grid: 9220 kWh; lognormal SD95 1.36
  (4,3,3,3,1,4); own calculations based on oral communication
- Synthetic rubber, at plant [RER]: 10 kg; lognormal SD95 1.36
  (4,3,3,3,1,4); own calculations based on oral communication
- Steel, low-alloyed, at plant [RER]: 21000 kg; lognormal SD95 1.36
  ; own calculations based on oral communication
- Transport, freight, lorry, fleet average [RER]: 2210 tkm; lognormal SD95 2.28
  (4,5,na,na,na,na); standard distance
- Rock wool, packed, at plant [CH]: 32 kg
  (4,3,3,3,1,4); own calculations based on oral communication
- Glued laminated timber, average glue mix, at plant [RER]: 1.92 m3; lognormal SD95 1.36
  (4,3,3,3,1,4); own calculations based on oral communication
- Transport, freight, rail [RER]: 4430 tkm; lognormal SD95 2.28
  (4,5,na,na,na,na); standard distance
- Alkyd paint, white, 60% in solvent, at plant [RER]: 106 kg; lognormal SD95 1.36
  (4,3,3,3,1,4); own calculations based on oral communication
- Aluminium, production mix, at plant [RER]: 1070 kg; lognormal SD95 1.36
  (4,3,3,3,1,4); own calculations based on oral communication
- Light fuel oil, burned in industrial furnace 1MW, non-modulating [RER]: 46000 MJ; lognormal SD95 1.36
  (4,3,3,3,1,4); own calculations based on oral communication

## Emissions to nature
- Heat, waste [emissions to air, unspecified]: 33200 MJ; lognormal SD95 1.36
  (4,3,3,3,1,4); standard value

## Sampling procedure
The data of the material composition and energy consumption is based on oral communication with an expert of one company.

## Extrapolations
Data for three wagon types is used as an estimate for Europe

## Sources
- Spielmann M., Bauer C., Dones R., Tuchschmid M., 2007, 2007 - Transport services - Spielmann, Final report ecoinvent Data v2.0, 14, Swiss Centre for LCI, PSI, ESU-services Ltd., Duebendorf, Villigen and Uster, CH
Spielmann M., Dones R; Bauer C. (2007) Life Cycle Inventories of Transport Services. Final report ecoinvent Data v2.0. Volume: 14. Issue: 0. Swiss Centre for LCI, PSI. Dübendorf and Villigen, CH.
Type: Measurement on site
Source: CD-ROM
First author: Spielmann M.
Other authors: Dones R; Bauer C.
Year: 2007
Title of anthology: Final report ecoinvent Data v2.0
Place of publication: Dübendorf and Villigen, CH
Publisher: Swiss Centre for LCI, PSI
Volume No: 14
Issue No: 0

## Validation
Proof reading validation: passed; Other validation: none;
