# Disposal, hard coal ash, 0% water, to residual material landfill

Dataset: EcoSpold 1, unit process
Functional unit: 1 kg
Category: landfill / residual material landfill
Geography: IT
Time period: 2000-01 to 2000-12
Generated by: Gabor Doka
accessRestrictedTo: 0
copyright: true

## General comment
Inventoried waste contains 100% IT hard coal ash; . waste composition (wet, in ppm): H2O n.a.; O 625530; H n.a.; C n.a.; S 1666.7; N n.a.; P 820.84; B 222.27; Cl 17.478; Br 30.005; F 73.405; I 2.3247; Ag n.a.; As 14.973; Ba 1120.6; Cd 0.8579; Co 24.584; Cr 113.51; Cu 56.225; Hg 0.083722; Mn 321.17; Mo 8.2233; Ni 73.132; Pb 48.674; Sb 2.6303; Se 8.2491; Sn 58.175; V 134.47; Zn 85.138; Be 10.143; Sc 33.966; Sr 1173.4; Ti 5797.2; Tl 5.0956; W 15.011; Si 150000; Fe 42069; Ca 12359; Al 103780; K 11678; Mg 36248; Na 6393.6; Share of carbon in waste that is biogenic 60.4%. ;;

## Included processes
Waste-specific short-term emissions to water from leachate. Long-term emissions from landfill to ground water.

## Geography
Technology encountered in Switzerland in 2000. Landfill includes base seal and leachate collection system.

## Technology
Swiss residual material landfill for polluted, inorganic waste. With base seal and leachate collection system. Recultivation after closure.

## Time period
Waste composition as given in literature reference, theoretical data or other source. Transfer coefficients from prospective model.

## Reference product
- Disposal, hard coal ash, 0% water, to residual material landfill [IT]: 1 kg
  ITALY

## Inputs from technosphere
- Process-specific burdens, residual material landfill [CH]: 1 kg; lognormal SD95 1
  demands per kilogram waste. uncertainty is heeded in the module
- Residual material landfill facility [CH]: 2.0833e-9 p; lognormal SD95 1
  demands per kilogram waste. uncertainty is heeded in the module

## Emissions to nature
- Vanadium [emissions to water, river]: 3.3001e-7 kg; lognormal SD95 11.21
  uncertainty is calculated from uncertainties in waste composition and transfer coefficients in residual landfill
- Zinc [emissions to water, groundwater, long-term]: 1.0435e-6 kg; lognormal SD95 124.95
  uncertainty is calculated from uncertainties in waste composition and transfer coefficients in incinerator and landfills.
- Bromine [emissions to water, groundwater, long-term]: 5.9019e-6 kg; lognormal SD95 8.4592
  (same comment as for Zinc)
- Tungsten [emissions to water, river]: 5.2936e-6 kg; lognormal SD95 9.3039
  (same comment as for Vanadium)
- Cobalt [emissions to water, groundwater, long-term]: 4.203e-6 kg; lognormal SD95 16.079
  (same comment as for Zinc)
- Magnesium [emissions to water, river]: 6.8758e-6 kg; lognormal SD95 8.0842
  (same comment as for Vanadium)
- Antimony [emissions to water, river]: 9.276e-7 kg; lognormal SD95 11.33
  (same comment as for Vanadium)
- Titanium [emissions to water, river]: 2.873e-6 kg; lognormal SD95 8.7653
  (same comment as for Vanadium)
- Copper [emissions to water, river]: 3.6133e-9 kg; lognormal SD95 17.558
  (same comment as for Vanadium)
- Chloride [emissions to water, river]: 4.9989e-6 kg; lognormal SD95 9.2336
  (same comment as for Vanadium)
- Chromium VI [emissions to water, groundwater, long-term]: 2.1555e-5 kg; lognormal SD95 7.0371
  (same comment as for Zinc)
- Lead [emissions to water, river]: 4.215e-10 kg; lognormal SD95 21.269
  (same comment as for Vanadium)
- Nickel [emissions to water, groundwater, long-term]: 2.6477e-5 kg; lognormal SD95 9.4546
  (same comment as for Zinc)
- Iodide [emissions to water, river]: 2.3247e-6 kg; lognormal SD95 11.205
  (same comment as for Vanadium)
- Copper [emissions to water, groundwater, long-term]: 2.1644e-6 kg; lognormal SD95 46.639
  (same comment as for Zinc)
- Strontium [emissions to water, groundwater, long-term]: 0.0004248 kg; lognormal SD95 6.6318
  (same comment as for Zinc)
- Sulfate [emissions to water, groundwater, long-term]: 0.0044636 kg; lognormal SD95 4.6601
  (same comment as for Zinc)
- Bromine [emissions to water, river]: 2.4103e-5 kg; lognormal SD95 8.3321
  (same comment as for Vanadium)
- Scandium [emissions to water, river]: 4.7935e-6 kg; lognormal SD95 8.9179
  (same comment as for Vanadium)
- Boron [emissions to water, river]: 1.7415e-6 kg; lognormal SD95 9.3525
  (same comment as for Vanadium)
- Molybdenum [emissions to water, river]: 8.1855e-6 kg; lognormal SD95 9.7265
  (same comment as for Vanadium)
- Scandium [emissions to water, groundwater, long-term]: 2.9172e-5 kg; lognormal SD95 8.2015
  (same comment as for Zinc)
- Arsenic [emissions to water, groundwater, long-term]: 1.4973e-14 kg; lognormal SD95 9.2574
  (same comment as for Zinc)
- Aluminium [emissions to water, river]: 5.1433e-5 kg; lognormal SD95 6.4067
  (same comment as for Vanadium)
- Arsenic [emissions to water, river]: 1.4973e-5 kg; lognormal SD95 9.0619
  (same comment as for Vanadium)
- Sodium [emissions to water, river]: 0.0023994 kg; lognormal SD95 3.8141
  (same comment as for Vanadium)
- Manganese [emissions to water, river]: 4.429e-9 kg; lognormal SD95 17.214
  (same comment as for Vanadium)
- Barium [emissions to water, river]: 1.5453e-8 kg; lognormal SD95 15.3
  (same comment as for Vanadium)
- Barium [emissions to water, groundwater, long-term]: 9.2565e-6 kg; lognormal SD95 157.15
  (same comment as for Zinc)
- Thallium [emissions to water, groundwater, long-term]: 1.8448e-6 kg; lognormal SD95 12.699
  (same comment as for Zinc)
- Antimony [emissions to water, groundwater, long-term]: 1.7027e-6 kg; lognormal SD95 11.105
  (same comment as for Zinc)
- Titanium [emissions to water, groundwater, long-term]: 0.0017209 kg; lognormal SD95 5.9987
  (same comment as for Zinc)
- Calcium [emissions to water, groundwater, long-term]: 0.0011167 kg; lognormal SD95 14.491
  (same comment as for Zinc)
- Chloride [emissions to water, groundwater, long-term]: 1.2479e-5 kg; lognormal SD95 8.9262
  (same comment as for Zinc)
- Iron [emissions to water, river]: 3.52e-7 kg; lognormal SD95 11.476
  (same comment as for Vanadium)
- Sodium [emissions to water, groundwater, long-term]: 0.0039942 kg; lognormal SD95 3.698
  (same comment as for Zinc)
- Tin [emissions to water, groundwater, long-term]: 1.1024e-6 kg; lognormal SD95 86.236
  (same comment as for Zinc)
- Phosphate [emissions to water, groundwater, long-term]: 0.00056229 kg; lognormal SD95 9.3106
  (same comment as for Zinc)
- Fluoride [emissions to water, groundwater, long-term]: 6.9427e-5 kg; lognormal SD95 7.4145
  (same comment as for Zinc)
- Magnesium [emissions to water, groundwater, long-term]: 0.0041186 kg; lognormal SD95 10.691
  (same comment as for Zinc)
- Tin [emissions to water, river]: 1.8404e-9 kg; lognormal SD95 18.674
  (same comment as for Vanadium)
- Iron [emissions to water, groundwater, long-term]: 0.00021085 kg; lognormal SD95 215.49
  (same comment as for Zinc)
- Cobalt [emissions to water, river]: 7.0167e-9 kg; lognormal SD95 16.511
  (same comment as for Vanadium)
- Selenium [emissions to water, river]: 2.9091e-6 kg; lognormal SD95 9.9775
  (same comment as for Vanadium)
- Zinc [emissions to water, river]: 1.742e-9 kg; lognormal SD95 18.763
  (same comment as for Vanadium)
- Beryllium [emissions to water, river]: 6.1303e-9 kg; lognormal SD95 16.733
  (same comment as for Vanadium)
- Fluoride [emissions to water, river]: 3.9779e-6 kg; lognormal SD95 8.7898
  (same comment as for Vanadium)
- Silicon [emissions to water, groundwater, long-term]: 0.14966 kg; lognormal SD95 1.8044
  (same comment as for Zinc)
- Strontium [emissions to water, river]: 7.0919e-7 kg; lognormal SD95 10.26
  (same comment as for Vanadium)
- Chromium VI [emissions to water, river]: 6.8236e-6 kg; lognormal SD95 8.2469
  (same comment as for Vanadium)
- Manganese [emissions to water, groundwater, long-term]: 2.653e-6 kg; lognormal SD95 167.63
  (same comment as for Zinc)
- Molybdenum [emissions to water, groundwater, long-term]: 3.7754e-8 kg; lognormal SD95 9.9285
  (same comment as for Zinc)
- Aluminium [emissions to water, groundwater, long-term]: 0.030808 kg; lognormal SD95 4.0363
  (same comment as for Zinc)
- Calcium [emissions to water, river]: 1.8643e-6 kg; lognormal SD95 9.3011
  (same comment as for Vanadium)
- Mercury [emissions to water, river]: 6.5973e-12 kg; lognormal SD95 30.299
  (same comment as for Vanadium)
- Mercury [emissions to water, groundwater, long-term]: 3.9518e-9 kg; lognormal SD95 61.825
  (same comment as for Zinc)
- Iodide [emissions to water, groundwater, long-term]: 2.3247e-13 kg; lognormal SD95 11.425
  (same comment as for Zinc)
- Thallium [emissions to water, river]: 3.0798e-9 kg; lognormal SD95 17.834
  (same comment as for Vanadium)
- Nickel [emissions to water, river]: 4.4201e-8 kg; lognormal SD95 13.799
  (same comment as for Vanadium)
- Cadmium [emissions to water, groundwater, long-term]: 5.8242e-9 kg; lognormal SD95 268.54
  (same comment as for Zinc)
- Vanadium [emissions to water, groundwater, long-term]: 0.00010335 kg; lognormal SD95 6.9513
  (same comment as for Zinc)
- Sulfate [emissions to water, river]: 0.00053644 kg; lognormal SD95 5.3643
  (same comment as for Vanadium)
- Cadmium [emissions to water, river]: 9.7232e-12 kg; lognormal SD95 28.965
  (same comment as for Vanadium)
- Beryllium [emissions to water, groundwater, long-term]: 3.6721e-6 kg; lognormal SD95 11.811
  (same comment as for Zinc)
- Silicon [emissions to water, river]: 0.00033734 kg; lognormal SD95 4.9271
  (same comment as for Vanadium)
- Potassium [emissions to water, groundwater, long-term]: 0.0083862 kg; lognormal SD95 3.2802
  (same comment as for Zinc)
- Boron [emissions to water, groundwater, long-term]: 0.00021855 kg; lognormal SD95 6.3615
  (same comment as for Zinc)
- Tungsten [emissions to water, groundwater, long-term]: 9.7169e-6 kg; lognormal SD95 9.1037
  (same comment as for Zinc)
- Lead [emissions to water, groundwater, long-term]: 2.5248e-7 kg; lognormal SD95 284.12
  (same comment as for Zinc)
- Potassium [emissions to water, river]: 0.0032919 kg; lognormal SD95 3.4929
  (same comment as for Vanadium)
- Phosphate [emissions to water, river]: 9.3871e-7 kg; lognormal SD95 11.255
  (same comment as for Vanadium)
- Selenium [emissions to water, groundwater, long-term]: 5.34e-6 kg; lognormal SD95 9.7693
  (same comment as for Zinc)

## Sampling procedure
Landfill model based on observed leachate concentrations in literature. Extrapolated to 60'000 years heeding chemical characteristics. Initial waste composition from various literature sources.

## Uncertainty adjustments
uncertainty of waste input composition data derived from generic formula GSD(c) = N*ln(c)+1. Mean long-term emissions are the emissions until the next glacial period occurs (in 60'000a) and the landfill is eroded. Maximal long-term emissions are the complete emissions of all landfilled material (except Cr). Minimal long-term emissions are derived implicitly from the mean and maximal values assuming a lognormal distribution.

## Sources
- Doka G., 2009, 2009 - LCI waste treatment services - Doka, Final report ecoinvent data v2.1, 13, Swiss Centre for LCI, Doka LCA, Duebendorf and St. Gallen, CH
Doka G. (2009) Life Cycle Inventories of Waste Treatment Services. Final report ecoinvent data v2.1. Volume: 13. Swiss Centre for LCI, Empa - TSL. Dübendorf, CH.
Type: Measurement on site
Source: CD-ROM
First author: Doka G.
Year: 2009
Title of anthology: Final report ecoinvent data v2.1
Place of publication: Dübendorf, CH
Publisher: Swiss Centre for LCI, Empa - TSL
Volume No: 13

## Validation
Proof reading validation: passed.; Other validation: none;
