# Fuel cell stack production, 1 kWe, proton exchange membrane (PEM)

Dataset: EcoSpold 1, unit process
Functional unit: 1 p
Category: fuels / synthetic\infrastructure
Geography: GLO
Time period: 2024-01 to 2024-01
Generated by: Romain Sacchi
accessRestrictedTo: 0
copyright: true

## General comment
LCI for a PEMFC fuel cell stack system. Operational time was set to 20,000 h at power of 1 kWe. Due to the degradation effects the hydrogen consumption must be increased to always generate the power of 1 kWe. In the case of dynamic operational regime 5 replacements (Nd = 5) of the PEMFC stack are included (lifetime of 3'800 hours per stack). Source: Rok Stropnik, Nejc Mlakar, Andrej LotriÄ�, Mihael SekavÄ�nik, Mitja Mori, The influence of degradation effects in proton exchange membrane fuel cells on life cycle assessment modelling and environmental impact indicators, International Journal of Hydrogen Energy, Volume 47, Issue 57, 2022, https://doi.org/10.1016/j.ijhydene.2022.04.011

## Reference product
- Fuel cell stack production, 1 kWe, proton exchange membrane (PEM) [GLO]: 1 p
  not defined

## Inputs from technosphere
- Electricity, low voltage, production GLO, at grid [GLO]: 16.9 kWh; lognormal SD95 2.565
  {5;5;5;5;5;5;1.05;}
- Graphite, at plant [RER]: 4.5 kg; lognormal SD95 2.565
  {5;5;5;5;5;5;1.05;}
- Polyvinylidenchloride, granulate, at plant [RER]: 1.1 kg; lognormal SD95 2.565
  {5;5;5;5;5;5;1.05;}
- Injection moulding [RER]: 1.107 kg; lognormal SD95 2.565
  {5;5;5;5;5;5;1.05;}
- Aluminium, production mix, at plant [RER]: 0.3 kg; lognormal SD95 2.565
  {5;5;5;5;5;5;1.05;}
- Aluminium product manufacturing, average metal working [RER]: 0.3 kg; lognormal SD95 2.565
  Under-floor heating system {5;5;5;5;5;5;1.05;}
- Chromium steel 18/8, at plant [RER]: 0.1 kg; lognormal SD95 2.565
  {5;5;5;5;5;5;1.05;}
- Steel product manufacturing, average metal working [RER]: 0.1 kg; lognormal SD95 2.565
  Evaporator and condenser {5;5;5;5;5;5;1.05;}
- Glass fibre, at plant [RER]: 0.1 kg; lognormal SD95 2.565
  {5;5;5;5;5;5;1.05;}
- Polymer electrolyte membrane (Nafion) production [RER]: 0.07 kg; lognormal SD95 2.565
  {5;5;5;5;5;5;1.05;}
- Carbon black, at plant [GLO]: 0.0008 kg; lognormal SD95 2.565
  {5;5;5;5;5;5;1.05;}
- Platinum, at regional storage [RER]: 0.00075 kg; lognormal SD95 2.565
  {5;5;5;5;5;5;1.05;}
- Transport, freight, rail [RER]: 1.202 tkm; lognormal SD95 2.208
  Generic transport distances calculated based on Table 4.2 of the ecoinvent v.2 Methodology report. Distribution: 0.6 kg over 2000.0 km.
- Transport, freight, lorry, 16t-32t gross weight, fleet average [RER]: 0.9028 tkm; lognormal SD95 2.208
  Generic transport distances calculated based on Table 4.2 of the ecoinvent v.2 Methodology report. Distribution: 0.56 kg over 1600.0 km.
- Transport, barge tanker [RER]: 0.147 tkm; lognormal SD95 2.208
  Generic transport distances calculated based on Table 4.2 of the ecoinvent v.2 Methodology report. Distribution: 0.49 kg over 300.0 km.

## Sampling procedure
Sampling procedure: Literature data

## Sources
- Sacchi R., Bauer C., 2024, 2024 - LCA power-to-X in residential sector - Sacchi, Project report, PSI, Villigen, CH

## Validation
Proof reading validation: Passed, Other validation: none, Validator: Rolf Frischknecht, Telephone: 0041 44 940 61 91, E-mail: frischknecht@treeze.ch, Company: treeze, Country: CH
