# xxx Operation, aircraft, passenger

Dataset: EcoSpold 1, unit process
Functional unit: 1 personkm
Category: transport systems / transport, obsolete\air, obsolete
Geography: RER
Generated by: Michael Spielmann
accessRestrictedTo: 0
copyright: true

## General comment
Average fuel consumption and emission data caused by an average flight with departure in Switzerland. In order to transform tonne kilometre (tkm) performance in passenger kilomter performance (pkm) each passenger is accounted for with a mass of 240 kg. The allocation between intercontinental (67.3%) and intra European (32.7%) transport performance is made on basis of the yearly transport performance of aircrafts departing from Swiss airports. The emissions are given for three subcategories: low poulated are, startosphere and unspecified.;

## Included processes
The invetory includes consumption of kerosene and direct emissions to air (gaseous emissions, particulate emissions, emissions of heavy metals)

## Technology
The data is calculated for today"s average aircraft technology

## Reference product
- xxx Operation, aircraft, passenger [RER]: 1 personkm

## Inputs from technosphere
- Kerosene, at regional storage [RER]: 0.034196 kg; lognormal SD95 1.1724
  (2,3,2,3,1,nA)

## Emissions to nature
- Hydrogen chloride [emissions to air, stratosphere + troposphere]: 7.0306e-9 kg; lognormal SD95 2.2752
  (3,5,5,5,3,nA)
- Nickel [emissions to air, stratosphere + troposphere]: 5.7225e-10 kg; lognormal SD95 5.3396
  (4,5,3,1,3,nA)
- Heat, waste [emissions to air, low. pop.]: 0.3167 MJ; lognormal SD95 1.1461
  (2,3,2,2,1,nA)
- Water [emissions to air, stratosphere + troposphere]: 0.010137 kg; lognormal SD95 1.1461
  (2,3,2,2,1,nA)
- Nitrogen oxides [emissions to air, unspecified]: 0.00026706 kg; lognormal SD95 1.5296
  (2,3,2,2,1,nA)
- Selenium [emissions to air, unspecified]: 1.9075e-10 kg; lognormal SD95 5.3396
  (4,5,3,1,3,nA)
- NMVOC, non-methane volatile organic compounds, unspecified origin [emissions to air, unspecified]: 1.2799e-5 kg; lognormal SD95 1.5296
  (2,3,2,2,1,nA)
- Lead [emissions to air, low. pop.]: 1.389e-10 kg; lognormal SD95 5.3396
  (4,5,3,1,3,nA)
- Formaldehyde [emissions to air, low. pop.]: 1.0939e-6 kg; lognormal SD95 2.2752
  (3,5,5,5,3,nA)
- Heat, waste [emissions to air, unspecified]: 0.86983 MJ; lognormal SD95 1.1461
  (2,3,2,2,1,nA)
- Methane, fossil [emissions to air, low. pop.]: 3.4726e-7 kg; lognormal SD95 1.5296
  (2,3,2,2,1,nA)
- Cadmium [emissions to air, stratosphere + troposphere]: 8.1751e-11 kg; lognormal SD95 5.3396
  (4,5,3,1,3,nA)
- Dinitrogen monoxide [emissions to air, stratosphere + troposphere]: 2.4525e-7 kg; lognormal SD95 1.5416
  (2,3,3,2,1,nA)
- NMVOC, non-methane volatile organic compounds, unspecified origin [emissions to air, stratosphere + troposphere]: 5.4851e-6 kg; lognormal SD95 1.5296
  (2,3,2,2,1,nA)
- Nitrogen oxides [emissions to air, low. pop.]: 9.7233e-5 kg; lognormal SD95 1.5296
  (2,3,2,2,1,nA)
- Selenium [emissions to air, low. pop.]: 6.9453e-11 kg; lognormal SD95 5.3396
  (4,5,3,1,3,nA)
- Hydrogen chloride [emissions to air, low. pop.]: 5.9729e-9 kg; lognormal SD95 2.2752
  (3,5,5,5,3,nA)
- Methane, fossil [emissions to air, unspecified]: 9.5376e-7 kg; lognormal SD95 1.5296
  (2,3,2,2,1,nA)
- Copper [emissions to air, low. pop.]: 1.1807e-8 kg; lognormal SD95 5.3396
  (4,5,3,1,3,nA)
- Carbon monoxide, fossil [emissions to air, unspecified]: 7.0579e-5 kg; lognormal SD95 5.0252
  (2,3,2,2,1,nA)
- Particulates, < 2.5 um [emissions to air, low. pop.]: 2.6392e-7 kg; lognormal SD95 2.0233
  (2,3,2,2,1,nA)
- Mercury [emissions to air, stratosphere + troposphere]: 5.7225e-13 kg; lognormal SD95 5.3396
  (4,5,3,1,3,nA)
- Ethylene oxide [emissions to air, unspecified]: 3.4851e-6 kg; lognormal SD95 2.2752
  (3,5,5,5,3,nA)
- Water [emissions to air, low. pop.]: 0.0086119 kg; lognormal SD95 1.1461
  (2,3,2,2,1,nA)
- Dinitrogen monoxide [emissions to air, low. pop.]: 2.0836e-7 kg; lognormal SD95 1.5416
  (2,3,3,2,1,nA)
- Methane, fossil [emissions to air, stratosphere + troposphere]: 4.0875e-7 kg; lognormal SD95 1.5296
  (2,3,2,2,1,nA)
- Dinitrogen monoxide [emissions to air, unspecified]: 5.7225e-7 kg; lognormal SD95 1.5253
  (2,3,1,2,1,nA)
- Particulates, < 2.5 um [emissions to air, unspecified]: 7.2486e-7 kg; lognormal SD95 2.0233
  (2,3,2,2,1,nA)
- Formaldehyde [emissions to air, stratosphere + troposphere]: 1.2876e-6 kg; lognormal SD95 2.2752
  (3,5,5,5,3,nA)
- Heat, waste [emissions to air, stratosphere + troposphere]: 0.37278 MJ; lognormal SD95 1.1461
  (2,3,2,2,1,nA)
- Cadmium [emissions to air, low. pop.]: 6.9453e-11 kg; lognormal SD95 5.3396
  (4,5,3,1,3,nA)
- Carbon dioxide, fossil [emissions to air, stratosphere + troposphere]: 0.025752 kg; lognormal SD95 1.1461
  (2,3,2,2,1,nA)
- Selenium [emissions to air, stratosphere + troposphere]: 8.1751e-11 kg; lognormal SD95 5.3396
  (4,5,3,1,3,nA)
- Formaldehyde [emissions to air, unspecified]: 3.0043e-6 kg; lognormal SD95 2.2752
  (3,5,5,5,3,nA)
- Copper [emissions to air, stratosphere + troposphere]: 1.3898e-8 kg; lognormal SD95 5.3396
  (4,5,3,1,3,nA)
- Zinc [emissions to air, stratosphere + troposphere]: 8.1751e-9 kg; lognormal SD95 5.3396
  (4,5,3,1,3,nA)
- Sulfur dioxide [emissions to air, unspecified]: 1.9075e-5 kg; lognormal SD95 1.1461
  (2,3,2,2,1,nA)
- Lead [emissions to air, stratosphere + troposphere]: 1.635e-10 kg; lognormal SD95 5.3396
  (4,5,3,1,3,nA)
- Hydrogen chloride [emissions to air, unspecified]: 1.6405e-8 kg; lognormal SD95 2.2752
  (3,5,5,5,3,nA)
- Butadiene [emissions to air, low. pop.]: 1.3126e-7 kg; lognormal SD95 2.2752
  (3,5,5,5,3,nA)
- Mercury [emissions to air, unspecified]: 1.3352e-12 kg; lognormal SD95 5.3396
  (4,5,3,1,3,nA)
- Benzene [emissions to air, stratosphere + troposphere]: 1.6309e-7 kg; lognormal SD95 2.2752
  (3,5,5,5,3,nA)
- Particulates, < 2.5 um [emissions to air, stratosphere + troposphere]: 3.1066e-7 kg; lognormal SD95 2.0233
  (2,3,2,2,1,nA)
- Nickel [emissions to air, low. pop.]: 4.8615e-10 kg; lognormal SD95 5.3396
  (4,5,3,1,3,nA)
- Benzene [emissions to air, unspecified]: 3.8055e-7 kg; lognormal SD95 2.2752
  (3,5,5,5,3,nA)
- Chromium [emissions to air, low. pop.]: 3.4726e-10 kg; lognormal SD95 5.3396
  (4,5,3,1,3,nA)
- Carbon monoxide, fossil [emissions to air, low. pop.]: 2.5697e-5 kg; lognormal SD95 5.0252
  (2,3,2,2,1,nA)
- Carbon monoxide, fossil [emissions to air, stratosphere + troposphere]: 3.0248e-5 kg; lognormal SD95 5.0252
  (2,3,2,2,1,nA)
- Butadiene [emissions to air, stratosphere + troposphere]: 1.5451e-7 kg; lognormal SD95 2.2752
  (3,5,5,5,3,nA)
- Sulfur dioxide [emissions to air, stratosphere + troposphere]: 8.1751e-6 kg; lognormal SD95 1.1461
  (2,3,2,2,1,nA)
- Cadmium [emissions to air, unspecified]: 1.9075e-10 kg; lognormal SD95 5.3396
  (4,5,3,1,3,nA)
- Nickel [emissions to air, unspecified]: 1.3352e-9 kg; lognormal SD95 5.3396
  (4,5,3,1,3,nA)
- Carbon dioxide, fossil [emissions to air, unspecified]: 0.060087 kg; lognormal SD95 1.1461
  (2,3,2,2,1,nA)
- Butadiene [emissions to air, unspecified]: 3.6053e-7 kg; lognormal SD95 2.2752
  (3,5,5,5,3,nA)
- Benzene [emissions to air, low. pop.]: 1.3855e-7 kg; lognormal SD95 2.2752
  (3,5,5,5,3,nA)
- Mercury [emissions to air, low. pop.]: 4.8615e-13 kg; lognormal SD95 5.3396
  (4,5,3,1,3,nA)
- Chromium [emissions to air, stratosphere + troposphere]: 4.0875e-10 kg; lognormal SD95 5.3396
  (4,5,3,1,3,nA)
- Ethylene oxide [emissions to air, low. pop.]: 1.2689e-6 kg; lognormal SD95 2.2752
  (3,5,5,5,3,nA)
- Zinc [emissions to air, unspecified]: 1.9075e-8 kg; lognormal SD95 5.3396
  (4,5,3,1,3,nA)
- Noise, aircraft, passenger [non material emissions, unspecified]: 1 personkm
- Chromium [emissions to air, unspecified]: 9.5376e-10 kg; lognormal SD95 5.3396
  (4,5,3,1,3,nA)
- Sulfur dioxide [emissions to air, low. pop.]: 6.9453e-6 kg; lognormal SD95 1.1461
  (2,3,2,2,1,nA)
- Nitrogen oxides [emissions to air, stratosphere + troposphere]: 0.00011445 kg; lognormal SD95 1.5296
  (2,3,2,2,1,nA)
- Carbon dioxide, fossil [emissions to air, low. pop.]: 0.021877 kg; lognormal SD95 1.1461
  (2,3,2,2,1,nA)
- Ethylene oxide [emissions to air, stratosphere + troposphere]: 1.4936e-6 kg; lognormal SD95 2.2752
  (3,5,5,5,3,nA)
- Copper [emissions to air, unspecified]: 3.2428e-8 kg; lognormal SD95 5.3396
  (4,5,3,1,3,nA)
- Lead [emissions to air, unspecified]: 3.8151e-10 kg; lognormal SD95 5.3396
  (4,5,3,1,3,nA)
- Water [emissions to air, unspecified]: 0.023653 kg; lognormal SD95 1.1461
  (2,3,2,2,1,nA)
- Zinc [emissions to air, low. pop.]: 6.9453e-9 kg; lognormal SD95 5.3396
  (4,5,3,1,3,nA)
- NMVOC, non-methane volatile organic compounds, unspecified origin [emissions to air, low. pop.]: 4.66e-6 kg; lognormal SD95 1.5296
  (2,3,2,2,1,nA)

## Sampling procedure
national statistics, publications of environmental agencies, information from aviation companies

## Extrapolations
Swiss data is extrapolated to represent European conditions.

## Sources
- Spielmann M., Bauer C., Dones R., Tuchschmid M., 2007, 2007 - Transport services - Spielmann, Final report ecoinvent Data v2.0, 14, Swiss Centre for LCI, PSI, ESU-services Ltd., Duebendorf, Villigen and Uster, CH
Spielmann M., Dones R; Bauer C. (2007) Life Cycle Inventories of Transport Services. Final report ecoinvent Data v2.0. Volume: 14. Issue: 0. Swiss Centre for LCI, PSI. Dübendorf and Villigen, CH.
Type: Measurement on site
Source: CD-ROM
First author: Spielmann M.
Other authors: Dones R; Bauer C.
Year: 2007
Title of anthology: Final report ecoinvent Data v2.0
Place of publication: Dübendorf and Villigen, CH
Publisher: Swiss Centre for LCI, PSI
Volume No: 14
Issue No: 0

## Validation
Proof reading validation: Korrigiert von NJ; Other validation: none;
