# Disposal, building, laminated safety glass, to final disposal

Dataset: EcoSpold 1, unit process
Functional unit: 1 m2
Category: construction materials / glazing
Geography: CH
Time period: 2000-01 to 2016-12
Generated by: Matthias Klingler
accessRestrictedTo: 0
copyright: true

## General comment
Entsorgung VSG pro m2 Verglasung.
Version: 0.0

Local category: construction materials
Local subcategory: Verglasungen

## Reference product
- Disposal, building, laminated safety glass, to final disposal [CH]: 1 m2
  SWITZERLAND

## Inputs from technosphere
- Disposal, glass, 0% water, to construction waste landfill [CH]: 20 kg; lognormal SD95 1.5876
  (3;3;3;3;3)
- Disposal, polyethylene, 0.4% water, to municipal incineration [CH]: 0.836 kg; lognormal SD95 1.5876
  (3;3;3;3;3)

## Sources
- Created for EcoSpold 1 compatibility, Final report ecoinvent data v2.0, 8
Althaus H.-J., Chudacoff M., Hischier R., Jungbluth N., Osses M., Primas A. (2007) Life Cycle Inventories of Chemicals. Final report ecoinvent data v2.0. Volume: 8. Swiss Centre for LCI, Empa - TSL. Dübendorf, CH.
Type: Measurement on site
Source: CD-ROM
First author: Althaus H.-J.
Other authors: Chudacoff M., Hischier R., Jungbluth N., Osses M., Primas A.
Year: 2007
Title of anthology: Final report ecoinvent data v2.0
Place of publication: Dübendorf, CH
Publisher: Swiss Centre for LCI, Empa - TSL
Volume No: 8
