# xx Rape meal, at oil mill

Dataset: EcoSpold 1, unit process
Functional unit: 1 kg
Category: material, obsolete / agricultural, obsolete\plant oils, obsolete\byproducts, obsolete
Geography: CH
Time period: 2004-01 to 2004-12
Production volume: Approx. 6 kt of rape seeds were processed to biodiesel in 2004 in CH
Share of production covered: 0 %
Generated by: Edgard Gnansounou
accessRestrictedTo: 0
copyright: true

## General comment
Inventory refers to the production of 1 kg rape oil, respectively rape meal. The multioutput-process 'rape seeds, in oil mill' delivers the co-products 'rape oil, at oil mill' and 'rape meal, at oil mill'. Economic allocation with allocation factor of 74.3% to rape oil. Allocation is done according to carbon balance for CO2 emissions.;

## Included processes
This process includes the transport of rape seeds to the mill, and the processing of the seeds to rape oil and rape meal. The oil extraction refers to the cold-press extraction technique. System boundary is at the oil mill.

## Technology
Cold pressing of rape seeds in a standard oil press (based on the EcoEnergie Etoy biodiesel pilot plant, CH), Swiss context.

## Time period
Data from 1998 to 2006, current technology in CH

## Reference product
- xx Rape meal, at oil mill [CH]: 1 kg
  SWITZERLAND

## Inputs from technosphere
- Rape seed IP, at farm [CH]: 0.29679 kg; lognormal SD95 1.0722
  (1,1,1,2,1,3); Industrial data from biodiesel producer in CH
- Transport, freight, rail, electricity with shunting [CH]: 8.9575e-5 tkm; lognormal SD95 2.095
  (4,5,na,na,na,na); Based on ecoinvent Guidelines, standard distances
- Transport, freight, lorry, 7.5t-16t gross weight, fleet average [CH]: 0.041801 tkm; lognormal SD95 2.095
  (4,5,na,na,na,na); Based on ecoinvent Guidelines, standard distances
- Rape seed, organic, at farm [CH]: 0.0041801 kg; lognormal SD95 1.0722
  (1,1,1,2,1,3); Industrial data from biodiesel producer in CH
- Electricity, medium voltage, at grid [CH]: 0.024589 kWh; lognormal SD95 1.0722
  (1,1,1,2,1,3); Industrial data from biodiesel producer in CH
- Oil mill [CH]: 1.3933e-10 p; lognormal SD95 3.2712
  (1,1,1,1,4,5); Calculation, according to feed capacity and lifetime of the plant
- Transport, freight, lorry, 16t-32t gross weight, fleet average [CH]: 7.4648e-6 tkm; lognormal SD95 2.095
  (4,5,na,na,na,na); Based on ecoinvent Guidelines, standard distances
- Rape seed extensive, at farm [CH]: 0.11704 kg; lognormal SD95 1.0722
  (1,1,1,2,1,3); Industrial data from biodiesel producer in CH
- Phosphoric acid, industrial grade, 85% in H2O, at plant [RER]: 0.0001493 kg; lognormal SD95 1.0722
  (1,1,1,2,1,3); Literature data & industrial data from biodiesel producer in CH

## Inputs from nature
- Carbon dioxide, in air [resources, in air]: 1.46636 kg; lognormal SD95 1.05
  (1,1,1,1,1,na); Correction to close carbon balance of individual outputs

## Emissions to nature
- Heat, waste [emissions to air, high. pop.]: 0.3734 MJ; lognormal SD95 1.1376
  (2,4,1,3,1,3); ecoinvent guidelines, calculation from electricity consumption and energy balance

## Sampling procedure
Data from various biodiesel producers in CH, industrial data

## Sources
- Jungbluth N., Chudacoff M., Dauriat A., Dinkel F., Doka G., Faist Emmenegger M., Gnansounou E., Kljun N., Spielmann M., Stettler C., Sutter J., 2007, 2007 - LCI bioenergy - Jungbluth, Final report ecoinvent data v2.0, 17, Swiss Centre for LCI, ESU-services Ltd., Duebendorf and Uster, CH
Jungbluth N., Chudacoff M., Dauriat A., Dinkel F., Doka G., Faist Emmenegger M., Gnansounou E., Kljun N., Spielmann M., Stettler C., Sutter J. (2007) Life Cycle Inventories of Bioenergy. Final report ecoinvent data v2.0. Volume: 17. Swiss Centre for LCI, ESU. Duebendorf and Uster, CH.
Type: Measurement on site
Source: CD-ROM
First author: Jungbluth N.
Other authors: Chudacoff M., Dauriat A., Dinkel F., Doka G., Faist Emmenegger M., Gnansounou E., Kljun N., Spielmann M., Stettler C., Sutter J.
Year: 2007
Title of anthology: Final report ecoinvent data v2.0
Place of publication: Duebendorf and Uster, CH
Publisher: Swiss Centre for LCI, ESU
Volume No: 17

## Validation
Proof reading validation: Passed.; Other validation: none;
