# Expansion vessel 80l, at plant

Dataset: EcoSpold 1, unit process, infrastructure
Functional unit: 1 p
Category: heat / solar\infrastructure
Geography: CH
Time period: 2000-01 to 2000-12
Generated by: Niels Jungbluth
accessRestrictedTo: 0
copyright: true

## General comment
Expansion vessel with a capacity of 80l;

## Included processes
Production and disposal of an expansion vessel. Including materials and energy use of production. Not including infrastructure for factory.

## Geography
Production in CH.

## Technology
Expansion vessel (steel body with plastic) for heat exchange fluid used in a solar collector system.

## Time period
Time of information.

## Reference product
- Expansion vessel 80l, at plant [CH]: 1 p
  SWITZERLAND

## Inputs from technosphere
- Butyl acrylate, at plant [RER]: 1.5 kg; lognormal SD95 1.24
  (2,1,3,1,1,5); Questionnaire
- Disposal, plastics, mixture, 15.3% water, to municipal incineration [CH]: 1.6 kg; lognormal SD95 1.24
  (2,1,3,1,1,5); Questionnaire
- Corrugated board, mixed fibre, single wall, at plant [CH]: 1.8 kg; lognormal SD95 1.24
  (2,1,3,1,1,5); Questionnaire
- Steel, low-alloyed, at plant [RER]: 12.2 kg; lognormal SD95 1.24
  (2,1,3,1,1,5); Questionnaire
- Alkyd paint, white, 60% in solvent, at plant [RER]: 0.1 kg; lognormal SD95 1.24
  (2,1,3,1,1,5); Questionnaire
- Light fuel oil, burned in industrial furnace 1MW, non-modulating [CH]: 40.2 MJ; lognormal SD95 1.24
  (2,1,3,1,1,5); Questionnaire
- Welding, gas, steel [RER]: 1 m; lognormal SD95 1.24
  (2,1,3,1,1,5); Questionnaire
- Transport, freight, rail [RER]: 9.4 tkm; lognormal SD95 2.1
  (4,5,na,na,na,na); Standard distance 600km
- Disposal, packaging cardboard, 19.6% water, to municipal incineration [CH]: 1.8 kg; lognormal SD95 1.24
  (2,1,3,1,1,5); Questionnaire
- Disposal, polypropylene, 15.9% water, to municipal incineration [CH]: 0.07 kg; lognormal SD95 1.24
  (2,1,3,1,1,5); Questionnaire
- Hot water tank factory [CH]: 4e-7 p; lognormal SD95 2.34
  (5,5,3,1,5,5); Rough estimation
- Electricity, medium voltage, at grid [CH]: 17.2 kWh; lognormal SD95 1.24
  (2,1,3,1,1,5); Questionnaire
- Transport, freight, lorry, 16t-32t gross weight, fleet average [CH]: 0.784 tkm; lognormal SD95 2.1
  (4,5,na,na,na,na); Standard distance 50km
- Polypropylene, granulate, at plant [RER]: 0.07 kg; lognormal SD95 1.24
  (2,1,3,1,1,5); Questionnaire

## Emissions to nature
- Heat, waste [emissions to air, high. pop.]: 62 MJ; lognormal SD95 1.24
  (2,1,3,1,1,5); Questionnaire

## Sampling procedure
Questionnaire.

## Extrapolations
Estimation that the energy for production is three times higher than for the 25l vessel.

## Sources
- Jungbluth N., 2007, 2007 - Solar collector systems - Jungbluth, Sachbilanzen von Energiesystemen. Final report No. 6 ecoinvent data v2.0, 6, Swiss Centre for LCI, ESU-services Ltd., Duebendorf, CH
Jungbluth, N. (2007) Sonnenkollektor-Anlagen. Sachbilanzen von Energiesystemen. Final report No. 6 ecoinvent data v2.0. Editors: Dones R.. Volume: 6. Swiss Centre for LCI, PSI. Dübendorf and Villigen, CH.
Type: Measurement on site
Source: CD-ROM
First author: Jungbluth, N.
Year: 2007
Name of editors: Dones R.
Title of anthology: Sachbilanzen von Energiesystemen. Final report No. 6 ecoinvent data v2.0
Place of publication: Dübendorf and Villigen, CH
Publisher: Swiss Centre for LCI, PSI
Volume No: 6

## Validation
Proof reading validation: Passed.; Other validation: none;
