# Barley grains organic, at farm

Dataset: EcoSpold 1, unit process
Functional unit: 1 kg
Category: agricultural / plant production
Geography: CH
Time period: 2000-01 to 2000-12
Production volume: CH prod of barley: 257400t in 2004. % repr ref to fract of tot area in lowlands
Share of production covered: 71 %
Generated by: Thomas Nemecek
accessRestrictedTo: 0
copyright: true

## General comment
Inventory refers to the production of 1 kg barley grains organic, at farm respectively barley straw organic, at farm , both with a moisture content of 15%. The multioutput-process barley organic delivers the co-products barley grains organic, at farm (4153kg yield/ha) and barley straw organic, at farm (2924kg yield/ha). Economic allocation with allocation factor of 91.3% to grains (exceptions see report).;

## Included processes
The inventory includes the processes of soil cultivation, sowing, weed control, fertilisation, harvest and grain drying. Machine infrastructure and a shed for machine sheltering is included. Inputs of fertilisers and seed as well as grain transports to the regional processing center (10km) are considered. The direct emissions on the field are also included.

## Geography
Refers to an average production in the Swiss lowlands.

## Technology
Organic production

## Time period
The yield data have been collected for the years 1996-2003.

## Reference product
- Barley grains organic, at farm [CH]: 1 kg
  SWITZERLAND

## Inputs from technosphere
- Transport, freight, lorry, 3.5t gross weight, fleet average [CH]: 0.00046148 tkm; lognormal SD95 2.095
  (4,5,na,na,na,na)
- Sowing [CH]: 0.00021975 ha; lognormal SD95 1.0714
  (2,1,1,1,1,na)
- Transport, freight, lorry, fleet average [CH]: 0.010119 tkm; lognormal SD95 1.0714
  (2,1,1,1,1,na)
- Grain drying, high temperature [CH]: 0.011905 kg; lognormal SD95 1.0714
  (2,1,1,1,1,na)
- Barley seed organic, at regional storehouse [CH]: 0.030765 kg; lognormal SD95 1.0714
  (2,1,1,1,1,na)
- Combine harvesting [CH]: 0.00021975 ha; lognormal SD95 1.0714
  (2,1,1,1,1,na)
- Tillage, currying, by weeder [CH]: 0.00065926 ha; lognormal SD95 1.0714
  (2,1,1,1,1,na)
- Solid manure loading and spreading, by hydraulic loader and spreader [CH]: 1.0643 kg; lognormal SD95 1.0714
  (2,1,1,1,1,na)
- Slurry spreading, by vacuum tanker [CH]: 0.0086299 m3; lognormal SD95 1.0714
  (2,1,1,1,1,na)
- Tillage, cultivating, chiselling [CH]: 0.00021975 ha; lognormal SD95 1.0714
  (2,1,1,1,1,na)
- Tillage, harrowing, by spring tine harrow [CH]: 0.00043951 ha; lognormal SD95 1.0714
  (2,1,1,1,1,na)
- Tillage, ploughing [CH]: 0.00021975 ha; lognormal SD95 1.0714
  (2,1,1,1,1,na)

## Inputs from nature
- Energy, gross calorific value, in biomass [resources, biotic]: 15.114 MJ; lognormal SD95 1.0714
  (2,1,1,1,1,na)
- Transformation, from arable, organic [resources, land]: 1.5602 m2; lognormal SD95 1.2077
  (2,1,1,1,1,na)
- Transformation, to arable, organic [resources, land]: 2.1975 m2; lognormal SD95 1.2077
  (2,1,1,1,1,na)
- Transformation, from pasture and meadow, organic [resources, land]: 0.63728 m2; lognormal SD95 1.2077
  (2,1,1,1,1,na)
- Occupation, annual crop, organic [resources, land]: 1.8007 m2a; lognormal SD95 1.113
  (2,1,1,1,1,na)
- Carbon dioxide, in air [resources, in air]: 1.3001 kg; lognormal SD95 1.0714
  (2,1,1,1,1,na)

## Emissions to nature
- Copper [emissions to water, river]: 3.8962e-7 kg; lognormal SD95 1.8042
  (2,2,1,1,1,na)
- Nickel [emissions to water, river]: 2.0416e-7 kg; lognormal SD95 1.8042
  (2,2,1,1,1,na)
- Cadmium [emissions to soil, agricultural]: 3.586e-8 kg; lognormal SD95 1.5051
  (2,2,1,1,1,na)
- Ammonia [emissions to air, low. pop.]: 0.006423 kg; lognormal SD95 1.209
  (2,2,1,1,1,na)
- Mercury [emissions to water, river]: 9.953e-10 kg; lognormal SD95 1.8042
  (2,2,1,1,1,na)
- Chromium [emissions to water, river]: 1.7019e-7 kg; lognormal SD95 1.8042
  (2,2,1,1,1,na)
- Copper [emissions to water, groundwater]: 5.4391e-7 kg; lognormal SD95 1.8042
  (2,2,1,1,1,na)
- Zinc [emissions to water, river]: 1.1487e-6 kg; lognormal SD95 1.8042
  (2,2,1,1,1,na)
- Lead [emissions to water, groundwater]: 2.1664e-8 kg; lognormal SD95 1.8042
  (2,2,1,1,1,na)
- Phosphate [emissions to water, river]: 0.00022685 kg; lognormal SD95 1.5051
  (2,2,1,1,1,na)
- Cadmium [emissions to water, groundwater]: 2.5094e-9 kg; lognormal SD95 1.8042
  (2,2,1,1,1,na)
- Phosphorus [emissions to water, river]: 2.6784e-5 kg; lognormal SD95 1.5051
  (2,2,1,1,1,na)
- Chromium [emissions to water, groundwater]: 1.1669e-6 kg; lognormal SD95 1.8042
  (2,2,1,1,1,na)
- Phosphate [emissions to water, groundwater]: 4.859e-5 kg; lognormal SD95 1.5051
  (2,2,1,1,1,na)
- Chromium [emissions to soil, agricultural]: -6.1958e-7 kg; lognormal SD95 1.5051
  (2,2,1,1,1,na)
- Mercury [emissions to soil, agricultural]: 1.2827e-7 kg; lognormal SD95 1.5051
  (2,2,1,1,1,na)
- Zinc [emissions to water, groundwater]: 5.9569e-6 kg; lognormal SD95 1.8042
  (2,2,1,1,1,na)
- Lead [emissions to water, river]: 9.0329e-8 kg; lognormal SD95 1.8042
  (2,2,1,1,1,na)
- Zinc [emissions to soil, agricultural]: 0.00010737 kg; lognormal SD95 1.5051
  (2,2,1,1,1,na)
- Nitrogen oxides [emissions to air, low. pop.]: 0.00021666 kg; lognormal SD95 1.4057
  (2,2,1,1,1,na)
- Dinitrogen monoxide [emissions to air, low. pop.]: 0.0010317 kg; lognormal SD95 1.4057
  (2,2,1,1,1,na)
- Mercury [emissions to water, groundwater]: 1.2009e-9 kg; lognormal SD95 1.8042
  (2,2,1,1,1,na)
- Nitrate [emissions to water, groundwater]: 0.089255 kg; lognormal SD95 1.5051
  (2,2,1,1,1,na)
- Copper [emissions to soil, agricultural]: 1.4493e-5 kg; lognormal SD95 1.5051
  (2,2,1,1,1,na)
- Lead [emissions to soil, agricultural]: 7.9705e-7 kg; lognormal SD95 1.5051
  (2,2,1,1,1,na)
- Nickel [emissions to soil, agricultural]: 9.2336e-7 kg; lognormal SD95 1.5051
  (2,2,1,1,1,na)
- Cadmium [emissions to water, river]: 1.5452e-9 kg; lognormal SD95 1.8042
  (2,2,1,1,1,na)

## Sampling procedure
Data were compiled from statistics, pilot network, fertilising recommendations, documents from extension services, information provided by retailers and expert knowledge. The production data were verified and adjusted by a group of experts.

## Sources
- Nemecek T., Kaegi T., 2007, 2007 - LCI agricultural prod. systems - Nemecek, Ecoinvent report version 2.0, 15, Swiss Centre for LCI, ART, Duebendorf and Zuerich, CH
Nemecek, T., Kägi, T., Blaser, S. (2007) Life Cycle Inventories of Agricultural Production Systems. Ecoinvent report version 2.0. Editors: 0. Volume: 15. Swiss Centre for LCI, ART. Duebendorf and Zurich, CH.
Type: Measurement on site
Source: CD-ROM
First author: Nemecek, T.
Other authors: Kägi, T., Blaser, S.
Year: 2007
Name of editors: 0
Title of anthology: Ecoinvent report version 2.0
Place of publication: Duebendorf and Zurich, CH
Publisher: Swiss Centre for LCI, ART
Volume No: 15

## Validation
Proof reading validation: passed; Other validation: none;
