# Transport, long-distance train, SBB mix, Betrieb

Dataset: EcoSpold 1, unit process
Functional unit: 1 personkm
Category: transport systems / train
Geography: CH
Time period: 2009-01 to 2015-12
Production volume: 12442797635 pkm/a
Share of production covered: 100 %
Generated by: Luana Krebs
accessRestrictedTo: 0
copyright: true

## General comment
Inventory refers to the entire transport life cycle. For rail infrastructure, expenditures and environmental interventions due to construction, renewal and disposal of rail tracks have been allocated based on the Gross tonne kilometre performance on SBB track in 2014 (72126484166 Gtkm). Expenditures due to operation of the rail infrastructure, as well as land use have been allocated based on the yearly train kilometre performance (398215 vkm) and a load factor of 193 passengers. Electricity and diesel consumption have been updated based on SBB data for the year 2019.;

## Included processes
The module calls the modules "production, maintenance and disposal of vehicles" as well as the modules "construction, maintenance and disposal of railway tracks". Included in this modul is the operation (energy consumption including shunting and emissions) of the train .

## Technology
For vehicle operation all technologies are included in the average data. Rail construction addresses conventional gravel track beddings. For the manufacturing of vehicles, the data reflects the currently dominating train type (IC2000).

## Time period
Time of publications

## Reference product
- Transport, long-distance train, SBB mix, Betrieb [CH]: 1 personkm
  SWITZERLAND

## Inputs from technosphere
- Diesel, at regional storage [CH]: 5.0197e-6 kg; lognormal SD95 1.2226
  (2,3,1,1,1,5,BU:1.05); ; Pers. communication SBB, 26.10.2020
- Electricity, medium voltage, SBB, at grid [CH]: 0.063555 kWh; lognormal SD95 1.2226
  (2,3,1,1,1,5,BU:1.05); ; Pers. communication SBB, 26.10.2020

## Emissions to nature
- Manganese [emissions to soil, industrial]: 2.6556e-11 kg; lognormal SD95 1.5954
  (3,3,1,5,1,5,BU:1.5); ; Data from ANABEL; Personal correspondence Gunter Adolf, SBB, June 2016
- Butane [emissions to air, unspecified]: 3.8496e-11 kg; lognormal SD95 2.308
  (3,3,2,5,5,5,BU:1.5); emission factor of diesel: 7.67E-3 g/kg diesel, assuming a share of 97.7% with particle filter; BAFU 2015: Non-road database; EMEP/EEA guidebook 2013, Tab. 3-112
- m-Xylene [emissions to air, unspecified]: 2.515e-10 kg; lognormal SD95 2.308
  (3,3,2,5,5,5,BU:1.5); emission factor of diesel: 5.01E-2 g/kg diesel, assuming a share of 97.7% with particle filter; BAFU 2015: Non-road database; EMEP/EEA guidebook 2013, Tab. 3-112
- Heptane [emissions to air, unspecified]: 7.6991e-11 kg; lognormal SD95 2.308
  (3,3,2,5,5,5,BU:1.5); emission factor of diesel: 1.53E-2 g/kg diesel, assuming a share of 97.7% with particle filter; BAFU 2015: Non-road database; EMEP/EEA guidebook 2013, Tab. 3-112
- Cadmium [emissions to air, unspecified]: 5.0197e-14 kg; lognormal SD95 5.8584
  (3,3,2,5,5,5,BU:5); emission factor of diesel: 5.30E-6 g/kg diesel, assuming a share of 97.7% with particle filter; EMEP/EEA guidebook 2013, 1.A.2.f.ii, Tab. 3-1
- Iron [emissions to soil, industrial]: 6.7818e-9 kg; lognormal SD95 1.5954
  (same comment as for Manganese)
- Methane, fossil [emissions to air, unspecified]: 2.7613e-10 kg; lognormal SD95 2.308
  (3,3,2,5,5,5,BU:1.5); emission factor of diesel: 5.50E-2 g/kg diesel, assuming a share of 97.7% with particle filter; BAFU 2015: non road emission factor database
- Chromium [emissions to air, unspecified]: 2.5098e-13 kg; lognormal SD95 5.8584
  (3,3,2,5,5,5,BU:5); emission factor of diesel: 7.00E-5 g/kg diesel, assuming a share of 97.7% with particle filter; EMEP/EEA guidebook 2013, 1.A.2.f.ii, Tab. 3-1
- Styrene [emissions to air, unspecified]: 1.4372e-10 kg; lognormal SD95 2.308
  (3,3,2,5,5,5,BU:1.5); emission factor of diesel: 2.86E-2 g/kg diesel, assuming a share of 97.7% with particle filter; BAFU 2015: Non-road database; EMEP/EEA guidebook 2013, Tab. 3-112
- Lead [emissions to air, unspecified]: 7.1803e-12 kg; lognormal SD95 5.0838
  (3,3,1,5,1,5,BU:5); ; Data from ANABEL; Personal correspondence Gunter Adolf, SBB, June 2016
- Antimony [emissions to air, unspecified]: 1.7775e-10 kg; lognormal SD95 5.0838
  (same comment as for Lead)
- Copper [emissions to air, unspecified]: 9.9004e-10 kg; lognormal SD95 5.0838
  (same comment as for Lead)
- Heat, waste [emissions to air, unspecified]: 0.00022901 MJ; lognormal SD95 2.0816
  (3,3,2,5,5,5,BU:1.05); default value;
- Selenium [emissions to air, unspecified]: 5.0197e-14 kg; lognormal SD95 5.8584
  (3,3,2,5,5,5,BU:5); emission factor of diesel: 1.00E-7 g/kg diesel, assuming a share of 97.7% with particle filter; EMEP/EEA guidebook 2013, 1.A.2.f.ii, Tab. 3-1
- Copper [emissions to air, unspecified]: 8.5335e-12 kg; lognormal SD95 5.8584
  (3,3,2,5,5,5,BU:5); emission factor of diesel: 1.00E-3 g/kg diesel, assuming a share of 97.7% with particle filter; EMEP/EEA guidebook 2013, 1.A.2.f.ii, Tab. 3-1
- Particulates, > 2.5 um, and < 10um [emissions to air, unspecified]: 4.1534e-11 kg; lognormal SD95 2.7394
  (3,3,2,5,5,5,BU:2); emission factor of diesel: 8.27E-3 g/kg diesel, assuming a share of 97.7% with particle filter; own calculation with SBB tractions data and non road emission factor (BAFU 2015)
- Chromium [emissions to air, unspecified]: 6.2511e-11 kg; lognormal SD95 5.0838
  (same comment as for Lead)
- Antimony [emissions to soil, industrial]: 3.3879e-11 kg; lognormal SD95 1.5954
  (same comment as for Manganese)
- Acetaldehyde [emissions to air, unspecified]: 1.1728e-9 kg; lognormal SD95 2.308
  (3,3,2,5,5,5,BU:1.5); emission factor of diesel: 2.34E-1 g/kg diesel, assuming a share of 97.7% with particle filter; BAFU 2015: Non-road database; EMEP/EEA guidebook 2013, Tab. 3-112
- Formaldehyde [emissions to air, unspecified]: 2.1558e-9 kg; lognormal SD95 2.308
  (3,3,2,5,5,5,BU:1.5); emission factor of diesel: 4.29E-1 g/kg diesel, assuming a share of 97.7% with particle filter; BAFU 2015: Non-road database; EMEP/EEA guidebook 2013, Tab. 3-112
- Zinc [emissions to water, unspecified]: 2.7548e-10 kg; lognormal SD95 5.0838
  (same comment as for Lead)
- Lead [emissions to air, unspecified]: 2.6102e-13 kg; lognormal SD95 5.8584
  (3,3,2,5,5,5,BU:5); emission factor of diesel: 1.00E-5 g/kg diesel, assuming a share of 97.7% with particle filter; EMEP/EEA guidebook 2013, 1.A.2.f.ii, Tab. 3-1
- Mercury [emissions to air, unspecified]: 2.6604e-14 kg; lognormal SD95 5.8584
  (same comment as for Selenium)
- Iron [emissions to air, unspecified]: 3.5582e-8 kg; lognormal SD95 5.0838
  (same comment as for Lead)
- o-Xylene [emissions to air, unspecified]: 1.0265e-10 kg; lognormal SD95 2.308
  (3,3,2,5,5,5,BU:1.5); emission factor of diesel: 2.05E-2 g/kg diesel, assuming a share of 97.7% with particle filter; BAFU 2015: Non-road database; EMEP/EEA guidebook 2013, Tab. 3-112
- Ethane [emissions to air, unspecified]: 7.6991e-12 kg; lognormal SD95 2.308
  (3,3,2,5,5,5,BU:1.5); emission factor of diesel: 1.53E-3 g/kg diesel, assuming a share of 97.7% with particle filter; BAFU 2015: Non-road database; EMEP/EEA guidebook 2013, Tab. 3-112
- Dinitrogen monoxide [emissions to air, unspecified]: 7.5936e-10 kg; lognormal SD95 2.308
  (3,3,2,5,5,5,BU:1.5); emission factor of diesel: 1.51E-1 g/kg diesel, assuming a share of 97.7% with particle filter; BAFU 2015: non road emission factor database
- Noise, rail, passenger train, average [non material emissions, unspecified]: 1 personkm; lognormal SD95 1.5
  (1,1,1,1,1,1,BU:1.5); ; Ecological Scarcity method 2013; Frischknecht & Büsser Knöpfel 2013
- Lead [emissions to soil, industrial]: 1.3686e-12 kg; lognormal SD95 1.5954
  (same comment as for Manganese)
- Copper [emissions to water, unspecified]: 2.8921e-11 kg; lognormal SD95 3.0735
  (3,3,1,5,1,5,BU:3); ; Data from ANABEL; Personal correspondence Gunter Adolf, SBB, June 2016
- NMVOC, non-methane volatile organic compounds, unspecified origin [emissions to air, unspecified]: 2.0847e-8 kg; lognormal SD95 2.308
  (3,3,2,5,5,5,BU:1.5); emission factor of diesel: 4.15E+0 g/kg diesel, assuming a share of 97.7% with particle filter; non road emission factor
- Toluene [emissions to air, unspecified]: 2.5664e-12 kg; lognormal SD95 2.308
  (3,3,2,5,5,5,BU:1.5); emission factor of diesel: 5.11E-4 g/kg diesel, assuming a share of 97.7% with particle filter; BAFU 2015: Non-road database; EMEP/EEA guidebook 2013, Tab. 3-112
- Nickel [emissions to air, unspecified]: 3.5138e-13 kg; lognormal SD95 5.8584
  (3,3,2,5,5,5,BU:5); emission factor of diesel: 1.70E-3 g/kg diesel, assuming a share of 97.7% with particle filter; EMEP/EEA guidebook 2013, 1.A.2.f.ii, Tab. 3-1
- Manganese [emissions to air, unspecified]: 1.3933e-10 kg; lognormal SD95 5.0838
  (same comment as for Lead)
- Ethane, 1,1,1,2-tetrafluoro-, HFC-134a [emissions to air, unspecified]: 1.0844e-8 kg; lognormal SD95 1.5681
  (2,3,1,1,1,5,BU:1.5); ; National Greenhouse Gas Inventory Report of Switzerland 2010 (Item 2F1, p. 156)
- Carbon dioxide, fossil [emissions to air, unspecified]: 1.5812e-5 kg; lognormal SD95 2.0816
  (3,3,2,5,5,5,BU:1.05); emission factor of diesel: 3.15E+3 g/kg diesel, assuming a share of 97.7% with particle filter; BAFU 2015: non road emission factor database
- Nitrogen oxides [emissions to air, unspecified]: 2.2643e-7 kg; lognormal SD95 2.308
  (3,3,2,5,5,5,BU:1.5); emission factor of diesel: 4.51E+1 g/kg diesel, assuming a share of 97.7% with particle filter; BAFU 2015: non road emission factor database
- Heat, waste [emissions to air, unspecified]: 0.2288 MJ; lognormal SD95 1.2674
  (3,3,1,5,1,5,BU:1.05); ; Data from ANABEL; Personal correspondence Gunter Adolf, SBB, June 2016
- PAH, polycyclic aromatic hydrocarbons [emissions to air, unspecified]: 1.6515e-11 kg; lognormal SD95 3.7429
  (3,3,2,5,5,5,BU:3); emission factor of diesel: 3.00E-5 g/kg diesel, assuming a share of 97.7% with particle filter; EMEP/EEA guidebook 2013, 1.A.2.f.ii, Tab. 3-1
- Arsenic [emissions to air, unspecified]: 5.0197e-16 kg; lognormal SD95 5.8584
  (3,3,2,5,5,5,BU:5); emission factor of diesel: 3.29E-3 g/kg diesel, assuming a share of 97.7% with particle filter; EMEP/EEA guidebook 2013, 1.A.2.f.ii, Tab. 3-1
- Acrolein [emissions to air, unspecified]: 4.5425e-10 kg; lognormal SD95 2.308
  (3,3,2,5,5,5,BU:1.5); emission factor of diesel: 9.05E-2 g/kg diesel, assuming a share of 97.7% with particle filter; BAFU 2015: Non-road database; EMEP/EEA guidebook 2013, Tab. 3-112
- Zinc [emissions to air, unspecified]: 5.0197e-12 kg; lognormal SD95 5.8584
  (same comment as for Lead)
- Benzaldehyde [emissions to air, unspecified]: 3.5159e-10 kg; lognormal SD95 2.308
  (3,3,2,5,5,5,BU:1.5); emission factor of diesel: 7.00E-2 g/kg diesel, assuming a share of 97.7% with particle filter; BAFU 2015: Non-road database; EMEP/EEA guidebook 2013, Tab. 3-112
- Oils, unspecified [emissions to soil, industrial]: 3.7573e-9 kg; lognormal SD95 1.5954
  (same comment as for Manganese)
- Benzo(a)pyrene [emissions to air, unspecified]: 1.5059e-13 kg; lognormal SD95 3.7429
  (3,3,2,5,5,5,BU:3); emission factor of diesel: 2.00E-2 g/kg diesel, assuming a share of 97.7% with particle filter; EMEP/EEA guidebook 2013, 1.A.2.f.ii, Tab. 3-1
- Propane [emissions to air, unspecified]: 2.5664e-11 kg; lognormal SD95 2.308
  (3,3,2,5,5,5,BU:1.5); emission factor of diesel: 5.11E-3 g/kg diesel, assuming a share of 97.7% with particle filter; BAFU 2015: Non-road database; EMEP/EEA guidebook 2013, Tab. 3-112
- Copper [emissions to soil, industrial]: 1.887e-10 kg; lognormal SD95 1.5954
  (same comment as for Manganese)
- Chromium [emissions to soil, industrial]: 1.1914e-11 kg; lognormal SD95 1.5954
  (same comment as for Manganese)
- Ammonia [emissions to air, unspecified]: 5.0197e-11 kg; lognormal SD95 2.1253
  (3,3,2,5,5,5,BU:1.2); emission factor of diesel: 1.00E-2 g/kg diesel, assuming a share of 97.7% with particle filter; EMEP/EEA guidebook 2013, 1.A.3.c, Tab. 3-3
- Carbon monoxide, fossil [emissions to air, unspecified]: 1.2524e-7 kg; lognormal SD95 5.8584
  (3,3,2,5,5,5,BU:5); emission factor of diesel: 2.50E+1 g/kg diesel, assuming a share of 97.7% with particle filter; BAFU 2015: non road emission factor database
- Particulates, > 10 um [emissions to air, unspecified]: 4.2627e-11 kg; lognormal SD95 2.308
  (3,3,2,5,5,5,BU:1.5); emission factor of diesel: 8.49E-3 g/kg diesel, assuming a share of 97.7% with particle filter; own calculation with SBB tractions data and non road emission factor (BAFU 2015)
- Pentane [emissions to air, unspecified]: 1.5398e-11 kg; lognormal SD95 2.308
  (3,3,2,5,5,5,BU:1.5); emission factor of diesel: 3.07E-3 g/kg diesel, assuming a share of 97.7% with particle filter; BAFU 2015: Non-road database; EMEP/EEA guidebook 2013, Tab. 3-112
- Benzene [emissions to air, unspecified]: 3.4516e-11 kg; lognormal SD95 3.7429
  (3,3,2,5,5,5,BU:3); emission factor of diesel: 6.88E-3 g/kg diesel, assuming a share of 97.7% with particle filter; BAFU 2015: non road emission factor database
- Particulates, < 2.5 um [emissions to air, unspecified]: 1.0088e-9 kg; lognormal SD95 3.7429
  (3,3,2,5,5,5,BU:3); emission factor of diesel: 8.27E-3 g/kg diesel, assuming a share of 97.7% with particle filter; own calculation with SBB tractions data and non road emission factor (BAFU 2015)
- Sulfur dioxide [emissions to air, unspecified]: 1.0039e-10 kg; lognormal SD95 2.0816
  (3,3,2,5,5,5,BU:1.05); emission factor of diesel: 2.01E-1 g/kg diesel, assuming a share of 97.7% with particle filter; HBEFA 3.1., CH
- Chromium VI [emissions to air, unspecified]: 5.0197e-16 kg; lognormal SD95 5.8584
  (3,3,2,5,5,5,BU:5); emission factor of diesel: 5.00E-5 g/kg diesel, assuming a share of 97.7% with particle filter; EMEP/EEA guidebook 2013, 1.A.2.f.ii, Tab. 3-1
- Zinc [emissions to air, unspecified]: 1.859e-10 kg; lognormal SD95 5.0838
  (same comment as for Lead)
- Zinc [emissions to soil, industrial]: 3.5432e-11 kg; lognormal SD95 1.5954
  (same comment as for Manganese)

## Sampling procedure
Statistics

## Extrapolations
Some generic datasets from ecoinvent have been used.

## Sources
- Krebs L., Frischknecht R., 2020, 2020 - Update Mobitool 2020 - Krebs, Project report, 713, treeze Ltd., Uster, CH
L. Krebs, R. Frischknecht (2020) Aktualisierung Ökobilanzdaten mobitool 2020, Teil 1. Project report. Volume: 713. treeze Ltd.. Uster, CH.
Type: Separate publication
Source: Report
First author: L. Krebs
Other authors: R. Frischknecht
Year: 2020
Title of anthology: Project report
Place of publication: Uster, CH
Publisher: treeze Ltd.
Volume No: 713

## Validation
Proof reading validation: 13.11.2020; Other validation: G:\Projekte laufend\713 Aktualisierung mobitool 2020\EcoSpold\[713_Transport-Train-passenger-CH_v0.7.xlsx]X-Process;
