# Disposal, cooker hood, kitchen

Dataset: EcoSpold 1, unit process
Functional unit: 1 p
Category: construction / kitchen
Geography: CH
Time period: 2014-01 to 2014-12
Share of production covered: 0 %
Generated by: Franziska Wyss
accessRestrictedTo: 0
copyright: true

## Included processes
This data set includes the disposal of the kitchen cooker hood. All metalic parts are recycled. 8.4 kg waste is disposed of. It is assumed that 10% are electronics and cables, 70% are plastics (PE) from the ventilator and 20% are mixed plastics. Transport to the incineration plant is included.; Geography: Data valid for Switzerland

## Geography
Data valid for Switzerland

## Technology
Average disposal

## Reference product
- Disposal, cooker hood, kitchen [CH]: 1 p
  SWITZERLAND

## Inputs from technosphere
- Disposal, electronics for control units [RER]: 0.84 kg; lognormal SD95 1.2423
  (4,3,1,1,1,4,BU:1.05); Entsorgung Kable;
- Disposal, plastics, mixture, 15.3% water, to municipal incineration [CH]: 1.68 kg; lognormal SD95 1.2423
  (4,3,1,1,1,4,BU:1.05); Entsorgung Filter und diverse Kunststoffe;
- Disposal, polyethylene terephtalate, 0.2% water, to municipal incineration [CH]: 5.88 kg; lognormal SD95 1.2423
  (4,3,1,1,1,4,BU:1.05); Entsorgung HDPE;
- Transport, freight, lorry, 16t-32t gross weight, fleet average [CH]: 0.084 tkm; lognormal SD95 2.095
  (4,5,na,na,na,na,BU:2); Transport LKW ;

## Sources
- Kasser U., R. Frischknecht, M. Klingler, D. Savi, R. Itten, F. Wyss,P. Stolz, L. Tschuemperlin, 2016, 2016 - Renewal and exp. of LCA data in KBOB - Kasser, Project report, 489, Buero fuer Umweltchemie, treeze Ltd., Zuerich and Uster, CH
Franziska Wyss, Rolf Frischknecht, Philippe Stolz (2014) Ökobilanzen von Kücheneinbauten und -möbeln. Project report. Volume: 489. treeze Ltd.. Uster, CH.
Type: Separate publication
Source: Report
First author: Franziska Wyss
Other authors: Rolf Frischknecht, Philippe Stolz
Year: 2014
Title of anthology: Project report
Place of publication: Uster, CH
Publisher: treeze Ltd.
Volume No: 489

## Validation
Proof reading validation: 05.11.2015; Other validation: \\SRV01\ESU-Docs\Projekte laufend\489 Erweiterung KBOB-Liste BFE\EcoSpold\Küche\[489_Küche_v1.10.xlsx]X-Process;
