# Uranium natural, at open pit mine

Dataset: EcoSpold 1, unit process
Functional unit: 1 kg
Category: minerals / unspecified
Geography: US
Time period: 2000-01 to 2000-12
Generated by: Roberto Dones
accessRestrictedTo: 0
copyright: true

## General comment
The data on radioactive emission to air and water are from old references, but the range of values is relatively small. Only particle emission (here assumed dust >10 micrometer) to air is explicitly given in the used reference;

## Included processes
The module includes: diesel use for digging and producing electricity; transport of the diesel fuel; radioactive and non-radioactive emissions to air and water; water use (mining water, but attributed to "unspecified natural origin").

## Technology
Average conditions in early 1980s.

## Reference product
- Uranium natural, at open pit mine [US]: 1 kg
  North America

## Inputs from technosphere
- Transport, freight, lorry, fleet average [RER]: 7.23 tkm; lognormal SD95 2.5
  own estimation
- Diesel, burned in building machine, average [CH]: 16 MJ; lognormal SD95 5
  range of data
- Uranium open pit mine [US]: 6.17e-8 p; lognormal SD95 2
  own estimatoin
- Blasting [RER]: 0.26 kg; lognormal SD95 3
  old reference for model mine
- Transport, freight, rail [RER]: 1.37 tkm; lognormal SD95 2.5
  own estimation
- Diesel, burned in diesel-electric generating set [GLO]: 36.5 MJ; lognormal SD95 5
  range of data

## Inputs from nature
- Occupation, mineral extraction site [resources, land]: 4 m2a; lognormal SD95 2.5
  own estimation, based on range of data
- Uranium [resources, in ground]: 1.05 kg; lognormal SD95 1.05
  own estimation
- Transformation, to mineral extraction site [resources, land]: 0.182 m2; lognormal SD95 2
  own estimation, based on range of data
- Water, unspecified natural origin/m3 [resources, in water]: 6 m3; lognormal SD95 1.5
  range of data
- Transformation, to unknown [resources, land]: 0.182 m2; lognormal SD95 2
  own estimation, based on range of data
- Transformation, from unknown [resources, land]: 0.182 m2; lognormal SD95 2
  own estimation, based on range of data
- Transformation, from industrial area [resources, land]: 0.182 m2; lognormal SD95 2
  own estimation, based on range of data

## Emissions to nature
- Vanadium [emissions to water, river]: 0.0065 kg; lognormal SD95 3
  old reference for model mine
- Radium-226 [emissions to water, river]: 5000 kBq; lognormal SD95 5
  old reference, range of data
- Nitrate [emissions to water, river]: 0.0021 kg; lognormal SD95 3
  old reference for model mine
- Iron [emissions to water, river]: 0.034 kg; lognormal SD95 3
  old reference for model mine
- Radon-222 [emissions to air, low. pop.]: 130000 kBq; lognormal SD95 1.8
  range of data
- Barium [emissions to water, river]: 0.0019 kg; lognormal SD95 3
  old reference for model mine
- Molybdenum [emissions to water, river]: 0.0016 kg; lognormal SD95 3
  old reference for model mine
- Arsenic [emissions to water, river]: 9.3e-5 kg; lognormal SD95 3
  old reference for model mine
- Aluminium [emissions to water, river]: 0.0031 kg; lognormal SD95 3
  old reference for model mine
- Sulfate [emissions to water, river]: 48 kg; lognormal SD95 3
  old reference for model mine
- Selenium [emissions to water, river]: 0.00019 kg; lognormal SD95 3
  old reference for model mine
- Uranium alpha [emissions to water, river]: 220 kBq; lognormal SD95 2
  old reference, range of data
- Suspended solids, unspecified [emissions to water, river]: 2.1 kg; lognormal SD95 3
  old reference for model mine
- Uranium alpha [emissions to air, low. pop.]: 0.094 kBq; lognormal SD95 5
  own calculation
- Lead [emissions to water, river]: 0.018 kg; lognormal SD95 3
  old reference for model mine
- Chloride [emissions to water, river]: 0.86 kg; lognormal SD95 3
  old reference for model mine
- Particulates, > 10 um [emissions to air, low. pop.]: 0.056 kg; lognormal SD95 10
  old reference for model mine, own assumption
- Magnesium [emissions to water, river]: 0.11 kg; lognormal SD95 3
  old reference for model mine
- Ammonium, ion [emissions to water, river]: 0.0085 kg; lognormal SD95 3
  old reference for model mine
- Thorium-230 [emissions to water, river]: 460 kBq; lognormal SD95 2
  old reference, range of data
- Manganese [emissions to water, river]: 0.069 kg; lognormal SD95 3
  old reference for model mine
- Cadmium [emissions to water, river]: 9.3e-5 kg; lognormal SD95 3
  old reference for model mine
- Zinc [emissions to water, river]: 0.0012 kg; lognormal SD95 3
  old reference for model mine
- Water [emissions to water, unspecified]: 5700 kg; lognormal SD95 2.5196
  (5,5,5,5,5,BU:1.05); All uncertainty-values set to 5.0 by default. Balance of input water

## Sampling procedure
Literature

## Sources
- Dones R., Bauer C., Doka G., 2009, 2009 - Nuclear energy - Dones, Sachbilanzen von Energiesystemen. Final report No. 6 ecoinvent v2.1, 6, Swiss Centre for LCI, PSI, Doka LCA, Duebendorf and Villigen, CH
Dones, R., Doka G. (2009) Kernenergie. Sachbilanzen von Energiesystemen. Final report No. 6 ecoinvent v2.1. Editors: Bauer C.. Volume: 6. Swiss Centre for LCI, PSI. Dübendorf and Villigen, CH.
Type: Measurement on site
Source: CD-ROM
First author: Dones, R.
Other authors: Doka G.
Year: 2009
Name of editors: Bauer C.
Title of anthology: Sachbilanzen von Energiesystemen. Final report No. 6 ecoinvent v2.1
Place of publication: Dübendorf and Villigen, CH
Publisher: Swiss Centre for LCI, PSI
Volume No: 6

## Validation
Proof reading validation: passed; Other validation: for final calculation August 2003;
