# Catenary masts

Dataset: EcoSpold 1, unit process
Functional unit: 1 p
Category: transport systems / road\Transformation\Infrastructure
Geography: RER
Time period: 2020-01 to 2020-12
Generated by: Romain Sacchi
accessRestrictedTo: 0
copyright: False

## General comment
Catenary masts per km. One every 50 m. Original source: https://doi.org/10.3390/su10041148.

## Time period
Base technology year of 2020

## Reference product
- Catenary masts [RER]: 1 p

## Inputs from technosphere
All rows: lognormal SD95 1.25585
- Chromium steel product manufacturing, average metal working [RER]: 7750 kg
  Uncertainty from pedigree matrix: (4, 4, 3, 2, 1, 2)
- Glass fibre reinforced plastic, polyamide, injection moulding, at plant [RER]: 274 kg
  Uncertainty from pedigree matrix: (4, 4, 3, 2, 1, 2)
- Chromium steel 18/8, at plant [RER]: 7750 kg
  Uncertainty from pedigree matrix: (4, 4, 3, 2, 1, 2)
- Transport, freight, rail [RER]: 1610 tkm
  Uncertainty from pedigree matrix: (4, 4, 3, 2, 1, 2)
- Transport, freight, lorry, 16t-32t gross weight, fleet average [RER]: 803 tkm
  Uncertainty from pedigree matrix: (4, 4, 3, 2, 1, 2)

## Sources
- Sacchi R., Bauer C., 2023, 2023 - LCI on-road vehicles - Sacchi, PSI, Villigen, CH
doi: 10.5281/ZENODO.5156043
