# xx Transport, average train

Dataset: EcoSpold 1, unit process
Functional unit: 1 personkm
Category: transport systems / transport, obsolete\rail, obsolete
Geography: BE
Time period: 2000-01 to 2008-12
Production volume: 9932 Mio. pkm in 2007
Share of production covered: 1 %
Generated by: Michael Spielmann
accessRestrictedTo: 0
copyright: true

## General comment
Inventory refers to the entire transport life cycle. For rail infrastructure, expenditures and environmental interventions due to construction, renewal and disposal of rail tracks have been allocated based on the Gross tonne kilometre performance. Expenditures due to operation of the rail infrastructure, as well as land use have been allocated based on the yearly train kilometre performance.
Technology: For vehicle operation all technologies are included in the average data. Rail construction addresses conventional gravel track beddings. For the manufacturing of vehicles, the data reflects the currently dominating train type (IC2000) of Switzerland.
Version: 2.2

1.0
Production volume: 9932 Mio. pkm in 2007
Local category: Transportsysteme
Local subcategory: Schiene

## Included processes
The module calls the modules "operation of vehicle"; "production, maintenance and disposal of vehicles"; "construction and maintenance and disposal of railway tracks".

## Reference product
- xx Transport, average train [BE]: 1 personkm
  BELGIUM

## Inputs from technosphere
- Maintenance, long-distance train [CH]: 4.0624e-10 p; lognormal SD95 1.2
  own estimation based on comparison with the vehicle stock-transport performance ratio in 2000.
- Disposal, long-distance train [CH]: 4.0624e-10 p; lognormal SD95 1.2
  (same comment as for Maintenance, long-distance train)
- Operation, average train [BE]: 1 personkm; lognormal SD95 1
  own estimation
- Operation, maintenance, railway track [CH]: 0.00010354 my; lognormal SD95 1.2
  own estimation taken into account uncertainties in the infrastructure length -transport performance ratio.
- Railway track [CH]: 0.00010354 my; lognormal SD95 1.2
  (same comment as for Operation, maintenance, railway track)
- Long-distance train [CH]: 4.0624e-10 p; lognormal SD95 1.2
  (same comment as for Maintenance, long-distance train)
- Disposal, railway track [CH]: 0.00010354 my; lognormal SD95 1.2
  (same comment as for Operation, maintenance, railway track)

## Sampling procedure
International railway statistics

## Extrapolations
see Technology and Geography

## Sources
- Spielmann M., Bauer C., Dones R., Tuchschmid M., 2007, 2007 - Transport services - Spielmann, Final report ecoinvent Data v2.0, 14, Swiss Centre for LCI, PSI, ESU-services Ltd., Duebendorf, Villigen and Uster, CH
Spielmann M., Dones R; Bauer C. (2007) Life Cycle Inventories of Transport Services. Final report ecoinvent Data v2.0. Volume: 14. Issue: 0. Swiss Centre for LCI, PSI. Dübendorf and Villigen, CH.
Type: Measurement on site
Source: CD-ROM
First author: Spielmann M.
Other authors: Dones R; Bauer C.
Year: 2007
Title of anthology: Final report ecoinvent Data v2.0
Place of publication: Dübendorf and Villigen, CH
Publisher: Swiss Centre for LCI, PSI
Volume No: 14
Issue No: 0

## Validation
Proof reading validation: passed; Other validation: none;
