# Zirconium oxide, at plant

Dataset: EcoSpold 1, unit process
Functional unit: 1 kg
Category: chemicals / inorganic
Geography: AU
Time period: 2000-01 to 2005-12
Generated by: Alex Primas
accessRestrictedTo: 0
copyright: true

## General comment
In- and outputs of ZrSO4 and NaOH are calculated according to the stoechiometry. Process approximated with hydrothermal sodium silicate production and calcination of aluminium hydroxide to aluminium oxide. Weak data for energy consumption, wastes and emissions. Data partly based on a EMPA study, commissioned by the CEES.;
CAS number: 001314-23-4;
Formula: ZiO2;
Synonyms: zirconium dioxide, zirconia;

## Included processes
The process includes material and energy input, wastes and emissions for the production of zirconium oxide from zircon (ZrSiO4) using caustic fusion with sodium hydroxide. Transport and infrastructure are estimated.

## Technology
Caustic fusion of zircon mineral (ZrSiO4) with sodium hydroxide to zirconium hydroxide. No allocation to sodium silicate by-product. Calcination of zirconium hydroxide to zirconium oxide.

## Reference product
- Zirconium oxide, at plant [AU]: 1 kg
  AUSTRALIA

## Inputs from technosphere
- Disposal, inert waste, 5% water, to construction waste landfill [CH]: 0.0181 kg; lognormal SD95 1.6517
  (4,5,3,3,4,4); data from hydrothermal sodium silicate production used
- Transport, freight, rail [RER]: 2.67 tkm; lognormal SD95 2.095
  (4,5,nA,nA,nA,nA); standard distances used
- Disposal, residue from cooling tower, 30% water, to sanitary landfill [CH]: 0.0025 kg; lognormal SD95 1.6517
  (4,5,3,3,4,4); data from hydrothermal sodium silicate production used
- Chemicals organic, at plant [GLO]: 0.00146 kg; lognormal SD95 1.6517
  (4,5,3,3,4,4); data from hydrothermal sodium silicate production used
- Sodium hydroxide, 50% in H2O, production mix, at plant [RER]: 1.44 kg; lognormal SD95 1.1267
  (2,nA,nA,3,1,4); data from hydrothermal sodium silicate production used
- Zircon, 50% zirconium, at plant [AU]: 1.57 kg; lognormal SD95 1.1267
  (2,nA,nA,3,1,4); inputcalculated from stoechiometry
- Heat, light fuel oil, at industrial furnace 1MW [RER]: 2 MJ; lognormal SD95 1.6517
  (4,5,3,3,4,4); data from hydrothermal sodium silicate production used
- Heat, at hard coal industrial furnace 1-10MW [RER]: 0.0541 MJ; lognormal SD95 1.6517
  (4,5,3,3,4,4); data from hydrothermal sodium silicate production used
- Chemical plant, organics [RER]: 8e-10 p; lognormal SD95 3.7861
  (4,5,3,3,5,4); estimation
- Disposal, average incineration residue, 0% water, to residual material landfill [CH]: 4.16e-5 kg; lognormal SD95 1.6517
  (4,5,3,3,4,4); data from hydrothermal sodium silicate production used
- Electricity, medium voltage, production ENTSO-E, at grid: 0.0413 kWh; lognormal SD95 1.6517
  (4,5,3,3,4,4); data from hydrothermal sodium silicate production used
- Transport, freight, lorry, fleet average [RER]: 0.45 tkm; lognormal SD95 2.095
  (4,5,nA,nA,nA,nA); standard distances used
- Heat, natural gas, at industrial furnace 1MW [CH]: 1.2 MJ; lognormal SD95 1.6517
  (4,5,3,3,4,4); data from sodium silicate and aluminium hydroxide production
- Steam, for chemical processes, at plant [RER]: 0.3 kg; lognormal SD95 1.6517
  (4,5,3,3,4,4); data from hydrothermal sodium silicate production used

## Inputs from nature
- Water, cooling, unspecified natural origin/m3 [resources, in water]: 2.08e-5 m3; lognormal SD95 1.6517
  (4,5,3,3,4,4); data from hydrothermal sodium silicate production used
- Water, unspecified natural origin/m3 [resources, in water]: 0.0016 m3; lognormal SD95 1.6517
  (4,5,3,3,4,4); data from hydrothermal sodium silicate production used

## Emissions to nature
- COD, Chemical Oxygen Demand [emissions to water, river]: 1.31e-5 kg; lognormal SD95 1.9028
  (4,5,3,3,4,4); data from hydrothermal sodium silicate production used
- Chloride [emissions to water, river]: 9.78e-5 kg; lognormal SD95 3.3428
  (4,5,3,3,4,4); data from hydrothermal sodium silicate production used
- Heat, waste [emissions to air, high. pop.]: 1.0187 MJ; lognormal SD95 1.6517
  (4,5,3,3,4,4); data from hydrothermal sodium silicate production used
- Iron [emissions to water, river]: 8.32e-8 kg; lognormal SD95 5.3933
  (4,5,3,3,4,4); data from hydrothermal sodium silicate production used
- Silicon [emissions to water, river]: 0.00341 kg; lognormal SD95 5.3933
  (4,5,3,3,4,4); data from hydrothermal sodium silicate production used
- Nitrate [emissions to water, river]: 2.91e-7 kg; lognormal SD95 1.9028
  (4,5,3,3,4,4); data from hydrothermal sodium silicate production used
- Phosphate [emissions to water, river]: 2.08e-8 kg; lognormal SD95 1.9028
  (4,5,3,3,4,4); data from hydrothermal sodium silicate production used
- Suspended solids, unspecified [emissions to water, river]: 0.00127 kg; lognormal SD95 1.9028
  (4,5,3,3,4,4); data from hydrothermal sodium silicate production used
- Water [emissions to water, unspecified]: 0.01976, 1.52 kg (2 entries); lognormal SD95 2.5196
  (5,5,5,5,5,BU:1.05); All uncertainty-values set to 5.0 by default. Balance of input water

## Sampling procedure
Based on literature

## Sources
- Althaus H.-J., Chudacoff M., Hellweg S., Hischier R., Jungbluth N., Osses M., Primas A., 2007, 2007 - LCI chemicals - Althaus, Final report ecoinvent data v2.0, 8, Swiss Centre for LCI, Empa - TSL, ETH, ESU-services Ltd., Chudacoff Oekoscience, Duebendorf, CH
Althaus H.-J., Chudacoff M., Hischier R., Jungbluth N., Osses M., Primas A. (2007) Life Cycle Inventories of Chemicals. Final report ecoinvent data v2.0. Volume: 8. Swiss Centre for LCI, Empa - TSL. Dübendorf, CH.
Type: Measurement on site
Source: CD-ROM
First author: Althaus H.-J.
Other authors: Chudacoff M., Hischier R., Jungbluth N., Osses M., Primas A.
Year: 2007
Title of anthology: Final report ecoinvent data v2.0
Place of publication: Dübendorf, CH
Publisher: Swiss Centre for LCI, Empa - TSL
Volume No: 8

## Validation
Proof reading validation: passed; Other validation: none;
