# Render carrier board, resin bound, at plant

Dataset: EcoSpold 1, unit process
Functional unit: 1 m2
Category: construction materials / plaster base
Geography: DE
Time period: 2000-01 to 2016-12
Generated by: Daniel Savi
accessRestrictedTo: 0
copyright: true

## General comment
Putzträgerplatte, kunstharzgebunden, Herstellung;

## Technology
Produktion im einzigen Werk des marktführenden Anbieters

## Reference product
- Render carrier board, resin bound, at plant [DE]: 1 m2
  GERMANY

## Inputs from technosphere
- Glass fibre, at plant [RER]: 0.32 kg; lognormal SD95 1.0587
  (1;1;2;1;1)
- Plastics processing factory [RER]: 5e-10 p; lognormal SD95 4.19863
  (5;5;5;5;5)
- Disposal, inert waste, 5% water, to construction waste landfill [CH]: 0.1 kg; lognormal SD95 1.0587
  (1;1;2;1;1)
- Epoxy resin, liquid, at plant [RER]: 0.56 kg; lognormal SD95 1.0587
  (1;1;2;1;1)
- Cellular glass aggregate, at regional storage [CH]: 5.01 kg
- Light fuel oil, burned in industrial furnace 1MW, non-modulating [RER]: 6.94 MJ; lognormal SD95 1.07795
  (2;1;2;1;1)
- Aluminium hydroxide, at plant [RER]: 0.47 kg; lognormal SD95 1.0587
  (1;1;2;1;1)
- Transport, freight, lorry, 32t-40t gross weight, fleet average [RER]: 2.031 tkm; lognormal SD95 2.01434
  (3;1;2;1;1)
- Silicone product, at plant [RER]: 0.0092 kg; lognormal SD95 1.0587
  (1;1;2;1;1)
- Electricity, medium voltage, at grid [DE]: 1.602 kWh; lognormal SD95 1.07795
  (2;1;2;1;1)

## Sampling procedure
Sampling procedure: Daten aus dem Hintergrundbericht einer EPD. Erstellt durch PE International mit Herstellerdaten

## Sources
- Created for EcoSpold 1 compatibility, Final report ecoinvent data v2.0, 17
Jungbluth N., Chudacoff M., Dauriat A., Dinkel F., Doka G., Faist Emmenegger M., Gnansounou E., Kljun N., Spielmann M., Stettler C., Sutter J. (2007) Life Cycle Inventories of Bioenergy. Final report ecoinvent data v2.0. Volume: 17. Swiss Centre for LCI, ESU. Duebendorf and Uster, CH.
Type: Measurement on site
Source: CD-ROM
First author: Jungbluth N.
Other authors: Chudacoff M., Dauriat A., Dinkel F., Doka G., Faist Emmenegger M., Gnansounou E., Kljun N., Spielmann M., Stettler C., Sutter J.
Year: 2007
Title of anthology: Final report ecoinvent data v2.0
Place of publication: Duebendorf and Uster, CH
Publisher: Swiss Centre for LCI, ESU
Volume No: 17
