# Passenger car, electric, LiMn2O4, at plant

Dataset: EcoSpold 1, unit process, infrastructure
Functional unit: 1 p
Category: transport systems / road\operations\infrastructure
Geography: RER
Time period: 2010-01 to 2015-12
Generated by: Marianne Leuenberger
accessRestrictedTo: 0
copyright: true

## General comment
The data set reflects a middle class electric passenger car comparable to a VW Golf. ;

## Included processes
The inventory includes processes of material, energy and water use in vehicle manufacturing. Rail and road transport of materials is accounted for. Plant infrastructure is included, addressing issues such as land use, building, road and parking construction. Additionally, battery and electric motor manufacture is included.

## Geography
Data for manufacturing and retail in Europe

## Technology
Battery electric vehicle using a LiMn2O4/graphite, battery pack of 312 kg, 100Wh/kg, and an electric motor of 104 kg.

## Reference product
- Passenger car, electric, LiMn2O4, at plant [RER]: 1 p
  Europe

## Inputs from technosphere
- Nickel, 99.5%, at plant [GLO]: 1.4 kg; lognormal SD95 1.2738
  (2,4,3,1,3,3); Identical to ecoinvent data set of passenger car (Spielmann et al. 2007), No.14 Transport
- Polyethylene, HDPE, granulate, at plant [RER]: 83.2 kg; lognormal SD95 1.2738
  (same comment as for Nickel, 99.5%, at plant)
- Section bar rolling, steel [RER]: 203 kg; lognormal SD95 1.2738
  (same comment as for Nickel, 99.5%, at plant)
- Zinc, primary, at regional storage [RER]: 5.89 kg; lognormal SD95 1.2738
  (same comment as for Nickel, 99.5%, at plant)
- Wire drawing, copper [RER]: 10.1 kg; lognormal SD95 1.2738
  (same comment as for Nickel, 99.5%, at plant)
- Flat glass, uncoated, at plant [RER]: 30.1 kg; lognormal SD95 1.2738
  (same comment as for Nickel, 99.5%, at plant)
- Transport, freight, lorry, fleet average [RER]: 53 tkm; lognormal SD95 2.095
  (4,5,na,na,na,na); Identical to ecoinvent data set of passenger car (Spielmann et al. 2007), No.14 Transport
- Ethylene, average, at plant [RER]: 18.5 kg; lognormal SD95 1.2738
  (same comment as for Nickel, 99.5%, at plant)
- Ethylene glycol, at plant [RER]: 4.8 kg; lognormal SD95 1.2738
  (same comment as for Nickel, 99.5%, at plant)
- Reinforcing steel, at plant [RER]: 831 kg; lognormal SD95 1.2738
  (same comment as for Nickel, 99.5%, at plant)
- Copper, at regional storage [RER]: 10.1 kg; lognormal SD95 1.2738
  (same comment as for Nickel, 99.5%, at plant)
- Steel, low-alloyed, at plant [RER]: 84 kg; lognormal SD95 1.2738
  (2,4,3,1,3,3); Input ecoinvent data set of passenger car (Spielmann et al. 2007) without 15 kg steel for ICE motor, No.14 Transport
- Light fuel oil, burned in boiler 100kW, non-modulating [CH]: 63 MJ; lognormal SD95 1.2738
  (same comment as for Nickel, 99.5%, at plant)
- Battery, LiIo, rechargeable, prismatic, at plant [GLO]: 312 kg; lognormal SD95 1.3277
  (4,3,1,1,3,4); 312 kg in BEV (according to formula in Rantik 1999)
- Polypropylene, granulate, at plant [RER]: 49 kg; lognormal SD95 1.2738
  (same comment as for Nickel, 99.5%, at plant)
- Electric motor, electric vehicle, at plant [RER]: 104 kg; lognormal SD95 1.3277
  (4,3,1,1,3,4); 104kg in Toyota Prius
- Electricity, medium voltage, production ENTSO-E, at grid: 2140 kWh; lognormal SD95 1.2738
  (same comment as for Nickel, 99.5%, at plant)
- Road vehicle plant [RER]: 2.91e-7 p; lognormal SD95 3.2537
  (5,4,3,1,1,3); Identical to ecoinvent data set of passenger car (Spielmann et al. 2007), No.14 Transport
- Sheet rolling, steel [RER]: 541 kg; lognormal SD95 1.2738
  (same comment as for Nickel, 99.5%, at plant)
- Natural gas, burned in industrial furnace 1MWth [CH]: 2220 MJ; lognormal SD95 1.2738
  (same comment as for Nickel, 99.5%, at plant)
- Synthetic rubber, at plant [RER]: 44.1 kg; lognormal SD95 1.2738
  (same comment as for Nickel, 99.5%, at plant)
- Polyvinylchloride, at regional storage [RER]: 16 kg; lognormal SD95 1.2738
  (same comment as for Nickel, 99.5%, at plant)
- Chromium, at regional storage [RER]: 2.4 kg; lognormal SD95 1.2738
  (same comment as for Nickel, 99.5%, at plant)
- Alkyd paint, white, 60% in solvent, at plant [RER]: 4.16 kg; lognormal SD95 1.2738
  (same comment as for Nickel, 99.5%, at plant)
- Transport, freight, rail, electricity with shunting [CH]: 530 tkm; lognormal SD95 2.095
  (same comment as for Transport, freight, lorry, fleet average)
- Tap water, at user [RER]: 3220 kg; lognormal SD95 1.2738
  (same comment as for Nickel, 99.5%, at plant)

## Emissions to nature
- BOD5, Biological Oxygen Demand [emissions to water, river]: 0.026 kg; lognormal SD95 1.58
  (same comment as for Nickel, 99.5%, at plant)
- NMVOC, non-methane volatile organic compounds, unspecified origin [emissions to air, unspecified]: 4.8 kg; lognormal SD95 1.58
  (same comment as for Nickel, 99.5%, at plant)
- Phosphate [emissions to water, river]: 0.001 kg; lognormal SD95 1.58
  (same comment as for Nickel, 99.5%, at plant)
- Heat, waste [emissions to air, unspecified]: 7700 MJ; lognormal SD95 1.2738
  (same comment as for Nickel, 99.5%, at plant)
- COD, Chemical Oxygen Demand [emissions to water, river]: 0.193 kg; lognormal SD95 1.58
  (same comment as for Nickel, 99.5%, at plant)

## Sampling procedure
Literature

## Extrapolations
All values extrapolated from average passenger car production (VW Golf). Some adaptations made for change of material.

## Sources
- Spielmann M., Bauer C., Dones R., Tuchschmid M., 2007, 2007 - Transport services - Spielmann, Final report ecoinvent Data v2.0, 14, Swiss Centre for LCI, PSI, ESU-services Ltd., Duebendorf, Villigen and Uster, CH
Spielmann M., Dones R; Bauer C. (2007) Life Cycle Inventories of Transport Services. Final report ecoinvent Data v2.0. Volume: 14. Issue: 0. Swiss Centre for LCI, PSI. Dübendorf and Villigen, CH.
Type: Measurement on site
Source: CD-ROM
First author: Spielmann M.
Other authors: Dones R; Bauer C.
Year: 2007
Title of anthology: Final report ecoinvent Data v2.0
Place of publication: Dübendorf and Villigen, CH
Publisher: Swiss Centre for LCI, PSI
Volume No: 14
Issue No: 0

## Validation
Proof reading validation: 29.01.2010; Other validation: C:\Dokumente und Einstellungen\Marianne\Eigene Dateien\Projekte\277_Mobitool\Ecoinvent\Review\Upload 1\[Ecospold_BEV-v1.1.xls]X-Process;
