# Sugar, from sugarcane, at sugar refinery

Dataset: EcoSpold 1, unit process
Functional unit: 1 kg
Category: agricultural / food
Geography: BR
Time period: 2000-01 to 2000-12
Production volume: Production of sugar was 26.6 Mt in Brazil in 2004-2005
Share of production covered: 0 %
Generated by: Edgard Gnansounou
accessRestrictedTo: 0
copyright: true

## General comment
Inventory refers to the production of 1 kg sugar, respectively 1 kg of ethanol (95% w/w dry basis, i.e. 1.05 kg hydrated ethanol 95% wet basis), 1 kg of excess bagasse (wet basis, 79% dry matter), 1 kWh of electricity and 1 kg of vinasse. The multioutput-process 'sugarcane, in sugar refinery' delivers the co-products 'sugar, from sugarcane, at sugar refinery' and 'ethanol, 95% in H2O, from sugarcane molasses, at sugar refinery', 'bagasse, from sugarcane, at sugar refinery', 'electricity, bagasse, sugarcane, at sugar refinery' and 'vinasse, from sugarcane molasses, at sugar refinery'. Economic allocation with allocation factor for common sugar production stages of 80-85% to sugar, 10-11% to ethanol. Allocation according to carbon balance for CO2.;

## Included processes
This dataset includes the transport of sugarcane to the sugar refinery and the processing of sugarcane to sugar, ethanol (95% w/w), bagasse (79% dry matter, excess), excess electricity and vinasse from ethanol production. System boundary is at the sugar refinery. Treatment of waste effluents is not included (most wastewater is spread over the fields nearby). Packaging is not included.

## Technology
Juice extraction is performed through milling (not diffusion). The juice is then purified and crystallized to sugar according to standard processes. Ethanol is produced by standard fermentation and distillation techniques. Energy supply is done by combustion of the bagasse resulting from the extraction stage. The two main products are sugar and ethanol.

## Time period
Data from 1994 to 2006, current technology for the production of ethanol from sugarcane

## Reference product
- Sugar, from sugarcane, at sugar refinery [BR]: 1 kg
  BRAZIL

## Inputs from technosphere
- Sulphuric acid, liquid, at plant [RER]: 0.00035771 kg; lognormal SD95 1.3286
  (2,4,1,3,3,5); etha+ project Alcosuisse, industrial data
- Cogen unit 6400kWth, wood burning, components for electricity only [CH]: 1.1757e-8 p; lognormal SD95 3.117
  (4,4,2,5,1,5); Adapted from the dataset 'wood chips, in cogen 6400kWth, wood', according to actual water, carbon and energy content of the fuel (pressed sorghum bagasse)
- Sodium chloride, powder, at plant [RER]: 4.9954e-5 kg; lognormal SD95 1.3451
  (same comment as for Cogen unit 6400kWth, wood burning, components for electricity only)
- Disposal, used mineral oil, 10% water, to hazardous waste incineration [CH]: 3.9963e-5 kg; lognormal SD95 1.3451
  (same comment as for Cogen unit 6400kWth, wood burning, components for electricity only)
- Sugar refinery [GLO]: 8.8356e-11 p; lognormal SD95 3.0612
  (2,4,1,2,1,5); Sugar-specific infrastructure, given sugar refinery characteristics
- Transport, freight, lorry, fleet average [RER]: 0.17507 tkm; lognormal SD95 2.0646
  (2,4,1,3,1,5); Industrial data from Brazil, for sugarcane delivery to sugar refinery; includes delivery of raw materials according to ecoinvent guidelines, adapted to Brazilian conditions
- Cogen unit 6400kWth, wood burning, common components for heat+electricity [CH]: 1.1757e-8 p; lognormal SD95 3.117
  (same comment as for Cogen unit 6400kWth, wood burning, components for electricity only)
- Disposal, municipal solid waste, 22.9% water, to municipal incineration [CH]: 3.9963e-5 kg; lognormal SD95 1.3451
  (same comment as for Cogen unit 6400kWth, wood burning, components for electricity only)
- Ammonia, liquid, at regional storehouse [RER]: 9.9905e-8 kg; lognormal SD95 1.3451
  (same comment as for Cogen unit 6400kWth, wood burning, components for electricity only)
- Soda, powder, at plant [RER]: 0.001957 kg; lognormal SD95 1.3286
  (2,4,1,3,3,5); etha+ project Alcosuisse, industrial data
- Chlorine, liquid, production mix, at plant [RER]: 3.9963e-6 kg; lognormal SD95 1.3451
  (same comment as for Cogen unit 6400kWth, wood burning, components for electricity only)
- Disposal, wood ash mixture, pure, 0% water, to sanitary landfill [CH]: 0.0032287 kg; lognormal SD95 1.3451
  (same comment as for Cogen unit 6400kWth, wood burning, components for electricity only)
- Transport, freight, lorry, 7.5t-16t gross weight, fleet average [CH]: 0.014134 tkm; lognormal SD95 2.0646
  (2,4,1,3,1,5); Industrial data from Brazil, for sugarcane delivery to sugar refinery
- Treatment, sewage, to wastewater treatment, class 2 [CH]: 9.5885e-6 m3; lognormal SD95 1.3451
  (same comment as for Cogen unit 6400kWth, wood burning, components for electricity only)
- Cogen unit 6400kWth, wood burning, building [CH]: 2.9363e-9 p; lognormal SD95 3.117
  (same comment as for Cogen unit 6400kWth, wood burning, components for electricity only)
- Hard coal coke, at plant [RER]: 0.014225 MJ; lognormal SD95 1.2426
  (2,4,1,2,1,5); Data from sugar producer in Switzerland
- Chemicals organic, at plant [GLO]: 0.0005967 kg; lognormal SD95 1.3286
  (2,4,1,3,3,5); etha+ project Alcosuisse, industrial data
- Tap water, at user [RER]: 6.9956 kg; lognormal SD95 1.2491
  (4,3,1,5,1,3); Average consumption of water in a sugar refinery in Brazil, literature survey
- Water, decarbonised, at plant [RER]: 0.0095885 kg; lognormal SD95 1.3451
  (same comment as for Cogen unit 6400kWth, wood burning, components for electricity only)
- Sugarcane, at farm [BR]: 7.06683 kg; lognormal SD95 1.0882
  (2,1,1,1,1,3); Average sugar and ethanol yields in Brazil, literature survey
- Chemicals inorganic, at plant [GLO]: 0.00075759 kg; lognormal SD95 1.2426
  (2,4,1,2,1,5); Data from sugar producer in Switzerland
- Lubricating oil, at plant [RER]: 0.00013459 kg; lognormal SD95 1.2674
  (2,4,1,5,1,5); Average consumption of limestone in a sugar refinery, global value
- Disposal, wood ash mixture, pure, 0% water, to landfarming [CH]: 0.0016083 kg; lognormal SD95 1.3451
  (same comment as for Cogen unit 6400kWth, wood burning, components for electricity only)
- Limestone, milled, loose, at plant [CH]: 0.17181 kg; lognormal SD95 1.2674
  (2,4,1,5,1,5); Industrial data from Brazil, for sugarcane milling
- Sulphur dioxide, liquid, at plant [RER]: 0.0026501 kg; lognormal SD95 1.2435
  (3,3,1,3,1,5); Data from sugar and ethanol producers in Brazil
- Disposal, wood ash mixture, pure, 0% water, to municipal incineration [CH]: 0.0016083 kg; lognormal SD95 1.3451
  (same comment as for Cogen unit 6400kWth, wood burning, components for electricity only)

## Emissions to nature
- Phenol, pentachloro- [emissions to air, high. pop.]: 8.8499e-11 kg; lognormal SD95 1.6486
  (same comment as for Cogen unit 6400kWth, wood burning, components for electricity only)
- Bromine [emissions to air, high. pop.]: 7.3107e-7 kg; lognormal SD95 5.1335
  (same comment as for Cogen unit 6400kWth, wood burning, components for electricity only)
- Lead [emissions to air, high. pop.]: 3.0338e-7 kg; lognormal SD95 5.1335
  (same comment as for Cogen unit 6400kWth, wood burning, components for electricity only)
- Dinitrogen monoxide [emissions to air, high. pop.]: 2.8023e-5 kg; lognormal SD95 1.6486
  (same comment as for Cogen unit 6400kWth, wood burning, components for electricity only)
- Calcium [emissions to air, high. pop.]: 7.1272e-5 kg; lognormal SD95 5.1335
  (same comment as for Cogen unit 6400kWth, wood burning, components for electricity only)
- Benzene, hexachloro- [emissions to air, high. pop.]: 7.8665e-14 kg; lognormal SD95 3.117
  (same comment as for Cogen unit 6400kWth, wood burning, components for electricity only)
- Methane, biogenic [emissions to air, high. pop.]: 4.7419e-6 kg; lognormal SD95 1.6486
  (same comment as for Cogen unit 6400kWth, wood burning, components for electricity only)
- Nitrogen oxides [emissions to air, high. pop.]: 0.0010722 kg; lognormal SD95 1.6486
  (same comment as for Cogen unit 6400kWth, wood burning, components for electricity only)
- Heat, waste [emissions to air, high. pop.]: 15.0158 MJ; lognormal SD95 1.3117
  (2,3,1,1,3,5); ecoinvent guidelines, calculation from electricity consumption and energy balance
- Acetaldehyde [emissions to air, high. pop.]: 7.432e-7 kg; lognormal SD95 1.6486
  (same comment as for Cogen unit 6400kWth, wood burning, components for electricity only)
- Chromium VI [emissions to air, high. pop.]: 4.8735e-10 kg; lognormal SD95 5.1335
  (same comment as for Cogen unit 6400kWth, wood burning, components for electricity only)
- Chlorine [emissions to air, high. pop.]: 2.1931e-6 kg; lognormal SD95 1.6486
  (same comment as for Cogen unit 6400kWth, wood burning, components for electricity only)
- Carbon monoxide, biogenic [emissions to air, high. pop.]: 7.6479e-5 kg; lognormal SD95 5.1335
  (same comment as for Cogen unit 6400kWth, wood burning, components for electricity only)
- Formaldehyde [emissions to air, high. pop.]: 1.4204e-6 kg; lognormal SD95 1.6486
  (same comment as for Cogen unit 6400kWth, wood burning, components for electricity only)
- Copper [emissions to air, high. pop.]: 2.6805e-7 kg; lognormal SD95 5.1335
  (same comment as for Cogen unit 6400kWth, wood burning, components for electricity only)
- Chromium [emissions to air, high. pop.]: 4.8248e-8 kg; lognormal SD95 5.1335
  (same comment as for Cogen unit 6400kWth, wood burning, components for electricity only)
- PAH, polycyclic aromatic hydrocarbons [emissions to air, high. pop.]: 1.2019e-7 kg; lognormal SD95 3.117
  (same comment as for Cogen unit 6400kWth, wood burning, components for electricity only)
- Manganese [emissions to air, high. pop.]: 2.0834e-6 kg; lognormal SD95 5.1335
  (same comment as for Cogen unit 6400kWth, wood burning, components for electricity only)
- Potassium [emissions to air, high. pop.]: 0.0002851 kg; lognormal SD95 5.1335
  (same comment as for Cogen unit 6400kWth, wood burning, components for electricity only)
- Benzene, ethyl- [emissions to air, high. pop.]: 3.2778e-7 kg; lognormal SD95 1.6486
  (same comment as for Cogen unit 6400kWth, wood burning, components for electricity only)
- Sulfur dioxide [emissions to air, high. pop.]: 3.0338e-5 kg; lognormal SD95 1.3451
  (same comment as for Cogen unit 6400kWth, wood burning, components for electricity only)
- Particulates, < 2.5 um [emissions to air, high. pop.]: 0.00049057 kg; lognormal SD95 3.117
  (same comment as for Cogen unit 6400kWth, wood burning, components for electricity only)
- Magnesium [emissions to air, high. pop.]: 4.3984e-6 kg; lognormal SD95 5.1335
  (same comment as for Cogen unit 6400kWth, wood burning, components for electricity only)
- Benzene [emissions to air, high. pop.]: 9.9429e-6 kg; lognormal SD95 1.6486
  (same comment as for Cogen unit 6400kWth, wood burning, components for electricity only)
- Dioxin, 2,3,7,8 Tetrachlorodibenzo-p- [emissions to air, high. pop.]: 3.3871e-13 kg; lognormal SD95 3.117
  (same comment as for Cogen unit 6400kWth, wood burning, components for electricity only)
- Carbon dioxide, biogenic [emissions to air, high. pop.]: 1.66094 kg; lognormal SD95 1.05
  (1,1,1,1,1,1); Calculation, to close carbon balance
- Nickel [emissions to air, high. pop.]: 7.3107e-8 kg; lognormal SD95 5.1335
  (same comment as for Cogen unit 6400kWth, wood burning, components for electricity only)
- Sodium [emissions to air, high. pop.]: 1.5839e-5 kg; lognormal SD95 5.1335
  (same comment as for Cogen unit 6400kWth, wood burning, components for electricity only)
- Hydrocarbons, aliphatic, alkanes, unspecified [emissions to air, high. pop.]: 9.9429e-6 kg; lognormal SD95 1.6486
  (same comment as for Cogen unit 6400kWth, wood burning, components for electricity only)
- Toluene [emissions to air, high. pop.]: 3.2778e-6 kg; lognormal SD95 1.6486
  (same comment as for Cogen unit 6400kWth, wood burning, components for electricity only)
- Cadmium [emissions to air, high. pop.]: 8.5285e-9 kg; lognormal SD95 5.1335
  (same comment as for Cogen unit 6400kWth, wood burning, components for electricity only)
- Benzo(a)pyrene [emissions to air, high. pop.]: 5.463e-9 kg; lognormal SD95 3.117
  (same comment as for Cogen unit 6400kWth, wood burning, components for electricity only)
- Mercury [emissions to air, high. pop.]: 3.6552e-9 kg; lognormal SD95 5.1335
  (same comment as for Cogen unit 6400kWth, wood burning, components for electricity only)
- NMVOC, non-methane volatile organic compounds, unspecified origin [emissions to air, high. pop.]: 6.6649e-6 kg; lognormal SD95 1.6486
  (same comment as for Cogen unit 6400kWth, wood burning, components for electricity only)
- Hydrocarbons, aliphatic, unsaturated [emissions to air, high. pop.]: 3.3871e-5 kg; lognormal SD95 1.6486
  (same comment as for Cogen unit 6400kWth, wood burning, components for electricity only)
- Zinc [emissions to air, high. pop.]: 3.6552e-6 kg; lognormal SD95 5.1335
  (same comment as for Cogen unit 6400kWth, wood burning, components for electricity only)
- Fluorine [emissions to air, high. pop.]: 6.092e-7 kg; lognormal SD95 1.6486
  (same comment as for Cogen unit 6400kWth, wood burning, components for electricity only)
- Ammonia [emissions to air, high. pop.]: 2.12e-5 kg; lognormal SD95 1.4115
  (same comment as for Cogen unit 6400kWth, wood burning, components for electricity only)
- Arsenic [emissions to air, high. pop.]: 1.2184e-8 kg; lognormal SD95 5.1335
  (same comment as for Cogen unit 6400kWth, wood burning, components for electricity only)
- m-Xylene [emissions to air, high. pop.]: 1.3111e-6 kg; lognormal SD95 1.6486
  (same comment as for Cogen unit 6400kWth, wood burning, components for electricity only)
- Carbon dioxide, fossil [emissions to air, high. pop.]: 0.00075759 kg; lognormal SD95 1.05
  (1,1,1,1,1,1); Calculation, according to consumption of hard coal
- Phosphorus [emissions to air, high. pop.]: 3.6552e-6 kg; lognormal SD95 1.6486
  (same comment as for Cogen unit 6400kWth, wood burning, components for electricity only)

## Sampling procedure
Data is from various sugar and ethanol producers in Brazil (incl. literature data) and from sugar producer in CH

## Extrapolations
Direct emissions (resulting from the combustion of sugarcane bagasse) are based on the the combustion of wood chips (without emission control), according to the corresponding dry matter content, carbon content and energy content.

## Sources
- Jungbluth N., Chudacoff M., Dauriat A., Dinkel F., Doka G., Faist Emmenegger M., Gnansounou E., Kljun N., Spielmann M., Stettler C., Sutter J., 2007, 2007 - LCI bioenergy - Jungbluth, Final report ecoinvent data v2.0, 17, Swiss Centre for LCI, ESU-services Ltd., Duebendorf and Uster, CH
Jungbluth N., Chudacoff M., Dauriat A., Dinkel F., Doka G., Faist Emmenegger M., Gnansounou E., Kljun N., Spielmann M., Stettler C., Sutter J. (2007) Life Cycle Inventories of Bioenergy. Final report ecoinvent data v2.0. Volume: 17. Swiss Centre for LCI, ESU. Duebendorf and Uster, CH.
Type: Measurement on site
Source: CD-ROM
First author: Jungbluth N.
Other authors: Chudacoff M., Dauriat A., Dinkel F., Doka G., Faist Emmenegger M., Gnansounou E., Kljun N., Spielmann M., Stettler C., Sutter J.
Year: 2007
Title of anthology: Final report ecoinvent data v2.0
Place of publication: Duebendorf and Uster, CH
Publisher: Swiss Centre for LCI, ESU
Volume No: 17

## Validation
Proof reading validation: Passed.; Other validation: none;
