# Distribution network, electricity, low voltage

Dataset: EcoSpold 1, unit process, infrastructure
Functional unit: 1 km
Category: electricity / distribution
Geography: CH
Time period: 2000-01 to 2000-12
Share of production covered: 0 %
Generated by: René Itten
accessRestrictedTo: 0
copyright: true

## General comment
This data set reflects the Swiss electricity distribution grid on the low voltage level including underground cables, aerial lines and transformers in the year 2011;

## Included processes
This data set includes the material use of the infrastructure for electricity distribution on the low voltage level.

## Geography
Data from Switzerland but also valid for Europe and North America

## Technology
Electricity distribution infrastructure

## Reference product
- Distribution network, electricity, low voltage [CH]: 1 km
  SWITZERLAND

## Inputs from technosphere
- Epoxy resin, liquid, at plant [RER]: 24.5 kg; lognormal SD95 1.2165
  (1,3,1,3,1,5,BU:1.05); Literature data; HV: Jorge et al. 2011, MV: Bumy et al. 2010, Jones and McManus 2010, LV: Personal communication ewz
- Disposal, used mineral oil, 10% water, to hazardous waste incineration [CH]: 518.93 kg; lognormal SD95 1.3034
  (4,2,2,2,1,5,BU:1.05); Estimation; 100% disposed
- Building, hall, steel construction [CH]: 0.12793 m2; lognormal SD95 3.0928
  (4,2,2,2,1,5,BU:3); Estimation; own calculation
- Lead, at regional storage [RER]: 2100 kg; lognormal SD95 1.2165
  (same comment as for Epoxy resin, liquid, at plant)
- Copper, at regional storage [RER]: 4600 kg; lognormal SD95 1.2165
  (same comment as for Epoxy resin, liquid, at plant)
- Concrete, normal, at plant [CH]: 31.9 m3; lognormal SD95 1.2165
  (same comment as for Epoxy resin, liquid, at plant)
- Synthetic rubber, at plant [RER]: 24.5 kg; lognormal SD95 1.2165
  (same comment as for Epoxy resin, liquid, at plant)
- Steel, converter, unalloyed, at plant [RER]: 301.68 kg; lognormal SD95 1.2165
  (same comment as for Epoxy resin, liquid, at plant)
- Paper, wood-containing, LWC, at regional storage [CH]: 450 kg; lognormal SD95 1.2165
  (same comment as for Epoxy resin, liquid, at plant)
- Disposal, concrete, 5% water, to construction waste landfill [CH]: 70180 kg; lognormal SD95 1.3034
  (4,2,2,2,1,5,BU:1.05); Estimation; 100% disposed
- Transport, freight, rail [RER]: 4726.5 tkm; lognormal SD95 2.0969
  (4,2,2,2,1,5,BU:2); Estimation; calculation ecoinvent report nr 1
- Excavation, hydraulic digger, average [CH]: 48.661 m3; lognormal SD95 1.2437
  (2,2,3,2,1,5,BU:1.05); Literature data; VSE 1993
- Light fuel oil, at regional storage [RER]: 518.93 kg; lognormal SD95 1.2165
  (same comment as for Epoxy resin, liquid, at plant)
- Transport, freight, lorry, fleet average [RER]: 2902.1 tkm; lognormal SD95 2.0969
  (4,2,2,2,1,5,BU:2); Estimation; calculation ecoinvent report nr 1
- Aluminium, production mix, at plant [RER]: 69.889 kg; lognormal SD95 1.2165
  (same comment as for Epoxy resin, liquid, at plant)
- Polyvinylchloride, at regional storage [RER]: 1000 kg; lognormal SD95 1.2165
  (same comment as for Epoxy resin, liquid, at plant)
- Disposal, polyvinylchloride, 0.2% water, to municipal incineration [CH]: 1000 kg; lognormal SD95 1.3034
  (4,2,2,2,1,5,BU:1.05); Estimation; 100% disposed
- Sulphur hexafluoride, liquid, at plant [RER]: 0.19938 kg; lognormal SD95 1.2165
  (same comment as for Epoxy resin, liquid, at plant)
- Gravel, unspecified, at mine [CH]: 53325 kg; lognormal SD95 1.2165
  (same comment as for Epoxy resin, liquid, at plant)
- Building, multi-storey [RER]: 4.9749 m3; lognormal SD95 3.0928
  (4,2,2,2,1,5,BU:3); Estimation; own calculation

## Inputs from nature
- Transformation, from annual crop [resources, land]: 1.4069 m2; lognormal SD95 1.3434
  (2,4,3,2,1,5,BU:1.2); Literature data; VSE 1988, own calculation
- Transformation, from forest, unspecified [resources, land]: 1.1225 m2; lognormal SD95 2.0771
  (2,4,3,2,1,5,BU:2); Literature data; VSE 1988, own calculation
- Occupation, industrial area, built up [resources, land]: 101.18 m2a; lognormal SD95 1.5955
  (2,4,3,2,1,5,BU:1.5); Literature data; VSE 1988, own calculation
- Transformation, to industrial area, built up [resources, land]: 2.5294 m2; lognormal SD95 2.0771
  (2,4,3,2,1,5,BU:2); Literature data; VSE 1988, own calculation

## Emissions to nature
- Sulfur hexafluoride [emissions to air, unspecified]: 0.0039877 kg; lognormal SD95 1.5007
  (1,2,1,1,1,1,BU:1.5); Literature data; FOEN 2009, greenhouse gas statistics

## Sampling procedure
Literature

## Sources
- Frischknecht R., Itten R., Flury K., 2012, 2012 - GHG emis. from Swiss elec. mixes - Frischknecht, Project reports, 401, ESU-services Ltd., Uster, CH
Itten, R., Frischknecht, R. (2012) Life Cycle Inventories of electricity mixes. Project reports. Volume: 401. ESU-services Ltd.. Uster, CH.
Type: Separate publication
First author: Itten, R.
Other authors: Frischknecht, R.
Year: 2012
Title of anthology: Project reports
Place of publication: Uster, CH
Publisher: ESU-services Ltd.
Volume No: 401

## Validation
Proof reading validation: 09.12.2013; Other validation: \\Server\E\ESU-Docs\Projektablage\401 Update Strommix v3.0\EcoSpold\Stromnetz\[401-calculations-electricity-grid-CH-v2.3.xlsx]X-Process;
