# Passenger bus, compressed gas, 18m articulated urban bus, 2010, EURO-V

Dataset: EcoSpold 1, unit process
Functional unit: 1 p
Category: transport systems / road\Transformation\Infrastructure
Geography: CH
Time period: 2010-01 to 2010-12
Generated by: Romain Sacchi
accessRestrictedTo: 0
copyright: False

## General comment
Combustion engine power: 264 [kW]. Power share from combustion engine: 100 [%]. Km over lifetime: 700000 [km]. Yearly mileage: 50000 [km/year]. Daily distance driven: 315 [km]. Daily operating time: 12 [hours]. Tank-to-wheel efficiency: 24 [%]. Tank-to-wheel energy consumption: 18080 [kj/km]. Fuel tank capacity: 1585 [kWh]. Maximum passenger capacity: 150 [unit]. Number of passengers onboard: 19 [unit]. Curb mass (excl. driver and cargo): 16361 [kg]. Driving mass (incl. driver and cargo): 18109 [kg]..

## Time period
EURO-V emissions standards apply to bus registrations from 2008-01 until 2012-12. Vehicle lightweighting factors match manufacture year of 2010

## Reference product
- Passenger bus, compressed gas, 18m articulated urban bus, 2010, EURO-V [CH]: 1 p

## Inputs from technosphere
All rows: lognormal SD95 1.09366
- Assembly operation, for lorry [RER]: 16361 kg
  Uncertainty from pedigree matrix: (2, 3, 2, 1, 1, 3)
- Gearbox, for lorry [RER]: 207 kg
  Uncertainty from pedigree matrix: (2, 3, 2, 1, 1, 3)
- Maintenance, bus [CH]: 1.47 p
  Uncertainty from pedigree matrix: (2, 3, 2, 1, 1, 3)
- Transmission, for lorry [RER]: 299 kg
  Uncertainty from pedigree matrix: (2, 3, 2, 1, 1, 3)
- Suspension, for lorry [RER]: 2550 kg
  Uncertainty from pedigree matrix: (2, 3, 2, 1, 1, 3)
- Power electronics, for lorry [RER]: 264 kg
  Uncertainty from pedigree matrix: (2, 3, 2, 1, 1, 3)
- Other components, for hybrid electric lorry [RER]: 1460 kg
  Uncertainty from pedigree matrix: (2, 3, 2, 1, 1, 3)
- Fuel tank, compressed natural gas, 200 bar [RER]: 232 kg
  Uncertainty from pedigree matrix: (2, 3, 2, 1, 1, 3)
- Retarder, for lorry [RER]: 69 kg
  Uncertainty from pedigree matrix: (2, 3, 2, 1, 1, 3)
- Exhaust system, for lorry [RER]: 142 kg
  Uncertainty from pedigree matrix: (2, 3, 2, 1, 1, 3)
- Glider lightweighting [GLO]: 0.905 kg
  Uncertainty from pedigree matrix: (2, 3, 2, 1, 1, 3)
- Frame, blanks and saddle, for lorry [RER]: 9050 kg
  Uncertainty from pedigree matrix: (2, 3, 2, 1, 1, 3)
- Internal combustion engine, for lorry [RER]: 975 kg
  Uncertainty from pedigree matrix: (2, 3, 2, 1, 1, 3)
- Tires and wheels, for lorry [RER]: 832 kg
  Uncertainty from pedigree matrix: (2, 3, 2, 1, 1, 3)
- Disposal, bus [CH]: 1.47 p
  Uncertainty from pedigree matrix: (2, 3, 2, 1, 1, 3)

## Sources
- Sacchi R., Bauer C., 2023, 2023 - LCI on-road vehicles - Sacchi, PSI, Villigen, CH
doi: 10.5281/ZENODO.5156043
