# xx Hay extensive, at farm

Dataset: EcoSpold 1, unit process
Functional unit: 1 kg
Category: material, obsolete / agricultural, obsolete\plant production, obsolete
Geography: CH
Time period: 2000-01 to 2000-12
Production volume: 85985 ha extensive meadows in Switzerland 2004
Share of production covered: 43 %
Generated by: Thomas Nemecek
accessRestrictedTo: 0
copyright: true

## General comment
Refers to 1 kg dry matter of field-dried hay from extensive production. The net dry matter yield is 9863 kg/ha.;

## Included processes
The inventories include the cultivation of hay on a permanent meadow. Included steps the harvest, the transport to the farm and the storage in the barn during 12 months. Drying occurs only on the meadow.

## Geography
Refers to a production in the Swiss plateau (lowlands <700m).

## Technology
Extensive production with drying in the field.

## Reference product
- xx Hay extensive, at farm [CH]: 1 kg
  SWITZERLAND

## Inputs from technosphere
All rows: lognormal SD95 1.0714
- Haying, by rotary tedder [CH]: 0.0012953 ha
  (2,1,1,1,1,na)
- Mowing, by rotary mower [CH]: 0.0003701 ha
  (2,1,1,1,1,na)
- Swath, by rotary windrower [CH]: 0.00074019 ha
  (2,1,1,1,1,na)
- Loading bales [CH]: 0.00625 p
  (2,1,1,1,1,na)
- Baling [CH]: 0.0014375 p
  (2,1,1,1,1,na)
- Dried roughage store, non ventilated, operation [CH]: 1 kg
  (2,1,1,1,1,na)

## Inputs from nature
- Energy, gross calorific value, in biomass [resources, biotic]: 18.9 MJ; lognormal SD95 1.0714
  (2,1,1,1,1,na)
- Carbon dioxide, in air [resources, in air]: 1.65 kg; lognormal SD95 1.0714
  (2,1,1,1,1,na)
- Transformation, to pasture, man made, extensive [resources, land]: 0.074019 m2; lognormal SD95 1.2077
  (2,1,1,1,1,na)
- Occupation, pasture, man made, extensive [resources, land]: 3.701 m2a; lognormal SD95 1.113
  (2,1,1,1,1,na)
- Transformation, from pasture, man made, extensive [resources, land]: 0.074019 m2; lognormal SD95 1.2077
  (2,1,1,1,1,na)

## Emissions to nature
- Phosphate [emissions to water, groundwater]: 6.1245e-5 kg; lognormal SD95 1.5044
  (2,1,1,1,1,na)
- Dinitrogen monoxide [emissions to air, low. pop.]: 0.00011254 kg; lognormal SD95 1.4057
  (2,2,1,1,1,na)
- Phosphorus [emissions to water, river]: 7.293e-5 kg; lognormal SD95 1.5044
  (2,1,1,1,1,na)
- Nitrogen oxides [emissions to air, low. pop.]: 2.3632e-5 kg; lognormal SD95 1.4057
  (2,2,1,1,1,na)
- Nitrate [emissions to water, groundwater]: 0.0023592 kg; lognormal SD95 1.5044
  (2,1,1,1,1,na)
- Phosphate [emissions to water, river]: 0.00015311 kg; lognormal SD95 1.5044
  (2,1,1,1,1,na)

## Sampling procedure
Data were compiled from statistics, fertilising recommendations, documents from extension services and expert knowledge.

## Sources
- Nemecek T., Kaegi T., 2007, 2007 - LCI agricultural prod. systems - Nemecek, Ecoinvent report version 2.0, 15, Swiss Centre for LCI, ART, Duebendorf and Zuerich, CH
Nemecek, T., Kägi, T., Blaser, S. (2007) Life Cycle Inventories of Agricultural Production Systems. Ecoinvent report version 2.0. Editors: 0. Volume: 15. Swiss Centre for LCI, ART. Duebendorf and Zurich, CH.
Type: Measurement on site
Source: CD-ROM
First author: Nemecek, T.
Other authors: Kägi, T., Blaser, S.
Year: 2007
Name of editors: 0
Title of anthology: Ecoinvent report version 2.0
Place of publication: Duebendorf and Zurich, CH
Publisher: Swiss Centre for LCI, ART
Volume No: 15

## Validation
Proof reading validation: passed; Other validation: none;
