# CEM III, A cement, GGBFS with burdens, at plant

Dataset: EcoSpold 1, unit process
Functional unit: 1 kg
Category: construction materials / binder
Geography: CH
Time period: 2015-01 to 2015-12
Generated by: Laura Tschuemperlin
accessRestrictedTo: 0
copyright: true

## General comment
The dataset describes the production of cement (CEM III-A) in Switzerland .
Technology: Industry data. Data approximates average swiss production
Time period: Time of publications.
Version: 1

Local category: Mineralische Baustoffe
Local subcategory: Bindemittel

## Included processes
From cradle, i.e. including all upstream activities. As source of gypsum, waste gypsum from flue gas treatment is assumed. The burdens for the production of ground granulated blast furnace slag (GGBFS) are accounted for (economic allocation).

## Time period
Time of publications.

## Reference product
- CEM III, A cement, GGBFS with burdens, at plant [CH]: 1 kg
  SWITZERLAND

## Inputs from technosphere
- Steel, low-alloyed, at plant [RER]: 0.00011 kg; lognormal SD95 1.2152
  (2,1,1,1,1,5,BU:1.05); ; ; Boesch et al. (2010)
- Ground granulated blast furnace slag, with burdens, at plant [RER]: 0.505 kg; lognormal SD95 1.3059
  (1,3,3,3,1,1,BU:1.05); ; ; Boesch et al. (2010)
- Transport, freight, rail [RER]: 0.3034 tkm; lognormal SD95 2.0511
  (2,1,1,1,1,5,BU:2); ;
- Gypsum, mineral, at mine [CH]: 0.0247 kg; lognormal SD95 1.3001
  (4,5,na,na,na,na,BU:1.05); ; ; Boesch et al. (2010)
- Cement plant [CH]: 5.36e-11 p; lognormal SD95 3
  (1,1,1,1,1,1,BU:3); ; ; Boesch et al. (2010)
- Clinker, at plant [CH]: 0.4703 kg; lognormal SD95 1.3059
  (2,1,1,1,3,5,BU:1.05); ; ; Boesch et al. (2010)
- Heavy fuel oil, burned in industrial furnace 1MW, non-modulating [RER]: 0.1616 MJ; lognormal SD95 1.2152
  (2,1,1,1,1,5,BU:1.05); ; ; Boesch et al. (2010)
- Electricity, medium voltage, at grid [CH]: 0.0497 kWh; lognormal SD95 1.3059
  (2,1,1,1,3,5,BU:1.05); ; ; Boesch et al. (2010)
- Transport, freight, lorry, 16t-32t gross weight, fleet average [CH]: 0.025777 tkm; lognormal SD95 2.0511
  (2,1,1,1,1,5,BU:2); ;
- Ethylene glycol, at plant [RER]: 0.00055 kg; lognormal SD95 1.1267
  (1,3,3,3,1,1,BU:1.05); ; ; Boesch et al. (2010)

## Emissions to nature
- Heat, waste [emissions to air, unspecified]: 0.179 MJ; lognormal SD95 1.2152
  (2,1,1,1,1,5,BU:1.05); ; ; Boesch et al. (2010)

## Sampling procedure
Data from the association of the swiss cement industry (cemsuisse) representing average production in Switzerland

## Sources
- Boesch M., Hellweg S., 2010, Identifying improvements for the cement production, Project report, 44, AVENY, Zuerich, CH
Boesch, Michael, Hellweg, S. (2010) Identifying improvements for the cement production. Project report. Volume: 44. AVENY. Zurich, CH.
Type: Separate publication
Source: Article
First author: Boesch, Michael
Other authors: Hellweg, S.
Year: 2010
Title of anthology: Project report
Place of publication: Zurich, CH
Publisher: AVENY
Volume No: 44

## Validation
Proof reading validation: 06.05.2021; Other validation: G:\Projektablage\551 CEM IIIA Beton und Fertigbetonteile\EcoSpold\[551-Zement-Klinker_v0.13_UVEK2021.xlsx]X-Process;
