# Transport, district heat, large area network, for warm water

Dataset: EcoSpold 1, unit process, infrastructure
Functional unit: 1 MJ
Category: energy supply, kbob recommendation / district heat, delivered
Geography: CH
Time period: 2000-01 to 2000-12
Generated by: Roland Steiner
accessRestrictedTo: 0
copyright: true

## General comment
The lifetime of the network is assumed to be 30 years. Typical heat loss is between 5 and 10% (not including heat exchanger at the consumer side).;

## Included processes
The construction and operation of the district heating network. It is based on pipes of different diameters with concrete jacket pipes. The production of the heat is not part of this system.

## Technology
average technology

## Reference product
- Transport, district heat, large area network, for warm water [CH]: 1 MJ

## Inputs from technosphere
All rows: lognormal SD95 1
- Electricity, medium voltage, at grid [CH]: 0.0055556 kWh
- Excavation, skid-steer loader [RER]: 2e-6 m3
- Concrete, normal, at plant [CH]: 2.7273e-7 m3
- Transport, freight, lorry, 16t-32t gross weight, fleet average [CH]: 2e-5 tkm
- Reinforcing steel, at plant [RER]: 6e-5 kg
- Wire drawing, steel [RER]: 6e-5 kg
- Glass wool mat, at plant [CH]: 3e-6 kg
- Transport, freight, rail, electricity with shunting [CH]: 4e-5 tkm
- Disposal, polyurethane, 0.2% water, to municipal incineration [CH]: 1.2e-6 kg
- Polyurethane, rigid foam, at plant [RER]: 2e-6 kg
- Polyethylene, HDPE, granulate, at plant [RER]: 8e-6 kg
- Extrusion, plastic pipes [RER]: 8e-6 kg
- Disposal, inert waste, 5% water, to construction waste landfill [CH]: 0.00062 kg

## Sources
- Jungbluth N., Chudacoff M., Dauriat A., Dinkel F., Doka G., Faist Emmenegger M., Gnansounou E., Kljun N., Spielmann M., Stettler C., Sutter J., 2007, 2007 - LCI bioenergy - Jungbluth, Final report ecoinvent data v2.0, 17, Swiss Centre for LCI, ESU-services Ltd., Duebendorf and Uster, CH
Jungbluth N., Chudacoff M., Dauriat A., Dinkel F., Doka G., Faist Emmenegger M., Gnansounou E., Kljun N., Spielmann M., Stettler C., Sutter J. (2007) Life Cycle Inventories of Bioenergy. Final report ecoinvent data v2.0. Volume: 17. Swiss Centre for LCI, ESU. Duebendorf and Uster, CH.
Type: Measurement on site
Source: CD-ROM
First author: Jungbluth N.
Other authors: Chudacoff M., Dauriat A., Dinkel F., Doka G., Faist Emmenegger M., Gnansounou E., Kljun N., Spielmann M., Stettler C., Sutter J.
Year: 2007
Title of anthology: Final report ecoinvent data v2.0
Place of publication: Duebendorf and Uster, CH
Publisher: Swiss Centre for LCI, ESU
Volume No: 17

## Validation
Proof reading validation: automatic validation in Excel; Other validation: none;
