# Electricity, at 100MW wind farm, onshore, 4.5 MW turbines

Dataset: EcoSpold 1, unit process
Functional unit: 1 kWh
Category: electricity by fuel / wind
Geography: RER
Time period: 2024 to 2024
Synonyms: 0
Share of production covered: 100 %
Generated by: Alena Frehner
accessRestrictedTo: 0
copyright: true

## Included processes
Electricity from wind farm, fed to grid. Includes the operation of the wind farm with the necessary change of gear oil.
100MW wind farm, consisting of 22 onshore wind turbines Vestas V163-4.5MW (Martinez Aguado & Garrett, 2025).
Model is based on the capacity factor of 23.5%, representing the average capacity factor of onshore wind farms in Europe between 2016-2024 (source: ENTSO-E).
Assumed lifetime is 25 years. Annual electricity production is 204 GWh, applying a capacity factor of 23.5%.

## Reference product
- Electricity, at 100MW wind farm, onshore, 4.5 MW turbines [RER]: 1 kWh

## Inputs from technosphere
- Wind turbine 4.5MW, onshore, moving parts [RER]: 4.315e-9 unit; lognormal SD95 3
  (2,2,1,1,1,1,BU:3); Own calculation; number of wind turbines divided by total electricity production over a life cycle of 25 years with an annual electricity production of 204 GWh, calculated as 22/(25 × 204 GWh)
- Wind turbine 4.5MW, onshore, tower [RER]: 4.315e-9 unit; lognormal SD95 3
  (same comment as for Wind turbine 4.5MW, onshore, moving parts)
- Wind turbine 4.5MW, onshore, foundation [RER]: 4.315e-9 unit; lognormal SD95 3
  (same comment as for Wind turbine 4.5MW, onshore, moving parts)
- Array and export cables, 33kV/110kV, onshore wind farm [RER]: 8.2377e-9 km; lognormal SD95 3
  (2,4,1,1,1,5,BU:3); Own calculation; total length of array and export cables of 42 km divided by total electricity production over a life cycle of 25 years with an annual electricity production of 204 GWh; calculated as 42 km / (25 × 204 GWh)
- Substation, 200MW onshore wind farm [RER]: 9.6797e-11 unit; lognormal SD95 3
  (4,4,2,2,1,5,BU:3); Own calculation; 1p divided by total electricity production over a life cycle of 25 years with an annual electricity production of 204 GWh; land-based substation of 200MW onshore wind farm used as proxy, scaled with the factor 100/200 according to the installed power capactiies of the wind farms; calculated as (100/200) / (25 × 204 GWh).
- Road [CH]: 2.4584e-5 my; lognormal SD95 3
  (2,3,3,2,1,5,BU:3); Own estimation for access road based on Eberle et al. (2019)
- Lubricating oil, at plant [RER]: 1.9587e-5 kg; lognormal SD95 1.05
  (2,5,5,2,1,5,BU:1.05); Own calculation, assuming exchange of lubrication oil every two years
- Transport, freight, lorry, 3.5t gross weight, fleet average [RER]: 1.9587e-6 tkm; lognormal SD95 2
  (2,5,5,2,1,5,BU:2); Own calculation, based on a transport distance of 100 km per oil change
- Disposal, used mineral oil, 10% water, to hazardous waste incineration [CH]: 1.9587e-5 kg; lognormal SD95 1.05
  (2,5,5,2,1,5,BU:1.05); Own calculation; assuming that 100% of the lubricating oil is disposed of after use.

## Inputs from nature
- Energy, kinetic (in wind), converted [resources, in air]: 3.87 MJ; lognormal SD95 1.05
  (4,1,1,1,1,1,BU:1.05);

## Emissions to nature
- Sulfur hexafluoride [emissions to air, low. pop.]: 1.7664e-9 kg; lognormal SD95 1.5
  (4,5,1,2,1,5,BU:1.5); Estimated SF6 emissions due to 5% leackage over entire life cycle of wind farm

## Sources
- Kroehnert H., Frehner A., Stucki M., 2025, 2025 - LCI wind Energy - Kroehnert, Project report, 0, ZHAW, Waedenswil, CH

## Validation
22.07.2025
"S:\pools\n\N-IUNR-FG-LCA\Projekte\Wind LCA\LCI-Update\Sachbilanz"
