# Disposal, lead smelter slag, 0% water, to residual material landfill

Dataset: EcoSpold 1, unit process
Functional unit: 1 kg
Category: landfill / residual material landfill
Geography: GLO
Time period: 1995-01 to 2003-12
Generated by: Gabor Doka
accessRestrictedTo: 0
copyright: true

## General comment
Inventoried waste contains 100% lead smelter slag; . waste composition (wet, in ppm): H2O n.a.; O 595070; H n.a.; C n.a.; S 27000; N n.a.; P 1580; B n.a.; Cl n.a.; Br n.a.; F n.a.; I n.a.; Ag 52; As 998.71; Ba 1810; Cd 14; Co 123; Cr 150; Cu 1303.8; Hg n.a.; Mn 54300; Mo 57; Ni 87; Pb 12497; Sb 123; Se n.a.; Sn n.a.; V 69; Zn 21755; Be n.a.; Sc 7; Sr 1283; Ti 1690; Tl n.a.; W n.a.; Si 280030; Fe n.a.; Ca n.a.; Al n.a.; K n.a.; Mg n.a.; Na n.a.; Share of carbon in waste that is biogenic 0%. ;;

## Included processes
Waste-specific short-term emissions to water from leachate. Long-term emissions from landfill to ground water.

## Geography
Technology encountered in Switzerland in 2000. Landfill includes base seal and leachate collection system.

## Technology
Swiss residual material landfill for polluted, inorganic waste. With base seal and leachate collection system. Recultivation after closure.

## Time period
Waste composition as given in literature reference. Transfer coefficients from prospective model.

## Reference product
- Disposal, lead smelter slag, 0% water, to residual material landfill [GLO]: 1 kg
  Global

## Inputs from technosphere
- Residual material landfill facility [CH]: 2.0833e-9 p; lognormal SD95 1
  demands per kilogram waste. uncertainty is heeded in the module
- Process-specific burdens, residual material landfill [CH]: 1 kg; lognormal SD95 1
  demands per kilogram waste. uncertainty is heeded in the module

## Emissions to nature
- Cadmium [emissions to water, river]: 1.5867e-10 kg; lognormal SD95 23.131
  uncertainty is calculated from uncertainties in waste composition and transfer coefficients in residual landfill
- Nickel [emissions to water, groundwater, long-term]: 3.1497e-5 kg; lognormal SD95 9.2611
  uncertainty is calculated from uncertainties in waste composition and transfer coefficients in incinerator and landfills.
- Strontium [emissions to water, groundwater, long-term]: 0.00046449 kg; lognormal SD95 6.5507
  (same comment as for Nickel)
- Vanadium [emissions to water, groundwater, long-term]: 5.3034e-5 kg; lognormal SD95 7.6024
  (same comment as for Nickel)
- Cobalt [emissions to water, river]: 3.5106e-8 kg; lognormal SD95 14.109
  (same comment as for Cadmium)
- Copper [emissions to water, groundwater, long-term]: 5.0191e-5 kg; lognormal SD95 37.325
  (same comment as for Nickel)
- Manganese [emissions to water, river]: 7.488e-7 kg; lognormal SD95 10.631
  (same comment as for Cadmium)
- Barium [emissions to water, groundwater, long-term]: 1.4951e-5 kg; lognormal SD95 153.33
  (same comment as for Nickel)
- Barium [emissions to water, river]: 2.496e-8 kg; lognormal SD95 14.614
  (same comment as for Cadmium)
- Strontium [emissions to water, river]: 7.7545e-7 kg; lognormal SD95 10.158
  (same comment as for Cadmium)
- Silver [emissions to water, groundwater, long-term]: 2.0017e-6 kg; lognormal SD95 46.892
  (same comment as for Nickel)
- Zinc [emissions to water, groundwater, long-term]: 0.00026663 kg; lognormal SD95 92.374
  (same comment as for Nickel)
- Titanium [emissions to water, groundwater, long-term]: 0.00050168 kg; lognormal SD95 7.0837
  (same comment as for Nickel)
- Cadmium [emissions to water, groundwater, long-term]: 9.5044e-8 kg; lognormal SD95 235.24
  (same comment as for Nickel)
- Chromium VI [emissions to water, groundwater, long-term]: 2.8483e-5 kg; lognormal SD95 6.7721
  (same comment as for Nickel)
- Vanadium [emissions to water, river]: 1.6934e-7 kg; lognormal SD95 12.052
  (same comment as for Cadmium)
- Lead [emissions to water, river]: 1.0822e-7 kg; lognormal SD95 12.748
  (same comment as for Cadmium)
- Molybdenum [emissions to water, river]: 5.6738e-5 kg; lognormal SD95 7.664
  (same comment as for Cadmium)
- Nickel [emissions to water, river]: 5.2583e-8 kg; lognormal SD95 13.557
  (same comment as for Cadmium)
- Silver [emissions to water, river]: 3.3418e-9 kg; lognormal SD95 17.686
  (same comment as for Cadmium)
- Silicon [emissions to water, groundwater, long-term]: 0.2794 kg; lognormal SD95 1.5137
  (same comment as for Nickel)
- Antimony [emissions to water, river]: 4.3377e-5 kg; lognormal SD95 7.1257
  (same comment as for Cadmium)
- Antimony [emissions to water, groundwater, long-term]: 7.9623e-5 kg; lognormal SD95 6.9515
  (same comment as for Nickel)
- Molybdenum [emissions to water, groundwater, long-term]: 2.6169e-7 kg; lognormal SD95 7.8418
  (same comment as for Nickel)
- Titanium [emissions to water, river]: 8.3753e-7 kg; lognormal SD95 10.074
  (same comment as for Cadmium)
- Lead [emissions to water, groundwater, long-term]: 6.4824e-5 kg; lognormal SD95 219.12
  (same comment as for Nickel)
- Manganese [emissions to water, groundwater, long-term]: 0.00044853 kg; lognormal SD95 130.38
  (same comment as for Nickel)
- Phosphate [emissions to water, river]: 1.8069e-6 kg; lognormal SD95 10.479
  (same comment as for Cadmium)
- Arsenic [emissions to water, river]: 0.00099871 kg; lognormal SD95 5.0636
  (same comment as for Cadmium)
- Scandium [emissions to water, river]: 9.879e-7 kg; lognormal SD95 10.715
  (same comment as for Cadmium)
- Phosphate [emissions to water, groundwater, long-term]: 0.0010823 kg; lognormal SD95 8.6145
  (same comment as for Nickel)
- Silicon [emissions to water, river]: 0.00062978 kg; lognormal SD95 4.6572
  (same comment as for Cadmium)
- Copper [emissions to water, river]: 8.3791e-8 kg; lognormal SD95 12.924
  (same comment as for Cadmium)
- Sulfate [emissions to water, groundwater, long-term]: 0.07231 kg; lognormal SD95 2.7389
  (same comment as for Nickel)
- Scandium [emissions to water, groundwater, long-term]: 6.0121e-6 kg; lognormal SD95 9.9203
  (same comment as for Nickel)
- Zinc [emissions to water, river]: 4.4512e-7 kg; lognormal SD95 11.046
  (same comment as for Cadmium)
- Chromium VI [emissions to water, river]: 9.0169e-6 kg; lognormal SD95 7.9597
  (same comment as for Cadmium)
- Sulfate [emissions to water, river]: 0.0086904 kg; lognormal SD95 3.3591
  (same comment as for Cadmium)
- Arsenic [emissions to water, groundwater, long-term]: 9.9871e-13 kg; lognormal SD95 5.212
  (same comment as for Nickel)
- Cobalt [emissions to water, groundwater, long-term]: 2.1028e-5 kg; lognormal SD95 13.718
  (same comment as for Nickel)

## Sampling procedure
Landfill model based on observed leachate concentrations in literature. Extrapolated to 60'000 years heeding chemical characteristics. Initial waste composition from various literature sources.

## Uncertainty adjustments
uncertainty of waste input composition data derived from generic formula GSD(c) = N*ln(c)+1. Minimal long-term emissions are the emissions until the carbonate buffer in the landfill is used up. Mean long-term emissions are the emissions until the next glacial period occurs (in 60'000a) and the landfill is eroded. Maximal long-term emissions are the complete emissions of all landfilled material (except Cr).

## Sources
- Doka G., 2009, 2009 - LCI waste treatment services - Doka, Final report ecoinvent data v2.1, 13, Swiss Centre for LCI, Doka LCA, Duebendorf and St. Gallen, CH
Doka G. (2008) Life Cycle Inventories of Waste Treatment Services. Final report ecoinvent data v2.1. Volume: 13. Issue: 0. Swiss Centre for LCI, Empa - TSL. Dübendorf, CH.
Type: Measurement on site
Source: CD-ROM
First author: Doka G.
Year: 2008
Title of anthology: Final report ecoinvent data v2.1
Place of publication: Dübendorf, CH
Publisher: Swiss Centre for LCI, Empa - TSL
Volume No: 13
Issue No: 0

## Validation
Proof reading validation: passed; Other validation: none;
