# Mobile cable yarder, trailer-mounted, at plant

Dataset: EcoSpold 1, unit process
Functional unit: 1 p
Category: wood / wooden materials\new processes\other material
Geography: RER
Time period: 2000-01 to 2016-12
Generated by: default
accessRestrictedTo: 0
copyright: true

## Reference product
- Mobile cable yarder, trailer-mounted, at plant [RER]: 1 p

## Inputs from technosphere
- Lead, at regional storage [RER]: 81 kg; lognormal SD95 1.19252
  Pedigree: (3,4,3,1,1).
- Road vehicle plant [RER]: 8.73e-7 p; lognormal SD95 2.18105
  Pedigree: (4,5,3,3,4).
- Aluminium alloy, AlMg3, at plant [RER]: 543 kg; lognormal SD95 1.02869
  Pedigree: (1,1,2,1,1).
- Steel, low-alloyed, at plant [RER]: 11400, 1390 kg (2 entries); lognormal SD95 1.01424
  Pedigree: (1,1,2,1,1).
- Wire drawing, steel [RER]: 5220 kg; lognormal SD95 1.19252
  Pedigree: (3,4,3,1,1).
- Water, completely softened, at plant [RER]: 17 kg; lognormal SD95 1.19252
  Pedigree: (3,4,3,1,1).
- Treatment, sewage, to wastewater treatment, class 3 [CH]: 28.2 m3; lognormal SD95 4.89753
  Pedigree: (1,1,2,1,1).
- Polypropylene, granulate, at plant [RER]: 543 kg; lognormal SD95 1.02869
  Pedigree: (1,1,2,1,1).
- Tap water, at user [RER]: 28200 kg; lognormal SD95 1.01424
  Pedigree: (1,1,2,1,1).
- Zinc coating, coils [RER]: 247 m2; lognormal SD95 1.19252
  Pedigree: (3,4,3,1,1).
- Treatment, lorry production effluent, to wastewater treatment, class 1 [CH]: 3.75 m3; lognormal SD95 2.19651
  Pedigree: (1,1,2,1,1).
- Chromium steel 18/8, at plant [RER]: 14 kg; lognormal SD95 1.02869
  Pedigree: (1,1,2,1,1).
- Oxygen, liquid, at plant [RER]: 2.58, 9.42 kg (2 entries); lognormal SD95 1.4749
  Pedigree: (3,4,3,1,5).
- Electricity, medium voltage, production ENTSO-E, at grid: 29300 kWh; lognormal SD95 1.01424
  Pedigree: (1,1,2,1,1).
- Injection moulding [RER]: 543 kg; lognormal SD95 1.48163
  Pedigree: (1,1,2,1,1).
- Synthetic rubber, at plant [RER]: 279 kg; lognormal SD95 1.19252
  Pedigree: (3,4,3,1,1).
- Heat, natural gas, at boiler condensing modulating >100kW [RER]: 58400 MJ; lognormal SD95 1.01424
  Pedigree: (1,1,2,1,1).
- Cast iron, at plant [RER]: 4800 kg; lognormal SD95 1.19252
  Pedigree: (3,4,3,1,1).
- Iron scrap, at plant [RER]: 12800 kg; lognormal SD95 1.01424
  Pedigree: (1,1,2,1,1).
- Transport, freight, lorry, fleet average [RER]: 5940 tkm; lognormal SD95 1.5103
  Pedigree: (1,1,4,5,4).
- Disposal, rubber, unspecified, 0% water, to municipal incineration [CH]: 279 kg
- Transport, freight, rail [RER]: 1350 tkm; lognormal SD95 1.5103
  Pedigree: (1,1,4,5,4).
- Acetylene, at regional storehouse [CH]: 5 kg; lognormal SD95 1.4749
  Pedigree: (3,4,3,1,5).
- Electronics for control units [RER]: 49 kg; lognormal SD95 1.19252
  Pedigree: (3,4,3,1,1).
- Disposal, electronics for control units [RER]: 49 kg
- Copper, primary, at refinery [GLO]: 49 kg; lognormal SD95 1.19252
  Pedigree: (3,4,3,1,1).
- Wire drawing, copper [RER]: 49 kg; lognormal SD95 1.01426
  Pedigree: (1,1,2,1,1).
- Disposal, polypropylene, 15.9% water, to municipal incineration [CH]: 646 kg
- Powder coating, steel [RER]: 195 m2; lognormal SD95 1.02869
  Pedigree: (1,1,2,1,1).

## Emissions to nature
- Carbon dioxide, fossil [emissions to air, low. pop.]: 16.9 kg; lognormal SD95 1.25755
  Pedigree: (1,1,2,1,1).

## Sources
- Werner F., 2017, 2017 - LCI wood and wood based products - Werner, Project Report, 0, Environment & Development, Zuerich, CH
