# Spare batteries, for tablet, at plant

Dataset: EcoSpold 1, unit process
Functional unit: 1 p
Category: electronics / devices
Geography: GLO
Time period: 2023-01 to 2029-12
Synonyms: Tablette; Ersatzakku
Generated by: Lugas Raka Adrianto, Maulana Permana Ajie, Didier Beloin-Saint-Pierre
accessRestrictedTo: 0
copyright: false

## General comment
The data set represents the production of tablet spare Li-ion battery;

## Included processes
The dataset comprises the lithium ion battery, adjusted to the mass of average tablets (0.5 kg).

## Geography
Data for global average battery for tablet

## Technology
Typical rechargeable Li-ion battery for portable devices

## Reference product
- Spare batteries, for tablet, at plant [GLO]: 1 p

## Inputs from technosphere
- Battery, Li-ion, NMC111, rechargeable, prismatic [GLO]: 0.135 kg; lognormal SD95 1.35
  (3,3,3,4,3,5,BU:1.05); The same amount as average batter mass in tablets. Literature: Hischer et al 2015

## Sampling procedure
Literature & own estimations

## Sources
- Raka Adrianto L., Permana Ajie M., Beloin-Saint-Pierre D., 2024, 2024 - LCI ICT sector - Raka Adrianto, Empa, St. Gallen, CH

## Validation
Proof reading validation: Passed, Other validation: none, Validator: Mischa Zschokke, Company: Carbotech, Country: CH
