# Disposal, ventilation system, Bürohaus Fribourg, special components

Dataset: EcoSpold 1, unit process
Functional unit: 1 p
Category: waste management / building demolition
Geography: CH
Time period: 2014-01 to 2014-12
Generated by: Alex Primas
accessRestrictedTo: 0
copyright: true

## General comment
Disposal of special components of a ventilation system for an office building with offices, common rooms, kitchen, restaurant, auditorium and car park. The inventory is based on a building with a total heated gross floor area of 10161 m2 and a total nominal air flow of 54400 m3/h, total weight of the components: 3611 kg/Unit, building with a specific air flow rate of 5.4 m3/h per m2 heated gross floor area. Data from call of bid including stainless steel exhaust air hood for commercial kitchen and approximation für decentral fan coil units for conference rooms and offices. No ducts included.;

## Included processes
Transport to dismantling facilities, machines for handling in sorting plant, electricity demand for sorting plant, final disposal of waste material. Cut-off to recycling for metals.

## Geography
Specific to the technology mix encountered in sorting plants in Switzerland.

## Technology
Disposal to a sorting plant assumed. Metal pieces, copper in cables and electronic devices are recycled, plastic parts are incinerated, inert wastes (e.g. rock wool) are landfilled.

## Time period
Amount of material investigated in 2013. Disposal technology mix as used in late 1990ies

## Reference product
- Disposal, ventilation system, Bürohaus Fribourg, special components [CH]: 1 p
  SWITZERLAND

## Inputs from technosphere
- Disposal, ventilation equipment, KWLC 1200 [CH]: 1 p; lognormal SD95 1.34
  (3,4,1,1,3,5); Data related to production process
- Disposal, building, bulk iron (excluding reinforcement), to sorting plant [CH]: 300 kg; lognormal SD95 1.26
  (3,4,1,1,1,5); Data related to production process
- Disposal, ventilation equipment, KWL 250 [CH]: 69 p; lognormal SD95 1.34
  (3,4,1,1,3,5); Data related to production process

## Sampling procedure
Waste-specific calculation based on production input data

## Sources
- Klingler M., Kasser U., Savi D., Primas A., Stettler Y., Gujer P., 2014, 2014 - LCA ventilation and heating systems - Klingler, Schlussbericht, BFE, Buero fuer Umweltchemie, B&H AG, Zuerich, CH
Klingler M., Kasser U., Savi D., Primas A., Stettler Y., Gujer P. (2014) Ökobilanzdaten für Lüftungs- und Wärmeanlagen. Schlussbericht, BFE. Bundesamt für Energie (BFE). Bern.
Type: Separate publication
Source: Report
First author: Klingler M.
Other authors: Kasser U., Savi D., Primas A., Stettler Y., Gujer P.
Year: 2014
Title of anthology: Schlussbericht, BFE
Place of publication: Bern
Publisher: Bundesamt für Energie (BFE)
