# Disposal, electric storage heater, per kg

Dataset: EcoSpold 1, unit process
Functional unit: 1 kg
Category: heat pumps / disposal
Geography: CH
Generated by: default
accessRestrictedTo: 0
copyright: true

## Included processes
Only end of life waste treatment included.

## Reference product
- Disposal, electric storage heater, per kg [CH]: 1 kg
  SWITZERLAND

## Inputs from technosphere
- Disposal, electric storage heater, 5kW [CH]: 0.00625 p

## Sources
- Kaegi T., Waldburger L., Kern C., Roberts G., Zschokke M., Conte F., Weber L., 2021, 2021 - LCI heating systems - Kaegi, Carbotech im Auftrag des BAFU, Carbotech AG, Zuerich, CH
Kägi Thomas, Livia Waldburger, Cyril Kern, Gavin Roberts, Mischa Zschokke, Flora Conte, Lea Weber (2020) LCI of heating systems. Carbotech im Auftrag des BAFU. Carbotech AG. Zürich. CH.
Type: Separate publication
Source: Report
First author: Kägi Thomas
Other authors: Livia Waldburger, Cyril Kern, Gavin Roberts, Mischa Zschokke, Flora Conte, Lea Weber
Year: 2020
Title of anthology: Carbotech im Auftrag des BAFU
Place of publication: Zürich. CH
Publisher: Carbotech AG
