# Electricity, medium voltage, consumer, according to BFE 2005, at grid

Dataset: EcoSpold 1, unit process
Functional unit: 1 kWh
Category: energy supply, kbob recommendation / electricity, delivered via network
Geography: CH
Time period: 2004-01 to 2004-12
Production volume: production volume on low voltage level: 51'000GWh
Share of production covered: 100 %
Generated by: Matthias Tuchschmid
accessRestrictedTo: 0
copyright: true

## General comment
This dataset describes the transformation from high to medium voltage as well as the transmission of electricity at medium voltage.;

## Included processes
Included are the electricity production in Abbreviation, the transmission network and direct SF6-emissions to air. Electricity losses during medium-voltage transmission and transformation from high-voltage are accounted for.

## Geography
Data apply to public and self producers. Geographical classification according to IEA. Assumptions for transmission network, losses and emissions are based on Swiss data.

## Technology
Average technology used to transmit and distribute electricity. Includes underground and overhead lines, as well as air-, vacuum- and SF6-insulated high-to-medium voltage switching stations. Electricity production according to related datasets

## Time period
Time of publications.

## Reference product
- Electricity, medium voltage, consumer, according to BFE 2005, at grid [CH]: 1 kWh

## Inputs from technosphere
- Electricity, high voltage, consumer, according to BFE 2005, at grid [CH]: 1.0098 kWh; lognormal SD95 1.2355
  (3,1,1,1,3,1); specific losses of network estimated based on statistics
- Sulphur hexafluoride, liquid, at plant [RER]: 4.9104e-8 kg; lognormal SD95 1.078
  (1,1,2,1,1,3); based on emission data
- Transmission network, electricity, medium voltage [CH]: 1.8628e-8 km; lognormal SD95 3.1614
  (3,1,4,5,3,5); based on consumption statistics

## Emissions to nature
- Heat, waste [emissions to air, unspecified]: 0.019417 MJ; lognormal SD95 1.3221
  (4,1,3,1,1,5); estimations based on losses
- Heat, waste [emissions to soil, unspecified]: 0.015887 MJ; lognormal SD95 1.3221
  (4,1,3,1,1,5); estimations based on losses
- Sulfur hexafluoride [emissions to air, unspecified]: 4.9104e-8 kg; lognormal SD95 1.506
  (1,1,2,1,1,3); national statistics

## Sampling procedure
statistics

## Extrapolations
unknown electricity is modeled with UCTE-electricity mix

## Sources
- Frischknecht R., Tuchschmid M., Faist-Emmenegger M., Bauer C., Dones R., 2007, 2007 - Electricy mix and grid - Frischknecht, Project reports, 173, Swiss Centre for LCI, ESU-services Ltd., PSI, Duebendorf and Uster, CH
Jungbluth N., Tuchschmid M., Frischknecht R. (2007) Life Cycle Inventories. Project reports. Volume: 173. ESU-services Ltd.. Uster, CH.

## Validation
Proof reading validation: automatic validation in Excel; Other validation: none;
