# Toner, black, powder, at plant

Dataset: EcoSpold 1, unit process
Functional unit: 1 kg
Category: electronics / devices
Geography: GLO
Time period: 2023-01 to 2029-12
Synonyms: Pigment; Pigments
Generated by: Lugas Raka Adrianto, Maulana Permana Ajie, Didier Beloin-Saint-Pierre
accessRestrictedTo: 0
copyright: false

## General comment
The dataset represents the production of a black toner powder with the composition 5% Carbon Black, 18% Magnetite, 70% Binder Resin, the rest being organic and inorganic additives. It is designed for the use in black toner cartridges. An update in 2023 was done to regionalize energy and material input in the inventory;

## Included processes
Includes the raw materials, their transportation and the energy use in the production. Infrastructure is included in the dataset of resin production. No process emissions considered.

## Geography
Global Electricity mix and material processing data for supplier outside Europe.

## Technology
Production by conventional pulverisation of styrene butadiene copolymer that is produced by emulsion polymerisation.

## Reference product
- Toner, black, powder, at plant [GLO]: 1 kg
  Global

## Inputs from technosphere
- Carbon black, at plant [GLO]: 0.05 kg; lognormal SD95 1.31
  (2,3,4,2,1,5,BU:1.05)
- Chemicals inorganic, at plant [GLO]: 0.045 kg; lognormal SD95 1.31
  (2,3,4,2,1,5,BU:1.05)
- Chemicals organic, at plant [GLO]: 0.03 kg; lognormal SD95 1.31
  (2,3,4,2,1,5,BU:1.05)
- Electricity, medium voltage, production GLO, at grid [GLO]: 4.888 kWh; lognormal SD95 1.31
  (2,3,4,2,1,5,BU:1.05)
- Latex, at plant [RER]: 0.7 kg; lognormal SD95 1.31
  (2,3,4,2,1,5,BU:1.05)
- Magnetite, at plant [GLO]: 0.175 kg; lognormal SD95 1.31
  (2,3,4,2,1,5,BU:1.05)
- Transport, freight, rail [RER]: 0.2 tkm; lognormal SD95 2.1
  (2,3,4,2,1,5,BU:2.00)
- Transport, freight, lorry, fleet average [RER]: 0.1 tkm; lognormal SD95 2.1
  (2,3,4,2,1,5,BU:2.00)

## Emissions to nature
- Heat, waste [emissions to air, high. pop.]: 22 MJ; lognormal SD95 1.63
  (2,3,4,2,1,5,BU:1.50)

## Sampling procedure
Literature

## Extrapolations
see Geography and Technology

## Uncertainty adjustments
The chosen conventional technology might prove outdated and chemically produced toner less energy intensive. Due to proprietary nature and considerable bandwith of different formulations, high uncertainty assumed.

## Sources
- Raka Adrianto L., Permana Ajie M., Beloin-Saint-Pierre D., 2024, 2024 - LCI ICT sector - Raka Adrianto, Empa, St. Gallen, CH

## Validation
Proof reading validation: Passed, Other validation: none, Validator: Mischa Zschokke, Company: Carbotech, Country: CH
