# Crude oil, market mix, at long distance transport

Dataset: EcoSpold 1, unit process
Functional unit: 1 kg
Category: oil / transport
Geography: AE
Time period: 2023 to 2025
Production volume: 13 million tons of directly imported crude oil to AE region in 2023.
Generated by: Maresa Bussa
accessRestrictedTo: 0
copyright: true

## General comment
Calculation for transport distances assuming transport by pipeline offshore and onshore as well as sea transport in tanker. Sites and modes of transportation based on the supply situation in 2023.

## Included processes
Transportation of crude oil from exploration sites to refineries in AE-region. Includes transport service requirements and emissions from oil handling and evaporation.

## Geography
Calculations include production and transport of crude oil from 24 countries.

## Technology
Operation of crude oil pipelines by electricity.

## Time period
Transport modes investigated for 2023.

## Reference product
- Crude oil, market mix, at long distance transport [AE]: 1 kg

## Inputs from technosphere
- Crude oil, at production [AE]: 0.40802 kg; lognormal SD95 1.209
  (1,1,1,3,3,BU:1.05); In 2023, 0 megatons of crude oil are imported from United Arab Emirates to United Arab Emirates, and 5.32 megatons are consumed or refined locally, assuming 44% offshore production. Assumed transport distances: Offshore, at origin: 100km by pipeline. Onshore, at origin: 100km by pipeline. For transport to destination: 0km by ship plus additional 0km by onshore pipeline at destination. Port of origin for shipping is assumed to be Dubai or Abu Dhabi .
- Crude oil, at production [AO]: 0.0026734 kg; lognormal SD95 1.209
  (1,1,1,3,3,BU:1.05); In 2023, 0.035 megatons of crude oil are imported from Angola to United Arab Emirates, assuming 30% offshore production. Assumed transport distances: Offshore, at origin: 100km by pipeline. Onshore, at origin: 100km by pipeline. For transport to destination: 11751km by ship plus additional 100km by onshore pipeline at destination. Port of origin for shipping is assumed to be 0.
- Crude oil, at production [AR]: 0.01033 kg; lognormal SD95 1.209
  (1,1,1,3,3,BU:1.05); In 2023, 0.135 megatons of crude oil are imported from Argentina to United Arab Emirates, assuming 30% offshore production. Assumed transport distances: Offshore, at origin: 100km by pipeline. Onshore, at origin: 500km by pipeline. For transport to destination: 15581km by ship plus additional 100km by onshore pipeline at destination. Port of origin for shipping is assumed to be Buenos Aires.
- Crude oil, at production [AU]: 0.0064193 kg; lognormal SD95 1.209
  (1,1,1,3,3,BU:1.05); In 2023, 0.084 megatons of crude oil are imported from Australia to United Arab Emirates, assuming 75% offshore production. Assumed transport distances: Offshore, at origin: 268km by pipeline. Onshore, at origin: 800km by pipeline. For transport to destination: 9356km by ship plus additional 100km by onshore pipeline at destination. Port of origin for shipping is assumed to be Perth.
- Crude oil, at production [AZ]: 0.014912 kg; lognormal SD95 1.209
  (1,1,1,3,3,BU:1.05); In 2023, 0.194 megatons of crude oil are imported from Azerbaijan to United Arab Emirates, assuming 90% offshore production. Assumed transport distances: Offshore, at origin: 43km by pipeline. Onshore, at origin: 1800km by pipeline. For transport to destination: 6163km by ship plus additional 100km by onshore pipeline at destination. Port of origin for shipping is assumed to be Ceyhan (Mersin).
- Crude oil, at production [BR]: 0.037031 kg; lognormal SD95 1.209
  (1,1,1,3,3,BU:1.05); In 2023, 0.483 megatons of crude oil are imported from Brazil to United Arab Emirates, assuming 96.7% offshore production. Assumed transport distances: Offshore, at origin: 140km by pipeline. Onshore, at origin: 800km by pipeline. For transport to destination: 15162km by ship plus additional 100km by onshore pipeline at destination. Port of origin for shipping is assumed to be Santos.
- Crude oil, at production [CO]: 0.0082525 kg; lognormal SD95 1.209
  (1,1,1,3,3,BU:1.05); In 2023, 0.108 megatons of crude oil are imported from Colombia to United Arab Emirates, assuming 12.5% offshore production. Assumed transport distances: Offshore, at origin: 100km by pipeline. Onshore, at origin: 800km by pipeline. For transport to destination: 17876km by ship plus additional 100km by onshore pipeline at destination. Port of origin for shipping is assumed to be Tumaco.
- Crude oil, at production [DZ]: 0.01558 kg; lognormal SD95 1.209
  (1,1,1,3,3,BU:1.05); In 2023, 0.203 megatons of crude oil are imported from Algeria to United Arab Emirates, assuming 0% offshore production. Assumed transport distances: Offshore, at origin: 100km by pipeline. Onshore, at origin: 700km by pipeline. For transport to destination: 8138km by ship plus additional 100km by onshore pipeline at destination. Port of origin for shipping is assumed to be Algiers.
- Crude oil, at production [EC]: 0.0051352 kg; lognormal SD95 1.209
  (1,1,1,3,3,BU:1.05); In 2023, 0.067 megatons of crude oil are imported from Ecuador to United Arab Emirates, assuming 2.4% offshore production. Assumed transport distances: Offshore, at origin: 100km by pipeline. Onshore, at origin: 300km by pipeline. For transport to destination: 18201km by ship plus additional 100km by onshore pipeline at destination. Port of origin for shipping is assumed to be Guayaquil.
- Crude oil, at production [EG]: 0.0076947 kg; lognormal SD95 1.209
  (1,1,1,3,3,BU:1.05); In 2023, 0.1 megatons of crude oil are imported from Egypt to United Arab Emirates, assuming 22% offshore production. Assumed transport distances: Offshore, at origin: 100km by pipeline. Onshore, at origin: 100km by pipeline. For transport to destination: 5643km by ship plus additional 100km by onshore pipeline at destination. Port of origin for shipping is assumed to be Alexandria.
- Crude oil, at production [IQ]: 0.006973 kg; lognormal SD95 1.2077
  (1,1,1,1,3,BU:1.05); In 2023, 0.091 megatons of crude oil are imported from Iraq to United Arab Emirates, assuming 0% offshore production. Assumed transport distances: Offshore, at origin: 0km by pipeline. Onshore, at origin: 500km by pipeline. For transport to destination: 809km by ship plus additional 100km by onshore pipeline at destination. Port of origin for shipping is assumed to be Basrah.
- Crude oil, at production [IR]: 0.057766 kg; lognormal SD95 1.209
  (1,1,1,3,3,BU:1.05); In 2023, 0.753 megatons of crude oil are imported from Iran to United Arab Emirates, assuming 15.8% offshore production. Assumed transport distances: Offshore, at origin: 100km by pipeline. Onshore, at origin: 400km by pipeline. For transport to destination: 759km by ship plus additional 100km by onshore pipeline at destination. Port of origin for shipping is assumed to be Bahregan Sar Oilfield.
- Crude oil, at production [KZ]: 0.041527 kg; lognormal SD95 1.2077
  (1,1,1,1,3,BU:1.05); In 2023, 0.541 megatons of crude oil are imported from Kazakhstan to United Arab Emirates, assuming 12.7% offshore production. Assumed transport distances: Offshore, at origin: 100km by pipeline. Onshore, at origin: 3400km by pipeline. For transport to destination: 7747km by ship plus additional 100km by onshore pipeline at destination. Port of origin for shipping is assumed to be Novorossiysk.
- Crude oil, at production [LY]: 0.015407 kg; lognormal SD95 1.209
  (1,1,1,3,3,BU:1.05); In 2023, 0.201 megatons of crude oil are imported from Libya to United Arab Emirates, assuming 20% offshore production. Assumed transport distances: Offshore, at origin: 100km by pipeline. Onshore, at origin: 200km by pipeline. For transport to destination: 10397km by ship plus additional 100km by onshore pipeline at destination. Port of origin for shipping is assumed to be Sirtica Terminal.
- Crude oil, at production [NG]: 0.0035421 kg; lognormal SD95 1.209
  (1,1,1,3,3,BU:1.05); In 2023, 0.046 megatons of crude oil are imported from Nigeria to United Arab Emirates, assuming 90% offshore production. Assumed transport distances: Offshore, at origin: 60km by pipeline. Onshore, at origin: 140km by pipeline. For transport to destination: 13670km by ship plus additional 100km by onshore pipeline at destination. Port of origin for shipping is assumed to be Lagos.
- Crude oil, at production [OM]: 0.013633 kg; lognormal SD95 1.2077
  (1,1,1,1,3,BU:1.05); In 2023, 0.178 megatons of crude oil are imported from Oman to United Arab Emirates, assuming 0% offshore production. Assumed transport distances: Offshore, at origin: 100km by pipeline. Onshore, at origin: 100km by pipeline. For transport to destination: 559km by ship plus additional 100km by onshore pipeline at destination. Port of origin for shipping is assumed to be Muscat.
- Crude oil, at production [PE]: 0.001038 kg; lognormal SD95 1.2077
  (1,1,1,1,3,BU:1.05); In 2023, 0.014 megatons of crude oil are imported from Peru to United Arab Emirates, assuming 10% offshore production. Assumed transport distances: Offshore, at origin: 100km by pipeline. Onshore, at origin: 100km by pipeline. For transport to destination: 24754km by ship plus additional 100km by onshore pipeline at destination. Port of origin for shipping is assumed to be Callao.
- Crude oil, at production [QA]: 0.019978 kg; lognormal SD95 1.209
  (1,1,1,3,3,BU:1.05); In 2023, 0.26 megatons of crude oil are imported from Qatar to United Arab Emirates, assuming 69.3% offshore production. Assumed transport distances: Offshore, at origin: 50km by pipeline. Onshore, at origin: 100km by pipeline. For transport to destination: 233km by ship plus additional 100km by onshore pipeline at destination. Port of origin for shipping is assumed to be Halul Island.
- Crude oil, at production [SA]: 0.30678 kg; lognormal SD95 1.2077
  (1,1,1,1,3,BU:1.05); In 2023, 4 megatons of crude oil are imported from Saudi Arabia to United Arab Emirates, assuming 34.6% offshore production. Assumed transport distances: Offshore, at origin: 100km by pipeline. Onshore, at origin: 1300km by pipeline. For transport to destination: 489km by ship plus additional 100km by onshore pipeline at destination. Port of origin for shipping is assumed to be Ju' aimah.
- Crude oil, at production [TM]: 0.0045284 kg; lognormal SD95 1.2077
  (1,1,1,1,3,BU:1.05); In 2023, 0.059 megatons of crude oil are imported from Turkmenistan to United Arab Emirates, assuming 25.6% offshore production. Assumed transport distances: Offshore, at origin: 200km by pipeline. Onshore, at origin: 2700km by pipeline. For transport to destination: 6463km by ship plus additional 100km by onshore pipeline at destination. Port of origin for shipping is assumed to be Ceyhan (plus shipping Turkmenbashi to BAKU).
- Crude oil, at production [TT]: 0.00067017 kg; lognormal SD95 1.2077
  (1,1,1,1,3,BU:1.05); In 2023, 0.009 megatons of crude oil are imported from Trinidad and Tobago to United Arab Emirates, assuming 30% offshore production. Assumed transport distances: Offshore, at origin: 100km by pipeline. Onshore, at origin: 100km by pipeline. For transport to destination: 15214km by ship plus additional 100km by onshore pipeline at destination. Port of origin for shipping is assumed to be Port of Spain.
- Crude oil, at production [US]: 0.0026725 kg; lognormal SD95 1.2077
  (1,1,1,1,3,BU:1.05); In 2023, 0.035 megatons of crude oil are imported from United States to United Arab Emirates, assuming 14.6% offshore production. Assumed transport distances: Offshore, at origin: 286km by pipeline. Onshore, at origin: 1100km by pipeline. For transport to destination: 17701km by ship plus additional 100km by onshore pipeline at destination. Port of origin for shipping is assumed to be Houston.
- Crude oil, at production [UZ]: 0.00097019 kg; lognormal SD95 1.209
  (1,1,1,3,3,BU:1.05); In 2023, 0.013 megatons of crude oil are imported from Uzbekistan to United Arab Emirates, assuming 0% offshore production. Assumed transport distances: Offshore, at origin: 100km by pipeline. Onshore, at origin: 2600km by pipeline. For transport to destination: 6463km by ship plus additional 100km by onshore pipeline at destination. Port of origin for shipping is assumed to be Ceyhan (plus shipping Turkmenbashi to BAKU).
- Crude oil, at production [VE]: 0.0088149 kg; lognormal SD95 1.209
  (1,1,1,3,3,BU:1.05); In 2023, 0.115 megatons of crude oil are imported from Venezuela to United Arab Emirates, assuming 30% offshore production. Assumed transport distances: Offshore, at origin: 100km by pipeline. Onshore, at origin: 100km by pipeline. For transport to destination: 15648km by ship plus additional 100km by onshore pipeline at destination. Port of origin for shipping is assumed to be Puerto La Cruz / Jose Petroterminal.
- Transport, transoceanic tanker [OCE]: 0.16615 tkm; lognormal SD95 2.0618
  (3,2,1,3,3,BU:2); Calculation based on estimated shipping route and pipelines according to searates.com and export data for 2023.
- Transport, crude oil pipeline, offshore [OCE]: 0.043678 tkm; lognormal SD95 1.2377
  (3,2,1,3,3,BU:1.05); Calculation based on estimated shipping route and pipelines according to searates.com and export data for 2023.
- Transport, crude oil pipeline, onshore [RER]: 0.088606 tkm; lognormal SD95 1.2377
  (same comment as for Transport, crude oil pipeline, offshore)

## Emissions to nature
- Hydrocarbons, aliphatic, alkanes, unspecified [emissions to air, low. pop.]: 1.35e-6 kg; lognormal SD95 1.5913
  (3,4,4,1,1,BU:1.5); Evaporation losses for storage and handling
- Benzene [emissions to air, low. pop.]: 4.5e-7 kg; lognormal SD95 3.0703
  (3,4,4,1,1,BU:3); Evaporation losses for storage and handling
- Butane [emissions to air, low. pop.]: 0.00012642 kg; lognormal SD95 1.5913
  (3,4,4,1,1,BU:1.5); Evaporation losses for storage and handling
- Methane, fossil [emissions to air, low. pop.]: 1.498e-6 kg; lognormal SD95 1.5913
  (3,4,4,1,1,BU:1.5); Evaporation losses for storage and handling
- Ethane [emissions to air, low. pop.]: 1.601e-6 kg; lognormal SD95 1.5913
  (3,4,4,1,1,BU:1.5); Evaporation losses for storage and handling
- Hexane [emissions to air, low. pop.]: 5.3876e-5 kg; lognormal SD95 1.5913
  (3,4,4,1,1,BU:1.5); Evaporation losses for storage and handling
- Pentane [emissions to air, low. pop.]: 9.558e-5 kg; lognormal SD95 1.5913
  (3,4,4,1,1,BU:1.5); Evaporation losses for storage and handling
- Propane [emissions to air, low. pop.]: 6.1296e-5 kg; lognormal SD95 1.5913
  (3,4,4,1,1,BU:1.5); Evaporation losses for storage and handling
- Toluene [emissions to air, low. pop.]: 2.7e-7 kg; lognormal SD95 1.5913
  (3,4,4,1,1,BU:1.5); Evaporation losses for storage and handling

## Sampling procedure
Literature. Online calculators for distances. The consumption mix is calculated based on international trade statistics for 2023.

## Sources
- Meili C., Jungbluth N., Bussa M., Stefanel A., 2025, 2025 - LCI long-distance transport crude oil - Meili, Project report, 565, ESU-services Ltd., Schaffhausen, CH

## Validation
Passed.
https://esuservices-my.sharepoint.com/personal/jungbluth_esu-services_ch/Documents/ESU-intern/565 Beratung BAFU/EcoSpoldDataXML/[EcoSpold-oil-transport-2025-v1.0.xlsb]X-Process
