# Disposal, digester sludge, to municipal incineration

Dataset: EcoSpold 1, unit process
Functional unit: 1 kg
Category: waste management / municipal incineration
Geography: CH
Time period: 2000-01 to 2000-12
Generated by: Gabor Doka
accessRestrictedTo: 0
copyright: true

## General comment
This dataset represents the activity of waste disposal of digester sludge in a municipal solid waste incinerator (MSWI) Recommended use of this dataset: for incineration of fermented (digested) sewage sludge from treatment of average municipal wastewater Waste composition (wet, in ppm): upper heating value 4.256 MJ/kg; lower heating value 2.42 MJ/kg; H2O 730020; O 51114; H 11617; C 92935; S 6170.5; N 5783.4; P 8623.3; B n.a.; Cl n.a.; Br n.a.; F n.a.; I n.a.; Ag n.a.; As 0.77875; Ba n.a.; Cd 0.55416; Co 3.1946; Cr 24.155; Cu 111.19; Hg 0.55416; Mn 104.66; Mo 1.8907; Ni 10.399; Pb 30.805; Sb n.a.; Se n.a.; Sn 7.9298; V n.a.; Zn 302.93; Be n.a.; Sc n.a.; Sr n.a.; Ti n.a.; Tl n.a.; W n.a.; Si 11783; Fe 53210; Ca 19995; Al 5906.7; K n.a.; Mg 2244.8; Na n.a.; Share of carbon in waste that is biogenic 100%. Share of metals in waste not oxidised and bulk-recyclable (exclude very small or thin parts) Iron: 0%; Alu: 0%; Copper: 0%. One kg of this waste produces 0.188 kg of slag and 0.02373 kg of residues, which are landfilled. Additional solidification with 0.009494 kg of cement. Net energy production: 0.16MJ/kg electric energy and 0.52MJ/kg thermal energy. Recovery of metal scrap to recycling: 0g iron scrap, 0g aluminium scrap, 0g copper scrap.;;

## Included processes
Waste incineration from waste reception gate further downstream (excluding transport to the MSWI plant). Waste-specific air and water emisions from incineration, auxiliary material consumption for flue gas cleaning. Short-term emissions to river water and long-term emisisons to ground water from slag compartment (from bottom ash) and residual material landfill (from solidified fly ashes and scrubber slugde). Waste-specific process energy demands for MSWI and net energy generation.

## Geography
Specific to the technology mix encountered in Switzerland in 2010. Well applicable to modern incineration practices in Europe, North America or Japan.

## Technology
average Swiss MSWI plants in 2010 (grate incinerators) with electrostatic precipitator for fly ash (ESP), wet flue gas scrubber and 25% SNCR , 42.77% SCR-high dust , 32.68% SCR-low dust -DeNOx facilities and 0% without Denox (weighted according to mass of burnt waste, representing Swiss average). Efficiency of iron scrap separation from slag : 58%. Efficiency of non-ferrous scrap separation from slag : 31%. Gross electric efficiency technology mix 15.84% and Gross thermal efficiency technology mix 28.51%

## Time period
Waste composition as given in literature reference, theoretical data or other source. Transfer coefficients for modern MSWI.

## Reference product
- Disposal, digester sludge, to municipal incineration [CH]: 1 kg
  SWITZERLAND

## Inputs from technosphere
- Quicklime, milled, packed, at plant [CH]: 0.00010371 kg; lognormal SD95 3.0964
  auxilliary inputs for the flue gas treatment stage of the incinerator plant. uncertainty calculated from uncertainty in average CaO input, of transfer coefficients in the incinerator, and the uncertainty of the waste composition of this waste
- Ammonia, liquid, at regional storehouse [CH]: 0.00075173 kg; lognormal SD95 7.35
  Input to DeNOx stage (100% NH3). uncertainty calculated from uncertainty in average DeNOx input, uncertainty in the share of thermal NOx, uncertainty of nitrogen content in average municipal waste and the uncertainty in nitrogen content in *this* waste.
- Chemicals inorganic, at plant [GLO]: 6.3202e-5 kg; lognormal SD95 1.8958
  auxilliary inputs for the wastewater treatment stage of the incinerator plant. Proxy for Polyelectrolyte. uncertainty calculated from uncertainty in average Polyelectrolyte input, of transfer coefficients in the incinerator, and the uncertainty of the waste composition of this waste
- Residual material landfill facility [CH]: 4.9447e-11 p; lognormal SD95 1.4938
  landfill infrastructure required for landfilling of incineration residues. uncertainty is calculated from uncertainties in waste composition and transfer coefficients in incinerator
- Process-specific burdens, slag compartment [CH]: 0.18784 kg; lognormal SD95 1.5196
  mass-specific expenditures required for landfilling of bottom ash. uncertainty is calculated from uncertainties in waste composition and transfer coefficients in incinerator
- Disposal, cement, hydrated, 0% water, to residual material landfill [CH]: 0.023734 kg; lognormal SD95 1.5594
  Hydrated cement output for solidification of landfilled residual material. Uncertainty calculated from uncertainty of the waste composition of this waste and transfer coefficients in the incinerator and of the solidification recipe.
- Cement, unspecified, at plant [CH]: 0.0094938 kg; lognormal SD95 1.5594
  Cement required for solidification of landfilled residual material. Uncertainty calculated from uncertainty of the waste composition of this waste, of transfer coefficients in the incinerator and of the solidification recipe.
- Transport, freight, lorry, 16t-32t gross weight, fleet average [CH]: 0.010633 tkm; lognormal SD95 1.363
  Transport services to transport incineration residues to landfills and to transport auxilliary inputs of the incinerator plant. uncertainty calculated from uncertainty in average auxiliary material input, the uncertainty of the waste composition of this waste and the uncertainty in generic transportation distances
- Hydrochloric acid, 30% in H2O, at plant [RER]: 1.6612e-5 kg; lognormal SD95 1.8958
  auxilliary inputs for the wastewater treatment stage of the incinerator plant. uncertainty calculated from uncertainty in average HCl input, of transfer coefficients in the incinerator, and the uncertainty of the waste composition of this waste
- Water, decarbonised, at plant [RER]: 0.40298 kg; lognormal SD95 3.4855
  Incinerator process water used in flue gas scrubber stage. uncertainty calculated from uncertainty in average water input, and the uncertainty of the waste composition of this waste
- Natural gas, burned in industrial furnace 1MW [CH]: 0.14057 MJ; lognormal SD95 7.35
  Input to DeNOx stage, to heat up flue gas in low-dust SCR. uncertainty calculated from uncertainty in average DeNOx input, uncertainty in the share of thermal NOx, uncertainty of nitrogen content in average municipal waste and the uncertainty in nitrogen content in *this* waste.
- Sodium hydroxide, 50% in H2O, production mix, at plant [RER]: 0.0021525 kg; lognormal SD95 2.6602
  auxilliary inputs for the flue gas treatment stage of the incinerator plant. uncertainty calculated from uncertainty in average NaOH input, of transfer coefficients in the incinerator, and the uncertainty of the waste composition of this waste
- Iron (III) chloride, 40% in H2O, at plant [CH]: 8.3004e-6 kg; lognormal SD95 3.4855
  auxilliary inputs for the wastewater treatment stage of the incinerator plant. uncertainty calculated from uncertainty in average FeCl3 input, of transfer coefficients in the incinerator, and the uncertainty of the waste composition of this waste
- Chromium oxide, flakes, at plant [RER]: 9.6118e-7 kg; lognormal SD95 10.66
  Input to DeNOx stage. uncertainty calculated from uncertainty in average DeNOx input, uncertainty in the share of thermal NOx, uncertainty of nitrogen content in average municipal waste and the uncertainty in nitrogen content in *this* waste.
- Transport, freight, rail [RER]: 0.0074703 tkm; lognormal SD95 1.5198
  (same comment as for Transport, freight, lorry, 16t-32t gross weight, fleet average)
- Chemicals organic, at plant [GLO]: 9.3188e-6 kg; lognormal SD95 12.754
  auxilliary inputs for the wastewater treatment stage of the incinerator plant. Proxy for (pure) Trisodium-trimercapto-s-triazine (CAS 17766-26-6), used as 15% diluted solution, aka TMT15. uncertainty calculated from uncertainty in average TMT15 input, of transfer coefficients in the incinerator, and the uncertainty of the waste composition of this waste
- Process-specific burdens, residual material landfill [CH]: 0.023734 kg; lognormal SD95 1.4938
  mass-specific expenditures required for landfilling of incineration residues. uncertainty is calculated from uncertainties in waste composition and transfer coefficients in incinerator
- Municipal waste incineration plant [CH]: 2.5e-10 p; lognormal SD95 1
  demands per kilogram waste. uncertainty is heeded in the module
- Slag compartment [CH]: 3.3394e-10 p; lognormal SD95 1.5196
  landfill infrastructure required for landfilling of bottom ash. uncertainty is calculated from uncertainties in waste composition and transfer coefficients in incinerator
- Titanium dioxide, production mix, at plant [RER]: 4.7098e-5 kg; lognormal SD95 10.66
  Input to DeNOx stage (TiO2 catalyst carrier) uncertainty calculated from uncertainty in average DeNOx input, uncertainty in the share of thermal NOx, uncertainty of nitrogen content in average municipal waste and the uncertainty in nitrogen content in *this* waste.

## Emissions to nature
- Methane, biogenic [emissions to air, high. pop.]: 6.4562e-7 kg; lognormal SD95 1.7141
  Incomplete combustion product emitted to air. uncertainty calculated from uncertainty in average operation emissions, and the uncertainty of the flue gas volume from this waste.
- Magnesium [emissions to air, high. pop.]: 2.3678e-6 kg; lognormal SD95 4.5369
  Emission to air from waste composition and transfer coefficients. uncertainty is calculated from uncertainties in waste composition and transfer coefficients in incinerator
- Phosphate [emissions to water, river]: 4.8481e-6 kg; lognormal SD95 3.3054
  Emissions to water from waste composition and transfer coefficients in incinerator and landfills. uncertainty is calculated from uncertainties in waste composition and transfer coefficients in incinerator and landfills
- Lead [emissions to water, groundwater, long-term]: 1.4894e-5 kg; lognormal SD95 62.015
  Long-term emissions from landfilling of incineration residues. uncertainty is calculated from uncertainties in waste composition and transfer coefficients in incinerator and landfills.
- Calcium [emissions to air, high. pop.]: 0.00015736 kg; lognormal SD95 2.9584
  (same comment as for Magnesium)
- Phenol, pentachloro- [emissions to air, high. pop.]: 1.8744e-11 kg; lognormal SD95 1.7141
  (same comment as for Methane, biogenic)
- Iron [emissions to water, river]: 1.3988e-6 kg; lognormal SD95 4.4576
  (same comment as for Phosphate)
- Tin [emissions to air, high. pop.]: 5.1798e-12 kg; lognormal SD95 10.433
  (same comment as for Magnesium)
- Lead [emissions to water, river]: 2.9467e-9 kg; lognormal SD95 6.946
  (same comment as for Phosphate)
- Nickel [emissions to water, river]: 6.9869e-9 kg; lognormal SD95 14.743
  (same comment as for Phosphate)
- Dioxin, 2,3,7,8 Tetrachlorodibenzo-p- [emissions to air, high. pop.]: 8.6076e-14 kg; lognormal SD95 3.4282
  (same comment as for Methane, biogenic)
- TOC, Total Organic Carbon [emissions to water, river]: 4.7476e-5 kg; lognormal SD95 2.1465
  (same comment as for Phosphate)
- Silicon [emissions to water, groundwater, long-term]: 0.0011901 kg; lognormal SD95 87.737
  (same comment as for Lead)
- Cobalt [emissions to water, groundwater, long-term]: 2.6023e-6 kg; lognormal SD95 10.082
  (same comment as for Lead)
- Zinc [emissions to water, river]: 2.7331e-8 kg; lognormal SD95 5.2246
  (same comment as for Phosphate)
- Zinc [emissions to water, groundwater, long-term]: 9.2122e-5 kg; lognormal SD95 30.829
  (same comment as for Lead)
- Chromium [emissions to air, high. pop.]: 2.1092e-8 kg; lognormal SD95 8.7025
  (same comment as for Magnesium)
- Aluminium [emissions to water, groundwater, long-term]: 0.0042715 kg; lognormal SD95 3.477
  (same comment as for Lead)
- Chromium [emissions to water, river]: 1.8756e-9 kg; lognormal SD95 8.8358
  (same comment as for Phosphate)
- Heat, waste [emissions to air, high. pop.]: 3.2043 MJ; lognormal SD95 1.9089
  Waste heat generated from heating value of this waste plus any electricity required to process it. uncertainty is calculated from uncertainties in waste composition and uncertainties in energy efficiency and the uncertainty in internal energy demand
- Sulfate [emissions to water, river]: 0.0031303 kg; lognormal SD95 2.4136
  (same comment as for Phosphate)
- Cadmium [emissions to air, high. pop.]: 2.8246e-10 kg; lognormal SD95 13.25
  (same comment as for Magnesium)
- Toluene [emissions to air, high. pop.]: 8.6082e-8 kg; lognormal SD95 1.7141
  (same comment as for Methane, biogenic)
- Nickel [emissions to air, high. pop.]: 1.3063e-8 kg; lognormal SD95 9.61
  (same comment as for Magnesium)
- Carbon monoxide, biogenic [emissions to air, high. pop.]: 7.3165e-5 kg; lognormal SD95 5.7136
  (same comment as for Methane, biogenic)
- Benzo(a)pyrene [emissions to air, high. pop.]: 9.578e-13 kg; lognormal SD95 3.4282
  (same comment as for Methane, biogenic)
- Calcium [emissions to water, groundwater, long-term]: 0.014893 kg; lognormal SD95 2.8184
  (same comment as for Lead)
- Cyanide [emissions to air, high. pop.]: 1.8532e-5 kg; lognormal SD95 9.0087
  Nitrogen species emitted to air after DeNOx stage. uncertainty calculated from uncertainty in average N-emissions and uncertainty in the share of thermal NOx and the uncertainty in nitrogen content in *this* waste.
- Nitrate [emissions to water, groundwater, long-term]: 0.00020801 kg; lognormal SD95 3.7741
  (same comment as for Lead)
- TOC, Total Organic Carbon [emissions to water, groundwater, long-term]: 0.00027616 kg; lognormal SD95 1.7638
  (same comment as for Lead)
- Aluminium [emissions to air, high. pop.]: 4.8159e-9 kg; lognormal SD95 4.1209
  (same comment as for Magnesium)
- Arsenic [emissions to water, groundwater, long-term]: 2.332e-7 kg; lognormal SD95 12.576
  (same comment as for Lead)
- Nitrate [emissions to water, river]: 7.3724e-5 kg; lognormal SD95 3.0149
  (same comment as for Phosphate)
- Cadmium [emissions to water, groundwater, long-term]: 4.0438e-8 kg; lognormal SD95 206.17
  (same comment as for Lead)
- Magnesium [emissions to water, groundwater, long-term]: 0.001988 kg; lognormal SD95 4.3048
  (same comment as for Lead)
- Benzene, pentachloro- [emissions to air, high. pop.]: 2.274e-10 kg; lognormal SD95 1.7141
  (same comment as for Methane, biogenic)
- Mercury [emissions to water, river]: 6.0184e-10 kg; lognormal SD95 8.6702
  (same comment as for Phosphate)
- Particulates, > 2.5 um, and < 10um [emissions to air, high. pop.]: 2.5823e-8 kg; lognormal SD95 2.2854
  (same comment as for Methane, biogenic)
- Sulfate [emissions to water, groundwater, long-term]: 0.015283 kg; lognormal SD95 2.6121
  (same comment as for Lead)
- Phosphorus [emissions to air, high. pop.]: 8.7633e-6 kg; lognormal SD95 3.5721
  (same comment as for Magnesium)
- Carbon dioxide, biogenic [emissions to air, high. pop.]: 0.33859 kg; lognormal SD95 2.0447
  (same comment as for Magnesium)
- Tin [emissions to water, groundwater, long-term]: 3.0349e-6 kg; lognormal SD95 18.736
  (same comment as for Lead)
- Iron [emissions to air, high. pop.]: 9.536e-8 kg; lognormal SD95 2.6896
  (same comment as for Magnesium)
- Chromium VI [emissions to water, river]: 6.7509e-7 kg; lognormal SD95 9.166
  (same comment as for Phosphate)
- Cobalt [emissions to water, river]: 5.7879e-10 kg; lognormal SD95 13.623
  (same comment as for Phosphate)
- Molybdenum [emissions to water, river]: 5.1638e-7 kg; lognormal SD95 7.6973
  (same comment as for Phosphate)
- Iron [emissions to water, groundwater, long-term]: 0.026844 kg; lognormal SD95 3.36
  (same comment as for Lead)
- Copper [emissions to water, river]: 1.4408e-8 kg; lognormal SD95 6.4266
  (same comment as for Phosphate)
- COD, Chemical Oxygen Demand [emissions to water, groundwater, long-term]: 0.00069791 kg; lognormal SD95 1.7638
  (same comment as for Lead)
- Mercury [emissions to water, groundwater, long-term]: 3.5295e-8 kg; lognormal SD95 35.662
  (same comment as for Lead)
- Magnesium [emissions to water, river]: 1.0474e-5 kg; lognormal SD95 5.547
  (same comment as for Phosphate)
- Sulfur dioxide [emissions to air, high. pop.]: 6.562e-5 kg; lognormal SD95 3.7564
  (same comment as for Magnesium)
- Calcium [emissions to water, river]: 0.00022135 kg; lognormal SD95 2.6844
  (same comment as for Phosphate)
- Molybdenum [emissions to air, high. pop.]: 2.4877e-9 kg; lognormal SD95 11.628
  (same comment as for Magnesium)
- Ammonia [emissions to air, high. pop.]: 8.8384e-7 kg; lognormal SD95 7.8282
  (same comment as for Cyanide)
- Benzene [emissions to air, high. pop.]: 4.3041e-8 kg; lognormal SD95 1.7141
  (same comment as for Methane, biogenic)
- Dinitrogen monoxide [emissions to air, high. pop.]: 8.6258e-5 kg; lognormal SD95 9.0087
  (same comment as for Cyanide)
- Molybdenum [emissions to water, groundwater, long-term]: 1.3718e-6 kg; lognormal SD95 11.439
  (same comment as for Lead)
- Nickel [emissions to water, groundwater, long-term]: 9.9816e-6 kg; lognormal SD95 9.2116
  (same comment as for Lead)
- Manganese [emissions to water, groundwater, long-term]: 6.4567e-5 kg; lognormal SD95 16.301
  (same comment as for Lead)
- Benzene, hexachloro- [emissions to air, high. pop.]: 8.9997e-11 kg; lognormal SD95 1.7141
  (same comment as for Methane, biogenic)
- Zinc [emissions to air, high. pop.]: 2.0305e-7 kg; lognormal SD95 6.25
  (same comment as for Magnesium)
- BOD5, Biological Oxygen Demand [emissions to water, groundwater, long-term]: 0.00022828 kg; lognormal SD95 1.7638
  (same comment as for Lead)
- DOC, Dissolved Organic Carbon [emissions to water, river]: 4.7476e-5 kg; lognormal SD95 2.1465
  (same comment as for Phosphate)
- NMVOC, non-methane volatile organic compounds, unspecified origin [emissions to air, high. pop.]: 1.9588e-6 kg; lognormal SD95 1.7141
  (same comment as for Methane, biogenic)
- Silicon [emissions to water, river]: 2.889e-6 kg; lognormal SD95 4.8354
  (same comment as for Phosphate)
- Particulates, < 2.5 um [emissions to air, high. pop.]: 5.1388e-6 kg; lognormal SD95 3.4282
  (same comment as for Methane, biogenic)
- Cadmium [emissions to water, river]: 5.3114e-11 kg; lognormal SD95 10.33
  (same comment as for Phosphate)
- Tin [emissions to water, river]: 2.0979e-10 kg; lognormal SD95 16.065
  (same comment as for Phosphate)
- Arsenic [emissions to water, river]: 5.3945e-7 kg; lognormal SD95 11.435
  (same comment as for Phosphate)
- DOC, Dissolved Organic Carbon [emissions to water, groundwater, long-term]: 0.00027616 kg; lognormal SD95 1.7638
  (same comment as for Lead)
- Chromium VI [emissions to water, groundwater, long-term]: 2.2158e-6 kg; lognormal SD95 12.711
  (same comment as for Lead)
- Manganese [emissions to air, high. pop.]: 1.9988e-8 kg; lognormal SD95 7.29
  (same comment as for Magnesium)
- Aluminium [emissions to water, river]: 6.3923e-7 kg; lognormal SD95 6.1151
  (same comment as for Phosphate)
- Heat, waste [emissions to water, river]: 1.1174 MJ; lognormal SD95 1.9089
  (same comment as for Heat, waste)
- Lead [emissions to air, high. pop.]: 2.5379e-9 kg; lognormal SD95 8.5849
  (same comment as for Magnesium)
- Silicon [emissions to air, high. pop.]: 1.8353e-8 kg; lognormal SD95 3.61
  (same comment as for Magnesium)
- Copper [emissions to water, groundwater, long-term]: 9.9319e-5 kg; lognormal SD95 6.8849
  (same comment as for Lead)
- Nitrogen oxides [emissions to air, high. pop.]: 0.00027988 kg; lognormal SD95 7.8282
  sum of fuel-Nox and thermal-NOx emitted to air after DeNOx stage. uncertainty calculated from uncertainty in average N-emissions and uncertainty in the share of thermal NOx and the uncertainty in nitrogen content in *this* waste.
- COD, Chemical Oxygen Demand [emissions to water, river]: 0.00010871 kg; lognormal SD95 2.1433
  (same comment as for Phosphate)
- Copper [emissions to air, high. pop.]: 1.0184e-8 kg; lognormal SD95 7.2361
  (same comment as for Magnesium)
- Arsenic [emissions to air, high. pop.]: 6.1002e-9 kg; lognormal SD95 12.674
  (same comment as for Magnesium)
- Cobalt [emissions to air, high. pop.]: 5.8099e-9 kg; lognormal SD95 10.956
  (same comment as for Magnesium)
- Mercury [emissions to air, high. pop.]: 1.5713e-8 kg; lognormal SD95 13.032
  (same comment as for Magnesium)
- Manganese [emissions to water, river]: 1.6291e-8 kg; lognormal SD95 6.1694
  (same comment as for Phosphate)
- BOD5, Biological Oxygen Demand [emissions to water, river]: 0.00010732 kg; lognormal SD95 2.1671
  (same comment as for Phosphate)
- Phosphate [emissions to water, groundwater, long-term]: 0.0011555 kg; lognormal SD95 68.991
  (same comment as for Lead)

## Sampling procedure
fully waste-specific calculation based on literature data for average MSWI operation performance

## Extrapolations
Typical elemental transfer coefficients from current studies for modern MSWI, completed with data from coal power plants and estimates, adapted for inert/burnable waste.

## Uncertainty adjustments
uncertainty of waste input composition data derived from generic formula GSD(c) = N*ln(c)+1

## Sources
- Doka G., 2013, 2013 - Updates LCI waste treatment services - Doka, -, Doka LCA, Zuerich, CH
Doka G. (2013) Updates to Life Cycle Inventories of Waste Treatment Services - part II: waste incineration. Doka LCA. Zurich.
Type: Separate publication
Source: Report to document the 2013 changes to the MSWI incinerator model and datasets (URL: http://www.doka.ch/ecoinventMSWIupdateLCI2013.pdf). To be read with the ecoinvent Nr 13 report (Doka 2009, Life Cycle Inventories of Waste Treatment Services) for ecoinvent v2.2.
First author: Doka G.
Year: 2013
Place of publication: Zurich
Publisher: Doka LCA
Original title: Updates to Life Cycle Inventories of Waste Treatment Services - part II: waste incineration

## Validation
Proof reading validation: Passed.; Other validation: none;
