# Carbon dioxide storage, at hydrogen production plant, pre, pipeline 200km, storage 1000m

Dataset: EcoSpold 1, unit process
Functional unit: 1 kg
Category: chemicals / gases
Geography: CH
Time period: 2024-01 to 2024-01
Generated by: Romain Sacchi
accessRestrictedTo: 0
copyright: true

## General comment
Life cycle assessment of carbon capture and storage in power generation and industry in Europe, Volkart et al., 2013, International Journal of Greenhouse Gas Control

## Reference product
- Carbon dioxide storage, at hydrogen production plant, pre, pipeline 200km, storage 1000m [CH]: 1 kg
  not defined

## Inputs from technosphere
- xx Diethanolamine, at plant [RER]: 3.4e-5 kg; lognormal SD95 1.331
  {2;4;2;3;3;5;1.05;}
- Transport, pipeline, long distance, carbon dioxide, with recompression [CH]: 0.2 tkm; lognormal SD95 3.195
- Transport, freight, rail, electricity with shunting [CH]: 2.04e-5 tkm; lognormal SD95 2.208
  Generic transport distances calculated based on Table 4.2 of the ecoinvent v.2 Methodology report. Distribution: 0.0 kg over 600.0 km.
- Transport, freight, lorry, 16t-32t gross weight, fleet average [CH]: 1.7e-6 tkm; lognormal SD95 2.208
  Generic transport distances calculated based on Table 4.2 of the ecoinvent v.2 Methodology report. Distribution: 0.0 kg over 50.0 km.
- Gas turbine, 10MWe, at production plant [RER]: 2.54e-11 p; lognormal SD95 3.195
- Electricity, medium voltage, at grid [CH]: 0.00948 kWh; lognormal SD95 1.463
- Drilling, deep borehole [CH]: 1.69e-8 m; lognormal SD95 3.195

## Sampling procedure
Sampling procedure: Literature data

## Sources
- Sacchi R., Bauer C., 2024, 2024 - LCA power-to-X in residential sector - Sacchi, Project report, PSI, Villigen, CH

## Validation
Proof reading validation: Passed, Other validation: none, Validator: Rolf Frischknecht, Telephone: 0041 44 940 61 91, E-mail: frischknecht@treeze.ch, Company: treeze, Country: CH
