# Light emitting diode, LED, at plant

Dataset: EcoSpold 1, unit process
Functional unit: 1 kg
Category: electronics / devices
Geography: GLO
Time period: 2023-01 to 2029-12
Generated by: Lugas Raka Adrianto, Maulana Permana Ajie, Didier Beloin-Saint-Pierre
accessRestrictedTo: 0
copyright: false

## General comment
The data represent a typical light emitting diode (LED) for hole-through mounting, used in the information and communication technology. Material data are approximated by using respective information from the dataset “diode, glass-, for through-hole mounting”. Infrastructure and production efforts are based on own assumptions. The dataset represents 1 kg of 5mm LEDs with a weight of 0.35 gram/unit. The dataset was updated in 2023 to reflect global production of the ICT components, i.e., globalized material and energy in the inventory;

## Included processes
This dataset covers raw material input and production efforts for the production of currently used light emitting diodes (LED) for hole-through mounting technology.

## Geography
Data represent a global valuable composition of glass diodes for through-hole mounting technology, used as a first approximation for LEDs.

## Technology
average diode production technology, comprising the diode wafer production (cleaing, masking, etching, doping, oxidising, metal deposition) and the final assembly of the diode (wafer sawing, die bonding, moulding, trimming and forming)

## Reference product
- Light emitting diode, LED, at plant [GLO]: 1 kg
  Global

## Inputs from technosphere
All rows: lognormal SD95 1.65
- Copper, primary, at refinery [GLO]: 0.23514 kg
  (3,4,4,1,4,5,BU:1.04); assumption from conclusion by analogy (using through-hole mounted diodes)
- Epoxy resin, liquid, at plant [RER]: 0.000104 kg
  (same comment as for Copper, primary, at refinery)
- Funnel glass, CRT screen, at plant [GLO]: 0.26146 kg
  (3,4,4,1,4,5,BU:1.04); assumption from conclusion by analogy (using through-hole mounted diodes) ---: funnel glass
- Lead, primary, at plant [GLO]: 0.016328 kg
  (same comment as for Copper, primary, at refinery)
- Molybdenum, at regional storage [RER]: 0.021008 kg
  (same comment as for Copper, primary, at refinery)
- Nickel, 99.5%, at plant [GLO]: 0.003848 kg
  (same comment as for Copper, primary, at refinery)
- Pig iron, at plant [GLO]: 0.45074 kg
  (same comment as for Copper, primary, at refinery)
- Production efforts, diodes [GLO]: 1 kg
  (3,4,4,1,4,5,BU:1.04); rough estimation
- Silicon, electronic grade, at plant [DE]: 0.00468 kg
  (same comment as for Copper, primary, at refinery)
- Tin, at regional storage [RER]: 0.046488 kg
  (same comment as for Copper, primary, at refinery)

## Sampling procedure
literature

## Extrapolations
see Geography & Technology

## Sources
- Raka Adrianto L., Permana Ajie M., Beloin-Saint-Pierre D., 2024, 2024 - LCI ICT sector - Raka Adrianto, Empa, St. Gallen, CH

## Validation
Proof reading validation: Passed, Other validation: none, Validator: Mischa Zschokke, Company: Carbotech, Country: CH
