# Prefabricated driven pile, concrete, rectangular cross-section 300 x 300 mm

Dataset: EcoSpold 1, unit process
Functional unit: 1 m
Category: construction processes / civil engineering
Geography: CH
Time period: 2014-01 to 2014-12
Share of production covered: 0 %
Generated by: René Itten
accessRestrictedTo: 0
copyright: true

## General comment
Typ II: 30/30 rechteckiger Vollquerschnitt, Allgmeine Beschreibung: Abmessungen 30 x 30, L = 8 - 13 m kuppelbar, zul. Nutzlast bis 950 kN, Anwendung mittlere bis grössere Gebäude, Betonbedarf: C40/50 CEM II 360 kg/m3, 0.0872 m3/m‘, Armierung: 3.0571 kg/m‘ Spannstahl, Dieselverbrauch des Rammgerätes: 0.57 l/m‘;

## Included processes
This data set includes the material use of deep foundation.

## Reference product
- Prefabricated driven pile, concrete, rectangular cross-section 300 x 300 mm [CH]: 1 m
  SWITZERLAND

## Inputs from technosphere
- Reinforcing steel, at regional storage [CH]: 3.0571 kg; lognormal SD95 1.165
  (3,3,1,3,1,4,BU:1.05); company data; JMS-Risi, pers. Com. Freddy Hartmann, 16.07.2014
- Transport, freight, lorry, 32t-40t gross weight, fleet average [CH]: 4.2077 tkm; lognormal SD95 2.0301
  (3,3,1,3,1,4,BU:2); 20 km for concrete, 50 km for steel; standard distances ecoinvent v2.2
- Diesel, burned in building machine, average [CH]: 20.493 MJ; lognormal SD95 1.165
  (3,3,1,3,1,4,BU:1.05); company data; JMS-Risi, pers. Com. Freddy Hartmann, 16.07.2014
- Concrete for drilled piles, unspecific, at plant [CH]: 0.0872 m3; lognormal SD95 1.165
  (3,3,1,3,1,4,BU:1.05); company data; JMS-Risi, pers. Com. Freddy Hartmann, 16.07.2014
- Transport, freight, rail, electricity with shunting [CH]: 1.8343 tkm; lognormal SD95 2.0301
  (3,3,1,3,1,4,BU:2); 600 km for steel; standard distances ecoinvent v2.2

## Sources
- Frischknecht R., Itten R., Wyss F., Stolz P., 2014, 2014 - LCA civil eng. works in building const. - Frischknecht, Project report, 489, treeze Ltd., Zuerich, CH
Frischknecht R., Wyss F., Itten R. (2014) Ökobilanzen von Tiefbauarbeiten bei Hochbauten. Project report. Volume: 489. treeze Ltd.. Uster, CH.
Type: Separate publication
Source: Report
First author: Frischknecht R.
Other authors: Wyss F., Itten R.
Year: 2014
Title of anthology: Project report
Place of publication: Uster, CH
Publisher: treeze Ltd.
Volume No: 489

## Validation
Proof reading validation: 15.08.2016; Other validation: \\SRV01\ESU-Docs\Projektablage\489 Erweiterung KBOB-Liste BFE\EcoSpold\Baugrubenabschluss\[489-Ecospold-Baugrubensicherung-Tiefgründung-v0.25.xlsx]X-Process;
