# Grass from natural meadow extensive IP, at field

Dataset: EcoSpold 1, unit process
Functional unit: 1 kg
Category: agricultural / plant production
Geography: CH
Time period: 2000-01 to 2004-12
Share of production covered: 0 %
Generated by: Fredy Dinkel
accessRestrictedTo: 0
copyright: true

## General comment
Refers to 1 kg dry matter of fresh gras from intensive organic production with 1.66 kg CO2 and 18.9 MJ per kg dry matter. The dry matter content of fresh gras is about 10-15%;

## Included processes
The inventories include the cultivation of gras on a permanent extensiv meadow. Included steps are application of Asulam against Rumex, harvest and loading for transport.

## Geography
Refers to a production in the Swiss plateau (lowlands <700m).

## Technology
Extenisv organic production.

## Reference product
- Grass from natural meadow extensive IP, at field [CH]: 1 kg
  SWITZERLAND

## Inputs from technosphere
- Mowing, by rotary mower [CH]: 0.00033333 ha; lognormal SD95 1.2165
  (2,2,1,1,3,1); Max. 1 harvest per year, min. 1 harvest per 3 years (Walter et al. 2004). 1 harvest per year was assumed for straw areas with use for bioenergy production. For those straw areas the use of rotary mower was assumed possible.
- Fodder loading, by self-loading trailer [CH]: 0.056 m3; lognormal SD95 1.3078
  (2,2,1,3,3,5); Calculation with grass of about 120 kg/m3 and dry matter content of 15%
- Glyphosate, at regional storehouse [CH]: 3.3333e-5 kg; lognormal SD95 1.2165
  (2,2,1,1,1,5); Assumption application of 0.1 l Glyphosate used for single plant treatments only (allowed pesticides for extensive IP).

## Inputs from nature
- Transformation, to pasture, man made, extensive [resources, land]: 0.066667 m2; lognormal SD95 2.0483
  (4,2,1,1,1,1); As in ecoinvent report 15 for hay, life time according the ecoinvent quality guidelines, extensiv meadow fixed at 50 years
- Carbon dioxide, in air [resources, in air]: 1.661 kg; lognormal SD95 1.0907
  (2,1,1,3,1,3); Calculated with an uptake of 0.453 kg carbon per kg DM grass (Maier et al. 1998), resulting in 1.661 kg CO2 / kg DM
- Transformation, from pasture, man made, extensive [resources, land]: 0.066667 m2; lognormal SD95 2.0483
  (same comment as for Transformation, to pasture, man made, extensive)
- Occupation, pasture, man made, extensive [resources, land]: 3.3333 m2a; lognormal SD95 1.5051
  (2,2,1,1,1,1); Calculation for one ha cultivated during one year and with a yield of 3000 kg DM/ha*a.
- Energy, gross calorific value, in biomass [resources, biotic]: 18.9 MJ; lognormal SD95 1.0907
  (2,1,1,3,1,3); Calculation with 18.9 MJ/kg DM energy content of grass (Nemecek et al. 2004)

## Emissions to nature
- Phosphate [emissions to water, river]: 0.00011452 kg; lognormal SD95 1.8071
  (2,2,3,3,4,4); Formula as in ecoinvent report 15, Kapitel 4.4 (Nemecek et al. 2004)
- Nickel [emissions to soil, agricultural]: -1.68e-6 kg; lognormal SD95 1.6367
  (2,1,4,3,3,4); Calculation input - output bilance using data about metal content of grass as in Nemecek et al. (2004)
- Lead [emissions to soil, agricultural]: -3.3e-6 kg; lognormal SD95 1.6367
  (same comment as for Nickel)
- Zinc [emissions to soil, agricultural]: -4e-5 kg; lognormal SD95 1.6367
  (same comment as for Nickel)
- Nitrogen oxides [emissions to air, low. pop.]: 3.465e-5 kg; lognormal SD95 1.8065
  (2,1,3,3,4,4); Formula as in ecoinvent report 15, Kapitel 4.4 (Nemecek et al. 2004)
- Phosphate [emissions to water, groundwater]: 4.5806e-5 kg; lognormal SD95 1.8071
  (2,2,3,3,4,4); Formula as in ecoinvent report 15, Kapitel 4.4 (Nemecek et al. 2004)
- Copper [emissions to soil, agricultural]: -8.6e-6 kg; lognormal SD95 1.6367
  (same comment as for Nickel)
- Glyphosate [emissions to soil, agricultural]: 3.3333e-5 kg; lognormal SD95 1.301
  (2,2,1,1,1,5); Calculation input - output bilance
- Cadmium [emissions to soil, agricultural]: -1.3e-7 kg; lognormal SD95 1.6367
  (same comment as for Nickel)
- Mercury [emissions to soil, agricultural]: -1.5e-7 kg; lognormal SD95 1.6367
  (same comment as for Nickel)
- Phosphorus [emissions to water, river]: 1.5363e-6 kg; lognormal SD95 1.8071
  (2,2,3,3,4,4); Formula as in ecoinvent report 15, Kapitel 4.4 (Nemecek et al. 2004)
- Chromium [emissions to soil, agricultural]: -1.09e-6 kg; lognormal SD95 1.6367
  (same comment as for Nickel)
- Dinitrogen monoxide [emissions to air, low. pop.]: 0.000165 kg; lognormal SD95 1.8065
  (2,1,3,3,4,4); Formula as in ecoinvent report 15, Kapitel 4.4 (Nemecek et al. 2004)

## Sampling procedure
Data were compiled from statistics, fertilising recommendations, documents from extension services and expert knowledge.

## Sources
- Jungbluth N., Chudacoff M., Dauriat A., Dinkel F., Doka G., Faist Emmenegger M., Gnansounou E., Kljun N., Spielmann M., Stettler C., Sutter J., 2007, 2007 - LCI bioenergy - Jungbluth, Final report ecoinvent data v2.0, 17, Swiss Centre for LCI, ESU-services Ltd., Duebendorf and Uster, CH
Jungbluth N., Chudacoff M., Dauriat A., Dinkel F., Doka G., Faist Emmenegger M., Gnansounou E., Kljun N., Spielmann M., Stettler C., Sutter J. (2007) Life Cycle Inventories of Bioenergy. Final report ecoinvent data v2.0. Volume: 17. Swiss Centre for LCI, ESU. Duebendorf and Uster, CH.
Type: Measurement on site
Source: CD-ROM
First author: Jungbluth N.
Other authors: Chudacoff M., Dauriat A., Dinkel F., Doka G., Faist Emmenegger M., Gnansounou E., Kljun N., Spielmann M., Stettler C., Sutter J.
Year: 2007
Title of anthology: Final report ecoinvent data v2.0
Place of publication: Duebendorf and Uster, CH
Publisher: Swiss Centre for LCI, ESU
Volume No: 17

## Validation
Proof reading validation: Passed.; Other validation: none;
