# Chlorine, liquid, production mix, at plant

Dataset: EcoSpold 1, unit process
Functional unit: 1 kg
Category: chemicals / gases
Geography: RER
Time period: 2000-01 to 2000-12
Production volume: European Cl2 production in 2000: 9697265 tonnes
Share of production covered: 100 %
Generated by: Roland Hischier
accessRestrictedTo: 0
copyright: true

## General comment
Modul that establishs only an average of the different technologies used for chlorine production - thus no process-specific emissions are included into this dataset.;
CAS number: 007782-50-5;
Formula: Cl2;
Synonyms: Dichlorine;

## Included processes
Process establishing an average European chlorine production from the three different electrolysis cell technologies (mercury, diaphragm, membrane). This process includes additionally the energy consumption for the liquefaction step from gaseous to liquid chlorine.

## Geography
European average values

## Technology
see general comments

## Reference product
- Chlorine, liquid, production mix, at plant [RER]: 1 kg
  Europe

## Inputs from technosphere
- Chlorine, gaseous, diaphragm cell, at plant [RER]: 0.235 kg; lognormal SD95 1.1
  (1,1,1,1,1,1); statistics from EuroChlor
- Chlorine, gaseous, mercury cell, at plant [RER]: 0.551 kg; lognormal SD95 1.1
  (1,1,1,1,1,1); statistics from EuroChlor
- Chlorine, gaseous, membrane cell, at plant [RER]: 0.214 kg; lognormal SD95 1.1
  (1,1,1,1,1,1); statistics from EuroChlor
- Electricity, medium voltage, production ENTSO-E, at grid: 0.07 kWh; lognormal SD95 1.2
  (1,3,1,3,1,5); data from 1 European chlorine producer

## Emissions to nature
- Heat, waste [emissions to air, high. pop.]: 0.252 MJ; lognormal SD95 1.2
  (1,3,1,3,1,5); Calculated (based on Electricity input)

## Sampling procedure
Official statistics from the Association of European Chlorine Producers (EuroChlor)

## Sources
- Althaus H.-J., Chudacoff M., Hellweg S., Hischier R., Jungbluth N., Osses M., Primas A., 2007, 2007 - LCI chemicals - Althaus, Final report ecoinvent data v2.0, 8, Swiss Centre for LCI, Empa - TSL, ETH, ESU-services Ltd., Chudacoff Oekoscience, Duebendorf, CH
Althaus H.-J., Chudacoff M., Hischier R., Jungbluth N., Osses M., Primas A. (2007) Life Cycle Inventories of Chemicals. Final report ecoinvent data v2.0. Volume: 8. Swiss Centre for LCI, Empa - TSL. Dübendorf, CH.
Type: Measurement on site
Source: CD-ROM
First author: Althaus H.-J.
Other authors: Chudacoff M., Hischier R., Jungbluth N., Osses M., Primas A.
Year: 2007
Title of anthology: Final report ecoinvent data v2.0
Place of publication: Dübendorf, CH
Publisher: Swiss Centre for LCI, Empa - TSL
Volume No: 8

## Validation
Proof reading validation: Passed; Other validation: Passed;
