# Scooter, ICE, at regional storage

Dataset: EcoSpold 1, unit process, infrastructure
Functional unit: 1 p
Category: transport systems / road\operations\infrastructure
Geography: RER
Time period: 2000-01 to 2009-12
Generated by: Marianne Leuenberger
accessRestrictedTo: 0
copyright: true

## General comment
The data set reflects a scooter running 60-70km/h at max. speed, 50cc. Manufacturing in Asia. ;
Synonyms: Roller;

## Included processes
This data set includes all processes and materials for eScooter manufacturing, containing an ICE motor. Transport to regional storage included.

## Technology
Automised production of 50cc scooters

## Reference product
- Scooter, ICE, at regional storage [RER]: 1 p
  Europe

## Inputs from technosphere
- Polyvinylchloride, at regional storage [RER]: 2.4 kg; lognormal SD95 1.3816
  (4,3,1,1,3,5); 15% of passenger car
- Tap water, at user [RER]: 215.46 kg; lognormal SD95 1.5745
  (4,3,2,3,4,3); weight ratio scooter:passenger car
- Transport, transoceanic freight ship [OCE]: 1870.1 tkm; lognormal SD95 2.095
  (4,5,na,na,na,na); Transport from Asia to Europe: 13000km
- Lead, at regional storage [RER]: 0.86989 kg; lognormal SD95 1.5745
  (4,3,2,3,4,3); weight ratio scooter:passenger car
- Ethylene, average, at plant [RER]: 1.2379 kg; lognormal SD95 1.5745
  (4,3,2,3,4,3); weight ratio scooter:passenger car
- Polypropylene, granulate, at plant [RER]: 7.35 kg; lognormal SD95 1.3816
  (4,3,1,1,3,5); 15% of passenger car
- Zinc, primary, at regional storage [RER]: 0.39413 kg; lognormal SD95 1.5745
  (4,3,2,3,4,3); weight ratio scooter:passenger car
- Aluminium, production mix, at plant [RER]: 15 kg; lognormal SD95 1.5745
  (4,3,2,3,4,3); 15 kg
- Nickel, 99.5%, at plant [GLO]: 0.09368 kg; lognormal SD95 1.5745
  (4,3,2,3,4,3); weight ratio scooter:passenger car
- Transport, freight, rail, electricity with shunting [CH]: 57.761 tkm; lognormal SD95 2.095
  (4,5,na,na,na,na); weight ratio scooter:passenger car
- Copper, at regional storage [RER]: 0.67584 kg; lognormal SD95 1.5745
  (4,3,2,3,4,3); weight ratio scooter:passenger car
- Injection moulding [RER]: 15.3 kg; lognormal SD95 1.5745
  (4,3,2,3,4,3); All HDPE
- Road vehicle plant [RER]: 1.9472e-8 p; lognormal SD95 3.2795
  (4,3,2,3,4,3); weight ratio scooter:passenger car
- Transport, freight, lorry, fleet average [RER]: 5.7761 tkm; lognormal SD95 2.095
  (4,5,na,na,na,na); weight ratio scooter:passenger car
- Palladium, at regional storage [RER]: 2.0074e-5 kg; lognormal SD95 1.5745
  (4,3,2,3,4,3); weight ratio scooter:passenger car
- Wire drawing, copper [RER]: 0.67584 kg; lognormal SD95 1.5745
  (4,3,2,3,4,3); weight ratio scooter:passenger car
- Sulphuric acid, liquid, at plant [RER]: 0.053532 kg; lognormal SD95 1.5745
  (4,3,2,3,4,3); weight ratio scooter:passenger car
- Steel, low-alloyed, at plant [RER]: 6.6245 kg; lognormal SD95 1.5745
  (4,3,2,3,4,3); weight ratio scooter:passenger car
- Reinforcing steel, at plant [RER]: 44.55 kg; lognormal SD95 1.3816
  (4,3,1,1,3,5); 5% of passenger car
- Electricity, medium voltage, at grid [JP]: 18 kWh; lognormal SD95 1.3117
  (4,3,1,1,3,3); 50% of Environmental report Honda, 2008
- Light fuel oil, burned in industrial furnace 1MW, non-modulating [RER]: 4.02 MJ; lognormal SD95 1.3117
  (4,3,1,1,3,3); 50% of Environmental report Honda, 2008
- Natural gas, burned in industrial furnace 1MWth [CH]: 108.75 MJ; lognormal SD95 1.3117
  (4,3,1,1,3,3); 50% of Environmental report Honda, 2008
- Platinum, at regional storage [RER]: 0.00010706 kg; lognormal SD95 1.5745
  (4,3,2,3,4,3); weight ratio scooter:passenger car
- Synthetic rubber, at plant [RER]: 2.9509 kg; lognormal SD95 1.5745
  (4,3,2,3,4,3); weight ratio scooter:passenger car
- Polyethylene, HDPE, granulate, at plant [RER]: 15.3 kg; lognormal SD95 1.3816
  (4,3,1,1,3,5); 15% of passenger car
- Section bar rolling, steel [RER]: 13.584 kg; lognormal SD95 1.5745
  (4,3,2,3,4,3); weight ratio scooter:passenger car
- Sheet rolling, steel [RER]: 27.05 kg; lognormal SD95 1.3816
  (4,3,1,1,3,5); 5% of passenger car
- Alkyd paint, white, 60% in solvent, at plant [RER]: 0.416 kg; lognormal SD95 1.5745
  (4,3,2,3,4,3); weight ratio scooter:passenger car
- Chromium, at regional storage [RER]: 0.16059 kg; lognormal SD95 1.5745
  (4,3,2,3,4,3); weight ratio scooter:passenger car

## Emissions to nature
- COD, Chemical Oxygen Demand [emissions to water, river]: 0.012914 kg; lognormal SD95 1.58
  (4,3,2,3,4,3); weight ratio scooter:passenger car
- BOD5, Biological Oxygen Demand [emissions to water, river]: 0.0017398 kg; lognormal SD95 1.58
  (4,3,2,3,4,3); weight ratio scooter:passenger car
- Phosphate [emissions to water, river]: 6.6914e-5 kg; lognormal SD95 1.58
  (4,3,2,3,4,3); weight ratio scooter:passenger car
- NMVOC, non-methane volatile organic compounds, unspecified origin [emissions to air, unspecified]: 0.32119 kg; lognormal SD95 1.58
  (4,3,2,3,4,3); weight ratio scooter:passenger car
- Heat, waste [emissions to air, unspecified]: 64.8 MJ; lognormal SD95 1.5745
  (4,3,2,3,4,3); weight ratio scooter:passenger car

## Sampling procedure
Literature, manufacturer data

## Extrapolations
All values extrapolated from passenger car production. Some adaptations made for change of material.

## Sources
- Spielmann M., Bauer C., Dones R., Tuchschmid M., 2007, 2007 - Transport services - Spielmann, Final report ecoinvent Data v2.0, 14, Swiss Centre for LCI, PSI, ESU-services Ltd., Duebendorf, Villigen and Uster, CH
Spielmann M., Dones R; Bauer C. (2007) Life Cycle Inventories of Transport Services. Final report ecoinvent Data v2.0. Volume: 14. Issue: 0. Swiss Centre for LCI, PSI. Dübendorf and Villigen, CH.
Type: Measurement on site
Source: CD-ROM
First author: Spielmann M.
Other authors: Dones R; Bauer C.
Year: 2007
Title of anthology: Final report ecoinvent Data v2.0
Place of publication: Dübendorf and Villigen, CH
Publisher: Swiss Centre for LCI, PSI
Volume No: 14
Issue No: 0

## Validation
Proof reading validation: 26.01.2010; Other validation: C:\Dokumente und Einstellungen\Marianne\Eigene Dateien\Projekte\277_Mobitool\Ecoinvent\Review\Alte\[Ecospold_Scooter-v1.1.xls]X-Process;
