# Biogas, from fat and oil, at agricultural co-fermentation, covered

Dataset: EcoSpold 1, unit process
Functional unit: 1 m3
Category: fuels / biofuels\biogas
Geography: CH
Time period: 2006-01 to 2006-12
Production volume: 12 mio. m3 Biogas
Share of production covered: 60 %
Generated by: Konrad Schleiss
accessRestrictedTo: 0
copyright: true

## General comment
This process cannot be used for its own. It can only be used as a auxiliary process for the process "biogas, mix, at agricultural co-fermentation, covered" to give to the user the possibility to calculate biogas production with different inputs. The multioutput-process "fat and oil to agricultural co-fermentation, covered" delivers the co-products "disposal, fat and oil, to agricultural co-fermentation, covered" and "biogas, from fat and oil, at agricultural co-fermentation, covered". The allocation is based on economic criteria.;

## Included processes
The process includes the used energy (heat and electricity) the transport for the co-substrate and the infrastructure

## Geography
Average Swiss technology

## Technology
Fermenter with methane recovery, to reduce NH3 emissions the digested matter will be spread with a trail hose.

## Time period
Time of publications.

## Reference product
- Biogas, from fat and oil, at agricultural co-fermentation, covered [CH]: 1 m3
  SWITZERLAND

## Inputs from technosphere
- Transport, freight, lorry, 16t-32t gross weight, fleet average [CH]: 0.035432 tkm; lognormal SD95 2.008
  (2,3,1,3,1,2); The transport for the co-substrate of 20 plants producing about 50% of the agricultural biogas have been evaluated.
- Heat, at cogen with biogas engine, agricultural covered, allocation exergy [CH]: 4.20215 MJ; lognormal SD95 1.0931
  (2,3,1,3,1,2); The needed heat is produced by the cogeneration
- Anaerobic digestion plant covered, agriculture [CH]: 1.4173e-7 p; lognormal SD95 1.2238
  (2,3,1,3,1,5); plant producing 300'000m3 biogas, lifetime 20 years
- Electricity, low voltage, at grid [CH]: 0.049421 kWh; lognormal SD95 1.0931
  (2,3,1,3,1,2); Evaluation of 20 plants producing about 50% of the agricultural biogas. Half of the plants uses electricity from the grid
- Heat, at cogen with ignition biogas engine, agricultural covered, alloc. exergy [CH]: 1.40311 MJ; lognormal SD95 1.0931
  (2,3,1,3,1,2); The needed heat is produced by the cogeneration
- Electricity, at cogen with ignition biogas engine, agric. covered, alloc. exergy [CH]: 0.012174 kWh; lognormal SD95 1.0931
  (2,3,1,3,1,2); Evaluation of 20 plants producing about 50% of the agricultural biogas. Half of the plants produce their own electricity
- Electricity, at cogen with biogas engine, agricultural covered, alloc. exergy [CH]: 0.037205 kWh; lognormal SD95 1.0931
  (same comment as for Electricity, at cogen with ignition biogas engine, agric. covered, all)

## Inputs from nature
- Carbon dioxide, in air [resources, in air]: 1.96507 kg; lognormal SD95 1.2264
  (2,3,2,3,1,5); The carbon dioxide fixation in the bio waste is accounted for as CO2 as resource. The actual value is based on the bio waste composition.

## Emissions to nature
- Heat, waste [emissions to air, low. pop.]: 0.35568 MJ; lognormal SD95 1.2264
  (2,3,2,3,1,5); Own calculation from electricity input
- Methane, biogenic [emissions to air, low. pop.]: 0.0039242 kg; lognormal SD95 1.623
  (4,3,2,3,1,5); The stock is covered to avoid methane emissions. So the emission is about 1%.
- Carbon dioxide, biogenic [emissions to air, low. pop.]: 0.0086544 kg; lognormal SD95 1.0931
  (2,3,1,3,1,2); The stock is covered to avoid methane emissions. So the emission is about 1%.

## Sampling procedure
The data are the average of 20 plants in Switzerland to produce electricity according the criteria of "Naturemade"

## Sources
- Jungbluth N., Chudacoff M., Dauriat A., Dinkel F., Doka G., Faist Emmenegger M., Gnansounou E., Kljun N., Spielmann M., Stettler C., Sutter J., 2007, 2007 - LCI bioenergy - Jungbluth, Final report ecoinvent data v2.0, 17, Swiss Centre for LCI, ESU-services Ltd., Duebendorf and Uster, CH
Jungbluth N., Chudacoff M., Dauriat A., Dinkel F., Doka G., Faist Emmenegger M., Gnansounou E., Kljun N., Spielmann M., Stettler C., Sutter J. (2007) Life Cycle Inventories of Bioenergy. Final report ecoinvent data v2.0. Volume: 17. Swiss Centre for LCI, ESU. Duebendorf and Uster, CH.
Type: Measurement on site
Source: CD-ROM
First author: Jungbluth N.
Other authors: Chudacoff M., Dauriat A., Dinkel F., Doka G., Faist Emmenegger M., Gnansounou E., Kljun N., Spielmann M., Stettler C., Sutter J.
Year: 2007
Title of anthology: Final report ecoinvent data v2.0
Place of publication: Duebendorf and Uster, CH
Publisher: Swiss Centre for LCI, ESU
Volume No: 17

## Validation
Proof reading validation: Passed; Other validation: none;
