# Crude oil, at production offshore

Dataset: EcoSpold 1, unit process
Functional unit: 1 kg
Category: oil / production
Geography: AZ
Time period: 2023 to 2025
Production volume: 27 megatons of crude oil per year in 2023.
Share of production covered: 100 %
Generated by: Maresa Bussa
accessRestrictedTo: 0
copyright: true

## General comment
The offshore oil production delivers the product crude oil. The values are derived from a multioutput-process "combined offshore gas and oil production" by allocation based on heating values for crude oil and natural gas

## Included processes
Production of crude oil including energy use, infrastructure and emissions.

## Geography
Data valid for AZ.

## Technology
90 % offshore and 10 % onshore production

## Time period
Time of most relevant publications and statistics. Other generic data, e.g. for infrastructure are based on older publications.

## Reference product
- Crude oil, at production offshore [AZ]: 1 kg

## Inputs from technosphere
- Discharge, produced water, offshore [OCE]: 0.75498 kg; lognormal SD95 1.3069
  As sample size for the considered region is small, and a 0-value is not realisitic, global average is assumed according to IOGP 2024.
- Chemicals inorganic, at plant [GLO]: 0.00057336 kg; lognormal SD95 1.323
  (4,4,1,3,3,BU:1.05); Generic estimate according to Meili et al. 2018
- Chemicals organic, at plant [GLO]: 0.00043737 kg; lognormal SD95 1.323
  (4,4,1,3,3,BU:1.05); Generic estimate according to Meili et al. 2018
- Transport, freight, lorry, 16t-32t gross weight, fleet average [RER]: 0.00010107 tkm; lognormal SD95 2.0742
  (3,4,1,3,3,BU:2); Standard distance for chemical transport 100km
- Transport, freight, rail [RER]: 0.00060644 tkm; lognormal SD95 2.0742
  (3,4,1,3,3,BU:2); Standard distance for chemical transport 600km
- Well for exploration and production, offshore [OCE]: 1.7441e-6 m; lognormal SD95 3.0708
  Regional estimate for 2023
- Pipeline, crude oil, offshore [OCE]: 8.4144e-9 km; lognormal SD95 3.0708
  (3,4,1,3,3,BU:3); Generic estimation based on estimate for Nigeria 2018
- Platform, crude oil, offshore [OCE]: 4.2499e-11 unit; lognormal SD95 3.0708
  (3,4,1,3,3,BU:3); Lodewijkx et al. 2001
- Electricity, medium voltage, production GLO, at grid [GLO]: 0.017407 kWh; lognormal SD95 1.2403
  (3,2,2,3,3,BU:1.05); Purchased energy according to IOGP 2024.
- Diesel, burned in diesel-electric generating set, at extraction site [GLO]: 0.16591 MJ; lognormal SD95 1.2403
  (3,2,2,3,3,BU:1.05); Calculation based on data from IOGP 2024, assuming a generic share of 11.7% of onsite combustion + unspecified. Average 2021 to 2023
- Heavy fuel oil, burned in industrial furnace 1MW, non-modulating [RER]: 0.031012 MJ; lognormal SD95 1.2403
  (3,2,2,3,3,BU:1.05); Calculation based on data from IOGP 2024, assuming a generic share of 2.2% of onsite combustion + unspecified. Average 2021 to 2023
- Sweet gas, burned in gas turbine, production [GLO]: 1.2157 MJ; lognormal SD95 1.2403
  (3,2,2,3,3,BU:1.05); Calculation based on data from IOGP 2024, assuming a generic share of 85.7% of onsite combustion + unspecified. Average 2021 to 2023, SOx content of sour gas assessed separately in overall emissions.
- Natural gas, vented [GLO]: 0.012625 Nm3; lognormal SD95 1.2152
  (2,1,1,1,3,BU:1.05); Country specific methane emissions according to IEA 2024, includes all methane emissions from upstream production, recalculated using a share of 0.88 Nm3 methane per Nm3 natural gas. Allocation based on country specific emissions for oil and gas.
- Natural gas, sweet, burned in production flare [GLO]: 0.005828 Nm3; lognormal SD95 1.2366
  (3,2,1,1,3,BU:1.05); Total amount of flared gas per kg OE according to Worldbank 2024, SOx emissions from flared sour gas assessed separately in overall emissions.
- Disposal, hazardous waste, 0% water, to underground deposit [DE]: 0.00020732 kg; lognormal SD95 1.2621
  (3,4,1,3,3,BU:1.05); Generic estimate according to Meili et al. 2018
- Disposal, municipal solid waste, 22.9% water, to municipal incineration [CH]: 0.00010366 kg; lognormal SD95 1.2621
  (3,4,1,3,3,BU:1.05); Generic estimate according to Meili et al. 2018

## Inputs from nature
- Oil, crude [resources, in ground]: 1 kg; lognormal SD95 1.0541
  (1,1,1,3,1,BU:1 extraction plus calculated losses

## Emissions to nature
- Oils, unspecified [emissions to water, ocean]: 2.5343e-8 kg; lognormal SD95 1.5647
  (2,1,1,3,3,BU:1.5); Average 2021 to 2023, IOGP 2024
- BOD5, Biological Oxygen Demand [emissions to water, ocean]: 7.9842e-8 kg; lognormal SD95 1.5647
  (2,1,1,3,3,BU:1.5); Extrapolation for sum parameter
- COD, Chemical Oxygen Demand [emissions to water, ocean]: 7.9842e-8 kg; lognormal SD95 1.5647
  (2,1,1,3,3,BU:1.5); Extrapolation for sum parameter
- DOC, Dissolved Organic Carbon [emissions to water, ocean]: 2.1927e-8 kg; lognormal SD95 1.5647
  (2,1,1,3,3,BU:1.5); Extrapolation for sum parameter
- TOC, Total Organic Carbon [emissions to water, ocean]: 2.1927e-8 kg; lognormal SD95 1.5647
  (2,1,1,3,3,BU:1.5); Extrapolation for sum parameter
- AOX, Adsorbable Organic Halogen as Cl [emissions to water, ocean]: 2.6103e-13 kg; lognormal SD95 1.5647
  (2,1,1,3,3,BU:1.5); Extrapolation for sum parameter
- Nitrogen [emissions to water, ocean]: 1.9578e-11 kg; lognormal SD95 1.5647
  (2,1,1,3,3,BU:1.5); Extrapolation for sum parameter
- Sulfur [emissions to water, ocean]: 6.7869e-11 kg; lognormal SD95 1.5647
  (2,1,1,3,3,BU:1.5); Extrapolation for sum parameter
- Sulfur dioxide [emissions to air, low. pop.]: 0.00024025 kg; lognormal SD95 1.5647
  (2,1,1,3,3,BU:1.5); Weighted average 2021 to 2023, IOGP 2024
- Nitrogen oxides [emissions to air, low. pop.]: 0.00017284 kg; lognormal SD95 1.5647
  (2,1,1,3,3,BU:1.5); Weighted average 2021 to 2023, IOGP 2024
- Methane, bromotrifluoro-, Halon 1301 [emissions to air, low. pop.]: 1.2024e-8 kg; lognormal SD95 1.5805
  (3,3,1,3,3,BU:1.5); assuming 20% halon compared to Jungbluth 2007
- Methane, trifluoro-, HFC-23 [emissions to air, low. pop.]: 4.8305e-8 kg; lognormal SD95 1.5805
  (3,3,1,3,3,BU:1.5); Assuming 80% replacement of halon 1301 with HFC-23 (amount according to Jungbluth 2007)

## Sampling procedure
Statistics and use of generic data

## Extrapolations
A part of the data has been estimated with generic assumptions for offshore production.

## Sources
- Meili C., Jungbluth N., Bussa M., 2025, 2025 - LCI crude oil and natural gas extraction - Meili, Project report, 614, ESU-services Ltd., Schaffhausen, CH

## Validation
08.07.2025
https://esuservices-my.sharepoint.com/personal/jungbluth_esu-services_ch/Documents/ESU-intern/565 Beratung BAFU/EcoSpoldDataXML/[EcoSpold-crude-gas exploration and extraction-2025-v1.0.xlsb]X-Process
