# xx Cold impact extrusion, aluminium, 5 strokes

Dataset: EcoSpold 1, unit process
Functional unit: 1 kg
Category: processing, obsolete / metals\chipless shaping
Geography: RER
Time period: 2006-01 to 2007-12
Share of production covered: 0 %
Generated by: Roland Steiner
accessRestrictedTo: 0
copyright: true

## General comment
The reference for impact extrusion is 1 kg of metal formed by impact extrusion. As there is a large variation from factory to factory with regard to the LCI, it is advised that in case this dataset becomes important in the results, it has to be investigated further if the rough estimations made are applicable or not. ;

## Included processes
This dataset encompasses the electricity consumption of the machine as well as common pre- and post treatments. Furthermore, machine as well as factory infrastructure and operation are considered as well. Degreasing is not included and has to be added if necessary.

## Geography
Geographical coverage encompasses the industrialised countries.

## Technology
Average technology

## Reference product
- xx Cold impact extrusion, aluminium, 5 strokes [RER]: 1 kg
  Europe

## Inputs from technosphere
- Deformation stroke, cold impact extrusion, aluminium [RER]: 5 kg; lognormal SD95 1.05
  (1,1,1,1,1,1);
- Surface treatment, cold impact extrusion, aluminium [RER]: 1 kg; lognormal SD95 1.05
  (1,1,1,1,1,1);
- Heat treatment, cold impact extrusion, aluminium [RER]: 1 kg; lognormal SD95 1.05
  (1,1,1,1,1,1);
- Metal working factory operation, average heat energy [RER]: 1 kg; lognormal SD95 1.63
  (4,3,2,1,4,5); estimated
- Metal working factory [RER]: 4.58e-10 p; lognormal SD95 3.32
  (4,3,2,1,4,5); estimated
- Metal working machine, unspecified, at plant [RER]: 3.95e-5 kg; lognormal SD95 3.32
  (4,3,2,1,4,5); estimated
- Compressed air, average installation, >30kW, 7 bar gauge, at supply network [RER]: 1.45 m3; lognormal SD95 1.63
  (4,3,2,1,4,5); estimated

## Sources
- Steiner R., Frischknecht R., 2007, 2007 - LCI metal proc. and comp. air supply - Steiner, Final report ecoinvent Data v2.0, 23, Swiss Centre for LCI, ESU-services Ltd., Duebendorf and Uster, CH
Steiner, R., Frischknecht, R. (2007) Life Cycle Inventories of Metal Processing and Compressed Air Supply. Final report ecoinvent Data v2.0. Editors: 0. 0. Volume: 23. Issue: 0. Swiss Centre for LCI, ESU. Dübendorf and Uster, CH.
Type: Measurement on site
Source: CD-ROM
First author: Steiner, R.
Other authors: Frischknecht, R.
Year: 2007
Name of editors: 0
Title of anthology: Final report ecoinvent Data v2.0
Place of publication: Dübendorf and Uster, CH
Publisher: Swiss Centre for LCI, ESU
Journal: 0
Volume No: 23
Issue No: 0
Original title: Life Cycle Inventories of Metal Processing and Compressed Air Supply

## Validation
Proof reading validation: passed; Other validation: none;
