# Electric arc furnace slag, low-alloyed, at plant, worst plants (max. values)

Dataset: EcoSpold 1, unit process
Functional unit: 1 kg
Category: metals / extraction
Geography: RER
Time period: 2018-01 to 2020-12
Generated by: Mischa Zschokke
accessRestrictedTo: 0
copyright: true

## General comment
Total max amount of slag produced: 0.35kg/kg LS. economical allocation:\nallocation factor for EAF slag of 0.0086, assuming that 38.6% of the slag produced is reused, the remaining inputs and emissions (0.9914) are allocated to liquid steel.;

## Geography
Data from literature, referring to Europe

## Technology
Industry data.

## Time period
Time of publications.

## Reference product
- Electric arc furnace slag, low-alloyed, at plant, worst plants (max. values) [RER]: 1 kg
  Europe

## Inputs from technosphere
- Electricity, medium voltage, production ENTSO-E, at grid: 0.0064404 kWh; lognormal SD95 1.1267
  (2,2,3,1,1,nA,BU:1.05); ; Remus (2013)
- Disposal, slag, unalloyed electr. steel, 0% water, to residual material landfill [CH]: 0.0030136 kg; lognormal SD95 1.1267
  (2,2,3,1,1,nA,BU:1.05); ; Remus (2013)
- Hard coal mix, at regional storage [UCTE]: 0.00024109 kg; lognormal SD95 1.1267
  (2,2,3,1,1,nA,BU:1.05); ; Remus (2013)
- Natural gas, high pressure, at consumer [RER]: 0.00035876 MJ; lognormal SD95 1.1267
  (2,2,3,1,1,nA,BU:1.05); ; Remus (2013)
- Anode, for metal electrolysis [RER]: 5.1661e-5 kg; lognormal SD95 1.1267
  (2,2,3,1,1,nA,BU:1.05); ; Remus (2013)
- Disposal, dust, unalloyed EAF steel, 15.4% water, to residual material landfill [CH]: 0.0001586 kg; lognormal SD95 1.1267
  (2,2,3,1,1,nA,BU:1.05); Dusts - amount inventoried corresponds to the 61.4% of the slag that is landfilled. The rest is recycled or reused; Remus (2013)
- Quicklime, in pieces, loose, at plant [CH]: 0.0012054 kg; lognormal SD95 1.1267
  (2,2,3,1,1,nA,BU:1.05); ; Remus (2013)
- Transport, freight, lorry, fleet average [RER]: 0.001025 tkm; lognormal SD95 2.0171
  (2,2,3,1,1,nA,BU:2); ; Remus (2013)
- Iron scrap, at plant [RER]: 0.010608 kg; lognormal SD95 1.1267
  (2,2,3,1,1,nA,BU:1.05); ; Remus (2013)
- Refractory, basic, packed, at plant [DE]: 0.001038 kg; lognormal SD95 1.1267
  (2,2,3,1,1,nA,BU:1.05); ; Remus (2013)
- Disposal, inert waste, 5% water, to construction waste landfill [CH]: 0.00012054 kg; lognormal SD95 1.1267
  (2,2,3,1,1,nA,BU:1.05); waste refractories - amount inventoried corresponds to the 61.4% of the slag that is landfilled. The rest is recycled or reused; Remus (2013)
- Argon, liquid, at plant [RER]: 2.0837e-5 kg; lognormal SD95 1.1267
  (2,2,3,1,1,nA,BU:1.05); ; Remus (2013)
- Nitrogen, liquid, at plant [RER]: 0.00012054 kg; lognormal SD95 1.1267
  (2,2,3,1,1,nA,BU:1.05); ; Remus (2013)
- Oxygen, liquid, at plant [RER]: 0.00074827 kg; lognormal SD95 1.1267
  (2,2,3,1,1,nA,BU:1.05); ; Remus (2013)
- Transport, freight, rail [RER]: 0.00051661 tkm; lognormal SD95 2.0171
  (2,2,3,1,1,nA,BU:2); ; Remus (2013)
- Electric arc furnace converter [RER]: 3.4441e-13 p; lognormal SD95 3.7389
  (4,2,3,5,5,nA,BU:3); ; Remus (2013)
- Disposal, slag, unalloyed electr. steel, 0% water, to residual material landfill [CH]: 0.0018503 kg; lognormal SD95 1.1267
  (2,2,3,1,1,nA,BU:1.05); slag from furnace and slag from ladle - amount inventoried corresponds to the 61.4% of the slag that is landfilled. The rest is recycled or reused; Remus (2013)

## Inputs from nature
- Water, cooling, unspecified natural origin/m3 [resources, in water]: 0.00036852 m3; lognormal SD95 1.1267
  (2,2,3,1,1,nA,BU:1.05); ; Remus (2013)

## Emissions to nature
- Carbon monoxide, fossil [emissions to air, unspecified]: 3.8746e-5 kg; lognormal SD95 5.0184
  (2,2,3,1,1,nA,BU:5); ; Remus (2013)
- Copper [emissions to air, unspecified]: 4.3912e-9 kg; lognormal SD95 5.0184
  (2,2,3,1,1,nA,BU:5); ; Remus (2013)
- Chromium [emissions to air, unspecified]: 2.4109e-8 kg; lognormal SD95 5.0184
  (2,2,3,1,1,nA,BU:5); ; Remus (2013)
- Benzene, hexachloro- [emissions to air, unspecified]: 1.0332e-10 kg; lognormal SD95 3.0162
  (2,2,3,1,1,nA,BU:3); ; Remus (2013)
- Carbon dioxide, fossil [emissions to air, unspecified]: 0.0015498 kg; lognormal SD95 1.1267
  (2,2,3,1,1,nA,BU:1.05); ; Remus (2013)
- Hydrogen chloride [emissions to air, unspecified]: 3.0351e-7 kg; lognormal SD95 1.5217
  (2,2,3,1,1,nA,BU:1.5); ; Remus (2013)
- PAH, polycyclic aromatic hydrocarbons [emissions to air, unspecified]: 8.3519e-9 kg; lognormal SD95 3.0162
  (2,2,3,1,1,nA,BU:3); ; Remus (2013)
- Hydrogen fluoride [emissions to air, unspecified]: 1.2915e-7 kg; lognormal SD95 1.5217
  (2,2,3,1,1,nA,BU:1.5); ; Remus (2013)
- TOC, Total Organic Carbon [emissions to water, unspecified]: 2.2387e-6 kg; lognormal SD95 1.5217
  (2,2,3,1,1,nA,BU:1.5); ; Remus (2013)
- Nitrogen oxides [emissions to air, unspecified]: 3.9607e-6 kg; lognormal SD95 1.5217
  (2,2,3,1,1,nA,BU:1.5); ; Remus (2013)
- Benzene [emissions to air, unspecified]: 3.7885e-8 kg; lognormal SD95 3.0162
  (2,2,3,1,1,nA,BU:3); ; Remus (2013)
- Particulates, < 10 um [emissions to air, unspecified]: 2.5831e-6 kg; lognormal SD95 1.5217
  (2,2,3,1,1,nA,BU:1.5); dusts - amount inventoried corresponds to the 61.4% of the slag that is landfilled. The rest is recycled or reused; Remus (2013)
- Zinc [emissions to air, unspecified]: 2.0665e-7 kg; lognormal SD95 5.0184
  (2,2,3,1,1,nA,BU:5); ; Remus (2013)
- Cadmium [emissions to air, unspecified]: 1.2743e-9 kg; lognormal SD95 5.0184
  (2,2,3,1,1,nA,BU:5); ; Remus (2013)
- Sulfur dioxide [emissions to air, unspecified]: 1.8081e-6 kg; lognormal SD95 1.1267
  (2,2,3,1,1,nA,BU:1.05); ; Remus (2013)
- Dioxin, 2,3,7,8 Tetrachlorodibenzo-p- [emissions to air, unspecified]: 5.1661e-14 kg; lognormal SD95 3.0162
  (2,2,3,1,1,nA,BU:3); ; Remus (2013)
- Mercury [emissions to air, unspecified]: 1.722e-9 kg; lognormal SD95 5.0184
  (2,2,3,1,1,nA,BU:5); ; Remus (2013)
- Lead [emissions to air, unspecified]: 2.4539e-8 kg; lognormal SD95 5.0184
  (2,2,3,1,1,nA,BU:5); ; Remus (2013)
- Polychlorinated biphenyls [emissions to air, unspecified]: 4.3051e-11 kg; lognormal SD95 3.0162
  (2,2,3,1,1,nA,BU:3); ; Remus (2013)
- Nickel [emissions to air, unspecified]: 1.722e-8 kg; lognormal SD95 5.0184
  (2,2,3,1,1,nA,BU:5); ; Remus (2013)
- Water [emissions to water, unspecified]: 0.350094 kg; lognormal SD95 2.5196
  (5,5,5,5,5,BU:1.05); All uncertainty-values set to 5.0 by default. Balance of input water

## Sampling procedure
Sampling procedure: Data from literature

## Extrapolations
Some generic datasets from ecoinvent have been used.

## Sources
- Zschokke M., Bolt P., Conrad S., 2021, 2021 - LCI steel and iron processes - Zschokke, Project report, Carbotech AG, Zuerich, CH
M. Zschokke, S. Conrad, P. Bolt (2020) Life cycle inventories of steel and iron processes for UVEK:2020. Project report. carbotech. Zurich, CH.
Type: Separate publication
Source: Report
First author: M. Zschokke
Other authors: S. Conrad, P. Bolt
Year: 2020
Title of anthology: Project report
Place of publication: Zurich, CH
Publisher: carbotech
Original title: Life cycle inventories of steel and iron processes for UVEK:2020

## Validation
Proof reading validation: 23.02.2021; Other validation: [steel, electric, low-alloyed, EU MAX v0.6.xlsx]X-Process;
