# Metal coating plant

Dataset: EcoSpold 1, unit process, infrastructure
Functional unit: 1 p
Category: metals / infrastructure
Geography: RER
Time period: 2000-01 to 2000-12
Production volume: About 700000 m2 in 2000.
Share of production covered: 0 %
Generated by: Niels Jungbluth
accessRestrictedTo: 0
copyright: true

## General comment
Inventory of plant for making selective coatings on metal sheets. Production capacity 100000 m2 of coatings per year. Life time 30a.;

## Included processes
Basic assumption for land use and buildings, no machinery data.

## Geography
Production plants in DE, DK, US and CH.

## Technology
Sputtering, black majic and black chrome coating.

## Time period
Environmental report.

## Reference product
- Metal coating plant [RER]: 1 p
  Europe

## Inputs from technosphere
- Building, hall [CH]: 524 m2; lognormal SD95 3
  (3,3,1,1,1,na); Questionnaires

## Inputs from nature
- Transformation, to industrial area, built up [resources, land]: 638 m2; lognormal SD95 2
  (3,3,1,1,1,na); Questionnaires
- Transformation, to industrial area, vegetation [resources, land]: 492 m2; lognormal SD95 2
  (3,3,1,1,1,na); Questionnaires
- Transformation, from unknown [resources, land]: 1130 m2; lognormal SD95 2
  (3,3,1,1,1,na); Calculation
- Occupation, industrial area, built up [resources, land]: 33900 m2a; lognormal SD95 1.5
  (3,3,1,1,1,na); 50a occupation
- Occupation, industrial area, vegetation [resources, land]: 14800 m2a; lognormal SD95 1.5
  (3,3,1,1,1,na); 50a occupation

## Sampling procedure
Environmental report and personal communication.

## Sources
- Classen M., Althaus H.-J., Blaser S., Scharnhorst W., Tuchschmid M., Jungbluth N., Faist Emmenegger M., 2009, 2009 - LCI metals - Classen, Final report ecoinvent data v2.1, 10, Swiss Centre for LCI, Empa, ESU-services Ltd., Duebendorf, CH
Classen M., Althaus H.-J., Blaser S., Doka G., Jungbluth N., Tuchschmid M. (2008) Life Cycle Inventories of Metals. Final report ecoinvent data v2.1. Volume: 10. Issue: 0. Swiss Centre for LCI, Empa - TSL. Dübendorf, CH.
Type: Measurement on site
Source: CD-ROM
First author: Classen M.
Other authors: Althaus H.-J., Blaser S., Doka G., Jungbluth N., Tuchschmid M.
Year: 2008
Title of anthology: Final report ecoinvent data v2.1
Place of publication: Dübendorf, CH
Publisher: Swiss Centre for LCI, Empa - TSL
Volume No: 10
Issue No: 0

## Validation
Proof reading validation: passed; Other validation: none;
