# Treatment, tube collector production effluent, to wastewater treatment, class 2

Dataset: EcoSpold 1, unit process
Functional unit: 1 m3
Category: wastewater treatment / unspecified
Geography: CH
Time period: 2000-01 to 2000-12
Generated by: Gabor Doka
accessRestrictedTo: 0
copyright: true

## General comment
Wastewater purified in a moderatly large municipal wastewater treatment plant (capacity class 2), with an average capacity size of 71100 per-captia-equivalents PCE. \nWastewater contains (in kg/m3): F: 0.000444 (GSD=224.9%);

## Included processes
Infrastructure materials for municipal wastewater treatment plant, transports, dismantling. Land use burdens.

## Technology
Three stage wastewater treatment (mechanical, biological, chemical) including sludge digestion (fermentation) according to the average technology in Switzerland

## Reference product
- Treatment, tube collector production effluent, to wastewater treatment, class 2 [CH]: 1 m3
  SWITZERLAND

## Inputs from technosphere
- Municipal waste incineration plant [CH]: 3.2069e-13 p; lognormal SD95 2.0843
  burden from sludge incineration. Uncertainty calculated from wastewater composition and treatment model
- Transport, freight, rail [RER]: 1.7624e-5 tkm; lognormal SD95 2.4984
  direct wastewater treatment plant burden plus burden from sludge incineration. Uncertainty calculated from wastewater composition and treatment model
- Slag compartment [CH]: 3.1659e-13 p; lognormal SD95 1.4438
  (same comment as for Municipal waste incineration plant)
- Disposal, cement, hydrated, 0% water, to residual material landfill [CH]: 0.00017063 kg; lognormal SD95 1.5179
  (same comment as for Municipal waste incineration plant)
- Slurry spreading, by vacuum tanker [CH]: 2.5894e-6 m3; lognormal SD95 1.1916
  burden from sludge spreading. Uncertainty calculated from wastewater composition and treatment model
- Natural gas, burned in boiler modulating >100kW [RER]: 0.019322 MJ; lognormal SD95 1.1238
  direct wastewater treatment plant burden. Uncertainty calculated from wastewater composition and treatment model
- Chemicals inorganic, at plant [GLO]: 3.93e-8 kg; lognormal SD95 3.694
  (same comment as for Municipal waste incineration plant)
- Wastewater treatment plant, class 2 [CH]: 1.9883e-9 p; lognormal SD95 1
  uncertainty heeded in exchanges of the module
- Disposal, paper, 11.2% water, to municipal incineration [CH]: 0.0155 kg; lognormal SD95 1.07
  (same comment as for Natural gas, burned in boiler modulating >100kW)
- Electricity, low voltage, at grid [CH]: 0.028207 kWh; lognormal SD95 1.1029
  (same comment as for Natural gas, burned in boiler modulating >100kW)
- Process-specific burdens, slag compartment [CH]: 0.00017808 kg; lognormal SD95 1.4438
  (same comment as for Municipal waste incineration plant)
- Hydrochloric acid, 30% in H2O, at plant [RER]: 2.358e-8 kg; lognormal SD95 3.694
  (same comment as for Municipal waste incineration plant)
- Electricity from waste, at municipal waste incineration plant [CH]: 0.00018442 kWh; lognormal SD95 4.5679
  (same comment as for Municipal waste incineration plant)
- Residual material landfill facility [CH]: 3.5547e-13 p; lognormal SD95 1.4495
  (same comment as for Municipal waste incineration plant)
- Light fuel oil, burned in boiler 100kW, non-modulating [CH]: 0.014319 MJ; lognormal SD95 1.1238
  (same comment as for Natural gas, burned in boiler modulating >100kW)
- Process-specific burdens, municipal waste incineration [CH]: 0.0012827 kg; lognormal SD95 2.0843
  (same comment as for Municipal waste incineration plant)
- Iron (III) chloride, 40% in H2O, at plant [CH]: 7.1729e-6 kg; lognormal SD95 3.6918
  (same comment as for Transport, freight, rail)
- Process-specific burdens, residual material landfill [CH]: 0.00017063 kg; lognormal SD95 1.4495
  (same comment as for Municipal waste incineration plant)
- Cement, unspecified, at plant [CH]: 6.8251e-5 kg; lognormal SD95 1.5179
  (same comment as for Municipal waste incineration plant)
- Disposal, plastics, mixture, 15.3% water, to municipal incineration [CH]: 0.0155 kg; lognormal SD95 1.07
  (same comment as for Natural gas, burned in boiler modulating >100kW)
- Heat from waste, at municipal waste incineration plant [CH]: 0.0010758 MJ; lognormal SD95 2.0876
  (same comment as for Municipal waste incineration plant)
- Sewer grid, class 2 [CH]: 1.6832e-7 km; lognormal SD95 1
  uncertainty heeded in exchanges of the module
- Transport, freight, lorry, 16t-32t gross weight, fleet average [CH]: 0.00039658 tkm; lognormal SD95 1.0518
  (same comment as for Transport, freight, rail)

## Emissions to nature
- Heat, waste [emissions to air, high. pop.]: 0.10155 MJ; lognormal SD95 1.1029
  direct wastewater treatment plant emission plus emission from sludge incineration. Uncertainty calculated from wastewater composition and treatment model
- Silver [emissions to water, groundwater, long-term]: 2.8626e-5 kg; lognormal SD95 5.7494
  emission from sludge incineration. Uncertainty calculated from wastewater composition and treatment model
- Tin [emissions to air, high. pop.]: 3.1569e-7 kg; lognormal SD95 5.3043
  direct digester gas emission plus emission from sludge incineration. Uncertainty calculated from wastewater composition and treatment model
- Fluoride [emissions to water, river]: 0.000444 kg; lognormal SD95 4.9374
  sewer overload discharge plus direct wastewater treatment plant emission plus emission from sludge incineration. Uncertainty calculated from wastewater composition and treatment model
- Methane, fossil [emissions to air, high. pop.]: 5.1309e-9 kg; lognormal SD95 2.3676
  (same comment as for Silver)
- Silver [emissions to soil, agricultural]: 2.8643e-5 kg; lognormal SD95 5.1979
  emission from sludge spreading. Uncertainty calculated from wastewater composition and treatment model
- Silver [emissions to water, river]: 2.5943e-5 kg; lognormal SD95 4.8239
  (same comment as for Fluoride)
- Silver [emissions to air, high. pop.]: 5.9004e-10 kg; lognormal SD95 5.5056
  (same comment as for Tin)
- Tin [emissions to water, river]: 0.00027903 kg; lognormal SD95 4.863
  (same comment as for Fluoride)
- Tin [emissions to water, groundwater, long-term]: 0.0001196 kg; lognormal SD95 9.1749
  (same comment as for Silver)
- Carbon monoxide, fossil [emissions to air, high. pop.]: 1.792e-7 kg; lognormal SD95 5.8762
  (same comment as for Silver)
- Tin [emissions to soil, agricultural]: 0.00015005 kg; lognormal SD95 5.1919
  (same comment as for Silver)

## Sources
- Doka G., 2009, 2009 - LCI waste treatment services - Doka, Final report ecoinvent data v2.1, 13, Swiss Centre for LCI, Doka LCA, Duebendorf and St. Gallen, CH
Doka G. (2008) Life Cycle Inventories of Waste Treatment Services. Final report ecoinvent data v2.1. Volume: 13. Issue: 0. Swiss Centre for LCI, Empa - TSL. Dübendorf, CH.
Type: Measurement on site
Source: CD-ROM
First author: Doka G.
Year: 2008
Title of anthology: Final report ecoinvent data v2.1
Place of publication: Dübendorf, CH
Publisher: Swiss Centre for LCI, Empa - TSL
Volume No: 13
Issue No: 0

## Validation
Proof reading validation: passed.; Other validation: none;
