# xxx Electricity mix

Dataset: EcoSpold 1, unit process
Functional unit: 1 kWh
Category: electricity / notMaintained
Geography: CS
Time period: 2000-01 to 2000-12
Production volume: 43 TWh
Share of production covered: 100 %
Generated by: René Itten
accessRestrictedTo: 0
copyright: true

## General comment
Electricity domestic net production and import shares are based on IEA statistics 2008.;

## Included processes
It includes the shares of domestic electricity production by technology and imports from neighbouring countries (production mixes) at the busbar. It does not include transformation, transport nor distribution losses.

## Geography
Data apply to public and self producers in Serbia.

## Technology
No technology description is provided because the dataset just describes the power plant portfolio of the respective country using current (2004) average technology per energy carrier.

## Time period
Time period of statistics used (2008).

## Reference product
- xxx Electricity mix [CS]: 1 kWh
  SERBIA

## Inputs from technosphere
- xxx Electricity, production mix HU [HU]: 0.061968 kWh; lognormal SD95 1.05
  (1,1,1,1,1,1); assumption for imported electricity in Serbia, value: IEA statistics 2008
- Electricity, hydropower, at reservoir power plant, non alpine regions [RER]: 0.035405 kWh; lognormal SD95 1.0511
  (1,1,1,2,1,1); estimated share of reservoir hydropower production in Serbia: 16%
- Electricity, oil, at power plant [CS]: 0.0035432 kWh; lognormal SD95 1.05
  (1,1,1,1,1,1); assumption for petroleum product and fuel oil power production in Serbia, value: IEA statistics 2008
- Electricity, hydropower, at pumped storage power plant [CS]: 0.011646 kWh; lognormal SD95 1.05
  (1,1,1,1,1,1); estimated share of pumped storage production in Serbia: 5%
- Electricity, lignite, at power plant [ENTSO-E]: 0.54714 kWh; lognormal SD95 1.05
  (1,1,1,1,1,1); assumption for lignite power production in Serbia, value: IEA statistics 2008
- xxx Electricity, production mix BG [BG]: 0.082624 kWh; lognormal SD95 1.05
  (1,1,1,1,1,1); assumption for imported electricity in Serbia, value: IEA statistics 2008
- Electricity, hydropower, at run-of-river power plant [RER]: 0.18588 kWh; lognormal SD95 1.0511
  (1,1,1,2,1,1); estimated share of ROR hydropower production in Serbia: 84%
- xxx Electricity, production mix RO [RO]: 0.061968 kWh; lognormal SD95 1.05
  (1,1,1,1,1,1); assumption for imported electricity in Serbia, value: IEA statistics 2008
- Electricity, from natural gas [HU]: 0.0085491 kWh; lognormal SD95 1.0541
  (1,1,1,3,1,1); assumption for natural gas power production in Serbia, value: IEA statistics 2008
- Electricity, industrial gas, at power plant [CENTREL]: 0.0012769 kWh; lognormal SD95 1.0541
  (1,1,1,3,1,1); assumption for industrial, coke and blast furnace gas power production in Serbia, value: IEA statistics 2008

## Sampling procedure
Statistical data

## Sources
- Frischknecht R., Itten R., Flury K., 2012, 2012 - GHG emis. from Swiss elec. mixes - Frischknecht, Project reports, 401, ESU-services Ltd., Uster, CH
Itten, R., Frischknecht, R. (2012) Life Cycle Inventories of electricity mixes. Project reports. Volume: 401. ESU-services Ltd.. Uster, CH.
Type: Separate publication
First author: Itten, R.
Other authors: Frischknecht, R.
Year: 2012
Title of anthology: Project reports
Place of publication: Uster, CH
Publisher: ESU-services Ltd.
Volume No: 401

## Validation
Proof reading validation: automatic validation in Excel; Other validation: Z:\ESU-Docs\Projekte laufend\401 Update Strommix v3.0\EcoSpold\_Europa\[401-electricity-mix-serbia-CS-v1.0.xlsx]X-Process;
