# Natural gas, burned in boiler atm. low-NOx condensing non-modulating <100kW

Dataset: EcoSpold 1, unit process
Functional unit: 1 MJ
Category: heat / gas\furnace
Geography: RER
Time period: 2000-01 to 2000-12
Generated by: Thomas Heck
accessRestrictedTo: 0
copyright: true

## General comment
na;
Synonyms: Brennwerttechnik;

## Included processes
The module includes fuel input from low pressure (CH) network, infrastructure (boiler), emissions to air and water, and electricity needed for operation.; Geography: Emission data extrapolated from Switzerland to Europe (RER).

## Technology
Technology available in mid 1990s.

## Time period
Old emission values (from early 1990s)

## Reference product
- Natural gas, burned in boiler atm. low-NOx condensing non-modulating <100kW [RER]: 1 MJ
  Europe

## Inputs from technosphere
- Electricity, low voltage, production ENTSO-E, at grid: 0.00556 kWh; lognormal SD95 2
  range of electricity for pumps etc., old information
- Natural gas, low pressure, at consumer [CH]: 1 MJ; lognormal SD95 1.2
  CH module used for RER
- xxx Gas boiler [RER]: 6.6e-7 p; lognormal SD95 1.5
  uncertainty of life time and extrapolation to range of capacity

## Emissions to nature
- Methane, fossil [emissions to air, high. pop.]: 2e-6 kg; lognormal SD95 8
  rough estimate, high uncertainty
- PAH, polycyclic aromatic hydrocarbons [emissions to air, high. pop.]: 1e-8 kg; lognormal SD95 8
  rough estimate, high uncertainty
- Propane [emissions to air, high. pop.]: 2e-7 kg; lognormal SD95 8
  rough estimate, high uncertainty
- Particulates, < 2.5 um [emissions to air, high. pop.]: 1e-7 kg; lognormal SD95 2
  literature
- Dioxin, 2,3,7,8 Tetrachlorodibenzo-p- [emissions to air, high. pop.]: 3e-17 kg; lognormal SD95 8
  rough estimate, high uncertainty
- Pentane [emissions to air, high. pop.]: 1.2e-6 kg; lognormal SD95 8
  rough estimate, high uncertainty
- Mercury [emissions to air, high. pop.]: 3e-11 kg; lognormal SD95 5
  trace element in natural gas
- Acetic acid [emissions to air, high. pop.]: 1.5e-7 kg; lognormal SD95 8
  rough estimate, high uncertainty
- Benzene [emissions to air, high. pop.]: 4e-7 kg; lognormal SD95 8
  rough estimate, high uncertainty
- Butane [emissions to air, high. pop.]: 7e-7 kg; lognormal SD95 8
  rough estimate, high uncertainty
- Toluene [emissions to air, high. pop.]: 2e-7 kg; lognormal SD95 8
  rough estimate, high uncertainty
- Nitrite [emissions to water, river]: 3e-9 kg; lognormal SD95 3
  literature, range of values
- Formaldehyde [emissions to air, high. pop.]: 1e-7 kg; lognormal SD95 8
  rough estimate, high uncertainty
- Sulfate [emissions to water, river]: 5e-8 kg; lognormal SD95 3
  literature, range of values
- Sulfur dioxide [emissions to air, high. pop.]: 5e-7 kg; lognormal SD95 1.1
  composition of natural gas
- Sulfite [emissions to water, river]: 5e-8 kg; lognormal SD95 3
  literature, range of values
- Carbon monoxide, fossil [emissions to air, high. pop.]: 3e-5 kg; lognormal SD95 5
  old data
- Propionic acid [emissions to air, high. pop.]: 2e-8 kg; lognormal SD95 8
  rough estimate, high uncertainty
- Heat, waste [emissions to air, high. pop.]: 1.11 MJ; lognormal SD95 1
  uncertainty of operation supply energy and heating value
- Nitrate [emissions to water, river]: 1.3e-7 kg; lognormal SD95 3
  literature, range of values
- Dinitrogen monoxide [emissions to air, high. pop.]: 5e-7 kg; lognormal SD95 8
  rough estimate, high uncertainty
- Benzo(a)pyrene [emissions to air, high. pop.]: 1e-11 kg; lognormal SD95 8
  rough estimate, high uncertainty
- Nitrogen oxides [emissions to air, high. pop.]: 2e-5 kg; lognormal SD95 3
  old data
- Acetaldehyde [emissions to air, high. pop.]: 1e-9 kg; lognormal SD95 8
  rough estimate, high uncertainty
- Carbon dioxide, fossil [emissions to air, high. pop.]: 0.056 kg; lognormal SD95 1.1
  composition of natural gas

## Sampling procedure
Literature

## Extrapolations
see Geography

## Sources
- Faist Emmenegger M., Heck T., Jungbluth N., Tuchschmid M., 2007, 2007 - Natural gas - Faist-Emmeneger, Sachbilanzen von Energiesystemen. Final report No. 6 ecoinvent data v2.0, 6, Swiss Centre for LCI, PSI, ESU-services Ltd., Duebendorf and Villigen, CH
Faist Emmenegger, M., Heck, T., Jungbluth, N. (2007) Erdgas. Sachbilanzen von Energiesystemen. Final report No. 6 ecoinvent data v2.0. Editors: Dones R.. Volume: 6. Swiss Centre for LCI, PSI. Dübendorf and Villigen, CH.
Type: Measurement on site
Source: CD-ROM
First author: Faist Emmenegger, M.
Other authors: Heck, T., Jungbluth, N.
Year: 2007
Name of editors: Dones R.
Title of anthology: Sachbilanzen von Energiesystemen. Final report No. 6 ecoinvent data v2.0
Place of publication: Dübendorf and Villigen, CH
Publisher: Swiss Centre for LCI, PSI
Volume No: 6

## Validation
Proof reading validation: Preliminary passed, based on a review of a first draft of the final report. Data have to be validated again after review of the written report.; Other validation: none;
