# EKG I, sanitary facilities, residental building, construction

Dataset: EcoSpold 1, unit process, infrastructure
Functional unit: 1 m2
Category: construction processes / buildings
Geography: CH
Time period: 2013-01 to 2013-12
Share of production covered: 0 %
Generated by: Rolf Frischknecht
accessRestrictedTo: 0
copyright: true

## General comment
Sanitäranlagen Wohnen;

## Included processes
This data set includes the material use for the manufacturing of the sanitary installations in the residental building according to Klingler and Kasser, 2011. The warm water production is not part of this data set. A washing machine and dryer are included. No kitchen equipment other than the sink are considered. 4 newly constructed multi-familiy residental buildings. The sanitary system has a life-span of 30 years. Transport is included. The average energy reference area ist 1293 m2.

## Geography
Data for Zurich, Switzerland

## Technology
Average technology

## Reference product
- EKG I, sanitary facilities, residental building, construction [CH]: 1 m2
  SWITZERLAND

## Inputs from technosphere
- Deep drawing, steel, 10000 kN press, automode operation [RER]: 1.146 kg; lognormal SD95 1.115
  (1,1,1,3,1,4,BU:1.05); Average data from 4 residental buildings; Klingler and Kasser, 2011, Graue Energie von Sanitär- und Elektroanlagen
- Drawing of pipes, steel [RER]: 0.1735 kg; lognormal SD95 1.115
  (same comment as for Deep drawing, steel, 10000 kN press, automode operation)
- Zinc coating, pieces [RER]: 0.0053055 m2; lognormal SD95 1.115
  (same comment as for Deep drawing, steel, 10000 kN press, automode operation)
- Rock wool, at plant [CH]: 0.056364 kg; lognormal SD95 1.115
  (same comment as for Deep drawing, steel, 10000 kN press, automode operation)
- Enamelling [RER]: 0.040164 m2; lognormal SD95 1.115
  (same comment as for Deep drawing, steel, 10000 kN press, automode operation)
- Extrusion, plastic pipes [RER]: 0.376, 0.21082 kg (2 entries); lognormal SD95 1.115
  (same comment as for Deep drawing, steel, 10000 kN press, automode operation)
- Chromium steel 18/8, at plant [RER]: 0.017466 kg; lognormal SD95 1.115
  (same comment as for Deep drawing, steel, 10000 kN press, automode operation)
- Barite, at plant [RER]: 0.033939 kg; lognormal SD95 1.115
  (same comment as for Deep drawing, steel, 10000 kN press, automode operation)
- Polyurethane, rigid foam, at plant [RER]: 0.082683 kg; lognormal SD95 1.115
  (same comment as for Deep drawing, steel, 10000 kN press, automode operation)
- Steel, electric, chromium steel 18/8, at plant [RER]: 0.12145 kg; lognormal SD95 1.115
  (same comment as for Deep drawing, steel, 10000 kN press, automode operation)
- Glass fibre reinforced plastic, polyamide, injection moulding, at plant [RER]: 0.0017934 kg; lognormal SD95 1.115
  (same comment as for Deep drawing, steel, 10000 kN press, automode operation)
- Polyvinylchloride, at regional storage [RER]: 0.033659 kg; lognormal SD95 1.115
  (same comment as for Deep drawing, steel, 10000 kN press, automode operation)
- Chemicals inorganic, at plant [GLO]: 0.0056175 kg; lognormal SD95 1.115
  (same comment as for Deep drawing, steel, 10000 kN press, automode operation)
- Aluminium, production mix, at plant [RER]: 0.049819 kg; lognormal SD95 1.115
  (same comment as for Deep drawing, steel, 10000 kN press, automode operation)
- Casting, brass [CH]: 0.097142 kg; lognormal SD95 1.115
  (same comment as for Deep drawing, steel, 10000 kN press, automode operation)
- Acrylonitrile-butadiene-styrene copolymer, ABS, at plant [RER]: 0.04554 kg; lognormal SD95 1.115
  (same comment as for Deep drawing, steel, 10000 kN press, automode operation)
- Polyethylene, HDPE, granulate, at plant [RER]: 0.25738 kg; lognormal SD95 1.115
  (same comment as for Deep drawing, steel, 10000 kN press, automode operation)
- Polypropylene, granulate, at plant [RER]: 0.0052219 kg; lognormal SD95 1.115
  (same comment as for Deep drawing, steel, 10000 kN press, automode operation)
- Steel, low-alloyed, at plant [RER]: 1.3568 kg; lognormal SD95 1.115
  (same comment as for Deep drawing, steel, 10000 kN press, automode operation)
- Transport, freight, rail, electricity with shunting [CH]: 0.5888 tkm; lognormal SD95 2.0137
  (1,1,1,3,1,4,BU:2); Average data from 4 residental buildings; Klingler and Kasser, 2011, Graue Energie von Sanitär- und Elektroanlagen
- Flat glass, coated, at plant [RER]: 0.077789 kg; lognormal SD95 1.115
  (same comment as for Deep drawing, steel, 10000 kN press, automode operation)
- Polyethylene, LDPE, granulate, at plant [RER]: 0.0014939 kg; lognormal SD95 1.115
  (same comment as for Deep drawing, steel, 10000 kN press, automode operation)
- Transport, freight, lorry, fleet average [RER]: 0.29456 tkm; lognormal SD95 2.0137
  (same comment as for Transport, freight, rail, electricity with shunting)
- Sanitary ceramics, at regional storage [CH]: 0.5438 kg; lognormal SD95 1.115
  (same comment as for Deep drawing, steel, 10000 kN press, automode operation)
- Extrusion, plastic film [RER]: 0.032249 kg; lognormal SD95 1.115
  (same comment as for Deep drawing, steel, 10000 kN press, automode operation)
- Polybutadiene, at plant [RER]: 0.0066563 kg; lognormal SD95 1.115
  (same comment as for Deep drawing, steel, 10000 kN press, automode operation)
- Synthetic rubber, at plant [RER]: 0.019564 kg; lognormal SD95 1.115
  (same comment as for Deep drawing, steel, 10000 kN press, automode operation)
- Steel, converter, chromium steel 18/8, at plant [RER]: 0.052024 kg; lognormal SD95 1.115
  (same comment as for Deep drawing, steel, 10000 kN press, automode operation)
- Zinc, primary, at regional storage [RER]: 0.004593 kg; lognormal SD95 1.115
  (same comment as for Deep drawing, steel, 10000 kN press, automode operation)
- Brass, at plant [CH]: 0.097142 kg; lognormal SD95 1.115
  (same comment as for Deep drawing, steel, 10000 kN press, automode operation)
- Washing machine, at retailer [CH]: 0.0066218 p; lognormal SD95 1.115
  (same comment as for Deep drawing, steel, 10000 kN press, automode operation)
- Section bar extrusion, aluminium [RER]: 0.0032637 kg; lognormal SD95 1.115
  (same comment as for Deep drawing, steel, 10000 kN press, automode operation)
- Chromium steel product manufacturing, average metal working [RER]: 0.017466 kg; lognormal SD95 1.115
  (same comment as for Deep drawing, steel, 10000 kN press, automode operation)
- Polystyrene foam slab, at plant [RER]: 0.01313 kg; lognormal SD95 1.115
  (same comment as for Deep drawing, steel, 10000 kN press, automode operation)
- Hot rolling, steel [RER]: 0.1735 kg; lognormal SD95 1.115
  (same comment as for Deep drawing, steel, 10000 kN press, automode operation)
- Sheet rolling, aluminium [RER]: 0.046556 kg; lognormal SD95 1.115
  (same comment as for Deep drawing, steel, 10000 kN press, automode operation)
- Powder coating, steel [RER]: 0.004125 m2; lognormal SD95 1.115
  (same comment as for Deep drawing, steel, 10000 kN press, automode operation)
- Anodising, aluminium sheet [RER]: 0.038703 m2; lognormal SD95 1.115
  (same comment as for Deep drawing, steel, 10000 kN press, automode operation)

## Sources
- Klingler M., Kasser U., 2011, 2011 - Grey energy sanitary and elec. systems - Klingler, Project report, Buero fuer Umweltchemie, Zuerich, CH
Klingler, Kasser (2011) Graue Energie von Sanitär- und Elektroanlagen. Project report. Page: 100. BfE. BfE.
Type: Separate publication
Source: Report
First author: Klingler
Other authors: Kasser
Year: 2011
Title of anthology: Project report
Place of publication: BfE
Publisher: BfE

## Validation
Proof reading validation: 12.11.2013; Other validation: \\Server\E\ESU-Docs\Projekte laufend\494 IEA Annex 57\EcoSpold\Haustechnik\[494_ecospold_Sanitär_Elektro_v0.4.xlsx]X-Process;
