# Printed board assembly, at plant

Dataset: EcoSpold 1, unit process
Functional unit: 1 m2
Category: electronics / production of components
Geography: RER
Share of production covered: 0 %
Generated by: Mireille Faist Emmenegger
accessRestrictedTo: 0
copyright: true

## General comment
This data is based on confidential data from a company. Data relates to 1 m2 surface printed board. It doesn't depend on the number of layers of the printed wiring board.;

## Included processes
This data describes the requirements for the assembly of printed wiring boards. It includes the screenprinter, chipshooter, and reflow oven.

## Technology
Fabrication of multilayer printed wiring board

## Time period
Period of company data.

## Reference product
- Printed board assembly, at plant [RER]: 1 m2
  Europe

## Inputs from technosphere
- Silver, at regional storage [RER]: 0.0020606 kg; lognormal SD95 1.2226
- Transport, freight, rail [RER]: 0.14255 tkm; lognormal SD95 2.095
- Transport, freight, lorry, fleet average [RER]: 0.035019 tkm; lognormal SD95 2.095
- Lead, at regional storage [RER]: 0.037091 kg; lognormal SD95 1.2226
- Isopropanol, at plant [RER]: 0.18194 kg; lognormal SD95 1.2226
- Tin, at regional storage [RER]: 0.063879 kg; lognormal SD95 1.2226
- Electricity, medium voltage, production ENTSO-E, at grid: 23.158 kWh; lognormal SD95 1.2226
- Disposal, solvents mixture, 16.5% water, to hazardous waste incineration [CH]: 0.020194 kg; lognormal SD95 1.2229

## Emissions to nature
- Heat, waste [emissions to air, low. pop.]: 83.368 MJ; lognormal SD95 1.2226
- NMVOC, non-methane volatile organic compounds, unspecified origin [emissions to air, low. pop.]: 0.18194 kg; lognormal SD95 2.0545
- Formaldehyde [emissions to air, low. pop.]: 0.00036364 kg; lognormal SD95 2.0545

## Sources
- Hischier R., Classen M., Lehmann M., Scharnhorst W., 2007, 2007 - LCI electric and electronic equipment - Hischier, 0, 0, Swiss Centre for LCI, Empa - TSL, Duebendorf and St. Gallen, CH
Faist Emmenegger M., Jungbluth N., Frischknecht R. (2004) Life Cycle Inventories. Project reports. Volume: 0. ESU-services. Uster, CH.

## Validation
Proof reading validation: 1; Other validation: none;
