# Fuel tank, compressed natural gas, 200 bar

Dataset: EcoSpold 1, unit process
Functional unit: 1 kg
Category: transport systems / road\Vehicle components\Energy storage\CNG tank
Geography: RER
Time period: 2020-01 to 2020-12
Generated by: Romain Sacchi
accessRestrictedTo: 0
copyright: False

## General comment
200bar, 80kg CNG tank made of steel and fiberglass for automotive applications. Original source: Daniele Candelaresi, Antonio Valente, Diego Iribarren, Javier Dufour, Giuseppe Spazzafumo, Comparative life cycle assessment of hydrogen-fuelled passenger cars, International Journal of Hydrogen Energy, 2021, ISSN 0360-3199, https://doi.org/10.1016/j.ijhydene.2021.01.034..

## Time period
Base technology year of 2020

## Reference product
- Fuel tank, compressed natural gas, 200 bar [RER]: 1 kg

## Inputs from technosphere
All rows: lognormal SD95 1.09366
- Chromium steel product manufacturing, average metal working [RER]: 0.875 kg
  Uncertainty from pedigree matrix: (2, 3, 2, 1, 1, 3)
- Chromium steel 18/8, at plant [RER]: 0.875 kg
  Uncertainty from pedigree matrix: (2, 3, 2, 1, 1, 3)
- Epoxy resin, liquid, at plant [RER]: 0.075 kg
  Uncertainty from pedigree matrix: (2, 3, 2, 1, 1, 3)
- Glass fibre, at plant [RER]: 0.05 kg
  Uncertainty from pedigree matrix: (2, 3, 2, 1, 1, 3)
- Transport, freight, rail [RER]: 0.22 tkm
  Uncertainty from pedigree matrix: (2, 3, 2, 1, 1, 3)
- Transport, freight, lorry, 16t-32t gross weight, fleet average [RER]: 0.1 tkm
  Uncertainty from pedigree matrix: (2, 3, 2, 1, 1, 3)

## Sources
- Sacchi R., Bauer C., 2023, 2023 - LCI on-road vehicles - Sacchi, PSI, Villigen, CH
doi: 10.5281/ZENODO.5156043
