# Gold, at refinery

Dataset: EcoSpold 1, unit process
Functional unit: 1 kg
Category: metals / non ferro
Geography: US
Time period: 2002-01 to 2006-12
Production volume: 183.34 t gold
Generated by: Matthias Tuchschmid
accessRestrictedTo: 0
copyright: true

## General comment
This data set describes the beneficiation, concentration and refinement of gold.;
CAS number: 007440-57-5;

## Included processes
This data set describes the mining of gold concentrate in United States. It includes energy and water consumption, land use, transports, waste disposal as well as emissions to air and water.

## Geography
Material requirements for gold concentration are estimated with Australian data, emissions to water and air are estimated with Australian data

## Technology
The mining of ore from open pit and underground mines is considered.

## Time period
Period of public environmental report

## Reference product
- Gold, at refinery [US]: 1 kg
  UNITED STATES

## Inputs from technosphere
- Transport, freight, lorry, fleet average [RER]: 1.7597 tkm; lognormal SD95 2.2395
  (5,3,1,3,1,3); Estimations
- Blasting [RER]: 184.38 kg; lognormal SD95 1.1358
  (1,3,1,5,1,3); Environmental report
- Diesel, burned in building machine, average [CH]: 74214 MJ; lognormal SD95 1.1639
  (3,4,1,2,1,3); Environmental report
- Transport, freight, lorry, 3.5t gross weight, fleet average [RER]: 1.7597 tkm; lognormal SD95 2.0297
  (3,4,1,2,1,3); Environmental report
- Sodium cyanide, at plant [RER]: 51.781 kg; lognormal SD95 1.1376
  (3,3,1,3,1,3); Environmental report
- Heavy fuel oil, burned in industrial furnace 1MW, non-modulating [RER]: 739.57 MJ; lognormal SD95 1.1639
  (3,4,1,2,1,3); Environmental report
- Facilities precious metal refinery [SE]: 1.6461e-7 p; lognormal SD95 3.0519
  (1,3,1,1,3,3); Annual report
- Sodium hydroxide, 50% in H2O, production mix, at plant [RER]: 6.7633 kg; lognormal SD95 1.1739
  (3,3,3,3,1,3); Calculation, based on thesis on Australian precious metal production, data for 1999
- Diesel, burned in diesel-electric generating set [GLO]: 23925 MJ; lognormal SD95 1.1639
  (3,4,1,2,1,3); Environmental report
- Charcoal, at plant [GLO]: 16.968 kg; lognormal SD95 1.1728
  (3,3,3,2,1,3); Calculation, based on thesis on Australian precious metal production, data for 1999
- Hydrochloric acid, 30% in H2O, at plant [RER]: 203.66 kg; lognormal SD95 1.1376
  (3,3,1,3,1,3); Environmental report
- Sulphuric acid, liquid, at plant [RER]: 196.33 kg; lognormal SD95 1.1376
  (3,3,1,3,1,3); Environmental report
- Electricity, medium voltage, at grid [US]: 9755.3 kWh; lognormal SD95 1.291
  (3,4,1,5,3,3); Environmental report
- Zinc, primary, at regional storage [RER]: 2.8946 kg; lognormal SD95 1.1739
  (same comment as for Sodium hydroxide, 50% in H2O, production mix, at plant)
- Disposal, sulfidic tailings, off-site [GLO]: 1.9176e6 kg; lognormal SD95 1.1363
  (3,3,1,2,1,3); Environmental report
- Limestone, milled, packed, at plant [CH]: 1136.7 kg; lognormal SD95 1.1724
  (3,3,1,5,1,3); Environmental report
- Mine, gold [US]: 1.0908e-7 p; lognormal SD95 3.0519
  (1,3,1,1,3,3); Annual report

## Inputs from nature
- Water, river [resources, in water]: 174.23 m3; lognormal SD95 1.1358
  (3,3,1,1,1,3); Environmental report
- Water, well [resources, in water]: 0.55085 m3; lognormal SD95 1.1358
  (3,3,1,1,1,3); Environmental report
- Gold [resources, in ground]: 1.1364 kg; lognormal SD95 1.1358
  (3,3,1,1,1,3); Environmental report

## Emissions to nature
- Selenium [emissions to air, low. pop.]: 0.15375 kg; lognormal SD95 5.0357
  (3,3,1,5,1,3); Calculation, based on Australian data
- Copper [emissions to water, river]: 0.43703 kg; lognormal SD95 3.0313
  (3,3,1,5,1,3); Calculation, based on Australian data
- Arsenic [emissions to water, river]: 0.053478 kg; lognormal SD95 5.0357
  (3,3,1,5,1,3); Calculation, based on Australian data
- Lead [emissions to air, low. pop.]: 0.020826 kg; lognormal SD95 5.032
  (3,4,1,1,1,3); Environmental report
- Cadmium [emissions to water, river]: 0.024081 kg; lognormal SD95 3.0313
  (3,3,1,5,1,3); Calculation, based on Australian data
- Antimony [emissions to air, low. pop.]: 0.60396 kg; lognormal SD95 5.032
  (3,4,1,1,1,3); Environmental report
- Cobalt [emissions to air, low. pop.]: 0.00837 kg; lognormal SD95 5.0357
  (3,3,1,5,1,3); Calculation, based on Australian data
- Mercury [emissions to water, river]: 0.026757 kg; lognormal SD95 5.0357
  (3,3,1,5,1,3); Calculation, based on Australian data
- Lead [emissions to water, river]: 1.4716 kg; lognormal SD95 5.0357
  (3,3,1,5,1,3); Calculation, based on Australian data
- Cadmium [emissions to air, low. pop.]: 0.0002956 kg; lognormal SD95 5.0357
  (3,3,1,5,1,3); Calculation, based on Australian data
- Nickel [emissions to water, river]: 0.24081 kg; lognormal SD95 5.0357
  (3,3,1,5,1,3); Calculation, based on Australian data
- Chromium [emissions to air, low. pop.]: 0.048311 kg; lognormal SD95 5.0357
  (3,3,1,5,1,3); Calculation, based on Australian data
- Heat, waste [emissions to air, low. pop.]: 35119 MJ; lognormal SD95 1.2226
  (4,3,1,1,1,3); Calculation
- Cyanide [emissions to water, river]: 0.71352 kg; lognormal SD95 3.0313
  (3,3,1,5,1,3); Calculation, based on Australian data
- Arsenic [emissions to air, low. pop.]: 0.020826 kg; lognormal SD95 5.032
  (3,4,1,1,1,3); Environmental report
- Carbon dioxide, fossil [emissions to air, low. pop.]: 76.308 kg; lognormal SD95 1.1358
  (3,3,1,1,1,3); Environmental report
- Beryllium [emissions to air, low. pop.]: 0.0055795 kg; lognormal SD95 5.0357
  (3,3,1,5,1,3); Calculation, based on Australian data
- Zinc [emissions to water, river]: 2.6757 kg; lognormal SD95 5.0357
  (3,3,1,5,1,3); Calculation, based on Australian data
- Manganese [emissions to air, low. pop.]: 0.26167 kg; lognormal SD95 5.0357
  (3,3,1,5,1,3); Calculation, based on Australian data
- Mercury [emissions to air, low. pop.]: 0.0032239 kg; lognormal SD95 5.032
  (3,4,1,1,1,3); Environmental report
- Water [emissions to water, unspecified]: 165518, 495.765 kg (2 entries); lognormal SD95 2.5196
  (5,5,5,5,5,BU:1.05); All uncertainty-values set to 5.0 by default. Balance of input water

## Sampling procedure
environmental report

## Extrapolations
See Geography, several values have been scaled from one mine

## Sources
- Classen M., Althaus H.-J., Blaser S., Scharnhorst W., Tuchschmid M., Jungbluth N., Faist Emmenegger M., 2009, 2009 - LCI metals - Classen, Final report ecoinvent data v2.1, 10, Swiss Centre for LCI, Empa, ESU-services Ltd., Duebendorf, CH
Classen M., Althaus H.-J., Blaser S., Doka G., Jungbluth N., Tuchschmid M. (2008) Life Cycle Inventories of Metals. Final report ecoinvent data v2.1. Volume: 10. Issue: 0. Swiss Centre for LCI, Empa - TSL. Dübendorf, CH.
Type: Measurement on site
Source: CD-ROM
First author: Classen M.
Other authors: Althaus H.-J., Blaser S., Doka G., Jungbluth N., Tuchschmid M.
Year: 2008
Title of anthology: Final report ecoinvent data v2.1
Place of publication: Dübendorf, CH
Publisher: Swiss Centre for LCI, Empa - TSL
Volume No: 10
Issue No: 0

## Validation
Proof reading validation: Passed; Other validation: none;
