# Adipic acid, at plant

Dataset: EcoSpold 1, unit process
Functional unit: 1 kg
Category: chemicals / acids (organic)
Geography: RER
Time period: 2000-01 to 2000-12
Production volume: 2.2 million tons per year
Generated by: Hans-Joerg Althaus
accessRestrictedTo: 0
copyright: true

## General comment
Theoretical data from process analysis. Only the most important flows are taken into account. Energy demand is estimated. More than 80% of the total production is by this process.;
CAS number: 000124-04-9;
Formula: C6H10O4;
Synonyms: Hexandisäure;

## Included processes
production including refining (to 99%).

## Technology
Nitric acid oxidation of cyclohexanol / cyclohexanone mixture (2:1) to adipic acid. Abatement of N2O emissions is assumed to reduce the emissions by 80%.

## Reference product
- Adipic acid, at plant [RER]: 1 kg
  Europe

## Inputs from technosphere
- Electricity, medium voltage, production ENTSO-E, at grid: 1.06 kWh; lognormal SD95 1.38
  (4,5,2,3,1,5)
- Nitric acid, 50% in H2O, at plant [RER]: 0.431 kg; lognormal SD95 1.45
  (4,2,4,2,3,5)
- Transport, freight, rail [RER]: 0.708 tkm; lognormal SD95 3.22
  (5,5,5,5,5,5)
- Cyclohexanol, at plant [RER]: 0.749 kg; lognormal SD95 1.45
  (4,2,4,2,3,5)
- Transport, freight, lorry, fleet average [RER]: 0.118 tkm; lognormal SD95 3.22
  (5,5,5,5,5,5)
- Chemical plant, organics [RER]: 4e-10 p; lognormal SD95 4.25
  (5,5,5,5,5,5)
- Heat, unspecific, in chemical plant [RER]: 31.3 MJ; lognormal SD95 1.38
  (4,5,2,3,1,5)

## Inputs from nature
- Water, cooling, unspecified natural origin/m3 [resources, in water]: 0.01 m3; lognormal SD95 2.56
  (5,5,5,5,5,5)

## Emissions to nature
- Dinitrogen monoxide [emissions to air, unspecified]: 0.0602 kg; lognormal SD95 1.73
  (4,2,4,2,3,5)
- Heat, waste [emissions to air, unspecified]: 0.00286 MJ; lognormal SD95 1.38
  (4,5,2,3,1,5)
- Water [emissions to water, unspecified]: 9.5 kg; lognormal SD95 2.5196
  (5,5,5,5,5,BU:1.05); All uncertainty-values set to 5.0 by default. Balance of input water

## Sampling procedure
theoretical model

## Sources
- Althaus H.-J., Chudacoff M., Hellweg S., Hischier R., Jungbluth N., Osses M., Primas A., 2007, 2007 - LCI chemicals - Althaus, Final report ecoinvent data v2.0, 8, Swiss Centre for LCI, Empa - TSL, ETH, ESU-services Ltd., Chudacoff Oekoscience, Duebendorf, CH
Althaus H.-J., Chudacoff M., Hischier R., Jungbluth N., Osses M., Primas A. (2007) Life Cycle Inventories of Chemicals. Final report ecoinvent data v2.0. Volume: 8. Swiss Centre for LCI, Empa - TSL. Dübendorf, CH.
Type: Measurement on site
Source: CD-ROM
First author: Althaus H.-J.
Other authors: Chudacoff M., Hischier R., Jungbluth N., Osses M., Primas A.
Year: 2007
Title of anthology: Final report ecoinvent data v2.0
Place of publication: Dübendorf, CH
Publisher: Swiss Centre for LCI, Empa - TSL
Volume No: 8

## Validation
Proof reading validation: passed; Other validation: none;
