# Photovoltaic laminate, CdTe, mix, at regional storage

Dataset: EcoSpold 1, unit process, infrastructure
Functional unit: 1 m2
Category: photovoltaic / production of components
Geography: RER
Time period: 2018-01 to 2018-12
Production volume: 2600 MW total production by First Solar in 2018.
Share of production covered: 0 %
Generated by: Philippe Stolz
accessRestrictedTo: 0
copyright: true

## General comment
Estimation for photovoltaic CdTe modules used in Europe. Mix of First Solar Series 4 and Series 6 modules produced in Malaysia and the US.;
Synonyms: Solarmodul, PV-module, cadmium telluride, thin film;

## Included processes
Production mix for use in Europe. Transport of modules from overseas.

## Time period
Data refer to 2018.

## Reference product
- Photovoltaic laminate, CdTe, mix, at regional storage [RER]: 1 m2
  Europe

## Inputs from technosphere
- Transport, transoceanic freight ship [OCE]: 217.66 tkm; lognormal SD95 2.095
  (4,5,na,na,na,na); Import of modules from the US 6469 km, from Malaysia 14783 km
- Photovoltaic laminate, CdTe, First Solar Series 6, at plant [MY]: 0.11873 m2; lognormal SD95 3.0033
  (1,1,1,1,1,3); CdTe module import from Malaysia
- Photovoltaic laminate, CdTe, First Solar Series 4, at plant [MY]: 0.75174 m2; lognormal SD95 3.0033
  (1,1,1,1,1,3); CdTe module import from Malaysia
- Photovoltaic laminate, CdTe, First Solar Series 6, at plant [US]: 0.075097 m2; lognormal SD95 3.0033
  (1,1,1,1,1,3); CdTe module import from US
- Transport, freight, lorry, fleet average [RER]: 15.552 tkm; lognormal SD95 2.095
  (4,5,na,na,na,na); Average transport distance from Rotterdam to Europe is 943 km
- Photovoltaic laminate, CdTe, First Solar Series 4, at plant [US]: 0.054435 m2; lognormal SD95 3.0033
  (1,1,1,1,1,3); CdTe module import from US

## Sampling procedure
Producer information

## Sources
- Frischknecht R., Itten R., Sinha P., de Wild-Scholten M., Zhank J., 2020, 2015 - LCI and LCA photovoltaic systems - Frischknecht, Project report, 174, IEA PVPS Task 12, Petten, NL
Frischknecht R.,, Stolz P., Sinha P., de Wild-Scholten M. (2020) Life Cycle Inventories and Life Cycle Assessments of Photovoltaic Systems. Project report. Volume: 174. IEA PVPS Task 12.
Type: Separate publication
Source: Report
First author: Frischknecht R.,
Other authors: Stolz P., Sinha P., de Wild-Scholten M.
Year: 2020
Title of anthology: Project report
Publisher: IEA PVPS Task 12
Volume No: 174
Original title: Life Cycle Inventories and Life Cycle Assessments of Photovoltaic Systems

## Validation
Proof reading validation: 30.09.2020; Other validation: G:\Projekte laufend\174 Photovoltaic, IEA Task 12\2017 Global supply chain\EcoSpold\[174-photovoltaics-global-supply-chain-v2.5.xlsx]X-Process;
