# Frame extension, particle board, at plant, with resource correction

Dataset: EcoSpold 1, unit process
Functional unit: 1 m2
Category: building components / windows
Geography: CH
Generated by: Livia Ramseier
accessRestrictedTo: 0
copyright: true

## General comment
The frame extension is 0.064m thick, U=0.5W/m2K. 1m2 of frame extension weighs 17.8kg. The bill of materials is based on data from frame extension manufactures.;

## Included processes
Included are the materials used in a frame extension. The cover plate is a coated particle board. Production losses, work materials, packaging materials, energy demand and the transport of the materials are also included.

## Geography
Data apply to the supply in Switzerland.

## Technology
Industry data.

## Time period
Time of publications.

## Reference product
- Frame extension, particle board, at plant, with resource correction [CH]: 1 m2
  SWITZERLAND

## Inputs from technosphere
- Melamine formaldehyde resin, at plant [RER]: 0.26 kg; lognormal SD95 1.1892
  (3,4,1,3,1,4,BU:1.05); coating foil; Average of data from manufacturers
- Transport, freight, rail, electricity with shunting [CH]: 0.16193 tkm; lognormal SD95 2.0397
  (3,4,1,3,1,4,BU:2); transportation to production site; Average of data from manufacturers or Frischknecht et al. 2007
- Heat, natural gas, at boiler condensing modulating 50kW [CH]: 0.0081361 MJ; lognormal SD95 1.1892
  (3,4,1,3,1,4,BU:1.05); natural gas; Average of data from manufacturers
- Chemicals organic, at plant [GLO]: 0.0032684 kg; lognormal SD95 1.1892
  (3,4,1,3,1,4,BU:1.05); cleaning agent; Average of data from manufacturers
- Packaging, corrugated board, mixed fibre, single wall, at plant [CH]: 0.024216 kg; lognormal SD95 1.1892
  (3,4,1,3,1,4,BU:1.05); packaging cardboard; Average of data from manufacturers
- Wood chips, from industry, softwood, burned in furnace 300kW [CH]: 22.422 MJ; lognormal SD95 1.1892
  (3,4,1,3,1,4,BU:1.05); production waste wood for heating; Average of data from manufacturers
- Disposal, polyurethane, 0.2% water, to municipal incineration [CH]: 0.016933 kg; lognormal SD95 1.1892
  (3,4,1,3,1,4,BU:1.05); disposal production waste white glue; Average of data from manufacturers
- Lubricating oil, at plant [RER]: 0.00069749 kg; lognormal SD95 1.1892
  (3,4,1,3,1,4,BU:1.05); lubricating oil; Average of data from manufacturers
- Particleboard, average glue mix, uncoated, at plant [RER]: 0.0014308 m3; lognormal SD95 1.1892
  (3,4,1,3,1,4,BU:1.05); bridge particle board; Average of data from manufacturers
- EUR-flat pallet [RER]: 0.041541 p; lognormal SD95 1.1892
  (3,4,1,3,1,4,BU:1.05); packaging pallets; Average of data from manufacturers
- Sawnwood, lath, softwood, dried (u=10%), planed, at sawmill [CH]: 0.0031581 m3; lognormal SD95 1.1892
  (3,4,1,3,1,4,BU:1.05); bridge sawnwood, lath; Average of data from manufacturers
- Transport, freight, lorry, fleet average [CH]: 15.388 tkm; lognormal SD95 2.0397
  (same comment as for Transport, freight, rail, electricity with shunting)
- Heat, light fuel oil, at boiler 100kW condensing, non-modulating [CH]: 0.017482 MJ; lognormal SD95 1.1892
  (3,4,1,3,1,4,BU:1.05); heat oil; Average of data from manufacturers
- Polyurethane, rigid foam, market mix, at regional storage [CH]: 1.407 kg; lognormal SD95 1.1892
  (3,4,1,3,1,4,BU:1.05); insulation PUR rigid foam; Average of data from manufacturers
- Ammonia, liquid, at regional storehouse [CH]: 6.7238e-5 kg; lognormal SD95 1.1892
  (3,4,1,3,1,4,BU:1.05); ammonia; Average of data from manufacturers
- Chemicals organic, at plant [GLO]: 0.00046257 kg; lognormal SD95 1.1892
  (3,4,1,3,1,4,BU:1.05); other chemicals; Average of data from manufacturers
- Packaging film, LDPE, at plant [RER]: 0.016382 kg; lognormal SD95 1.1892
  (3,4,1,3,1,4,BU:1.05); packaging platics; Average of data from manufacturers
- Disposal, wood particle board, 10% binder, as building waste [CH]: 0.0090667 kg; lognormal SD95 1.1892
  (3,4,1,3,1,4,BU:1.05); disposal production waste bridge particle board; Average of data from manufacturers
- Particleboard, average glue mix, uncoated, at plant [RER]: 0.022684 m3; lognormal SD95 1.1892
  (3,4,1,3,1,4,BU:1.05); particle board; Average of data from manufacturers
- Vinyl acetate, at plant [RER]: 0.3436 kg; lognormal SD95 1.1892
  (3,4,1,3,1,4,BU:1.05); white glue; Average of data from manufacturers
- Disposal, building, polyurethane foam, to final disposal [CH]: 0.079297 kg; lognormal SD95 1.1892
  (3,4,1,3,1,4,BU:1.05); disposal production waste insulation PUR rigid foam; Average of data from manufacturers
- Electricity, medium voltage, at grid [CH]: 8.8862 kWh; lognormal SD95 1.1892
  (3,4,1,3,1,4,BU:1.05); electricity for production ; Average of data from manufacturers
- Tap water, at user [CH]: 0.024173 kg; lognormal SD95 1.1892
  (3,4,1,3,1,4,BU:1.05); water; Average of data from manufacturers
- Disposal, plastics, mixture, 15.3% water, to municipal incineration [CH]: 0.016382 kg; lognormal SD95 1.1892
  (3,4,1,3,1,4,BU:1.05); disposal of packaging plastics; Average of data from manufacturers
- Transport, municipal waste collection, lorry 21t [CH]: 0.011263 tkm; lognormal SD95 1.1892
  (3,4,1,3,1,4,BU:1.05); transportation to municipal incineration ; Frischknecht et al. 2007
- Disposal, wood particle board, 10% binder, as building waste [CH]: 1.0047 kg; lognormal SD95 1.1892
  (3,4,1,3,1,4,BU:1.05); disposal production waste particle board; Average of data from manufacturers
- Diesel, burned in building machine, average [CH]: 0.9404 MJ; lognormal SD95 2.0397
  (3,4,1,3,1,4,BU:2); diesel for forklift; Average of data from manufacturers

## Inputs from nature
- Energy, gross calorific value, in biomass, resource correction [resources, biotic]: -8.92 MJ
  Resource correction

## Sampling procedure
Data survey at frame extenstion manufactures in Switzerland.

## Extrapolations
Some generic datasets from ecoinvent have been used.

## Sources
- Ramseier L., Stolz P., Frischknecht R., 2020, 2020 - LCA wooden windows and doors - Ramseier, Project report, 634, treeze Ltd., Uster, CH
Ramseier L., Stolz P., Frischknecht R. (2020) Ökobilanz von Holzfenstern und Holztüren. Project report. Volume: 634. treeze Ltd.. Uster, CH.
Type: Separate publication
Source: Report
First author: Ramseier L.
Other authors: Stolz P., Frischknecht R.
Year: 2020
Title of anthology: Project report
Place of publication: Uster, CH
Publisher: treeze Ltd.
Volume No: 634

## Validation
Proof reading validation: 16.06.2021; Other validation: G:\Projekte laufend\634 Holzfenster u.-türen, energieSchweiz\EcoSpold\UVEK2021\[634_EcoSpold_R_Verbreiterung_v1.2_UVEK2021-v0.1.xlsx]X-Process;
