# Phosphate rock, as P2O5, beneficiated, dry, at plant

Dataset: EcoSpold 1, unit process
Functional unit: 1 kg
Category: chemicals / inorganic
Geography: MA
Time period: 2000-01 to 2000-12
Production volume: 7.2 Mt as P2O5 in 2000, 21.6 Mt as Rock in 2000
Generated by: Alex Primas
accessRestrictedTo: 0
copyright: true

## General comment
Large uncertainties exist for data on particle emissions from transfer and storage. Also data of emissions to water and soil are uncertain due to missing data of uncontrolled run off and water use which were estimated. Energy consumption data related to mass of rock moved. ;
CAS number: 065996-94-3;
Formula: P2O5;

## Included processes
Mining process, transport to beneficiation plant, dry processing including crushing, screening or washing and flotation.Drying orcalcination of washed rock included. Land use for mining and reclamation.

## Geography
Assumption for production in Morocco based mainly on data from Florida. Some data from Moroccan mines. Various processes with location RER used.

## Technology
U.S. technology for dry rock or dried wet rock processing. Average technology mix modelled. No specific age of technology modelled

## Time period
Time of literature publication. Measurements took place partly before this period.

## Reference product
- Phosphate rock, as P2O5, beneficiated, dry, at plant [MA]: 1 kg
  MOROCCO

## Inputs from technosphere
- Ethylenediamine, at plant [RER]: 0.001 kg; lognormal SD95 2.05
  (3,3,3,5,5,3); Average data from U.S study; proxy used
- Palm oil, at oil mill [MY]: 0.0026 kg; lognormal SD95 2.05
  (3,3,3,5,5,3); Average data from U.S study; proxy used
- Heat, heavy fuel oil, at industrial furnace 1MW [RER]: 0.567 MJ; lognormal SD95 1.55
  2,3,3,5,4,3; Technology-mix estimated, Location RER
- Phosphate rock mine [MA]: 3.03e-11 p; lognormal SD95 3.38
  (4,5,1,5,4,5); Estimated with weak data from 2 sites
- Transport, freight, lorry, fleet average [RER]: 0.00257 tkm; lognormal SD95 2.11
  (4,5,nA,5,nA,nA); Estimated with standard distances for europe
- Transport, transoceanic freight ship [OCE]: 0.0174 tkm; lognormal SD95 2.11
  (4,5,nA,5,nA,nA); Estimated for import from Europe
- Sodium silicate, spray powder 80%, at plant [RER]: 0.0008 kg; lognormal SD95 1.56
  (3,3,3,5,4,3); Average data from U.S study, Location RER
- Transport, freight, rail [RER]: 0.00654 tkm; lognormal SD95 2.11
  (4,5,nA,5,nA,nA); Estimated with standard distances for europe
- Light fuel oil, at regional storage [RER]: 0.0039 kg; lognormal SD95 1.56
  (3,3,3,5,4,3); Average data from U.S study, Location RER
- Diesel, burned in building machine, average [CH]: 0.103 MJ; lognormal SD95 1.26
  (2,3,3,2,3,3); 61% of world production 1994
- Electricity, medium voltage, production ENTSO-E, at grid: 0.15 kWh; lognormal SD95 1.55
  (2,3,3,5,4,3); 61% of world production 1994, European mix
- Soda, powder, at plant [RER]: 0.0026 kg; lognormal SD95 1.56
  (3,3,3,5,4,3); Average data from U.S study, Location RER
- Heat, natural gas, at industrial furnace 1MW [CH]: 0.567 MJ; lognormal SD95 1.55
  (2,3,3,5,4,3); Technology-mix estimated, Location RER
- Sulphuric acid, liquid, at plant [RER]: 0.0039 kg; lognormal SD95 1.56
  (3,3,3,5,4,3); Average data from U.S study, Location RER

## Inputs from nature
- Transformation, to pasture, man made [resources, land]: 0.00072 m2; lognormal SD95 2.56
  (4,5,5,5,4,1); Estimated from data of U.S. mines
- Transformation, from mineral extraction site [resources, land]: 0.00072 m2; lognormal SD95 2.56
  (4,5,5,5,4,1); Estimated from data of U.S. mines
- Water, well [resources, in water]: 0.0038 m3; lognormal SD95 1.64
  (4,5,1,5,4,1); Estimated from data of U.S. mines
- Occupation, construction site [resources, land]: 0.0011 m2a; lognormal SD95 2.13
  (4,5,5,5,4,1); Estimated from data of U.S. mines
- Transformation, from pasture, man made [resources, land]: 0.00072 m2; lognormal SD95 2.56
  (4,5,5,5,4,1); Estimated from data of U.S. mines
- Phosphorus [resources, in ground]: 0.47 kg; lognormal SD95 1.06
  (1,2,1,3,1,1); Data of year 1999 / 2000 from Morocco used
- Transformation, to mineral extraction site [resources, land]: 0.00072 m2; lognormal SD95 2.56
  (4,5,5,5,4,1); Estimated from data of U.S. mines
- Occupation, mineral extraction site [resources, land]: 0.0144 m2a; lognormal SD95 2.13
  (4,5,5,5,4,1); Estimated from data of U.S. mines
- Fluorine, 4.5% in apatite, 3% in crude ore [resources, in ground]: 0.118 kg; lognormal SD95 1.24
  (3,3,4,3,1,1); Data for process loss estimated

## Emissions to nature
- Hydrogen fluoride [emissions to air, low. pop.]: 1.18e-5 kg; lognormal SD95 2.32
  (2,4,5,5,3,4); U.S. data from 1973
- BOD5, Biological Oxygen Demand [emissions to water, river]: 0.000252 kg; lognormal SD95 1.95
  (4,5,3,5,4,5); Calculated from measured data
- Polonium-210 [emissions to air, low. pop.]: 0.00282 kBq; lognormal SD95 3.42
  (4,5,5,5,3,5); Calculated from dust emissions
- Thorium-232 [emissions to air, low. pop.]: 5e-5 kBq; lognormal SD95 3.42
  (4,5,5,5,3,5); Calculated from dust emissions
- DOC, Dissolved Organic Carbon [emissions to water, river]: 1.86e-7 kg; lognormal SD95 1.95
  (4,5,3,5,4,5); Calculated from measured data
- Radium-226 [emissions to air, low. pop.]: 0.00501 kBq; lognormal SD95 3.42
  (4,5,5,5,3,5); Calculated from dust emissions
- Particulates, > 2.5 um, and < 10um [emissions to air, low. pop.]: 0.00092 kg; lognormal SD95 2.39
  (3,5,5,5,3,5); U.S. data from 1970 and data of coal mining
- Suspended solids, unspecified [emissions to water, river]: 8.47e-5 kg; lognormal SD95 1.88
  (3,4,3,5,4,5); Data from 1 U.S. mine (1990) and estimates
- Heat, waste [emissions to air, low. pop.]: 0.54 MJ; lognormal SD95 1.26
  (2,3,3,2,3,3); Calculated from electricity demand
- Radioactive species, alpha emitters [emissions to water, river]: 0.00164 kBq; lognormal SD95 3.32
  (3,4,3,5,4,5); Data from 1 U.S. mine (1990) and estimates
- Fluoride [emissions to water, river]: 1.69e-5 kg; lognormal SD95 1.88
  (3,4,3,5,4,5); Data from 1 U.S. mine (1990) and estimates
- Thorium-230 [emissions to air, low. pop.]: 0.0047 kBq; lognormal SD95 3.42
  (4,5,5,5,3,5); Calculated from dust emissions
- Phosphorus [emissions to water, river]: 3.39e-5 kg; lognormal SD95 1.88
  (3,4,3,5,4,5); Data from 1 U.S. mine (1990) and estimates
- Particulates, > 10 um [emissions to air, low. pop.]: 0.00176 kg; lognormal SD95 1.95
  (3,5,5,5,3,5); U.S. data from 1970 and data of coal mining
- Toluene [emissions to water, river]: 2.03e-7 kg; lognormal SD95 3.32
  (3,4,3,5,4,5); Data from 1 U.S. mine (1990) and estimates
- Nitrogen [emissions to water, river]: 1.32e-5 kg; lognormal SD95 1.88
  (3,4,3,5,4,5); Data from 1 U.S. mine (1990) and estimates
- Carbon dioxide, fossil [emissions to air, low. pop.]: 0.0243 kg; lognormal SD95 1.24
  (2,4,2,1,1,5); Data from 1 mine in Morocco
- COD, Chemical Oxygen Demand [emissions to water, river]: 0.000252 kg; lognormal SD95 1.95
  (4,5,3,5,4,5); Calculated from measured data
- Oils, unspecified [emissions to soil, industrial]: 0.00193 kg; lognormal SD95 2.57
  (5,5,3,5,5,5); Estimation from data of chemical demand
- Lead-210 [emissions to air, low. pop.]: 0.00282 kBq; lognormal SD95 3.42
  (4,5,5,5,3,5); Calculated from dust emissions
- Sulfate [emissions to water, river]: 0.00112 kg; lognormal SD95 1.88
  (3,4,3,5,4,5); Data from 1 U.S. mine (1990) and estimates
- Particulates, < 2.5 um [emissions to air, low. pop.]: 0.00046 kg; lognormal SD95 3.39
  (3,5,5,5,3,5); U.S. data from 1970 and data of coal mining
- Uranium-234 [emissions to air, low. pop.]: 0.0047 kBq; lognormal SD95 3.42
  (4,5,5,5,3,5); Calculated from dust emissions
- TOC, Total Organic Carbon [emissions to water, river]: 6.78e-5 kg; lognormal SD95 1.95
  (4,5,3,5,4,5); Calculated from measured data
- Uranium-238 [emissions to air, low. pop.]: 0.0047 kBq; lognormal SD95 3.42
  (4,5,5,5,3,5); Calculated from dust emissions
- Water [emissions to water, unspecified]: 3.42 kg; lognormal SD95 2.5196
  (5,5,5,5,5,BU:1.05); All uncertainty-values set to 5.0 by default. Balance of input water

## Sampling procedure
Data for emissions and land use based on various studies from Florida. Energy data based on a world-wide survey and some assumptions. Further data from Moroccan studies, literature and estimations.

## Extrapolations
Extrapolation and transformation from U.S. data with help of specific informations from literature on Moroccan mines. No extrapolation for energy data.

## Sources
- Althaus H.-J., Chudacoff M., Hellweg S., Hischier R., Jungbluth N., Osses M., Primas A., 2007, 2007 - LCI chemicals - Althaus, Final report ecoinvent data v2.0, 8, Swiss Centre for LCI, Empa - TSL, ETH, ESU-services Ltd., Chudacoff Oekoscience, Duebendorf, CH
Althaus H.-J., Chudacoff M., Hischier R., Jungbluth N., Osses M., Primas A. (2007) Life Cycle Inventories of Chemicals. Final report ecoinvent data v2.0. Volume: 8. Swiss Centre for LCI, Empa - TSL. Dübendorf, CH.
Type: Measurement on site
Source: CD-ROM
First author: Althaus H.-J.
Other authors: Chudacoff M., Hischier R., Jungbluth N., Osses M., Primas A.
Year: 2007
Title of anthology: Final report ecoinvent data v2.0
Place of publication: Dübendorf, CH
Publisher: Swiss Centre for LCI, Empa - TSL
Volume No: 8

## Validation
Proof reading validation: Passed.; Other validation: none;
