# Disposal, locomotive

Dataset: EcoSpold 1, unit process, infrastructure
Functional unit: 1 p
Category: transport waste / unspecified
Geography: RER
Time period: 2000-01 to 2000-12
Generated by: Michael Spielmann
accessRestrictedTo: 0
copyright: true

## General comment
The data is based on the bulk material composition of the RE 460, a locomotive which is currently used for goods transportation in Switzerland and also in Germany. The life span of the locomotive Re 460 is assumed to be 40 years resulting in a life time performance of 9.6 Mio. kilometres. ;

## Included processes
The inventory includes waste treatment processes for non metal components of a locomotive. For the transport of disposed materials standard distances have been applied.

## Geography
Data represents Swiss and German conditions

## Technology
no technologies are specified

## Time period
Data represents a locomotive currently in operation

## Reference product
- Disposal, locomotive [RER]: 1 p
  Europe

## Inputs from technosphere
- Disposal, polyvinylchloride, 0.2% water, to municipal incineration [CH]: 351 kg; lognormal SD95 1.26
  (3,1,1,3,1,4); material composition locomotive
- Disposal, used mineral oil, 10% water, to hazardous waste incineration [CH]: 3560 kg; lognormal SD95 1.26
  (3,1,1,3,1,4); oral communication
- Transport, freight, lorry, fleet average [RER]: 544 tkm; lognormal SD95 2.28
  (4,5,na,na,na,na); standard distance
- Disposal, emulsion paint, 0% water, to municipal incineration [CH]: 385 kg; lognormal SD95 1.26
  (3,1,1,3,1,4); material composition locomotive
- Disposal, glass, 0% water, to municipal incineration [CH]: 235 kg; lognormal SD95 1.26
  (3,1,1,3,1,4); material composition locomotive
- Disposal, plastics, mixture, 15.3% water, to sanitary landfill [CH]: 6690 kg; lognormal SD95 1.26
  (3,1,1,3,1,4); material composition locomotive

## Sampling procedure
Data based on expert estimate on the material consumption of a locomotive.

## Extrapolations
Data for Switzerland is used as an estimate for Europe

## Sources
- Spielmann M., Bauer C., Dones R., Tuchschmid M., 2007, 2007 - Transport services - Spielmann, Final report ecoinvent Data v2.0, 14, Swiss Centre for LCI, PSI, ESU-services Ltd., Duebendorf, Villigen and Uster, CH
Spielmann M., Dones R; Bauer C. (2007) Life Cycle Inventories of Transport Services. Final report ecoinvent Data v2.0. Volume: 14. Issue: 0. Swiss Centre for LCI, PSI. Dübendorf and Villigen, CH.
Type: Measurement on site
Source: CD-ROM
First author: Spielmann M.
Other authors: Dones R; Bauer C.
Year: 2007
Title of anthology: Final report ecoinvent Data v2.0
Place of publication: Dübendorf and Villigen, CH
Publisher: Swiss Centre for LCI, PSI
Volume No: 14
Issue No: 0

## Validation
Proof reading validation: passed; Other validation: none;
