# Metolachlor, at regional storehouse

Dataset: EcoSpold 1, unit process
Functional unit: 1 kg
Category: chemicals / pesticides
Geography: RER
Time period: 1987-01 to 1987-12
Share of production covered: 100 %
Generated by: Juergen Sutter
accessRestrictedTo: 0
copyright: true

## General comment
Production of metolachlor including materials, energy uses, infrastructure and emissions.;

## Geography
The inventory is modelled for Europe.

## Technology
pesticides

## Time period
Time of publications

## Reference product
- Metolachlor, at regional storehouse [RER]: 1 kg
  Europe

## Inputs from technosphere
- Electricity, medium voltage, production ENTSO-E, at grid: 1.4829 kWh; lognormal SD95 1.3765
  (4,5,1,1,1,5); Estimation
- Sodium hydroxide, 50% in H2O, production mix, at plant [RER]: 0.3269 kg; lognormal SD95 1.3765
  (4,5,1,1,1,5); Stoechiometric calculation
- Ethylene, average, at plant [RER]: 0.1154 kg; lognormal SD95 1.3765
  (4,5,1,1,1,5); Stoechiometric calculation
- Chemical plant, organics [RER]: 2.2021e-9 p; lognormal SD95 3.0909
  (4,5,na,na,na,na); Estimation
- Methanol, at plant [GLO]: 0.29472 kg; lognormal SD95 1.3765
  (4,5,1,1,1,5); Stoechiometric calculation
- Transport, freight, lorry, fleet average [RER]: 0.62282 tkm; lognormal SD95 2.095
  (4,5,na,na,na,na); Standard distances
- Cumene, at plant [RER]: 0.76796 kg; lognormal SD95 1.3765
  (4,5,1,1,1,5); Stoechiometric calculation
- Oxygen, liquid, at plant [RER]: 0.20479 kg; lognormal SD95 1.3765
  (4,5,1,1,1,5); Stoechiometric calculation
- Acetic anhydride, at plant [RER]: 0.26499 kg; lognormal SD95 1.3765
  (4,5,1,1,1,5); Stoechiometric calculation
- Toluene, liquid, at plant [RER]: 0.32813 kg; lognormal SD95 1.3765
  (4,5,1,1,1,5); Stoechiometric calculation
- Nitric acid, 50% in H2O, at plant [RER]: 0.2247 kg; lognormal SD95 1.3765
  (4,5,1,1,1,5); Stoechiometric calculation
- Hydrogen, liquid, at plant [RER]: 0.02816 kg; lognormal SD95 1.3765
  (4,5,1,1,1,5); Stoechiometric calculation
- Transport, freight, rail [RER]: 3.402 tkm; lognormal SD95 2.095
  (4,5,na,na,na,na); Standard distances
- Acetone, liquid, at plant [RER]: 0.10023 kg; lognormal SD95 1.3765
  (4,5,1,1,1,5); Stoechiometric calculation
- Heat, unspecific, in chemical plant [RER]: 12.845 MJ; lognormal SD95 1.3765
  (4,5,1,1,1,5); Estimation
- Chlorine, liquid, production mix, at plant [RER]: 0.62732 kg; lognormal SD95 1.3765
  (4,5,1,1,1,5); Stoechiometric calculation

## Inputs from nature
- Water, cooling, unspecified natural origin/m3 [resources, in water]: 0.13213 m3; lognormal SD95 1.3765
  (4,5,1,1,1,5); Estimation

## Emissions to nature
- Sodium [emissions to water, river]: 0.18797 kg; lognormal SD95 5.1037
  (4,5,na,na,na,na); Estimation
- Chloroacetic acid [emissions to air, high. pop.]: 0.00073608 kg; lognormal SD95 1.6169
  (4,5,na,na,na,na); Estimation
- Acetone [emissions to water, river]: 0.00096221 kg; lognormal SD95 3.0909
  (4,5,na,na,na,na); Estimation
- Hydrogen [emissions to air, high. pop.]: 5.6321e-5 kg; lognormal SD95 1.6169
  (4,5,na,na,na,na); Estimation
- Sulfur [emissions to water, river]: 0.0032971 kg; lognormal SD95 1.6169
  (4,5,na,na,na,na); Estimation
- Carbon dioxide, fossil [emissions to air, high. pop.]: 0.56818 kg; lognormal SD95 1.3001
  (4,5,na,na,na,na); Estimation
- Phenol [emissions to air, high. pop.]: 0.00014538 kg; lognormal SD95 1.6169
  (4,5,na,na,na,na); Estimation
- Chloroacetic acid [emissions to water, river]: 0.19756 kg; lognormal SD95 3.0909
  (4,5,na,na,na,na); Estimation
- Methanol [emissions to water, river]: 0.0014146 kg; lognormal SD95 3.0909
  (4,5,na,na,na,na); Estimation
- Chloride [emissions to water, river]: 0.42562 kg; lognormal SD95 3.0909
  (4,5,na,na,na,na); Estimation
- Toluene [emissions to air, high. pop.]: 0.00065626 kg; lognormal SD95 1.6169
  (4,5,na,na,na,na); Estimation
- Acetic acid [emissions to air, high. pop.]: 6.0139e-5 kg; lognormal SD95 1.6169
  (4,5,na,na,na,na); Estimation
- Ethylene oxide [emissions to water, river]: 0.00055391 kg; lognormal SD95 3.0909
  (4,5,na,na,na,na); Estimation
- Acetic acid [emissions to water, river]: 0.0030009 kg; lognormal SD95 3.0909
  (4,5,na,na,na,na); Estimation
- Toluene [emissions to water, river]: 0.001575 kg; lognormal SD95 3.0909
  (4,5,na,na,na,na); Estimation
- Chlorine [emissions to air, high. pop.]: 0.00014394 kg; lognormal SD95 1.6169
  (4,5,na,na,na,na); Estimation
- Acetone [emissions to air, high. pop.]: 0.00017941 kg; lognormal SD95 1.6169
  (4,5,na,na,na,na); Estimation
- Phenol [emissions to water, river]: 0.00077973 kg; lognormal SD95 3.0909
  (4,5,na,na,na,na); Estimation
- Heat, waste [emissions to air, high. pop.]: 5.3385 MJ; lognormal SD95 1.3765
  (4,5,1,1,1,5); Calculated from the electricity input
- Sulfur dioxide [emissions to air, high. pop.]: 0.25717 kg; lognormal SD95 1.3001
  (4,5,na,na,na,na); Estimation
- Ethene [emissions to air, high. pop.]: 0.0002308 kg; lognormal SD95 1.6169
  (4,5,na,na,na,na); Estimation
- Methanol [emissions to air, high. pop.]: 0.00026377 kg; lognormal SD95 1.6169
  (4,5,na,na,na,na); Estimation
- Nitrate [emissions to water, river]: 0.011057 kg; lognormal SD95 1.6169
  (4,5,na,na,na,na); Estimation
- Water [emissions to water, unspecified]: 125.523 kg; lognormal SD95 2.5196
  (5,5,5,5,5,BU:1.05); All uncertainty-values set to 5.0 by default. Balance of input water

## Sampling procedure
Literature data

## Extrapolations
Transports and emissions are modelled with standard methods.

## Sources
- Nemecek T., Kaegi T., 2007, 2007 - LCI agricultural prod. systems - Nemecek, Ecoinvent report version 2.0, 15, Swiss Centre for LCI, ART, Duebendorf and Zuerich, CH
Nemecek, T., Kägi, T., Blaser, S. (2007) Life Cycle Inventories of Agricultural Production Systems. Ecoinvent report version 2.0. Editors: 0. Volume: 15. Swiss Centre for LCI, ART. Duebendorf and Zurich, CH.
Type: Measurement on site
Source: CD-ROM
First author: Nemecek, T.
Other authors: Kägi, T., Blaser, S.
Year: 2007
Name of editors: 0
Title of anthology: Ecoinvent report version 2.0
Place of publication: Duebendorf and Zurich, CH
Publisher: Swiss Centre for LCI, ART
Volume No: 15

## Validation
Proof reading validation: Passed.; Other validation: none;
