# Transport, freight, rail, electricity with shunting, Betrieb

Dataset: EcoSpold 1, unit process
Functional unit: 1 tkm
Category: transport systems / train
Geography: CH
Time period: 2009-01 to 2015-12
Production volume: 8738.193775 Mio tkm/a
Share of production covered: 100 %
Generated by: Luana Krebs
accessRestrictedTo: 0
copyright: true

## General comment
Inventory refers to the entire transport life cycle. For rail infrastructure, expenditures and environmental interventions due to construction, renewal and disposal of railway tracks have been allocated based on the Gross tonne kilometre performance of freight transport on SBB railway tracks in 2014 ( 20260 Mio. Gtkm). Expenditures due to operation of the rail infrastructure, as well as land use have been allocated based on the yearly train kilometre performance (8615 Mio tkm). For the operation of goods transportation average data for by rail in Switzerland were used. The data has been determined top down, by combining the total yearly energy consumption and the yearly tkm-performance of goods transportation. Electricity and diesel consumption have been updated based on SBB data for the year 2019.;

## Included processes
The inventory includes the actual energy consumption of a goods train in Switzerland using electro energy. In addition also the diesel consumption and emissions of shunting processes, the production and maintenance of vehicles as well as the construction and maintenance of the rail way tracks are accounted for.

## Technology
Average technology

## Time period
Time of publications

## Reference product
- Transport, freight, rail, electricity with shunting, Betrieb [CH]: 1 tkm
  SWITZERLAND

## Inputs from technosphere
- Electricity, medium voltage, SBB, at grid [CH]: 0.039209 kWh; lognormal SD95 1.2077
  (1,1,1,1,1,5,BU:1.05); average electricity consumption of freight transport in CH: 0,39E-3 kWh/tkm (incl. 3.34% losses); Pers. communication SBB, Fabiano Piccinno, Oct. 2020
- Diesel, at regional storage [CH]: 0.00046413 kg; lognormal SD95 1.2077
  (1,1,1,1,1,5,BU:1.05); ; Pers. communication SBB, Fabiano Piccinno, Oct. 2020

## Emissions to nature
- Chromium [emissions to air, unspecified]: 2.3207e-11 kg; lognormal SD95 5.8584
  (3,3,2,5,5,5,BU:5); emission factor of diesel: 5.00E-5 g/kg diesel, assuming a share of 97.7% with particle filter; EMEP/EEA guidebook 2013, 1.A.2.f.ii, Tab. 3-1
- Formaldehyde [emissions to air, unspecified]: 1.9933e-7 kg; lognormal SD95 2.308
  (3,3,2,5,5,5,BU:1.5); emission factor of diesel: 4.29E-1 g/kg diesel, assuming a share of 97.7% with particle filter; BAFU 2015: Non-road database; EMEP/EEA guidebook 2013, Tab. 3-121
- o-Xylene [emissions to air, unspecified]: 9.4917e-9 kg; lognormal SD95 2.308
  (3,3,2,5,5,5,BU:1.5); emission factor of diesel: 2.04E-2 g/kg diesel, assuming a share of 97.7% with particle filter; BAFU 2015: Non-road database; EMEP/EEA guidebook 2013, Tab. 3-120
- Toluene [emissions to air, unspecified]: 2.3729e-10 kg; lognormal SD95 2.308
  (3,3,2,5,5,5,BU:1.5); emission factor of diesel: 5.11E-4 g/kg diesel, assuming a share of 97.7% with particle filter; BAFU 2015: Non-road database; EMEP/EEA guidebook 2013, Tab. 3-118
- Mercury [emissions to air, unspecified]: 2.4599e-12 kg; lognormal SD95 5.8584
  (3,3,2,5,5,5,BU:5); emission factor of diesel: 5.30E-6 g/kg diesel, assuming a share of 97.7% with particle filter; EMEP/EEA guidebook 2013, 1.A.2.f.ii, Tab. 3-1
- Copper [emissions to water, unspecified]: 3.0233e-11 kg; lognormal SD95 3.0986
  (2,3,2,1,3,5,BU:3); ; Data from ANABEL; Personal correspondence Gunter Adolf, SBB, June 2016
- Noise, rail, freight train [non material emissions, unspecified]: 1 tkm; lognormal SD95 2.532
  (3,3,5,5,5,5,BU:1.5); ; Ecological Scarcity method 2013; Frischknecht & Büsser Knöpfel 2013
- Benzene [emissions to air, unspecified]: 3.1915e-9 kg; lognormal SD95 3.7429
  (3,3,2,5,5,5,BU:3); emission factor of diesel: 6.87E-3 g/kg diesel, assuming a share of 97.7% with particle filter; BAFU 2015: non road emission factor database
- Heat, waste [emissions to air, unspecified]: 0.14115 MJ; lognormal SD95 2.1253
  (3,5,2,5,5,5,BU:1.05); devault value;
- Particulates, < 2.5 um [emissions to air, unspecified]: 9.328e-8 kg; lognormal SD95 3.7429
  (3,3,2,5,5,5,BU:3); emission factor of diesel: 1.68E-1 g/kg diesel, assuming a share of 97.7% with particle filter; own calculation with SBB tractions data and non road emission factor (BAFU 2015)
- Oils, unspecified [emissions to soil, industrial]: 3.1803e-9 kg; lognormal SD95 1.6263
  (2,3,2,1,3,5,BU:1.5); hydrocarbon emission assumed as oil emission into soil; Data from ANABEL; Personal correspondence Gunter Adolf, SBB, June 2016
- Acetaldehyde [emissions to air, unspecified]: 1.0844e-7 kg; lognormal SD95 2.308
  (3,3,2,5,5,5,BU:1.5); emission factor of diesel: 2.33E-1 g/kg diesel, assuming a share of 97.7% with particle filter; BAFU 2015: Non-road database; EMEP/EEA guidebook 2013, Tab. 3-122
- Cadmium [emissions to air, unspecified]: 4.6413e-12 kg; lognormal SD95 5.8584
  (3,3,2,5,5,5,BU:5); emission factor of diesel: 1.00E-5 g/kg diesel, assuming a share of 97.7% with particle filter; EMEP/EEA guidebook 2013, 1.A.2.f.ii, Tab. 3-1
- Styrene [emissions to air, unspecified]: 1.3288e-8 kg; lognormal SD95 2.308
  (3,3,2,5,5,5,BU:1.5); emission factor of diesel: 2.86E-2 g/kg diesel, assuming a share of 97.7% with particle filter; BAFU 2015: Non-road database; EMEP/EEA guidebook 2013, Tab. 3-125
- Particulates, > 2.5 um, and < 10um [emissions to air, unspecified]: 3.8404e-9 kg; lognormal SD95 2.7394
  (3,3,2,5,5,5,BU:2); emission factor of diesel: 6.92E-3 g/kg diesel, assuming a share of 97.7% with particle filter; own calculation with SBB tractions data and non road emission factor (BAFU 2015)
- Chromium [emissions to soil, industrial]: 1.698e-11 kg; lognormal SD95 1.6263
  (2,3,2,1,3,5,BU:1.5); ; Data from ANABEL; Personal correspondence Gunter Adolf, SBB, June 2016
- Selenium [emissions to air, unspecified]: 4.6413e-12 kg; lognormal SD95 5.8584
  (same comment as for Cadmium)
- Carbon monoxide, fossil [emissions to air, unspecified]: 1.158e-5 kg; lognormal SD95 5.8584
  (3,3,2,5,5,5,BU:5); emission factor of diesel: 2.49E+1 g/kg diesel, assuming a share of 97.7% with particle filter; BAFU 2015: non road emission factor database
- PAH, polycyclic aromatic hydrocarbons [emissions to air, unspecified]: 1.527e-9 kg; lognormal SD95 3.7429
  (3,3,2,5,5,5,BU:3); emission factor of diesel: 3.29E-3 g/kg diesel, assuming a share of 97.7% with particle filter; EMEP/EEA guidebook 2013, 1.A.2.f.ii, Tab. 3-1
- Dinitrogen monoxide [emissions to air, unspecified]: 7.0212e-8 kg; lognormal SD95 2.308
  (3,3,2,5,5,5,BU:1.5); emission factor of diesel: 1.51E-1 g/kg diesel, assuming a share of 97.7% with particle filter; BAFU 2015: non road emission factor database
- Copper [emissions to soil, industrial]: 1.0693e-10 kg; lognormal SD95 1.6263
  (same comment as for Chromium)
- Nitrogen oxides [emissions to air, unspecified]: 2.0936e-5 kg; lognormal SD95 2.308
  (3,3,2,5,5,5,BU:1.5); emission factor of diesel: 4.51E+1 g/kg diesel, assuming a share of 97.7% with particle filter; BAFU 2015: non road emission factor database
- Butane [emissions to air, unspecified]: 3.5594e-9 kg; lognormal SD95 2.308
  (3,3,2,5,5,5,BU:1.5); emission factor of diesel: 7.66E-3 g/kg diesel, assuming a share of 97.7% with particle filter; BAFU 2015: Non-road database; EMEP/EEA guidebook 2013, Tab. 3-114
- Iron [emissions to air, unspecified]: 2.7346e-8 kg; lognormal SD95 5.1125
  (2,3,2,1,3,5,BU:5); ; Data from ANABEL; Personal correspondence Gunter Adolf, SBB, June 2016
- Pentane [emissions to air, unspecified]: 1.4238e-9 kg; lognormal SD95 2.308
  (3,3,2,5,5,5,BU:1.5); emission factor of diesel: 3.07E-3 g/kg diesel, assuming a share of 97.7% with particle filter; BAFU 2015: Non-road database; EMEP/EEA guidebook 2013, Tab. 3-115
- Heat, waste [emissions to air, unspecified]: 0.019865 MJ; lognormal SD95 2.0816
  (3,3,2,5,5,5,BU:1.05); default value;
- Sulfur dioxide [emissions to air, unspecified]: 9.2826e-9 kg; lognormal SD95 2.0816
  (3,3,2,5,5,5,BU:1.05); emission factor of diesel: 2.00E-2 g/kg diesel, assuming a share of 97.7% with particle filter; HBEFA 3.1., CH
- Lead [emissions to air, unspecified]: 2.4135e-11 kg; lognormal SD95 5.8584
  (3,3,2,5,5,5,BU:5); emission factor of diesel: 5.20E-5 g/kg diesel, assuming a share of 97.7% with particle filter; EMEP/EEA guidebook 2013, 1.A.2.f.ii, Tab. 3-12
- Copper [emissions to air, unspecified]: 3.0126e-10 kg; lognormal SD95 5.1125
  (same comment as for Iron)
- Acrolein [emissions to air, unspecified]: 4.2001e-8 kg; lognormal SD95 2.308
  (3,3,2,5,5,5,BU:1.5); emission factor of diesel: 9.04E-2 g/kg diesel, assuming a share of 97.7% with particle filter; BAFU 2015: Non-road database; EMEP/EEA guidebook 2013, Tab. 3-124
- Propane [emissions to air, unspecified]: 2.3729e-9 kg; lognormal SD95 2.308
  (3,3,2,5,5,5,BU:1.5); emission factor of diesel: 5.11E-3 g/kg diesel, assuming a share of 97.7% with particle filter; BAFU 2015: Non-road database; EMEP/EEA guidebook 2013, Tab. 3-113
- Ethane [emissions to air, unspecified]: 7.1188e-10 kg; lognormal SD95 2.308
  (3,3,2,5,5,5,BU:1.5); emission factor of diesel: 1.53E-3 g/kg diesel, assuming a share of 97.7% with particle filter; BAFU 2015: Non-road database; EMEP/EEA guidebook 2013, Tab. 3-112
- Methane, fossil [emissions to air, unspecified]: 2.5532e-8 kg; lognormal SD95 2.308
  (3,3,2,5,5,5,BU:1.5); emission factor of diesel: 5.50E-2 g/kg diesel, assuming a share of 97.7% with particle filter; BAFU 2015: non road emission factor database
- Benzaldehyde [emissions to air, unspecified]: 3.2509e-8 kg; lognormal SD95 2.308
  (3,3,2,5,5,5,BU:1.5); emission factor of diesel: 7.00E-2 g/kg diesel, assuming a share of 97.7% with particle filter; BAFU 2015: Non-road database; EMEP/EEA guidebook 2013, Tab. 3-123
- m-Xylene [emissions to air, unspecified]: 2.3255e-8 kg; lognormal SD95 2.308
  (3,3,2,5,5,5,BU:1.5); emission factor of diesel: 5.01E-2 g/kg diesel, assuming a share of 97.7% with particle filter; BAFU 2015: Non-road database; EMEP/EEA guidebook 2013, Tab. 3-119
- Iron [emissions to soil, industrial]: 9.7063e-9 kg; lognormal SD95 1.6263
  (same comment as for Chromium)
- Chromium [emissions to air, unspecified]: 4.7838e-11 kg; lognormal SD95 5.1125
  (same comment as for Iron)
- Lead [emissions to soil, industrial]: 1.7826e-12 kg; lognormal SD95 1.6263
  (same comment as for Chromium)
- Zinc [emissions to soil, industrial]: 1.0538e-11 kg; lognormal SD95 1.6263
  (same comment as for Chromium)
- Copper [emissions to air, unspecified]: 7.8902e-10 kg; lognormal SD95 5.8584
  (3,3,2,5,5,5,BU:5); emission factor of diesel: 1.70E-3 g/kg diesel, assuming a share of 97.7% with particle filter; EMEP/EEA guidebook 2013, 1.A.2.f.ii, Tab. 3-1
- Carbon dioxide, fossil [emissions to air, unspecified]: 0.0014621 kg; lognormal SD95 2.0816
  (3,3,2,5,5,5,BU:1.05); emission factor of diesel: 3.15E+3 g/kg diesel, assuming a share of 97.7% with particle filter; BAFU 2015: non road emission factor database
- Zinc [emissions to air, unspecified]: 2.9688e-11 kg; lognormal SD95 5.1125
  (same comment as for Iron)
- Lead [emissions to air, unspecified]: 5.0222e-12 kg; lognormal SD95 5.1125
  (same comment as for Iron)
- NMVOC, non-methane volatile organic compounds, unspecified origin [emissions to air, unspecified]: 1.9275e-6 kg; lognormal SD95 2.308
  (3,3,2,5,5,5,BU:1.5); emission factor of diesel: 4.15E+0 g/kg diesel, assuming a share of 97.7% with particle filter; non road emission factor
- Ammonia [emissions to air, unspecified]: 4.6413e-9 kg; lognormal SD95 2.1253
  (3,3,2,5,5,5,BU:1.2); emission factor of diesel: 1.00E-2 g/kg diesel, assuming a share of 97.7% with particle filter; EMEP/EEA guidebook 2013, 1.A.3.c, Tab. 3-3
- Nickel [emissions to air, unspecified]: 3.2489e-11 kg; lognormal SD95 5.8584
  (3,3,2,5,5,5,BU:5); emission factor of diesel: 7.00E-5 g/kg diesel, assuming a share of 97.7% with particle filter; EMEP/EEA guidebook 2013, 1.A.2.f.ii, Tab. 3-1
- Heptane [emissions to air, unspecified]: 7.1188e-9 kg; lognormal SD95 2.308
  (3,3,2,5,5,5,BU:1.5); emission factor of diesel: 1.53E-2 g/kg diesel, assuming a share of 97.7% with particle filter; BAFU 2015: Non-road database; EMEP/EEA guidebook 2013, Tab. 3-116
- Manganese [emissions to air, unspecified]: 1.1765e-10 kg; lognormal SD95 5.1125
  (same comment as for Iron)
- Zinc [emissions to water, unspecified]: 2.8844e-10 kg; lognormal SD95 5.1125
  (same comment as for Iron)
- Benzo(a)pyrene [emissions to air, unspecified]: 1.3924e-11 kg; lognormal SD95 3.7429
  (3,3,2,5,5,5,BU:3); emission factor of diesel: 3.00E-5 g/kg diesel, assuming a share of 97.7% with particle filter; EMEP/EEA guidebook 2013, 1.A.2.f.ii, Tab. 3-1
- Chromium VI [emissions to air, unspecified]: 4.6413e-14 kg; lognormal SD95 5.8584
  (3,3,2,5,5,5,BU:5); emission factor of diesel: 1.00E-7 g/kg diesel, assuming a share of 97.7% with particle filter; EMEP/EEA guidebook 2013, 1.A.2.f.ii, Tab. 3-1
- Particulates, > 10 um [emissions to air, unspecified]: 3.9414e-9 kg; lognormal SD95 2.308
  (3,3,2,5,5,5,BU:1.5); emission factor of diesel: 7.10E-3 g/kg diesel, assuming a share of 97.7% with particle filter; own calculation with SBB tractions data and non road emission factor (BAFU 2015)
- Antimony [emissions to soil, industrial]: 5.344e-12 kg; lognormal SD95 1.6263
  (same comment as for Chromium)
- Manganese [emissions to soil, industrial]: 4.1758e-11 kg; lognormal SD95 1.6263
  (same comment as for Chromium)
- Zinc [emissions to air, unspecified]: 4.6413e-10 kg; lognormal SD95 5.8584
  (3,3,2,5,5,5,BU:5); emission factor of diesel: 1.00E-3 g/kg diesel, assuming a share of 97.7% with particle filter; EMEP/EEA guidebook 2013, 1.A.2.f.ii, Tab. 3-1
- Antimony [emissions to air, unspecified]: 1.5056e-11 kg; lognormal SD95 5.1125
  (same comment as for Iron)
- Arsenic [emissions to air, unspecified]: 4.6413e-14 kg; lognormal SD95 5.8584
  (same comment as for Chromium VI)

## Sampling procedure
Statistics

## Extrapolations
Some generic datasets from ecoinvent have been used.

## Sources
- Krebs L., Frischknecht R., 2020, 2020 - Update Mobitool 2020 - Krebs, Project report, 713, treeze Ltd., Uster, CH
L. Krebs, R. Frischknecht (2020) Aktualisierung Ökobilanzdaten mobitool 2020, Teil 1. Project report. Volume: 713. treeze Ltd.. Uster, CH.
Type: Separate publication
Source: Report
First author: L. Krebs
Other authors: R. Frischknecht
Year: 2020
Title of anthology: Project report
Place of publication: Uster, CH
Publisher: treeze Ltd.
Volume No: 713

## Validation
Proof reading validation: 10.11.2020; Other validation: G:\Projekte laufend\713 Aktualisierung mobitool 2020\EcoSpold\[713_Transport-Train-freight-CH_EIV2_v0.3.xlsx]X-Process;
