# Disposal, dust, alloyed EAF steel, 15.4% water, to residual material landfill

Dataset: EcoSpold 1, unit process
Functional unit: 1 kg
Category: landfill / residual material landfill
Geography: CH
Time period: 2000-01 to 2000-12
Generated by: Gabor Doka
accessRestrictedTo: 0
copyright: true

## General comment
Inventoried waste contains 100% dust from electric chromium steel production to landfill; . waste composition (wet, in ppm): H2O 105410; O 143210; H n.a.; C 6955.7; S 1854.8; N n.a.; P 222.61; B n.a.; Cl 26353; Br n.a.; F 278.23; I n.a.; Ag n.a.; As 397.69; Ba n.a.; Cd 417.34; Co 14.374; Cr 95182; Cu 1437.5; Hg 5.2705; Mn 32321; Mo n.a.; Ni 27823; Pb 11593; Sb n.a.; Se n.a.; Sn n.a.; V 1854.8; Zn 55645; Be n.a.; Sc n.a.; Sr n.a.; Ti n.a.; Tl n.a.; W n.a.; Si 36849; Fe 324600; Ca 72911; Al 12271; K 10739; Mg 19575; Na 12086; Share of carbon in waste that is biogenic 0%. Additional solidification with 0.4 kg of cement.;;

## Included processes
Waste-specific short-term emissions to water from leachate. Long-term emissions from landfill to ground water. Expenditures for solidificalion with cement (user-specified option)

## Geography
Technology encountered in Switzerland in 2000. Landfill includes base seal and leachate collection system.

## Technology
Swiss residual material landfill for polluted, inorganic waste. With base seal and leachate collection system. Recultivation after closure.

## Time period
Waste composition as given in literature reference, theoretical data or other source. Transfer coefficients from prospective model.

## Reference product
- Disposal, dust, alloyed EAF steel, 15.4% water, to residual material landfill [CH]: 1 kg
  SWITZERLAND

## Inputs from technosphere
- Disposal, cement, hydrated, 0% water, to residual material landfill [CH]: 1 kg; lognormal SD95 1.21
  Hydrated cement for solidification of residual material waste. Uncertainty in mass from solidification recipe.
- Transport, freight, rail [RER]: 0.04 tkm; lognormal SD95 1.21
  Transport of solidification cement, uncertainty from transported mass and generic transportation distances
- Residual material landfill facility [CH]: 2.0833e-9 p; lognormal SD95 1
  demands per kilogram waste. uncertainty is heeded in the module
- Cement, unspecified, at plant [CH]: 0.4 kg; lognormal SD95 1.21
  Cement for solidification of residual material waste. Uncertainty in mass from solidification recipe.
- Transport, freight, lorry, 16t-32t gross weight, fleet average [CH]: 0.02 tkm; lognormal SD95 1.21
  (same comment as for Transport, freight, rail)
- Process-specific burdens, residual material landfill [CH]: 1 kg; lognormal SD95 1
  demands per kilogram waste. uncertainty is heeded in the module

## Emissions to nature
- Cadmium [emissions to water, river]: 4.73e-9 kg; lognormal SD95 17.108
  uncertainty is calculated from uncertainties in waste composition and transfer coefficients in residual landfill
- Arsenic [emissions to water, river]: 0.00039769 kg; lognormal SD95 5.8412
  (same comment as for Cadmium)
- Calcium [emissions to water, river]: 1.0998e-5 kg; lognormal SD95 7.7752
  (same comment as for Cadmium)
- BOD5, Biological Oxygen Demand [emissions to water, river]: 6.2033e-6 kg; lognormal SD95 7.796
  (same comment as for Cadmium)
- Cobalt [emissions to water, groundwater, long-term]: 2.4575e-6 kg; lognormal SD95 16.917
  uncertainty is calculated from uncertainties in waste composition and transfer coefficients in incinerator and landfills.
- Chromium VI [emissions to water, groundwater, long-term]: 0.018074 kg; lognormal SD95 2.0703
  (same comment as for Cobalt)
- Manganese [emissions to water, groundwater, long-term]: 0.00026698 kg; lognormal SD95 133.3
  (same comment as for Cobalt)
- Phosphate [emissions to water, groundwater, long-term]: 0.00015249 kg; lognormal SD95 10.811
  (same comment as for Cobalt)
- DOC, Dissolved Organic Carbon [emissions to water, river]: 7.5044e-6 kg; lognormal SD95 7.796
  (same comment as for Cadmium)
- Silicon [emissions to water, river]: 8.2872e-5 kg; lognormal SD95 5.7705
  (same comment as for Cadmium)
- Arsenic [emissions to water, groundwater, long-term]: 3.9769e-13 kg; lognormal SD95 5.9986
  (same comment as for Cobalt)
- Sodium [emissions to water, groundwater, long-term]: 0.0075501 kg; lognormal SD95 3.2694
  (same comment as for Cobalt)
- DOC, Dissolved Organic Carbon [emissions to water, groundwater, long-term]: 0.0044951 kg; lognormal SD95 3.8763
  (same comment as for Cobalt)
- Aluminium [emissions to water, river]: 6.0814e-6 kg; lognormal SD95 8.0498
  (same comment as for Cadmium)
- Copper [emissions to water, river]: 9.2381e-8 kg; lognormal SD95 12.796
  (same comment as for Cadmium)
- Nickel [emissions to water, groundwater, long-term]: 0.010073 kg; lognormal SD95 4.158
  (same comment as for Cobalt)
- Chromium VI [emissions to water, river]: 0.0057217 kg; lognormal SD95 2.9547
  (same comment as for Cadmium)
- Sodium [emissions to water, river]: 0.0045354 kg; lognormal SD95 3.3826
  (same comment as for Cadmium)
- Zinc [emissions to water, groundwater, long-term]: 0.00068199 kg; lognormal SD95 88.355
  (same comment as for Cobalt)
- Mercury [emissions to water, river]: 4.1532e-10 kg; lognormal SD95 21.307
  (same comment as for Cadmium)
- Calcium [emissions to water, groundwater, long-term]: 0.0065881 kg; lognormal SD95 12.504
  (same comment as for Cobalt)
- Magnesium [emissions to water, river]: 3.7131e-6 kg; lognormal SD95 8.6183
  (same comment as for Cadmium)
- Aluminium [emissions to water, groundwater, long-term]: 0.0036427 kg; lognormal SD95 5.4051
  (same comment as for Cobalt)
- Lead [emissions to water, river]: 1.0039e-7 kg; lognormal SD95 12.837
  (same comment as for Cadmium)
- Fluoride [emissions to water, groundwater, long-term]: 0.00026315 kg; lognormal SD95 6.1596
  (same comment as for Cobalt)
- Zinc [emissions to water, river]: 1.1385e-6 kg; lognormal SD95 10.147
  (same comment as for Cadmium)
- TOC, Total Organic Carbon [emissions to water, river]: 7.5044e-6 kg; lognormal SD95 7.796
  (same comment as for Cadmium)
- Phosphate [emissions to water, river]: 2.5458e-7 kg; lognormal SD95 12.924
  (same comment as for Cadmium)
- Potassium [emissions to water, groundwater, long-term]: 0.0077122 kg; lognormal SD95 3.3353
  (same comment as for Cobalt)
- Cadmium [emissions to water, groundwater, long-term]: 2.8333e-6 kg; lognormal SD95 198.91
  (same comment as for Cobalt)
- Copper [emissions to water, groundwater, long-term]: 5.5336e-5 kg; lognormal SD95 37.065
  (same comment as for Cobalt)
- Sulfate [emissions to water, groundwater, long-term]: 0.0049675 kg; lognormal SD95 4.5769
  (same comment as for Cobalt)
- Mercury [emissions to water, groundwater, long-term]: 2.4878e-7 kg; lognormal SD95 46.444
  (same comment as for Cobalt)
- Vanadium [emissions to water, groundwater, long-term]: 0.0014257 kg; lognormal SD95 4.676
  (same comment as for Cobalt)
- Vanadium [emissions to water, river]: 4.5522e-6 kg; lognormal SD95 8.2651
  (same comment as for Cadmium)
- Sulfate [emissions to water, river]: 0.00059701 kg; lognormal SD95 5.2766
  (same comment as for Cadmium)
- Potassium [emissions to water, river]: 0.0030273 kg; lognormal SD95 3.5486
  (same comment as for Cadmium)
- Fluoride [emissions to water, river]: 1.5078e-5 kg; lognormal SD95 7.4184
  (same comment as for Cadmium)
- Magnesium [emissions to water, groundwater, long-term]: 0.0022241 kg; lognormal SD95 11.314
  (same comment as for Cobalt)
- Manganese [emissions to water, river]: 4.4572e-7 kg; lognormal SD95 11.124
  (same comment as for Cadmium)
- Lead [emissions to water, groundwater, long-term]: 6.0133e-5 kg; lognormal SD95 219.84
  (same comment as for Cobalt)
- Chloride [emissions to water, groundwater, long-term]: 0.018816 kg; lognormal SD95 2.7704
  (same comment as for Cobalt)
- Iron [emissions to water, groundwater, long-term]: 0.0016269 kg; lognormal SD95 202.12
  (same comment as for Cobalt)
- Nickel [emissions to water, river]: 1.6816e-5 kg; lognormal SD95 7.1551
  (same comment as for Cadmium)
- Iron [emissions to water, river]: 2.716e-6 kg; lognormal SD95 9.9321
  (same comment as for Cadmium)
- COD, Chemical Oxygen Demand [emissions to water, groundwater, long-term]: 0.01136 kg; lognormal SD95 3.8763
  (same comment as for Cobalt)
- Chloride [emissions to water, river]: 0.0075371 kg; lognormal SD95 2.9737
  (same comment as for Cadmium)
- BOD5, Biological Oxygen Demand [emissions to water, groundwater, long-term]: 0.0037158 kg; lognormal SD95 3.8763
  (same comment as for Cobalt)
- Cobalt [emissions to water, river]: 4.1026e-9 kg; lognormal SD95 17.363
  (same comment as for Cadmium)
- TOC, Total Organic Carbon [emissions to water, groundwater, long-term]: 0.0044951 kg; lognormal SD95 3.8763
  (same comment as for Cobalt)
- COD, Chemical Oxygen Demand [emissions to water, river]: 1.8965e-5 kg; lognormal SD95 7.796
  (same comment as for Cadmium)
- Silicon [emissions to water, groundwater, long-term]: 0.036766 kg; lognormal SD95 2.5514
  (same comment as for Cobalt)

## Sampling procedure
Landfill model based on observed leachate concentrations in literature. Extrapolated to 60'000 years heeding chemical characteristics. Initial waste composition from various literature sources.

## Uncertainty adjustments
uncertainty of waste input composition data derived from generic formula GSD(c) = N*ln(c)+1. Mean long-term emissions are the emissions until the next glacial period occurs (in 60'000a) and the landfill is eroded. Maximal long-term emissions are the complete emissions of all landfilled material (except Cr). Minimal long-term emissions are derived implicitly from the mean and maximal values assuming a lognormal distribution.

## Sources
- Doka G., 2009, 2009 - LCI waste treatment services - Doka, Final report ecoinvent data v2.1, 13, Swiss Centre for LCI, Doka LCA, Duebendorf and St. Gallen, CH
Doka G. (2009) Life Cycle Inventories of Waste Treatment Services. Final report ecoinvent data v2.1. Volume: 13. Swiss Centre for LCI, Empa - TSL. Dübendorf, CH.
Type: Measurement on site
Source: CD-ROM
First author: Doka G.
Year: 2009
Title of anthology: Final report ecoinvent data v2.1
Place of publication: Dübendorf, CH
Publisher: Swiss Centre for LCI, Empa - TSL
Volume No: 13

## Validation
Proof reading validation: passed.; Other validation: none;
