# LCD screen, at plant

Dataset: EcoSpold 1, unit process
Functional unit: 1 kg
Category: electronics / devices
Geography: GLO
Time period: 2023-01 to 2029-12
Generated by: Lugas Raka Adrianto, Maulana Permana Ajie, Didier Beloin-Saint-Pierre
accessRestrictedTo: 0
copyright: false

## General comment
Data are based on information in a US-EPA LCA study about LCD and CRT production. The data represent the respective efforts for a 15-inch LCD computer screen, as it is produced in Japan. In 2023, the dataset is updated to reflect the recent electricity consumption share in the production regions. However, the total energy consumption is adjusted after considering efficiency improvement;

## Included processes
This module includes the auxiliaries and energy efforts as well as the related emissions (air/water) and waste amounts for the assembly of a complete LCD screen. Estimations for infrastructure and the overall transport amounts (incl. for the materials in this screen) are included as well.

## Geography
Data from literature (based on information from Japanese producers) ? used as data for the global production average

## Technology
Current technology in Japan

## Reference product
- LCD screen, at plant [GLO]: 1 kg
  Global

## Inputs from technosphere
- Acetic acid, 98% in H2O, at plant [RER]: 0.00042667 kg; lognormal SD95 1.31
  (1,3,4,3,1,5,BU:1.06); data from an US-EPA LCA study
- Acetone, liquid, at plant [RER]: 0.00068667 kg; lognormal SD95 1.31
  (1,3,4,3,1,5,BU:1.06); data from an US-EPA LCA study
- Aluminium sulphate, powder, at plant [RER]: 0.007 kg; lognormal SD95 1.31
  (1,3,4,3,1,5,BU:1.06); data from an US-EPA LCA study
- Ammonia, liquid, at regional storehouse [RER]: 0.001951 kg; lognormal SD95 1.31
  (1,3,4,3,1,5,BU:1.06); data from an US-EPA LCA study
- Argon, crude, liquid, at plant [RER]: 0.00052467 kg; lognormal SD95 1.31
  (1,3,4,3,1,5,BU:1.06); data from an US-EPA LCA study
- Carbon dioxide liquid, at plant [RER]: 2.4933e-6 kg; lognormal SD95 1.31
  (1,3,4,3,1,5,BU:1.06); data from an US-EPA LCA study
- Chemicals organic, at plant [GLO]: 0.040133 kg; lognormal SD95 1.31
  (1,3,4,3,1,5,BU:1.06); data from an US-EPA LCA study
- Chlorine, liquid, production mix, at plant [RER]: 0.0010333 kg; lognormal SD95 1.31
  (1,3,4,3,1,5,BU:1.06); data from an US-EPA LCA study
- Cyclohexanol, at plant [RER]: 1.3533e-6 kg; lognormal SD95 1.31
  (1,3,4,3,1,5,BU:1.06); data from an US-EPA LCA study
- Dimethyl sulfoxide, at plant [RER]: 0.00442 kg; lognormal SD95 1.31
  (1,3,4,3,1,5,BU:1.06); data from an US-EPA LCA study
- Electricity, medium voltage, at grid [CN]: 1.85857 kWh; lognormal SD95 1.31
  (1,3,4,3,1,5,BU:1.06); data from an US-EPA LCA study
- Electricity, medium voltage, at grid [TW]: 1.11514 kWh; lognormal SD95 1.31
  (1,3,4,3,1,5,BU:1.06); data from an US-EPA LCA study
- Electricity, medium voltage, production KR, at grid [KR]: 0.743426 kWh; lognormal SD95 1.31
  (1,3,4,3,1,5,BU:1.06); data from an US-EPA LCA study
- Ethanol from ethylene, at plant [RER]: 0.0009 kg; lognormal SD95 1.31
  (1,3,4,3,1,5,BU:1.06); data from an US-EPA LCA study
- Heat, light fuel oil, at industrial furnace 1MW [RER]: 2.40351 MJ; lognormal SD95 1.31
  (1,3,4,3,1,5,BU:1.06); data from an US-EPA LCA study
- Heat, natural gas, at industrial furnace 1MW [CH]: 9.5418 MJ; lognormal SD95 1.31
  (1,3,4,3,1,5,BU:1.06); data from an US-EPA LCA study
- Hydrochloric acid, 30% in H2O, at plant [RER]: 0.0028733 kg; lognormal SD95 1.31
  (1,3,4,3,1,5,BU:1.06); data from an US-EPA LCA study
- Hydrogen fluoride, at plant [GLO]: 0.00028067 kg; lognormal SD95 1.31
  (1,3,4,3,1,5,BU:1.06); data from an US-EPA LCA study
- Hydrogen peroxide, 50% in H2O, at plant [RER]: 9.8e-6 kg; lognormal SD95 1.31
  (1,3,4,3,1,5,BU:1.06); data from an US-EPA LCA study
- Hydrogen, liquid, at plant [RER]: 0.0296 kg; lognormal SD95 1.31
  (1,3,4,3,1,5,BU:1.06); data from an US-EPA LCA study
- Isopropanol, at plant [RER]: 0.023267 kg; lognormal SD95 1.31
  (1,3,4,3,1,5,BU:1.06); data from an US-EPA LCA study
- Krypton, gaseous, at regional storage [CH]: 1.72e-6 kg; lognormal SD95 1.31
  (1,3,4,3,1,5,BU:1.06); data from an US-EPA LCA study
- Lime, hydrated, packed, at plant [CH]: 0.0092667 kg; lognormal SD95 1.31
  (1,3,4,3,1,5,BU:1.06); data from an US-EPA LCA study
- Methyl ethyl ketone, at plant [RER]: 4.9e-7 kg; lognormal SD95 1.31
  (1,3,4,3,1,5,BU:1.06); data from an US-EPA LCA study
- Nitric acid, 50% in H2O, at plant [RER]: 0.00082667 kg; lognormal SD95 1.31
  (1,3,4,3,1,5,BU:1.06); data from an US-EPA LCA study
- Nitrogen, liquid, at plant [RER]: 0.39333 kg; lognormal SD95 1.31
  (1,3,4,3,1,5,BU:1.06); data from an US-EPA LCA study
- Oxygen, liquid, at plant [RER]: 0.00051667 kg; lognormal SD95 1.31
  (1,3,4,3,1,5,BU:1.06); data from an US-EPA LCA study
- Phosphoric acid, industrial grade, 85% in H2O, at plant [RER]: 0.0026333 kg; lognormal SD95 1.31
  (1,3,4,3,1,5,BU:1.06); data from an US-EPA LCA study
- Propylene glycol, liquid, at plant [RER]: 0.0013373 kg; lognormal SD95 1.31
  (1,3,4,3,1,5,BU:1.06); data from an US-EPA LCA study
- Sodium hydroxide, 50% in H2O, production mix, at plant [RER]: 0.023933 kg; lognormal SD95 1.31
  (1,3,4,3,1,5,BU:1.06); data from an US-EPA LCA study
- Sulphuric acid, liquid, at plant [RER]: 0.015267 kg; lognormal SD95 1.31
  (1,3,4,3,1,5,BU:1.06); data from an US-EPA LCA study
- Transport, freight, rail [RER]: 0.3362 tkm; lognormal SD95 2.24
  (4,5,4,4,3,5,BU:2.00); standard values
- Transport, freight, lorry, fleet average [RER]: 1.581 tkm; lognormal SD95 2.24
  (4,5,4,4,3,5,BU:2.00); standard values
- Xylene, at plant [RER]: 0.00010467 kg; lognormal SD95 1.31
  (1,3,4,3,1,5,BU:1.06); data from an US-EPA LCA study
- Printed wiring board mounting plant [GLO]: 2.08e-7 p; lognormal SD95 3.18
  (4,5,4,3,1,5,BU:3.00); Estimation, based on PWB mounting plant
- Transport, transoceanic freight ship [OCE]: 0.78336 tkm; lognormal SD95 2.24
  (4,5,4,4,3,5,BU:2.00); rough estimation
- Disposal, plastic, consumer electronics, 15.3% water, to municipal incineration [CH]: 0.0054 kg; lognormal SD95 1.63
  (1,3,4,3,4,5,BU:1.07); data from an US-EPA LCA study - approximated with existing waste process
- Disposal, refinery sludge, 89.5% water, to hazardous waste incineration [CH]: 0.00206 kg; lognormal SD95 1.63
  (same comment as for Disposal, plastic, consumer electronics, 15.3% water, to municipal inc)
- Disposal, sludge, NaCl electrolysis, 0% water, to residual material landfill [CH]: 0.00382 kg; lognormal SD95 1.63
  (same comment as for Disposal, plastic, consumer electronics, 15.3% water, to municipal inc)
- Disposal, solvents mixture, 16.5% water, to hazardous waste incineration [CH]: 0.22347 kg; lognormal SD95 1.63
  (same comment as for Disposal, plastic, consumer electronics, 15.3% water, to municipal inc)
- Disposal, used mineral oil, 10% water, to hazardous waste incineration [CH]: 0.0010733 kg; lognormal SD95 1.63
  (same comment as for Disposal, plastic, consumer electronics, 15.3% water, to municipal inc)
- Treatment, LCD module production effluent, to wastewater treatment, class 2 [CH]: 0.095667 m3; lognormal SD95 1.63
  (1,3,4,3,4,5,BU:1.07); data from an US-EPA LCA study
- Disposal, treatment of printed wiring boards [GLO]: 0.001 kg; lognormal SD95 1.63
  (same comment as for Disposal, plastic, consumer electronics, 15.3% water, to municipal inc)

## Inputs from nature
- Water, unspecified natural origin/m3 [resources, in water]: 0.072 m3; lognormal SD95 1.31
  (1,3,4,3,1,5); data from an US-EPA LCA study

## Emissions to nature
- Acetic acid [emissions to air, high. pop.]: 9.0667e-5 kg; lognormal SD95 1.62
  (1,3,4,3,1,5,BU:1.50); data from an US-EPA LCA study
- Acetone [emissions to air, high. pop.]: 1.24e-5 kg; lognormal SD95 1.62
  (1,3,4,3,1,5,BU:1.50); data from an US-EPA LCA study
- Ammonia [emissions to air, high. pop.]: 0.0041533 kg; lognormal SD95 1.62
  (1,3,4,3,1,5,BU:1.50); data from an US-EPA LCA study
- Tetramethyl ammonium hydroxide [emissions to air, high. pop.]: 0.042867 kg; lognormal SD95 1.62
  (1,3,4,3,1,5,BU:1.50); data from an US-EPA LCA study
- Sulfur hexafluoride [emissions to air, high. pop.]: 7.1485e-6 kg; lognormal SD95 1.89
  (3,3,4,1,4,5,BU:1.50); tier 2b default emission factor according to IPCC guidelines
- Sodium tetrahydroborate [emissions to air, high. pop.]: 0.0011867 kg; lognormal SD95 1.62
  (1,3,4,3,1,5,BU:1.50); data from an US-EPA LCA study
- Phosphoric acid [emissions to air, high. pop.]: 3.2333e-6 kg; lognormal SD95 1.62
  (1,3,4,3,1,5,BU:1.50); data from an US-EPA LCA study
- Phosphine [emissions to air, high. pop.]: 0.0041733 kg; lognormal SD95 1.62
  (1,3,4,3,1,5,BU:1.50); data from an US-EPA LCA study
- NMVOC, non-methane volatile organic compounds, unspecified origin [emissions to air, high. pop.]: 0.00712 kg; lognormal SD95 1.62
  (1,3,4,3,1,5,BU:1.50); data from an US-EPA LCA study
- Nitrogen oxides [emissions to air, high. pop.]: 1.7933e-5 kg; lognormal SD95 1.62
  (1,3,4,3,1,5,BU:1.50); data from an US-EPA LCA study
- Nitrogen fluoride [emissions to air, high. pop.]: 1.7874e-6 kg; lognormal SD95 1.89
  (3,3,4,1,4,5,BU:1.50); tier 2b default emission factor according to IPCC guidelines
- Hydrogen [emissions to air, high. pop.]: 8.8667e-6 kg; lognormal SD95 1.62
  (1,3,4,3,1,5,BU:1.50); data from an US-EPA LCA study
- Hydrogen fluoride [emissions to air, high. pop.]: 0.0034733 kg; lognormal SD95 1.62
  (1,3,4,3,1,5,BU:1.50); data from an US-EPA LCA study
- Hydrogen chloride [emissions to air, high. pop.]: 0.00404 kg; lognormal SD95 1.62
  (1,3,4,3,1,5,BU:1.50); data from an US-EPA LCA study
- Heat, waste [emissions to air, high. pop.]: 17.267 MJ; lognormal SD95 1.93
  (4,3,4,3,4,5,BU:1.50); Calculated from electricity input
- Diethylene glycol [emissions to air, high. pop.]: 6.46e-6 kg; lognormal SD95 1.62
  (1,3,4,3,1,5,BU:1.50); data from an US-EPA LCA study
- Cyclohexane [emissions to air, high. pop.]: 3.2333e-6 kg; lognormal SD95 1.62
  (1,3,4,3,1,5,BU:1.50); data from an US-EPA LCA study
- Boron trifluoride [emissions to air, high. pop.]: 0.000612 kg; lognormal SD95 1.62
  (1,3,4,3,1,5,BU:1.50); data from an US-EPA LCA study
- Boric acid [emissions to air, high. pop.]: 9.1333e-8 kg; lognormal SD95 1.62
  (1,3,4,3,1,5,BU:1.50); data from an US-EPA LCA study
- Antimony [emissions to water, unspecified]: 7.6e-9 kg; lognormal SD95 1.62
  (1,3,4,3,1,5,BU:1.50); data from an US-EPA LCA study
- Arsenic [emissions to water, unspecified]: 7.6e-9 kg; lognormal SD95 5.11
  (1,3,4,3,1,5,BU:5.00); data from an US-EPA LCA study
- BOD5, Biological Oxygen Demand [emissions to water, unspecified]: 0.00116 kg; lognormal SD95 1.62
  (1,3,4,3,1,5,BU:1.50); data from an US-EPA LCA study
- Boron [emissions to water, unspecified]: 3.0533e-7 kg; lognormal SD95 1.62
  (1,3,4,3,1,5,BU:1.50); data from an US-EPA LCA study
- Cadmium [emissions to water, unspecified]: 7.6e-9 kg; lognormal SD95 5.11
  (1,3,4,3,1,5,BU:5.00); data from an US-EPA LCA study
- Chromium VI [emissions to water, unspecified]: 1.5267e-8 kg; lognormal SD95 5.11
  (1,3,4,3,1,5,BU:5.00); data from an US-EPA LCA study
- Chromium [emissions to water, unspecified]: 5.8933e-7 kg; lognormal SD95 5.11
  (1,3,4,3,1,5,BU:5.00); data from an US-EPA LCA study
- COD, Chemical Oxygen Demand [emissions to water, unspecified]: 0.00017867 kg; lognormal SD95 1.62
  (1,3,4,3,1,5,BU:1.50); data from an US-EPA LCA study
- Copper [emissions to water, unspecified]: 6.12e-8 kg; lognormal SD95 5.11
  (1,3,4,3,1,5,BU:5.00); data from an US-EPA LCA study
- Cyanide [emissions to water, unspecified]: 2.44e-7 kg; lognormal SD95 1.62
  (1,3,4,3,1,5,BU:1.50); data from an US-EPA LCA study
- Ethane, 1,1,1-trichloro-, HCFC-140 [emissions to water, unspecified]: 1.5267e-9 kg; lognormal SD95 3.09
  (1,3,4,3,1,5,BU:3.00); data from an US-EPA LCA study
- Fluoride [emissions to water, unspecified]: 0.00085333 kg; lognormal SD95 1.62
  (1,3,4,3,1,5,BU:1.50); data from an US-EPA LCA study
- Hydrocarbons, aromatic [emissions to water, unspecified]: 3.92e-5 kg; lognormal SD95 3.09
  (1,3,4,3,1,5,BU:3.00); data from an US-EPA LCA study
- Iron [emissions to water, unspecified]: 1.7533e-7 kg; lognormal SD95 5.11
  (1,3,4,3,1,5,BU:5.00); data from an US-EPA LCA study
- Lead [emissions to water, unspecified]: 4.1133e-7 kg; lognormal SD95 5.11
  (1,3,4,3,1,5,BU:5.00); data from an US-EPA LCA study
- Manganese [emissions to water, unspecified]: 1.5267e-8 kg; lognormal SD95 5.11
  (1,3,4,3,1,5,BU:5.00); data from an US-EPA LCA study
- Mercury [emissions to water, unspecified]: 6.46e-9 kg; lognormal SD95 5.11
  (1,3,4,3,1,5,BU:5.00); data from an US-EPA LCA study
- Nickel [emissions to water, unspecified]: 1.5267e-8 kg; lognormal SD95 5.11
  (1,3,4,3,1,5,BU:5.00); data from an US-EPA LCA study
- Nitrogen [emissions to water, unspecified]: 0.0052867 kg; lognormal SD95 1.62
  (1,3,4,3,1,5,BU:1.50); data from an US-EPA LCA study
- Oils, unspecified [emissions to water, unspecified]: 1.3467e-5 kg; lognormal SD95 3.09
  (1,3,4,3,1,5,BU:3.00); data from an US-EPA LCA study
- Phenol [emissions to water, unspecified]: 1.5267e-8 kg; lognormal SD95 3.09
  (1,3,4,3,1,5,BU:3.00); data from an US-EPA LCA study
- Phosphate [emissions to water, unspecified]: 1.5267e-8 kg; lognormal SD95 1.62
  (1,3,4,3,1,5,BU:1.50); data from an US-EPA LCA study
- Phosphorus [emissions to water, unspecified]: 0.00028733 kg; lognormal SD95 1.62
  (1,3,4,3,1,5,BU:1.50); data from an US-EPA LCA study
- Solids, inorganic [emissions to water, unspecified]: 0.00050333 kg; lognormal SD95 1.62
  (1,3,4,3,1,5,BU:1.50); data from an US-EPA LCA study
- Water [emissions to water, unspecified]: 68.4 kg; lognormal SD95 2.5196
  (5,5,5,5,5,BU:1.05); All uncertainty-values set to 5.0 by default. Balance of input water

## Sampling procedure
literature & own estimations

## Extrapolations
see generalComment

## Sources
- Raka Adrianto L., Permana Ajie M., Beloin-Saint-Pierre D., 2024, 2024 - LCI ICT sector - Raka Adrianto, Empa, St. Gallen, CH

## Validation
Proof reading validation: Passed, Other validation: none, Validator: Mischa Zschokke, Company: Carbotech, Country: CH
