# Kick Scooter, electric, <1kW, NMC battery, 2020

Dataset: EcoSpold 1, unit process
Functional unit: 1 p
Category: transport systems / road\Transformation\Infrastructure
Geography: CH
Time period: 2020-01 to 2020-12
Generated by: Romain Sacchi
accessRestrictedTo: 0
copyright: False

## General comment
Power: 0.25 kW. Lifetime: 1785 km. Annual kilometers: 890 km. Number of passengers: 1. Curb mass: 11.6 kg. Lightweighting of glider: 0%. Emission standard: None. Service visits throughout lifetime: 0. Range: 8 km. Battery capacity: 0.3 kWh. Available battery capacity: 0.2 kWh. Battery mass: 1.6 kg. Battery replacement throughout lifetime: 0. Fuel tank capacity: 0 kWh. Fuel mass: 0 kg. Origin of manufacture: China. Shipping distance: 15900 km. Lorry distribution distance: 1000 km. Source: Sacchi R., Bauer C. Life cycle inventories for on-road vehicles. Paul Scherrer Institut, 2023. DOI: 10.5281/zenodo.5156043.

## Time period
Technology and vehicle lightweighting factors match manufacture year of 2020

## Reference product
- Kick Scooter, electric, <1kW, NMC battery, 2020 [CH]: 1 p

## Inputs from technosphere
All rows: lognormal SD95 1.09366
- Bicycle, at regional storage [RER]: 0.412 p
  Uncertainty from pedigree matrix: (2, 3, 2, 1, 1, 3)
- Electric motor, electric vehicle, at plant [RER]: 3 kg
  Uncertainty from pedigree matrix: (2, 3, 2, 1, 1, 3)
- Glider lightweighting [GLO]: 0 kg
  Uncertainty from pedigree matrix: (2, 3, 2, 1, 1, 3)
- Battery cell, NMC-622 [GLO]: 1.25 kg
  Uncertainty from pedigree matrix: (2, 3, 2, 1, 1, 3)
- Battery BoP [GLO]: 0.375 kg
  Uncertainty from pedigree matrix: (2, 3, 2, 1, 1, 3)
- Charging station, 100W [GLO]: 1 p
  Uncertainty from pedigree matrix: (2, 3, 2, 1, 1, 3)
- Transport, freight, lorry, 16t-32t gross weight, fleet average [RER]: 11.6 tkm
  Uncertainty from pedigree matrix: (2, 3, 2, 1, 1, 3)
- Transport, transoceanic container ship [OCE]: 185 tkm
  Uncertainty from pedigree matrix: (2, 3, 2, 1, 1, 3)
- Disposal, electric bicycle [CH]: 0.125 p
  Uncertainty from pedigree matrix: (2, 3, 2, 1, 1, 3)
- Disposal, bicycle [CH]: 0.412 p
  Uncertainty from pedigree matrix: (2, 3, 2, 1, 1, 3)
- Disposal, Li-ions batteries, mixed technology [GLO]: 1.63 kg
  Uncertainty from pedigree matrix: (2, 3, 2, 1, 1, 3)

## Sources
- Sacchi R., Bauer C., 2023, 2023 - LCI on-road vehicles - Sacchi, PSI, Villigen, CH
doi: 10.5281/ZENODO.5156043
