# Concrete sleeper, at regional storage

Dataset: EcoSpold 1, unit process
Functional unit: 1 p
Category: transport systems / train\operations\infrastructure
Geography: CH
Time period: 2016 to 2024
Synonyms: 0
Generated by: Gavin Roberts
accessRestrictedTo: 0
copyright: true

## General comment
The production of railway sleepers was modelled according to the information in Messmer & Frischknecht (2016). These are monoblock sleepers weighing 280 kg each and measuring 30 x 23.5 x 260 cm. The data includes the production of the concrete sleepers and the transport of the materials by rail and road from Europe and Switzerland. Cuts and rejects are not taken into account.

According to the SBB, the lifespan of such a railway sleeper is 40 years. Maintenance work, renovations and the removal of sleepers are not taken into account.;

## Included processes
The inventory includes all the materials, energy and transport necessary to manifacture 1 concrete sleeper. Excluded are maintenance and disposal

## Geography
Data apply to construction in Switzerland.

## Technology
Average technology available on the market

## Time period
Time of publications.

## Reference product
- Concrete sleeper, at regional storage [CH]: 1 p

## Inputs from technosphere
- Portland cement, strength class Z 42.5, at plant [CH]: 39.09 kg; lognormal SD95 1.2423
  (2,1,3,1,1,5,BU:1.05); ;
- Sand, at mine [CH]: 88.35 kg; lognormal SD95 1.2423
  (2,1,3,1,1,5,BU:1.05); ;
- Gravel, crushed, at mine [CH]: 143.26 kg; lognormal SD95 1.2423
  (2,1,3,1,1,5,BU:1.05); ;
- Reinforcing steel, at plant [RER]: 0.35 kg; lognormal SD95 1.2423
  (2,1,3,1,1,5,BU:1.05); ;
- Steel, low-alloyed, at plant [RER]: 5.67 kg; lognormal SD95 1.2423
  (2,1,3,1,1,5,BU:1.05); ;
- Electricity, medium voltage, at grid [CH]: 2.82 kWh; lognormal SD95 1.2423
  (2,1,3,1,1,5,BU:1.05); ;
- Light fuel oil, burned in industrial furnace 1MW, non-modulating [CH]: 15.04 MJ; lognormal SD95 1.2423
  (2,1,3,1,1,5,BU:1.05); ;
- Tap water, at user [CH]: 30 kg; lognormal SD95 1.2423
  (2,1,3,1,1,5,BU:1.05); ;
- Transport, freight, lorry, 16t-32t gross weight, fleet average [RER]: 4.88 tkm; lognormal SD95 2.0641
  (2,1,3,1,1,5,BU:2); ;
- Transport, freight, rail, electricity with shunting [CH]: 3.72 tkm; lognormal SD95 2.0641
  (2,1,3,1,1,5,BU:2); ;
- Treatment, sewage, unpolluted, to wastewater treatment, class 3 [CH]: 0.03 m3; lognormal SD95 1.2423
  (2,1,3,1,1,5,BU:1.05); ;

## Sampling procedure
based on literature

## Sources
- Conrad S., Roberts G., Kaegi T., Stettler C., Frick R., Walther U., Althaus H.-J., 2024, 2024 - LCA railway infrastructure - Kaegi, Carbotech und INFRAS im Auftrag des BAV, Carbotech AG, INFRAS, Basel, CH

## Validation
01.10.2024
\\tsclient\Schreibtisch\WinShare\BAV Gleisinfrastruktur\Ecospold\[EcoSpold_Concrete sleeper v0.2.xlsx]X-Process
