# Electricity mix, summer 2018

Dataset: EcoSpold 1, unit process
Functional unit: 1 kWh
Category: electricity / supply mix
Geography: CH
Time period: 2018-01 to 2018-12
Generated by: Philippe Stolz
accessRestrictedTo: 0
copyright: true

## General comment
The operational electricity consumption (heating, hot water, ventilation, lighting, and auxiliaries) is modelled by a specific electricity mix used for the operation of the electricity consumption of Switzerland in summer 2018.;

## Included processes
This dataset includes the shares of different technologies of the electricity mix used for the electricity consumption of Switzerland.

## Geography
Switzerland

## Technology
Average technology

## Time period
Time of publications

## Reference product
- Electricity mix, summer 2018 [CH]: 1 kWh
  SWITZERLAND

## Inputs from technosphere
All rows: lognormal SD95 1.3069
- Electricity, at cogen 1MWth, wood chips, allocation exergy [CH]: 0.0010842 kWh
  (4,2,1,1,3,3,BU:1.05); Biomass / FR; ENTSO Transparency Platform
- Electricity, hydropower, at run-of-river power plant [RER]: 0.020378 kWh
  (4,2,1,1,3,3,BU:1.05); Hydro Run-of-river and poundage / FR; ENTSO Transparency Platform
- Electricity, at cogen 300kWth, natural gas, allocation exergy [CH]: 0.0057024 kWh
  (4,2,1,1,3,3,BU:1.05); Fossil Gas / CH; ENTSO Transparency Platform
- Electricity from waste, at municipal waste incineration plant [CH]: 1.7624e-6 kWh
  (4,2,1,1,3,3,BU:1.05); Waste / IT; ENTSO Transparency Platform
- Electricity, hydropower, at run-of-river power plant [RER]: 0.00022594 kWh
  (4,2,1,1,3,3,BU:1.05); Hydro Run-of-river and poundage / IT; ENTSO Transparency Platform
- Electricity, at wind farm [CH]: 0.00094949 kWh
  (4,2,1,1,3,3,BU:1.05); Wind Onshore / CH; ENTSO Transparency Platform
- Electricity, hydropower, at small hydropower plant [CH]: 0.038131 kWh
  (4,2,1,1,3,3,BU:1.05); Hydro Run-of-river and poundage / CH; ENTSO Transparency Platform
- Electricity, at wind farm [RER]: 4.1043e-6 kWh
  (4,2,1,1,3,3,BU:1.05); Geothermal / DE; ENTSO Transparency Platform
- Electricity, nuclear, at power plant boiling water reactor [CH]: 0.1028 kWh
  (4,2,1,1,3,3,BU:1.05); Nuclear / CH; ENTSO Transparency Platform
- Electricity, at wind farm [RER]: 0.0087073 kWh
  (4,2,1,1,3,3,BU:1.05); Wind Onshore / FR; ENTSO Transparency Platform
- Electricity, industrial gas, at power plant [IT]: 8.4659e-6 kWh
  (4,2,1,1,3,3,BU:1.05); Fossil Coal-derived gas / IT; ENTSO Transparency Platform
- Electricity, production mix photovoltaic, at plant [DE]: 0.0097403 kWh
  (4,2,1,1,3,3,BU:1.05); Solar / DE; ENTSO Transparency Platform
- Electricity, hard coal, at power plant [IT]: 0.00011938 kWh
  (4,2,1,1,3,3,BU:1.05); Fossil Hard coal / IT; ENTSO Transparency Platform
- Electricity, natural gas, at power plant [IT]: 0.00038052 kWh
  (4,2,1,1,3,3,BU:1.05); Fossil Gas / IT; ENTSO Transparency Platform
- Electricity, hydropower, at pumped storage plant, ENTSO, summer 2018 [AT]: 0.0014882 kWh
  (4,2,1,1,3,3,BU:1.05); Hydro Pumped Storage / AT; ENTSO Transparency Platform
- Electricity, at cogen 300kWth, diesel, allocation exergy [CH]: 0.00018156 kWh
  (4,2,1,1,3,3,BU:1.05); Fossil Oil / CH; ENTSO Transparency Platform
- Electricity, hydropower, at reservoir power plant, alpine region [RER]: 5.6698e-5 kWh
  (4,2,1,1,3,3,BU:1.05); Hydro Water Reservoir / IT; ENTSO Transparency Platform
- Electricity, production mix photovoltaic, at plant [IT]: 0.00011545 kWh
  (4,2,1,1,3,3,BU:1.05); Solar / IT; ENTSO Transparency Platform
- Electricity, oil, at power plant [IT]: 4.8244e-6 kWh
  (4,2,1,1,3,3,BU:1.05); Fossil Oil / IT; ENTSO Transparency Platform
- Electricity, at cogen 1MWth, wood chips, allocation exergy [CH]: 0.0015821 kWh
  (4,2,1,1,3,3,BU:1.05); Biomass / AT; ENTSO Transparency Platform
- Electricity, hydropower, at run-of-river power plant [RER]: 0.001997 kWh
  (4,2,1,1,3,3,BU:1.05); Hydro Run-of-river and poundage / DE; ENTSO Transparency Platform
- Electricity, hard coal, at power plant [FR]: 0.0013544 kWh
  (4,2,1,1,3,3,BU:1.05); Fossil Hard coal / FR; ENTSO Transparency Platform
- Electricity from waste, at municipal waste incineration plant [CH]: 0.00077328 kWh
  (4,2,1,1,3,3,BU:1.05); Waste / DE; ENTSO Transparency Platform
- Electricity, at cogen with biogas engine, allocation exergy [CH]: 0.002892 kWh
  (4,2,1,1,3,3,BU:1.05); Biomass / DE; ENTSO Transparency Platform
- Electricity, at cogen 300kWth, diesel, allocation exergy [CH]: 2.8449e-5 kWh
  (4,2,1,1,3,3,BU:1.05); Fossil Oil / DE; ENTSO Transparency Platform
- Electricity, industrial gas, at power plant [DE]: 0.000567 kWh
  (4,2,1,1,3,3,BU:1.05); Other / DE; ENTSO Transparency Platform
- Electricity from waste, at municipal waste incineration plant [CH]: 0.00072462 kWh
  (4,2,1,1,3,3,BU:1.05); Waste / AT; ENTSO Transparency Platform
- Electricity, hydropower, at reservoir power plant, non alpine regions [RER]: 0.0001348 kWh
  (4,2,1,1,3,3,BU:1.05); Hydro Water Reservoir / DE; ENTSO Transparency Platform
- Electricity, nuclear, at power plant pressure water reactor [CH]: 0.11432 kWh
  (4,2,1,1,3,3,BU:1.05); Nuclear / CH; ENTSO Transparency Platform
- Electricity, nuclear, at power plant boiling water reactor [DE]: 0.0020262 kWh
  (4,2,1,1,3,3,BU:1.05); Nuclear / DE; ENTSO Transparency Platform
- Electricity, at wind farm [RER]: 2.985e-5 kWh
  (4,2,1,1,3,3,BU:1.05); Geothermal / IT; ENTSO Transparency Platform
- Electricity, production mix photovoltaic, at plant [CH]: 0.031728 kWh
  (4,2,1,1,3,3,BU:1.05); Solar / CH; ENTSO Transparency Platform
- Electricity, hydropower, net, at reservoir power plant [CH]: 0.18324 kWh
  (4,2,1,1,3,3,BU:1.05); Hydro Water Reservoir / CH; ENTSO Transparency Platform
- Electricity, at 100MW wind farm, onshore, 2.3MW turbines [RER]: 0.011005 kWh
  (4,2,1,1,3,3,BU:1.05); Wind Onshore / DE; ENTSO Transparency Platform
- Electricity, at cogen with biogas engine, allocation exergy [CH]: 0.0004879 kWh
  (4,2,1,1,3,3,BU:1.05); Biomass / AT; ENTSO Transparency Platform
- Electricity, hydropower, at pumped storage plant, ENTSO, summer 2018 [CH]: 0.026544 kWh
  (4,2,1,1,3,3,BU:1.05); Hydro Pumped Storage / CH; ENTSO Transparency Platform
- Electricity, at wind farm [RER]: 0.0046267 kWh
  (4,2,1,1,3,3,BU:1.05); Wind Onshore / AT; ENTSO Transparency Platform
- Electricity from waste, at municipal waste incineration plant [CH]: 0.00081869 kWh
  (4,2,1,1,3,3,BU:1.05); Waste / FR; ENTSO Transparency Platform
- Electricity, natural gas, at power plant [AT]: 0.0031836 kWh
  (4,2,1,1,3,3,BU:1.05); Fossil Gas / AT; ENTSO Transparency Platform
- Electricity, industrial gas, at power plant [DE]: 0.00050319 kWh
  (4,2,1,1,3,3,BU:1.05); Fossil Coal-derived gas / DE; ENTSO Transparency Platform
- Electricity, hydropower, at pumped storage plant, ENTSO, summer 2018 [FR]: 0.0015494 kWh
  (4,2,1,1,3,3,BU:1.05); Hydro Pumped Storage / FR; ENTSO Transparency Platform
- Electricity, at wind farm [RER]: 8.5537e-5 kWh
  (4,2,1,1,3,3,BU:1.05); Wind Onshore / IT; ENTSO Transparency Platform
- Electricity, industrial gas, at power plant [AT]: 0.00015942 kWh
  (4,2,1,1,3,3,BU:1.05); Other / AT; ENTSO Transparency Platform
- Electricity, nuclear, at power plant pressure water reactor [FR]: 0.15037 kWh
  (4,2,1,1,3,3,BU:1.05); Nuclear / FR; ENTSO Transparency Platform
- Electricity, hydropower, at pumped storage plant, ENTSO, summer 2018 [IT]: 1.8712e-5 kWh
  (4,2,1,1,3,3,BU:1.05); Hydro Pumped Storage / IT; ENTSO Transparency Platform
- Electricity, lignite, at power plant [DE]: 0.017113 kWh
  (4,2,1,1,3,3,BU:1.05); Fossil Brown coal/Lignite / DE; ENTSO Transparency Platform
- Electricity, hydropower, at run-of-river power plant [CH]: 0.15525 kWh
  (4,2,1,1,3,3,BU:1.05); Hydro Run-of-river and poundage / CH; ENTSO Transparency Platform
- Electricity, at cogen with biogas engine, allocation exergy [CH]: 6.6446e-6 kWh
  (4,2,1,1,3,3,BU:1.05); Biomass / IT; ENTSO Transparency Platform
- Electricity, hydropower, at reservoir power plant, alpine region [RER]: 0.0069204 kWh
  (4,2,1,1,3,3,BU:1.05); Hydro Water Reservoir / FR; ENTSO Transparency Platform
- Electricity, natural gas, at power plant [DE]: 0.003323 kWh
  (4,2,1,1,3,3,BU:1.05); Fossil Gas / DE; ENTSO Transparency Platform
- Electricity, natural gas, at power plant [FR]: 0.0048683 kWh
  (4,2,1,1,3,3,BU:1.05); Fossil Gas / FR; ENTSO Transparency Platform
- Electricity, at cogen 300kWth, diesel, allocation exergy [CH]: 1.0787e-7 kWh
  (4,2,1,1,3,3,BU:1.05); Fossil Oil / IT; ENTSO Transparency Platform
- Electricity, oil, at power plant [FR]: 0.00060056 kWh
  (4,2,1,1,3,3,BU:1.05); Fossil Oil / FR; ENTSO Transparency Platform
- Electricity, production mix photovoltaic, at plant [FR]: 0.0047761 kWh
  (4,2,1,1,3,3,BU:1.05); Solar / FR; ENTSO Transparency Platform
- Electricity, at 100MW wind farm, onshore, 2.3MW turbines [RER]: 0.00017286 kWh
  (4,2,1,1,3,3,BU:1.05); Other renewable / DE; ENTSO Transparency Platform
- Electricity, hard coal, at power plant [AT]: 0.00033213 kWh
  (4,2,1,1,3,3,BU:1.05); Fossil Hard coal / AT; ENTSO Transparency Platform
- Electricity, production mix photovoltaic, at plant [AT]: 0.0020043 kWh
  (4,2,1,1,3,3,BU:1.05); Solar / AT; ENTSO Transparency Platform
- Electricity, at cogen 1MWth, wood chips, allocation exergy [CH]: 0.0082506 kWh
  (4,2,1,1,3,3,BU:1.05); Biomass / CH; ENTSO Transparency Platform
- Electricity, industrial gas, at power plant [IT]: 0.00031901 kWh
  (4,2,1,1,3,3,BU:1.05); Other / IT; ENTSO Transparency Platform
- Electricity, oil, at power plant [DE]: 0.0003255 kWh
  (4,2,1,1,3,3,BU:1.05); Fossil Oil / DE; ENTSO Transparency Platform
- Electricity, hard coal, at power plant [DE]: 0.0078102 kWh
  (4,2,1,1,3,3,BU:1.05); Fossil Hard coal / DE; ENTSO Transparency Platform
- Electricity, at cogen with biogas engine, agricultural covered, alloc. exergy [CH]: 0.0025589 kWh
  (4,2,1,1,3,3,BU:1.05); Biomass / CH; ENTSO Transparency Platform
- Electricity, at cogen 300kWth, diesel, allocation exergy [CH]: 4.5114e-5 kWh
  (4,2,1,1,3,3,BU:1.05); Fossil Oil / FR; ENTSO Transparency Platform
- Electricity, hydropower, at pumped storage plant, ENTSO, summer 2018 [DE]: 0.00092244 kWh
  (4,2,1,1,3,3,BU:1.05); Hydro Pumped Storage / DE; ENTSO Transparency Platform
- Electricity, at cogen 300kWth, biomethane, allocation exergy [CH]: 0.005862 kWh
  (4,2,1,1,3,3,BU:1.05); Biomass / CH; ENTSO Transparency Platform
- Electricity, hydropower, at reservoir power plant, alpine region [RER]: 0.0030655 kWh
  (4,2,1,1,3,3,BU:1.05); Hydro Water Reservoir / AT; ENTSO Transparency Platform
- Electricity from waste, at municipal waste incineration plant [CH]: 0.01071 kWh
  (4,2,1,1,3,3,BU:1.05); Waste / CH; ENTSO Transparency Platform
- Electricity, nuclear, at power plant pressure water reactor [DE]: 0.0074812 kWh
  (4,2,1,1,3,3,BU:1.05); Nuclear / DE; ENTSO Transparency Platform
- Electricity, at cogen with biogas engine, allocation exergy [CH]: 0.00051676 kWh
  (4,2,1,1,3,3,BU:1.05); Biomass / FR; ENTSO Transparency Platform
- Electricity, at cogen 1MWth, wood chips, allocation exergy [CH]: 0.0023793 kWh
  (4,2,1,1,3,3,BU:1.05); Biomass / DE; ENTSO Transparency Platform
- Electricity, at 100MW wind farm, onshore, 2.3MW turbines [RER]: 0.0025378 kWh
  (4,2,1,1,3,3,BU:1.05); Wind Offshore / DE; ENTSO Transparency Platform
- Electricity, hydropower, at run-of-river power plant [RER]: 0.021016 kWh
  (4,2,1,1,3,3,BU:1.05); Hydro Run-of-river and poundage / AT; ENTSO Transparency Platform
- Electricity, at cogen 1MWth, wood chips, allocation exergy [CH]: 1.0972e-5 kWh
  (4,2,1,1,3,3,BU:1.05); Biomass / IT; ENTSO Transparency Platform

## Sampling procedure
Statistics

## Extrapolations
Some generic datasets from ecoinvent have been used.

## Sources
- Frischknecht R., Alig M., 2021, 2021 - Electricity mixes in LCA of buildings - Frischknecht, Project report, 651, treeze Ltd., Bern, CH
Stolz P., Frischknecht R. (2020) Electricity Mixes in Life Cycle Assessments of Buildings. Project report. Volume: 651. treeze Ltd.. Uster, CH.
Type: Separate publication
Source: Report
First author: Stolz P.
Other authors: Frischknecht R.
Year: 2020
Title of anthology: Project report
Place of publication: Uster, CH
Publisher: treeze Ltd.
Volume No: 651

## Validation
Proof reading validation: 20.07.2020; Other validation: G:\Projekte laufend\651 Strommixe LCA Gebäude BFE\EcoSpold\[651-Electricity-Mixes-Attributional-CH-v0.19.xlsx]X-Process;
