# Disposal, drilling waste, 71.5% water, to residual material landfill

Dataset: EcoSpold 1, unit process
Functional unit: 1 kg
Category: landfill / residual material landfill
Geography: CH
Time period: 2000-01 to 2000-12
Generated by: Gabor Doka
accessRestrictedTo: 0
copyright: true

## General comment
Inventoried waste contains 100% drilling waste; . waste composition (wet, in ppm): upper heating value 0.773 MJ/kg; H2O 714700; O 100000; H 5000; C 30000; S 6000; N n.a.; P 500; B 100; Cl 35000; Br n.a.; F 500; I n.a.; Ag n.a.; As 4; Ba 5000; Cd n.a.; Co n.a.; Cr 50; Cu n.a.; Hg n.a.; Mn 400; Mo n.a.; Ni n.a.; Pb n.a.; Sb n.a.; Se n.a.; Sn n.a.; V n.a.; Zn 150; Be n.a.; Sc n.a.; Sr 100; Ti n.a.; Tl n.a.; W n.a.; Si 1000; Fe 20000; Ca 40000; Al 10000; K 3500; Mg 8000; Na 20000; Share of carbon in waste that is biogenic 0%. ;;

## Included processes
Waste-specific short-term emissions to water from leachate. Long-term emissions from landfill to ground water.

## Geography
Technology encountered in Switzerland in 2000. Landfill includes base seal and leachate collection system.

## Technology
Swiss residual material landfill for polluted, inorganic waste. With base seal and leachate collection system. Recultivation after closure.

## Time period
Waste composition as given in literature reference, theoretical data or other source. Transfer coefficients from prospective model.

## Reference product
- Disposal, drilling waste, 71.5% water, to residual material landfill [CH]: 1 kg
  SWITZERLAND

## Inputs from technosphere
- Process-specific burdens, residual material landfill [CH]: 1 kg; lognormal SD95 1
  demands per kilogram waste. uncertainty is heeded in the module
- Residual material landfill facility [CH]: 2.0833e-9 p; lognormal SD95 1
  demands per kilogram waste. uncertainty is heeded in the module

## Emissions to nature
- Aluminium [emissions to water, river]: 4.9558e-6 kg; lognormal SD95 8.2387
  uncertainty is calculated from uncertainties in waste composition and transfer coefficients in residual landfill
- Fluoride [emissions to water, river]: 2.7096e-5 kg; lognormal SD95 6.8556
  (same comment as for Aluminium)
- Barium [emissions to water, river]: 6.8951e-8 kg; lognormal SD95 13.253
  (same comment as for Aluminium)
- Magnesium [emissions to water, river]: 1.5175e-6 kg; lognormal SD95 9.4837
  (same comment as for Aluminium)
- Phosphate [emissions to water, river]: 5.718e-7 kg; lognormal SD95 11.87
  (same comment as for Aluminium)
- Arsenic [emissions to water, river]: 4e-6 kg; lognormal SD95 10.557
  (same comment as for Aluminium)
- Manganese [emissions to water, river]: 5.5161e-9 kg; lognormal SD95 16.865
  (same comment as for Aluminium)
- Sodium [emissions to water, groundwater, long-term]: 0.012494 kg; lognormal SD95 2.9493
  uncertainty is calculated from uncertainties in waste composition and transfer coefficients in incinerator and landfills.
- Chloride [emissions to water, river]: 0.01001 kg; lognormal SD95 2.8058
  (same comment as for Aluminium)
- Phosphate [emissions to water, groundwater, long-term]: 0.00034251 kg; lognormal SD95 9.863
  (same comment as for Sodium)
- Calcium [emissions to water, river]: 6.0339e-6 kg; lognormal SD95 8.2388
  (same comment as for Aluminium)
- Zinc [emissions to water, groundwater, long-term]: 1.8384e-6 kg; lognormal SD95 121.1
  (same comment as for Sodium)
- Fluoride [emissions to water, groundwater, long-term]: 0.0004729 kg; lognormal SD95 5.6443
  (same comment as for Sodium)
- Strontium [emissions to water, river]: 6.044e-8 kg; lognormal SD95 13.365
  (same comment as for Aluminium)
- Chromium VI [emissions to water, river]: 3.0056e-6 kg; lognormal SD95 9.1238
  (same comment as for Aluminium)
- DOC, Dissolved Organic Carbon [emissions to water, river]: 3.2367e-5 kg; lognormal SD95 6.5594
  (same comment as for Aluminium)
- BOD5, Biological Oxygen Demand [emissions to water, river]: 2.6755e-5 kg; lognormal SD95 6.5594
  (same comment as for Aluminium)
- Manganese [emissions to water, groundwater, long-term]: 3.3041e-6 kg; lognormal SD95 165.74
  (same comment as for Sodium)
- TOC, Total Organic Carbon [emissions to water, river]: 3.2367e-5 kg; lognormal SD95 6.5594
  (same comment as for Aluminium)
- Sulfate [emissions to water, river]: 0.0019312 kg; lognormal SD95 4.3688
  (same comment as for Aluminium)
- Calcium [emissions to water, groundwater, long-term]: 0.0036143 kg; lognormal SD95 13.108
  (same comment as for Sodium)
- COD, Chemical Oxygen Demand [emissions to water, groundwater, long-term]: 0.048995 kg; lognormal SD95 2.9307
  (same comment as for Sodium)
- Aluminium [emissions to water, groundwater, long-term]: 0.0029685 kg; lognormal SD95 5.5619
  (same comment as for Sodium)
- Silicon [emissions to water, river]: 2.2489e-6 kg; lognormal SD95 8.9949
  (same comment as for Aluminium)
- Chloride [emissions to water, groundwater, long-term]: 0.02499 kg; lognormal SD95 2.6027
  (same comment as for Sodium)
- DOC, Dissolved Organic Carbon [emissions to water, groundwater, long-term]: 0.019388 kg; lognormal SD95 2.9307
  (same comment as for Sodium)
- TOC, Total Organic Carbon [emissions to water, groundwater, long-term]: 0.019388 kg; lognormal SD95 2.9307
  (same comment as for Sodium)
- Chromium VI [emissions to water, groundwater, long-term]: 9.4944e-6 kg; lognormal SD95 7.8463
  (same comment as for Sodium)
- Iron [emissions to water, groundwater, long-term]: 0.00010024 kg; lognormal SD95 222.08
  (same comment as for Sodium)
- Potassium [emissions to water, river]: 0.0009866 kg; lognormal SD95 4.3408
  (same comment as for Aluminium)
- Barium [emissions to water, groundwater, long-term]: 4.1301e-5 kg; lognormal SD95 145.65
  (same comment as for Sodium)
- Boron [emissions to water, river]: 7.8351e-7 kg; lognormal SD95 10.265
  (same comment as for Aluminium)
- Magnesium [emissions to water, groundwater, long-term]: 0.00090898 kg; lognormal SD95 12.322
  (same comment as for Sodium)
- Iron [emissions to water, river]: 1.6734e-7 kg; lognormal SD95 12.254
  (same comment as for Aluminium)
- Boron [emissions to water, groundwater, long-term]: 9.8325e-5 kg; lognormal SD95 7.1115
  (same comment as for Sodium)
- Arsenic [emissions to water, groundwater, long-term]: 4e-15 kg; lognormal SD95 10.77
  (same comment as for Sodium)
- Sodium [emissions to water, river]: 0.0075056 kg; lognormal SD95 3.0611
  (same comment as for Aluminium)
- Strontium [emissions to water, groundwater, long-term]: 3.6204e-5 kg; lognormal SD95 9.1076
  (same comment as for Sodium)
- COD, Chemical Oxygen Demand [emissions to water, river]: 8.1795e-5 kg; lognormal SD95 6.5594
  (same comment as for Aluminium)
- Sulfate [emissions to water, groundwater, long-term]: 0.016069 kg; lognormal SD95 3.7132
  (same comment as for Sodium)
- BOD5, Biological Oxygen Demand [emissions to water, groundwater, long-term]: 0.016026 kg; lognormal SD95 2.9307
  (same comment as for Sodium)
- Potassium [emissions to water, groundwater, long-term]: 0.0025134 kg; lognormal SD95 4.1162
  (same comment as for Sodium)
- Silicon [emissions to water, groundwater, long-term]: 0.00099775 kg; lognormal SD95 5.0625
  (same comment as for Sodium)
- Zinc [emissions to water, river]: 3.0691e-9 kg; lognormal SD95 17.814
  (same comment as for Aluminium)

## Sampling procedure
Landfill model based on observed leachate concentrations in literature. Extrapolated to 60'000 years heeding chemical characteristics. Initial waste composition from various literature sources.

## Uncertainty adjustments
uncertainty of waste input composition data derived from generic formula GSD(c) = N*ln(c)+1. Mean long-term emissions are the emissions until the next glacial period occurs (in 60'000a) and the landfill is eroded. Maximal long-term emissions are the complete emissions of all landfilled material (except Cr). Minimal long-term emissions are derived implicitly from the mean and maximal values assuming a lognormal distribution.

## Sources
- Doka G., 2009, 2009 - LCI waste treatment services - Doka, Final report ecoinvent data v2.1, 13, Swiss Centre for LCI, Doka LCA, Duebendorf and St. Gallen, CH
Doka G. (2009) Life Cycle Inventories of Waste Treatment Services. Final report ecoinvent data v2.1. Volume: 13. Swiss Centre for LCI, Empa - TSL. Dübendorf, CH.
Type: Measurement on site
Source: CD-ROM
First author: Doka G.
Year: 2009
Title of anthology: Final report ecoinvent data v2.1
Place of publication: Dübendorf, CH
Publisher: Swiss Centre for LCI, Empa - TSL
Volume No: 13

## Validation
Proof reading validation: passed.; Other validation: none;
