# Synthetic gas plant

Dataset: EcoSpold 1, unit process, infrastructure
Functional unit: 1 p
Category: fuels / biofuels\infrastructure
Geography: CH
Time period: 2004-01 to 2004-12
Production volume: Installed CH syngas production capacity is 1-1.2 MWth out of 2 units.
Share of production covered: 0 %
Generated by: Arnaud Dauriat
accessRestrictedTo: 0
copyright: true

## General comment
Lifetime is assumed to be 50 years. Typical biomass gasifier of 5 MWth output (i.e. 7.2-7.6 MWth input) capacity, processing 32-35 t/day of wood (dry matter) to 80'000-83'000 Nm3/day of syngas (330 day/yr). ;
Synonyms: syngas, synthesis gas, producer gas, town gas;

## Included processes
This infrastructure process includes land use, buildings and facilities (including dismantling) of a typical biomass gasifier. Process includes the dryer, the comminution equipment, the gasifier and the gas treatment and conditioning facility.

## Technology
Swiss production of syngas is limited to pilot-scale fixed-bed gasifiers (Pyroforce, Xylowatt). Data is not specific to the technology (i.e. fixed bed or fluidised bed).

## Reference product
- Synthetic gas plant [CH]: 1 p
  SWITZERLAND

## Inputs from technosphere
- Concrete, normal, at plant [CH]: 360 m3; lognormal SD95 1.6362
  (3,5,4,2,4,na); Adapted from 'Industrial furnace, coal, 1-10 MW', factor 2, 50 yrs lifetime
- Transport, freight, lorry, 16t-32t gross weight, fleet average [CH]: 20862 tkm; lognormal SD95 2.095
  (4,5,na,na,na,na); Based on ecoinvent Guidelines, standard distances
- Disposal, building, reinforcement steel, to sorting plant [CH]: 54000 kg; lognormal SD95 1.6362
  (3,5,4,2,4,na); Adapted from ecoinvent process 'Industrial furnace, coal, 1-10 MW'
- Aluminium, production mix, at plant [RER]: 720 kg; lognormal SD95 1.6362
  (same comment as for Concrete, normal, at plant)
- Steel, low-alloyed, at plant [RER]: 18000 kg; lognormal SD95 1.6362
  (same comment as for Concrete, normal, at plant)
- Electricity, medium voltage, at grid [CH]: 60000 kWh; lognormal SD95 1.6362
  (same comment as for Concrete, normal, at plant)
- Copper, at regional storage [RER]: 1800 kg; lognormal SD95 1.6362
  (same comment as for Concrete, normal, at plant)
- Transport, freight, rail, electricity with shunting [CH]: 44424 tkm; lognormal SD95 2.095
  (4,5,na,na,na,na); Based on ecoinvent Guidelines, standard distances
- Disposal, building, concrete, not reinforced, to sorting plant [CH]: 856800 kg; lognormal SD95 1.6362
  (3,5,4,2,4,na); Calculation according to consumption and density of steel
- Reinforcing steel, at plant [RER]: 54000 kg; lognormal SD95 1.6362
  (same comment as for Concrete, normal, at plant)
- Diesel, burned in building machine, average [CH]: 1.08e6 MJ; lognormal SD95 1.6362
  (same comment as for Concrete, normal, at plant)
- Heat, light fuel oil, at industrial furnace 1MW [CH]: 1.08e6 MJ; lognormal SD95 1.6362
  (same comment as for Concrete, normal, at plant)

## Inputs from nature
- Occupation, industrial area, built up [resources, land]: 120000 m2a; lognormal SD95 1.8889
  (same comment as for Concrete, normal, at plant)
- Occupation, construction site [resources, land]: 9600 m2a; lognormal SD95 1.8889
  (same comment as for Concrete, normal, at plant)
- Transformation, from unknown [resources, land]: 4800 m2; lognormal SD95 2.3369
  (same comment as for Concrete, normal, at plant)
- Transformation, to industrial area, built up [resources, land]: 2400 m2; lognormal SD95 2.3369
  (same comment as for Concrete, normal, at plant)
- Transformation, to industrial area, vegetation [resources, land]: 2400 m2; lognormal SD95 2.3369
  (same comment as for Concrete, normal, at plant)
- Occupation, industrial area, vegetation [resources, land]: 120000 m2a; lognormal SD95 1.8889
  (same comment as for Concrete, normal, at plant)

## Emissions to nature
- Heat, waste [emissions to air, low. pop., long-term]: 216000 MJ; lognormal SD95 1.05
  (1,1,1,1,1,na); Calculation

## Sampling procedure
Dataset was adapted from ecoinvent process 'industrial furnace, coal, 1-10 MW'.

## Sources
- Jungbluth N., Chudacoff M., Dauriat A., Dinkel F., Doka G., Faist Emmenegger M., Gnansounou E., Kljun N., Spielmann M., Stettler C., Sutter J., 2007, 2007 - LCI bioenergy - Jungbluth, Final report ecoinvent data v2.0, 17, Swiss Centre for LCI, ESU-services Ltd., Duebendorf and Uster, CH
Jungbluth N., Chudacoff M., Dauriat A., Dinkel F., Doka G., Faist Emmenegger M., Gnansounou E., Kljun N., Spielmann M., Stettler C., Sutter J. (2007) Life Cycle Inventories of Bioenergy. Final report ecoinvent data v2.0. Volume: 17. Swiss Centre for LCI, ESU. Duebendorf and Uster, CH.
Type: Measurement on site
Source: CD-ROM
First author: Jungbluth N.
Other authors: Chudacoff M., Dauriat A., Dinkel F., Doka G., Faist Emmenegger M., Gnansounou E., Kljun N., Spielmann M., Stettler C., Sutter J.
Year: 2007
Title of anthology: Final report ecoinvent data v2.0
Place of publication: Duebendorf and Uster, CH
Publisher: Swiss Centre for LCI, ESU
Volume No: 17

## Validation
Proof reading validation: Passed.; Other validation: none;
