# Glazing, triple (3-IV), U=0.6 W/m2K, 4 Low E 1.1 ESG / 14 Ar / 4 Float / 14 Ar / VSG 2x4, 0.76 PVB, Low E 1.1 Float, at plant

Dataset: EcoSpold 1, unit process
Functional unit: 1 m2
Category: construction materials / glazing
Geography: CH
Time period: 2000-01 to 2016-12
Generated by: Matthias Klingler
accessRestrictedTo: 0
copyright: true

## General comment
Herstellung 4 Low E 1.1 ESG / 14 Ar / 4 Float / 14 Ar / VSG 2x4, 0.76 PVB, Low E 1.1 Float pro m2 sichtbare Verglasung (Verglasungsfläche netto), 1m2 Verglasungsfläche netto entsprechen 1.06 m2 Verglasungsfläche brutto.
Technology: Erhebung Flachglas Schweiz und Glas Trösch 2013
Version: 0.0

Local category: construction materials
Local subcategory: Verglasungen

## Reference product
- Glazing, triple (3-IV), U=0.6 W/m2K, 4 Low E 1.1 ESG / 14 Ar / 4 Float / 14 Ar / VSG 2x4, 0.76 PVB, Low E 1.1 Float, at plant [CH]: 1 m2
  SWITZERLAND

## Inputs from technosphere
All rows: lognormal SD95 1.1025
- Polyethylene terephthalate, granulate, amorphous, at plant [RER]: 0.00499 kg
  (1;3;1;1;1)
- Polypropylene, granulate, at plant [RER]: 0.00848 kg
  (1;3;1;1;1)
- Tempering, flat glass [CH]: 14.5 kg
  (1;3;1;1;1)
- Polyurethane, rigid foam, at plant [RER]: 0.3 kg
  (1;3;1;1;1)
- Glass fibre reinforced plastic, polyamide, injection moulding, at plant [RER]: 0.0237 kg
  (1;3;1;1;1)
- Treatment, sewage, to wastewater treatment, class 2 [CH]: 0.0265 m3
  (1;3;1;1;1)
- Disposal, glass, 0% water, to construction waste landfill [CH]: 3.67 kg
  (1;3;1;1;1)
- Polysulphide, sealing compound, at plant [RER]: 0.467 kg
  (1;3;1;1;1)
- Electricity, medium voltage, at grid [CH]: 8.32 kWh
  (1;3;1;1;1)
- Transport, freight, lorry, fleet average [RER]: 31.1661 tkm
  (1;3;1;1;1)
- Laminated safety glass, at plant [CH]: 1.45 m2
  (1;3;1;1;1)
- Natural gas, burned in industrial furnace 1MWth [CH]: 20.5 MJ
  (1;3;1;1;1)
- Chromium steel 18/8, at plant [RER]: 0.256 kg
  (1;3;1;1;1)
- Polyethylene, LDPE, granulate, at plant [RER]: 0.000846 kg
  (1;3;1;1;1)
- Argon, liquid, at plant [RER]: 0.0705 kg
  (1;3;1;1;1)
- Disposal, plastics, mixture, 15.3% water, to municipal incineration [CH]: 0.266 kg
  (1;3;1;1;1)
- Float glass, at plant [RER]: 29.1 kg
  (1;3;1;1;1)
- Tap water, at user [CH]: 26.5 kg
  (1;3;1;1;1)
- Lubricating oil, at plant [RER]: 0.00118 kg
  (1;3;1;1;1)
- Polystyrene foam slab, at plant [RER]: 0.00226 kg
  (1;3;1;1;1)
- Foaming, expanding [RER]: 0.000846 kg
  (1;3;1;1;1)
- Zeolite, powder, at plant [RER]: 0.19 kg
  (1;3;1;1;1)
- Extrusion, plastic film [RER]: 0.02427 kg
  (1;3;1;1;1)
- Polyethylene, HDPE, granulate, at plant [RER]: 0.0108 kg
  (1;3;1;1;1)
- Polybutadiene, at plant [RER]: 0.0522 kg
  (1;3;1;1;1)
- Coating, flat glass [CH]: 14.5 kg
  (1;3;1;1;1)
- Solid unbleached board, SUB, at plant [RER]: 0.0123 kg
  (1;3;1;1;1)
- Silicone product, at plant [RER]: 0.5941 kg
  (1;3;1;1;1)
- Sheet rolling, chromium steel [RER]: 0.256 kg
  (1;3;1;1;1)

## Sources
- Created for EcoSpold 1 compatibility, Sachbilanzen von Energiesystemen. Final report No. 6 ecoinvent data v2.0, 6
Faist Emmenegger, M., Heck, T., Jungbluth, N. (2007) Erdgas. Sachbilanzen von Energiesystemen. Final report No. 6 ecoinvent data v2.0. Editors: Dones R.. Volume: 6. Swiss Centre for LCI, PSI. Dübendorf and Villigen, CH.
Type: Measurement on site
Source: CD-ROM
First author: Faist Emmenegger, M.
Other authors: Heck, T., Jungbluth, N.
Year: 2007
Name of editors: Dones R.
Title of anthology: Sachbilanzen von Energiesystemen. Final report No. 6 ecoinvent data v2.0
Place of publication: Dübendorf and Villigen, CH
Publisher: Swiss Centre for LCI, PSI
Volume No: 6
