# Disposal, polyvinylchloride, 0.2% water, to municipal incineration

Dataset: EcoSpold 1, unit process
Functional unit: 1 kg
Category: waste management / municipal incineration
Geography: CH
Time period: 2000-01 to 2000-12
Generated by: Gabor Doka
accessRestrictedTo: 0
copyright: true

## General comment
This dataset represents the activity of waste disposal of waste polyvinylchloride in a municipal solid waste incinerator (MSWI) Recommended use of this dataset: For PVC, which goes to disposal as part of communal waste mixture. Larger amounts of clean, separated PVC could go to recycling. Waste composition (wet, in ppm): upper heating value 21.67 MJ/kg; lower heating value 21.51 MJ/kg; H2O 2000; O 16911; H 54921; C 440610; S 1057; N 1057; P n.a.; B n.a.; Cl 475290; Br 73.839; F 15.506; I n.a.; Ag n.a.; As 2.0042; Ba 196.73; Cd 2.7546; Co 33.322; Cr 43.106; Cu 28.223; Hg 0.89569; Mn 84.301; Mo n.a.; Ni 21.729; Pb 16.002; Sb 45.323; Se 2.2152; Sn 391.41; V 303.95; Zn 59.775; Be 0.52742; Sc n.a.; Sr 93.353; Ti 1054.8; Tl 0.42194; W n.a.; Si n.a.; Fe 3930; Ca n.a.; Al 210.97; K n.a.; Mg n.a.; Na 1545.9; Share of carbon in waste that is biogenic 0%. Share of metals in waste not oxidised and bulk-recyclable (exclude very small or thin parts) Iron: 0%; Alu: 0%; Copper: 0%. One kg of this waste produces 0.02801 kg of slag and 0.2282 kg of residues, which are landfilled. Additional solidification with 0.09127 kg of cement. Net energy production: 2.21MJ/kg electric energy and 5.38MJ/kg thermal energy. Recovery of metal scrap to recycling: 0g iron scrap, 0g aluminium scrap, 0g copper scrap.;;

## Included processes
Waste incineration from waste reception gate further downstream (excluding transport to the MSWI plant). Waste-specific air and water emisions from incineration, auxiliary material consumption for flue gas cleaning. Short-term emissions to river water and long-term emisisons to ground water from slag compartment (from bottom ash) and residual material landfill (from solidified fly ashes and scrubber slugde). Waste-specific process energy demands for MSWI and net energy generation.

## Geography
Specific to the technology mix encountered in Switzerland in 2010. Well applicable to modern incineration practices in Europe, North America or Japan.

## Technology
average Swiss MSWI plants in 2010 (grate incinerators) with electrostatic precipitator for fly ash (ESP), wet flue gas scrubber and 25% SNCR , 42.77% SCR-high dust , 32.68% SCR-low dust -DeNOx facilities and 0% without Denox (weighted according to mass of burnt waste, representing Swiss average). Efficiency of iron scrap separation from slag : 58%. Efficiency of non-ferrous scrap separation from slag : 31%. Gross electric efficiency technology mix 15.84% and Gross thermal efficiency technology mix 28.51%

## Time period
Waste composition as given in literature reference, theoretical data or other source. Transfer coefficients for modern MSWI.

## Reference product
- Disposal, polyvinylchloride, 0.2% water, to municipal incineration [CH]: 1 kg
  SWITZERLAND

## Inputs from technosphere
- Process-specific burdens, slag compartment [CH]: 0.027126 kg; lognormal SD95 1.6704
  mass-specific expenditures required for landfilling of bottom ash. uncertainty is calculated from uncertainties in waste composition and transfer coefficients in incinerator
- Hydrochloric acid, 30% in H2O, at plant [RER]: 0.003697 kg; lognormal SD95 1.2986
  auxilliary inputs for the wastewater treatment stage of the incinerator plant. uncertainty calculated from uncertainty in average HCl input, of transfer coefficients in the incinerator, and the uncertainty of the waste composition of this waste
- Disposal, cement, hydrated, 0% water, to residual material landfill [CH]: 0.22817 kg; lognormal SD95 1.5041
  Hydrated cement output for solidification of landfilled residual material. Uncertainty calculated from uncertainty of the waste composition of this waste and transfer coefficients in the incinerator and of the solidification recipe.
- Sodium hydroxide, 50% in H2O, production mix, at plant [RER]: 0.048702 kg; lognormal SD95 1.2967
  auxilliary inputs for the flue gas treatment stage of the incinerator plant. uncertainty calculated from uncertainty in average NaOH input, of transfer coefficients in the incinerator, and the uncertainty of the waste composition of this waste
- Municipal waste incineration plant [CH]: 2.5e-10 p; lognormal SD95 1
  demands per kilogram waste. uncertainty is heeded in the module
- Transport, freight, rail [RER]: 0.14714 tkm; lognormal SD95 1.1464
  Transport services to transport incineration residues to landfills and to transport auxilliary inputs of the incinerator plant. uncertainty calculated from uncertainty in average auxiliary material input, the uncertainty of the waste composition of this waste and the uncertainty in generic transportation distances
- Quicklime, milled, packed, at plant [CH]: 0.25288 kg; lognormal SD95 1.2993
  auxilliary inputs for the flue gas treatment stage of the incinerator plant. uncertainty calculated from uncertainty in average CaO input, of transfer coefficients in the incinerator, and the uncertainty of the waste composition of this waste
- Water, decarbonised, at plant [RER]: 89.683 kg; lognormal SD95 3.0678
  Incinerator process water used in flue gas scrubber stage. uncertainty calculated from uncertainty in average water input, and the uncertainty of the waste composition of this waste
- Chemicals inorganic, at plant [GLO]: 0.014065 kg; lognormal SD95 1.2986
  auxilliary inputs for the wastewater treatment stage of the incinerator plant. Proxy for Polyelectrolyte. uncertainty calculated from uncertainty in average Polyelectrolyte input, of transfer coefficients in the incinerator, and the uncertainty of the waste composition of this waste
- Cement, unspecified, at plant [CH]: 0.091269 kg; lognormal SD95 1.5041
  Cement required for solidification of landfilled residual material. Uncertainty calculated from uncertainty of the waste composition of this waste, of transfer coefficients in the incinerator and of the solidification recipe.
- Natural gas, burned in industrial furnace 1MW [CH]: 0.12328 MJ; lognormal SD95 2.9319
  Input to DeNOx stage, to heat up flue gas in low-dust SCR. uncertainty calculated from uncertainty in average DeNOx input, uncertainty in the share of thermal NOx, uncertainty of nitrogen content in average municipal waste and the uncertainty in nitrogen content in *this* waste.
- Process-specific burdens, residual material landfill [CH]: 0.22817 kg; lognormal SD95 1.4347
  mass-specific expenditures required for landfilling of incineration residues. uncertainty is calculated from uncertainties in waste composition and transfer coefficients in incinerator
- Chromium oxide, flakes, at plant [RER]: 8.4291e-7 kg; lognormal SD95 4.6532
  Input to DeNOx stage. uncertainty calculated from uncertainty in average DeNOx input, uncertainty in the share of thermal NOx, uncertainty of nitrogen content in average municipal waste and the uncertainty in nitrogen content in *this* waste.
- Titanium dioxide, production mix, at plant [RER]: 4.1303e-5 kg; lognormal SD95 4.6532
  Input to DeNOx stage (TiO2 catalyst carrier) uncertainty calculated from uncertainty in average DeNOx input, uncertainty in the share of thermal NOx, uncertainty of nitrogen content in average municipal waste and the uncertainty in nitrogen content in *this* waste.
- Iron (III) chloride, 40% in H2O, at plant [CH]: 8.3955e-5 kg; lognormal SD95 3.0678
  auxilliary inputs for the wastewater treatment stage of the incinerator plant. uncertainty calculated from uncertainty in average FeCl3 input, of transfer coefficients in the incinerator, and the uncertainty of the waste composition of this waste
- Residual material landfill facility [CH]: 4.7536e-10 p; lognormal SD95 1.4347
  landfill infrastructure required for landfilling of incineration residues. uncertainty is calculated from uncertainties in waste composition and transfer coefficients in incinerator
- Slag compartment [CH]: 4.8223e-11 p; lognormal SD95 1.6704
  landfill infrastructure required for landfilling of bottom ash. uncertainty is calculated from uncertainties in waste composition and transfer coefficients in incinerator
- Ammonia, liquid, at regional storehouse [CH]: 0.00065924 kg; lognormal SD95 2.9319
  Input to DeNOx stage (100% NH3). uncertainty calculated from uncertainty in average DeNOx input, uncertainty in the share of thermal NOx, uncertainty of nitrogen content in average municipal waste and the uncertainty in nitrogen content in *this* waste.
- Chemicals organic, at plant [GLO]: 1.5551e-5 kg; lognormal SD95 11.724
  auxilliary inputs for the wastewater treatment stage of the incinerator plant. Proxy for (pure) Trisodium-trimercapto-s-triazine (CAS 17766-26-6), used as 15% diluted solution, aka TMT15. uncertainty calculated from uncertainty in average TMT15 input, of transfer coefficients in the incinerator, and the uncertainty of the waste composition of this waste
- Transport, freight, lorry, 16t-32t gross weight, fleet average [CH]: 0.034931 tkm; lognormal SD95 1.1479
  (same comment as for Transport, freight, rail)

## Emissions to nature
- Manganese [emissions to water, river]: 1.3122e-8 kg; lognormal SD95 6.3255
  Emissions to water from waste composition and transfer coefficients in incinerator and landfills. uncertainty is calculated from uncertainties in waste composition and transfer coefficients in incinerator and landfills
- Nickel [emissions to water, groundwater, long-term]: 2.0857e-5 kg; lognormal SD95 8.4284
  Long-term emissions from landfilling of incineration residues. uncertainty is calculated from uncertainties in waste composition and transfer coefficients in incinerator and landfills.
- Phenol, pentachloro- [emissions to air, high. pop.]: 1.157e-11 kg; lognormal SD95 1.8079
  Incomplete combustion product emitted to air. uncertainty calculated from uncertainty in average operation emissions, and the uncertainty of the flue gas volume from this waste.
- Nickel [emissions to water, river]: 1.46e-8 kg; lognormal SD95 13.72
  (same comment as for Manganese)
- TOC, Total Organic Carbon [emissions to water, groundwater, long-term]: 0.0013093 kg; lognormal SD95 1.3486
  (same comment as for Nickel)
- Sodium [emissions to air, high. pop.]: 1.2692e-5 kg; lognormal SD95 4.7961
  Emission to air from waste composition and transfer coefficients. uncertainty is calculated from uncertainties in waste composition and transfer coefficients in incinerator
- Cobalt [emissions to air, high. pop.]: 6.0603e-8 kg; lognormal SD95 8.3521
  (same comment as for Sodium)
- Nitrogen oxides [emissions to air, high. pop.]: 0.00024545 kg; lognormal SD95 3.164
  sum of fuel-Nox and thermal-NOx emitted to air after DeNOx stage. uncertainty calculated from uncertainty in average N-emissions and uncertainty in the share of thermal NOx and the uncertainty in nitrogen content in *this* waste.
- Chloride [emissions to water, river]: 0.36489 kg; lognormal SD95 1.2551
  (same comment as for Manganese)
- Antimony [emissions to air, high. pop.]: 3.6306e-11 kg; lognormal SD95 8.4681
  (same comment as for Sodium)
- Chromium [emissions to water, river]: 3.3471e-9 kg; lognormal SD95 8.2232
  (same comment as for Manganese)
- Selenium [emissions to water, groundwater, long-term]: 1.4387e-6 kg; lognormal SD95 7.9234
  (same comment as for Nickel)
- Benzene, pentachloro- [emissions to air, high. pop.]: 1.4037e-10 kg; lognormal SD95 1.8079
  (same comment as for Phenol, pentachloro-)
- Dinitrogen monoxide [emissions to air, high. pop.]: 1.5764e-5 kg; lognormal SD95 10.881
  Nitrogen species emitted to air after DeNOx stage. uncertainty calculated from uncertainty in average N-emissions and uncertainty in the share of thermal NOx and the uncertainty in nitrogen content in *this* waste.
- Thallium [emissions to water, groundwater, long-term]: 2.4621e-7 kg; lognormal SD95 9.4233
  (same comment as for Nickel)
- Beryllium [emissions to water, groundwater, long-term]: 4.8203e-7 kg; lognormal SD95 12.273
  (same comment as for Nickel)
- Arsenic [emissions to water, river]: 1.3883e-6 kg; lognormal SD95 10.353
  (same comment as for Manganese)
- Cadmium [emissions to air, high. pop.]: 1.4041e-9 kg; lognormal SD95 11.222
  (same comment as for Sodium)
- Ammonia [emissions to air, high. pop.]: 7.7509e-7 kg; lognormal SD95 3.164
  (same comment as for Dinitrogen monoxide)
- Strontium [emissions to water, groundwater, long-term]: 9.3232e-5 kg; lognormal SD95 7.1743
  (same comment as for Nickel)
- Benzo(a)pyrene [emissions to air, high. pop.]: 5.9122e-13 kg; lognormal SD95 3.6157
  (same comment as for Phenol, pentachloro-)
- Particulates, < 2.5 um [emissions to air, high. pop.]: 3.172e-6 kg; lognormal SD95 3.6157
  (same comment as for Phenol, pentachloro-)
- BOD5, Biological Oxygen Demand [emissions to water, groundwater, long-term]: 0.0010823 kg; lognormal SD95 1.3486
  (same comment as for Nickel)
- Sodium [emissions to water, river]: 0.00042002 kg; lognormal SD95 3.0207
  (same comment as for Manganese)
- DOC, Dissolved Organic Carbon [emissions to water, river]: 0.00022509 kg; lognormal SD95 1.5021
  (same comment as for Manganese)
- Iron [emissions to water, groundwater, long-term]: 0.0019826 kg; lognormal SD95 5.0825
  (same comment as for Nickel)
- Heat, waste [emissions to water, river]: 3.8509 MJ; lognormal SD95 1.4309
  Waste heat generated from heating value of this waste plus any electricity required to process it. uncertainty is calculated from uncertainties in waste composition and uncertainties in energy efficiency and the uncertainty in internal energy demand
- Heat, waste [emissions to air, high. pop.]: 16.818 MJ; lognormal SD95 1.4309
  (same comment as for Heat, waste)
- Manganese [emissions to water, groundwater, long-term]: 5.2006e-5 kg; lognormal SD95 16.6
  (same comment as for Nickel)
- Copper [emissions to water, river]: 3.6571e-9 kg; lognormal SD95 7.4597
  (same comment as for Manganese)
- Copper [emissions to water, groundwater, long-term]: 2.521e-5 kg; lognormal SD95 8.2304
  (same comment as for Nickel)
- Bromine [emissions to water, groundwater, long-term]: 7.1169e-6 kg; lognormal SD95 7.4236
  (same comment as for Nickel)
- Barium [emissions to water, river]: 2.6478e-8 kg; lognormal SD95 8.7296
  (same comment as for Manganese)
- Methane, fossil [emissions to air, high. pop.]: 3.9852e-7 kg; lognormal SD95 1.8079
  (same comment as for Phenol, pentachloro-)
- Nitrate [emissions to water, river]: 1.3473e-5 kg; lognormal SD95 3.847
  (same comment as for Manganese)
- Lead [emissions to air, high. pop.]: 1.3184e-9 kg; lognormal SD95 9.3025
  (same comment as for Sodium)
- Chromium [emissions to air, high. pop.]: 3.7641e-8 kg; lognormal SD95 8.1225
  (same comment as for Sodium)
- Bromine [emissions to water, river]: 6.6685e-5 kg; lognormal SD95 3.9843
  (same comment as for Manganese)
- Mercury [emissions to water, groundwater, long-term]: 5.7047e-8 kg; lognormal SD95 34.663
  (same comment as for Nickel)
- Copper [emissions to air, high. pop.]: 2.585e-9 kg; lognormal SD95 8.6436
  (same comment as for Sodium)
- Titanium [emissions to air, high. pop.]: 8.7515e-7 kg; lognormal SD95 5.1529
  (same comment as for Sodium)
- Hydrogen fluoride [emissions to air, high. pop.]: 1.0461e-7 kg; lognormal SD95 9.1151
  (same comment as for Sodium)
- Vanadium [emissions to water, groundwater, long-term]: 0.00014169 kg; lognormal SD95 4.7469
  (same comment as for Nickel)
- Tin [emissions to water, groundwater, long-term]: 0.0001498 kg; lognormal SD95 13.269
  (same comment as for Nickel)
- Strontium [emissions to air, high. pop.]: 9.3353e-9 kg; lognormal SD95 7.4529
  (same comment as for Sodium)
- Toluene [emissions to air, high. pop.]: 5.3136e-8 kg; lognormal SD95 1.8079
  (same comment as for Phenol, pentachloro-)
- Arsenic [emissions to water, groundwater, long-term]: 6.0017e-7 kg; lognormal SD95 11.392
  (same comment as for Nickel)
- Antimony [emissions to water, river]: 1.5621e-5 kg; lognormal SD95 7.9041
  (same comment as for Manganese)
- Bromine [emissions to air, high. pop.]: 3.6883e-8 kg; lognormal SD95 7.5625
  (same comment as for Sodium)
- Cobalt [emissions to water, river]: 6.0372e-9 kg; lognormal SD95 10.887
  (same comment as for Manganese)
- Chromium VI [emissions to water, river]: 1.2047e-6 kg; lognormal SD95 8.5693
  (same comment as for Manganese)
- Cadmium [emissions to water, groundwater, long-term]: 2.0101e-7 kg; lognormal SD95 190.62
  (same comment as for Nickel)
- Iron [emissions to water, river]: 1.0331e-7 kg; lognormal SD95 5.8532
  (same comment as for Manganese)
- Tin [emissions to air, high. pop.]: 2.5567e-10 kg; lognormal SD95 6.3504
  (same comment as for Sodium)
- Arsenic [emissions to air, high. pop.]: 1.5699e-8 kg; lognormal SD95 11.492
  (same comment as for Sodium)
- Chloride [emissions to water, groundwater, long-term]: 0.11014 kg; lognormal SD95 1.3285
  (same comment as for Nickel)
- Selenium [emissions to water, river]: 7.4832e-7 kg; lognormal SD95 8.6521
  (same comment as for Manganese)
- Thallium [emissions to water, river]: 2.5848e-10 kg; lognormal SD95 15.247
  (same comment as for Manganese)
- Chromium VI [emissions to water, groundwater, long-term]: 3.9542e-6 kg; lognormal SD95 11.999
  (same comment as for Nickel)
- Fluoride [emissions to water, river]: 1.1856e-6 kg; lognormal SD95 5.8405
  (same comment as for Manganese)
- Vanadium [emissions to water, river]: 4.8529e-7 kg; lognormal SD95 6.9678
  (same comment as for Manganese)
- Sulfate [emissions to water, river]: 0.00053619 kg; lognormal SD95 3.0169
  (same comment as for Manganese)
- Strontium [emissions to water, river]: 5.8778e-8 kg; lognormal SD95 13.389
  (same comment as for Manganese)
- Sulfur dioxide [emissions to air, high. pop.]: 1.124e-5 kg; lognormal SD95 5.0917
  (same comment as for Sodium)
- Lead [emissions to water, groundwater, long-term]: 7.737e-6 kg; lognormal SD95 64.612
  (same comment as for Nickel)
- Lead [emissions to water, river]: 1.5307e-9 kg; lognormal SD95 7.4922
  (same comment as for Manganese)
- Titanium [emissions to water, groundwater, long-term]: 0.00031534 kg; lognormal SD95 5.8569
  (same comment as for Nickel)
- Vanadium [emissions to air, high. pop.]: 6.4465e-6 kg; lognormal SD95 6.1009
  (same comment as for Sodium)
- Carbon dioxide, fossil [emissions to air, high. pop.]: 1.6058 kg; lognormal SD95 1.3186
  (same comment as for Sodium)
- Zinc [emissions to air, high. pop.]: 4.0065e-8 kg; lognormal SD95 7.7841
  (same comment as for Sodium)
- DOC, Dissolved Organic Carbon [emissions to water, groundwater, long-term]: 0.0013093 kg; lognormal SD95 1.3486
  (same comment as for Nickel)
- Sulfate [emissions to water, groundwater, long-term]: 0.0026178 kg; lognormal SD95 3.3829
  (same comment as for Nickel)
- Titanium [emissions to water, river]: 3.9329e-7 kg; lognormal SD95 4.1426
  (same comment as for Manganese)
- Zinc [emissions to water, groundwater, long-term]: 1.8177e-5 kg; lognormal SD95 34.76
  (same comment as for Nickel)
- Antimony [emissions to water, groundwater, long-term]: 2.8822e-5 kg; lognormal SD95 7.6408
  (same comment as for Nickel)
- Cobalt [emissions to water, groundwater, long-term]: 2.7144e-5 kg; lognormal SD95 7.643
  (same comment as for Nickel)
- Mercury [emissions to water, river]: 9.7275e-10 kg; lognormal SD95 8.2667
  (same comment as for Manganese)
- Aluminium [emissions to water, groundwater, long-term]: 0.00015256 kg; lognormal SD95 5.8918
  (same comment as for Nickel)
- Sodium [emissions to water, groundwater, long-term]: 0.0011132 kg; lognormal SD95 2.9736
  (same comment as for Nickel)
- Hydrogen chloride [emissions to air, high. pop.]: 0.00027122 kg; lognormal SD95 1.4862
  (same comment as for Sodium)
- Aluminium [emissions to air, high. pop.]: 1.7201e-10 kg; lognormal SD95 6.9169
  (same comment as for Sodium)
- Cyanide [emissions to air, high. pop.]: 3.3868e-6 kg; lognormal SD95 10.881
  (same comment as for Dinitrogen monoxide)
- COD, Chemical Oxygen Demand [emissions to water, groundwater, long-term]: 0.0033088 kg; lognormal SD95 1.3486
  (same comment as for Nickel)
- Nickel [emissions to air, high. pop.]: 2.7296e-8 kg; lognormal SD95 8.8209
  (same comment as for Sodium)
- Dioxin, 2,3,7,8 Tetrachlorodibenzo-p- [emissions to air, high. pop.]: 5.3133e-14 kg; lognormal SD95 3.6157
  (same comment as for Phenol, pentachloro-)
- Benzene, hexachloro- [emissions to air, high. pop.]: 5.5552e-11 kg; lognormal SD95 1.8079
  (same comment as for Phenol, pentachloro-)
- COD, Chemical Oxygen Demand [emissions to water, river]: 0.00051542 kg; lognormal SD95 1.5011
  (same comment as for Manganese)
- Manganese [emissions to air, high. pop.]: 1.61e-8 kg; lognormal SD95 7.5076
  (same comment as for Sodium)
- NMVOC, non-methane volatile organic compounds, unspecified origin [emissions to air, high. pop.]: 1.2091e-6 kg; lognormal SD95 1.8079
  (same comment as for Phenol, pentachloro-)
- Selenium [emissions to air, high. pop.]: 2.6427e-8 kg; lognormal SD95 11.357
  (same comment as for Sodium)
- Aluminium [emissions to water, river]: 2.2831e-8 kg; lognormal SD95 8.1657
  (same comment as for Manganese)
- Zinc [emissions to water, river]: 5.393e-9 kg; lognormal SD95 6.2864
  (same comment as for Manganese)
- Mercury [emissions to air, high. pop.]: 2.5396e-8 kg; lognormal SD95 12.461
  (same comment as for Sodium)
- Beryllium [emissions to water, river]: 3.3034e-10 kg; lognormal SD95 18.982
  (same comment as for Manganese)
- Barium [emissions to air, high. pop.]: 7.7217e-7 kg; lognormal SD95 6.5536
  (same comment as for Sodium)
- Cadmium [emissions to water, river]: 2.6402e-10 kg; lognormal SD95 8.8714
  (same comment as for Manganese)
- TOC, Total Organic Carbon [emissions to water, river]: 0.00022509 kg; lognormal SD95 1.5021
  (same comment as for Manganese)
- Fluoride [emissions to water, groundwater, long-term]: 1.3902e-5 kg; lognormal SD95 5.4706
  (same comment as for Nickel)
- Thallium [emissions to air, high. pop.]: 4.2194e-10 kg; lognormal SD95 13.542
  (same comment as for Sodium)
- BOD5, Biological Oxygen Demand [emissions to water, river]: 0.0005088 kg; lognormal SD95 1.5093
  (same comment as for Manganese)
- Carbon monoxide, fossil [emissions to air, high. pop.]: 4.5163e-5 kg; lognormal SD95 6.0262
  (same comment as for Phenol, pentachloro-)
- Nitrate [emissions to water, groundwater, long-term]: 3.8015e-5 kg; lognormal SD95 5.0517
  (same comment as for Nickel)
- Particulates, > 2.5 um, and < 10um [emissions to air, high. pop.]: 1.594e-8 kg; lognormal SD95 2.4105
  (same comment as for Phenol, pentachloro-)
- Barium [emissions to water, groundwater, long-term]: 9.9076e-5 kg; lognormal SD95 19.926
  (same comment as for Nickel)
- Tin [emissions to water, river]: 1.0355e-8 kg; lognormal SD95 11.226
  (same comment as for Manganese)
- Iron [emissions to air, high. pop.]: 7.0432e-9 kg; lognormal SD95 4.41
  (same comment as for Sodium)
- Benzene [emissions to air, high. pop.]: 2.6568e-8 kg; lognormal SD95 1.8079
  (same comment as for Phenol, pentachloro-)

## Sampling procedure
fully waste-specific calculation based on literature data for average MSWI operation performance

## Extrapolations
Typical elemental transfer coefficients from current studies for modern MSWI, completed with data from coal power plants and estimates, adapted for inert/burnable waste.

## Uncertainty adjustments
uncertainty of waste input composition data derived from generic formula GSD(c) = N*ln(c)+1

## Sources
- Doka G., 2013, 2013 - Updates LCI waste treatment services - Doka, -, Doka LCA, Zuerich, CH
Doka G. (2013) Updates to Life Cycle Inventories of Waste Treatment Services - part II: waste incineration. Doka LCA. Zurich.
Type: Separate publication
Source: Report to document the 2013 changes to the MSWI incinerator model and datasets (URL: http://www.doka.ch/ecoinventMSWIupdateLCI2013.pdf). To be read with the ecoinvent Nr 13 report (Doka 2009, Life Cycle Inventories of Waste Treatment Services) for ecoinvent v2.2.
First author: Doka G.
Year: 2013
Place of publication: Zurich
Publisher: Doka LCA
Original title: Updates to Life Cycle Inventories of Waste Treatment Services - part II: waste incineration

## Validation
Proof reading validation: Passed.; Other validation: none;
