# Dithiocarbamate-compounds, at regional storehouse

Dataset: EcoSpold 1, unit process
Functional unit: 1 kg
Category: chemicals / pesticides
Geography: RER
Time period: 1987-01 to 1987-12
Share of production covered: 100 %
Generated by: Juergen Sutter
accessRestrictedTo: 0
copyright: true

## General comment
Production of dithiocarbamate-compounds including materials, energy uses, infrastructure and emissions.;

## Geography
The inventory is modelled for Europe.

## Technology
pesticides

## Time period
Time of publications

## Reference product
- Dithiocarbamate-compounds, at regional storehouse [RER]: 1 kg
  Europe

## Inputs from technosphere
- Manganese concentrate, at beneficiation [GLO]: 0.37582 kg; lognormal SD95 1.3765
  (4,5,1,1,1,5); Stoechiometric calculation
- Disposal, inert waste, 5% water, to construction waste landfill [CH]: 0.02546 kg; lognormal SD95 1.3765
  (4,5,1,1,1,5); Stoechiometric calculation
- Hydrochloric acid, 30% in H2O, at plant [RER]: 0.015551 kg; lognormal SD95 1.3765
  (4,5,1,1,1,5); Stoechiometric calculation
- Sulphur dioxide, liquid, at plant [RER]: 0.27647 kg; lognormal SD95 1.3765
  (4,5,1,1,1,5); Stoechiometric calculation
- Chemical plant, organics [RER]: 1.8174e-9 p; lognormal SD95 3.0909
  (4,5,na,na,na,na); Estimation
- Transport, freight, rail [RER]: 1.2574 tkm; lognormal SD95 2.095
  (4,5,na,na,na,na); Standard distances
- Oxygen, liquid, at plant [RER]: 0.36815 kg; lognormal SD95 1.3765
  (4,5,1,1,1,5); Stoechiometric calculation
- Ammonia, liquid, at regional storehouse [RER]: 0.10896 kg; lognormal SD95 1.3765
  (4,5,1,1,1,5); Stoechiometric calculation
- Carbon disulfide, at plant [GLO]: 0.65661 kg; lognormal SD95 1.3765
  (4,5,1,1,1,5); Stoechiometric calculation
- Sodium hydroxide, 50% in H2O, production mix, at plant [RER]: 0.34559 kg; lognormal SD95 1.3765
  (4,5,1,1,1,5); Stoechiometric calculation
- Transport, freight, lorry, fleet average [RER]: 0.58991 tkm; lognormal SD95 2.095
  (4,5,na,na,na,na); Standard distances
- Ethylenediamine, at plant [RER]: 0.25919 kg; lognormal SD95 1.3765
  (4,5,1,1,1,5); Stoechiometric calculation
- Heat, unspecific, in chemical plant [RER]: 7.9083 MJ; lognormal SD95 1.3765
  (4,5,1,1,1,5); Estimation
- Electricity, medium voltage, production ENTSO-E, at grid: 1.4654 kWh; lognormal SD95 1.3765
  (4,5,1,1,1,5); Estimation
- Zinc, primary, at regional storage [RER]: 0.13337 kg; lognormal SD95 1.3765
  (4,5,1,1,1,5); Stoechiometric calculation

## Inputs from nature
- Water, cooling, unspecified natural origin/m3 [resources, in water]: 0.10904 m3; lognormal SD95 1.3765
  (4,5,1,1,1,5); Estimation

## Emissions to nature
- Sulfur dioxide [emissions to air, high. pop.]: 0.10327 kg; lognormal SD95 1.3001
  (4,5,na,na,na,na); Estimation
- Ammonium, ion [emissions to water, river]: 0.00098066 kg; lognormal SD95 1.6169
  (4,5,na,na,na,na); Estimation
- Heat, waste [emissions to air, high. pop.]: 5.2756 MJ; lognormal SD95 1.3765
  (4,5,1,1,1,5); Calculated from the electricity input
- Ethylene diamine [emissions to water, river]: 0.0012441 kg; lognormal SD95 3.0909
  (4,5,na,na,na,na); Estimation
- Sulfate [emissions to water, river]: 0.039604 kg; lognormal SD95 1.6169
  (4,5,na,na,na,na); Estimation
- Sodium [emissions to water, river]: 0.19871 kg; lognormal SD95 5.1037
  (4,5,na,na,na,na); Estimation
- Manganese [emissions to water, river]: 0.011286 kg; lognormal SD95 5.1037
  (4,5,na,na,na,na); Estimation
- Zinc [emissions to water, river]: 0.012378 kg; lognormal SD95 5.1037
  (4,5,na,na,na,na); Estimation
- Ethylene diamine [emissions to air, high. pop.]: 0.00051838 kg; lognormal SD95 1.6169
  (4,5,na,na,na,na); Estimation
- Nitrate [emissions to water, river]: 0.0060429 kg; lognormal SD95 1.6169
  (4,5,na,na,na,na); Estimation
- Carbon dioxide, fossil [emissions to air, high. pop.]: 0.00056633 kg; lognormal SD95 1.3001
  (4,5,na,na,na,na); Estimation
- Carbon disulfide [emissions to air, high. pop.]: 0.0013132 kg; lognormal SD95 1.6169
  (4,5,na,na,na,na); Estimation
- Ammonia [emissions to air, high. pop.]: 0.00055294 kg; lognormal SD95 1.3713
  (4,5,na,na,na,na); Estimation
- Chloride [emissions to water, river]: 0.015119 kg; lognormal SD95 3.0909
  (4,5,na,na,na,na); Estimation
- Nitrogen oxides [emissions to air, high. pop.]: 0.00059481 kg; lognormal SD95 1.6169
  (4,5,na,na,na,na); Estimation
- Carbon disulfide [emissions to water, river]: 0.0031517 kg; lognormal SD95 3.0909
  (4,5,na,na,na,na); Estimation
- Water [emissions to water, unspecified]: 103.588 kg; lognormal SD95 2.5196
  (5,5,5,5,5,BU:1.05); All uncertainty-values set to 5.0 by default. Balance of input water

## Sampling procedure
Literature data

## Extrapolations
Transports and emissions are modelled with standard methods.

## Sources
- Nemecek T., Kaegi T., 2007, 2007 - LCI agricultural prod. systems - Nemecek, Ecoinvent report version 2.0, 15, Swiss Centre for LCI, ART, Duebendorf and Zuerich, CH
Nemecek, T., Kägi, T., Blaser, S. (2007) Life Cycle Inventories of Agricultural Production Systems. Ecoinvent report version 2.0. Editors: 0. Volume: 15. Swiss Centre for LCI, ART. Duebendorf and Zurich, CH.
Type: Measurement on site
Source: CD-ROM
First author: Nemecek, T.
Other authors: Kägi, T., Blaser, S.
Year: 2007
Name of editors: 0
Title of anthology: Ecoinvent report version 2.0
Place of publication: Duebendorf and Zurich, CH
Publisher: Swiss Centre for LCI, ART
Volume No: 15

## Validation
Proof reading validation: automatic validation in Excel; Other validation: none;
