# Sour gas, burned in gas turbine, production, MJ

Dataset: EcoSpold 1, unit process
Functional unit: 1 MJ
Category: electricity by fuel / gas\gas turbine
Geography: NO
Time period: 2000-01 to 2000-12
Production volume: 2.98 E9 Sm3 burnt natural gas
Share of production covered: 100 %
Generated by: Mireille Faist Emmenegger
accessRestrictedTo: 0
copyright: true

## General comment
Burning of sour gas in a turbine for on-site electricity production.;

## Included processes
Providing of compression energy by the exploitation of (sour) gas fields.

## Technology
Data is based on the Norwegian data (offshore combined production). No information about technology. As the data is an average over all gas turbines, motors and boilers in the Norwegian gas and oil production it can be assumed that different technologies are represented.

## Time period
Average of 1999-2000 is used for CH4, CO2, NMVOC, NO2 (data from the Norwegian offshore combined production). Data for CO, N2O, SO2, Hg, Radon-222 and waste heat are based on data from 1991 in Frischknecht et al. 1996, Tab. V.6.7.

## Reference product
- Sour gas, burned in gas turbine, production, MJ [NO]: 1 MJ
  NORWAY

## Inputs from technosphere
- Gas turbine, 10MWe, at production plant [RER]: 3.37e-10 p; lognormal SD95 1.22
  (1,1,1,1,3,3); environmental report for Norway

## Inputs from nature
- Gas, natural/m3 [resources, in ground]: 0.0278 m3; lognormal SD95 1.07
  (1,1,1,1,1,3); environmental report for Norway

## Emissions to nature
- Radon-222 [emissions to air, low. pop.]: 0.00556 kBq; lognormal SD95 3.02
  (3,1,2,2,1,3); based on assumptions
- Dinitrogen monoxide [emissions to air, low. pop.]: 2.5e-7 kg; lognormal SD95 1.52
  (3,1,2,2,1,3); based on assumptions
- Methane, fossil [emissions to air, low. pop.]: 2.43e-5 kg; lognormal SD95 1.5
  (1,1,1,1,1,3); environmental report for Norway
- Carbon monoxide, fossil [emissions to air, low. pop.]: 0.000139 kg; lognormal SD95 5
  (1,1,1,1,1,3); environmental report for Norway
- Heat, waste [emissions to air, low. pop.]: 1.11 MJ; lognormal SD95 1.09
  (2,1,1,1,1,3); environmental report for Norway
- Carbon dioxide, fossil [emissions to air, low. pop.]: 0.0669 kg; lognormal SD95 1.07
  (1,1,1,1,1,3); environmental report for Norway
- Nitrogen oxides [emissions to air, low. pop.]: 0.000199 kg; lognormal SD95 1.5
  (1,1,1,1,1,3); environmental report for Norway
- Mercury [emissions to air, low. pop.]: 2.78e-9 kg; lognormal SD95 1.52
  (3,1,2,2,1,3); based on assumptions
- Sulfur dioxide [emissions to air, low. pop.]: 0.00486 kg; lognormal SD95 1.12
  (3,1,1,1,1,3); calculated
- NMVOC, non-methane volatile organic compounds, unspecified origin [emissions to air, low. pop.]: 3.07e-6 kg; lognormal SD95 2.02
  (1,1,3,1,1,3); environmental report for Norway

## Sampling procedure
Data is based on the annual reports on emissions and discharges submitted by each individual operator. The emissions and discharges are estimated according to guidelines given by the Norwegian authorities and OLF (Norwegian Oil Industry Association)

## Extrapolations
Norwegian data can be extrapolated for global exploitation turbines

## Sources
- Faist Emmenegger M., Heck T., Jungbluth N., Tuchschmid M., 2007, 2007 - Natural gas - Faist-Emmeneger, Sachbilanzen von Energiesystemen. Final report No. 6 ecoinvent data v2.0, 6, Swiss Centre for LCI, PSI, ESU-services Ltd., Duebendorf and Villigen, CH
Faist Emmenegger, M., Heck, T., Jungbluth, N. (2007) Erdgas. Sachbilanzen von Energiesystemen. Final report No. 6 ecoinvent data v2.0. Editors: Dones R.. Volume: 6. Swiss Centre for LCI, PSI. Dübendorf and Villigen, CH.
Type: Measurement on site
Source: CD-ROM
First author: Faist Emmenegger, M.
Other authors: Heck, T., Jungbluth, N.
Year: 2007
Name of editors: Dones R.
Title of anthology: Sachbilanzen von Energiesystemen. Final report No. 6 ecoinvent data v2.0
Place of publication: Dübendorf and Villigen, CH
Publisher: Swiss Centre for LCI, PSI
Volume No: 6

## Validation
Proof reading validation: Passed.; Other validation: none;
