# Sodium chloride, brine solution, at plant

Dataset: EcoSpold 1, unit process
Functional unit: 1 kg
Category: chemicals / inorganic
Geography: RER
Time period: 2000-01 to 2000-12
Generated by: Roland Hischier
accessRestrictedTo: 0
copyright: true

## General comment
na;
CAS number: 007647-14-5;
Formula: NaCl;
Synonyms: Salzlösung, salt solution;

## Included processes
this module includes the solution mining process of sodium chloride for the preparation of a brine for industrial use. No cleaning or drying step are therefore included.

## Technology
modern solution mining technique (mix)

## Reference product
- Sodium chloride, brine solution, at plant [RER]: 1 kg
  Europe

## Inputs from technosphere
- Chemical plant, organics [RER]: 4e-10 p; lognormal SD95 3.8
  (4,5,1,3,5,4); Estimation, based on Infrastructure of chemical production
- Electricity, medium voltage, production ENTSO-E, at grid: 0.067 kWh; lognormal SD95 1.7
  (3,5,3,3,4,5); based on 1 literature source
- Heat, heavy fuel oil, at industrial furnace 1MW [RER]: 0.169 MJ; lognormal SD95 1.7
  (3,5,3,3,4,5); based on 1 literature source
- Heat, natural gas, at industrial furnace 1MW [CH]: 0.169 MJ; lognormal SD95 1.7
  (3,5,3,3,4,5); based on 1 literature source

## Inputs from nature
- Water, unspecified natural origin/m3 [resources, in water]: 0.00382 m3; lognormal SD95 1.7
  (3,5,3,3,4,5); based on 1 literature source
- Sodium chloride [resources, in ground]: 1 kg; lognormal SD95 1.7
  (3,5,3,3,4,5); based on 1 literature source

## Emissions to nature
- Water [emissions to water, unspecified]: 3.629 kg; lognormal SD95 2.5196
  (5,5,5,5,5,BU:1.05); All uncertainty-values set to 5.0 by default. Balance of input water

## Sampling procedure
literature data

## Sources
- Althaus H.-J., Chudacoff M., Hellweg S., Hischier R., Jungbluth N., Osses M., Primas A., 2007, 2007 - LCI chemicals - Althaus, Final report ecoinvent data v2.0, 8, Swiss Centre for LCI, Empa - TSL, ETH, ESU-services Ltd., Chudacoff Oekoscience, Duebendorf, CH
Althaus H.-J., Chudacoff M., Hischier R., Jungbluth N., Osses M., Primas A. (2007) Life Cycle Inventories of Chemicals. Final report ecoinvent data v2.0. Volume: 8. Swiss Centre for LCI, Empa - TSL. Dübendorf, CH.
Type: Measurement on site
Source: CD-ROM
First author: Althaus H.-J.
Other authors: Chudacoff M., Hischier R., Jungbluth N., Osses M., Primas A.
Year: 2007
Title of anthology: Final report ecoinvent data v2.0
Place of publication: Dübendorf, CH
Publisher: Swiss Centre for LCI, Empa - TSL
Volume No: 8

## Validation
Proof reading validation: Passed; Other validation: Passed;
