# Bitumen sealing VA4, at plant

Dataset: EcoSpold 1, unit process
Functional unit: 1 kg
Category: construction / sealing
Geography: RER
Time period: 1994-01 to 2000-12
Generated by: Martin Lehmann
accessRestrictedTo: 0
copyright: true

## General comment
The dataset is applicable in the construction building sector. Bitumen sealing is used to protect the construction against water intrusion.;

## Included processes
The dataset describes the production of bitumen sealing VA4. Included processes are the extrusion of polypropylene foil, the fabrication of the sealing, the infrastructure, the transport by road and rail as well as the disposal of the bitumen cuttings in a municipal incineration. The production of bitumen sealing does not include any chemical processes. In this specific type of bitumen sealing VA4, aluminium is being sputtered onto a PE-foil.

## Geography
The data of this dataset is taken from literature studies and producer information.

## Technology
Simple processes involved (beside sputtering), a carrier material is being soaked with bitumen. The bitumen coatings are then gritted with minerals (talcum, sand).

## Time period
The production of bitumen sealing has not changed very much over the years, as there are no chemical processes involved.

## Reference product
- Bitumen sealing VA4, at plant [RER]: 1 kg
  Europe

## Inputs from technosphere
- Copper, at regional storage [RER]: -0.0164 kg; lognormal SD95 1.26
  (3,4,1,3,1,5,2)
- Bitumen, at refinery [RER]: 0.723 kg; lognormal SD95 1.24
  (2,4,1,3,1,5,3)
- Disposal, aluminium, 0% water, to municipal incineration [CH]: 5.45e-6 kg; lognormal SD95 1.35
  (2,4,3,3,3,5,6)
- Electricity, medium voltage, production ENTSO-E, at grid: 0.42 kWh; lognormal SD95 1.22
  (2,3,1,3,1,5,2)
- Chromium, at regional storage [RER]: -0.00148 kg; lognormal SD95 1.26
  (3,4,1,3,1,5,2)
- Transport, freight, lorry, fleet average [RER]: 0.0877 tkm; lognormal SD95 2.1
  (4,3,1,3,1,5,5)
- Disposal, municipal solid waste, 22.9% water, to municipal incineration [CH]: 0.00284 kg; lognormal SD95 1.35
  (2,4,3,3,3,5,6)
- Aluminium, production mix, at plant [RER]: 0.000545 kg; lognormal SD95 1.22
  (2,2,1,3,1,5,3)
- Tin, at regional storage [RER]: -0.00172 kg; lognormal SD95 1.26
  (3,4,1,3,1,5,2)
- Disposal, bitumen sheet, 1.5% water, to municipal incineration [CH]: 0.00723 kg; lognormal SD95 1.35
  (2,4,3,3,3,5,6)
- Selective coating, copper sheet, sputtering [DE]: 0.2 m2; lognormal SD95 1.26
  (3,4,1,3,1,5,2)
- Transport, freight, rail [RER]: 0.149 tkm; lognormal SD95 2.1
  (4,3,1,3,1,5,5)
- Fleece, polyethylene, at plant [RER]: 0.00889 kg; lognormal SD95 1.24
  (2,4,1,3,1,5,3)
- Limestone, milled, loose, at plant [CH]: 0.142 kg; lognormal SD95 1.24
  composite
- Glass fibre, at plant [RER]: 0.0131 kg; lognormal SD95 1.24
  (2,4,1,3,1,5,3)
- Chemical plant, organics [RER]: 4e-10 p; lognormal SD95 3.06
  (2,4,1,3,1,5,9)
- Sand, at mine [CH]: 0.12 kg; lognormal SD95 1.24
  (2,4,1,3,1,5,3)

## Emissions to nature
- Heat, waste [emissions to air, unspecified]: 1.51 MJ; lognormal SD95 1.24
  (2,4,1,3,1,5,13)
- NMVOC, non-methane volatile organic compounds, unspecified origin [emissions to air, unspecified]: 0.00108 kg; lognormal SD95 2.06
  (2,4,1,3,1,5,23)
- Benzo(a)pyrene [emissions to air, unspecified]: 1.8e-9 kg; lognormal SD95 5
  estimation

## Sampling procedure
Literature, database

## Extrapolations
see Geography

## Uncertainty adjustments
The used data is mainly valid for Central Europe, the dataset is applicable for the whole European region.

## Sources
- Kellenberger D., Althaus H.-J., Jungbluth N., Kuenniger T., Lehmann M., Thalmann P., 2007, 2007 - LCI building products - Kellenberger, Final report ecoinvent data v2.0, 7, Swiss Centre for LCI, Empa - TSL, ESU-services Ltd., Bau- und Umweltchimie, Duebendorf, CH
Kellenberger D., Althaus H.-J., Jungbluth N., Künniger T. (2007) Life Cycle Inventories of Building Products. Final report ecoinvent data v2.0. Volume: 7. Swiss Centre for LCI, Empa - TSL. Dübendorf, CH.
Type: Measurement on site
Source: CD-ROM
First author: Kellenberger D.
Other authors: Althaus H.-J., Jungbluth N., Künniger T.
Year: 2007
Title of anthology: Final report ecoinvent data v2.0
Place of publication: Dübendorf, CH
Publisher: Swiss Centre for LCI, Empa - TSL
Volume No: 7

## Validation
Proof reading validation: passed; Other validation: none;
