# Sodium cyanide, at plant

Dataset: EcoSpold 1, unit process
Functional unit: 1 kg
Category: chemicals / inorganic
Geography: RER
Time period: 2000-01 to 2000-12
Generated by: Roland Hischier
accessRestrictedTo: 0
copyright: true

## General comment
The functional unit represent 1 kg of sodium cyanide. Large uncertainty of the process data due to weak data on the production process.;
CAS number: 000143-33-9;
Formula: NaCN;

## Included processes
Raw materials and chemicals used for production, transport of materials to manufacturing plant, estimated emissions to air and water from production (incomplete), estimation of energy demand and infrastructure of the plant (approximation). Solid wastes omitted.

## Technology
Production from sodium hydroxide and hydrogen cyanide by neutralization with a process yield of 95%. Inventory bases on stoechiometric calculations. The emissions to air (0.2 wt.% of raw material input) and water were estimated using mass balance. Treatment of the waste water in a internal waste water treatment plant assumed (elimination efficiency of 90% for C).

## Reference product
- Sodium cyanide, at plant [RER]: 1 kg
  Europe

## Inputs from technosphere
- Electricity, medium voltage, production ENTSO-E, at grid: 0.333 kWh; lognormal SD95 1.9
  (5,5,1,1,4,5); estimated with data from a chemical plant
- Transport, freight, rail [RER]: 0.625 tkm; lognormal SD95 2.1
  (4,5,na,na,na,na); standard distances
- Heat, natural gas, at industrial furnace 1MW [CH]: 2 MJ; lognormal SD95 1.9
  (5,5,1,1,4,5); estimated with data from a chemical plant
- Sodium hydroxide, 50% in H2O, production mix, at plant [RER]: 0.859 kg; lognormal SD95 1.6
  (5,5,na,na,na,5); estimation, based on stoechiometry
- Hydrogen cyanide, at plant [RER]: 0.58 kg; lognormal SD95 1.6
  (5,5,na,na,na,5); estimation, based on stoechiometry
- Transport, freight, lorry, fleet average [RER]: 0.104 tkm; lognormal SD95 2.1
  (4,5,na,na,na,na); standard distances
- Chemical plant, organics [RER]: 4e-10 p; lognormal SD95 3.2
  (5,na,na,na,na,na); estimation

## Inputs from nature
- Water, unspecified natural origin/m3 [resources, in water]: 0.012 m3; lognormal SD95 1.6
  (5,5,na,na,na,5); estimation
- Water, cooling, unspecified natural origin/m3 [resources, in water]: 0.024 m3; lognormal SD95 1.9
  (5,5,1,1,4,5); estimated with data from a chemical plant

## Emissions to nature
- Sodium [emissions to water, river]: 0.0247 kg; lognormal SD95 1.9
  (5,5,na,na,na,5); estimation
- TOC, Total Organic Carbon [emissions to water, river]: 0.00126 kg; lognormal SD95 1.9
  (5,5,na,na,na,5); estimation
- Carbon dioxide, fossil [emissions to air, high. pop.]: 0.0402 kg; lognormal SD95 1.6
  (5,5,na,na,na,5); estimation
- Cyanide [emissions to air, high. pop.]: 0.00116 kg; lognormal SD95 1.9
  (5,5,na,na,na,5); estimation
- DOC, Dissolved Organic Carbon [emissions to water, river]: 0.00126 kg; lognormal SD95 1.9
  (5,5,na,na,na,5); estimation
- Heat, waste [emissions to air, high. pop.]: 1.2 MJ; lognormal SD95 1.9
  (5,5,1,1,4,5); estimated with data from a chemical plant
- Cyanide [emissions to water, river]: 0.00274 kg; lognormal SD95 1.9
  (5,5,na,na,na,5); estimation
- Water [emissions to water, unspecified]: 11.4, 22.8 kg (2 entries); lognormal SD95 2.5196
  (5,5,5,5,5,BU:1.05); All uncertainty-values set to 5.0 by default. Balance of input water

## Sampling procedure
Process data based on stoechiometric calculations of few literature sources. Energy demand based on approximation from large chemical plant. Process emissions based on estimations only.

## Sources
- Hischier R., 2007, 2007 - LCI packagings and graphical papers - Hischier, Final report ecoinvent data v2.0, 11, Swiss Centre for LCI, Empa - TSL, Duebendorf and St. Gallen, CH
Hischier R. (2007) Life Cycle Inventories of Packaging and Graphical Paper. Final report ecoinvent data v2.0. Volume: 11. Swiss Centre for LCI, Empa - TSL. Dübendorf, CH.
Type: Measurement on site
Source: CD-ROM
First author: Hischier R.
Year: 2007
Title of anthology: Final report ecoinvent data v2.0
Place of publication: Dübendorf, CH
Publisher: Swiss Centre for LCI, Empa - TSL
Volume No: 11

## Validation
Proof reading validation: passed; Other validation: none;
