# Use of wireless IP access network, 2-4G per hour

Dataset: EcoSpold 1, unit process
Functional unit: 1 hr
Category: computers & network / use cases
Geography: CH
Time period: 2023-01 to 2029-12
Synonyms: Übertragungsnetz; Zugriff; drahtlos; 2-4G
Generated by: Lugas Raka Adrianto, Maulana Permana Ajie, Didier Beloin-Saint-Pierre
accessRestrictedTo: 0
copyright: false

## General comment
The data set represents 2-4G wireless networks in Switzerland;

## Included processes
The dataset is based on multiple Swisscom 2-4G sites. The equipment considered are antennas, baseband units, cooling units, indoor cabinets, lead acid battery, PSU indoor cabinet, radio units, routers, and cables. The amount of electricity consumed is calculated by multiplying the network energy intensity with the total network traffic. The network energy intensity is based on the latest information from Telefonica since the company presents updated information regarding the energy intensity (kWh/GB) of different access network types. The amount of network traffic is based on the Swisscom network. It is assumed that the devices have a lifetime of 6 years, similar to the core network and based on a blade server platform. The reference year is 2021 based on the information from Telefonica. The functional unit = 1 GB.

## Geography
Data for Swiss networks

## Technology
The mix of Swiss access transmission network, wireless. 2-4G technologies are considered.

## Reference product
- Use of wireless IP access network, 2-4G per hour [CH]: 1 hr
  Total value is calculated from # of subscribers and hours in a year

## Inputs from technosphere
All rows: lognormal SD95 1.22
- Aluminium alloy, AlMg3, at plant [RER]: 1.38e-7 kg
  (2,2,2,2,1,5,BU:1.05) Value calculated from Bieser et al. 2020 and 7 lifetime of equipment
- Sheet rolling, aluminium [RER]: 1.38e-7 kg
  (2,2,2,2,1,5,BU:1.05) Value calculated from Bieser et al. 2020 and 7 lifetime of equipment
- Steel, low-alloyed, at plant [RER]: 3.05e-6 kg
  (2,2,2,2,1,5,BU:1.05) Value calculated from Bieser et al. 2020 and 7 lifetime of equipment
- Sheet rolling, steel [RER]: 3.05e-6 kg
  (2,2,2,2,1,5,BU:1.05) Value calculated from Bieser et al. 2020 and 7 lifetime of equipment
- Polyethylene, HDPE, granulate, at plant [RER]: 1.44e-7 kg
  (2,2,2,2,1,5,BU:1.05) Value calculated from Bieser et al. 2020 and 7 lifetime of equipment
- Acrylonitrile-butadiene-styrene copolymer, ABS, at plant [RER]: 1.44e-7 kg
  (2,2,2,2,1,5,BU:1.05) Value calculated from Bieser et al. 2020 and 7 lifetime of equipment
- Injection moulding [RER]: 2.86e-7 kg
  (2,2,2,2,1,5,BU:1.05) Value calculated from Bieser et al. 2020 and 7 lifetime of equipment
- Printed wiring board, mounted, Laptop PC mainboard, Pb free, at plant [GLO]: 4.92e-7 kg
  (2,2,2,2,1,5,BU:1.05) Value calculated from Bieser et al. 2020 and 7 lifetime of equipment
- Copper, primary, at refinery [RER]: 5.74e-8 kg
  (2,2,2,2,1,5,BU:1.05) Value calculated from Bieser et al. 2020 and 7 lifetime of equipment
- Wire drawing, copper [RER]: 5.74e-8 kg
  (2,2,2,2,1,5,BU:1.05) Value calculated from Bieser et al. 2020 and 7 lifetime of equipment
- Chromium steel 18/8, at plant [RER]: 1.1e-9 kg
  (2,2,2,2,1,5,BU:1.05) Value calculated from Bieser et al. 2020 and 7 lifetime of equipment
- Sheet rolling, chromium steel [RER]: 1.1e-9 kg
  (2,2,2,2,1,5,BU:1.05) Value calculated from Bieser et al. 2020 and 7 lifetime of equipment
- Cast iron, at plant [RER]: 5.36e-9 kg
  (2,2,2,2,1,5,BU:1.05) Value calculated from Bieser et al. 2020 and 7 lifetime of equipment
- Synthetic rubber, at plant [RER]: 8.23e-10 kg
  (2,2,2,2,1,5,BU:1.05) Value calculated from Bieser et al. 2020 and 7 lifetime of equipment
- Polystyrene, general purpose, GPPS, at plant [RER]: 8.23e-10 kg
  (2,2,2,2,1,5,BU:1.05) Value calculated from Bieser et al. 2020 and 7 lifetime of equipment
- Polyethylene terephthalate, granulate, amorphous, at plant [RER]: 8.23e-10 kg
  (2,2,2,2,1,5,BU:1.05) Value calculated from Bieser et al. 2020 and 7 lifetime of equipment
- Polypropylene, granulate, at plant [RER]: 4.62e-9 kg
  (2,2,2,2,1,5,BU:1.05) Value calculated from Bieser et al. 2020 and 7 lifetime of equipment
- Electricity, low voltage, at grid [CH]: 0.00142 kWh
  (2,2,2,2,1,5,BU:1.05) Value calculated from Bieser et al. 2020

## Sampling procedure
Literature & own estimations

## Extrapolations
Average technology

## Sources
- Raka Adrianto L., Permana Ajie M., Beloin-Saint-Pierre D., 2024, 2024 - LCI ICT sector - Raka Adrianto, Empa, St. Gallen, CH

## Validation
Proof reading validation: Passed, Other validation: none, Validator: Mischa Zschokke, Company: Carbotech, Country: CH
