# Grass seed organic, at regional storehouse

Dataset: EcoSpold 1, unit process
Functional unit: 1 kg
Category: agricultural / plant production\seeds
Geography: CH
Time period: 2004-01 to 2004-12
Share of production covered: 0 %
Generated by: Fredy Dinkel
accessRestrictedTo: 0
copyright: true

## General comment
Refers to 1 kg of grass seed (rye grass) from intensive organic production with water content of 10% The dry matter content of dried grains is 0.9 kg/kg. The grains contain 1.55 kg CO2 and 17.87 MJ per kg DM seed.;

## Included processes
The inventories include the production of organic grass seed on a temporary meadow and its further processing and storage. Included steps are soil cultivation, fertilisation (cattle slurry and manure), harvest, transport, processing, drying and storage.

## Geography
Refers to a production in the Swiss plateau (lowlands <700m).

## Technology
Intensive organic production.

## Reference product
- Grass seed organic, at regional storehouse [CH]: 1 kg
  SWITZERLAND

## Inputs from technosphere
- Grain drying, low temperature [CH]: 0.286 kg; lognormal SD95 1.2238
  (2,2,1,1,3,3); Drying water content from 30% to 10% as for grass seed IP (Nemecek et al. 2003)
- Transport, freight, lorry, 3.5t gross weight, fleet average [CH]: 0.00030612 tkm; lognormal SD95 2.0074
  (2,2,1,1,1,3); As in ecoinvent report no. 15, Nemecek et al. (2004), transport distances for seed 15 km from storehouse to farm.
- Tillage, ploughing [CH]: 0.00063776 ha; lognormal SD95 1.0744
  (2,2,1,1,1,1); As for grass seed IP (Nemecek et al. 2004)
- Tillage, cultivating, chiselling [CH]: 0.00063776 ha; lognormal SD95 1.2165
  (2,2,1,1,3,1); Cultivation of soil as in Hersener et al. 1997, allocation to fodder grass 50%
- Transport, freight, lorry, fleet average [CH]: 0.001 tkm; lognormal SD95 1.0907
  (2,2,1,1,1,3); Assumption transport to the farm about 1 km.
- Transport, freight, lorry, fleet average [RER]: 0.9 tkm; lognormal SD95 2.0074
  (2,2,1,1,1,3); Transport to seed processing as for grass seed IP (Nemecek et al. 2003)
- Tillage, rolling [CH]: 0.00063776 ha; lognormal SD95 1.2165
  (same comment as for Tillage, cultivating, chiselling)
- Slurry spreading, by vacuum tanker [CH]: 0.038265 m3; lognormal SD95 1.2165
  (2,2,1,1,3,1); Amount N corresponding to the fertilization recommendations in Walter et al. (2004). Assumption 50% allocation to fodder grass (Total amount spread: 60 m3 slurry and 10 t manure).
- Combine harvesting [CH]: 0.0012755 ha; lognormal SD95 1.0744
  (2,2,1,1,1,1); Harvest as for grass seed IP (Nemecek et al. 2003)
- Tillage, harrowing, by rotary harrow [CH]: 0.00063776 ha; lognormal SD95 1.2165
  (2,2,1,1,3,1); As for grass seed IP (Nemecek et al. 2003)
- Electricity, low voltage, at grid [CH]: 0.058 kWh; lognormal SD95 1.2249
  (2,2,1,3,3,3); Electricity consumption as for seed processing in grass seed IP (Nemecek et al. 2003)
- Sowing [CH]: 0.00063776 ha; lognormal SD95 1.2165
  (same comment as for Tillage, cultivating, chiselling)
- Solid manure loading and spreading, by hydraulic loader and spreader [CH]: 6.3776 kg; lognormal SD95 1.2165
  (same comment as for Slurry spreading, by vacuum tanker)
- Building, multi-storey [RER]: 2e-5 m3; lognormal SD95 3.053
  (2,2,1,3,3,3); Storage building as for grass seed IP (Nemecek et al. 2003)

## Inputs from nature
- Carbon dioxide, in air [resources, in air]: 1.395 kg; lognormal SD95 1.0907
  (2,1,1,3,1,3); Calculation with value for rye grains of 1.55 kg CO2 / kg grain (Nemecek et al 2004). Water content of dried grains 10%
- Transformation, to pasture and meadow, organic [resources, land]: 6.3776 m2; lognormal SD95 2.0483
  (4,2,1,1,1,1); Further use assumed as meadow or pasture as in Nemecek et al. (2003). Allocation to fodder grass assumed 50%
- Occupation, construction site [resources, land]: 8e-6 m2a; lognormal SD95 1.5095
  (2,1,1,3,1,3); As for grass seed IP at storehouse (Nemecek et al. 2003)
- Transformation, from pasture and meadow, organic [resources, land]: 1.8495 m2; lognormal SD95 2.0483
  (4,2,1,1,1,1); Share of transformation from arable and from pastures as in Nemecek et al. (2003). Allocation to fodder grass assumed 50%
- Occupation, industrial area, built up [resources, land]: 0.0002 m2a; lognormal SD95 1.5095
  (2,1,1,3,1,3); As for grass seed IP at storehouse (Nemecek et al. 2003)
- Occupation, pasture, man made, organic [resources, land]: 6.3776 m2a; lognormal SD95 1.5051
  (2,2,1,1,1,1); Calculation for the cultivation about one year (seed August, harvest next July) with two harvest of fodder grass and final harvest of seed as in Nemecek et al. (2003). Allocation to fodder grass assumed 50%
- Energy, gross calorific value, in biomass [resources, biotic]: 16.083 MJ; lognormal SD95 1.0907
  (2,1,1,3,1,3); Calculation with 17.87 MJ/kg DM for rye seed (Nemecek et al. 2004). Water content of dried grains is about 10%
- Transformation, to industrial area, built up [resources, land]: 4e-6 m2; lognormal SD95 2.0074
  (2,1,1,3,1,3); As for grass seed IP at storehouse (Nemecek et al. 2003)
- Transformation, from arable, organic [resources, land]: 4.5281 m2; lognormal SD95 2.0483
  (same comment as for Transformation, from pasture and meadow, organic)
- Transformation, from unknown [resources, land]: 4e-6 m2; lognormal SD95 2.0074
  (2,1,1,3,1,3); As for grass seed IP at storehouse (Nemecek et al. 2003)

## Emissions to nature
- Phosphorus [emissions to water, river]: 0.00019694 kg; lognormal SD95 1.8071
  (2,2,3,3,4,4); Formula as in ecoinvent report No. 15, chapter 4.4 (Nemecek et al. 2004)
- Nitrogen oxides [emissions to air, low. pop.]: 0.00050921 kg; lognormal SD95 1.7962
  (2,1,3,3,4,3); Formula as in ecoinvent report No. 15, chapter 4.4 (Nemecek et al. 2004)
- Chromium [emissions to soil, agricultural]: 8.8061e-6 kg; lognormal SD95 1.6367
  (2,1,4,3,3,4); Calculation input - output bilance using data about metal content of rye grains and fertilizers summarized in Nemecek et al. (2004)
- Zinc [emissions to soil, agricultural]: 0.00028588 kg; lognormal SD95 1.6367
  (same comment as for Chromium)
- Dinitrogen monoxide [emissions to air, low. pop.]: 0.0024248 kg; lognormal SD95 1.7962
  (2,1,3,3,4,3); Formula as in ecoinvent report No. 15, chapter 4.4 (Nemecek et al. 2004)
- Mercury [emissions to soil, agricultural]: 8.1163e-7 kg; lognormal SD95 1.6367
  (2,1,4,3,3,4); Calculation input - output bilance using data about metal content of grass and fertilizers summarized in Nemecek et al. (2004)
- Nitrate [emissions to water, groundwater]: 0.075465 kg; lognormal SD95 1.8071
  (2,2,3,3,4,4); Formula as in ecoinvent report No. 15, chapter 4.4 (Nemecek et al. 2004)
- Lead [emissions to soil, agricultural]: 8.4495e-6 kg; lognormal SD95 1.6367
  (same comment as for Chromium)
- Copper [emissions to soil, agricultural]: 6.7148e-5 kg; lognormal SD95 1.6367
  (same comment as for Chromium)
- Cadmium [emissions to soil, agricultural]: 3.9724e-7 kg; lognormal SD95 1.6367
  (same comment as for Chromium)
- Phosphate [emissions to water, river]: 0.00031633 kg; lognormal SD95 1.8071
  (2,2,3,3,4,4); Formula as in ecoinvent report No. 15, chapter 4.4 (Nemecek et al. 2004)
- Ammonia [emissions to air, low. pop.]: 0.021869 kg; lognormal SD95 1.5846
  (2,1,3,3,4,3); Formula as in ecoinvent report No. 15, chapter 4.4 (Nemecek et al. 2004)
- Nickel [emissions to soil, agricultural]: 9.4502e-6 kg; lognormal SD95 1.6367
  (same comment as for Chromium)
- Heat, waste [emissions to air, low. pop.]: 0.209 MJ; lognormal SD95 1.0907
  (2,1,1,3,1,3); Heat waste as for grass seed IP at storehouse (Nemecke et al. 2003)
- Phosphate [emissions to water, groundwater]: 0.00010685 kg; lognormal SD95 1.8071
  (2,2,3,3,4,4); Formula as in ecoinvent report No. 15, chapter 4.4 (Nemecek et al. 2004)

## Sampling procedure
Data were compiled from statistics, fertilising recommendations, documents from extension services and expert knowledge.

## Sources
- Jungbluth N., Chudacoff M., Dauriat A., Dinkel F., Doka G., Faist Emmenegger M., Gnansounou E., Kljun N., Spielmann M., Stettler C., Sutter J., 2007, 2007 - LCI bioenergy - Jungbluth, Final report ecoinvent data v2.0, 17, Swiss Centre for LCI, ESU-services Ltd., Duebendorf and Uster, CH
Jungbluth N., Chudacoff M., Dauriat A., Dinkel F., Doka G., Faist Emmenegger M., Gnansounou E., Kljun N., Spielmann M., Stettler C., Sutter J. (2007) Life Cycle Inventories of Bioenergy. Final report ecoinvent data v2.0. Volume: 17. Swiss Centre for LCI, ESU. Duebendorf and Uster, CH.
Type: Measurement on site
Source: CD-ROM
First author: Jungbluth N.
Other authors: Chudacoff M., Dauriat A., Dinkel F., Doka G., Faist Emmenegger M., Gnansounou E., Kljun N., Spielmann M., Stettler C., Sutter J.
Year: 2007
Title of anthology: Final report ecoinvent data v2.0
Place of publication: Duebendorf and Uster, CH
Publisher: Swiss Centre for LCI, ESU
Volume No: 17

## Validation
Proof reading validation: Passed.; Other validation: none;
