# Crude oil, market mix, at long distance transport

Dataset: EcoSpold 1, unit process
Functional unit: 1 kg
Category: oil / transport
Geography: RU
Time period: 2023 to 2025
Production volume: 308.1 million tons of directly imported crude oil to RU region in 2023.
Generated by: Maresa Bussa
accessRestrictedTo: 0
copyright: true

## General comment
Calculation for transport distances assuming transport by pipeline offshore and onshore as well as sea transport in tanker. Sites and modes of transportation based on the supply situation in 2023.

## Included processes
Transportation of crude oil from exploration sites to refineries in RU-region. Includes transport service requirements and emissions from oil handling and evaporation.

## Geography
Calculations include production and transport of crude oil from 11 countries.

## Technology
Operation of crude oil pipelines by electricity.

## Time period
Transport modes investigated for 2023.

## Reference product
- Crude oil, market mix, at long distance transport [RU]: 1 kg

## Inputs from technosphere
- Crude oil, at production [AR]: 0.0033535 kg; lognormal SD95 1.209
  (1,1,1,3,3,BU:1.05); In 2023, 1.033 megatons of crude oil are imported from Argentina to Russian Federation, assuming 30% offshore production. Assumed transport distances: Offshore, at origin: 100km by pipeline. Onshore, at origin: 500km by pipeline. For transport to destination: 14044km by ship plus additional 100km by onshore pipeline at destination. Port of origin for shipping is assumed to be Buenos Aires.
- Crude oil, at production [AZ]: 2.5868e-5 kg; lognormal SD95 1.209
  (1,1,1,3,3,BU:1.05); In 2023, 0.008 megatons of crude oil are imported from Azerbaijan to Russian Federation, assuming 90% offshore production. Assumed transport distances: Offshore, at origin: 43km by pipeline. Onshore, at origin: 1800km by pipeline. For transport to destination: 0km by ship plus additional 100km by onshore pipeline at destination. Port of origin for shipping is assumed to be Ceyhan (Mersin).
- Crude oil, at production [BO]: 7.874e-5 kg; lognormal SD95 1.209
  (1,1,1,3,3,BU:1.05); In 2023, 0.024 megatons of crude oil are imported from Bolivia to Russian Federation, assuming 0% offshore production. Assumed transport distances: Offshore, at origin: 0km by pipeline. Onshore, at origin: 700km by pipeline. For transport to destination: 14423km by ship plus additional 100km by onshore pipeline at destination. Port of origin for shipping is assumed to be Arica.
- Crude oil, at production [BR]: 0.012021 kg; lognormal SD95 1.209
  (1,1,1,3,3,BU:1.05); In 2023, 3.702 megatons of crude oil are imported from Brazil to Russian Federation, assuming 96.7% offshore production. Assumed transport distances: Offshore, at origin: 140km by pipeline. Onshore, at origin: 800km by pipeline. For transport to destination: 12357km by ship plus additional 100km by onshore pipeline at destination. Port of origin for shipping is assumed to be Santos.
- Crude oil, at production [CO]: 0.002679 kg; lognormal SD95 1.209
  (1,1,1,3,3,BU:1.05); In 2023, 0.825 megatons of crude oil are imported from Colombia to Russian Federation, assuming 12.5% offshore production. Assumed transport distances: Offshore, at origin: 100km by pipeline. Onshore, at origin: 800km by pipeline. For transport to destination: 11686km by ship plus additional 100km by onshore pipeline at destination. Port of origin for shipping is assumed to be Tumaco.
- Crude oil, at production [EC]: 0.001667 kg; lognormal SD95 1.209
  (1,1,1,3,3,BU:1.05); In 2023, 0.513 megatons of crude oil are imported from Ecuador to Russian Federation, assuming 2.4% offshore production. Assumed transport distances: Offshore, at origin: 100km by pipeline. Onshore, at origin: 300km by pipeline. For transport to destination: 11879km by ship plus additional 100km by onshore pipeline at destination. Port of origin for shipping is assumed to be Guayaquil.
- Crude oil, at production [KZ]: 7.2034e-5 kg; lognormal SD95 1.2077
  (1,1,1,1,3,BU:1.05); In 2023, 0.022 megatons of crude oil are imported from Kazakhstan to Russian Federation, assuming 12.7% offshore production. Assumed transport distances: Offshore, at origin: 100km by pipeline. Onshore, at origin: 3400km by pipeline. For transport to destination: 0km by ship plus additional 3400km by onshore pipeline at destination. Port of origin for shipping is assumed to be Novorossiysk.
- Crude oil, at production [PE]: 0.00033697 kg; lognormal SD95 1.2077
  (1,1,1,1,3,BU:1.05); In 2023, 0.104 megatons of crude oil are imported from Peru to Russian Federation, assuming 10% offshore production. Assumed transport distances: Offshore, at origin: 100km by pipeline. Onshore, at origin: 100km by pipeline. For transport to destination: 13360km by ship plus additional 100km by onshore pipeline at destination. Port of origin for shipping is assumed to be Callao.
- Crude oil, at production [RU]: 0.97703 kg; lognormal SD95 1.2077
  (1,1,1,1,3,BU:1.05); In 2023, 0 megatons of crude oil are imported from Russian Federation to Russian Federation, and 300.899 megatons are consumed or refined locally, assuming 17.8% offshore production. Assumed transport distances: Offshore, at origin: 100km by pipeline. Onshore, at origin: 3800km by pipeline. For transport to destination: 0km by ship plus additional 0km by onshore pipeline at destination. Port of origin for shipping is assumed to be St. Petersburg.
- Crude oil, at production [TT]: 0.00021755 kg; lognormal SD95 1.2077
  (1,1,1,1,3,BU:1.05); In 2023, 0.067 megatons of crude oil are imported from Trinidad and Tobago to Russian Federation, assuming 30% offshore production. Assumed transport distances: Offshore, at origin: 100km by pipeline. Onshore, at origin: 100km by pipeline. For transport to destination: 9625km by ship plus additional 100km by onshore pipeline at destination. Port of origin for shipping is assumed to be Port of Spain.
- Crude oil, at production [VE]: 0.0028616 kg; lognormal SD95 1.209
  (1,1,1,3,3,BU:1.05); In 2023, 0.881 megatons of crude oil are imported from Venezuela to Russian Federation, assuming 30% offshore production. Assumed transport distances: Offshore, at origin: 100km by pipeline. Onshore, at origin: 100km by pipeline. For transport to destination: 9779km by ship plus additional 100km by onshore pipeline at destination. Port of origin for shipping is assumed to be Puerto La Cruz / Jose Petroterminal.
- Transport, transoceanic tanker [OCE]: 0.1585 tkm; lognormal SD95 2.0618
  (3,2,1,3,3,BU:2); Calculation based on estimated shipping route and pipelines according to searates.com and export data for 2023.
- Transport, crude oil pipeline, offshore [OCE]: 0.018566 tkm; lognormal SD95 1.2377
  (3,2,1,3,3,BU:1.05); Calculation based on estimated shipping route and pipelines according to searates.com and export data for 2023.
- Transport, crude oil pipeline, onshore [RER]: 3.0876 tkm; lognormal SD95 1.2377
  (same comment as for Transport, crude oil pipeline, offshore)

## Emissions to nature
- Hydrocarbons, aliphatic, alkanes, unspecified [emissions to air, low. pop.]: 1.35e-6 kg; lognormal SD95 1.5913
  (3,4,4,1,1,BU:1.5); Evaporation losses for storage and handling
- Benzene [emissions to air, low. pop.]: 4.5e-7 kg; lognormal SD95 3.0703
  (3,4,4,1,1,BU:3); Evaporation losses for storage and handling
- Butane [emissions to air, low. pop.]: 0.00012642 kg; lognormal SD95 1.5913
  (3,4,4,1,1,BU:1.5); Evaporation losses for storage and handling
- Methane, fossil [emissions to air, low. pop.]: 1.498e-6 kg; lognormal SD95 1.5913
  (3,4,4,1,1,BU:1.5); Evaporation losses for storage and handling
- Ethane [emissions to air, low. pop.]: 1.601e-6 kg; lognormal SD95 1.5913
  (3,4,4,1,1,BU:1.5); Evaporation losses for storage and handling
- Hexane [emissions to air, low. pop.]: 5.3876e-5 kg; lognormal SD95 1.5913
  (3,4,4,1,1,BU:1.5); Evaporation losses for storage and handling
- Pentane [emissions to air, low. pop.]: 9.558e-5 kg; lognormal SD95 1.5913
  (3,4,4,1,1,BU:1.5); Evaporation losses for storage and handling
- Propane [emissions to air, low. pop.]: 6.1296e-5 kg; lognormal SD95 1.5913
  (3,4,4,1,1,BU:1.5); Evaporation losses for storage and handling
- Toluene [emissions to air, low. pop.]: 2.7e-7 kg; lognormal SD95 1.5913
  (3,4,4,1,1,BU:1.5); Evaporation losses for storage and handling

## Sampling procedure
Literature. Online calculators for distances. The consumption mix is calculated based on international trade statistics for 2023.

## Sources
- Meili C., Jungbluth N., Bussa M., Stefanel A., 2025, 2025 - LCI long-distance transport crude oil - Meili, Project report, 565, ESU-services Ltd., Schaffhausen, CH

## Validation
Passed.
https://esuservices-my.sharepoint.com/personal/jungbluth_esu-services_ch/Documents/ESU-intern/565 Beratung BAFU/EcoSpoldDataXML/[EcoSpold-oil-transport-2025-v1.0.xlsb]X-Process
