# Pig iron, at plant

Dataset: EcoSpold 1, unit process
Functional unit: 1 kg
Category: metals / ferro
Geography: GLO
Time period: 2000-01 to 2000-12
Production volume: 5.30E11 kg/a
Share of production covered: 90 %
Generated by: Hans-Joerg Althaus
accessRestrictedTo: 0
copyright: true

## General comment
Inputs and air emissions from different sources. Transports of iron ore calculated according to information about exports and imports.;
Synonyms: hot metal;

## Included processes
Blast furnace process. Emissions are abated

## Technology
Blast furnace process

## Reference product
- Pig iron, at plant [GLO]: 1 kg
  Global

## Inputs from technosphere
- Treatment, pig iron production effluent, to wastewater treatment, class 3 [CH]: 0.0018085 m3; lognormal SD95 1.1094
  (2,3,2,3,1,3,6)
- Natural gas, high pressure, at consumer [RER]: 0.12 MJ; lognormal SD95 1.0579
  (1,2,1,3,1,1,11)
- Transport, barge [RER]: 0.0165 tkm; lognormal SD95 2.0074
  (2,nA,1,3,1,3,5)
- Iron ore, 65% Fe, at beneficiation [GLO]: 0.15 kg; lognormal SD95 1.0541
  (1,2,1,1,1,1,3)
- Disposal, inert waste, 5% water, to construction waste landfill [CH]: 0.020745 kg; lognormal SD95 1.1094
  (2,3,2,3,1,3,6)
- Sinter, iron, at plant [GLO]: 1.05 kg; lognormal SD95 1.0541
  (1,2,1,1,1,1,3)
- Disposal, sludge, pig iron production, 8.6% water, to residual material landfill [CH]: 0.0042553 kg; lognormal SD95 3.0115
  (2,3,2,3,1,3,21)
- Transport, transoceanic freight ship [OCE]: 1.485 tkm; lognormal SD95 2.0069
  (2,nA,1,1,1,3,5)
- Hard coal coke, at plant [RER]: 9.724 MJ; lognormal SD95 1.0579
  (1,2,1,3,1,1,11)
- Refractory, fireclay, packed, at plant [DE]: 0.002 kg; lognormal SD95 1.0579
  (1,2,1,3,1,1,4)
- Hard coal mix, at regional storage [UCTE]: 0.15 kg; lognormal SD95 1.0579
  (1,2,1,3,1,1,11)
- Blast furnace [RER]: 1.3333e-11 p; lognormal SD95 3.2254
  (5,nA,nA,nA,nA,nA,9)
- Limestone, at mine [CH]: 0.01 kg; lognormal SD95 1.0579
  (1,2,1,3,1,1,4)
- Pellets, iron, at plant [GLO]: 0.4 kg; lognormal SD95 1.0541
  (1,2,1,1,1,1,3)
- Transport, freight, rail [RER]: 0.25165 tkm; lognormal SD95 2.0074
  (2,nA,1,3,1,3,5)
- Transport, freight, lorry, fleet average [RER]: 0.01004 tkm; lognormal SD95 2.095
  (4,5,nA,nA,nA,nA,5)

## Inputs from nature
- Water, unspecified natural origin/m3 [resources, in water]: 0.006 m3; lognormal SD95 1.0541
  (1,2,1,1,1,1,12)

## Emissions to nature
- Hydrogen sulfide [emissions to air, unspecified]: 1.0745e-5 kg; lognormal SD95 1.5154
  (2,3,2,3,1,3,31)
- Particulates, > 2.5 um, and < 10um [emissions to air, unspecified]: 1.5957e-6 kg; lognormal SD95 2.0121
  (2,3,2,3,1,3,26)
- Sulfur dioxide [emissions to air, unspecified]: 0.00013298 kg; lognormal SD95 1.1094
  (2,3,2,3,1,3,15)
- Heat, waste [emissions to air, unspecified]: 14.284 MJ; lognormal SD95 1.0579
  (1,2,1,3,1,1,13)
- Particulates, < 2.5 um [emissions to air, unspecified]: 2.8723e-5 kg; lognormal SD95 3.0115
  (2,3,2,3,1,3,27)
- Lead [emissions to air, unspecified]: 6.9149e-8 kg; lognormal SD95 5.0131
  (2,3,2,3,1,3,22)
- Dioxin, 2,3,7,8 Tetrachlorodibenzo-p- [emissions to air, unspecified]: 2.659e-15 kg; lognormal SD95 3.0115
  (2,3,2,3,1,3,21)
- Carbon dioxide, fossil [emissions to air, unspecified]: 0.84908 kg; lognormal SD95 1.1094
  (2,3,2,3,1,3,14)
- Carbon monoxide, fossil [emissions to air, unspecified]: 0.0013404 kg; lognormal SD95 5.0131
  (2,3,2,3,1,3,17)
- Manganese [emissions to air, unspecified]: 7.4468e-8 kg; lognormal SD95 5.0131
  (2,3,2,3,1,3,22)
- Nitrogen oxides [emissions to air, unspecified]: 7.9787e-5 kg; lognormal SD95 1.5154
  (2,3,2,3,1,3,16)
- Particulates, > 10 um [emissions to air, unspecified]: 1.5957e-6 kg; lognormal SD95 1.5154
  (2,3,2,3,1,3,25)
- Nickel [emissions to air, unspecified]: 1.5957e-8 kg; lognormal SD95 5.0131
  (2,3,2,3,1,3,22)
- Water [emissions to water, unspecified]: 5.7 kg; lognormal SD95 2.5196
  (5,5,5,5,5,BU:1.05); All uncertainty-values set to 5.0 by default. Balance of input water

## Sampling procedure
Main in- and outputs based on world average, emissions based on some plants in the EU. Everything based on literature.

## Extrapolations
see Geography

## Sources
- Classen M., Althaus H.-J., Blaser S., Scharnhorst W., Tuchschmid M., Jungbluth N., Faist Emmenegger M., 2009, 2009 - LCI metals - Classen, Final report ecoinvent data v2.1, 10, Swiss Centre for LCI, Empa, ESU-services Ltd., Duebendorf, CH
Classen M., Althaus H.-J., Blaser S., Doka G., Jungbluth N., Tuchschmid M. (2008) Life Cycle Inventories of Metals. Final report ecoinvent data v2.1. Volume: 10. Issue: 0. Swiss Centre for LCI, Empa - TSL. Dübendorf, CH.
Type: Measurement on site
Source: CD-ROM
First author: Classen M.
Other authors: Althaus H.-J., Blaser S., Doka G., Jungbluth N., Tuchschmid M.
Year: 2008
Title of anthology: Final report ecoinvent data v2.1
Place of publication: Dübendorf, CH
Publisher: Swiss Centre for LCI, Empa - TSL
Volume No: 10
Issue No: 0

## Validation
Proof reading validation: passed; Other validation: none;
