# Rape seed IP, at farm

Dataset: EcoSpold 1, unit process
Functional unit: 1 kg
Category: agricultural / plant production
Geography: CH
Time period: 2000-01 to 2000-12
Production volume: CH prod of rape seed: 59100t in 2004.
Share of production covered: 88 %
Generated by: Thomas Nemecek
accessRestrictedTo: 0
copyright: true

## General comment
Inventory refers to the production of 1 kg rape seed IP, at farm with a moisture content of 6%. Fresh matter yield/ha at 6% moisture is 3113kg.;
Synonyms: canola, Brassica napus L.;

## Included processes
The inventory includes the processes of soil cultivation, sowing, weed control, fertilisation, pest and pathogen control, harvest and drying of the grains. Machine infrastructure and a shed for machine sheltering is included. Inputs of fertilisers, pesticides and seed as well as their transports to the regional processing center (10km) are considered. The direct emissions on the field are also included.

## Technology
Integrated production

## Time period
The yield data have been collected for the years 1996-2003.

## Reference product
- Rape seed IP, at farm [CH]: 1 kg
  SWITZERLAND

## Inputs from technosphere
- [thio]carbamate-compounds, at regional storehouse [CH]: 0.00018954 kg; lognormal SD95 1.1267
  (2,2,3,1,1,na)
- Tillage, ploughing [CH]: 0.00032126 ha; lognormal SD95 1.0714
  (2,1,1,1,1,na)
- Transport, freight, lorry, fleet average [CH]: 0.010682 tkm; lognormal SD95 1.0714
  (2,1,1,1,1,na)
- Diammonium phosphate, as N, at regional storehouse [RER]: 0.00078863 kg; lognormal SD95 1.0714
  (2,1,1,1,1,na)
- Diammonium phosphate, as P2O5, at regional storehouse [RER]: 0.0020154 kg; lognormal SD95 1.0714
  (2,1,1,1,1,na)
- Pesticide unspecified, at regional storehouse [CH]: 8.3528e-5 kg; lognormal SD95 1.1267
  (2,2,3,1,1,na)
- Acetamide-anillide-compounds, at regional storehouse [CH]: 0.00049795 kg; lognormal SD95 1.1267
  (2,2,3,1,1,na)
- Fertilising, by broadcaster [CH]: 0.00096378 ha; lognormal SD95 1.0714
  (2,1,1,1,1,na)
- Transport, freight, rail, electricity with shunting [CH]: 0.011818 tkm; lognormal SD95 2.095
  (4,5,na,na,na,na)
- Ammonium nitrate, as N, at regional storehouse [RER]: 0.017033 kg; lognormal SD95 1.0714
  (2,1,1,1,1,na)
- Triple superphosphate, as P2O5, at regional storehouse [RER]: 0.0029593 kg; lognormal SD95 1.0714
  (2,1,1,1,1,na)
- Transport, transoceanic freight ship [OCE]: 0.01353 tkm; lognormal SD95 2.095
  (4,5,na,na,na,na)
- Transport, freight, lorry, 3.5t gross weight, fleet average [CH]: 4.9924e-5 tkm; lognormal SD95 2.095
  (4,5,na,na,na,na)
- Combine harvesting [CH]: 0.00032126 ha; lognormal SD95 1.0714
  (2,1,1,1,1,na)
- Tillage, harrowing, by spring tine harrow [CH]: 0.00064252 ha; lognormal SD95 1.0714
  (2,1,1,1,1,na)
- Grain drying, low temperature [CH]: 0.068182 kg; lognormal SD95 1.0714
  (2,1,1,1,1,na)
- Sowing [CH]: 0.00032126 ha; lognormal SD95 1.0714
  (2,1,1,1,1,na)
- Pyretroid-compounds, at regional storehouse [CH]: 9.6378e-6 kg; lognormal SD95 1.1267
  (2,2,3,1,1,na)
- Application of plant protection products, by field sprayer [CH]: 0.0011244 ha; lognormal SD95 1.0714
  (2,1,1,1,1,na)
- Calcium ammonium nitrate, as N, at regional storehouse [RER]: 0.008543 kg; lognormal SD95 1.0714
  (2,1,1,1,1,na)
- Slurry spreading, by vacuum tanker [CH]: 0.0027416 m3; lognormal SD95 1.0714
  (2,1,1,1,1,na)
- Single superphosphate, as P2O5, at regional storehouse [RER]: 0.00011929 kg; lognormal SD95 1.0714
  (2,1,1,1,1,na)
- Transport, barge [RER]: 0.097872 tkm; lognormal SD95 2.095
  (4,5,na,na,na,na)
- Thomas meal, as P2O5, at regional storehouse [RER]: 0.00037415 kg; lognormal SD95 1.0714
  (2,1,1,1,1,na)
- Transport, freight, lorry, 16t-32t gross weight, fleet average [CH]: 0.011818 tkm; lognormal SD95 2.095
  (4,5,na,na,na,na)
- Ammonium sulphate, as N, at regional storehouse [RER]: 0.0012889 kg; lognormal SD95 1.0714
  (2,1,1,1,1,na)
- Phosphate rock, as P2O5, beneficiated, dry, at plant [MA]: 0.0017319 kg; lognormal SD95 1.0714
  (2,1,1,1,1,na)
- Urea, as N, at regional storehouse [RER]: 0.0059819 kg; lognormal SD95 1.0714
  (2,1,1,1,1,na)
- Rape seed IP, at regional storehouse [CH]: 0.0017669 kg; lognormal SD95 1.0714
  (2,1,1,1,1,na)
- Solid manure loading and spreading, by hydraulic loader and spreader [CH]: 1.7775 kg; lognormal SD95 1.0714
  (2,1,1,1,1,na)

## Inputs from nature
- Transformation, from annual crop, non-irrigated [resources, land]: 2.281 m2; lognormal SD95 1.2077
  (2,1,1,1,1,na)
- Occupation, annual crop, non-irrigated [resources, land]: 2.9003 m2a; lognormal SD95 1.113
  (2,1,1,1,1,na)
- Energy, gross calorific value, in biomass [resources, biotic]: 24.847 MJ; lognormal SD95 1.0714
  (2,1,1,1,1,na)
- Transformation, from pasture, man made, intensive [resources, land]: 0.93166 m2; lognormal SD95 1.2077
  (2,1,1,1,1,na)
- Transformation, to annual crop, non-irrigated [resources, land]: 3.2126 m2; lognormal SD95 1.2077
  (2,1,1,1,1,na)
- Carbon dioxide, in air [resources, in air]: 2.6836 kg; lognormal SD95 1.0714
  (2,1,1,1,1,na)

## Emissions to nature
- Lead [emissions to water, groundwater]: 4.9172e-8 kg; lognormal SD95 1.8042
  (2,2,1,1,1,na)
- Copper [emissions to soil, agricultural]: 1.7928e-5 kg; lognormal SD95 1.5051
  (2,2,1,1,1,na)
- Nitrate [emissions to water, groundwater]: 0.040798 kg; lognormal SD95 1.5051
  (2,2,1,1,1,na)
- Chromium [emissions to water, groundwater]: 6.1751e-6 kg; lognormal SD95 1.8042
  (2,2,1,1,1,na)
- Phosphate [emissions to water, river]: 0.0003399 kg; lognormal SD95 1.5051
  (2,2,1,1,1,na)
- Nickel [emissions to soil, agricultural]: 1.8511e-6 kg; lognormal SD95 1.5051
  (2,2,1,1,1,na)
- Phosphate [emissions to water, groundwater]: 7.09e-5 kg; lognormal SD95 1.5051
  (2,2,1,1,1,na)
- Metaldehyde (tetramer) [emissions to soil, agricultural]: 8.3528e-5 kg; lognormal SD95 1.2366
  (2,2,3,1,1,na)
- Cadmium [emissions to water, river]: 7.3896e-9 kg; lognormal SD95 1.8042
  (2,2,1,1,1,na)
- Nitrogen oxides [emissions to air, low. pop.]: 0.0002957 kg; lognormal SD95 1.4057
  (2,2,1,1,1,na)
- Chromium [emissions to soil, agricultural]: 3.9175e-6 kg; lognormal SD95 1.5051
  (2,2,1,1,1,na)
- Tebutam [emissions to soil, agricultural]: 0.00035017 kg; lognormal SD95 1.2366
  (2,2,3,1,1,na)
- Zinc [emissions to soil, agricultural]: 8.4788e-5 kg; lognormal SD95 1.5051
  (2,2,1,1,1,na)
- Cadmium [emissions to soil, agricultural]: -4.071e-7 kg; lognormal SD95 1.5051
  (2,2,1,1,1,na)
- Copper [emissions to water, river]: 8.0117e-7 kg; lognormal SD95 1.8042
  (2,2,1,1,1,na)
- Nickel [emissions to water, river]: 6.6428e-7 kg; lognormal SD95 1.8042
  (2,2,1,1,1,na)
- Chromium [emissions to water, river]: 9.006e-7 kg; lognormal SD95 1.8042
  (2,2,1,1,1,na)
- Carbetamide [emissions to soil, agricultural]: 0.00018954 kg; lognormal SD95 1.2366
  (2,2,3,1,1,na)
- Dinitrogen monoxide [emissions to air, low. pop.]: 0.0014081 kg; lognormal SD95 1.4057
  (2,2,1,1,1,na)
- Phosphorus [emissions to water, river]: 3.9155e-5 kg; lognormal SD95 1.5051
  (2,2,1,1,1,na)
- Lead [emissions to soil, agricultural]: 6.246e-7 kg; lognormal SD95 1.5051
  (2,2,1,1,1,na)
- Cadmium [emissions to water, groundwater]: 1.2e-8 kg; lognormal SD95 1.8042
  (2,2,1,1,1,na)
- Zinc [emissions to water, river]: 1.6701e-6 kg; lognormal SD95 1.8042
  (2,2,1,1,1,na)
- Copper [emissions to water, groundwater]: 1.1185e-6 kg; lognormal SD95 1.8042
  (2,2,1,1,1,na)
- Zinc [emissions to water, groundwater]: 8.6612e-6 kg; lognormal SD95 1.8042
  (2,2,1,1,1,na)
- Mercury [emissions to water, river]: 2.8075e-9 kg; lognormal SD95 1.8042
  (2,2,1,1,1,na)
- Napropamide [emissions to soil, agricultural]: 0.00014778 kg; lognormal SD95 1.2366
  (2,2,3,1,1,na)
- Cypermethrin [emissions to soil, agricultural]: 9.6378e-6 kg; lognormal SD95 1.2366
  (2,2,3,1,1,na)
- Ammonia [emissions to air, low. pop.]: 0.0045373 kg; lognormal SD95 1.209
  (2,2,1,1,1,na)
- Carbon dioxide, fossil [emissions to air, low. pop.]: 0.0093916 kg; lognormal SD95 1.0744
  (2,2,1,1,1,na)
- Mercury [emissions to soil, agricultural]: 1.358e-7 kg; lognormal SD95 1.5051
  (2,2,1,1,1,na)
- Mercury [emissions to water, groundwater]: 3.3875e-9 kg; lognormal SD95 1.8042
  (2,2,1,1,1,na)
- Lead [emissions to water, river]: 2.0502e-7 kg; lognormal SD95 1.8042
  (2,2,1,1,1,na)

## Sampling procedure
Data were compiled from statistics, pilot network, fertilising recommendations, documents from extension services, information provided by retailers and expert knowledge. The production data were verified and adjusted by a group of experts.

## Sources
- Nemecek T., Kaegi T., 2007, 2007 - LCI agricultural prod. systems - Nemecek, Ecoinvent report version 2.0, 15, Swiss Centre for LCI, ART, Duebendorf and Zuerich, CH
Nemecek, T., Kägi, T., Blaser, S. (2007) Life Cycle Inventories of Agricultural Production Systems. Ecoinvent report version 2.0. Editors: 0. Volume: 15. Swiss Centre for LCI, ART. Duebendorf and Zurich, CH.
Type: Measurement on site
Source: CD-ROM
First author: Nemecek, T.
Other authors: Kägi, T., Blaser, S.
Year: 2007
Name of editors: 0
Title of anthology: Ecoinvent report version 2.0
Place of publication: Duebendorf and Zurich, CH
Publisher: Swiss Centre for LCI, ART
Volume No: 15

## Validation
Proof reading validation: passed; Other validation: none;
