# Road wear emissions, lorry

Dataset: EcoSpold 1, unit process
Functional unit: 1 kg
Category: transport systems / road
Geography: RER
Time period: 2014-01 to 2014-12
Production volume: 41580000 kg
Generated by: Frank Werner
accessRestrictedTo: 0
copyright: true

## General comment
Calculation of non-exhaust emissions (tyre, brake and road wear emissions) are based on EMEP/EEA (2013) and values for net vehicle weights and average load factors. Net vehicle weights are taken from the EcoTransIT (2011) report whilst the average load factors are taken from the Tremove model v2.7b (2009) and EcoTransIT (2011) report. The road wear emissions are to air only. All particulates are accounted for as emissions to air and have particle sizes below 100um. Anything above this does not remain airborne over longer periods. In order to use the treatment of non-exhaust emissions in a transport dataset the quantity of emissions per tkm must be calculated. This must then be devided by the specific load factor of the transport in question.Non-exhaust emissions are considered to be linearly scalable to gross vehicle weight (GVW). For road wear emissions from lorries the specific quantity is 7E-9 kg/kg GVW*km.;

## Included processes
The activity starts with the road abrasion. The activity ends with emissions of road abrasion.

## Reference product
- Road wear emissions, lorry [RER]: 1 kg
  Europe

## Emissions to nature
- Particulates, < 2.5 um [emissions to air, unspecified]: 0.27 kg; lognormal SD95 1.1218
  (2,2,3,1,1,na)
  Calculated value. Derived from EMEP/EEA (2013) and based on an average gross vehicle weight (GVW) of all truck categories and load factors.
- Particulates, > 2.5 um, and < 10um [emissions to air, unspecified]: 0.23 kg; lognormal SD95 1.1218
  (same comment as for Particulates, < 2.5 um)
- Particulates, > 10 um [emissions to air, unspecified]: 0.5 kg; lognormal SD95 1.1218
  (same comment as for Particulates, < 2.5 um)

## Sampling procedure
Literature

## Sources
- Frischknecht R., Messmer A., Stolz P., 2016, 2016 - Mobitool - Frischknecht, Project Report, 0, treeze Ltd., Bern, CH
