# xx Wheat grains conventional, Barrois, at farm

Dataset: EcoSpold 1, unit process
Functional unit: 1 kg
Category: material, obsolete / agricultural, obsolete\plant production, obsolete
Geography: FR
Time period: 2000-01 to 2004-12
Production volume: 39712000t in 2004.
Share of production covered: 100 %
Generated by: Thomas Nemecek
accessRestrictedTo: 0
copyright: true

## General comment
Inventory refers to production of 1 kg wheat grains conventional, Barrois, at farm (14.5% moisture content). Yield at 14.5% moisture: 6752.73836514531 kg/ha.;

## Included processes
The inventory includes the processes of soil cultivation, sowing, weed control, fertilisation, pest and pathogen control, harvest and drying of the grains. Machine infrastructure and a shed for machine sheltering is included. Inputs of fertilisers, pesticides and seed as well as their transports to the farm are considered. The direct emissions on the field are also included. The system boundary is at the farm gate.

## Technology
conventional production typical for the region

## Time period
The yield data have been collected for the years 2000-2004.

## Reference product
- xx Wheat grains conventional, Barrois, at farm [FR]: 1 kg
  FRANCE

## Inputs from technosphere
- Sowing [CH]: 0.00014809 ha; lognormal SD95 1.0714
  (2,1,1,1,1,na)
- Transport, freight, lorry, fleet average [CH]: 0.0019884 tkm; lognormal SD95 1.0714
  (2,1,1,1,1,na)
- Tillage, harrowing, by spring tine harrow [CH]: 0.00025807 ha; lognormal SD95 1.0714
  (2,1,1,1,1,na)
- Organophosphorus-compounds, at regional storehouse [RER]: 3.406e-7 kg; lognormal SD95 1.0744
  (2,2,1,1,1,na)
- Limestone, milled, loose, at plant [CH]: 0.0018685 kg; lognormal SD95 1.0714
  (2,1,1,1,1,na)
- Pesticide unspecified, at regional storehouse [RER]: 0.0002815 kg; lognormal SD95 1.0744
  (2,2,1,1,1,na)
- Fertilising, by broadcaster [CH]: 0.00051831 ha; lognormal SD95 1.0714
  (2,1,1,1,1,na)
- Pyretroid-compounds, at regional storehouse [RER]: 1.6105e-6 kg; lognormal SD95 1.0744
  (2,2,1,1,1,na)
- Application of plant protection products, by field sprayer [CH]: 0.0010162 ha; lognormal SD95 1.0714
  (2,1,1,1,1,na)
- Urea, as N, at regional storehouse [RER]: 0.012109 kg; lognormal SD95 1.0714
  (2,1,1,1,1,na)
- Phenoxy-compounds, at regional storehouse [RER]: 5.5031e-5 kg; lognormal SD95 1.0744
  (2,2,1,1,1,na)
- Cyclic N-compounds, at regional storehouse [RER]: 1.7632e-5 kg; lognormal SD95 1.0744
  (2,2,1,1,1,na)
- Transport, freight, lorry, 7.5t-16t gross weight, fleet average [RER]: 0.00036532 tkm; lognormal SD95 2.095
  (4,5,na,na,na,na)
- Tillage, ploughing [CH]: 7.7625e-5 ha; lognormal SD95 1.0714
  (2,1,1,1,1,na)
- Diphenylether-compounds, at regional storehouse [RER]: 1.8498e-5 kg; lognormal SD95 1.0744
  (2,2,1,1,1,na)
- [sulfonyl]urea-compounds, at regional storehouse [RER]: 2.6214e-5 kg; lognormal SD95 1.0744
  (2,2,1,1,1,na)
- Tillage, harrowing, by rotary harrow [CH]: 7.0463e-5 ha; lognormal SD95 1.0714
  (2,1,1,1,1,na)
- Glyphosate, at regional storehouse [RER]: 5.3312e-5 kg; lognormal SD95 1.0744
  (2,2,1,1,1,na)
- Ammonium nitrate, as N, at regional storehouse [RER]: 0.015097 kg; lognormal SD95 1.0714
  (2,1,1,1,1,na)
- Nitrile-compounds, at regional storehouse [RER]: 6.1291e-5 kg; lognormal SD95 1.0744
  (2,2,1,1,1,na)
- Ammonium sulphate, as N, at regional storehouse [RER]: 0.0022401 kg; lognormal SD95 1.0714
  (2,1,1,1,1,na)
- Triple superphosphate, as P2O5, at regional storehouse [RER]: 0.010931 kg; lognormal SD95 1.0714
  (2,1,1,1,1,na)
- Combine harvesting [CH]: 0.00014809 ha; lognormal SD95 1.0714
  (2,1,1,1,1,na)
- Potassium chloride, as K2O, at regional storehouse [RER]: 0.0065871 kg; lognormal SD95 1.0714
  (2,1,1,1,1,na)
- Wheat seed IP, at regional storehouse [CH]: 0.023324 kg; lognormal SD95 1.0714
  (2,1,1,1,1,na)

## Inputs from nature
- Energy, gross calorific value, in biomass [resources, biotic]: 15.123 MJ; lognormal SD95 1.0714
  (2,1,1,1,1,na)
- Transformation, to arable, non-irrigated, diverse-intensive [resources, land]: 1.4809 m2; lognormal SD95 1.2077
  (2,1,1,1,1,na)
- Transformation, from arable, non-irrigated, diverse-intensive [resources, land]: 1.4809 m2; lognormal SD95 1.2077
  (2,1,1,1,1,na)
- Occupation, annual crop, non-irrigated, diverse-intensive [resources, land]: 1.4809 m2a; lognormal SD95 1.113
  (2,1,1,1,1,na)
- Carbon dioxide, in air [resources, in air]: 1.2943 kg; lognormal SD95 1.0714
  (2,1,1,1,1,na)

## Emissions to nature
- Metaldehyde (tetramer) [emissions to soil, agricultural]: 2.2213e-5 kg; lognormal SD95 1.209
  (2,2,1,1,1,na)
- Copper [emissions to water, river]: 3.2389e-7 kg; lognormal SD95 1.8042
  (2,2,1,1,1,na)
- Lambda-cyhalothrin [emissions to soil, agricultural]: 2.499e-7 kg; lognormal SD95 1.209
  (2,2,1,1,1,na)
- Cyproconazole [emissions to soil, agricultural]: 7.1319e-7 kg; lognormal SD95 1.209
  (2,2,1,1,1,na)
- Iodosulfuron-methyl-sodium [emissions to soil, agricultural]: 2.9761e-8 kg; lognormal SD95 1.209
  (2,2,1,1,1,na)
- Diclofop-methyl [emissions to soil, agricultural]: 1.1125e-5 kg; lognormal SD95 1.209
  (2,2,1,1,1,na)
- Mercury [emissions to water, river]: 3.8377e-11 kg; lognormal SD95 1.8042
  (2,2,1,1,1,na)
- Cypermethrin [emissions to soil, agricultural]: 1.1107e-6 kg; lognormal SD95 1.209
  (2,2,1,1,1,na)
- Chromium [emissions to soil, agricultural]: 2.7493e-6 kg; lognormal SD95 1.5051
  (2,2,1,1,1,na)
- Carbon dioxide, fossil [emissions to air, low. pop.]: 0.019012 kg; lognormal SD95 1.0744
  (2,2,1,1,1,na)
- Copper [emissions to soil, agricultural]: -1.5e-6 kg; lognormal SD95 1.5051
  (2,2,1,1,1,na)
- Metosulam [emissions to soil, agricultural]: 9.4036e-8 kg; lognormal SD95 1.209
  (2,2,1,1,1,na)
- Ammonia [emissions to air, low. pop.]: 0.0027899 kg; lognormal SD95 1.209
  (2,2,1,1,1,na)
- Cloquintocet-mexyl [emissions to soil, agricultural]: 1.7571e-6 kg; lognormal SD95 1.209
  (2,2,1,1,1,na)
- Spiroxamine [emissions to soil, agricultural]: 1.0218e-6 kg; lognormal SD95 1.209
  (2,2,1,1,1,na)
- Clodinafop-propargyl [emissions to soil, agricultural]: 7.0283e-6 kg; lognormal SD95 1.209
  (2,2,1,1,1,na)
- Zinc [emissions to water, river]: 4.4076e-7 kg; lognormal SD95 1.8042
  (2,2,1,1,1,na)
- Nitrogen oxides [emissions to air, low. pop.]: 0.00022319 kg; lognormal SD95 1.4057
  (2,2,1,1,1,na)
- Mesosulfuron-methyl (prop) [emissions to soil, agricultural]: 1.4881e-7 kg; lognormal SD95 1.209
  (2,2,1,1,1,na)
- Chromium [emissions to water, river]: 4.3709e-7 kg; lognormal SD95 1.8042
  (2,2,1,1,1,na)
- Prochloraz [emissions to soil, agricultural]: 1.4859e-6 kg; lognormal SD95 1.209
  (2,2,1,1,1,na)
- Metconazole [emissions to soil, agricultural]: 5.038e-7 kg; lognormal SD95 1.209
  (2,2,1,1,1,na)
- Diflufenican [emissions to soil, agricultural]: 6.194e-6 kg; lognormal SD95 1.209
  (2,2,1,1,1,na)
- Cadmium [emissions to soil, agricultural]: 1.1189e-6 kg; lognormal SD95 1.5051
  (2,2,1,1,1,na)
- Chromium [emissions to water, groundwater]: 2.889e-6 kg; lognormal SD95 1.8042
  (2,2,1,1,1,na)
- Ioxynil [emissions to soil, agricultural]: 1.9833e-5 kg; lognormal SD95 1.209
  (2,2,1,1,1,na)
- Silthiofam [emissions to soil, agricultural]: 2.7584e-6 kg; lognormal SD95 1.209
  (2,2,1,1,1,na)
- Bitertanol [emissions to soil, agricultural]: 1.1766e-7 kg; lognormal SD95 1.209
  (2,2,1,1,1,na)
- Mepiquat chloride [emissions to soil, agricultural]: 6.2197e-7 kg; lognormal SD95 1.209
  (2,2,1,1,1,na)
- Bifenox [emissions to soil, agricultural]: 5.2756e-6 kg; lognormal SD95 1.209
  (2,2,1,1,1,na)
- Fenpropidin [emissions to soil, agricultural]: 1.7163e-6 kg; lognormal SD95 1.209
  (2,2,1,1,1,na)
- Cadmium [emissions to water, river]: 4.3568e-9 kg; lognormal SD95 1.8042
  (2,2,1,1,1,na)
- Fludioxonil [emissions to soil, agricultural]: 7.5175e-7 kg; lognormal SD95 1.209
  (2,2,1,1,1,na)
- Florasulam [emissions to soil, agricultural]: 3.332e-8 kg; lognormal SD95 1.209
  (2,2,1,1,1,na)
- Ethephon [emissions to soil, agricultural]: 3.406e-7 kg; lognormal SD95 1.209
  (2,2,1,1,1,na)
- Triadimenol [emissions to soil, agricultural]: 4.1983e-7 kg; lognormal SD95 1.209
  (2,2,1,1,1,na)
- Phosphate [emissions to water, groundwater]: 3.1767e-5 kg; lognormal SD95 1.5051
  (2,2,1,1,1,na)
- Choline chloride [emissions to soil, agricultural]: 6.7765e-5 kg; lognormal SD95 1.209
  (2,2,1,1,1,na)
- Kresoxim-methyl [emissions to soil, agricultural]: 1.1376e-6 kg; lognormal SD95 1.209
  (2,2,1,1,1,na)
- Phosphate [emissions to water, river]: 9.331e-5 kg; lognormal SD95 1.5051
  (2,2,1,1,1,na)
- Lead [emissions to water, river]: 2.973e-8 kg; lognormal SD95 1.8042
  (2,2,1,1,1,na)
- Imidacloprid [emissions to soil, agricultural]: 5.4909e-7 kg; lognormal SD95 1.209
  (2,2,1,1,1,na)
- Tefluthrin [emissions to soil, agricultural]: 8.4476e-8 kg; lognormal SD95 1.209
  (2,2,1,1,1,na)
- Azoxystrobin [emissions to soil, agricultural]: 6.2171e-6 kg; lognormal SD95 1.209
  (2,2,1,1,1,na)
- Chlormequat [emissions to soil, agricultural]: 9.7412e-5 kg; lognormal SD95 1.209
  (2,2,1,1,1,na)
- Carfentrazone-ethyl [emissions to soil, agricultural]: 6.2197e-8 kg; lognormal SD95 1.209
  (2,2,1,1,1,na)
- Trifloxystrobin [emissions to soil, agricultural]: 2.1621e-6 kg; lognormal SD95 1.209
  (2,2,1,1,1,na)
- Copper [emissions to water, groundwater]: 4.3587e-7 kg; lognormal SD95 1.8042
  (2,2,1,1,1,na)
- Prohexadione-calcium [emissions to soil, agricultural]: 3.7022e-8 kg; lognormal SD95 1.209
  (2,2,1,1,1,na)
- Clopyralid [emissions to soil, agricultural]: 4.2709e-6 kg; lognormal SD95 1.209
  (2,2,1,1,1,na)
- Propoxycarbazone-sodium (prop) [emissions to soil, agricultural]: 2.0525e-7 kg; lognormal SD95 1.209
  (2,2,1,1,1,na)
- Mecoprop [emissions to soil, agricultural]: 2.8063e-5 kg; lognormal SD95 1.209
  (2,2,1,1,1,na)
- Deltamethrin [emissions to soil, agricultural]: 2.499e-7 kg; lognormal SD95 1.209
  (2,2,1,1,1,na)
- Fluroxypyr [emissions to soil, agricultural]: 2.0056e-5 kg; lognormal SD95 1.209
  (2,2,1,1,1,na)
- Propiconazole [emissions to soil, agricultural]: 1.8418e-6 kg; lognormal SD95 1.209
  (2,2,1,1,1,na)
- Zinc [emissions to water, groundwater]: 2.2034e-6 kg; lognormal SD95 1.8042
  (2,2,1,1,1,na)
- Zinc [emissions to soil, agricultural]: 1.225e-7 kg; lognormal SD95 1.5051
  (2,2,1,1,1,na)
- Pyraclostrobin (prop) [emissions to soil, agricultural]: 3.9254e-6 kg; lognormal SD95 1.209
  (2,2,1,1,1,na)
- Lead [emissions to water, groundwater]: 6.8734e-9 kg; lognormal SD95 1.8042
  (2,2,1,1,1,na)
- Isoproturon [emissions to soil, agricultural]: 2.5827e-5 kg; lognormal SD95 1.209
  (2,2,1,1,1,na)
- Anthraquinone [emissions to soil, agricultural]: 7.9097e-6 kg; lognormal SD95 1.209
  (2,2,1,1,1,na)
- Quinoxyfen [emissions to soil, agricultural]: 1.7949e-6 kg; lognormal SD95 1.209
  (2,2,1,1,1,na)
- Tebuconazole [emissions to soil, agricultural]: 2.9745e-6 kg; lognormal SD95 1.209
  (2,2,1,1,1,na)
- Dinitrogen monoxide [emissions to air, low. pop.]: 0.0010628 kg; lognormal SD95 1.4057
  (2,2,1,1,1,na)
- Bromoxynil [emissions to soil, agricultural]: 1.5024e-5 kg; lognormal SD95 1.209
  (2,2,1,1,1,na)
- Cyprodinil [emissions to soil, agricultural]: 2.6434e-5 kg; lognormal SD95 1.209
  (2,2,1,1,1,na)
- Mecoprop-P [emissions to soil, agricultural]: 6.912e-6 kg; lognormal SD95 1.209
  (2,2,1,1,1,na)
- Phosphorus [emissions to water, river]: 1.8724e-5 kg; lognormal SD95 1.5051
  (2,2,1,1,1,na)
- Trinexapac-ethyl [emissions to soil, agricultural]: 1.3883e-6 kg; lognormal SD95 1.209
  (2,2,1,1,1,na)
- Nickel [emissions to water, river]: 2.7991e-7 kg; lognormal SD95 1.8042
  (2,2,1,1,1,na)
- Fenpropimorph [emissions to soil, agricultural]: 4.318e-6 kg; lognormal SD95 1.209
  (2,2,1,1,1,na)
- Epoxiconazole [emissions to soil, agricultural]: 4.0783e-6 kg; lognormal SD95 1.209
  (2,2,1,1,1,na)
- Metsulfuron-methyl [emissions to soil, agricultural]: 3.874e-7 kg; lognormal SD95 1.209
  (2,2,1,1,1,na)
- Bromuconazole [emissions to soil, agricultural]: 3.5656e-7 kg; lognormal SD95 1.209
  (2,2,1,1,1,na)
- 2-Methyl-4-chlorophenoxyacetic acid [emissions to soil, agricultural]: 4.182e-5 kg; lognormal SD95 1.209
  (2,2,1,1,1,na)
- Mercury [emissions to water, groundwater]: 4.4636e-11 kg; lognormal SD95 1.8042
  (2,2,1,1,1,na)
- Flupyrsulfuron-methyl [emissions to soil, agricultural]: 4.7694e-8 kg; lognormal SD95 1.209
  (2,2,1,1,1,na)
- Nitrate [emissions to water, groundwater]: 0.04166 kg; lognormal SD95 1.5051
  (2,2,1,1,1,na)
- Glyphosate [emissions to soil, agricultural]: 5.3312e-5 kg; lognormal SD95 1.209
  (2,2,1,1,1,na)
- Picoxystrobin [emissions to soil, agricultural]: 4.276e-7 kg; lognormal SD95 1.209
  (2,2,1,1,1,na)
- Lead [emissions to soil, agricultural]: 1.8221e-7 kg; lognormal SD95 1.5051
  (2,2,1,1,1,na)
- Cadmium [emissions to water, groundwater]: 6.82e-9 kg; lognormal SD95 1.8042
  (2,2,1,1,1,na)
- Mercury [emissions to soil, agricultural]: -1.1081e-10 kg; lognormal SD95 1.5051
  (2,2,1,1,1,na)
- Nickel [emissions to soil, agricultural]: 9.2208e-7 kg; lognormal SD95 1.5051
  (2,2,1,1,1,na)

## Sampling procedure
Data come from a survey in the concerted action GL-Pro of the EU (QLK5-CT-2002-02418). Data were compiled from statistics, pilot networks, fertilising recommendations, documents from extension services, information provided by retailers and expert knowledge. The production data were verified and adjusted by a group of experts in GL-Pro and by other experts.

## Sources
- Nemecek T., Kaegi T., 2007, 2007 - LCI agricultural prod. systems - Nemecek, Ecoinvent report version 2.0, 15, Swiss Centre for LCI, ART, Duebendorf and Zuerich, CH
Nemecek, T., Kägi, T., Blaser, S. (2007) Life Cycle Inventories of Agricultural Production Systems. Ecoinvent report version 2.0. Editors: 0. Volume: 15. Swiss Centre for LCI, ART. Duebendorf and Zurich, CH.
Type: Measurement on site
Source: CD-ROM
First author: Nemecek, T.
Other authors: Kägi, T., Blaser, S.
Year: 2007
Name of editors: 0
Title of anthology: Ecoinvent report version 2.0
Place of publication: Duebendorf and Zurich, CH
Publisher: Swiss Centre for LCI, ART
Volume No: 15

## Validation
Proof reading validation: passed; Other validation: none;
