# Uranium natural, in yellowcake, at mill

Dataset: EcoSpold 1, unit process
Functional unit: 1 kg
Category: fuels / uranium\enriched
Geography: RU
Time period: 2011-01 to 2011-12
Generated by: Gabor Doka
accessRestrictedTo: 0
copyright: true

## General comment
PSI data (BFE project 407, Christian Bauer, April 2012).;

## Included processes
The module includes: the land use for the operation (mostly tailings); diesel generators and industrial boilers burning light oil; transport of the chemicals and fuels; radioactive and non-radioactive emissions to air and water during operation; water use (mining water, but attributed to "unspecified natural origin").

## Technology
Average conditions.

## Reference product
- Uranium natural, in yellowcake, at mill [RU]: 1 kg
  RUSSIAN FEDERATION

## Inputs from technosphere
- Sodium chloride, brine solution, at plant [RER]: 2.5 kg; lognormal SD95 2
  v2.2
- Sodium hydroxide, 50% in H2O, production mix, at plant [RER]: 0.026 kg; lognormal SD95 2
  v2.2
- Ethylenediamine, at plant [RER]: 0.012 kg; lognormal SD95 1.5
  v2.2
- Electricity, hard coal, at power plant [RU]: 40 kWh
  Axpo data; 33% of total electricity for mining and milling
- Chemicals organic, at plant [GLO]: 0.315 kg; lognormal SD95 2
  v2.2
- Transport, freight, lorry, fleet average [RER]: 10 tkm
  rough estimate; 1000km
- Tailings, uranium milling [GLO]: 0.32 m3
  calculated based on Axpo data
- Sodium chlorate, powder, at plant [RER]: 1 kg; lognormal SD95 2
  v2.2
- Transport, freight, rail, diesel [US]: 10 tkm
  rough estimate; 1000km
- Uranium natural, at underground mine [RU]: 1.03 kg; lognormal SD95 1.05
  Axpo data
- Nitric acid, 50% in H2O, at plant [RER]: 0.7 kg
  Axpo data
- Sulphuric acid, liquid, at plant [RER]: 46.7 kg
  Axpo data
- Uranium mill [US]: 1.35e-7 p; lognormal SD95 2
  v2.2; no specific info about lifetime of mining infra available
- Chemicals inorganic, at plant [GLO]: 0.26 kg; lognormal SD95 2
  v2.2
- Ammonia, liquid, at regional storehouse [RER]: 0.2 kg
  Axpo data
- Heat, heavy fuel oil, at industrial furnace 1MW [RER]: 1498 MJ
  Axpo data
- Ammonium sulphate, as N, at regional storehouse [RER]: 0.106 kg; lognormal SD95 2
  v2.2
- Soda, powder, at plant [RER]: 2.5 kg; lognormal SD95 2
  v2.2

## Inputs from nature
- Water, process, unspecified natural origin/m3 [resources, land]: 2.3 m3
  Axpo data

## Emissions to nature
- Uranium-235 [emissions to water, lake]: 4.85 kBq; lognormal SD95 3
  v2.2
- Titanium [emissions to water, lake]: 0.0012 kg; lognormal SD95 2
  v2.2
- Radon-222 [emissions to air, low. pop.]: 150000 kBq; lognormal SD95 15
  v2.2
- Aldehydes, unspecified [emissions to air, low. pop.]: 0.00088 kg; lognormal SD95 3
  v2.2
- Uranium-235 [emissions to air, low. pop.]: 0.14 kBq; lognormal SD95 4
  v2.2
- Particulates, > 10 um [emissions to air, low. pop.]: 0.06 kg
  Axpo data
- Polonium-210 [emissions to water, lake]: 0.726 kBq
  Axpo data
- Ammonia [emissions to air, low. pop.]: 0.032 kg
  Axpo data
- Thorium-230 [emissions to water, lake]: 0.284 kBq; lognormal SD95 2
  v2.2
- Phosphate [emissions to water, lake]: 0.00022 kg; lognormal SD95 2
  v2.2
- Uranium-234 [emissions to water, lake]: 0.3 kBq; lognormal SD95 3
  v2.2
- Cyanide [emissions to water, lake]: 8.8e-7 kg; lognormal SD95 2
  v2.2
- Particulates, > 2.5 um, and < 10um [emissions to air, low. pop.]: 0.00088 kg; lognormal SD95 3
  v2.2
- Iron [emissions to water, lake]: 0.1 kg; lognormal SD95 4
  v2.2
- Thorium-230 [emissions to air, low. pop.]: 1 kBq; lognormal SD95 5
  v2.2
- Aluminium [emissions to water, lake]: 0.35 kg; lognormal SD95 2
  v2.2
- Chromium [emissions to water, lake]: 0.00096 kg; lognormal SD95 3
  v2.2
- Hydrocarbons, unspecified [emissions to water, lake]: 0.0035 kg; lognormal SD95 2
  v2.2
- Lead-210 [emissions to water, lake]: 0.983 kBq
  Axpo data
- Uranium-234 [emissions to air, low. pop.]: 2.9 kBq; lognormal SD95 4
  v2.2
- Radium-226 [emissions to air, low. pop.]: 1 kBq; lognormal SD95 5
  v2.2
- Carbonate [emissions to water, lake]: 0.036 kg; lognormal SD95 2
  v2.2
- Sodium [emissions to water, lake]: 0.04 kg; lognormal SD95 2
  v2.2
- Calcium [emissions to water, lake]: 0.54 kg; lognormal SD95 10
  v2.2
- Polonium-210 [emissions to air, low. pop.]: 3 kBq; lognormal SD95 3
  v2.2
- Manganese [emissions to water, lake]: 0.0044 kg
  Axpo data
- Magnesium [emissions to water, lake]: 0.01 kg; lognormal SD95 3
  v2.2
- Sulfate [emissions to water, lake]: 1.6 kg; lognormal SD95 3
  v2.2
- Sulfur dioxide [emissions to air, low. pop.]: 0.00023 kg; lognormal SD95 3
  v2.2
- Uranium-238 [emissions to air, low. pop.]: 2.9 kBq; lognormal SD95 4
  v2.2
- NMVOC, non-methane volatile organic compounds, unspecified origin [emissions to air, low. pop.]: 0.11 kg; lognormal SD95 3
  v2.2
- Uranium-238 [emissions to water, lake]: 4.85 kBq; lognormal SD95 3
  v2.2
- Nitrate [emissions to water, lake]: 0.0087 kg; lognormal SD95 2
  v2.2
- Lead [emissions to water, lake]: 0.0015 kg; lognormal SD95 4
  v2.2
- Arsenic [emissions to water, lake]: 8.1e-5 kg; lognormal SD95 5
  v2.2
- Silver [emissions to water, lake]: 8.8e-7 kg; lognormal SD95 2
  v2.2
- Beryllium [emissions to water, lake]: 1.4e-5 kg; lognormal SD95 3
  v2.2
- Ammonium, ion [emissions to water, lake]: 0.072 kg; lognormal SD95 2
  v2.2
- Molybdenum [emissions to water, lake]: 0.0019 kg; lognormal SD95 3
  v2.2
- Vanadium [emissions to water, lake]: 1.8e-5 kg; lognormal SD95 2
  v2.2
- Copper [emissions to water, lake]: 0.0002 kg; lognormal SD95 2
  v2.2
- Chloride [emissions to water, lake]: 0.52 kg; lognormal SD95 5
  v2.2
- Sulfide [emissions to water, lake]: 4.4e-5 kg; lognormal SD95 2
  v2.2
- Lead-210 [emissions to air, low. pop.]: 2 kBq; lognormal SD95 4
  v2.2
- Zinc [emissions to water, lake]: 0.00052 kg; lognormal SD95 2
  v2.2
- Fluoride [emissions to water, lake]: 0.00066 kg; lognormal SD95 2
  v2.2
- Nickel [emissions to water, lake]: 0.0001 kg; lognormal SD95 3
  v2.2
- Selenium [emissions to water, lake]: 0.0016 kg; lognormal SD95 2
  v2.2
- Nitrogen oxides [emissions to air, low. pop.]: 0.017 kg; lognormal SD95 3
  v2.2
- Barium [emissions to water, lake]: 0.00011 kg; lognormal SD95 3
  v2.2
- Radium-226 [emissions to water, lake]: 1 kBq; lognormal SD95 10
  v2.2

## Sampling procedure
Literature

## Sources
- Bauer C., Frischknecht R., Eckle P., Flury K., Neal T., Papp K., Schori S., Simons A., Stucki M., Treyer K., 2012, 2012 - LCA electricity generation in Switzerland - Uster, -, 407, Swiss Centre for LCI, ESU-services Ltd., PSI, Uster and Villigen, CH
Ch. Bauer, Frischknecht (2012) Umweltauswirkungen Strom. Volume: 407. PSI. Uster und Villigen, CH.
Type: Separate publication
Source: CD-ROM
First author: Ch. Bauer
Other authors: Frischknecht
Year: 2012
Place of publication: Uster und Villigen, CH
Publisher: PSI
Volume No: 407

## Validation
Proof reading validation: Unknown; Other validation: \\Server\E\ESU-Docs\Projektablage\407 Update LCI Energiesysteme\EcoSpold\import in unit process library\[uranium natural.xls]X-Process;
