# Treatment, sewage, to wastewater treatment, class 3

Dataset: EcoSpold 1, unit process
Functional unit: 1 m3
Category: wastewater treatment / unspecified
Geography: CH
Time period: 2000-01 to 2000-12
Generated by: Gabor Doka
accessRestrictedTo: 0
copyright: true

## General comment
Wastewater purified in a medium size municipal wastewater treatment plant (capacity class 3), with an average capacity size of 24900 per-captia-equivalents PCE. \nWastewater contains (in kg/m3): COD: 0.1556 (GSD=122.5%);

## Included processes
Infrastructure materials for municipal wastewater treatment plant, transports, dismantling. Land use burdens.

## Technology
Three stage wastewater treatment (mechanical, biological, chemical) including sludge digestion (fermentation) according to the average technology in Switzerland

## Reference product
- Treatment, sewage, to wastewater treatment, class 3 [CH]: 1 m3
  SWITZERLAND

## Inputs from technosphere
- Process-specific burdens, slag compartment [CH]: 0.020463 kg; lognormal SD95 1.4438
  burden from sludge incineration. Uncertainty calculated from wastewater composition and treatment model
- Ammonia, liquid, at regional storehouse [CH]: 6.2445e-5 kg; lognormal SD95 2.3119
  (same comment as for Process-specific burdens, slag compartment)
- Hydrochloric acid, 30% in H2O, at plant [RER]: 3.4233e-7 kg; lognormal SD95 1.4911
  (same comment as for Process-specific burdens, slag compartment)
- Iron (III) chloride, 40% in H2O, at plant [CH]: 0.015946 kg; lognormal SD95 1.6172
  direct wastewater treatment plant burden plus burden from sludge incineration. Uncertainty calculated from wastewater composition and treatment model
- Chemicals inorganic, at plant [GLO]: 5.7056e-7 kg; lognormal SD95 1.4911
  (same comment as for Process-specific burdens, slag compartment)
- Quicklime, milled, packed, at plant [CH]: 1.0865e-6 kg; lognormal SD95 1.5155
  (same comment as for Process-specific burdens, slag compartment)
- Municipal waste incineration plant [CH]: 2.8093e-11 p; lognormal SD95 1.1492
  (same comment as for Process-specific burdens, slag compartment)
- Electricity, low voltage, at grid [CH]: 0.20571 kWh; lognormal SD95 1.2895
  direct wastewater treatment plant burden. Uncertainty calculated from wastewater composition and treatment model
- Chemicals organic, at plant [GLO]: 4.5537e-7 kg; lognormal SD95 3.4906
  (same comment as for Process-specific burdens, slag compartment)
- Electricity from waste, at municipal waste incineration plant [CH]: 0.016155 kWh; lognormal SD95 3.8075
  (same comment as for Process-specific burdens, slag compartment)
- Residual material landfill facility [CH]: 6.684e-12 p; lognormal SD95 1.4495
  (same comment as for Process-specific burdens, slag compartment)
- Disposal, plastics, mixture, 15.3% water, to municipal incineration [CH]: 0.0155 kg; lognormal SD95 1.07
  (same comment as for Electricity, low voltage, at grid)
- Natural gas, burned in industrial furnace 1MW [CH]: 0.0060898 MJ; lognormal SD95 2.3119
  (same comment as for Process-specific burdens, slag compartment)
- Transport, freight, rail [RER]: 0.01935 tkm; lognormal SD95 1.3515
  (same comment as for Iron (III) chloride, 40% in H2O, at plant)
- Slurry spreading, by vacuum tanker [CH]: 0.00039637 m3; lognormal SD95 1.0761
  burden from sludge spreading. Uncertainty calculated from wastewater composition and treatment model
- Sewer grid, class 3 [CH]: 2.1782e-7 km; lognormal SD95 1
  uncertainty heeded in exchanges of the module
- Chromium oxide, flakes, at plant [RER]: 3.6479e-8 kg; lognormal SD95 4.1059
  (same comment as for Process-specific burdens, slag compartment)
- Heat from waste, at municipal waste incineration plant [CH]: 0.094244 MJ; lognormal SD95 1.1588
  (same comment as for Process-specific burdens, slag compartment)
- Wastewater treatment plant, class 3 [CH]: 5.6882e-9 p; lognormal SD95 1
  uncertainty heeded in exchanges of the module
- Process-specific burdens, residual material landfill [CH]: 0.0032083 kg; lognormal SD95 1.4495
  (same comment as for Process-specific burdens, slag compartment)
- Disposal, cement, hydrated, 0% water, to residual material landfill [CH]: 0.0032083 kg; lognormal SD95 1.5179
  (same comment as for Process-specific burdens, slag compartment)
- Slag compartment [CH]: 3.6379e-11 p; lognormal SD95 1.4438
  (same comment as for Process-specific burdens, slag compartment)
- Disposal, paper, 11.2% water, to municipal incineration [CH]: 0.0155 kg; lognormal SD95 1.07
  (same comment as for Electricity, low voltage, at grid)
- Sodium hydroxide, 50% in H2O, production mix, at plant [RER]: 0.00030516 kg; lognormal SD95 1.5319
  (same comment as for Process-specific burdens, slag compartment)
- Transport, freight, lorry, 16t-32t gross weight, fleet average [CH]: 0.012759 tkm; lognormal SD95 1.0693
  (same comment as for Iron (III) chloride, 40% in H2O, at plant)
- Process-specific burdens, municipal waste incineration [CH]: 0.11237 kg; lognormal SD95 1.1492
  (same comment as for Process-specific burdens, slag compartment)
- Titanium dioxide, production mix, at plant [RER]: 1.7875e-6 kg; lognormal SD95 4.1059
  (same comment as for Process-specific burdens, slag compartment)
- Aluminium sulphate, powder, at plant [RER]: 0.0031512 kg; lognormal SD95 1.6175
  (same comment as for Electricity, low voltage, at grid)
- Iron sulphate, at plant [RER]: 0.01166 kg; lognormal SD95 1.6175
  (same comment as for Electricity, low voltage, at grid)
- Cement, unspecified, at plant [CH]: 0.0012833 kg; lognormal SD95 1.5179
  (same comment as for Process-specific burdens, slag compartment)

## Emissions to nature
- Tin [emissions to water, groundwater, long-term]: 5.2834e-7 kg; lognormal SD95 9.1295
  emission from sludge incineration. Uncertainty calculated from wastewater composition and treatment model
- Nickel [emissions to air, high. pop.]: 5.9485e-14 kg; lognormal SD95 5.7675
  direct digester gas emission plus emission from sludge incineration. Uncertainty calculated from wastewater composition and treatment model
- Calcium [emissions to air, high. pop.]: 4.418e-6 kg; lognormal SD95 5.2383
  (same comment as for Nickel)
- Manganese [emissions to air, high. pop.]: 7.5533e-14 kg; lognormal SD95 5.9399
  (same comment as for Nickel)
- Cobalt [emissions to air, high. pop.]: 1.3444e-14 kg; lognormal SD95 5.8017
  (same comment as for Nickel)
- COD, Chemical Oxygen Demand [emissions to water, groundwater, long-term]: 0.00022677 kg; lognormal SD95 1.715
  (same comment as for Tin)
- Molybdenum [emissions to water, groundwater, long-term]: 2.0729e-7 kg; lognormal SD95 5.1354
  (same comment as for Tin)
- Arsenic [emissions to water, river]: 7.5206e-7 kg; lognormal SD95 4.5458
  sewer overload discharge plus direct wastewater treatment plant emission plus emission from sludge incineration. Uncertainty calculated from wastewater composition and treatment model
- Cadmium [emissions to water, river]: 1.4245e-7 kg; lognormal SD95 4.839
  (same comment as for Arsenic)
- TOC, Total Organic Carbon [emissions to water, river]: 0.0072993 kg; lognormal SD95 1.4595
  (same comment as for Arsenic)
- Ammonia [emissions to air, high. pop.]: 0.00041569 kg; lognormal SD95 2.7107
  direct digester gas emission plus emission from sludge incineration plus emission from sludge spreading. Uncertainty calculated from wastewater composition and treatment model
- Lead [emissions to air, high. pop.]: 1.5184e-10 kg; lognormal SD95 5.3876
  (same comment as for Nickel)
- Chromium VI [emissions to water, river]: 6.3121e-6 kg; lognormal SD95 4.7393
  (same comment as for Arsenic)
- Copper [emissions to water, groundwater, long-term]: 1.1913e-5 kg; lognormal SD95 5.2437
  (same comment as for Tin)
- Cadmium [emissions to soil, agricultural]: 6.4759e-8 kg; lognormal SD95 5.1367
  emission from sludge spreading. Uncertainty calculated from wastewater composition and treatment model
- Mercury [emissions to soil, agricultural]: 6.4759e-8 kg; lognormal SD95 5.144
  (same comment as for Cadmium)
- Phosphate [emissions to water, groundwater]: 1.7752e-5 kg; lognormal SD95 1.7963
  (same comment as for Cadmium)
- Calcium [emissions to soil, agricultural]: 0.0023366 kg; lognormal SD95 5.1327
  (same comment as for Cadmium)
- Mercury [emissions to water, groundwater, long-term]: 3.8216e-9 kg; lognormal SD95 30.752
  (same comment as for Tin)
- Copper [emissions to air, high. pop.]: 1.0879e-10 kg; lognormal SD95 5.4831
  (same comment as for Nickel)
- Nitrate [emissions to water, river]: 0.048302 kg; lognormal SD95 1.3168
  (same comment as for Arsenic)
- Molybdenum [emissions to soil, agricultural]: 2.2094e-7 kg; lognormal SD95 5.1367
  (same comment as for Cadmium)
- Nitrogen oxides [emissions to air, high. pop.]: 0.00069387 kg; lognormal SD95 1.5164
  (same comment as for Nickel)
- Mercury [emissions to air, high. pop.]: 3.3644e-13 kg; lognormal SD95 5.3218
  (same comment as for Nickel)
- Potassium [emissions to water, river]: 0.0003989 kg; lognormal SD95 4.9019
  (same comment as for Arsenic)
- Chromium VI [emissions to water, groundwater, long-term]: 3.3892e-7 kg; lognormal SD95 7.775
  (same comment as for Tin)
- Tin [emissions to water, river]: 1.4223e-6 kg; lognormal SD95 4.8281
  (same comment as for Arsenic)
- Lead [emissions to soil, agricultural]: 3.5998e-6 kg; lognormal SD95 5.1515
  (same comment as for Cadmium)
- Iron [emissions to water, groundwater, long-term]: 0.0033035 kg; lognormal SD95 7.0634
  (same comment as for Tin)
- Iron [emissions to air, high. pop.]: 2.3545e-7 kg; lognormal SD95 2.2529
  (same comment as for Nickel)
- Cobalt [emissions to water, river]: 8.2108e-7 kg; lognormal SD95 4.8397
  (same comment as for Arsenic)
- Phosphorus [emissions to air, high. pop.]: 1.1527e-6 kg; lognormal SD95 1.6015
  (same comment as for Nickel)
- Sulfur dioxide [emissions to air, high. pop.]: 0.00088561 kg; lognormal SD95 1.6653
  (same comment as for Nickel)
- Cadmium [emissions to water, groundwater, long-term]: 7.3701e-10 kg; lognormal SD95 188.19
  (same comment as for Tin)
- DOC, Dissolved Organic Carbon [emissions to water, river]: 0.0075378 kg; lognormal SD95 1.458
  (same comment as for Arsenic)
- Magnesium [emissions to water, groundwater, long-term]: 0.00027466 kg; lognormal SD95 5.1347
  (same comment as for Tin)
- Molybdenum [emissions to water, river]: 5.287e-7 kg; lognormal SD95 4.4147
  (same comment as for Arsenic)
- Molybdenum [emissions to air, high. pop.]: 5.012e-10 kg; lognormal SD95 5.2423
  (same comment as for Nickel)
- Carbon [emissions to soil, agricultural]: 0.008102 kg; lognormal SD95 1.656
  (same comment as for Cadmium)
- Tin [emissions to soil, agricultural]: 9.2667e-7 kg; lognormal SD95 5.1501
  (same comment as for Cadmium)
- Methane, biogenic [emissions to air, high. pop.]: 0.00050234 kg; lognormal SD95 1.8728
  (same comment as for Nickel)
- Aluminium [emissions to water, river]: 6.231e-5 kg; lognormal SD95 4.1653
  (same comment as for Arsenic)
- Lead [emissions to water, groundwater, long-term]: 2.909e-7 kg; lognormal SD95 189.51
  (same comment as for Tin)
- Copper [emissions to water, river]: 9.7124e-6 kg; lognormal SD95 4.7445
  (same comment as for Arsenic)
- Cadmium [emissions to air, high. pop.]: 4.1068e-12 kg; lognormal SD95 5.2886
  (same comment as for Nickel)
- Nitrogen [emissions to water, river]: 0.00049 kg; lognormal SD95 1.5053
  direct wastewater treatment plant emission. Uncertainty calculated from wastewater composition and treatment model
- Sulfate [emissions to water, river]: 0.14483 kg; lognormal SD95 1.4559
  (same comment as for Arsenic)
- Carbon monoxide, biogenic [emissions to air, high. pop.]: 0.00016855 kg; lognormal SD95 1.9663
  (same comment as for Nickel)
- Iron [emissions to soil, agricultural]: 0.006218 kg; lognormal SD95 2.0137
  (same comment as for Cadmium)
- Magnesium [emissions to soil, agricultural]: 0.00026233 kg; lognormal SD95 5.1327
  (same comment as for Cadmium)
- Silicon [emissions to water, groundwater, long-term]: 0.00013562 kg; lognormal SD95 105.06
  (same comment as for Tin)
- DOC, Dissolved Organic Carbon [emissions to water, groundwater, long-term]: 8.9735e-5 kg; lognormal SD95 1.715
  (same comment as for Tin)
- Fluoride [emissions to water, river]: 3.2769e-5 kg; lognormal SD95 4.9019
  (same comment as for Arsenic)
- Nickel [emissions to soil, agricultural]: 1.2152e-6 kg; lognormal SD95 5.1331
  (same comment as for Cadmium)
- Sulfur [emissions to soil, agricultural]: 0.00072107 kg; lognormal SD95 1.6613
  (same comment as for Cadmium)
- Silicon [emissions to air, high. pop.]: 3.636e-6 kg; lognormal SD95 5.2552
  (same comment as for Nickel)
- Phosphate [emissions to water, groundwater, long-term]: 0.000135 kg; lognormal SD95 60.623
  (same comment as for Tin)
- Heat, waste [emissions to air, high. pop.]: 1.2938 MJ; lognormal SD95 1.2928
  direct wastewater treatment plant emission plus emission from sludge incineration. Uncertainty calculated from wastewater composition and treatment model
- Cobalt [emissions to soil, agricultural]: 3.7332e-7 kg; lognormal SD95 5.1367
  (same comment as for Cadmium)
- Nitrite [emissions to water, river]: 0.000644 kg; lognormal SD95 1.5041
  (same comment as for Nitrogen)
- Carbon dioxide, biogenic [emissions to air, high. pop.]: 0.1874 kg; lognormal SD95 1.3499
  direct wastewater treatment plant emission plus direct digester gas emission plus emission from sludge incineration. Uncertainty calculated from wastewater composition and treatment model
- Aluminium [emissions to water, groundwater, long-term]: 0.00057938 kg; lognormal SD95 3.6838
  (same comment as for Tin)
- Magnesium [emissions to air, high. pop.]: 4.0971e-7 kg; lognormal SD95 5.2383
  (same comment as for Nickel)
- Chromium [emissions to soil, agricultural]: 2.8227e-6 kg; lognormal SD95 5.1367
  (same comment as for Cadmium)
- Silicon [emissions to soil, agricultural]: 0.001377 kg; lognormal SD95 5.1635
  (same comment as for Cadmium)
- Aluminium [emissions to soil, agricultural]: 0.00069025 kg; lognormal SD95 3.6242
  (same comment as for Cadmium)
- Dinitrogen monoxide [emissions to air, high. pop.]: 0.00010637 kg; lognormal SD95 1.4567
  direct wastewater treatment plant emission plus direct digester gas emission plus emission from sludge incineration plus emission from sludge spreading. Uncertainty calculated from wastewater composition and treatment model
- COD, Chemical Oxygen Demand [emissions to water, river]: 0.030152 kg; lognormal SD95 1.4737
  (same comment as for Arsenic)
- Nickel [emissions to water, groundwater, long-term]: 1.2904e-6 kg; lognormal SD95 5.134
  (same comment as for Tin)
- Magnesium [emissions to water, river]: 0.0051483 kg; lognormal SD95 4.8945
  (same comment as for Arsenic)
- Ammonium, ion [emissions to water, river]: 0.011027 kg; lognormal SD95 1.342
  (same comment as for Nitrogen)
- Arsenic [emissions to air, high. pop.]: 2.5337e-10 kg; lognormal SD95 5.2875
  (same comment as for Nickel)
- Manganese [emissions to water, groundwater, long-term]: 1.1945e-5 kg; lognormal SD95 6.1728
  (same comment as for Tin)
- Manganese [emissions to water, river]: 2.6898e-5 kg; lognormal SD95 4.8497
  (same comment as for Arsenic)
- Zinc [emissions to soil, agricultural]: 3.54e-5 kg; lognormal SD95 5.144
  (same comment as for Cadmium)
- Chromium [emissions to air, high. pop.]: 2.3673e-13 kg; lognormal SD95 5.7412
  (same comment as for Nickel)
- Iron [emissions to water, river]: 0.003602 kg; lognormal SD95 4.8568
  (same comment as for Arsenic)
- BOD5, Biological Oxygen Demand [emissions to water, groundwater, long-term]: 7.4177e-5 kg; lognormal SD95 1.715
  (same comment as for Tin)
- Calcium [emissions to water, groundwater, long-term]: 0.0023063 kg; lognormal SD95 5.1471
  (same comment as for Tin)
- Phosphate [emissions to water, river]: 0.002715 kg; lognormal SD95 1.4845
  sewer overload discharge plus direct wastewater treatment plant emission plus emission from sludge incineration plus emission from sludge spreading. Uncertainty calculated from wastewater composition and treatment model
- Copper [emissions to soil, agricultural]: 1.2994e-5 kg; lognormal SD95 5.1459
  (same comment as for Cadmium)
- Zinc [emissions to water, river]: 3.3808e-5 kg; lognormal SD95 4.7748
  (same comment as for Arsenic)
- Zinc [emissions to water, groundwater, long-term]: 6.2251e-7 kg; lognormal SD95 107.37
  (same comment as for Tin)
- NMVOC, non-methane volatile organic compounds, unspecified origin [emissions to air, high. pop.]: 2.2813e-6 kg; lognormal SD95 2.5254
  direct digester gas emission. Uncertainty calculated from wastewater composition and treatment model
- Lead [emissions to water, river]: 9.4871e-7 kg; lognormal SD95 4.4904
  (same comment as for Arsenic)
- Chloride [emissions to water, river]: 0.040484 kg; lognormal SD95 3.7877
  (same comment as for Arsenic)
- Arsenic [emissions to soil, agricultural]: 9.1004e-8 kg; lognormal SD95 5.1369
  (same comment as for Cadmium)
- Manganese [emissions to soil, agricultural]: 1.223e-5 kg; lognormal SD95 5.1468
  (same comment as for Cadmium)
- BOD5, Biological Oxygen Demand [emissions to water, river]: 0.0098229 kg; lognormal SD95 1.4543
  (same comment as for Arsenic)
- Sodium [emissions to water, river]: 0.002186 kg; lognormal SD95 4.9019
  (same comment as for Arsenic)
- Heat, waste [emissions to water, river]: 1.1879 MJ; lognormal SD95 1.3796
  (same comment as for Heat, waste)
- Arsenic [emissions to water, groundwater, long-term]: 5.6685e-8 kg; lognormal SD95 5.1353
  (same comment as for Tin)
- Tin [emissions to air, high. pop.]: 1.3946e-9 kg; lognormal SD95 5.2692
  (same comment as for Nickel)
- Chromium [emissions to water, river]: 1.0204e-8 kg; lognormal SD95 5.2234
  (same comment as for Tin)
- Zinc [emissions to air, high. pop.]: 6.5594e-10 kg; lognormal SD95 5.4352
  (same comment as for Nickel)
- Silicon [emissions to water, river]: 0.00018783 kg; lognormal SD95 4.2885
  (same comment as for Arsenic)
- Cyanide [emissions to air, high. pop.]: 1.114e-6 kg; lognormal SD95 2.4352
  (same comment as for Tin)
- Nitrate [emissions to water, groundwater, long-term]: 4.4464e-5 kg; lognormal SD95 1.5146
  (same comment as for Tin)
- Nickel [emissions to water, river]: 3.9965e-6 kg; lognormal SD95 4.8553
  (same comment as for Arsenic)
- Aluminium [emissions to air, high. pop.]: 1.223e-6 kg; lognormal SD95 3.7188
  (same comment as for Nickel)
- TOC, Total Organic Carbon [emissions to water, groundwater, long-term]: 8.9735e-5 kg; lognormal SD95 1.715
  (same comment as for Tin)
- Calcium [emissions to water, river]: 0.045857 kg; lognormal SD95 4.8943
  (same comment as for Arsenic)
- Sulfate [emissions to water, groundwater, long-term]: 0.0020512 kg; lognormal SD95 1.6619
  (same comment as for Tin)
- Cobalt [emissions to water, groundwater, long-term]: 3.7072e-7 kg; lognormal SD95 5.1477
  (same comment as for Tin)
- Mercury [emissions to water, river]: 6.2619e-8 kg; lognormal SD95 4.7058
  (same comment as for Arsenic)

## Sources
- Doka G., 2009, 2009 - LCI waste treatment services - Doka, Final report ecoinvent data v2.1, 13, Swiss Centre for LCI, Doka LCA, Duebendorf and St. Gallen, CH
Doka G. (2008) Life Cycle Inventories of Waste Treatment Services. Final report ecoinvent data v2.1. Volume: 13. Issue: 0. Swiss Centre for LCI, Empa - TSL. Dübendorf, CH.
Type: Measurement on site
Source: CD-ROM
First author: Doka G.
Year: 2008
Title of anthology: Final report ecoinvent data v2.1
Place of publication: Dübendorf, CH
Publisher: Swiss Centre for LCI, Empa - TSL
Volume No: 13
Issue No: 0

## Validation
Proof reading validation: passed.; Other validation: none;
