# Flooring, parquet, three layers, at regional storage, with resource correction

Dataset: EcoSpold 1, unit process
Functional unit: 1 m2
Category: flooring / flooring kbob
Geography: CH
Time period: 2012-01 to 2012-12
Share of production covered: 0 %
Generated by: Matthias Klingler
accessRestrictedTo: 0
copyright: true

## General comment
Durchschnittliches Flächengewicht = 6.7 kg/m2. Wood input linked to updated supply chain based on information obtained from Frank Werner. Philippe Stolz, August 2016.

Technology: unknown

Version: 1.00

0.0
Production volume: unknown
Local category: flooring
Local subcategory: flooring KBOB

## Included processes
Gebrauchsfertiger Bodenbelag inklusive Versiegelung. Die Verlegung, insbesondere die Verklebung des Belags, ist in der Bilanz nicht berücksichtigt. Die verwendeten Daten für die Bilanzierung des Belags stammen aus "F. Werner, K. Richter, Ökologische Untersuchung von Parkettfussböden, ISP, 1997".

## Reference product
- Flooring, parquet, three layers, at regional storage, with resource correction [CH]: 1 m2

## Inputs from technosphere
- Folding boxboard, FBB, at plant [RER]: 0.173 kg; lognormal SD95 1.5104
- Electricity, medium voltage, production ENTSO-E, at grid: 2.345 kWh; lognormal SD95 1.5104
- Transport, freight, lorry, 32t-40t gross weight, fleet average [CH]: 10.701 tkm; lognormal SD95 1.5104
- Tap water, at user [CH]: 30 kg; lognormal SD95 1.5104
- Diesel, burned in building machine, average [CH]: 0.6 MJ; lognormal SD95 1.5104
- Urea formaldehyde resin, at plant [RER]: 0.23 kg; lognormal SD95 1.5104
- Chemicals organic, at plant [GLO]: 0.054 kg; lognormal SD95 1.5104
- Ethylene vinyl acetate copolymer, at plant [RER]: 0.0019 kg; lognormal SD95 1.5104
- Transport, freight, lorry, 16t-32t gross weight, fleet average [CH]: 0.00082 tkm; lognormal SD95 1.5104
- Transport, freight, lorry, 32t-40t gross weight, fleet average [RER]: 2.454 tkm; lognormal SD95 1.5104
- Acrylic varnish, 87.5% in H2O, at plant [RER]: 0.3 kg; lognormal SD95 1.5104
- Sawnwood, hardwood, raw, dried (u=10%), planed, at regional storage [CH]: 6.75 kg; lognormal SD95 1.5104
  Wood input linked to updated supply chain; 0.01 m3 converted to kg by using density of 675 kg/m3
- Disposal, municipal solid waste, 22.9% water, to municipal incineration [CH]: 0.5866 kg; lognormal SD95 1.25
- Transport, freight, rail [RER]: 7.791 tkm; lognormal SD95 1.5104
- Heat, light fuel oil, at industrial furnace 1MW [CH]: 0.357 MJ; lognormal SD95 1.5104
- Polyethylene, LDPE, granulate, at plant [RER]: 0.0176 kg; lognormal SD95 1.5104
- Glued laminated timber, average glue mix, at plant [RER]: 6e-5 m3; lognormal SD95 1.5104
- Transport, transoceanic freight ship [OCE]: 2.0159 tkm; lognormal SD95 1.5104
- Light fuel oil, at refinery [CH]: 0.00441 kg; lognormal SD95 1.5104
- Electricity, medium voltage, at grid [CH]: 0.8549 kWh; lognormal SD95 1.5104
- Wooden board manufacturing plant, organic bonded boards [RER]: 4.995e-10 p; lognormal SD95 1.5154
- Disposal, hazardous waste, 25% water, to hazardous waste incineration [CH]: 0.005333 kg; lognormal SD95 1.25
- Transport, freight, lorry, 7.5t-16t gross weight, fleet average [CH]: 0.01278 tkm; lognormal SD95 1.5104
- Sawnwood, softwood, raw, dried (u=10%), planed, at regional storage [CH]: 15.345 kg; lognormal SD95 1.5104
  Wood input linked to updated supply chain; 0.033 m3 converted to kg by using density of 465 kg/m3

## Inputs from nature
- Energy, gross calorific value, in biomass, resource correction [resources, biotic]: -134.635 MJ
  684-Holzdaten-Ressourcenkorrektur-v0.4

## Sources
- Werner F., 2017, 2017 - LCI wood and wood based products - Werner, Project Report, 0, Environment & Development, Zuerich, CH

## Validation
Proof reading validation: 13.03.2013; Other validation: \\SERVER\Users\Admin\Documents\Projekte laufend\297 BAFU Anfragen\Bodenbeläge\[c Ecospold alle Prozesse_v0.2.xlsx]X-Process;
