# Fuel elements PWR, UO2 4.0% & MOX, at nuclear fuel fabrication plant

Dataset: EcoSpold 1, unit process
Functional unit: 1 kg
Category: fuels / uranium\fuel element
Geography: DE
Time period: 2000-01 to 2000-12
Generated by: Roberto Dones
accessRestrictedTo: 0
copyright: true

## General comment
The shares are based on the current situation in Germany for the mix of UO2 and MOX fuels, assuming that 30% of the core of 8 PWRs are MOX and that at the beginning/end of the commercial operation of the reactors no MOX were/will be loaded. Hence, the indication of data validity inputted in "TimePeriod" only says that the shares represent the knowledge available today of the fuel management for German PWRs.;

## Included processes
The module consists of the share of UO2 and MOX fuel elements.

## Geography
German conditions

## Technology
Data reflects the use of UO2 and MOX fuel elements in current nuclear reactors.

## Reference product
- Fuel elements PWR, UO2 4.0% & MOX, at nuclear fuel fabrication plant [DE]: 1 kg
  GERMANY

## Inputs from technosphere
- MOX fuel element for LWR, at nuclear fuel fabrication plant [UCTE]: 0.15 kg; lognormal SD95 1.5
  own estimation
- U enriched 4.0%, in fuel element for LWR, at nuclear fuel fabrication plant [DE]: 0.85 kg; lognormal SD95 1.1
  own estimation

## Sampling procedure
Literature

## Sources
- Dones R., Bauer C., Doka G., 2009, 2009 - Nuclear energy - Dones, Sachbilanzen von Energiesystemen. Final report No. 6 ecoinvent v2.1, 6, Swiss Centre for LCI, PSI, Doka LCA, Duebendorf and Villigen, CH
Dones, R., Doka G. (2009) Kernenergie. Sachbilanzen von Energiesystemen. Final report No. 6 ecoinvent v2.1. Editors: Bauer C.. Volume: 6. Swiss Centre for LCI, PSI. Dübendorf and Villigen, CH.
Type: Measurement on site
Source: CD-ROM
First author: Dones, R.
Other authors: Doka G.
Year: 2009
Name of editors: Bauer C.
Title of anthology: Sachbilanzen von Energiesystemen. Final report No. 6 ecoinvent v2.1
Place of publication: Dübendorf and Villigen, CH
Publisher: Swiss Centre for LCI, PSI
Volume No: 6

## Validation
Proof reading validation: passed; Other validation: for final calculation August 2003;
