# xx Foam glass, at regional storage

Dataset: EcoSpold 1, unit process
Functional unit: 1 kg
Category: material, obsolete / construction, obsolete\insulation, obsolete
Geography: AT
Time period: 2000-01 to 2000-12
Production volume: A volume of 30625 tons per year is produced
Share of production covered: 100 %
Generated by: Philpp Thalmann
accessRestrictedTo: 0
copyright: true

## General comment
Refers to foam glass of a density of 110 kg/m3 and a thermal conductivity of 0.040 W/mK. Foam glass products sold to Switzerland and Lichtenstein are produced with renewable energy certificates from RECS (www.recs.org). ;
Synonyms: T4 WDS;

## Included processes
melting, forming to a pipe, cooling down, smashing, crushing, mixing with carbon powder. Foaming by heating in a mould, cooling, cutting to slabs and packing. Internal processes (workshop, administration etc.), transport of raw materials and energy carrier for furnace, packing and infrastructure are also included. Renewable energy certificates are accounted and transport to Ausria is included.

## Geography
Data are from one company in Belgium which covers nearly 100% of the European foam glass market. For some exchanges RER-, CH- and GLO-modules are used as proxy. No energy certificates are accounted

## Technology
All data refer to the year 2005. Today foam glass is made of 68% recycled glass and only recycled glass is used instead of silica sand. Recycled glass is to some extent directly injected to the cellulating furnace without melting, resulting in less energy use. The energy for the melting process is electricity. Natural gas is used for the cellulating process. All emissions from processing raw materials and heating are taken into account.

## Reference product
- xx Foam glass, at regional storage [AT]: 1 kg
  AUSTRIA

## Inputs from technosphere
- Transport, freight, lorry, 32t-40t gross weight, fleet average [CH]: 0.877 tkm; lognormal SD95 2.0006
  (1,2,1,1,1,1);
- Electricity, hydropower, at power plant [CH]: 1.4934 kWh; lognormal SD95 1.0541
  (1,2,1,1,1,1);
- Electricity, at wind farm [RER]: 0.033594 kWh; lognormal SD95 1.0541
  (1,2,1,1,1,1);
- Transmission network, long-distance [UCTE]: 4.7927e-10 km; lognormal SD95 3.3758
  (5,5,4,5,1,5); estimates
- Foam glass, at plant [RER]: 1 kg; lognormal SD95 1.0541
  (1,2,1,1,1,1);
- Sulphur hexafluoride, liquid, at plant [RER]: 1.3832e-7 kg; lognormal SD95 1.0744
  (2,1,1,3,1,na); based on emissions
- Transmission network, electricity, medium voltage [CH]: 4.85e-8 km; lognormal SD95 3.1039
  (3,1,1,3,3,5); based on consumption statistics
- Electricity, medium voltage, at grid [BE]: -1.4969 kWh; lognormal SD95 1.0541
  (1,2,1,1,1,1);
- Transmission network, electricity, high voltage [CH]: 1.276e-8 km; lognormal SD95 3.1039
  (3,1,1,3,3,5); based on consumption statistics

## Emissions to nature
- Ozone [emissions to air, unspecified]: 6.8035e-6 kg; lognormal SD95 5
  standard deviation based on variation reported in literature
- Dinitrogen monoxide [emissions to air, unspecified]: 7.5595e-6 kg; lognormal SD95 4.6
  standard deviation based on variation reported in literature
- Heat, waste [emissions to air, unspecified]: 0.060591 MJ; lognormal SD95 1.323
  (4,1,3,3,1,5); estimation based on losses
- Heat, waste [emissions to soil, unspecified]: 0.017476 MJ; lognormal SD95 1.323
  (4,1,3,3,1,5); estimation based on losses
- Sulfur hexafluoride [emissions to air, unspecified]: 1.3832e-7 kg; lognormal SD95 1.5051
  (2,1,1,3,1,na); national statistics

## Sampling procedure
survey

## Sources
- Kellenberger D., Althaus H.-J., Jungbluth N., Kuenniger T., Lehmann M., Thalmann P., 2007, 2007 - LCI building products - Kellenberger, Final report ecoinvent data v2.0, 7, Swiss Centre for LCI, Empa - TSL, ESU-services Ltd., Bau- und Umweltchimie, Duebendorf, CH
Kellenberger D., Althaus H.-J., Jungbluth N., Künniger T. (2007) Life Cycle Inventories of Building Products. Final report ecoinvent data v2.0. Volume: 7. Swiss Centre for LCI, Empa - TSL. Dübendorf, CH.
Type: Measurement on site
Source: CD-ROM
First author: Kellenberger D.
Other authors: Althaus H.-J., Jungbluth N., Künniger T.
Year: 2007
Title of anthology: Final report ecoinvent data v2.0
Place of publication: Dübendorf, CH
Publisher: Swiss Centre for LCI, Empa - TSL
Volume No: 7

## Validation
Proof reading validation: passed; Other validation: none;
