# Solid bleached board, SBB, at plant

Dataset: EcoSpold 1, unit process
Functional unit: 1 kg
Category: paper+ board / board
Geography: RER
Time period: 2000-01 to 2000-12
Production volume: Total European boxboard production in 2000: 11'664 kt (CEPI statistics)
Generated by: Roland Hischier
accessRestrictedTo: 0
copyright: true

## General comment
na;
Synonyms: GZ;

## Included processes
This module includes the European production of solid bleached board (SBB) in a mix of integrated and non-integrated mills - including transports to paper mill, wood handling, chemical pulping and bleaching rsp. pulp handling, board production, energy production on-site and internal waste water treatment.; Geography: Data from a finnish database and from the CER of one European producer used as European average data.

## Technology
Average of present used technology

## Reference product
- Solid bleached board, SBB, at plant [RER]: 1 kg
  Europe

## Inputs from technosphere
- Slab and siding, softwood, wet, measured as dry mass, at sawmill [RER]: 0.06165 kg
  (2,3,2,3,1,3); data from a finnish database & from one producer
- Pulpwood, beech, sustainable forest management, measured as solid wood under bark, at forest road [DE]: 0.000752 m3; lognormal SD95 1.11
  (2,3,2,3,1,3); data from a finnish database & from one producer
- Wood chips, softwood, wet, measured as dry mass, at sawmill [RER]: 0.0288 kg
  (2,3,2,3,1,3); data from a finnish database & from one producer
- Phosphorus, white, liquid, at plant [RER]: 1e-5 kg; lognormal SD95 1.24
  (2,4,1,3,1,5); average from a finnish database
- Sulphate pulp, TCF bleached, at plant [RER]: 0.0396 kg; lognormal SD95 1.24
  (2,4,1,3,1,5); average from a finnish database
- Carboxymethyl cellulose, powder, at plant [RER]: 0.00043 kg; lognormal SD95 1.24
  (2,4,1,3,1,5); average from a finnish database
- Natural gas, high pressure, at consumer [RER]: 1.22 MJ; lognormal SD95 1.11
  (2,3,2,3,1,3); data from a finnish database & from one producer
- Disposal, municipal solid waste, 22.9% water, to sanitary landfill [CH]: 0.0148 kg; lognormal SD95 1.24
  (2,4,1,3,1,5); average from a finnish database
- Carbon dioxide liquid, at plant [RER]: 0.00132 kg; lognormal SD95 1.24
  (2,4,1,3,1,5); average from a finnish database
- Limestone, milled, loose, at plant [CH]: 0.0675 kg; lognormal SD95 1.24
  (2,4,1,3,1,5); average from a finnish database
- Sulphur dioxide, liquid, at plant [RER]: 0.00132 kg; lognormal SD95 1.24
  (2,4,1,3,1,5); average from a finnish database
- Nitrogen, liquid, at plant [RER]: 0.00042 kg; lognormal SD95 1.24
  (2,4,1,3,1,5); average from a finnish database
- Pulpwood, spruce, sustainable forest management, measured as solid wood under bark, at forest road [DE]: 0.00129 m3; lognormal SD95 1.11
  (2,3,2,3,1,3); data from a finnish database & from one producer
- Malusil, at plant [RER]: 0.00198 kg; lognormal SD95 1.24
  (2,4,1,3,1,5); average from a finnish database
- Magnesium sulphate, at plant [RER]: 0.00291 kg; lognormal SD95 1.24
  (2,4,1,3,1,5); average from a finnish database
- Aluminium sulphate, powder, at plant [RER]: 0.00038 kg; lognormal SD95 1.24
  (2,4,1,3,1,5); average from a finnish database
- Pulpwood, birch, sustainable forest management, measured as solid wood under bark, at forest road [SE]: 0.000351 m3; lognormal SD95 1.11
  (2,3,2,3,1,3); data from a finnish database & from one producer
- Sodium chlorate, powder, at plant [RER]: 0.0169 kg; lognormal SD95 1.24
  (2,4,1,3,1,5); average from a finnish database
- Methanol, at plant [GLO]: 0.00146 kg; lognormal SD95 1.24
  (2,4,1,3,1,5); average from a finnish database
- Disposal, wood ash mixture, pure, 0% water, to sanitary landfill [CH]: 0.00782 kg; lognormal SD95 1.24
  (2,4,1,3,1,5); average from a finnish database
- Disposal, sludge from pulp and paper production, 25% water, to sanitary landfill [CH]: 0.00063 kg; lognormal SD95 1.24
  (2,4,1,3,1,5); average from a finnish database
- Potato starch, at plant [DE]: 0.0133 kg; lognormal SD95 1.24
  (2,4,1,3,1,5); average from a finnish database
- Paper mill, integrated [RER]: 4.08e-11 p; lognormal SD95 3.05
  (4,na,na,na,na,na); own assumption
- Hydrogen peroxide, 50% in H2O, at plant [RER]: 0.00475 kg; lognormal SD95 1.24
  (2,4,1,3,1,5); average from a finnish database
- Disposal, ash from paper prod. sludge, 0% water, to residual material landfill [CH]: 0.000178 kg; lognormal SD95 1.24
  (2,4,1,3,1,5); average from a finnish database
- Sodium chloride, powder, at plant [RER]: 0.00026 kg; lognormal SD95 1.24
  (2,4,1,3,1,5); average from a finnish database
- Electricity, medium voltage, at grid [GB]: 0.0273 kWh; lognormal SD95 1.11
  (2,3,2,3,1,3); data from a finnish database & from one producer
- Transport, freight, lorry, fleet average [RER]: 0.617 tkm; lognormal SD95 2.09
  (4,5,na,na,na,na); standard distances
- Hard coal, at regional storage [WEU]: 0.007 kg; lognormal SD95 1.11
  (2,3,2,3,1,3); data from a finnish database & from one producer
- Quicklime, milled, loose, at plant [CH]: 0.00568 kg; lognormal SD95 1.24
  (2,4,1,3,1,5); average from a finnish database
- Electricity, medium voltage, production ENTSO-E, at grid: 0.368 kWh; lognormal SD95 1.11
  (2,3,2,3,1,3); data from a finnish database & from one producer
- Kaolin, at plant [RER]: 0.0675 kg; lognormal SD95 1.24
  (2,4,1,3,1,5); average from a finnish database
- Transport, freight, rail [RER]: 0.49 tkm; lognormal SD95 2.09
  (4,5,na,na,na,na); standard distances
- Pulpwood, spruce, sustainable forest management, measured as solid wood under bark, at forest road [SE]: 0.000301 m3
  (1,3,1,3,1,3); data from several European producers; DS
- Sulphate pulp, ECF bleached, at plant [RER]: 0.18 kg; lognormal SD95 1.24
  (2,4,1,3,1,5); average from a finnish database
- Oxygen, liquid, at plant [RER]: 0.0163 kg; lognormal SD95 1.24
  (2,4,1,3,1,5); average from a finnish database
- Latex, at plant [RER]: 0.0117 kg; lognormal SD95 1.24
  (2,4,1,3,1,5); average from a finnish database
- Electricity, medium voltage, production NORDEL, at grid [NORDEL]: 0.184 kWh; lognormal SD95 1.11
  (2,3,2,3,1,3); data from a finnish database & from one producer
- Lignite briquettes, at plant [DE]: 0.033 MJ; lognormal SD95 1.11
  (2,3,2,3,1,3); data from a finnish database & from one producer
- AKD sizer, in paper production, at plant [RER]: 0.0002 kg; lognormal SD95 1.24
  (2,4,1,3,1,5); average from a finnish database
- Sulphuric acid, liquid, at plant [RER]: 0.0198 kg; lognormal SD95 1.24
  (2,4,1,3,1,5); average from a finnish database
- Heavy fuel oil, at regional storage [RER]: 0.0579 kg; lognormal SD95 1.11
  (2,3,2,3,1,3); data from a finnish database & from one producer
- Chemicals inorganic, at plant [GLO]: 0.003 kg; lognormal SD95 1.24
  (2,4,1,3,1,5); average from a finnish database
- Paper mill, non-integrated [RER]: 1.36e-11 p; lognormal SD95 3.05
  (4,na,na,na,na,na); own assumption
- Pulpwood, pine, sustainable forest management, measured as solid wood under bark, at forest road [SE]: 0.000301 m3
  (1,3,1,3,1,3); data from several European producers; DS
- Sodium hydroxide, 50% in H2O, production mix, at plant [RER]: 0.0291 kg; lognormal SD95 1.24
  (2,4,1,3,1,5); average from a finnish database

## Inputs from nature
- Water, unspecified natural origin/m3 [resources, in water]: 0.081 m3; lognormal SD95 1.13
  (1,4,1,3,1,3); data from one European producer

## Emissions to nature
- Hydrogen fluoride [emissions to air, high. pop.]: 6.79e-7 kg; lognormal SD95 1.88
  (2,5,2,1,4,5); estimation - based on respective heating modules
- Benzene [emissions to air, high. pop.]: 1.1e-5 kg; lognormal SD95 1.88
  (2,5,2,1,4,5); estimation - based on respective heating modules
- Propene [emissions to air, high. pop.]: 3.32e-6 kg; lognormal SD95 1.88
  (2,5,2,1,4,5); estimation - based on respective heating modules
- Dioxin, 2,3,7,8 Tetrachlorodibenzo-p- [emissions to air, high. pop.]: 4.42e-12 kg; lognormal SD95 1.88
  (2,5,2,1,4,5); estimation - based on respective heating modules
- Titanium [emissions to air, high. pop.]: 2.4e-7 kg; lognormal SD95 5.37
  (2,5,2,1,4,5); estimation - based on respective heating modules
- Carbon monoxide, biogenic [emissions to air, high. pop.]: 0.00038 kg; lognormal SD95 5.37
  (2,5,2,1,4,5); estimation - based on respective heating modules
- Iron [emissions to air, high. pop.]: 1.01e-5 kg; lognormal SD95 5.37
  (2,5,2,1,4,5); estimation - based on respective heating modules
- Scandium [emissions to air, high. pop.]: 6.62e-10 kg; lognormal SD95 5.37
  (2,5,2,1,4,5); estimation - based on respective heating modules
- Methane, biogenic [emissions to air, high. pop.]: 3.16e-6 kg; lognormal SD95 1.88
  (2,5,2,1,4,5); estimation - based on respective heating modules
- Phosphorus [emissions to water, river]: 2.47e-5 kg; lognormal SD95 1.52
  (2,3,2,3,1,3); data from a finnish database & from one producer
- Radium-226 [emissions to air, high. pop.]: 1.27e-5 kBq; lognormal SD95 3.32
  (2,5,2,1,4,5); estimation - based on respective heating modules
- Ethene [emissions to air, high. pop.]: 1.99e-5 kg; lognormal SD95 5.37
  (2,5,2,1,4,5); estimation - based on respective heating modules
- Boron [emissions to air, high. pop.]: 7.44e-6 kg; lognormal SD95 5.37
  (2,5,2,1,4,5); estimation - based on respective heating modules
- Hydrocarbons, aliphatic, alkanes, unspecified [emissions to air, high. pop.]: 1.19e-5 kg; lognormal SD95 1.88
  (2,5,2,1,4,5); estimation - based on respective heating modules
- Xylene [emissions to air, high. pop.]: 2.15e-6 kg; lognormal SD95 1.88
  (2,5,2,1,4,5); estimation - based on respective heating modules
- Propionic acid [emissions to air, high. pop.]: 2.45e-8 kg; lognormal SD95 1.88
  (2,5,2,1,4,5); estimation - based on respective heating modules
- Beryllium [emissions to air, high. pop.]: 1.88e-9 kg; lognormal SD95 5.37
  (2,5,2,1,4,5); estimation - based on respective heating modules
- Dinitrogen monoxide [emissions to air, high. pop.]: 2.42e-5 kg; lognormal SD95 1.88
  (2,5,2,1,4,5); estimation - based on respective heating modules
- Aluminium [emissions to air, high. pop.]: 9.83e-6 kg; lognormal SD95 1.88
  (2,5,2,1,4,5); estimation - based on respective heating modules
- Methanol [emissions to air, high. pop.]: 1.22e-6 kg; lognormal SD95 1.88
  (2,5,2,1,4,5); estimation - based on respective heating modules
- Thallium [emissions to air, high. pop.]: 4.01e-10 kg; lognormal SD95 5.37
  (2,5,2,1,4,5); estimation - based on respective heating modules
- Cadmium [emissions to air, high. pop.]: 8.96e-8 kg; lognormal SD95 5.37
  (2,5,2,1,4,5); estimation - based on respective heating modules
- Phosphorus [emissions to air, high. pop.]: 2.45e-6 kg; lognormal SD95 1.88
  (2,5,2,1,4,5); estimation - based on respective heating modules
- Iodine [emissions to air, high. pop.]: 3.16e-8 kg; lognormal SD95 1.88
  (2,5,2,1,4,5); estimation - based on respective heating modules
- Particulates, > 2.5 um, and < 10um [emissions to air, high. pop.]: 5.2e-5 kg; lognormal SD95 2.01
  (2,3,2,3,1,3); data from a finnish database & from one producer
- Uranium [emissions to air, high. pop.]: 3.76e-9 kg; lognormal SD95 5.37
  (2,5,2,1,4,5); estimation - based on respective heating modules
- Copper [emissions to air, high. pop.]: 3.11e-7 kg; lognormal SD95 5.37
  (2,5,2,1,4,5); estimation - based on respective heating modules
- Carbon monoxide, fossil [emissions to air, high. pop.]: 0.00262 kg; lognormal SD95 5.37
  (2,5,2,1,4,5); estimation - based on respective heating modules
- Acetone [emissions to air, high. pop.]: 3.58e-7 kg; lognormal SD95 1.88
  (2,5,2,1,4,5); estimation - based on respective heating modules
- Selenium [emissions to air, high. pop.]: 7.94e-8 kg; lognormal SD95 5.37
  (2,5,2,1,4,5); estimation - based on respective heating modules
- Radon-222 [emissions to air, high. pop.]: 2.78e-6 kBq; lognormal SD95 3.32
  (2,5,2,1,4,5); estimation - based on respective heating modules
- Acetic acid [emissions to air, high. pop.]: 1.62e-6 kg; lognormal SD95 1.88
  (2,5,2,1,4,5); estimation - based on respective heating modules
- NMVOC, non-methane volatile organic compounds, unspecified origin [emissions to air, high. pop.]: 1.63e-5 kg; lognormal SD95 1.88
  (2,5,2,1,4,5); estimation - based on respective heating modules
- Potassium [emissions to air, high. pop.]: 0.000186 kg; lognormal SD95 5.37
  (2,5,2,1,4,5); estimation - based on respective heating modules
- Nitrogen oxides [emissions to air, high. pop.]: 0.0018 kg; lognormal SD95 1.52
  (2,3,2,3,1,3); data from a finnish database & from one producer
- Vanadium [emissions to air, high. pop.]: 6.3e-6 kg; lognormal SD95 5.37
  (2,5,2,1,4,5); estimation - based on respective heating modules
- Pentane [emissions to air, high. pop.]: 1.47e-6 kg; lognormal SD95 1.88
  (2,5,2,1,4,5); estimation - based on respective heating modules
- Phenol, pentachloro- [emissions to air, high. pop.]: 6.41e-11 kg; lognormal SD95 1.88
  (2,5,2,1,4,5); estimation - based on respective heating modules
- m-Xylene [emissions to air, high. pop.]: 9.49e-7 kg; lognormal SD95 1.88
  (2,5,2,1,4,5); estimation - based on respective heating modules
- Uranium-238 [emissions to air, high. pop.]: 1.07e-5 kBq; lognormal SD95 3.32
  (2,5,2,1,4,5); estimation - based on respective heating modules
- Magnesium [emissions to air, high. pop.]: 8.49e-6 kg; lognormal SD95 5.37
  (2,5,2,1,4,5); estimation - based on respective heating modules
- Methane, fossil [emissions to air, high. pop.]: 0.000205 kg; lognormal SD95 1.88
  (2,5,2,1,4,5); estimation - based on respective heating modules
- Fluorine [emissions to air, high. pop.]: 3.95e-7 kg; lognormal SD95 1.88
  (2,5,2,1,4,5); estimation - based on respective heating modules
- Zinc [emissions to air, high. pop.]: 2.48e-6 kg; lognormal SD95 5.37
  (2,5,2,1,4,5); estimation - based on respective heating modules
- Radium-228 [emissions to air, high. pop.]: 1.87e-5 kBq; lognormal SD95 3.32
  (2,5,2,1,4,5); estimation - based on respective heating modules
- Suspended solids, unspecified [emissions to water, river]: 0.00087 kg; lognormal SD95 1.52
  (2,3,2,3,1,3); data from a finnish database & from one producer
- Thorium-232 [emissions to air, high. pop.]: 3.67e-6 kBq; lognormal SD95 3.32
  (2,5,2,1,4,5); estimation - based on respective heating modules
- Barium [emissions to air, high. pop.]: 1.88e-7 kg; lognormal SD95 5.37
  (2,5,2,1,4,5); estimation - based on respective heating modules
- Lead-210 [emissions to air, high. pop.]: 4.93e-5 kBq; lognormal SD95 3.32
  (2,5,2,1,4,5); estimation - based on respective heating modules
- Hydrogen chloride [emissions to air, high. pop.]: 1.38e-5 kg; lognormal SD95 1.88
  (2,5,2,1,4,5); estimation - based on respective heating modules
- Arsenic [emissions to air, high. pop.]: 7.66e-8 kg; lognormal SD95 1.88
  (2,5,2,1,4,5); estimation - based on respective heating modules
- Chromium VI [emissions to air, high. pop.]: 1.72e-9 kg; lognormal SD95 5.37
  (2,5,2,1,4,5); estimation - based on respective heating modules
- Molybdenum [emissions to air, high. pop.]: 6.76e-8 kg; lognormal SD95 5.37
  (2,5,2,1,4,5); estimation - based on respective heating modules
- Thorium [emissions to air, high. pop.]: 2.34e-9 kg; lognormal SD95 5.37
  (2,5,2,1,4,5); estimation - based on respective heating modules
- Heat, waste [emissions to air, high. pop.]: 15.6 MJ; lognormal SD95 1.11
  (2,3,2,3,1,3); calculated from input
- Benzene, ethyl- [emissions to air, high. pop.]: 2.37e-7 kg; lognormal SD95 1.88
  (2,5,2,1,4,5); estimation - based on respective heating modules
- Mercury [emissions to air, high. pop.]: 1.07e-8 kg; lognormal SD95 5.37
  (2,5,2,1,4,5); estimation - based on respective heating modules
- Manganese [emissions to air, high. pop.]: 1.37e-6 kg; lognormal SD95 5.37
  (2,5,2,1,4,5); estimation - based on respective heating modules
- Particulates, < 2.5 um [emissions to air, high. pop.]: 0.000479 kg; lognormal SD95 3.01
  (2,3,2,3,1,3); data from a finnish database & from one producer
- Thorium-228 [emissions to air, high. pop.]: 5.88e-6 kBq; lognormal SD95 3.32
  (2,5,2,1,4,5); estimation - based on respective heating modules
- Benzo(a)pyrene [emissions to air, high. pop.]: 1.69e-8 kg; lognormal SD95 1.88
  (2,5,2,1,4,5); estimation - based on respective heating modules
- Ammonia [emissions to air, high. pop.]: 1.37e-5 kg; lognormal SD95 1.88
  (2,5,2,1,4,5); estimation - based on respective heating modules
- Sodium [emissions to air, high. pop.]: 1.37e-5 kg; lognormal SD95 5.37
  (2,5,2,1,4,5); estimation - based on respective heating modules
- Strontium [emissions to air, high. pop.]: 2.09e-7 kg; lognormal SD95 5.37
  (2,5,2,1,4,5); estimation - based on respective heating modules
- Cobalt [emissions to air, high. pop.]: 1.04e-7 kg; lognormal SD95 5.37
  (2,5,2,1,4,5); estimation - based on respective heating modules
- Tin [emissions to air, high. pop.]: 1.43e-9 kg; lognormal SD95 5.37
  (2,5,2,1,4,5); estimation - based on respective heating modules
- Chlorine [emissions to air, high. pop.]: 1.42e-6 kg; lognormal SD95 3.32
  (2,5,2,1,4,5); estimation - based on respective heating modules
- Bromine [emissions to air, high. pop.]: 4.86e-7 kg; lognormal SD95 1.88
  (2,5,2,1,4,5); estimation - based on respective heating modules
- Potassium-40 [emissions to air, high. pop.]: 1.35e-5 kBq; lognormal SD95 3.32
  (2,5,2,1,4,5); estimation - based on respective heating modules
- Ethanol [emissions to air, high. pop.]: 7.16e-7 kg; lognormal SD95 1.88
  (2,5,2,1,4,5); estimation - based on respective heating modules
- Propane [emissions to air, high. pop.]: 6.96e-6 kg; lognormal SD95 1.88
  (2,5,2,1,4,5); estimation - based on respective heating modules
- Chromium [emissions to air, high. pop.]: 1.19e-7 kg; lognormal SD95 5.37
  (2,5,2,1,4,5); estimation - based on respective heating modules
- Benzene, hexachloro- [emissions to air, high. pop.]: 5.69e-14 kg; lognormal SD95 1.88
  (2,5,2,1,4,5); estimation - based on respective heating modules
- Nickel [emissions to air, high. pop.]: 1.64e-6 kg; lognormal SD95 5.37
  (2,5,2,1,4,5); estimation - based on respective heating modules
- Calcium [emissions to air, high. pop.]: 7.92e-5 kg; lognormal SD95 3.32
  (2,5,2,1,4,5); estimation - based on respective heating modules
- Carbon dioxide, biogenic [emissions to air, high. pop.]: 1.86 kg; lognormal SD95 1.11
  (2,3,2,3,1,3); data from a finnish database & from one producer
- Hydrocarbons, aliphatic, unsaturated [emissions to air, high. pop.]: 2.79e-5 kg; lognormal SD95 1.88
  (2,5,2,1,4,5); estimation - based on respective heating modules
- Lead [emissions to air, high. pop.]: 3.74e-7 kg; lognormal SD95 5.37
  (2,5,2,1,4,5); estimation - based on respective heating modules
- Silicon [emissions to air, high. pop.]: 8.11e-5 kg; lognormal SD95 5.37
  (2,5,2,1,4,5); estimation - based on respective heating modules
- PAH, polycyclic aromatic hydrocarbons [emissions to air, high. pop.]: 1.01e-7 kg; lognormal SD95 1.88
  (2,5,2,1,4,5); estimation - based on respective heating modules
- Formaldehyde [emissions to air, high. pop.]: 2.31e-6 kg; lognormal SD95 1.88
  (2,5,2,1,4,5); estimation - based on respective heating modules
- Ethyne [emissions to air, high. pop.]: 3.32e-6 kg; lognormal SD95 1.88
  (2,5,2,1,4,5); estimation - based on respective heating modules
- Antimony [emissions to air, high. pop.]: 1.66e-8 kg; lognormal SD95 1.88
  (2,5,2,1,4,5); estimation - based on respective heating modules
- AOX, Adsorbable Organic Halogen as Cl [emissions to water, river]: 0.00013 kg; lognormal SD95 1.52
  (2,3,2,3,1,3); data from a finnish database & from one producer
- Polonium-210 [emissions to air, high. pop.]: 9.06e-5 kBq; lognormal SD95 3.32
  (2,5,2,1,4,5); estimation - based on respective heating modules
- Nitrogen [emissions to water, river]: 0.00022 kg; lognormal SD95 1.52
  (2,3,2,3,1,3); data from a finnish database & from one producer
- Sulfur dioxide [emissions to air, high. pop.]: 0.00099 kg; lognormal SD95 1.11
  (2,3,2,3,1,3); data from a finnish database & from one producer
- Butane [emissions to air, high. pop.]: 8.57e-7 kg; lognormal SD95 3.32
  (2,5,2,1,4,5); estimation - based on respective heating modules
- Ethane [emissions to air, high. pop.]: 9.96e-6 kg; lognormal SD95 1.88
  (2,5,2,1,4,5); estimation - based on respective heating modules
- Particulates, > 10 um [emissions to air, high. pop.]: 4.9e-5 kg; lognormal SD95 1.52
  (2,3,2,3,1,3); data from a finnish database & from one producer
- Acetaldehyde [emissions to air, high. pop.]: 8.42e-7 kg; lognormal SD95 1.88
  (2,5,2,1,4,5); estimation - based on respective heating modules
- Radon-220 [emissions to air, high. pop.]: 2.78e-6 kBq; lognormal SD95 3.32
  (2,5,2,1,4,5); estimation - based on respective heating modules
- Carbon dioxide, fossil [emissions to air, high. pop.]: 0.335 kg; lognormal SD95 1.11
  (2,3,2,3,1,3); data from a finnish database & from one producer
- Phenol [emissions to air, high. pop.]: 3.22e-7 kg; lognormal SD95 1.88
  (2,5,2,1,4,5); estimation - based on respective heating modules
- Hydrocarbons, aromatic [emissions to air, high. pop.]: 3.58e-7 kg; lognormal SD95 1.88
  (2,5,2,1,4,5); estimation - based on respective heating modules
- COD, Chemical Oxygen Demand [emissions to water, river]: 0.0187 kg; lognormal SD95 1.52
  (2,3,2,3,1,3); data from a finnish database & from one producer
- BOD5, Biological Oxygen Demand [emissions to water, river]: 0.00153 kg; lognormal SD95 1.52
  (2,3,2,3,1,3); data from a finnish database & from one producer
- Toluene [emissions to air, high. pop.]: 3.35e-6 kg; lognormal SD95 1.88
  (2,5,2,1,4,5); estimation - based on respective heating modules
- Water [emissions to water, unspecified]: 76.95 kg; lognormal SD95 2.5196
  (5,5,5,5,5,BU:1.05); All uncertainty-values set to 5.0 by default. Balance of input water

## Extrapolations
Assumption made that 75% are produced in integrated mills and 25% in non-integrated mills.

## Sources
- Hischier R., 2007, 2007 - LCI packagings and graphical papers - Hischier, Final report ecoinvent data v2.0, 11, Swiss Centre for LCI, Empa - TSL, Duebendorf and St. Gallen, CH
Hischier R. (2007) Life Cycle Inventories of Packaging and Graphical Paper. Final report ecoinvent data v2.0. Volume: 11. Swiss Centre for LCI, Empa - TSL. Dübendorf, CH.
Type: Measurement on site
Source: CD-ROM
First author: Hischier R.
Year: 2007
Title of anthology: Final report ecoinvent data v2.0
Place of publication: Dübendorf, CH
Publisher: Swiss Centre for LCI, Empa - TSL
Volume No: 11

## Validation
Proof reading validation: passed; Other validation: none;
