# Diesel, burned in building machine, with particle filter

Dataset: EcoSpold 1, unit process
Functional unit: 1 MJ
Category: mechanical / other energy
Geography: GLO
Time period: 1996-01 to 2001-12
Generated by: Karin Flury
accessRestrictedTo: 0
copyright: true

## General comment
This module is based on the data included in the report Oekoinventare von Energiesystemen 1996. The diesel consumption and the emissions are updated using the Swiss "Offroad database" and applied to year 2000. The particle emissions are roughly estimated based on the BUWAL report "Partikelfilter für schwere Nutzfahrzeuge, 2000". This module should not be used if its relative importance would be high in a certain environmental inventory.;

## Included processes
Includes the inputs "building machine" for infrastructure, lubricating oil and fuel consumption, and some measured air emissions as output, based on the ecoinvent database v2.2. Additionally reduced particle emissions due to particle filters are considered. Reduction factor: 97.4%

## Geography
Certain elementary flows or intermediate product flows are extrapolated from RER and CH conditions.

## Technology
Average current technology for one typical machine representing the category.

## Reference product
- Diesel, burned in building machine, with particle filter [GLO]: 1 MJ

## Inputs from technosphere
- Diesel, at regional storage [RER]: 0.0234 kg; lognormal SD95 1.22
  (1,5,1,3,1,3); ecoinvent v2.2
- Lubricating oil, at plant [RER]: 0.000514 kg; lognormal SD95 1.22
  (1,5,2,3,1,3); ecoinvent v2.2
- Building machine [RER]: 1.34e-7 p; lognormal SD95 3.05
  (1,5,2,3,1,3); ecoinvent v2.2
- Disposal, used mineral oil, 10% water, to hazardous waste incineration [CH]: 0.000514 kg; lognormal SD95 1.22
  (1,5,2,3,1,3); ecoinvent v2.2

## Emissions to nature
- Cadmium [emissions to air, unspecified]: 2.34e-10 kg; lognormal SD95 5.06
  (1,5,1,3,1,3); ecoinvent v2.2
- PAH, polycyclic aromatic hydrocarbons [emissions to air, unspecified]: 7.85e-8 kg; lognormal SD95 3.05
  (1,5,1,3,1,3); ecoinvent v2.2
- Particulates, < 2.5 um [emissions to air, unspecified]: 2.4518e-6 kg; lognormal SD95 3.05
  (1,5,1,3,1,3); Reduction factor applied: 97.4%; based on BUWAL 2000 and ecoinvent v2.2
- Nickel [emissions to air, unspecified]: 1.64e-9 kg; lognormal SD95 5.06
  (1,5,1,3,1,3); ecoinvent v2.2
- Ammonia [emissions to air, unspecified]: 4.67e-7 kg; lognormal SD95 1.56
  (1,5,1,3,1,3); ecoinvent v2.2
- Zinc [emissions to air, unspecified]: 2.34e-8 kg; lognormal SD95 5.06
  (1,5,1,3,1,3); ecoinvent v2.2
- Heat, waste [emissions to air, unspecified]: 1.06 MJ; lognormal SD95 1.22
  (1,5,2,3,1,3); ecoinvent v2.2
- Dioxin, 2,3,7,8 Tetrachlorodibenzo-p- [emissions to air, unspecified]: 1.4e-15 kg; lognormal SD95 1.56
  (1,5,1,3,1,3); ecoinvent v2.2
- Particulates, > 2.5 um, and < 10um [emissions to air, unspecified]: 1.0894e-7 kg; lognormal SD95 2.05
  (1,5,1,3,1,3); Reduction factor applied: 97.4%; based on BUWAL 2000 and ecoinvent v2.2
- Dinitrogen monoxide [emissions to air, unspecified]: 2.8e-6 kg; lognormal SD95 1.56
  (1,5,1,3,1,3); ecoinvent v2.2
- Chromium [emissions to air, unspecified]: 1.17e-9 kg; lognormal SD95 5.06
  (1,5,1,3,1,3); ecoinvent v2.2
- Copper [emissions to air, unspecified]: 3.97e-8 kg; lognormal SD95 5.06
  (1,5,1,3,1,3); ecoinvent v2.2
- Carbon dioxide, fossil [emissions to air, unspecified]: 0.073 kg; lognormal SD95 1.22
  (1,5,1,3,1,3); ecoinvent v2.2
- Nitrogen oxides [emissions to air, unspecified]: 0.00103 kg; lognormal SD95 1.56
  (1,5,1,3,1,3); ecoinvent v2.2
- NMVOC, non-methane volatile organic compounds, unspecified origin [emissions to air, unspecified]: 0.000121 kg; lognormal SD95 1.56
  (1,5,1,3,1,3); ecoinvent v2.2
- Methane, fossil [emissions to air, unspecified]: 3.75e-6 kg; lognormal SD95 1.56
  (1,5,1,3,1,3); ecoinvent v2.2
- Carbon monoxide, fossil [emissions to air, unspecified]: 0.000266 kg; lognormal SD95 5.06
  (1,5,1,3,1,3); ecoinvent v2.2
- Sulfur dioxide [emissions to air, unspecified]: 2.36e-5 kg; lognormal SD95 1.22
  (1,5,1,3,1,3); ecoinvent v2.2
- Particulates, > 10 um [emissions to air, unspecified]: 1.6328e-7 kg; lognormal SD95 1.56
  (1,5,1,3,1,3); Reduction factor applied: 97.4%; based on BUWAL 2000 and ecoinvent v2.2
- Selenium [emissions to air, unspecified]: 2.34e-10 kg; lognormal SD95 5.06
  (1,5,1,3,1,3); ecoinvent v2.2
- Benzo(a)pyrene [emissions to air, unspecified]: 7.01e-10 kg; lognormal SD95 3.05
  (1,5,1,3,1,3); ecoinvent v2.2

## Sampling procedure
Some data from the LCA study Oekoinventare von Energiesystemen 1996 and emissions from the Swiss "Offroad" database. Information on reduction factor of particle emissions based on: BUWAL-Partikelfilter für schwere Nutzfahrzeuge, 2000.

## Extrapolations
See geography

## Sources
- Stolz P., Messmer A., Frischknecht R., 2016, 2016 - LCI road and non-road transport services - Stolz, Project report, 441, treeze Ltd., Uster, CH
Flury K., Frischknecht R. (2012) Life Cycle Inventories of Rockwool. Project report. Volume: 441. ESU-services Ltd.. Uster, CH.
Type: Separate publication
Source: Report
First author: Flury K.
Other authors: Frischknecht R.
Year: 2012
Title of anthology: Project report
Place of publication: Uster, CH
Publisher: ESU-services Ltd.
Volume No: 441
