# Natural gas, burned in industrial furnace, for asphalt production, 1MWth

Dataset: EcoSpold 1, unit process
Functional unit: 1 MJ
Category: heat / natural gas\heating systems
Geography: CH
Time period: 2025 to 2030
Synonyms: 0
Share of production covered: 100 %
Generated by: Thomas Pohl
accessRestrictedTo: 0
copyright: true

## General comment
The process “natural gas, burned in industrial furnace 1MWth/MJ/CH,” includes the fuel input from the Swiss natural gas network, the furnace infrastructure, emissions to air and water, and the electricity required for operation. The inventory is based on 1 MJ of natural gas burned in an industrial furnace with a capacity of 1 MW and 5,000 operating hours.

## Included processes
This dataset is based on the process “natural gas, burned in industrial furnace 1MWth/MJ/CH.” Compared to this reference process, the dataset does not include air emissions of fossil carbon monoxide, nitrogen oxides, and particulates < 2.5 µm from the combustion of 1 MJ of natural gas, as these emissions are considered separately within the asphalt production processes.

## Geography
Europe

## Technology
The process "natural gas, burned in industrial furnace 1MWth/MJ/CH" has been modified to generate a dataset that does not consider air emissions of fossil carbon monoxide, nitrogen oxides, and particulates < 2.5 µm from the combustion of 1 MJ of natural gas in Switzerland.

## Time period
Review of data currency scheduled after 5 years.

## Reference product
- Natural gas, burned in industrial furnace, for asphalt production, 1MWth [CH]: 1 MJ

## Inputs from technosphere
- Natural gas, low pressure, at consumer [CH]: 1 MJ; lognormal SD95 1.218
  (1,3,2,1,1,5,BU:1.05); Amount and assessment of the pedigree matrix were taken from the process: natural gas, burned in industrial furnace 1MWth/MJ/CH.; UVEK LCI Data DQRv2 2022.
- Electricity, low voltage, production ENTSO-E, at grid [ENTSO-E]: 0.00030833 kWh; lognormal SD95 1.218
  (same comment as for Natural gas, low pressure, at consumer)
- Industrial furnace, 1MW, natural gas [RER]: 2.777e-9 p; lognormal SD95 3.0499
  (1,3,2,1,1,5,BU:3); Amount and assessment of the pedigree matrix were taken from the process: natural gas, burned in industrial furnace 1MWth/MJ/CH.; UVEK LCI Data DQRv2 2022.
- Chimney [CH]: 8.2672e-8 m; lognormal SD95 3.0499
  (same comment as for Industrial furnace, 1MW, natural gas)

## Emissions to nature
- Heat, waste [emissions to air, high. pop.]: 0.98 MJ; lognormal SD95 1.2491
  (2,3,3,1,1,5,BU:1.05); Amount and assessment of the pedigree matrix were taken from the process: natural gas, burned in industrial furnace 1MWth/MJ/CH.; UVEK LCI Data DQRv2 2022.
- Acetaldehyde [emissions to air, high. pop.]: 1e-9 kg; lognormal SD95 1.8324
  (2,3,5,1,1,5,BU:1.5); Amount and assessment of the pedigree matrix were taken from the process: natural gas, burned in industrial furnace 1MWth/MJ/CH.; UVEK LCI Data DQRv2 2022.
- Benzo(a)pyrene [emissions to air, high. pop.]: 5.6e-13 kg; lognormal SD95 3.2778
  (2,3,5,1,1,5,BU:3); Amount and assessment of the pedigree matrix were taken from the process: natural gas, burned in industrial furnace 1MWth/MJ/CH.; UVEK LCI Data DQRv2 2022.
- Benzene [emissions to air, high. pop.]: 4e-7 kg; lognormal SD95 3.2778
  (same comment as for Benzo(a)pyrene)
- Butane [emissions to air, high. pop.]: 7e-7 kg; lognormal SD95 1.5839
  (2,3,3,1,1,5,BU:1.5); Amount and assessment of the pedigree matrix were taken from the process: natural gas, burned in industrial furnace 1MWth/MJ/CH.; UVEK LCI Data DQRv2 2022.
- Methane, fossil [emissions to air, high. pop.]: 6e-6 kg; lognormal SD95 1.5839
  (same comment as for Butane)
- Carbon dioxide, fossil [emissions to air, high. pop.]: 0.056 kg; lognormal SD95 1.2152
  (2,1,1,1,1,5,BU:1.05); Amount and assessment of the pedigree matrix were taken from the process: natural gas, burned in industrial furnace 1MWth/MJ/CH.; UVEK LCI Data DQRv2 2022.
- Acetic acid [emissions to air, high. pop.]: 1.5e-7 kg; lognormal SD95 1.8324
  (same comment as for Acetaldehyde)
- Formaldehyde [emissions to air, high. pop.]: 1e-7 kg; lognormal SD95 1.8324
  (same comment as for Acetaldehyde)
- Ammonia [emissions to air, high. pop.]: 1e-9 kg; lognormal SD95 1.6249
  (2,3,5,1,1,5,BU:1.2); Amount and assessment of the pedigree matrix were taken from the process: natural gas, burned in industrial furnace 1MWth/MJ/CH.; UVEK LCI Data DQRv2 2022.
- Mercury [emissions to air, high. pop.]: 1e-10 kg; lognormal SD95 5.3182
  (2,3,5,1,1,5,BU:5); Amount and assessment of the pedigree matrix were taken from the process: natural gas, burned in industrial furnace 1MWth/MJ/CH.; UVEK LCI Data DQRv2 2022.
- Cadmium [emissions to air, high. pop.]: 2.5e-13 kg; lognormal SD95 5.3182
  (same comment as for Mercury)
- Lead [emissions to air, high. pop.]: 1.5e-12 kg; lognormal SD95 5.3182
  (same comment as for Mercury)
- Dinitrogen monoxide [emissions to air, high. pop.]: 3.833e-8 kg; lognormal SD95 1.8324
  (same comment as for Acetaldehyde)
- PAH, polycyclic aromatic hydrocarbons [emissions to air, high. pop.]: 1e-8 kg; lognormal SD95 3.2778
  (same comment as for Benzo(a)pyrene)
- Pentane [emissions to air, high. pop.]: 1.2e-6 kg; lognormal SD95 1.8324
  (same comment as for Acetaldehyde)
- Propane [emissions to air, high. pop.]: 2e-7 kg; lognormal SD95 1.8324
  (same comment as for Acetaldehyde)
- Propionic acid [emissions to air, high. pop.]: 2e-8 kg; lognormal SD95 1.8324
  (same comment as for Acetaldehyde)
- Sulfur dioxide [emissions to air, high. pop.]: 5e-7 kg; lognormal SD95 1.2491
  (same comment as for Heat, waste)
- Dioxin, 2,3,7,8 Tetrachlorodibenzo-p- [emissions to air, high. pop.]: 3e-17 kg; lognormal SD95 3.0644
  (2,3,3,1,1,5,BU:3); Amount and assessment of the pedigree matrix were taken from the process: natural gas, burned in industrial furnace 1MWth/MJ/CH.; UVEK LCI Data DQRv2 2022.
- Toluene [emissions to air, high. pop.]: 2e-7 kg; lognormal SD95 1.8324
  (same comment as for Acetaldehyde)

## Sampling procedure
Statistics

## Sources
- Pohl T., Stamm R., 2025, 2025 - Datasets construction machinery and infra. - Pohl, 177, Umtec Technologie AG, Bern, CH
