# Hot water tank factory

Dataset: EcoSpold 1, unit process, infrastructure
Functional unit: 1 p
Category: heat / solar\infrastructure
Geography: CH
Time period: 2000-01 to 2000-12
Production volume: Production volume 1000 units per year.
Generated by: Niels Jungbluth
accessRestrictedTo: 0
copyright: true

## General comment
Production plant with an annual capacity of 1000 tanks and a life time of 50 years.;

## Included processes
Building, land occupation and transformation of a factory for hot water tanks and storages. Not including machinery.

## Geography
Production plant in CH.

## Technology
Medium sized production plant for different types of boilers and tanks.

## Time period
Material data have been investigated for a collector produced in 2002. Data for energy uses during production have been investigated for 2001.

## Reference product
- Hot water tank factory [CH]: 1 p
  SWITZERLAND

## Inputs from technosphere
- Building, hall [CH]: 1750 m2; lognormal SD95 1.5
  (1,4,1,3,1,4); Company information

## Inputs from nature
- Transformation, from unknown [resources, land]: 5000 m2; lognormal SD95 2
  (1,4,1,3,1,4); Company information
- Occupation, industrial area, vegetation [resources, land]: 162000 m2a; lognormal SD95 2
  (1,4,1,3,1,4); 50a occupation
- Occupation, industrial area, built up [resources, land]: 87500 m2a; lognormal SD95 1.5
  (1,4,1,3,1,4); 50a occupation
- Transformation, to industrial area, vegetation [resources, land]: 3250 m2; lognormal SD95 2
  (1,4,1,3,1,4); Company information
- Transformation, to industrial area, built up [resources, land]: 1750 m2; lognormal SD95 2
  (1,4,1,3,1,4); Company information

## Sampling procedure
Questionnaires.

## Extrapolations
Data of one factory used for CH. Energy use extrapolated by weight for 2000l storage.

## Sources
- Jungbluth N., 2007, 2007 - Solar collector systems - Jungbluth, Sachbilanzen von Energiesystemen. Final report No. 6 ecoinvent data v2.0, 6, Swiss Centre for LCI, ESU-services Ltd., Duebendorf, CH
Jungbluth, N. (2007) Sonnenkollektor-Anlagen. Sachbilanzen von Energiesystemen. Final report No. 6 ecoinvent data v2.0. Editors: Dones R.. Volume: 6. Swiss Centre for LCI, PSI. Dübendorf and Villigen, CH.
Type: Measurement on site
Source: CD-ROM
First author: Jungbluth, N.
Year: 2007
Name of editors: Dones R.
Title of anthology: Sachbilanzen von Energiesystemen. Final report No. 6 ecoinvent data v2.0
Place of publication: Dübendorf and Villigen, CH
Publisher: Swiss Centre for LCI, PSI
Volume No: 6

## Validation
Proof reading validation: Passed.; Other validation: none;
