# Methane, 96 vol.-%, from synthetic gas, wood, at plant

Dataset: EcoSpold 1, unit process
Functional unit: 1 m3
Category: fuels / biofuels\methane
Geography: CH
Time period: 2000-01 to 2000-12
Production volume: In 2004, CH syngas production is limited to 2 pilot-scale Fixed bed gasifiers.
Share of production covered: 0 %
Generated by: Edgard Gnansounou
accessRestrictedTo: 0
copyright: true

## General comment
Composition (% mol.) of the gas is 96% CH4 (min.). Density is 0.752 kg/Nm3. Lower heating value of the gas is 34.4 MJ/Nm3. Process heat is supplied by methane combustion. Inventory refers to the net production of 1 Nm3 syngas. Net methane yield is 0.270 Nm3/kg of wood (dry matter).;

## Included processes
This process refers to the conversion of wood chips into synthetic methane (96% vol.) through gasification and subsequent methanation. It includes drying (down to 10-15% moisture) and further comminution of wood chips (down to a size of 30x30x30 mm), FICFB (Fast Internally Circulating Fluidised Bed of the BCL type) gasification of the wood chips, treatment and conditioning of the resulting syngas to remove impurities and contaminants, methanation of the the syngas to methane, and compression of methane to natural gas network pressure (30-70 bar).

## Geography
Data from Paul Scherrer Institut (PSI, Switzerland) and the pilot gasification plant in Güssing (Austria)

## Technology
Gasification technology is FICFB (fast internally circulating fluidized bed of the BCL type). Technology for methanation is developed by PSI.

## Time period
Data mainly from 2004, pilot scale, future technology

## Reference product
- Methane, 96 vol.-%, from synthetic gas, wood, at plant [CH]: 1 m3
  SWITZERLAND

## Inputs from technosphere
- Disposal, inert material, 0% water, to sanitary landfill [CH]: 0.074778 kg; lognormal SD95 1.2423
  (2,4,1,1,1,5); Based on PSI data (Ecogas project) plus calculations
- Sodium hydroxide, 50% in H2O, production mix, at plant [RER]: 0.0012176 kg; lognormal SD95 1.3279
  (3,3,1,2,3,5); Calculation from a typical quality of untreated syngas from wood
- Electricity, low voltage, production ENTSO-E, at grid: 0.0081749 kWh; lognormal SD95 1.3279
  (3,3,1,2,3,5); Calculation, based on 'heat, natural gas, at boiler modulating' (according to heat supply from methane)
- Light fuel oil, burned in boiler 100kW, non-modulating [CH]: 0.00061312 MJ; lognormal SD95 1.2423
  (2,4,1,1,1,5); Based on PSI data (Ecogas project) plus calculations
- Industrial furnace, 1MW, natural gas [RER]: 2.0621e-8 p; lognormal SD95 3.1067
  (same comment as for Electricity, low voltage, production ENTSO-E, at grid)
- Wood chips, softwood, wet, sustainable forest management, measured as dry mass, at forest road [CH]: 1.706 kg
  (2,3,1,2,3,5); Yield from literature survey, distribution from IEA Task 33 CH report, species distribution as in original DS
- Disposal, used mineral oil, 10% water, to hazardous waste incineration [CH]: 0.014622 kg; lognormal SD95 1.2423
  (2,4,1,1,1,5); Based on PSI data (Ecogas project) plus calculations
- Transport, freight, rail, electricity with shunting [CH]: 0.05394 tkm; lognormal SD95 2.095
  (4,5,na,na,na,na); Based on ecoinvent Guidelines, standard distances
- Disposal, wood ash mixture, pure, 0% water, to sanitary landfill [CH]: 0.015058 kg; lognormal SD95 1.2423
  (2,4,1,1,1,5); Based on PSI data (Ecogas project) plus calculations
- Wood chips, hardwood, wet, sustainable forest management, measured as dry mass, at forest road [CH]: 0.6634 kg
  (same comment as for Wood chips, softwood, wet, sustainable forest management, measured as )
- Wood chips, hardwood, wet, measured as dry mass, at sawmill [CH]: 0.228 kg
  (same comment as for Wood chips, softwood, wet, sustainable forest management, measured as )
- Treatment, sewage, from residence, to wastewater treatment, class 2 [CH]: 0.0010769 m3; lognormal SD95 1.2423
  (2,4,1,1,1,5); Based on PSI data (Ecogas project) plus calculations
- Waste wood chips, mixed, from industry, u=40%, at plant [CH]: 0.0027479 m3; lognormal SD95 1.3279
  (3,3,1,2,3,5); Yield based on PSI data (Ecogas project) plus calculations, distribution of wood qualities from IEA Task 33 CH report
- Transport, freight, lorry, 7.5t-16t gross weight, fleet average [CH]: 0.3539 tkm; lognormal SD95 2.095
  (4,5,na,na,na,na); Assumed transport distance of 50 km for the supply of a 50 MW plant
- Synthetic gas plant [CH]: 2.9022e-9 p; lognormal SD95 3.0611
  (2,4,1,1,1,5); Calculation
- Disposal, wood ash mixture, pure, 0% water, to municipal incineration [CH]: 0.019924 kg; lognormal SD95 1.2423
  (2,4,1,1,1,5); Based on PSI data (Ecogas project) plus calculations
- Aluminium oxide, at plant [RER]: 4.2942e-10 kg; lognormal SD95 1.2423
  (2,4,1,1,1,5); Based on PSI data (Ecogas project) plus calculations
- Wood chips, softwood, wet, measured as dry mass, at sawmill [CH]: 0.5864 kg
  (same comment as for Wood chips, softwood, wet, sustainable forest management, measured as )
- Sulphuric acid, liquid, at plant [RER]: 0.010303 kg; lognormal SD95 1.3279
  (3,3,1,2,3,5); Calculation from a typical quality of untreated syngas from wood
- Transport, freight, lorry, 16t-32t gross weight, fleet average [CH]: 0.0041493 tkm; lognormal SD95 2.095
  (4,5,na,na,na,na); Based on ecoinvent Guidelines, standard distances
- Rape methyl ester, at esterification plant [CH]: 0.014622 kg; lognormal SD95 1.2423
  (2,4,1,1,1,5); Based on PSI data (Ecogas project) plus calculations
- Charcoal, at plant [GLO]: 0.019805 kg; lognormal SD95 1.2423
  (2,4,1,1,1,5); Based on PSI data (Ecogas project) plus calculations
- Zinc, primary, at regional storage [RER]: 0.0018694 kg; lognormal SD95 1.2423
  (2,4,1,1,1,5); Based on PSI data (Ecogas project) plus calculations
- Electricity, medium voltage, at grid [CH]: 0.82928 kWh; lognormal SD95 1.2423
  (2,4,1,1,1,5); Based on PSI data (Ecogas project) plus calculations
- Nickel, 99.5%, at plant [GLO]: 4.2942e-10 kg; lognormal SD95 1.2423
  (2,4,1,1,1,5); Based on PSI data (Ecogas project) plus calculations
- Silica sand, at plant [DE]: 0.035168 kg; lognormal SD95 1.2423
  (2,4,1,1,1,5); Based on PSI data (Ecogas project) plus calculations
- Tap water, at user [CH]: 1.0513 kg; lognormal SD95 1.2423
  (2,4,1,1,1,5); Based on PSI data (Ecogas project) plus calculations

## Emissions to nature
- Acetaldehyde [emissions to air, high. pop.]: 7.3648e-9 kg; lognormal SD95 1.6362
  (same comment as for Electricity, low voltage, production ENTSO-E, at grid)
- Benzene [emissions to air, high. pop.]: 2.9459e-6 kg; lognormal SD95 1.6362
  (same comment as for Electricity, low voltage, production ENTSO-E, at grid)
- Hydrocarbons, aliphatic, alkanes, unspecified [emissions to air, high. pop.]: 7.3626e-5 kg; lognormal SD95 1.5798
  (2,4,1,1,1,5); Based on PSI data from the Ecogas project
- Propane [emissions to air, high. pop.]: 1.473e-6 kg; lognormal SD95 1.6362
  (same comment as for Electricity, low voltage, production ENTSO-E, at grid)
- NMVOC, non-methane volatile organic compounds, unspecified origin [emissions to air, high. pop.]: 4.9354e-5 kg; lognormal SD95 1.5798
  (2,4,1,1,1,5); Based on PSI data from the Ecogas project
- Toluene [emissions to air, high. pop.]: 1.473e-6 kg; lognormal SD95 1.6362
  (same comment as for Electricity, low voltage, production ENTSO-E, at grid)
- Mercury [emissions to air, high. pop.]: 2.2094e-10 kg; lognormal SD95 5.1218
  (same comment as for Electricity, low voltage, production ENTSO-E, at grid)
- Carbon dioxide, biogenic [emissions to air, high. pop.]: 4.8938 kg; lognormal SD95 1.05
  (1,1,1,1,1,1); Calculation, to close carbon balance
- Benzo(a)pyrene [emissions to air, high. pop.]: 7.3648e-11 kg; lognormal SD95 3.1067
  (same comment as for Electricity, low voltage, production ENTSO-E, at grid)
- Particulates, < 2.5 um [emissions to air, high. pop.]: 5.4583e-5 kg; lognormal SD95 3.1067
  (3,3,1,2,3,5); Calculation, based on 'heat, natural gas, at boiler modulating' (according to heat supply from methane), and PSI data
- Nitrogen oxides [emissions to air, high. pop.]: 0.0020825 kg; lognormal SD95 1.6362
  (same comment as for Particulates, < 2.5 um)
- Butane [emissions to air, high. pop.]: 5.1553e-6 kg; lognormal SD95 1.6362
  (same comment as for Electricity, low voltage, production ENTSO-E, at grid)
- Heat, waste [emissions to air, high. pop.]: 39.568 MJ; lognormal SD95 1.1376
  (2,4,1,3,1,3); Based on ecoinvent guidelines, calculation from electricity consumption and energy balance
- Hydrocarbons, aliphatic, unsaturated [emissions to air, high. pop.]: 0.00025081 kg; lognormal SD95 1.5798
  (2,4,1,1,1,5); Based on PSI data from the Ecogas project
- Acetic acid [emissions to air, high. pop.]: 1.1047e-6 kg; lognormal SD95 1.6362
  (same comment as for Electricity, low voltage, production ENTSO-E, at grid)
- PAH, polycyclic aromatic hydrocarbons [emissions to air, high. pop.]: 9.6363e-7 kg; lognormal SD95 3.1067
  (same comment as for Particulates, < 2.5 um)
- Carbon monoxide, biogenic [emissions to air, high. pop.]: 0.0034281 kg; lognormal SD95 5.1218
  (same comment as for Particulates, < 2.5 um)
- Pentane [emissions to air, high. pop.]: 8.8377e-6 kg; lognormal SD95 1.6362
  (same comment as for Electricity, low voltage, production ENTSO-E, at grid)
- Dinitrogen monoxide [emissions to air, high. pop.]: 3.6824e-6 kg; lognormal SD95 1.6362
  (same comment as for Electricity, low voltage, production ENTSO-E, at grid)
- Propionic acid [emissions to air, high. pop.]: 1.473e-7 kg; lognormal SD95 1.6362
  (same comment as for Electricity, low voltage, production ENTSO-E, at grid)
- Sulfur dioxide [emissions to air, high. pop.]: 4.0506e-6 kg; lognormal SD95 1.3279
  (same comment as for Electricity, low voltage, production ENTSO-E, at grid)
- Formaldehyde [emissions to air, high. pop.]: 7.3648e-7 kg; lognormal SD95 1.6362
  (same comment as for Electricity, low voltage, production ENTSO-E, at grid)
- Dioxin, 2,3,7,8 Tetrachlorodibenzo-p- [emissions to air, high. pop.]: 2.2e-16 kg; lognormal SD95 3.1067
  (same comment as for Electricity, low voltage, production ENTSO-E, at grid)
- Methane, biogenic [emissions to air, high. pop.]: 1.473e-5 kg; lognormal SD95 1.6362
  (same comment as for Electricity, low voltage, production ENTSO-E, at grid)

## Sampling procedure
Data from one source, pilot-to-demonstration plant operation data

## Extrapolations
Combustion of methane (for internal process energy use) is extrapolated from the emission profile of natural gas combustion.

## Sources
- Jungbluth N., Chudacoff M., Dauriat A., Dinkel F., Doka G., Faist Emmenegger M., Gnansounou E., Kljun N., Spielmann M., Stettler C., Sutter J., 2007, 2007 - LCI bioenergy - Jungbluth, Final report ecoinvent data v2.0, 17, Swiss Centre for LCI, ESU-services Ltd., Duebendorf and Uster, CH
Jungbluth N., Chudacoff M., Dauriat A., Dinkel F., Doka G., Faist Emmenegger M., Gnansounou E., Kljun N., Spielmann M., Stettler C., Sutter J. (2007) Life Cycle Inventories of Bioenergy. Final report ecoinvent data v2.0. Volume: 17. Swiss Centre for LCI, ESU. Duebendorf and Uster, CH.
Type: Measurement on site
Source: CD-ROM
First author: Jungbluth N.
Other authors: Chudacoff M., Dauriat A., Dinkel F., Doka G., Faist Emmenegger M., Gnansounou E., Kljun N., Spielmann M., Stettler C., Sutter J.
Year: 2007
Title of anthology: Final report ecoinvent data v2.0
Place of publication: Duebendorf and Uster, CH
Publisher: Swiss Centre for LCI, ESU
Volume No: 17

## Validation
Proof reading validation: Passed.; Other validation: none;
