# Hot water tank, carbon dioxide capture process

Dataset: EcoSpold 1, unit process
Functional unit: 1 p
Category: fuels / Synthetic\Carbon capture and storage\Transformation\Infrastructure
Geography: RER
Time period: 2020-01 to 2020-12
Generated by: Romain Sacchi
accessRestrictedTo: 3
copyright: False

## General comment
Datasets from an 2013 LCA of the Climeworks carbon capture process. Original source: Timofte, A. A Life Cycle Assessment of the Climeworks technology for direct air capture of carbon dioxide, a semester project in the ecological systems design group. Institute of Environmental Engineering of ETH Zurich (2013)..

## Time period
Base technology year of 2020

## Reference product
- Hot water tank, carbon dioxide capture process [RER]: 1 p

## Inputs from technosphere
- Steel, low-alloyed, at plant [RER]: 2000 kg; lognormal SD95 1.31756
  Uncertainty from pedigree matrix: (3, 5, 4, 2, 1, 2)
- Transport, freight, lorry, 7.5t-16t gross weight, fleet average [RER]: 2000 tkm; lognormal SD95 1.31756
  Uncertainty from pedigree matrix: (3, 5, 4, 2, 1, 2)

## Sources
- Sacchi R., Bauer C., 2023, 2023 - LCI on-road vehicles - Sacchi, PSI, Villigen, CH
doi: 10.5281/ZENODO.5156043
