# Ethyl acetate, at plant

Dataset: EcoSpold 1, unit process
Functional unit: 1 kg
Category: chemicals / organic
Geography: RER
Time period: 2000-01 to 2005-12
Production volume: Total production in the world is around 1.3 Million tons.
Share of production covered: 100 %
Generated by: Juergen Sutter
accessRestrictedTo: 0
copyright: true

## General comment
The process "ethyl acetate, at plant, RER" is modelled for the production of ethyl acetate from ethanol in Europe. Raw materials and energy consumptions are modelled with literature data. The emissions are estimated. Infrastructure and transports are calculated with standard values.;
CAS number: 000123-86-4;
Formula: C4H8O2;
Synonyms: ethyl acetic ester, acetic ether, acetidin, acetoxyethane, ethyl ethanoate;

## Included processes
Production of ethyl acetate including materials, energy uses, infrastructure and emissions.

## Geography
The inventory is modelled for Europe.

## Technology
Esterification of ethanol

## Time period
Time of publications

## Reference product
- Ethyl acetate, at plant [RER]: 1 kg
  Europe

## Inputs from technosphere
- Transport, freight, rail [RER]: 0.78731 tkm; lognormal SD95 2.095
  (4,5,na,na,na,na); Standard distances
- Electricity, medium voltage, production ENTSO-E, at grid: 0.00725 kWh; lognormal SD95 1.1267
  (1,2,3,1,1,3); Kim 2003
- Chemical plant, organics [RER]: 4e-10 p; lognormal SD95 3.0909
  (4,5,na,na,na,na); Estimation
- Transport, freight, lorry, fleet average [RER]: 0.13165 tkm; lognormal SD95 2.095
  (4,5,na,na,na,na); Standard distances
- Heat, unspecific, in chemical plant [RER]: 8.84 MJ; lognormal SD95 1.1267
  (1,2,3,1,1,3); Kim 2003
- Ethanol from ethylene, at plant [RER]: 0.62 kg; lognormal SD95 1.1267
  (1,2,3,1,1,3); Wells 1991
- Sulphuric acid, liquid, at plant [RER]: 0.0131 kg; lognormal SD95 1.1267
  (1,2,3,1,1,3); Wells 1991
- Acetic acid, 98% in H2O, at plant [RER]: 0.69 kg; lognormal SD95 1.1267
  (1,2,3,1,1,3); Wells 1991

## Inputs from nature
- Water, cooling, unspecified natural origin/m3 [resources, in water]: 0.024 m3; lognormal SD95 1.3001
  (4,5,na,na,na,na); Estimation

## Emissions to nature
- Heat, waste [emissions to air, high. pop.]: 0.0261 MJ; lognormal SD95 1.1267
  (1,2,3,1,1,3); Calculated from the electricity input
- COD, Chemical Oxygen Demand [emissions to water, river]: 0.0156 kg; lognormal SD95 1.6169
  (4,5,na,na,na,na); Calculated from the water emissions
- Sulfate [emissions to water, river]: 0.012833 kg; lognormal SD95 1.6169
  (4,5,na,na,na,na); Estimation
- BOD5, Biological Oxygen Demand [emissions to water, river]: 0.0156 kg; lognormal SD95 1.6169
  (4,5,na,na,na,na); Calculated from the water emissions
- DOC, Dissolved Organic Carbon [emissions to water, river]: 0.00479 kg; lognormal SD95 1.6169
  (4,5,na,na,na,na); Calculated from the water emissions
- Acetic acid [emissions to air, high. pop.]: 0.00138 kg; lognormal SD95 1.6169
  (4,5,na,na,na,na); Estimation
- Acetic acid [emissions to water, river]: 0.00552 kg; lognormal SD95 3.0909
  (4,5,na,na,na,na); Estimation
- Ethanol [emissions to air, high. pop.]: 0.00124 kg; lognormal SD95 1.6169
  (4,5,na,na,na,na); Estimation
- TOC, Total Organic Carbon [emissions to water, river]: 0.00479 kg; lognormal SD95 1.6169
  (4,5,na,na,na,na); Calculated from the water emissions
- Ethanol [emissions to water, river]: 0.00496 kg; lognormal SD95 1.6169
  (4,5,na,na,na,na); Estimation
- Carbon dioxide, fossil [emissions to air, high. pop.]: 0.0085398 kg; lognormal SD95 1.3001
  (4,5,na,na,na,na); Calculated from the water treatment
- Water [emissions to water, unspecified]: 22.8 kg; lognormal SD95 2.5196
  (5,5,5,5,5,BU:1.05); All uncertainty-values set to 5.0 by default. Balance of input water

## Sampling procedure
Literature data

## Extrapolations
Transports and emissions are modelled with standard methods.

## Sources
- Sutter J., 2007, 2007 - LCI petrochemical solvents - Sutter, Final report ecoinvent Data v2.0, 22, Swiss Centre for LCI, ETH, Duebendorf and Uster, CH
Sutter, J., 0 (2007) Life Cycle Inventories of Petrochemical Solvents. Final report ecoinvent Data v2.0. Editors: 0. 0. Volume: 22. Issue: 0. Swiss Centre for LCI, ETHZ. Duebendorf and St. Gallen, CH.
Type: Measurement on site
Source: CD-ROM
First author: Sutter, J.
Other authors: 0
Year: 2007
Name of editors: 0
Title of anthology: Final report ecoinvent Data v2.0
Place of publication: Duebendorf and St. Gallen, CH
Publisher: Swiss Centre for LCI, ETHZ
Journal: 0
Volume No: 22
Issue No: 0

## Validation
Proof reading validation: passed.; Other validation: none;
