# Disposal, steel, 0% water, to construction waste landfill

Dataset: EcoSpold 1, unit process
Functional unit: 1 kg
Category: waste management / construction waste landfill
Geography: CH
Generated by: default
accessRestrictedTo: 0
copyright: true

## General comment
This dataset represents the activity of waste disposal of scrap steel in a construction waste landfill. Recommended use of this dataset: For reinforcement steel from unprocessed, un-separated reinforced concrete. Separated reinforcement steel will likely be recycled, not landfilled.Inventoried waste consists of fraction: 100% MSWI iron scrap; . Waste composition (wet, in ppm): H2O na; O 121260; H na; C na; S 760; N na; P 800; B na; Cl 750; Br na; F na; I na; Ag na; As na; Ba na; Cd 3; Co na; Cr 1200; Cu 13570; Hg na; Mn 2400; Mo na; Ni 1050; Pb 380; Sb 210; Se na; Sn 670; V 250; Zn 202; Be na; Sc na; Sr na; Ti na; Tl na; W na; Si 30950; Fe 815330; Ca na; Al 10220; K na; Mg na; Na na. Share of carbon in waste that is biogenic 60.4%.;;

## Included processes
Waste-specific short-term emissions via landfill leachate. Waste-specific long-term emissions from landfill. Land transformation and occupation. Waste placement and compaction. Landfill construction materials, sewer pipe for leachate, and access road.

## Technology
This is an inventory for a construction waste landfill (mostly mineral C&D waste, VVEA type B). Ultimate average landfill height is 11 meters. Operation phase duration is 15 years.

## Reference product
- Disposal, steel, 0% water, to construction waste landfill [CH]: 1 kg
  SWITZERLAND

## Inputs from technosphere
- Excavation, skid-steer loader [RER]: 0.00030229 m3; lognormal SD95 3.1055
  excavation work for landfill construction, sewer construction, waste placement and compaction, and landfill recultivation. Uncertainty calculated from uncertainty in base parameters.
- Polypropylene, granulate, at plant [RER]: 1.9736e-8 kg; lognormal SD95 3.1055
  for sewer auxiliary materials. Uncertainty calculated from uncertainty in base parameters.
- Transport, freight, rail [RER]: 2.8427e-6 tkm; lognormal SD95 2.0832
  transport for landfill infrastructure materials. uncertainty calculated from uncertainty in transported goods
- Chromium steel 18/8, at plant [RER]: 2.6841e-7 kg; lognormal SD95 3.1055
  for sewer auxiliary materials. Uncertainty calculated from uncertainty in base parameters.
- Transport, freight, lorry, 16t-32t gross weight, fleet average [CH]: 0.0036943 tkm; lognormal SD95 1.9032
  (same comment as for Transport, freight, rail)
- Sand, at mine [CH]: 0.021824 kg; lognormal SD95 3.1055
  for landfill base layer and sewer auxiliary materials. Uncertainty calculated from uncertainty in base parameters.
- Excavation, hydraulic digger, average [CH]: 0.00030229 m3; lognormal SD95 3.1055
  (same comment as for Excavation, skid-steer loader)
- Bitumen, at refinery [CH]: 8.1169e-6 kg; lognormal SD95 3.1055
  for access street. Uncertainty calculated from uncertainty in base parameters.
- Polyethylene, HDPE, granulate, at plant [RER]: 2.5439e-6 kg; lognormal SD95 3.1055
  for base drain system in landfill and sewer auxiliary materials. Uncertainty calculated from uncertainty in base parameters.
- Diesel, burned in building machine, average [CH]: 1.9748e-6 MJ; lognormal SD95 3.1055
  construction diesel for access street and sewer construction. Uncertainty calculated from uncertainty in base parameters.
- Reinforcing steel, at plant [RER]: 7.6971e-7 kg; lognormal SD95 3.1055
  for sewer auxiliary materials. Uncertainty calculated from uncertainty in base parameters.
- Tap water, at user [RER]: 0.00016406 kg; lognormal SD95 3.1055
  for sewer auxiliary materials. Uncertainty calculated from uncertainty in base parameters.
- Polyvinylchloride, at regional storage [RER]: 1.9736e-8 kg; lognormal SD95 3.1055
  for sewer auxiliary materials. Uncertainty calculated from uncertainty in base parameters.
- Gravel, round, at mine [CH]: 0.036583 kg; lognormal SD95 3.1055
  for access street, for recultivation layer. Uncertainty calculated from uncertainty in base parameters.
- Extrusion, plastic pipes [RER]: 2.5834e-6 kg; lognormal SD95 3.1055
  (same comment as for Polyethylene, HDPE, granulate, at plant)
- Synthetic rubber, at plant [RER]: 7.8944e-9 kg; lognormal SD95 3.1055
  for sewer auxiliary materials. Uncertainty calculated from uncertainty in base parameters.
- Concrete, sole plate and foundation, at plant [CH]: 1.156e-8 m3; lognormal SD95 3.1055
  for sewer pipe. Uncertainty calculated from uncertainty in base parameters.
- Cast iron, at plant [RER]: 1.3026e-7 kg; lognormal SD95 3.1055
  for sewer auxiliary materials. Uncertainty calculated from uncertainty in base parameters.

## Inputs from nature
- Occupation, traffic area, road network [resources, land]: 8.658e-6 m2a; lognormal SD95 2.5417
  for access road to landfill during construction, operation, and aftercare phase of 25 years. Uncertainty calculated from uncertainty in base parameters.
- Waste mass, total, placed in landfill [resources, in ground]: 1 kg; lognormal SD95 1
  waste mass placed in construction waste landfill (for ecoscarcity LCIA only). uncertainty is low as functional unit.
- Transformation, from pasture, man made [resources, land]: 4.5671e-5 m2; lognormal SD95 4.3339
  for establishing the landfill on open ground. Uncertainty calculated from uncertainty in base parameters.
- Transformation, from dump site, inert material landfill [resources, land]: 4.5455e-5 m2; lognormal SD95 4.3339
  recultivation of landfill after operation phase. Uncertainty calculated from uncertainty in base parameters.
- Transformation, to dump site, inert material landfill [resources, land]: 4.5455e-5 m2; lognormal SD95 4.3339
  for establishing the landfill. Uncertainty calculated from uncertainty in base parameters.
- Occupation, dump site [resources, land]: 0.00068182 m2a; lognormal SD95 2.5417
  occupation of landfill during operation phase of 15 years. Uncertainty calculated from uncertainty in base parameters.
- Transformation, to traffic area, road network [resources, land]: 2.1645e-7 m2; lognormal SD95 4.3339
  for access road to landfill. Uncertainty calculated from uncertainty in base parameters.
- Transformation, to pasture, man made [resources, land]: 4.5455e-5 m2; lognormal SD95 4.3339
  (same comment as for Transformation, from dump site, inert material landfill)

## Emissions to nature
- Zinc [emissions to water, river]: 2.2825e-7 kg; lognormal SD95 11.635
  burden from short-term leachate to groundwater in uncontrolled landfill in moist cimate. Uncertainty calculated from unertainty of the waste composition of this waste and short-term leaching in landfill
- Manganese [emissions to water, river]: 1.0334e-6 kg; lognormal SD95 9.8434
  (same comment as for Zinc)
- Antimony [emissions to water, groundwater, long-term]: 0.00020551 kg; lognormal SD95 6.4134
  Emissions from long-term leachate (>100a) directly from construction waste landfill. Uncertainty calculated depending on waste input and uncertainty of long-term transfer coefficents in landfill.
- Manganese [emissions to water, groundwater, long-term]: 0.00061903 kg; lognormal SD95 7.4151
  (same comment as for Antimony)
- Nickel [emissions to water, river]: 1.6384e-6 kg; lognormal SD95 9.3286
  (same comment as for Zinc)
- Phosphate [emissions to water, river]: 2.0267e-7 kg; lognormal SD95 13.232
  (same comment as for Zinc)
- Lead [emissions to water, river]: 1.4648e-7 kg; lognormal SD95 12.179
  (same comment as for Zinc)
- Nickel [emissions to water, groundwater, long-term]: 0.00098142 kg; lognormal SD95 5.0299
  (same comment as for Antimony)
- Chromium VI [emissions to water, groundwater, long-term]: 0.00016025 kg; lognormal SD95 13.025
  (same comment as for Antimony)
- Cadmium [emissions to water, river]: 2.4981e-8 kg; lognormal SD95 14.772
  (same comment as for Zinc)
- Vanadium [emissions to water, river]: 3.5869e-8 kg; lognormal SD95 14.073
  (same comment as for Zinc)
- Aluminium [emissions to water, river]: 4.2257e-7 kg; lognormal SD95 10.998
  (same comment as for Zinc)
- Copper [emissions to water, river]: 8.393e-6 kg; lognormal SD95 7.7378
  (same comment as for Zinc)
- Aluminium [emissions to water, groundwater, long-term]: 0.00025312 kg; lognormal SD95 48.936
  (same comment as for Antimony)
- Iron [emissions to water, river]: 1.1764e-5 kg; lognormal SD95 9.0489
  (same comment as for Zinc)
- Copper [emissions to water, groundwater, long-term]: 0.0050274 kg; lognormal SD95 4.5727
  (same comment as for Antimony)
- Antimony [emissions to water, river]: 4.4944e-6 kg; lognormal SD95 8.4599
  (same comment as for Zinc)
- Lead [emissions to water, groundwater, long-term]: 8.7741e-5 kg; lognormal SD95 9.9685
  (same comment as for Antimony)
- Tin [emissions to water, river]: 6.9379e-6 kg; lognormal SD95 7.9183
  (same comment as for Zinc)
- Hydrogen sulfide [emissions to water, river]: 8.9082e-9 kg; lognormal SD95 6.4476
  (same comment as for Zinc)
- Zinc [emissions to water, groundwater, long-term]: 0.00013672 kg; lognormal SD95 6.7145
  (same comment as for Antimony)
- Sulfate [emissions to water, groundwater, long-term]: 0.0021521 kg; lognormal SD95 5.2902
  (same comment as for Antimony)
- Silicon [emissions to water, river]: 1.2797e-6 kg; lognormal SD95 9.8707
  (same comment as for Zinc)
- Phosphate [emissions to water, groundwater, long-term]: 0.0001214 kg; lognormal SD95 30.942
  (same comment as for Antimony)
- Tin [emissions to water, groundwater, long-term]: 0.00066306 kg; lognormal SD95 5.3939
  (same comment as for Antimony)
- Vanadium [emissions to water, groundwater, long-term]: 2.0587e-5 kg; lognormal SD95 22.144
  (same comment as for Antimony)
- Chloride [emissions to water, groundwater, long-term]: 0.00060879 kg; lognormal SD95 5.3125
  (same comment as for Antimony)
- Hydrogen sulfide [emissions to water, groundwater, long-term]: 1.5047e-7 kg; lognormal SD95 5.2902
  (same comment as for Antimony)
- Chromium VI [emissions to water, river]: 2.872e-7 kg; lognormal SD95 11.338
  (same comment as for Zinc)
- Chloride [emissions to water, river]: 0.00014121 kg; lognormal SD95 5.7458
  (same comment as for Zinc)
- Cadmium [emissions to water, groundwater, long-term]: 2.975e-6 kg; lognormal SD95 10.898
  (same comment as for Antimony)
- Silicon [emissions to water, groundwater, long-term]: 0.00076654 kg; lognormal SD95 45.824
  (same comment as for Antimony)
- Iron [emissions to water, groundwater, long-term]: 0.0070467 kg; lognormal SD95 115.77
  (same comment as for Antimony)
- Sulfate [emissions to water, river]: 0.00012741 kg; lognormal SD95 6.4476
  (same comment as for Zinc)

## Sampling procedure
Landfill model based on average mineral building waste composition and observed average leachate concentrations from various literature sources. Extrapolated to 60'000 years heeding chemical characteristics and hydrology. Based on waste composition and climate data the end of carbonate phase of this landfill is estimated to be reached beyond 60'000 years.

## Uncertainty adjustments
uncertainty of waste input composition data derived from generic formula GSD(c) = N*ln(c)+1. *Mean* long-term emissions are the emissions until 60'000 years after waste placement. *Maximal* (upper bound) long-term emissions are the complete emissions of all landfilled material, depicting possible mechanical landfill failures and/or natural erosion not heeded in the mean value. Minimal long-term emissions are derived implicitly from the mean and maximal values assuming a lognormal distribution.

## Sources
- Doka G., 2020, 2020 - LCI exc. mat. constr. and dem. waste landfill - Doka, -, Doka LCA, Zuerich, CH
Doka G. (2020) Two models for waste-specific and climate-specific life cycle inventories of excavation material landfills and construction & demolition waste landfills. Doka LCA. Zürich, CH. http://www.doka.ch/publications.htm.
Type: Separate publication
First author: Doka G.
Year: 2020
Place of publication: Zürich, CH. http://www.doka.ch/publications.htm
Publisher: Doka LCA
Original title: Two models for waste-specific and climate-specific life cycle inventories of excavation material landfills and construction & demolition waste landfills
