# Building, hall

Dataset: EcoSpold 1, unit process, infrastructure
Functional unit: 1 m2
Category: construction / others\infrastructure
Geography: CH
Time period: 2000-01 to 2000-12
Generated by: Daniel Kellenberger
accessRestrictedTo: 0
copyright: true

## General comment
This module should not be used if its relative importance would be high in a certain environmental inventory.
Technology: Estimated share of current wooden and steel halls in Switzerland.
Version: 2.2

Production volume: unknown
Local category: Bauprozesse
Local subcategory: Gebäude

## Included processes
Includes a combination of the wooden building hall (30%) and the steel building hall (70%) to represent the estimated current Swiss share.

## Reference product
- Building, hall [CH]: 1 m2
  SWITZERLAND

## Inputs from technosphere
- Building, hall, wood construction [CH]: 0.3 m2; lognormal SD95 3.1
  (4,5,1,1,1,5);
- Building, hall, steel construction [CH]: 0.7 m2; lognormal SD95 3.1
  (4,5,1,1,1,5);

## Sampling procedure
most data obtained by personal communication

## Extrapolations
See geography

## Sources
- Kellenberger D., Althaus H.-J., Jungbluth N., Kuenniger T., Lehmann M., Thalmann P., 2007, 2007 - LCI building products - Kellenberger, Final report ecoinvent data v2.0, 7, Swiss Centre for LCI, Empa - TSL, ESU-services Ltd., Bau- und Umweltchimie, Duebendorf, CH
Kellenberger D., Althaus H.-J., Jungbluth N., Künniger T. (2007) Life Cycle Inventories of Building Products. Final report ecoinvent data v2.0. Volume: 7. Swiss Centre for LCI, Empa - TSL. Dübendorf, CH.
Type: Measurement on site
Source: CD-ROM
First author: Kellenberger D.
Other authors: Althaus H.-J., Jungbluth N., Künniger T.
Year: 2007
Title of anthology: Final report ecoinvent data v2.0
Place of publication: Dübendorf, CH
Publisher: Swiss Centre for LCI, Empa - TSL
Volume No: 7

## Validation
Proof reading validation: Passed; Other validation: none;
