# Ferrochromium, high-carbon, 68% Cr, at plant

Dataset: EcoSpold 1, unit process
Functional unit: 1 kg
Category: metals / alloys
Geography: GLO
Time period: 1993-01 to 1995-12
Production volume: 2.2 million tonnes chromium contained in ferrochrome in 1994
Share of production covered: 74 %
Generated by: Mischa Classen
accessRestrictedTo: 0
copyright: true

## General comment
The module describes the production of chromite in 1994 for a world-wide production average. It is designed for the use of chromite as intermediary product in the production of ferrochromium, dichromate and refractories. This module does not consider secondary sources of chromium. Process data is taken mainly from a material flow analysis for the con-sumption of chromium compounds in Germany. Results are used as a proxy for the European situation.;
Synonyms: ferro-chrome, ferrochrome, chromeisen;

## Included processes
The module includes the pre-treatment of the ore and the reduction to high-carbon ferrochromium. No secondary production considered, since secondary chromium is recycled to the foundries and has to be inventoried in the respective module, i.e. when casting the final raw material in the stainless steel production.

## Geography
This module relates to the world wide production situation. Some Processes originate from data sets valid for Switzerland or Europe.

## Technology
Direct reduction of chromite ores with carbon in three-phase submerged arc furnaces. 50% ordinar technology, 50% new processes like Outokumpu, Showa Denko, Krupp-CODIR & plasma furnace.

## Reference product
- Ferrochromium, high-carbon, 68% Cr, at plant [GLO]: 1 kg
  Global

## Inputs from technosphere
- Disposal, inert waste, 5% water, to construction waste landfill [CH]: 2.9928 kg; lognormal SD95 1.1288
  composite
- Non-ferrous metal smelter [GLO]: 7.1655e-12 p; lognormal SD95 3.3171
  (5,5,1,1,1,5,9); rough estimate
- Transport, transoceanic tanker [OCE]: 4.0752 tkm; lognormal SD95 2.1078
  (4,4,1,1,1,5,5); calculation based on assumptions
- Transport, freight, lorry, fleet average [RER]: 0.34064 tkm; lognormal SD95 2.1078
  (4,4,1,1,1,5,5); calculation based on assumptions
- Bauxite, at mine [GLO]: 0.20376 kg; lognormal SD95 1.7362
  reported values
- Electricity, hydropower, at run-of-river power plant [RER]: 1.9951 kWh; lognormal SD95 1.1573
  (3,2,3,1,1,2,2); estimate based on reported value
- Hard coal, burned in industrial furnace 1-10MW [RER]: 9.724 MJ; lognormal SD95 1.1286
  (2,2,3,1,1,2,1)
- Treatment, sewage, unpolluted, to wastewater treatment, class 3 [CH]: 0.01 m3; lognormal SD95 1.1286
  (2,2,3,1,1,2,6)
- Electricity, medium voltage, production ENTSO-E, at grid: 1.3301 kWh; lognormal SD95 1.1573
  (3,2,3,1,1,2,2); estimate based on reported value
- Silica sand, at plant [DE]: 0.04624 kg; lognormal SD95 1.1286
  (2,2,3,1,1,2,4)
- Anode, aluminium electrolysis [RER]: 0.019992 kg; lognormal SD95 1.1286
  (2,2,3,1,1,2,3)
- Chromite, ore concentrate, at beneficiation [GLO]: 2.4276 kg; lognormal SD95 1.1286
  (2,2,3,1,1,2,4)

## Inputs from nature
- Water, cooling, unspecified natural origin/m3 [resources, in water]: 0.01 m3; lognormal SD95 1.1094
  (2,3,2,3,1,3,2)
- Water, river [resources, in water]: 0.01 m3; lognormal SD95 1.1094
  (2,3,2,3,1,3,12)

## Emissions to nature
- Particulates, > 2.5 um, and < 10um [emissions to air, low. pop.]: 0.01112 kg; lognormal SD95 1.9784
  based on reported values
- Suspended solids, unspecified [emissions to water, river]: 0.000375 kg; lognormal SD95 1333.3
  reported values
- Sulfur dioxide [emissions to air, low. pop.]: 0.0016 kg; lognormal SD95 1.875
  based on reported values
- Nitrogen oxides [emissions to air, low. pop.]: 0.005875 kg; lognormal SD95 1.9915
  reported values
- Chromium VI [emissions to air, low. pop.]: 7.92e-5 kg; lognormal SD95 1.5
  based on reported values
- PAH, polycyclic aromatic hydrocarbons [emissions to water, river]: 6.5e-8 kg; lognormal SD95 1538.5
  reported values
- Particulates, < 2.5 um [emissions to air, low. pop.]: 0.02498 kg; lognormal SD95 1.9616
  based on reported values
- Dioxin, 2,3,7,8 Tetrachlorodibenzo-p- [emissions to air, low. pop.]: 1e-12 kg; lognormal SD95 3.0115
  (2,3,2,3,1,3,21)
- NMVOC, non-methane volatile organic compounds, unspecified origin [emissions to air, low. pop.]: 0.0017 kg; lognormal SD95 1.5154
  (2,3,2,3,1,3,16)
- Chromium [emissions to water, river]: 7.71e-9 kg; lognormal SD95 1333.3
  reported values
- Particulates, > 10 um [emissions to air, low. pop.]: 0.0035 kg; lognormal SD95 2
  based on reported values
- Cyanide [emissions to air, low. pop.]: 3.5e-5 kg; lognormal SD95 1.4286
  based on reported values
- Chromium [emissions to air, low. pop.]: 0.003168 kg; lognormal SD95 1.875
  based on reported values
- Heat, waste [emissions to air, low. pop.]: 11.971 MJ; lognormal SD95 1.1286
  (2,2,3,1,1,2,13)
- Carbon monoxide, fossil [emissions to air, low. pop.]: 0.001 kg; lognormal SD95 5.0131
  (2,3,2,3,1,3,17)
- Water [emissions to water, unspecified]: 9.5, 9.5 kg (2 entries); lognormal SD95 2.5196
  (5,5,5,5,5,BU:1.05); All uncertainty-values set to 5.0 by default. Balance of input water

## Sampling procedure
literature

## Extrapolations
see Geography and Technology

## Sources
- Classen M., Althaus H.-J., Blaser S., Scharnhorst W., Tuchschmid M., Jungbluth N., Faist Emmenegger M., 2009, 2009 - LCI metals - Classen, Final report ecoinvent data v2.1, 10, Swiss Centre for LCI, Empa, ESU-services Ltd., Duebendorf, CH
Classen M., Althaus H.-J., Blaser S., Doka G., Jungbluth N., Tuchschmid M. (2008) Life Cycle Inventories of Metals. Final report ecoinvent data v2.1. Volume: 10. Issue: 0. Swiss Centre for LCI, Empa - TSL. Dübendorf, CH.
Type: Measurement on site
Source: CD-ROM
First author: Classen M.
Other authors: Althaus H.-J., Blaser S., Doka G., Jungbluth N., Tuchschmid M.
Year: 2008
Title of anthology: Final report ecoinvent data v2.1
Place of publication: Dübendorf, CH
Publisher: Swiss Centre for LCI, Empa - TSL
Volume No: 10
Issue No: 0

## Validation
Proof reading validation: passed; Other validation: none;
