# Electricity, production mix NORDEL

Dataset: EcoSpold 1, unit process
Functional unit: 1 kWh
Category: electricity / production mix
Geography: NORDEL
Time period: 2000-01 to 2000-12
Production volume: GWh
Share of production covered: 100 %
Generated by: René Itten
accessRestrictedTo: 0
copyright: true

## General comment
Electricity net production shares are based on an annual average for the year 2008 according to IEA Electricity Information.;

## Included processes
It includes shares of national electricity production NORDEL member countries (in 2008) at the busbar. It does not include transformation, transport nor distribution losses.

## Geography
Data apply to public and self producers in NORDEL network / Europe

## Technology
No technology description is provided because the dataset just describes the power plant portfolio of the respective country using current (2004) average technology per energy carrier.

## Time period
Statistics for 2008

## Reference product
- Electricity, production mix NORDEL [NORDEL]: 1 kWh
  Nordic countries power association

## Inputs from technosphere
- Electricity, production mix [SE]: 0.36702 kWh; lognormal SD95 1.05
  (1,1,1,1,1,1,BU:1.05); IEA statistics 2008;
- Electricity, production mix [FI]: 0.18725 kWh; lognormal SD95 1.05
  (1,1,1,1,1,1,BU:1.05); IEA statistics 2008;
- Electricity, production mix [NO]: 0.35782 kWh; lognormal SD95 1.05
  (1,1,1,1,1,1,BU:1.05); IEA statistics 2008;
- Electricity, production mix [DK]: 0.087916 kWh; lognormal SD95 1.05
  (1,1,1,1,1,1,BU:1.05); IEA statistics 2008;

## Sources
- Frischknecht R., Itten R., Flury K., 2012, 2012 - GHG emis. from Swiss elec. mixes - Frischknecht, Project reports, 401, ESU-services Ltd., Uster, CH
Itten, R., Frischknecht, R. (2012) Life Cycle Inventories of electricity mixes. Project reports. Volume: 401. ESU-services Ltd.. Uster, CH.
Type: Separate publication
First author: Itten, R.
Other authors: Frischknecht, R.
Year: 2012
Title of anthology: Project reports
Place of publication: Uster, CH
Publisher: ESU-services Ltd.
Volume No: 401

## Validation
Proof reading validation: 22.06.2012; Other validation: Z:\ESU-Docs\Projekte laufend\401 Update Strommix v3.0\EcoSpold\[401-electricity-mix-europe-RER-world-GLO-v1.0.xlsx]X-Process;
