# xxx Silicon, pc, future, casted, at plant

Dataset: EcoSpold 1, unit process
Functional unit: 1 kg
Category: material, obsolete / others, obsolete
Geography: RER
Generated by: default
accessRestrictedTo: 0
copyright: true

## General comment
This process was included in version 1 of the ecoinvent database but was obsolete in version 2. For compatibility reasons a dummy process is included in version 2 of the SimaPro ecoinvent process libraries.

Record: PRé Consultants, the Netherlands, V. Cleij

Generator: PRé Consultants, the Netherlands, V. Cl

## Reference product
- xxx Silicon, pc, future, casted, at plant [RER]: 1 kg
  This process was included in version 1 of the ecoinvent database but was obsolete in version 2. For compatibility reasons a dummy process is included in version 2 of the SimaPro ecoinvent process libraries.

## Sources
- Created for EcoSpold 1 compatibility, Final report ecoinvent data v2.0, 9
Werner F., Althaus H.-J., Künniger T., Richter K., Jungbluth N. (2007) 1Life Cycle Inventories of Wood as Fuel and Construction Material. Final report ecoinvent data v2.0. Volume: 9. Issue: 0. Swiss Centre for LCI, Empa - TSL. Dübendorf, CH.
Type: Measurement on site
Source: CD-ROM
First author: Werner F.
Other authors: Althaus H.-J., Künniger T., Richter K., Jungbluth N.
Year: 2007
Title of anthology: Final report ecoinvent data v2.0
Place of publication: Dübendorf, CH
Publisher: Swiss Centre for LCI, Empa - TSL
Volume No: 9
Issue No: 0
