# xx 1,1-dimethylcyclopentane, from naphtha, at plant

Dataset: EcoSpold 1, unit process
Functional unit: 1 kg
Category: material, obsolete / chemicals, obsolete\organic, obsolete
Geography: RER
Time period: 2004-01 to 2004-12
Share of production covered: 0 %
Generated by: Juergen Sutter
accessRestrictedTo: 0
copyright: true

## General comment
The multioutput-process "naphta, to melecular sieve separations" delivers the co-products hexane, heptane, 2,3-dimethylbutane, 2-methylpentane, methylcyclopentane, 1,1-dimethylcyclopentane, methylcyclohexane, fraction 1 from naphta, fraction 7 from naphta, and fraction 8 from naphta. The allocation is based on mass balance.;

## Included processes
Molecular sieve separation of naphta including materials, energy uses, infrastructure and emissions.

## Geography
The inventory is modelled with data from plants in the USA.

## Technology
Separation of naphta with a zeolith 5a molecular sieve.

## Time period
Time of publications.

## Reference product
- xx 1,1-dimethylcyclopentane, from naphtha, at plant [RER]: 1 kg
  Europe

## Inputs from technosphere
- Naphtha, at refinery [RER]: 1.02873 kg; lognormal SD95 1.0773
  (2,2,1,3,1,1); Overcash 1998 - 2004
- Electricity, medium voltage, production ENTSO-E, at grid: 1.025e-5 kWh; lognormal SD95 1.0773
  (2,2,1,3,1,1); Overcash 1998 - 2004
- Heat, unspecific, in chemical plant [RER]: 3.20069 MJ; lognormal SD95 1.0773
  (2,2,1,3,1,1); Overcash 1998 - 2004
- Transport, freight, rail [RER]: 0.61724 tkm; lognormal SD95 2.095
  (4,5,na,na,na,na); Standard distances 600km
- Chemical plant, organics [RER]: 4.1149e-10 p; lognormal SD95 3.0909
  (4,5,na,na,na,na); Estimation
- Transport, freight, lorry, fleet average [RER]: 0.10287 tkm; lognormal SD95 2.095
  (4,5,na,na,na,na); Standard distances 100km

## Inputs from nature
- Water, cooling, unspecified natural origin/m3 [resources, in water]: 0.025883 m3; lognormal SD95 1.0773
  (2,2,1,3,1,1); Overcash 1998 - 2004

## Emissions to nature
- BOD5, Biological Oxygen Demand [emissions to water, river]: 0.019484 kg; lognormal SD95 1.5058
  (2,2,1,3,1,1); Calculated from water emissions
- Hydrocarbons, unspecified [emissions to water, river]: 0.0014402 kg; lognormal SD95 1.5058
  (2,2,1,3,1,1); Overcash 1998 - 2004
- Hydrocarbons, aliphatic, alkanes, cyclic [emissions to air, high. pop.]: 0.010596 kg; lognormal SD95 1.5058
  (2,2,1,3,1,1); Overcash 1998 - 2004
- Carbon dioxide, fossil [emissions to air, high. pop.]: 0.056992 kg; lognormal SD95 1.2102
  (4,2,1,3,1,1); Estimation
- Heptane [emissions to air, high. pop.]: 0.0020708 kg; lognormal SD95 1.5058
  (2,2,1,3,1,1); Overcash 1998 - 2004
- DOC, Dissolved Organic Carbon [emissions to water, river]: 0.019484 kg; lognormal SD95 1.5058
  (2,2,1,3,1,1); Calculated from water emissions
- Hexane [emissions to air, high. pop.]: 0.0017283 kg; lognormal SD95 1.5058
  (2,2,1,3,1,1); Overcash 1998 - 2004
- COD, Chemical Oxygen Demand [emissions to water, river]: 0.0048762 kg; lognormal SD95 1.5058
  (2,2,1,3,1,1); Calculated from water emissions
- TOC, Total Organic Carbon [emissions to water, river]: 0.0048762 kg; lognormal SD95 1.5058
  (2,2,1,3,1,1); Calculated from water emissions
- Heat, waste [emissions to air, high. pop.]: 3.6931e-5 MJ; lognormal SD95 1.2102
  (4,2,1,3,1,1); Estimation
- Water [emissions to water, unspecified]: 24.5889 kg; lognormal SD95 2.5196
  (5,5,5,5,5,BU:1.05); All uncertainty-values set to 5.0 by default. Balance of input water

## Sampling procedure
Literature data

## Extrapolations
Some data are derived from other or unknown plants or have been estimated.

## Sources
- Jungbluth N., Chudacoff M., Dauriat A., Dinkel F., Doka G., Faist Emmenegger M., Gnansounou E., Kljun N., Spielmann M., Stettler C., Sutter J., 2007, 2007 - LCI bioenergy - Jungbluth, Final report ecoinvent data v2.0, 17, Swiss Centre for LCI, ESU-services Ltd., Duebendorf and Uster, CH
Jungbluth N., Chudacoff M., Dauriat A., Dinkel F., Doka G., Faist Emmenegger M., Gnansounou E., Kljun N., Spielmann M., Stettler C., Sutter J. (2007) Life Cycle Inventories of Bioenergy. Final report ecoinvent data v2.0. Volume: 17. Swiss Centre for LCI, ESU. Duebendorf and Uster, CH.
Type: Measurement on site
Source: CD-ROM
First author: Jungbluth N.
Other authors: Chudacoff M., Dauriat A., Dinkel F., Doka G., Faist Emmenegger M., Gnansounou E., Kljun N., Spielmann M., Stettler C., Sutter J.
Year: 2007
Title of anthology: Final report ecoinvent data v2.0
Place of publication: Duebendorf and Uster, CH
Publisher: Swiss Centre for LCI, ESU
Volume No: 17

## Validation
Proof reading validation: Passed.; Other validation: none;
