# Disposal, tailings from hard coal milling, in impoundment

Dataset: EcoSpold 1, unit process
Functional unit: 1 kg
Category: impoundment / unspecified
Geography: GLO
Time period: 1985-01 to 2009-12
Production volume: Approx. 1167 Mio t/a coal tailings generation
Share of production covered: 1 %
Generated by: Gabor Doka
accessRestrictedTo: 0
copyright: true

## General comment
na;
Synonyms: coal milling reject, coal washery refuse, coal refining discard, coal slurry;

## Included processes
Waste-specific emissions from lignite spoil leachate. Short- and long-term emissions to groundwater from rainwater infiltration leaching. Leaching by lateral groundwater flow not included.; Geography: Data represents a worldwide average. Generic water infiltration rate according to weighted mean of major sites of coal tailings production in the world.

## Technology
Mechanically stable and revegetated coal tailings impoundment

## Time period
Average coal tailings composition from literature references. Transfer coefficients from prospective model, specific to coal tailings.

## Reference product
- Disposal, tailings from hard coal milling, in impoundment [GLO]: 1 kg
  Global

## Emissions to nature
- Tin [emissions to water, groundwater, long-term]: 1.6953e-8 kg; lognormal SD95 133.1
  Uncertainty is calculated from uncertainties in waste composition and transfer coefficients
- Iron [emissions to water, groundwater, long-term]: 0.0015099 kg; lognormal SD95 216.13
  (same comment as for Tin)
- Beryllium [emissions to water, groundwater]: 1.3399e-8 kg; lognormal SD95 5.8832
  (same comment as for Tin)
- Barium [emissions to water, groundwater]: 8.4111e-8 kg; lognormal SD95 680.13
  (same comment as for Tin)
- Chloride [emissions to water, groundwater, long-term]: 0.00034186 kg; lognormal SD95 1.8871
  (same comment as for Tin)
- Lead [emissions to water, groundwater, long-term]: 8.9587e-7 kg; lognormal SD95 210.72
  (same comment as for Tin)
- Silver [emissions to water, groundwater, long-term]: 1.0941e-9 kg; lognormal SD95 1.4439
  (same comment as for Tin)
- Arsenic [emissions to water, groundwater]: 8.9987e-9 kg; lognormal SD95 617.04
  (same comment as for Tin)
- Arsenic [emissions to water, groundwater, long-term]: 3.1203e-6 kg; lognormal SD95 521.67
  (same comment as for Tin)
- Sodium [emissions to water, groundwater]: 0.00010876 kg; lognormal SD95 22.698
  (same comment as for Tin)
- Sulfate [emissions to water, groundwater, long-term]: 7.6214e-5 kg; lognormal SD95 108.18
  (same comment as for Tin)
- Cobalt [emissions to water, groundwater, long-term]: 3.3911e-6 kg; lognormal SD95 29.044
  (same comment as for Tin)
- Phosphate [emissions to water, groundwater, long-term]: 1.2357e-8 kg; lognormal SD95 32.928
  (same comment as for Tin)
- Mercury [emissions to water, groundwater]: 5.8769e-10 kg; lognormal SD95 109.74
  (same comment as for Tin)
- Strontium [emissions to water, groundwater, long-term]: 1.8757e-5 kg; lognormal SD95 30.114
  (same comment as for Tin)
- Vanadium [emissions to water, groundwater, long-term]: 1.3351e-6 kg; lognormal SD95 255.45
  (same comment as for Tin)
- Chromium VI [emissions to water, groundwater]: 8.755e-9 kg; lognormal SD95 30.529
  (same comment as for Tin)
- Potassium [emissions to water, groundwater]: 1.2422e-5 kg; lognormal SD95 150.83
  (same comment as for Tin)
- Cadmium [emissions to water, groundwater]: 1.8568e-8 kg; lognormal SD95 39.046
  (same comment as for Tin)
- Nitrate [emissions to water, groundwater, long-term]: 7.4012e-9 kg; lognormal SD95 1.0978
  (same comment as for Tin)
- Nickel [emissions to water, groundwater, long-term]: 1.6115e-5 kg; lognormal SD95 57.524
  (same comment as for Tin)
- Magnesium [emissions to water, groundwater, long-term]: 0.00081634 kg; lognormal SD95 130.31
  (same comment as for Tin)
- Molybdenum [emissions to water, groundwater, long-term]: 1.3121e-6 kg; lognormal SD95 31.166
  (same comment as for Tin)
- Nitrate [emissions to water, groundwater]: 1.3174e-5 kg; lognormal SD95 2.1885
  (same comment as for Tin)
- Potassium [emissions to water, groundwater, long-term]: 0.0013002 kg; lognormal SD95 129.78
  (same comment as for Tin)
- Titanium [emissions to water, groundwater, long-term]: 3.3079e-6 kg; lognormal SD95 19666
  (same comment as for Tin)
- Calcium [emissions to water, groundwater, long-term]: 0.0010137 kg; lognormal SD95 68.221
  (same comment as for Tin)
- Aluminium [emissions to water, groundwater, long-term]: 0.0004023 kg; lognormal SD95 670.58
  (same comment as for Tin)
- Lead [emissions to water, groundwater]: 1.4956e-9 kg; lognormal SD95 126.61
  (same comment as for Tin)
- Selenium [emissions to water, groundwater]: 8.3298e-9 kg; lognormal SD95 133.05
  (same comment as for Tin)
- Silver [emissions to water, groundwater]: 2.4459e-9 kg; lognormal SD95 1.1375
  (same comment as for Tin)
- Copper [emissions to water, groundwater, long-term]: 1.1197e-5 kg; lognormal SD95 21.692
  (same comment as for Tin)
- Phosphate [emissions to water, groundwater]: 8.376e-8 kg; lognormal SD95 8.2819
  (same comment as for Tin)
- Sodium [emissions to water, groundwater, long-term]: 0.00057671 kg; lognormal SD95 21.615
  (same comment as for Tin)
- Zinc [emissions to water, groundwater]: 3.7178e-7 kg; lognormal SD95 83.833
  (same comment as for Tin)
- Tin [emissions to water, groundwater]: 1.6782e-10 kg; lognormal SD95 7.3509
  (same comment as for Tin)
- Antimony [emissions to water, groundwater, long-term]: 1.2585e-7 kg; lognormal SD95 12.485
  (same comment as for Tin)
- Molybdenum [emissions to water, groundwater]: 2.2688e-8 kg; lognormal SD95 36.997
  (same comment as for Tin)
- Cobalt [emissions to water, groundwater]: 3.7898e-8 kg; lognormal SD95 35.586
  (same comment as for Tin)
- Zinc [emissions to water, groundwater, long-term]: 5.3894e-5 kg; lognormal SD95 69.387
  (same comment as for Tin)
- Thallium [emissions to water, groundwater]: 1.2566e-10 kg; lognormal SD95 5.8499
  (same comment as for Tin)
- Magnesium [emissions to water, groundwater]: 4.2208e-5 kg; lognormal SD95 140.59
  (same comment as for Tin)
- Chromium VI [emissions to water, groundwater, long-term]: 4.7496e-6 kg; lognormal SD95 29.256
  (same comment as for Tin)
- Strontium [emissions to water, groundwater]: 6.2087e-7 kg; lognormal SD95 34.412
  (same comment as for Tin)
- Titanium [emissions to water, groundwater]: 5.5224e-9 kg; lognormal SD95 11967
  (same comment as for Tin)
- Silicon [emissions to water, groundwater, long-term]: 0.00023769 kg; lognormal SD95 419.1
  (same comment as for Tin)
- Calcium [emissions to water, groundwater]: 8.7084e-5 kg; lognormal SD95 72.824
  (same comment as for Tin)
- Fluoride [emissions to water, groundwater, long-term]: 1.2361e-6 kg; lognormal SD95 1.2788
  (same comment as for Tin)
- Manganese [emissions to water, groundwater]: 3.7158e-6 kg; lognormal SD95 100.82
  (same comment as for Tin)
- Thallium [emissions to water, groundwater, long-term]: 1.2693e-8 kg; lognormal SD95 26.151
  (same comment as for Tin)
- Nickel [emissions to water, groundwater]: 1.7833e-7 kg; lognormal SD95 68.247
  (same comment as for Tin)
- Selenium [emissions to water, groundwater, long-term]: 7.3747e-7 kg; lognormal SD95 114.99
  (same comment as for Tin)
- Vanadium [emissions to water, groundwater]: 2.4205e-9 kg; lognormal SD95 250.43
  (same comment as for Tin)
- Copper [emissions to water, groundwater]: 1.8693e-8 kg; lognormal SD95 31.043
  (same comment as for Tin)
- Iron [emissions to water, groundwater]: 2.5207e-6 kg; lognormal SD95 239.81
  (same comment as for Tin)
- Mercury [emissions to water, groundwater, long-term]: 4.8011e-8 kg; lognormal SD95 94.657
  (same comment as for Tin)
- Beryllium [emissions to water, groundwater, long-term]: 5.7944e-7 kg; lognormal SD95 4.2013
  (same comment as for Tin)
- Sulfate [emissions to water, groundwater]: 0.00064316 kg; lognormal SD95 118.32
  (same comment as for Tin)
- Fluoride [emissions to water, groundwater]: 6.2395e-7 kg; lognormal SD95 1.4319
  (same comment as for Tin)
- Barium [emissions to water, groundwater, long-term]: 5.0382e-5 kg; lognormal SD95 563.59
  (same comment as for Tin)
- Cadmium [emissions to water, groundwater, long-term]: 6.2111e-7 kg; lognormal SD95 34.125
  (same comment as for Tin)
- Scandium [emissions to water, groundwater, long-term]: 2.8085e-7 kg; lognormal SD95 16.302
  (same comment as for Tin)
- Scandium [emissions to water, groundwater]: 2.8729e-9 kg; lognormal SD95 5.6824
  (same comment as for Tin)
- Antimony [emissions to water, groundwater]: 2.2282e-9 kg; lognormal SD95 15.67
  (same comment as for Tin)
- Aluminium [emissions to water, groundwater]: 6.7161e-7 kg; lognormal SD95 631.12
  (same comment as for Tin)
- Manganese [emissions to water, groundwater, long-term]: 6.8824e-5 kg; lognormal SD95 93.104
  (same comment as for Tin)
- Chloride [emissions to water, groundwater]: 0.00010314 kg; lognormal SD95 2.1449
  (same comment as for Tin)
- Tungsten [emissions to water, groundwater]: 2.6106e-10 kg; lognormal SD95 3.5408
  (same comment as for Tin)
- Silicon [emissions to water, groundwater]: 1.435e-6 kg; lognormal SD95 481.84
  (same comment as for Tin)
- Tungsten [emissions to water, groundwater, long-term]: 1.8432e-8 kg; lognormal SD95 1.8487
  (same comment as for Tin)

## Sampling procedure
Disposal model based on observed leachate concentrations in literature. Extrapolated to 60'000 years heeding chemical characteristics. Initial tailings composition from various literature sources.

## Extrapolations
missing values adopted by proxy from lignite spoil

## Uncertainty adjustments
Uncertainty of waste input composition data derived from large literature survey. Mean long-term emissions are the emissions during a generic ecological planning horizon (60'000a). Maximal (upper boundary) long-term emissions represent the complete emissions of all landfilled material.

## Sources
- Dones R., Bauer C., Bolliger R., Burger B., Heck T., Roeder A., Faist Emmenegger M., Frischknecht R., Jungbluth N., Tuchschmid M., 2007, 2007 - LCI energy systems - Dones, Final report ecoinvent data v2.0, 6, Swiss Centre for LCI, PSI, Duebendorf, Villigen and Uster, CH
Dones R., Bauer C., Bolliger R., Burger B., Faist Emmenegger M., Frischknecht R., Heck T., Jungbluth N., Röder A. (2007) Sachbilanzen von Energiesystemen. Final report ecoinvent data v2.0. Volume: 6. Swiss Centre for LCI, PSI. Dübendorf and Villigen, CH.
Type: Measurement on site
Source: CD-ROM
First author: Dones R.
Other authors: Bauer C., Bolliger R., Burger B., Faist Emmenegger M., Frischknecht R., Heck T., Jungbluth N., Röder A.
Year: 2007
Title of anthology: Final report ecoinvent data v2.0
Place of publication: Dübendorf and Villigen, CH
Publisher: Swiss Centre for LCI, PSI
Volume No: 6

## Validation
Proof reading validation: passed.; Other validation: none;
