# Maintenance, passenger car

Dataset: EcoSpold 1, unit process, infrastructure
Functional unit: 1 p
Category: transport systems / road\operations\infrastructure
Geography: RER
Time period: 2000-01 to 2000-12
Generated by: Michael Spielmann
accessRestrictedTo: 0
copyright: true

## General comment
Data are based on a LCI analysis of the Golf A4;

## Included processes
The inventory includes materials used for alteration parts and energy consumption of garages. Rail and road transport of materials is accounted for

## Geography
Data represent German conditions

## Technology
no technologies are specified

## Time period
Data represents maintenance of a modern vehicle

## Reference product
- Maintenance, passenger car [RER]: 1 p
  Europe

## Inputs from technosphere
- Synthetic rubber, at plant [RER]: 116 kg; lognormal SD95 1.24
  (1,4,1,3,1,1); LCI of one car
- Copper, at regional storage [RER]: 0.3 kg; lognormal SD95 1.24
  (1,4,1,3,1,1); LCI of one car
- Electricity, low voltage, production ENTSO-E, at grid: 583 kWh; lognormal SD95 1.24
  (1,4,1,3,1,1); LCI of one car
- Polyethylene, HDPE, granulate, at plant [RER]: 5 kg; lognormal SD95 1.24
  (1,4,1,3,1,1); LCI of one car
- Polypropylene, granulate, at plant [RER]: 6 kg; lognormal SD95 1.24
  (1,4,1,3,1,1); LCI of one car
- Ethylene glycol, at plant [RER]: 2 kg; lognormal SD95 1.24
  (1,4,1,3,1,1); LCI of one car
- Sulphuric acid, liquid, at plant [RER]: 1.4 kg; lognormal SD95 1.24
  (1,4,1,3,1,1); LCI of one car
- Steel, low-alloyed, at plant [RER]: 11 kg; lognormal SD95 1.24
  (1,4,1,3,1,1); LCI of one car
- Transport, freight, lorry, fleet average [RER]: 29.6 tkm; lognormal SD95 2.11
  (4,4,1,3,1,na); standard transport distance
- Ethylene, average, at plant [RER]: 38 kg; lognormal SD95 1.24
  (1,4,1,3,1,1); LCI of one car
- Lead, at regional storage [RER]: 25 kg; lognormal SD95 1.24
  (1,4,1,3,1,1); LCI of one car
- Transport, freight, rail [RER]: 59.3 tkm; lognormal SD95 2.11
  (4,4,1,3,1,na); standard transport distance

## Emissions to nature
- Heat, waste [emissions to air, unspecified]: 2100 MJ; lognormal SD95 1.32
  (4,4,1,3,1,na); standard value

## Sampling procedure
Data is taken from LCI analysis of a Golf A4.

## Extrapolations
Data for Germany is used as an first estimate for Europe

## Sources
- Spielmann M., Bauer C., Dones R., Tuchschmid M., 2007, 2007 - Transport services - Spielmann, Final report ecoinvent Data v2.0, 14, Swiss Centre for LCI, PSI, ESU-services Ltd., Duebendorf, Villigen and Uster, CH
Spielmann M., Dones R; Bauer C. (2007) Life Cycle Inventories of Transport Services. Final report ecoinvent Data v2.0. Volume: 14. Issue: 0. Swiss Centre for LCI, PSI. Dübendorf and Villigen, CH.
Type: Measurement on site
Source: CD-ROM
First author: Spielmann M.
Other authors: Dones R; Bauer C.
Year: 2007
Title of anthology: Final report ecoinvent Data v2.0
Place of publication: Dübendorf and Villigen, CH
Publisher: Swiss Centre for LCI, PSI
Volume No: 14
Issue No: 0

## Validation
Proof reading validation: passed.; Other validation: none;
