# Charging station, 100W

Dataset: EcoSpold 1, unit process
Functional unit: 1 p
Category: transport systems / road\Transformation\Infrastructure
Geography: GLO
Time period: 2020-01 to 2020-12
Generated by: Romain Sacchi
accessRestrictedTo: 0
copyright: False

## General comment
Weight: approx. 0.5 kg. Power output: approx: 100W. Shipping from Guangzhou to Amsterdam (15,900 km). Lorry within Europe (1,000 km)..

## Technology
Uses a fraction of an electric scooter charger from ecoinvent 3.7 as a proxy. Weight: approx. 0.5 kg. Power output: approx: 100W. Shipping from Guangzhou to Amsterdam (15,900 km). Lorry within Europe (1,000 km).

## Time period
Base technology year of 2020

## Reference product
- Charging station, 100W [GLO]: 1 p

## Inputs from technosphere
- Charger, for electric scooter [RER]: 0.167 kg; lognormal SD95 1.10494
  Uncertainty from pedigree matrix: (3, 1, 2, 1, 1, 1)
- Transport, transoceanic container ship [OCE]: 2.65 tkm; lognormal SD95 1.10494
  Uncertainty from pedigree matrix: (3, 1, 2, 1, 1, 1)
- Transport, freight, lorry, 16t-32t gross weight, fleet average [RER]: 0.167 tkm; lognormal SD95 1.10494
  Uncertainty from pedigree matrix: (3, 1, 2, 1, 1, 1)
- Disposal, electronics for control units [RER]: 0.167 kg; lognormal SD95 1.10494
  Uncertainty from pedigree matrix: (3, 1, 2, 1, 1, 1)

## Sources
- Sacchi R., Bauer C., 2023, 2023 - LCI on-road vehicles - Sacchi, PSI, Villigen, CH
doi: 10.5281/ZENODO.5156043
