# Husked nuts harvesting, at farm

Dataset: EcoSpold 1, unit process
Functional unit: 1 kg
Category: agricultural / plant production
Geography: PH
Time period: 1995-01 to 1995-12
Generated by: Roland Hischier
accessRestrictedTo: 0
copyright: true

## General comment
data based on the ECOSOL study of the European surfactant industry;

## Included processes
Land use for the plantation of coconut palm trees and diesel used during the year. No transports are included into this module.

## Geography
Data based on the Phillipines coconut production amount

## Technology
average technology, typical for Philippines conditions in the mid 90s

## Time period
data of published literature

## Reference product
- Husked nuts harvesting, at farm [PH]: 1 kg
  PHILIPPINES

## Inputs from technosphere
- Diesel, burned in building machine, average [CH]: 0.000668 MJ; lognormal SD95 1.31
  (2,5,2,1,1,5); data from ECOSOL study (Literature)

## Inputs from nature
- Transformation, from forest, extensive [resources, land]: 0.0511 m2; lognormal SD95 2.1
  (2,5,2,1,1,5); data from ECOSOL study (Literature)
- Transformation, to permanent crop, fruit, intensive [resources, land]: 0.0511 m2; lognormal SD95 2.1
  (2,5,2,1,1,5); data from ECOSOL study (Literature)
- Occupation, permanent crop, fruit, intensive [resources, land]: 3.63 m2a; lognormal SD95 1.62
  (2,5,2,1,1,5); data from ECOSOL study (Literature)

## Sources
- Zah R., Hischier R., 2007, 2007 - LCI detergents - Zah, Final report ecoinvent data v2.0, 12, Swiss Centre for LCI, Empa - TSL, Duebendorf and St. Gallen, CH
Zah R., Hischier R. (2007) Life Cycle Inventories of Detergents. Final report ecoinvent data v2.0. Volume: 12. Swiss Centre for LCI, Empa - TSL. Dübendorf, CH.
Type: Measurement on site
Source: CD-ROM
First author: Zah R.
Other authors: Hischier R.
Year: 2007
Title of anthology: Final report ecoinvent data v2.0
Place of publication: Dübendorf, CH
Publisher: Swiss Centre for LCI, Empa - TSL
Volume No: 12

## Validation
Proof reading validation: Passed.; Other validation: none;
