# Phosphoric acid, fertiliser grade, 70% in H2O, at plant

Dataset: EcoSpold 1, unit process
Functional unit: 1 kg
Category: chemicals / acids (inorganic)
Geography: US
Time period: 2000-01 to 2000-12
Production volume: Capacity in North America 11.85 Mt P2O5 in 1997, therof 50-60% in Florida.
Share of production covered: 30 %
Generated by: Alex Primas
accessRestrictedTo: 0
copyright: true

## General comment
The process describes the production of phosphoric acid from wet phosphate rock with the dyhydrate process in Florida. As products of the multi output process fertiliser grade phosphoric acid (impure with 51% P2O5) and dilute fluosilic acid (22% in H2O) was considered.;

## Included processes
Raw materials, processing chemicals and processing energy, direct emissions to air from process, emissions to air and water from phosphogypsum storage, emission of radioactive substances from gypsum to air and water, land use for phosphogypsum storage and processing ponds, transport of raw materials to the plant, estimation for process infrastructure . The process includes data on emissions and land use from phosphogypsum storage.

## Geography
Data for amount of phosphoric acid production from statisitcs of IFA (International Fertiliser Agency). Data on phosphoric acid process from various studies made in Florida and from different literature sources concerning also other locations other than U.S. Data for processes used in Florida extrapolated for the whole United States. Only production from wet rock considered as in the mayority of the sites in Florida used. Data for production of fluosilic acid from one european study (EFMA). This data was was used for the whole U.S. production.

## Technology
Data refers to wet-phosphoric acid production from wet phosphate rock by the dihydrate process. Technology with cooling ponds and gypsum stacks as used in Florida was applied. Balanced water management assumed.

## Reference product
- Phosphoric acid, fertiliser grade, 70% in H2O, at plant [US]: 1 kg
  UNITED STATES

## Inputs from technosphere
- Transport, freight, lorry, fleet average [RER]: 0.17185 tkm; lognormal SD95 2.07
  (3,4,1,3,1,5); From plant location obtained, split uncertain
- Transport, freight, rail [RER]: 0.34272 tkm; lognormal SD95 2.12
  (3,4,1,3,3,5); From plant location obtained, split uncertain
- Phosphoric acid plant, fertiliser grade [US]: 3.054e-10 p; lognormal SD95 3.38
  (4,5,1,5,4,5); Data from a small plant in Jordania
- Quicklime, milled, loose, at plant [CH]: 0.081113 kg; lognormal SD95 1.35
  (2,3,3,5,3,5); Data for an average process from literature
- Heat, heavy fuel oil, at industrial furnace 1MW [CH]: 0.11784 MJ; lognormal SD95 1.27
  (3,2,2,3,3,4); Average of different literature, split is uncertain
- Phosphate rock, as P2O5, beneficiated, wet, at plant [US]: 0.75418 kg; lognormal SD95 1.14
  (1,3,3,1,1,3); Data for wet rock process, assumptions
- Heat, natural gas, at industrial furnace 1MW [CH]: 3.00492 MJ; lognormal SD95 1.27
  (3,2,2,3,3,4); Average of different literature, split is uncertain
- Sulphuric acid, liquid, at plant [RER]: 2.18004 kg; lognormal SD95 1.4
  (2,4,4,3,3,5); Data for a specific wet rock process, assunptions
- Heat, at hard coal industrial furnace 1-10MW [RER]: 0.3928 MJ; lognormal SD95 1.27
  (3,2,2,3,3,4); Average of different literature, split is uncertain
- Electricity, medium voltage, production ENTSO-E, at grid: 0.13552 kWh; lognormal SD95 1.14
  (2,1,1,5,1,3); Average value for U.S. production used

## Inputs from nature
- Water, well [resources, in water]: 0.0025827 m3; lognormal SD95 1.33
  (2,3,4,1,3,4); Data for a specific wet rock process, assumptions
- Transformation, to unknown [resources, land]: 0.00035352 m2; lognormal SD95 2.8
  (4,5,1,1,5,5); Estimated from weak data, assumptions
- Occupation, construction site [resources, land]: 0.48904 m2a; lognormal SD95 1.14
  (2,1,1,5,1,3); Calculated from electricity use
- Transformation, from industrial area, built up [resources, land]: 0.00016694 m2; lognormal SD95 2.37
  (2,5,4,1,4,5); Related process data used, uncertain distribution
- Occupation, industrial area, vegetation [resources, land]: 5.1948e-5 m2a; lognormal SD95 2.77
  (2,5,2,5,5,5); large variation possible, average value used
- Transformation, to industrial area, vegetation [resources, land]: 0.0001473 m2; lognormal SD95 1.93
  (2,5,4,1,4,5); Related process data used, uncertain distribution
- Transformation, to industrial area, built up [resources, land]: 0.00035352 m2; lognormal SD95 2.8
  (4,5,1,1,5,5); Estimated from weak data, assumptions
- Transformation, from industrial area, vegetation [resources, land]: 0.00028478 m2; lognormal SD95 2.8
  (4,5,1,1,5,5); Estimated from weak data, assumptions
- Transformation, from pasture, man made [resources, land]: 0.00028478 m2; lognormal SD95 2.8
  (4,5,1,1,5,5); Estimated from weak data, assumptions
- Transformation, from unknown [resources, land]: 3.5352e-6 m2; lognormal SD95 2.8
  (4,5,1,1,5,5); Estimated from weak data, assumptions
- Transformation, to pasture, man made [resources, land]: 3.5352e-6 m2; lognormal SD95 2.8
  (4,5,1,1,5,5); Estimated from weak data, assumptions

## Emissions to nature
- Polonium-210 [emissions to air, low. pop.]: 0.00048413 kBq; lognormal SD95 3.74
  (3,4,1,2,5,5); Data from one survey, distribution uncertain
- Uranium-238 [emissions to water, groundwater]: 0.00057938 kBq; lognormal SD95 3.74
  (3,4,1,2,5,5); Data from one survey, distribution uncertain
- Thorium-228 [emissions to water, groundwater]: 1.3846e-5 kBq; lognormal SD95 3.74
  (3,4,1,2,5,5); Data from one survey, distribution uncertain
- Sulfate [emissions to water, groundwater]: 0.00010409 kg; lognormal SD95 1.59
  (3,4,1,1,1,5); Estimation based on 1 Source, calculated
- Cadmium [emissions to water, groundwater]: 1.5123e-9 kg; lognormal SD95 5.08
  (3,4,1,1,1,5); Estimation based on 1 Source, calculated
- Radium-226 [emissions to water, groundwater]: 0.0012668 kBq; lognormal SD95 3.74
  (3,4,1,2,5,5); Data from one survey, distribution uncertain
- Particulates, > 10 um [emissions to air, low. pop.]: 0.0001473 kg; lognormal SD95 1.93
  (2,5,4,1,4,5); Related process data used, uncertain distribution
- Copper [emissions to water, groundwater]: 3.5745e-9 kg; lognormal SD95 5.08
  (3,4,1,1,1,5); Estimation based on 1 Source, calculated
- Potassium-40 [emissions to air, low. pop.]: 2.7692e-5 kBq; lognormal SD95 3.74
  (3,4,1,2,5,5); Data from one survey, distribution uncertain
- Nickel [emissions to water, groundwater]: 5.9902e-10 kg; lognormal SD95 5.08
  (3,4,1,1,1,5); Estimation based on 1 Source, calculated
- Thorium-228 [emissions to air, low. pop.]: 6.9133e-6 kBq; lognormal SD95 3.74
  (3,4,1,2,5,5); Data from one survey, distribution uncertain
- Potassium-40 [emissions to water, groundwater]: 0.0001365 kBq; lognormal SD95 3.74
  (3,4,1,2,5,5); Data from one survey, distribution uncertain
- Radon-222 [emissions to air, low. pop.]: 2.83798 kBq; lognormal SD95 3.74
  (3,4,1,2,5,5); Data from one survey, distribution uncertain
- Fluoride [emissions to water, groundwater]: 2.0622e-7 kg; lognormal SD95 1.92
  (4,5,1,1,4,5); Estimation based on 1 Source, calculated
- Lead-210 [emissions to water, groundwater]: 0.0011293 kBq; lognormal SD95 3.74
  (3,4,1,2,5,5); Data from one survey, distribution uncertain
- Lead-210 [emissions to air, low. pop.]: 0.00027692 kBq; lognormal SD95 3.74
  (3,4,1,2,5,5); Data from one survey, distribution uncertain
- Hydrogen fluoride [emissions to air, low. pop.]: 5.1948e-5 kg; lognormal SD95 2.77
  (2,5,2,5,5,5); large variation possible, average value used
- Heat, waste [emissions to air, low. pop.]: 0.48904 MJ; lognormal SD95 1.14
  (2,1,1,5,1,3); Calculated from electricity use
- Silicon tetrafluoride [emissions to air, low. pop.]: 3.5352e-6 kg; lognormal SD95 2.8
  (4,5,1,1,5,5); Estimated from weak data, assumptions
- Zinc [emissions to water, groundwater]: 3.8887e-9 kg; lognormal SD95 5.08
  (3,4,1,1,1,5); Estimation based on 1 Source, calculated
- Chromium [emissions to water, groundwater]: 9.329e-11 kg; lognormal SD95 5.08
  (3,4,1,1,1,5); Estimation based on 1 Source, calculated
- Lead [emissions to water, groundwater]: 1.473e-10 kg; lognormal SD95 5.08
  (3,4,1,1,1,5); Estimation based on 1 Source, calculated
- Particulates, < 2.5 um [emissions to air, low. pop.]: 0.00011784 kg; lognormal SD95 3.37
  (2,5,4,1,4,5); Related process data used, uncertain distribution
- Polonium-210 [emissions to water, groundwater]: 0.0017185 kBq; lognormal SD95 3.74
  (3,4,1,2,5,5); Data from one survey, distribution uncertain
- Calcium [emissions to water, groundwater]: 4.6154e-5 kg; lognormal SD95 1.59
  (3,4,1,1,1,5); Estimation based on 1 Source, calculated
- Particulates, > 2.5 um, and < 10um [emissions to air, low. pop.]: 0.00016694 kg; lognormal SD95 2.37
  (2,5,4,1,4,5); Related process data used, uncertain distribution
- Phosphate [emissions to water, groundwater]: 2.8576e-6 kg; lognormal SD95 1.59
  (3,4,1,1,1,5); Estimation based on 1 Source, calculated
- Manganese [emissions to water, groundwater]: 1.2864e-9 kg; lognormal SD95 5.08
  (3,4,1,1,1,5); Estimation based on 1 Source, calculated
- Radium-226 [emissions to air, low. pop.]: 0.00031129 kBq; lognormal SD95 3.74
  (3,4,1,2,5,5); Data from one survey, distribution uncertain
- Uranium-238 [emissions to air, low. pop.]: 2.4157e-5 kBq; lognormal SD95 3.74
  (3,4,1,2,5,5); Data from one survey, distribution uncertain
- Arsenic [emissions to water, groundwater]: 7.2668e-10 kg; lognormal SD95 5.08
  (3,4,1,1,1,5); Estimation based on 1 Source, calculated
- Water [emissions to water, unspecified]: 2.32443 kg; lognormal SD95 2.5196
  (5,5,5,5,5,BU:1.05); All uncertainty-values set to 5.0 by default. Balance of input water

## Sampling procedure
Production assessed with mixed data from the phosphoric acid production in Florida. Therefore it is difficult to give a precise nuber for the representativity of the data. It was assumed that the data cover about 30-50% of the U.S. production. The total amount of fluosilic acid produced is not known. The production was assessed with weak data from one source. Therefore no representativity of the data can be given for fluosilic acid production.

## Sources
- Althaus H.-J., Chudacoff M., Hellweg S., Hischier R., Jungbluth N., Osses M., Primas A., 2007, 2007 - LCI chemicals - Althaus, Final report ecoinvent data v2.0, 8, Swiss Centre for LCI, Empa - TSL, ETH, ESU-services Ltd., Chudacoff Oekoscience, Duebendorf, CH
Althaus H.-J., Chudacoff M., Hischier R., Jungbluth N., Osses M., Primas A. (2007) Life Cycle Inventories of Chemicals. Final report ecoinvent data v2.0. Volume: 8. Swiss Centre for LCI, Empa - TSL. Dübendorf, CH.
Type: Measurement on site
Source: CD-ROM
First author: Althaus H.-J.
Other authors: Chudacoff M., Hischier R., Jungbluth N., Osses M., Primas A.
Year: 2007
Title of anthology: Final report ecoinvent data v2.0
Place of publication: Dübendorf, CH
Publisher: Swiss Centre for LCI, Empa - TSL
Volume No: 8

## Validation
Proof reading validation: Passed.; Other validation: none;
