# Treatment, glass production effluent, to wastewater treatment, class 2

Dataset: EcoSpold 1, unit process
Functional unit: 1 m3
Category: wastewater treatment / unspecified
Geography: CH
Time period: 2000-01 to 2000-12
Generated by: Gabor Doka
accessRestrictedTo: 0
copyright: true

## General comment
Wastewater purified in a moderatly large municipal wastewater treatment plant (capacity class 2), with an average capacity size of 71100 per-captia-equivalents PCE. \nWastewater contains (in kg/m3): COD: 0.115 (GSD=123.5%);

## Included processes
Infrastructure materials for municipal wastewater treatment plant, transports, dismantling. Land use burdens.

## Technology
Three stage wastewater treatment (mechanical, biological, chemical) including sludge digestion (fermentation) according to the average technology in Switzerland

## Reference product
- Treatment, glass production effluent, to wastewater treatment, class 2 [CH]: 1 m3
  SWITZERLAND

## Inputs from technosphere
- Chromium oxide, flakes, at plant [RER]: 9.7591e-9 kg; lognormal SD95 4.3356
  burden from sludge incineration. Uncertainty calculated from wastewater composition and treatment model
- Disposal, plastics, mixture, 15.3% water, to municipal incineration [CH]: 0.0155 kg; lognormal SD95 1.07
  direct wastewater treatment plant burden. Uncertainty calculated from wastewater composition and treatment model
- Process-specific burdens, municipal waste incineration [CH]: 0.052217 kg; lognormal SD95 1.165
  (same comment as for Chromium oxide, flakes, at plant)
- Iron (III) chloride, 40% in H2O, at plant [CH]: 6.0661e-5 kg; lognormal SD95 2.463
  direct wastewater treatment plant burden plus burden from sludge incineration. Uncertainty calculated from wastewater composition and treatment model
- Wastewater treatment plant, class 2 [CH]: 1.9883e-9 p; lognormal SD95 1
  uncertainty heeded in exchanges of the module
- Process-specific burdens, slag compartment [CH]: 0.0025877 kg; lognormal SD95 1.4438
  (same comment as for Chromium oxide, flakes, at plant)
- Slurry spreading, by vacuum tanker [CH]: 0.0001548 m3; lognormal SD95 1.0947
  burden from sludge spreading. Uncertainty calculated from wastewater composition and treatment model
- Municipal waste incineration plant [CH]: 1.3054e-11 p; lognormal SD95 1.165
  (same comment as for Chromium oxide, flakes, at plant)
- Heat from waste, at municipal waste incineration plant [CH]: 0.043794 MJ; lognormal SD95 1.1739
  (same comment as for Chromium oxide, flakes, at plant)
- Quicklime, milled, packed, at plant [CH]: 1.505e-7 kg; lognormal SD95 1.923
  (same comment as for Chromium oxide, flakes, at plant)
- Transport, freight, lorry, 16t-32t gross weight, fleet average [CH]: 0.0046268 tkm; lognormal SD95 1.0697
  (same comment as for Iron (III) chloride, 40% in H2O, at plant)
- Disposal, paper, 11.2% water, to municipal incineration [CH]: 0.0155 kg; lognormal SD95 1.07
  (same comment as for Disposal, plastics, mixture, 15.3% water, to municipal incineration)
- Titanium dioxide, production mix, at plant [RER]: 4.7819e-7 kg; lognormal SD95 4.3356
  (same comment as for Chromium oxide, flakes, at plant)
- Sewer grid, class 2 [CH]: 1.6832e-7 km; lognormal SD95 1
  uncertainty heeded in exchanges of the module
- Hydrochloric acid, 30% in H2O, at plant [RER]: 3.0014e-7 kg; lognormal SD95 2.1669
  (same comment as for Chromium oxide, flakes, at plant)
- Electricity from waste, at municipal waste incineration plant [CH]: 0.0075072 kWh; lognormal SD95 3.8132
  (same comment as for Chromium oxide, flakes, at plant)
- Cement, unspecified, at plant [CH]: 0.00056413 kg; lognormal SD95 1.5179
  (same comment as for Chromium oxide, flakes, at plant)
- Chemicals inorganic, at plant [GLO]: 5.0023e-7 kg; lognormal SD95 2.1669
  (same comment as for Chromium oxide, flakes, at plant)
- Process-specific burdens, residual material landfill [CH]: 0.0014103 kg; lognormal SD95 1.4495
  (same comment as for Chromium oxide, flakes, at plant)
- Ammonia, liquid, at regional storehouse [CH]: 1.6706e-5 kg; lognormal SD95 2.5265
  (same comment as for Chromium oxide, flakes, at plant)
- Slag compartment [CH]: 4.6004e-12 p; lognormal SD95 1.4438
  (same comment as for Chromium oxide, flakes, at plant)
- Chemicals organic, at plant [GLO]: 4.6881e-5 kg; lognormal SD95 5.1793
  (same comment as for Chromium oxide, flakes, at plant)
- Transport, freight, rail [RER]: 0.00037729 tkm; lognormal SD95 2.8598
  (same comment as for Iron (III) chloride, 40% in H2O, at plant)
- Electricity, low voltage, at grid [CH]: 0.10649 kWh; lognormal SD95 1.3563
  (same comment as for Disposal, plastics, mixture, 15.3% water, to municipal incineration)
- Natural gas, burned in industrial furnace 1MW [CH]: 0.0016292 MJ; lognormal SD95 2.5265
  (same comment as for Chromium oxide, flakes, at plant)
- Disposal, cement, hydrated, 0% water, to residual material landfill [CH]: 0.0014103 kg; lognormal SD95 1.5179
  (same comment as for Chromium oxide, flakes, at plant)
- Residual material landfill facility [CH]: 2.9382e-12 p; lognormal SD95 1.4495
  (same comment as for Chromium oxide, flakes, at plant)
- Sodium hydroxide, 50% in H2O, production mix, at plant [RER]: 8.3011e-7 kg; lognormal SD95 1.9032
  (same comment as for Chromium oxide, flakes, at plant)

## Emissions to nature
- Nickel [emissions to water, groundwater, long-term]: 0.000113 kg; lognormal SD95 5.1432
  emission from sludge incineration. Uncertainty calculated from wastewater composition and treatment model
- Antimony [emissions to water, groundwater, long-term]: 5.7903e-5 kg; lognormal SD95 5.1776
  (same comment as for Nickel)
- Chromium [emissions to air, high. pop.]: 1.1166e-11 kg; lognormal SD95 5.7509
  direct digester gas emission plus emission from sludge incineration. Uncertainty calculated from wastewater composition and treatment model
- Ammonia [emissions to air, high. pop.]: 8.2564e-5 kg; lognormal SD95 2.8032
  direct digester gas emission plus emission from sludge incineration plus emission from sludge spreading. Uncertainty calculated from wastewater composition and treatment model
- Tin [emissions to water, groundwater, long-term]: 8.9659e-5 kg; lognormal SD95 9.1283
  (same comment as for Nickel)
- Antimony [emissions to air, high. pop.]: 1.4775e-8 kg; lognormal SD95 9.7642
  (same comment as for Chromium)
- Sulfate [emissions to water, river]: 1.0173 kg; lognormal SD95 1.5212
  sewer overload discharge plus direct wastewater treatment plant emission plus emission from sludge incineration. Uncertainty calculated from wastewater composition and treatment model
- Copper [emissions to soil, agricultural]: 0.00014322 kg; lognormal SD95 5.1623
  emission from sludge spreading. Uncertainty calculated from wastewater composition and treatment model
- Boron [emissions to air, high. pop.]: 1.9001e-5 kg; lognormal SD95 5.1583
  (same comment as for Chromium)
- COD, Chemical Oxygen Demand [emissions to water, river]: 0.022285 kg; lognormal SD95 1.4957
  (same comment as for Sulfate)
- Tin [emissions to water, river]: 0.00020917 kg; lognormal SD95 4.8296
  (same comment as for Sulfate)
- Chromium [emissions to soil, agricultural]: 9.5235e-5 kg; lognormal SD95 5.1532
  (same comment as for Copper)
- Methane, fossil [emissions to air, high. pop.]: 0.00037923 kg; lognormal SD95 1.8968
  (same comment as for Nickel)
- Cadmium [emissions to water, river]: 2.5382e-5 kg; lognormal SD95 4.8498
  (same comment as for Sulfate)
- Heat, waste [emissions to air, high. pop.]: 0.80389 MJ; lognormal SD95 1.3552
  direct wastewater treatment plant emission plus emission from sludge incineration. Uncertainty calculated from wastewater composition and treatment model
- Copper [emissions to water, river]: 0.0001297 kg; lognormal SD95 4.7552
  (same comment as for Sulfate)
- Fluoride [emissions to water, river]: 0.03 kg; lognormal SD95 4.9033
  (same comment as for Sulfate)
- Boron [emissions to soil, agricultural]: 9.9858e-5 kg; lognormal SD95 5.1532
  (same comment as for Copper)
- Zinc [emissions to air, high. pop.]: 3.4609e-9 kg; lognormal SD95 5.4447
  (same comment as for Chromium)
- Cadmium [emissions to water, groundwater, long-term]: 1.5153e-7 kg; lognormal SD95 188.29
  (same comment as for Nickel)
- Antimony [emissions to soil, agricultural]: 5.7135e-5 kg; lognormal SD95 5.1532
  (same comment as for Copper)
- BOD5, Biological Oxygen Demand [emissions to water, groundwater, long-term]: 6.4642e-5 kg; lognormal SD95 1.7377
  (same comment as for Nickel)
- Nitrate [emissions to water, river]: 0.016818 kg; lognormal SD95 1.5311
  (same comment as for Sulfate)
- Cyanide [emissions to air, high. pop.]: 2.9802e-7 kg; lognormal SD95 2.6488
  (same comment as for Nickel)
- Lead [emissions to water, groundwater, long-term]: 1.9445e-5 kg; lognormal SD95 189.62
  (same comment as for Nickel)
- BOD5, Biological Oxygen Demand [emissions to water, river]: 0.0073186 kg; lognormal SD95 1.1573
  (same comment as for Sulfate)
- Boron [emissions to water, groundwater, long-term]: 0.00010437 kg; lognormal SD95 5.1575
  (same comment as for Nickel)
- Chromium VI [emissions to water, river]: 0.00025867 kg; lognormal SD95 4.7351
  (same comment as for Sulfate)
- Zinc [emissions to water, river]: 0.00015459 kg; lognormal SD95 4.7854
  (same comment as for Sulfate)
- DOC, Dissolved Organic Carbon [emissions to water, groundwater, long-term]: 7.82e-5 kg; lognormal SD95 1.7377
  (same comment as for Nickel)
- NMVOC, non-methane volatile organic compounds, unspecified origin [emissions to air, high. pop.]: 1.7228e-6 kg; lognormal SD95 2.547
  direct digester gas emission. Uncertainty calculated from wastewater composition and treatment model
- Arsenic [emissions to water, river]: 0.00025307 kg; lognormal SD95 4.5015
  (same comment as for Sulfate)
- Nitrate [emissions to water, groundwater, long-term]: 1.1895e-5 kg; lognormal SD95 1.7748
  (same comment as for Nickel)
- Nitrogen [emissions to water, river]: 0.0002543 kg; lognormal SD95 1.6185
  direct wastewater treatment plant emission. Uncertainty calculated from wastewater composition and treatment model
- Arsenic [emissions to soil, agricultural]: 2.5038e-5 kg; lognormal SD95 5.1432
  (same comment as for Copper)
- DOC, Dissolved Organic Carbon [emissions to water, river]: 0.0055771 kg; lognormal SD95 1.478
  (same comment as for Sulfate)
- Copper [emissions to air, high. pop.]: 1.6764e-9 kg; lognormal SD95 5.4925
  (same comment as for Chromium)
- TOC, Total Organic Carbon [emissions to water, river]: 0.0059707 kg; lognormal SD95 1.1232
  (same comment as for Sulfate)
- Carbon monoxide, fossil [emissions to air, high. pop.]: 0.00012273 kg; lognormal SD95 2.0019
  (same comment as for Nickel)
- Heat, waste [emissions to water, river]: 0.86085 MJ; lognormal SD95 1.3984
  (same comment as for Heat, waste)
- COD, Chemical Oxygen Demand [emissions to water, groundwater, long-term]: 0.00019762 kg; lognormal SD95 1.7377
  (same comment as for Nickel)
- Cadmium [emissions to air, high. pop.]: 8.4265e-10 kg; lognormal SD95 5.3103
  (same comment as for Chromium)
- Tin [emissions to air, high. pop.]: 2.3665e-7 kg; lognormal SD95 5.2685
  (same comment as for Chromium)
- Carbon dioxide, fossil [emissions to air, high. pop.]: 0.14204 kg; lognormal SD95 1.3627
  (same comment as for Nickel)
- Cadmium [emissions to soil, agricultural]: 9.5235e-6 kg; lognormal SD95 5.1532
  (same comment as for Copper)
- Zinc [emissions to water, groundwater, long-term]: 3.2845e-6 kg; lognormal SD95 107.44
  (same comment as for Nickel)
- Barium [emissions to air, high. pop.]: 1.7294e-6 kg; lognormal SD95 5.2834
  (same comment as for Chromium)
- Lead [emissions to soil, agricultural]: 0.00017212 kg; lognormal SD95 5.168
  (same comment as for Copper)
- Barium [emissions to water, groundwater, long-term]: 0.0015354 kg; lognormal SD95 5.7965
  (same comment as for Nickel)
- Antimony [emissions to water, river]: 0.0001837 kg; lognormal SD95 4.021
  (same comment as for Sulfate)
- Copper [emissions to water, groundwater, long-term]: 0.00018357 kg; lognormal SD95 5.253
  (same comment as for Nickel)
- TOC, Total Organic Carbon [emissions to water, groundwater, long-term]: 7.82e-5 kg; lognormal SD95 1.7377
  (same comment as for Nickel)
- Arsenic [emissions to air, high. pop.]: 8.4456e-8 kg; lognormal SD95 5.2891
  (same comment as for Chromium)
- Chromium VI [emissions to water, groundwater, long-term]: 1.5986e-5 kg; lognormal SD95 7.7861
  (same comment as for Nickel)
- Barium [emissions to soil, agricultural]: 0.0010906 kg; lognormal SD95 5.1699
  (same comment as for Copper)
- Arsenic [emissions to water, groundwater, long-term]: 2.1804e-5 kg; lognormal SD95 5.1345
  (same comment as for Nickel)
- Tin [emissions to soil, agricultural]: 0.00011248 kg; lognormal SD95 5.1564
  (same comment as for Copper)
- Barium [emissions to water, river]: 0.00018016 kg; lognormal SD95 4.2904
  (same comment as for Sulfate)
- Chromium [emissions to water, river]: 4.813e-7 kg; lognormal SD95 5.2327
  (same comment as for Nickel)
- Nickel [emissions to air, high. pop.]: 5.2088e-12 kg; lognormal SD95 5.7771
  (same comment as for Chromium)
- Carbon [emissions to soil, agricultural]: 0.0050503 kg; lognormal SD95 1.6868
  (same comment as for Copper)
- Boron [emissions to water, river]: 0.00029083 kg; lognormal SD95 4.4056
  (same comment as for Sulfate)
- Dinitrogen monoxide [emissions to air, high. pop.]: 2.7795e-5 kg; lognormal SD95 1.4846
  direct wastewater treatment plant emission plus direct digester gas emission plus emission from sludge incineration plus emission from sludge spreading. Uncertainty calculated from wastewater composition and treatment model
- Lead [emissions to air, high. pop.]: 1.0147e-8 kg; lognormal SD95 5.3986
  (same comment as for Chromium)
- Zinc [emissions to soil, agricultural]: 0.0001336 kg; lognormal SD95 5.1605
  (same comment as for Copper)
- Lead [emissions to water, river]: 5.4958e-5 kg; lognormal SD95 4.5003
  (same comment as for Sulfate)
- Nitrogen oxides [emissions to air, high. pop.]: 0.00016227 kg; lognormal SD95 1.7453
  (same comment as for Chromium)
- Nickel [emissions to soil, agricultural]: 7.6111e-5 kg; lognormal SD95 5.1496
  (same comment as for Copper)
- Nickel [emissions to water, river]: 0.00030328 kg; lognormal SD95 4.8661
  (same comment as for Sulfate)
- Ammonium, ion [emissions to water, river]: 0.0037047 kg; lognormal SD95 1.5357
  (same comment as for Nitrogen)

## Sources
- Doka G., 2009, 2009 - LCI waste treatment services - Doka, Final report ecoinvent data v2.1, 13, Swiss Centre for LCI, Doka LCA, Duebendorf and St. Gallen, CH
Doka G. (2008) Life Cycle Inventories of Waste Treatment Services. Final report ecoinvent data v2.1. Volume: 13. Issue: 0. Swiss Centre for LCI, Empa - TSL. Dübendorf, CH.
Type: Measurement on site
Source: CD-ROM
First author: Doka G.
Year: 2008
Title of anthology: Final report ecoinvent data v2.1
Place of publication: Dübendorf, CH
Publisher: Swiss Centre for LCI, Empa - TSL
Volume No: 13
Issue No: 0

## Validation
Proof reading validation: passed.; Other validation: none;
