# Hydrogen production, gaseous, 30 bar, from PEM electrolysis, from autonomous hybrid plant

Dataset: EcoSpold 1, unit process
Functional unit: 1 kg
Category: fuels / synthetic\transformation
Geography: MA
Time period: 2024-01 to 2024-01
Generated by: Romain Sacchi
accessRestrictedTo: 0
copyright: true

## General comment
1 kg H2 produced using a PEM electrolyzer, produced in a hybrid solar PV/wind plant in Central Morocco (Latitude: 28.7, Longitude: -9.54). The hybrid plant has a lifetime of 30 years and produces 2.35 kilotons of hydrogen annually. 0.24 percent of the hydrogen mass produced is lost. 26.21 MW electrolyzer installation, with a capacity factor of 57%. 13 2-MW turbines are considered, for a total capacity of 26,272 kW, with a lifetime of 20 years and a 50% load factor and a curtailment factor of 2.3%. 28 570-kWp ground mounted PV units are considered, with a lifetime of 30 years, and a 22% load factor and a curtailment factor of 13.8%. A NMC stationary battery of 862 kWh of capacity is required, with a lifetime of 13 years. A water requirement of 24 liters per kg H2 is assumed, considering losses due to cleaning, cooling, but also significant evaporation -- see Tonelli et al., 2023. Stack lifetime [hours] 45'000 IndWEDe Stack lifetime [years] 5.5 IndWEDe, based on the lower estimate of 8,000 hours per year, from manufacturers' data. Balance of Plant lifetime [years]: Same as system. System lifetime [years]: 20 IndWEDe. Stack replacement over system's lifetime, excluding initial unit [unit] 3 Calculated. Water demand [kg water/kg H2] 8.9, corrected to 124 to represent extreme climatic consitions. Electricity demand [kWh/kg H2]: 54 IndWEDe. Electrical Efficiency [%, based on H2 LHV]: 61.7%: Productivity [kg H2/hour]: 18.52: From row above. Operating temperature [°C] 50-80 Manufacturers' data. Operating pressure [bar]: ~30 IndWEDe Produced amount over system's lifetime years [kg H2] 70.5 million tons.

## Reference product
- Hydrogen production, gaseous, 30 bar, from PEM electrolysis, from autonomous hybrid plant [MA]: 1 kg
  not defined

## Inputs from technosphere
- 570 kWp open ground installation, multi-Si, on open ground [ES]: 4.293e-7 p; normal SD95 0.06069
  Using 24,596 kW onshore wind system with lifetime of 20 years.
- Electrolyzer production, 1MWe, PEM, Balance of Plant [RER]: 5.568e-7 p; normal SD95 0.06069
- Battery, rechargeable, prismatic, LiNCM, at plant [NO]: 0.0001895 kg; normal SD95 0.06069
  Using 862 kWh of storage capacity, with lifetime of 13 years. System-level energy density of 0.14 kWh/kg.
- Wind turbine 5MW, offshore, moving parts [RER]: 8.71e-8 p; normal SD95 0.06069
  Using 24,596 kW onshore wind system with lifetime of 20 years.
- Treatment of fuel cell stack, 1MWe, PEM [RER]: 1.591e-6 p; lognormal SD95 1.637
  {2;4;1;3;3;5;1.5;}
- Treatment of fuel cell balance of plant, 1MWe, PEM [RER]: 5.568e-7 p; lognormal SD95 1.637
  {2;4;1;3;3;5;1.5;}
- Electrolyzer production, 1MWe, PEM, Stack [RER]: 1.591e-6 p; lognormal SD95 1.637
  {2;4;1;3;3;5;1.5;}
- Wind turbine 5MW, offshore, tower [RER]: 8.71e-8 p; normal SD95 0.06069
  Using 26,272 kW onshore wind system with lifetime of 20 years.
- Wind turbine 5MW, offshore, jacket substructure [RER]: 8.71e-8 p; normal SD95 0.06069
  Using 26,272 kW onshore wind system with lifetime of 20 years.
- Water, deionised, at plant [CH]: 24 kg; lognormal SD95 1.637
  A perfect reaction of H2O results in 1 kg H2 and 8 kg O2, and needs 9 kg H2O, however, considering some losses we assume 24 kg H2O (Tonelli et al., 2023, preprint). {2;4;1;3;3;5;1.5;}

## Inputs from nature
- Occupation, unspecified, natural (non-use) [resources, land]: 3.83e-5 m2a; lognormal SD95 1.637
  {2;4;1;3;3;5;1.5;}
- Transformation, from unspecified, natural (non-use) [resources, land]: 1.277e-6 m2; lognormal SD95 1.637
  {2;4;1;3;3;5;1.5;}
- Transformation, to industrial area, vegetation [resources, land]: 1.277e-6 m2; lognormal SD95 1.637
  {2;4;1;3;3;5;1.5;}
- Energy, solar, converted [resources, in air]: 42.95 MJ; lognormal SD95 1.329
  {2;4;1;3;3;5;1.05;}
- Energy, kinetic (in wind), converted [resources, in air]: 165.8 MJ; lognormal SD95 1.329
  {2;4;1;3;3;5;1.05;}

## Emissions to nature
- Hydrogen [emissions to air, unspecified]: 0.0024 kg; lognormal SD95 1.329
  Hydrogen loss. {2;4;1;3;3;5;1.05;}

## Sampling procedure
Sampling procedure: Literature data

## Sources
- Sacchi R., Bauer C., 2024, 2024 - LCA power-to-X in residential sector - Sacchi, Project report, PSI, Villigen, CH

## Validation
Proof reading validation: Passed, Other validation: none, Validator: Rolf Frischknecht, Telephone: 0041 44 940 61 91, E-mail: frischknecht@treeze.ch, Company: treeze, Country: CH
