# xxx Disposal, building, door, inner, wood, to final disposal

Dataset: EcoSpold 1, unit process
Functional unit: 1 m2
Category: waste treatment, obsolete / construction waste, obsolete
Geography: CH
Time period: 2005-01 to 2005-12
Generated by: Martin Lehmann
accessRestrictedTo: 0
copyright: true

## General comment
The dataset can be applied for a standard inner door (wood) disposal process in Switzerland. ;

## Included processes
The dataset describes the disposal of a wood-aluminium inner door in a municipal incineration. All the materials (steel parts, aluminium, rubber, plastics, paints and wood) are disposed in a municipal solid waste incineration.

## Technology
The technology in this dataset represents standard incineration technology in Europe.

## Reference product
- xxx Disposal, building, door, inner, wood, to final disposal [CH]: 1 m2
  SWITZERLAND

## Inputs from technosphere
- Disposal, building, fibre board, to final disposal [CH]: 17.4 kg; lognormal SD95 1.22
  (1,3,4,3,1,1,6)
- Disposal, wood untreated, 20% water, to municipal incineration [CH]: 7.57 kg; lognormal SD95 1.22
  (1,3,4,3,1,1,6)
- Disposal, rubber, unspecified, 0% water, to municipal incineration [CH]: 0.142 kg; lognormal SD95 1.22
  (1,3,4,3,1,1,6)
- Disposal, aluminium, 0% water, to municipal incineration [CH]: 0.152 kg; lognormal SD95 1.22
  (1,3,4,3,1,1,6)
- Disposal, emulsion paint, 0% water, to municipal incineration [CH]: 1.12 kg; lognormal SD95 1.22
  (1,3,4,3,1,1,6)
- Transport, freight, lorry, 16t-32t gross weight, fleet average [CH]: 1.38 tkm; lognormal SD95 2.05
  (1,3,1,3,1,5,5)
- Disposal, steel, 0% water, to municipal incineration [CH]: 0.477 kg; lognormal SD95 1.22
  (1,3,4,3,1,1,6)
- Disposal, plastics, mixture, 15.3% water, to municipal incineration [CH]: 0.747 kg; lognormal SD95 1.22
  (1,3,4,3,1,1,6)

## Sampling procedure
Calculation from waste composition

## Extrapolations
see Geography

## Sources
- Kellenberger D., Althaus H.-J., Jungbluth N., Kuenniger T., Lehmann M., Thalmann P., 2007, 2007 - LCI building products - Kellenberger, Final report ecoinvent data v2.0, 7, Swiss Centre for LCI, Empa - TSL, ESU-services Ltd., Bau- und Umweltchimie, Duebendorf, CH
Kellenberger D., Althaus H.-J., Jungbluth N., Künniger T. (2007) Life Cycle Inventories of Building Products. Final report ecoinvent data v2.0. Volume: 7. Swiss Centre for LCI, Empa - TSL. Dübendorf, CH.
Type: Measurement on site
Source: CD-ROM
First author: Kellenberger D.
Other authors: Althaus H.-J., Jungbluth N., Künniger T.
Year: 2007
Title of anthology: Final report ecoinvent data v2.0
Place of publication: Dübendorf, CH
Publisher: Swiss Centre for LCI, Empa - TSL
Volume No: 7

## Validation
Proof reading validation: passed; Other validation: none;
