# Copper, Sxx EW, at refinery

Dataset: EcoSpold 1, unit process
Functional unit: 1 kg
Category: metals / non ferro
Geography: GLO
Time period: 2000-01 to 2000-12
Production volume: 870 thousand tonnes in Cu in 1994
Share of production covered: 100 %
Generated by: Mischa Classen
accessRestrictedTo: 0
copyright: true

## General comment
The product "copper, SX-EW, at refinery" is used in the production mix represented in module "copper, primary, at refinery" of the respective region.;
CAS number: 007440-50-8;

## Included processes
The module includes the mining of the ore including the mining infrastructure, the leaching and extraction, the electro winning an the disposal of the leaching residues.

## Geography
This module is valid for an average world-wide process.

## Technology
Heap leaching was assumed as average process. The ore is mined in open cut technique, leached and extracted with sulphuric acid and reduced by electro winning. For electricity mix a mix of 60% hydropower and 40% electricity at grid UCTE was chosen.

## Reference product
- Copper, Sxx EW, at refinery [GLO]: 1 kg
  Global

## Inputs from technosphere
- Non-ferrous metal mine, surface [GLO]: 1.38e-8 p; lognormal SD95 3.07
  (3,2,2,1,3,4,9)
- Electricity, high voltage, production ENTSO-E, at grid: 1.15 kWh; lognormal SD95 1.1
  (2,2,2,3,1,3,2)
- Diesel, burned in building machine, average [CH]: 8.31 MJ; lognormal SD95 1.25
  (2,2,2,1,3,4,4)
- Conveyor belt, at plant [RER]: 2.1e-5 m; lognormal SD95 1.58
  (4,2,2,3,4,4,4)
- Blasting [RER]: 0.277 kg; lognormal SD95 1.25
  (2,2,2,1,3,4,4)
- Ammonia, liquid, at regional storehouse [RER]: 0.0017 kg; lognormal SD95 1.1
  (2,2,2,3,1,3,4)
- Electricity, hydropower, at run-of-river power plant [RER]: 5.15 kWh; lognormal SD95 1.58
  (4,2,2,3,4,4,2)
- Electricity, medium voltage, production ENTSO-E, at grid: 2.28 kWh; lognormal SD95 1.58
  (4,2,2,3,4,4,2)
- Disposal, sulfidic tailings, off-site [GLO]: 554 kg; lognormal SD95 1.13
  (2,2,2,1,1,4,6)
- Chromium steel 18/8, at plant [RER]: 0.191 kg; lognormal SD95 1.2
  (4,2,2,3,4,4,4)
- Chemical plant, organics [RER]: 4e-10 p; lognormal SD95 3.07
  (3,2,2,1,3,4,9)

## Inputs from nature
- Copper, 0.99% in sulfide, Cu 0.36% and Mo 8.2E-3% in crude ore [resources, in ground]: 1.43 kg; lognormal SD95 1.13
  (2,2,2,1,1,4,12)
- Occupation, mineral extraction site [resources, land]: 0.0145 m2a; lognormal SD95 1.58
  (3,2,2,1,3,2,7)
- Transformation, from unknown [resources, land]: 0.000482 m2; lognormal SD95 2.06
  (3,2,2,1,3,2,8)
- Transformation, to mineral extraction site [resources, land]: 0.000482 m2; lognormal SD95 2.06
  (3,2,2,1,3,2,8)
- Water, river [resources, in water]: 0.17 m3; lognormal SD95 1.13
  (2,2,1,1,1,4,12)

## Emissions to nature
- Heat, waste [emissions to air, low. pop.]: 30.9 MJ; lognormal SD95 1.14
  (2,3,2,1,1,4,13)
- Water [emissions to water, unspecified]: 161.5 kg; lognormal SD95 2.5196
  (5,5,5,5,5,BU:1.05); All uncertainty-values set to 5.0 by default. Balance of input water

## Sampling procedure
literature

## Extrapolations
see Geography and Technology

## Sources
- Classen M., Althaus H.-J., Blaser S., Scharnhorst W., Tuchschmid M., Jungbluth N., Faist Emmenegger M., 2009, 2009 - LCI metals - Classen, Final report ecoinvent data v2.1, 10, Swiss Centre for LCI, Empa, ESU-services Ltd., Duebendorf, CH
Classen M., Althaus H.-J., Blaser S., Doka G., Jungbluth N., Tuchschmid M. (2008) Life Cycle Inventories of Metals. Final report ecoinvent data v2.1. Volume: 10. Issue: 0. Swiss Centre for LCI, Empa - TSL. Dübendorf, CH.
Type: Measurement on site
Source: CD-ROM
First author: Classen M.
Other authors: Althaus H.-J., Blaser S., Doka G., Jungbluth N., Tuchschmid M.
Year: 2008
Title of anthology: Final report ecoinvent data v2.1
Place of publication: Dübendorf, CH
Publisher: Swiss Centre for LCI, Empa - TSL
Volume No: 10
Issue No: 0

## Validation
Proof reading validation: Passed.; Other validation: none;
