# Hard coal, burned in power plant

Dataset: EcoSpold 1, unit process
Functional unit: 1 MJ
Category: electricity by fuel / coal\power plant
Geography: US
Time period: 2018-01 to 2020-01
Production volume: 9600 PJ
Share of production covered: 95 %
Generated by: Christopher Oberschelp
accessRestrictedTo: 0
copyright: true

## General comment
The module describes the operation of an average plant in the region. The plant is used for middle load with 4000 hours of operation at full capacity per year. The plant is assumed to operate 150000 hours during its lifetime. For the assessment of main characteristics (LHV, sulphur and ash content of coal, efficiency of the plant) and criteria emissions (SOx, NOx, particles, mercury) a bottom-up approach has been used and supplemented by typical emission factors in cases of data gaps (based on EEA/EPA). CO2, CH4 and N2O emissions have been derived from fuel types (from IEA data) and IPCC emission factors. Airborne emission data has been updated for 2019, whereas other inputs and outputs come from the original dataset. The dataset consists on the collection of information about single plants. Base data on all major power plants in 2019 have been integrated, to the extent possible. The size distribution of particles has been derived from non-linear calculations based on typical ratios for different total emission amounts based on CEPMEIP. Emissions of trace substances (except for mercury) were derived from emission factors in the literature (EEA/EPA). The waste heat releases to air and water have been allocated on the basis of the assumed share of river cooled power plants and assumptions on the direct losses to air. The share of the recycled ash is country-specific. For the disposal of the remaining ash, typical country-specific compositions are taken into account in appropriate disposal modules. NA;

## Included processes
Energy conversion for energy supply. Use of fuel oil for startup is accounted for. Particle removal is included in this module. DeSOx and DeNOx are described in different modules; they are applied here according to a simplified estimate assuming an average unabated emission and the specific abated regional emission rates; SOx and NOx emissions are the reduced ones. It is assumed that 25 % of the plants are river cooled, 75 % use cooling tower (average UCTE). The water treatment is described in separate modules. The disposal of non-recycled ashes is modelled separately.

## Geography
US in 2019

## Technology
Average installed technology.

## Reference product
- Hard coal, burned in power plant [US]: 1 MJ

## Inputs from technosphere
- Hard coal power plant [RER]: 1.3e-12 p; lognormal SD95 3.02
  (3,3,2,3,1,3);
- Hard coal supply mix, at regional storage [US]: 0.0495 kg; lognormal SD95 1.2
  based on possible variation in coal quality affecting the heating value
- Chlorine, liquid, production mix, at plant [RER]: 1e-5 kg; lognormal SD95 2
  estimate taken from european power plants (Röder et al. 2004)
- Light fuel oil, at regional storage [RER]: 1.7e-5 kg; lognormal SD95 2
  estimate taken from european power plants (Röder et al. 2004)
- Water, completely softened, at plant [RER]: 0.006 kg; lognormal SD95 2
  estimate taken from european power plants (Röder et al. 2004)
- Water, decarbonised, at plant [RER]: 0.15 kg; lognormal SD95 2
  estimate taken from european power plants (Röder et al. 2004)
- SOx retained, in hard coal flue gas desulphurisation [RER]: 0.000742 kg; lognormal SD95 2.5649
  (5,5,5,5,5,5,BU:1.05)based on difference of a generic average unabated emission intensities (EMEP/EEA air pollutant emission inventory guidebook) and the local abated emission intensity
- NOx retained, in SCR [GLO]: 0.000152 kg; lognormal SD95 2.5649
  (same comment as for SOx retained, in hard coal flue gas desulphurisation)
- Disposal, hard coal ash, 0% water, to residual material landfill [DE]: 0.00268 kg; lognormal SD95 2
  average figure for whole US; can considerably vary for single regions
- Disposal, residue from cooling tower, 30% water, to sanitary landfill [CH]: 5e-6 kg; lognormal SD95 2
  estimate taken from european power plants (Röder et al. 2004)

## Inputs from nature
- Water, cooling, unspecified natural origin/m3 [resources, in water]: 0.0035 m3; lognormal SD95 2
  estimate taken from european power plants (Röder et al. 2004)

## Emissions to nature
- Heat, waste [emissions to water, river]: 0.154 MJ; lognormal SD95 1.5
  calculated from energy balance; also depends on assumed share of colling tower vs. River cooling
- Heat, waste [emissions to air, high. pop.]: 0.585 MJ; lognormal SD95 1.5
  (same comment as for Heat, waste)
- Antimony [emissions to air, high. pop.]: 3.63e-10 kg; lognormal SD95 5
  average US figure, based on available literature
- Arsenic [emissions to air, high. pop.]: 7.1e-9 kg; lognormal SD95 5.2623
  (1,3,5,1,1,1,BU:5)based on available emission factors (EMEP/EEA air pollutant emission inventory guidebook)
- Benzene [emissions to air, high. pop.]: 2.62e-8 kg; lognormal SD95 2
  average US figure, based on available literature
- Benzo(a)pyrene [emissions to air, high. pop.]: 7.67e-13 kg; lognormal SD95 2
  average US figure, based on available literature
- Cadmium [emissions to air, high. pop.]: 9e-10 kg; lognormal SD95 5.2623
  (same comment as for Arsenic)
- Carbon dioxide, fossil [emissions to air, high. pop.]: 0.095457 kg; lognormal SD95 1.0714
  (2,1,1,1,1,1,BU:1.05)calculated from fuel composition and emission factors (based on International Energy Agency data and IPCC guidelines)
- Carbon monoxide, fossil [emissions to air, high. pop.]: 8.7e-6 kg; lognormal SD95 5.2585
  (1,1,5,1,1,1,BU:5)based on available emission factors (EMEP/EEA air pollutant emission inventory guidebook)
- Chromium [emissions to air, high. pop.]: 4.5e-9 kg; lognormal SD95 5.2623
  (same comment as for Arsenic)
- Chromium VI [emissions to air, high. pop.]: 1.6e-9 kg; lognormal SD95 5
  average US figure, based on available literature
- Cobalt [emissions to air, high. pop.]: 2.02e-9 kg; lognormal SD95 5
  average US figure, based on available literature
- Copper [emissions to air, high. pop.]: 7.8e-9 kg; lognormal SD95 5.2623
  (1,3,5,3,1,1,BU:5)based on available emission factors (EMEP/EEA air pollutant emission inventory guidebook)
- Dinitrogen monoxide [emissions to air, high. pop.]: 1.5e-6 kg; lognormal SD95 1.5044
  (2,1,1,1,1,1,BU:1.5)calculated from fuel composition and emission factors (based on International Energy Agency data and IPCC guidelines)
- Formaldehyde [emissions to air, high. pop.]: 4.85e-9 kg; lognormal SD95 2
  average US figure, based on available literature
- Hydrocarbons, aliphatic, alkanes, unspecified [emissions to air, high. pop.]: 1.26e-8 kg; lognormal SD95 2
  average US figure, based on available literature
- Hydrogen chloride [emissions to air, high. pop.]: 2.42e-5 kg; lognormal SD95 2
  average US figure, based on available literature
- Hydrogen fluoride [emissions to air, high. pop.]: 3.03e-6 kg; lognormal SD95 2
  average US figure, based on available literature
- Lead [emissions to air, high. pop.]: 7.3e-9 kg; lognormal SD95 5.2623
  (same comment as for Arsenic)
- Lead-210 [emissions to air, high. pop.]: 1.25e-5 kBq; lognormal SD95 3
  average US figure, based on available literature
- Manganese [emissions to air, high. pop.]: 9.89e-9 kg; lognormal SD95 5
  average US figure, based on available literature
- Mercury [emissions to air, high. pop.]: 1.4e-9 kg; lognormal SD95 5.2623
  (1,2,1,1,1,1,BU:5)calculated from reported emissions (US Environmental Protection Agency)
- Methane, fossil [emissions to air, high. pop.]: 1e-5 kg; lognormal SD95 1.5044
  (same comment as for Dinitrogen monoxide)
- Nickel [emissions to air, high. pop.]: 4.9e-9 kg; lognormal SD95 5.2623
  (same comment as for Arsenic)
- Nitrogen oxides [emissions to air, high. pop.]: 5.67e-5 kg; lognormal SD95 1.5
  (1,1,1,1,1,1,BU:1.5)calculated from reported emissions (US Environmental Protection Agency)
- PAH, polycyclic aromatic hydrocarbons [emissions to air, high. pop.]: 6.78e-11 kg; lognormal SD95 3.2292
  (1,3,5,1,1,1,BU:3)based on available emission factors (EMEP/EEA air pollutant emission inventory guidebook)
- Particulates, < 2.5 um [emissions to air, high. pop.]: 3.54e-6 kg; lognormal SD95 3
  (1,1,1,1,1,1,BU:3)calculated from reported emissions (US Environmental Protection Agency)
- Particulates, > 10 um [emissions to air, high. pop.]: 2.08e-6 kg; lognormal SD95 1.5
  (same comment as for Nitrogen oxides)
- Particulates, > 2.5 um, and < 10um [emissions to air, high. pop.]: 3.05e-6 kg; lognormal SD95 2
  (1,1,1,1,1,1,BU:2)calculated from reported emissions (US Environmental Protection Agency)
- Polonium-210 [emissions to air, high. pop.]: 1.25e-5 kBq; lognormal SD95 3
  average US figure, based on available literature
- Potassium-40 [emissions to air, high. pop.]: 1.74e-5 kBq; lognormal SD95 3
  average US figure, based on available literature
- Radium-226 [emissions to air, high. pop.]: 3.95e-6 kBq; lognormal SD95 3
  average US figure, based on available literature
- Radium-228 [emissions to air, high. pop.]: 2.34e-6 kBq; lognormal SD95 3
  average US figure, based on available literature
- Radon-220 [emissions to air, high. pop.]: 0.000362 kBq; lognormal SD95 3
  average US figure, based on available literature
- Radon-222 [emissions to air, high. pop.]: 0.000658 kBq; lognormal SD95 3
  average US figure, based on available literature
- Selenium [emissions to air, high. pop.]: 2.3e-8 kg; lognormal SD95 5.2623
  (same comment as for Arsenic)
- Sulfur dioxide [emissions to air, high. pop.]: 7.81e-5 kg; lognormal SD95 1.05
  (1,1,1,1,1,1,BU:1.05)calculated from reported emissions (US Environmental Protection Agency)
- Thorium-228 [emissions to air, high. pop.]: 1.55e-6 kBq; lognormal SD95 3
  average US figure, based on available literature
- Thorium-232 [emissions to air, high. pop.]: 1.55e-6 kBq; lognormal SD95 3
  average US figure, based on available literature
- Toluene [emissions to air, high. pop.]: 4.84e-9 kg; lognormal SD95 2
  average US figure, based on available literature
- Uranium-238 [emissions to air, high. pop.]: 4.94e-6 kBq; lognormal SD95 3
  average US figure, based on available literature
- Xylene [emissions to air, high. pop.]: 7.46e-10 kg; lognormal SD95 2
  average US figure, based on available literature
- Zinc [emissions to air, high. pop.]: 1.9e-8 kg; lognormal SD95 5.2623
  (same comment as for Copper)
- NMVOC, non-methane volatile organic compounds, unspecified origin [emissions to air, high. pop.]: 1e-6 kg; lognormal SD95 1.7755
  (1,2,5,1,1,1,BU:1.5)based on available emission factors (EMEP/EEA air pollutant emission inventory guidebook)
- Polychlorinated biphenyls [emissions to air, high. pop.]: 3.3e-15 kg; lognormal SD95 3.2292
  (1,3,5,3,1,1,BU:3)based on available emission factors (EMEP/EEA air pollutant emission inventory guidebook)
- Benzene, hexachloro- [emissions to air, high. pop.]: 6.7e-12 kg; lognormal SD95 3.2292
  (same comment as for Polychlorinated biphenyls)
- Carbon black [emissions to air, unspecified]: 6.1e-8 kg; lognormal SD95 5.2623
  (same comment as for Copper)
- Dioxin, 2,3,7,8 Tetrachlorodibenzo-p- [emissions to air, unspecified]: 1e-14 kg; lognormal SD95 3.2292
  (same comment as for Polychlorinated biphenyls)
- Water [emissions to water, unspecified]: 3.325 kg; lognormal SD95 2.5196
  (5,5,5,5,5,BU:1.05); All uncertainty-values set to 5.0 by default. Balance of input water

## Sampling procedure
Databases/ literature data based on regional statistics.

## Extrapolations
Extrapolations for some exchanges applied where not all plants in the region reported complete data. See exchange comments for details.

## Sources
- Itten R., Oberschelp C., Kroehnert H., Stucki M., 2023, 2023 - LCI solid fossil fuel - Itten, Project report, ZHAW, Waedenswil, CH

## Validation
27.07.2023
