# Terrain chipper on forwarder, at plant

Dataset: EcoSpold 1, unit process
Functional unit: 1 p
Category: wood / wooden materials\new processes\other material
Geography: RER
Time period: 2000-01 to 2016-12
Generated by: default
accessRestrictedTo: 0
copyright: true

## Reference product
- Terrain chipper on forwarder, at plant [RER]: 1 p

## Inputs from technosphere
- Disposal, rubber, unspecified, 0% water, to municipal incineration [CH]: 1390 kg
- Transport, freight, rail [RER]: 1960 tkm; lognormal SD95 1.5103
  Pedigree: (1,1,4,5,4).
- Polypropylene, granulate, at plant [RER]: 260 kg; lognormal SD95 1.02869
  Pedigree: (1,1,2,1,1).
- Oxygen, liquid, at plant [RER]: 12 kg; lognormal SD95 1.4749
  Pedigree: (3,4,3,1,5).
- Electricity, medium voltage, production ENTSO-E, at grid: 68900 kWh; lognormal SD95 1.01424
  Pedigree: (1,1,2,1,1).
- Tap water, at user [RER]: 50400 kg; lognormal SD95 1.01424
  Pedigree: (1,1,2,1,1).
- Synthetic rubber, at plant [RER]: 1390 kg; lognormal SD95 1.19252
  Pedigree: (3,4,3,1,1).
- Lead, at regional storage [RER]: 76.9 kg; lognormal SD95 1.19252
  Pedigree: (3,4,3,1,1).
- Flat glass, uncoated, at plant [RER]: 109 kg; lognormal SD95 1.02869
  Pedigree: (1,1,2,1,1).
- Disposal, polypropylene, 15.9% water, to municipal incineration [CH]: 309 kg
- Transport, freight, lorry, fleet average [RER]: 8624 tkm; lognormal SD95 1.5103
  Pedigree: (1,1,4,5,4).
- Road vehicle plant [RER]: 8.73e-7 p; lognormal SD95 2.18105
  Pedigree: (4,5,3,3,4).
- Aluminium alloy, AlMg3, at plant [RER]: 80.6 kg; lognormal SD95 89.5481
  Pedigree: (1,1,2,1,1).
- Water, completely softened, at plant [RER]: 15.7 kg; lognormal SD95 1.19252
  Pedigree: (3,4,3,1,1).
- Treatment, sewage, to wastewater treatment, class 3 [CH]: 50.5 m3; lognormal SD95 1.34462
  Pedigree: (1,1,2,1,1).
- Chromium steel 18/8, at plant [RER]: 1630 kg; lognormal SD95 1.02869
  Pedigree: (1,1,2,1,1).
- Iron scrap, at plant [RER]: 60700 kg; lognormal SD95 1.02869
  Pedigree: (1,1,2,1,1).
- Powder coating, steel [RER]: 51.1 m2; lognormal SD95 1.02869
  Pedigree: (1,1,2,1,1).
- Cast iron, at plant [RER]: 52.1 kg; lognormal SD95 1.19252
  Pedigree: (3,4,3,1,1).
- Copper, primary, at refinery [GLO]: 19.5 kg; lognormal SD95 1.19252
  Pedigree: (3,4,3,1,1).
- Acetylene, at regional storehouse [CH]: 5 kg; lognormal SD95 1.4749
  Pedigree: (3,4,3,1,5).
- Wire drawing, copper [RER]: 19.5 kg; lognormal SD95 1.01462
  Pedigree: (1,1,2,1,1).
- Electronics for control units [RER]: 97.2 kg; lognormal SD95 1.19252
  Pedigree: (3,4,3,1,1).
- Treatment, lorry production effluent, to wastewater treatment, class 1 [CH]: 6.71 m3; lognormal SD95 1.5884
  Pedigree: (1,1,2,1,1).
- Injection moulding [RER]: 260 kg; lognormal SD95 1.02869
  Pedigree: (1,1,2,1,1).
- Steel, low-alloyed, at plant [RER]: 3950 kg; lognormal SD95 1.02869
  Pedigree: (1,1,2,1,1).
- Disposal, electronics for control units [RER]: 97.2 kg
- Heat, natural gas, at boiler condensing modulating >100kW [RER]: 78600 MJ; lognormal SD95 1.01424
  Pedigree: (1,1,2,1,1).
- Steel, low-alloyed, at plant [RER]: 55100 kg; lognormal SD95 1.01424
  Pedigree: (1,1,2,1,1).

## Emissions to nature
- Carbon dioxide, fossil [emissions to air, low. pop.]: 16.9 kg; lognormal SD95 1.25755
  Pedigree: (1,1,2,1,1).

## Sources
- Werner F., 2017, 2017 - LCI wood and wood based products - Werner, Project Report, 0, Environment & Development, Zuerich, CH
