# Network access devices, internet, at user

Dataset: EcoSpold 1, unit process, infrastructure
Functional unit: 1 p
Category: electronics / devices
Geography: GLO
Time period: 2023-01 to 2029-12
Generated by: Lugas Raka Adrianto, Maulana Permana Ajie, Didier Beloin-Saint-Pierre
accessRestrictedTo: 0
copyright: false

## General comment
The data set represents the material in internet access devices, based on assumptions for the chassis and PWB. The dataset has been checked with the recent literature information and require no updates in 2023, except for the recent electronics dataset used in the inventory;

## Included processes
This data set includes all network access devices usually required for internet communication. It namely includes: ADSL modem with router, DSLAM and connecting cables. Manufacture and transport included.

## Geography
Data for Swiss conditions

## Technology
Included devices: ADSL modem with router and DSLAM, DSLAM with 17 line cards with 48 ports. 50% capacity utilisation.

## Reference product
- Network access devices, internet, at user [GLO]: 1 p
  SWITZERLAND

## Inputs from technosphere
- Chassis, network main devices, at plant [GLO]: 0.27906 kg; lognormal SD95 1.64
  (4,3,3,1,4,5,BU:1.05); Estimation, total weight from factssheet Zyxel; Factssheet Zyxel IES-6000 Series: 15 kg / 768 ports, 50% utilisation; Cisco router factssheet: 3.63 kg, assumption PWB=50% of weight
- Printed wiring board, surface mount, at plant [GLO]: 0.01796 m2; lognormal SD95 1.64
  (4,3,3,1,4,5,BU:1.05); Estimation; Factssheet Zyxel IES-6000 Series: 39.6x24cm per 48 ports, 50% utilisation; Cisco router factssheet: area 26.67cmx28.07cm
- Transport, transoceanic freight ship [OCE]: 6.696 tkm; lognormal SD95 2.12
  (2,3,3,3,3,5,BU:2.00); Over all weight of device = 2* chassis weight, transport from Asia: 12000km
- Transport, freight, lorry, 7.5t-16t gross weight, fleet average [RER]: 0.4465 tkm; lognormal SD95 2.12
  (2,3,3,3,3,5,BU:2.00); Over all weight of device = 2* chassis weight, transport from Rotterdam: 800km

## Extrapolations
Average technology

## Sources
- Raka Adrianto L., Permana Ajie M., Beloin-Saint-Pierre D., 2024, 2024 - LCI ICT sector - Raka Adrianto, Empa, St. Gallen, CH

## Validation
Proof reading validation: Passed, Other validation: none, Validator: Mischa Zschokke, Company: Carbotech, Country: CH
