# Basalt, at mine

Dataset: EcoSpold 1, unit process
Functional unit: 1 kg
Category: minerals / unspecified
Geography: RER
Time period: 2000-01 to 2000-12
Generated by: Mischa Classen
accessRestrictedTo: 0
copyright: true

## General comment
The module is designed for the use as raw-material for rockwool.;

## Included processes
The module includes a mining step and a subsequent benefication step comprising crushing, washing and classification.

## Geography
Data for one german quarry used as proxy for whole European situation

## Technology
Basalt is exploited in open-pit quarries.

## Reference product
- Basalt, at mine [RER]: 1 kg
  Europe

## Inputs from technosphere
- Diesel, burned in building machine, average [CH]: 0.0414 MJ; lognormal SD95 1.24
  (1,4,2,1,3,3);
- Electricity, medium voltage, production ENTSO-E, at grid: 0.00621 kWh; lognormal SD95 1.24
  (1,4,2,1,3,3);
- Blasting [RER]: 7.73e-5 kg; lognormal SD95 1.32
  (4,nA,3,1,3,nA);
- Chemicals organic, at plant [GLO]: 3.6e-7 kg; lognormal SD95 1.24
  (1,4,2,1,3,3);
- Treatment, sewage, from residence, to wastewater treatment, class 2 [CH]: 9.6e-8 m3; lognormal SD95 1.24
  (1,4,2,1,3,3);
- Disposal, municipal solid waste, 22.9% water, to municipal incineration [CH]: 6.14e-5 kg; lognormal SD95 1.24
  (1,4,2,1,3,3);
- Disposal, paper, 11.2% water, to municipal incineration [CH]: 5.2e-7 kg; lognormal SD95 1.24
  (1,4,2,1,3,3);
- Mine, limestone [CH]: 8e-11 p; lognormal SD95 3.28
  (5,4,1,1,3,nA);
- Light fuel oil, burned in industrial furnace 1MW, non-modulating [CH]: 0.000313 MJ; lognormal SD95 1.24
  (1,4,2,1,3,3);
- Disposal, paint remains, 0% water, to hazardous waste incineration [CH]: 4.88e-6 kg; lognormal SD95 1.24
  (1,4,2,1,3,3);
- Alkyd paint, white, 60% in solvent, at plant [RER]: 3e-6 kg; lognormal SD95 1.24
  (1,4,2,1,3,3);
- Lubricating oil, at plant [RER]: 5.4e-5 kg; lognormal SD95 1.24
  (1,4,2,1,3,3);
- Transport, passenger car, fleet average [CH]: 6.75e-6 km; lognormal SD95 1.24
  (1,4,2,1,3,3);

## Inputs from nature
- Transformation, from forest, unspecified [resources, land]: 7.98e-5 m2; lognormal SD95 2.11
  (4,4,2,1,3,3);
- Occupation, mineral extraction site [resources, land]: 0.000798 m2a; lognormal SD95 1.64
  (4,4,2,1,3,3);
- Transformation, from mineral extraction site [resources, land]: 7.98e-5 m2; lognormal SD95 2.11
  (4,4,2,1,3,3);
- Basalt [resources, in ground]: 1 kg; lognormal SD95 1.26
  (3,4,2,1,3,nA);
- Transformation, to unknown [resources, land]: 7.98e-5 m2; lognormal SD95 2.11
  (4,4,2,1,3,3);
- Transformation, to mineral extraction site [resources, land]: 7.98e-5 m2; lognormal SD95 2.11
  (4,4,2,1,3,3);
- Water, lake [resources, in water]: 8.4e-6 m3; lognormal SD95 1.24
  (1,4,2,1,3,3);

## Emissions to nature
- Particulates, > 10 um [emissions to air, low. pop.]: 0.000112 kg; lognormal SD95 1.88
  (4,5,2,3,4,3);
- Particulates, > 2.5 um, and < 10um [emissions to air, low. pop.]: 4e-5 kg; lognormal SD95 2.33
  (4,5,2,3,4,3);
- Heat, waste [emissions to air, high. pop.]: 0.0224 MJ; lognormal SD95 1.24
  (1,4,2,1,3,3);
- Particulates, < 2.5 um [emissions to air, low. pop.]: 8e-6 kg; lognormal SD95 3.11
  (4,4,2,1,3,3);

## Sampling procedure
Literature

## Sources
- Classen M., Althaus H.-J., Blaser S., Scharnhorst W., Tuchschmid M., Jungbluth N., Faist Emmenegger M., 2009, 2009 - LCI metals - Classen, Final report ecoinvent data v2.1, 10, Swiss Centre for LCI, Empa, ESU-services Ltd., Duebendorf, CH
Classen M., Althaus H.-J., Blaser S., Doka G., Jungbluth N., Tuchschmid M. (2008) Life Cycle Inventories of Metals. Final report ecoinvent data v2.1. Volume: 10. Issue: 0. Swiss Centre for LCI, Empa - TSL. Dübendorf, CH.
Type: Measurement on site
Source: CD-ROM
First author: Classen M.
Other authors: Althaus H.-J., Blaser S., Doka G., Jungbluth N., Tuchschmid M.
Year: 2008
Title of anthology: Final report ecoinvent data v2.1
Place of publication: Dübendorf, CH
Publisher: Swiss Centre for LCI, Empa - TSL
Volume No: 10
Issue No: 0

## Validation
Proof reading validation: passed; Other validation: none;
