# Transport, passenger car, battery electric, NMC-622 battery, label-certified electricity, Micro, 2021

Dataset: EcoSpold 1, unit process
Functional unit: 1 km
Category: transport systems / road\Transformation
Geography: CH
Time period: 2021-01 to 2021-12
Generated by: Romain Sacchi
accessRestrictedTo: 0
copyright: False

## General comment
Electric motor power: 18 [kW]. Km over lifetime: 60000 [km]. Yearly mileage: 6000 [km/year]. Autonomy on a full tank/battery: 117 [km]. Tank-to-wheel efficiency: 71 [%]. Tank-to-wheel energy consumption: 371 [kj/km]. Battery capacity: 15 [kWh]. Mass of battery: 120 [kg]. Curb mass (excl. driver and cargo): 528 [kg]. Driving mass (incl. driver and cargo): 668 [kg]..

## Time period
Base technology year of 2020

## Reference product
- Transport, passenger car, battery electric, NMC-622 battery, label-certified electricity, Micro, 2021 [CH]: 1 km

## Inputs from technosphere
- Maintenance, passenger car [RER]: 2.84e-6 p; lognormal SD95 1.12899
  Uncertainty from pedigree matrix: (3, 3, 2, 1, 1, 3)
- Brake wear emissions, passenger car [RER]: 3.66e-6 kg; lognormal SD95 1.62301
  Uncertainty from pedigree matrix: (4, 5, 2, 3, 4, 3)
- Road [CH]: 0.000359 my; lognormal SD95 1.51685
  Uncertainty from pedigree matrix: (3, 1, 5, 2, 1, 1)
- Operation, maintenance, road [CH]: 0.00129 my; lognormal SD95 1.51685
  Uncertainty from pedigree matrix: (3, 1, 5, 2, 1, 1)
- Road wear emissions, passenger car [RER]: 8.39e-6 kg; lognormal SD95 1.62301
  Uncertainty from pedigree matrix: (4, 5, 2, 3, 4, 3)
- Tyre wear emissions, passenger car [RER]: 1.18e-5 kg; lognormal SD95 1.62301
  Uncertainty from pedigree matrix: (4, 5, 2, 3, 4, 3)
- Electricity, low voltage, certified electricity, at grid [CH]: 0.121117 kWh; lognormal SD95 1.07866
  Uncertainty from pedigree matrix: (2, 1, 2, 2, 1, 3)
- Passenger car, battery electric, NMC-622 battery, Micro, 2021 [RER]: 1.67e-5 p; lognormal SD95 1.12899
  Uncertainty from pedigree matrix: (3, 3, 2, 1, 1, 3)
- Disposal, road [RER]: 0.00036 my; lognormal SD95 1.51685
  Uncertainty from pedigree matrix: (3, 1, 5, 2, 1, 1)

## Emissions to nature
- Noise, road, passenger car, average [non material emissions, unspecified]: 0.5 km; lognormal SD95 1.87651
  Uncertainty from pedigree matrix: (5, 5, 2, 1, 4, 5)

## Sources
- Sacchi R., Bauer C., 2023, 2023 - LCI on-road vehicles - Sacchi, PSI, Villigen, CH
doi: 10.5281/ZENODO.5156043
