# xxx Window frame, wood-metal, U=1.6 W/m2K, at plant

Dataset: EcoSpold 1, unit process
Functional unit: 1 m2
Category: material, obsolete / construction, obsolete\windows, obsolete
Geography: RER
Time period: 1996-01 to 2004-12
Generated by: Martin Lehmann
accessRestrictedTo: 0
copyright: true

## General comment
This dataset describes all the processes and material inputs needed to produce a wood-metal (steel) window frame with 1 m2 visible area. 1 m2 of visible wooden window frame weighs 83.4 kg.
Geography: Window frames produced and sold in Switzerland and Germany.
Technology: The dataset describes highly automated technology processes in window frame manufacturing.
Version: 2.2

Local category: Bauteile
Local subcategory: Fenster

## Included processes
Included processes are timber sawing, varnishing (primer, solvents, paint), section bar rolling for steel fittings, joining, fitting, all the road transport at different production phases and the disposal of the paint remains.

## Reference product
- xxx Window frame, wood-metal, U=1.6 W/m2K, at plant [RER]: 1 m2
  Europe

## Inputs from technosphere
- Toluene, liquid, at plant [RER]: 0.0245 kg; lognormal SD95 1.22
  composite
- Isopropanol, at plant [RER]: 0.000375 kg; lognormal SD95 1.22
  (1,3,1,3,1,5,4)
- Transport, freight, lorry, fleet average [RER]: 35.3 tkm; lognormal SD95 2.05
  (1,3,1,3,1,5,5)
- 1-butanol, propylene hydroformylation, at plant [RER]: 0.042 kg; lognormal SD95 1.22
  composite
- Acetone, liquid, at plant [RER]: 0.0136 kg; lognormal SD95 1.22
  composite
- White spirit, at plant [RER]: 0.00551 kg; lognormal SD95 1.22
  (1,3,1,3,1,5,4)
- Electricity, medium voltage, production ENTSO-E, at grid: 62.4 kWh; lognormal SD95 1.22
  composite
- Copper, at regional storage [RER]: 0.00623 kg; lognormal SD95 1.22
  (1,3,1,3,1,5,3)
- Aluminium, production mix, cast alloy, at plant [RER]: 0.0156 kg; lognormal SD95 1.22
  (1,3,1,3,1,5,3)
- Anodising, aluminium sheet [RER]: 3.4 m2; lognormal SD95 1.22
  (1,3,1,3,1,5,3)
- Zinc, primary, at regional storage [RER]: 0.29 kg; lognormal SD95 1.22
  (1,3,1,3,1,5,3)
- Alkyd paint, white, 60% in H2O, at plant [RER]: 5.06 kg; lognormal SD95 1.22
  (1,3,1,3,1,5,4)
- Titanium dioxide, production mix, at plant [RER]: 0.000468 kg; lognormal SD95 1.22
  (1,3,1,3,1,5,4)
- Polyethylene, LDPE, granulate, at plant [RER]: 0.0233 kg; lognormal SD95 1.22
  (1,3,1,3,1,5,3)
- Propylene glycol, liquid, at plant [RER]: 0.000187 kg; lognormal SD95 1.22
  (1,3,1,3,1,5,4)
- Methyl ethyl ketone, at plant [RER]: 0.000187 kg; lognormal SD95 1.22
  (1,3,1,3,1,5,4)
- Nylon 66, glass-filled, at plant [RER]: 1.09 kg; lognormal SD95 1.22
  (1,3,1,3,1,5,3)
- Water, completely softened, at plant [RER]: 0.823 kg; lognormal SD95 1.22
  (1,3,1,3,1,5,12)
- Sawnwood, hardwood, raw, dried (u=10%), planed, at regional storage [CH]: 1.15425 kg; lognormal SD95 1.22
  (1,3,1,3,1,5,3); ; 0.00171 m3 converted to kg by using density of 675 kg/m3
- Synthetic rubber, at plant [RER]: 2.91 kg; lognormal SD95 1.22
  (1,3,1,3,1,5,3)
- Benzimidazole-compounds, at regional storehouse [RER]: 0.00864 kg; lognormal SD95 1.22
  (1,3,1,3,1,5,4)
- Disposal, paint, 0% water, to municipal incineration [CH]: 3.26 kg; lognormal SD95 1.22
  composite
- Zinc coating, pieces [RER]: 0.488 m2; lognormal SD95 1.22
  composite
- Transport, freight, lorry, 16t-32t gross weight, fleet average [CH]: 1.75 tkm; lognormal SD95 2.05
  composite
- Metal working factory [RER]: 3.81e-8 p; lognormal SD95 3.06
  (2,4,1,3,1,5,9)
- Aluminium, production mix, at plant [RER]: 12.2 kg; lognormal SD95 1.22
  (1,3,1,3,1,5,3)
- Steel, low-alloyed, at plant [RER]: 5.12 kg; lognormal SD95 1.22
  composite
- Melamine formaldehyde resin, at plant [RER]: 0.0733 kg; lognormal SD95 1.22
  (1,3,1,3,1,5,4)
- Section bar extrusion, aluminium [RER]: 12.2 kg; lognormal SD95 1.22
  (1,3,1,3,1,5,3)
- Section bar rolling, steel [RER]: 5.12 kg; lognormal SD95 1.22
  composite
- Sawnwood, softwood, raw, dried (u=10%), planed, at regional storage [CH]: 90.675 kg; lognormal SD95 1.22
  (1,3,1,3,1,5,4); ; 0.195 m3 converted to kg by using density of 465 kg/m3
- Wood pellet, measured as dry mass, at plant [RER]: -2.886 kg
  (1,3,1,3,1,5,3)
- Polyvinylchloride, at regional storage [RER]: 0.136 kg; lognormal SD95 1.22
  (1,3,1,3,1,5,3)
- Pellets, mixed, burned in furnace 50kW [CH]: 54 MJ; lognormal SD95 1.22
  (1,3,1,3,1,5,1)
- Polypropylene, granulate, at plant [RER]: 0.0233 kg; lognormal SD95 1.22
  (1,3,1,3,1,5,3)
- Alkyd resin, long oil, 70% in white spirit, at plant [RER]: 0.0244 kg; lognormal SD95 1.22
  (1,3,1,3,1,5,4)

## Emissions to nature
- Heat, waste [emissions to air, unspecified]: 224 MJ; lognormal SD95 1.26
  (3,4,1,3,1,5,13)

## Sampling procedure
Company documentation, measurements

## Extrapolations
see Geography

## Uncertainty adjustments
The assumption that this dataset is representative for whole Europe is taken into account in the uncertainties.

## Sources
- Kellenberger D., Althaus H.-J., Jungbluth N., Kuenniger T., Lehmann M., Thalmann P., 2007, 2007 - LCI building products - Kellenberger, Final report ecoinvent data v2.0, 7, Swiss Centre for LCI, Empa - TSL, ESU-services Ltd., Bau- und Umweltchimie, Duebendorf, CH
Kellenberger D., Althaus H.-J., Jungbluth N., Künniger T. (2007) Life Cycle Inventories of Building Products. Final report ecoinvent data v2.0. Volume: 7. Swiss Centre for LCI, Empa - TSL. Dübendorf, CH.
Type: Measurement on site
Source: CD-ROM
First author: Kellenberger D.
Other authors: Althaus H.-J., Jungbluth N., Künniger T.
Year: 2007
Title of anthology: Final report ecoinvent data v2.0
Place of publication: Dübendorf, CH
Publisher: Swiss Centre for LCI, Empa - TSL
Volume No: 7

## Validation
Proof reading validation: passed; Other validation: none;
