# Switch, data center devices, at plant

Dataset: EcoSpold 1, unit process
Functional unit: 1 p
Category: electronics / internet network
Geography: GLO
Time period: 2023-01 to 2029-12
Synonyms: Netzwerkkomponente; Schalter
Generated by: Lugas Raka Adrianto, Maulana Permana Ajie, Didier Beloin-Saint-Pierre
accessRestrictedTo: 0
copyright: false

## General comment
The data set represents the production of switch for data centers;

## Included processes
The dataset represents switches used in data centres. Steel, chassis, and wiring boards are the main components.

## Geography
Data for global average for switches

## Technology
Typical switches for data centers

## Reference product
- Switch, data center devices, at plant [GLO]: 1 p

## Inputs from technosphere
All rows: lognormal SD95 1.23
- Chassis, network main devices, at plant [GLO]: 5 kg
  (2,3,1,3,2,5,BU:1.05)
- Steel, low-alloyed, at plant [RER]: 0.4 kg
  (2,3,1,3,2,5,BU:1.05)
- Hot rolling, steel [RER]: 0.4 kg
  (2,3,1,3,2,5,BU:1.05)
- Power supply unit, at plant [GLO]: 2 p
  (2,3,1,3,2,5,BU:1.05)
- Printed wiring board, surface mounted, unspec., Pb free, at plant [GLO]: 1.89 kg
  (2,3,1,3,2,5,BU:1.05)

## Sampling procedure
Literature & own estimations

## Extrapolations
Average technology

## Sources
- Raka Adrianto L., Permana Ajie M., Beloin-Saint-Pierre D., 2024, 2024 - LCI ICT sector - Raka Adrianto, Empa, St. Gallen, CH

## Validation
Proof reading validation: Passed, Other validation: none, Validator: Mischa Zschokke, Company: Carbotech, Country: CH
