# Crude oil, production NG, at long distance transport

Dataset: EcoSpold 1, unit process
Functional unit: 1 kg
Category: fuels / oil\transport
Geography: CH
Time period: 1992-01 to 1994-12
Production volume: 1million tons of directly imported crude oil in CH in 2016
Generated by: Niels Jungbluth
accessRestrictedTo: 0
copyright: true

## General comment
Calculation for transport distances assuming transport by pipeline offshore and onshore as well as sea transport in tanker. Sites and modes of transportation based on the supply situation in 2016.;

## Included processes
Transportation of crude oil from exploration site to refinery in Switzerland. Includes transport service requirements and emissions from oil handling and evaporation.

## Geography
Calculations based on assumptions for supply to Swiss refineries.

## Technology
Operation of crude oil pipelines by electricity.

## Time period
Transport modes investigated for 2016

## Reference product
- Crude oil, production NG, at long distance transport [CH]: 1 kg
  SWITZERLAND

## Inputs from technosphere
- Crude oil, at production [NG]: 1.0003 kg; lognormal SD95 1.05
  (1,1,1,1,1,na); Transported crude oil +losses
- Transport, transoceanic tanker [OCE]: 8 tkm; lognormal SD95 2.0483
  (4,1,1,3,1,na); Calculation 2016
- Transport, crude oil pipeline, offshore [OCE]: 0.02 tkm; lognormal SD95 1.209
  (4,1,1,3,1,na); Calculation 2016
- Transport, crude oil pipeline, onshore [RER]: 0.74 tkm; lognormal SD95 1.209
  (4,1,1,3,1,na); Calculation 2016

## Emissions to nature
- Hexane [emissions to air, high. pop.]: 5.3876e-5 kg; lognormal SD95 1.6321
  (3,5,4,1,1,na); Literature
- Ethane [emissions to air, unspecified]: 1.601e-6 kg; lognormal SD95 1.6321
  (3,5,4,1,1,na); Literature
- Methane, fossil [emissions to air, unspecified]: 1.498e-6 kg; lognormal SD95 1.6321
  (3,5,4,1,1,na); Literature
- Toluene [emissions to air, unspecified]: 2.7e-7 kg; lognormal SD95 1.6321
  (3,5,4,1,1,na); Literature
- Benzene [emissions to air, unspecified]: 4.5e-7 kg; lognormal SD95 3.1033
  (3,5,4,1,1,na); Literature
- Butane [emissions to air, unspecified]: 0.00012642 kg; lognormal SD95 1.6321
  (3,5,4,1,1,na); Literature
- Hydrocarbons, aliphatic, alkanes, unspecified [emissions to air, unspecified]: 1.35e-6 kg; lognormal SD95 1.6321
  (3,5,4,1,1,na); Literature
- Propane [emissions to air, unspecified]: 6.1296e-5 kg; lognormal SD95 1.6321
  (3,5,4,1,1,na); Literature
- Pentane [emissions to air, unspecified]: 9.558e-5 kg; lognormal SD95 1.6321
  (3,5,4,1,1,na); Literature

## Sampling procedure
Literature. Online calculators for distances.

## Sources
- Meili C., Jungbluth N., Bussa M., 2021, 2021 - LCI long-dist. transp. crude oil - Meili, Project report, 565, ESU-services Ltd., Schaffhausen, CH
Meili C., Jungbluth N., Wenzel P. (2018) Life cycle inventory for long distance transport of crude oil. Project report. Volume: 565. ESU-services Ltd.. Schaffhausen, CH.
Type: Separate publication
Source: Report
First author: Meili C.
Other authors: Jungbluth N., Wenzel P.
Year: 2018
Title of anthology: Project report
Place of publication: Schaffhausen, CH
Publisher: ESU-services Ltd.
Volume No: 565

## Validation
Proof reading validation: Passed.; Other validation: none;
