# Sawnwood, hardwood, raw, dried (u=10%), planed, at regional storage, with resource correction

Dataset: EcoSpold 1, unit process
Functional unit: 1 kg
Category: wood / wooden materials\at regional storage\other material
Geography: CH
Time period: 2000-01 to 2016-12
Generated by: default
accessRestrictedTo: 0
copyright: true

## Reference product
- Sawnwood, hardwood, raw, dried (u=10%), planed, at regional storage, with resource correction [CH]: 1 kg
  SWITZERLAND

## Inputs from technosphere
- Transport, freight, lorry, fleet average [RER]: 0.12 tkm
  40% market share; 300 km
- Sawnwood, production mix, hardwood, dried (u=10%), planed, at sawmill [CH]: 0.000889 m3
  60% market share; 675 kg/m3
- Sawnwood, production mix, hardwood, dried (u=10%), planed, at sawmill [RER]: 0.000593 m3
  40% market share; 675 kg/m3
- Transport, freight, rail [RER]: 0 tkm

## Inputs from nature
- Energy, gross calorific value, in biomass, resource correction [resources, unspecified]: -5.952 MJ
  (1,1,1,1,1,1,BU:1.05); correction for recycling of wood, calculated in "684-Holzdaten-Ressourcenkorrektur_v4.xlsx"

## Sources
- Werner F., 2017, 2017 - LCI wood and wood based products - Werner, Project Report, 0, Environment & Development, Zuerich, CH
