# Disposal, single room ventilator with heat recovery window frame model

Dataset: EcoSpold 1, unit process
Functional unit: 1 p
Category: waste management / building demolition
Geography: CH
Time period: 1994-01 to 2008-12
Generated by: Daniel Savi
accessRestrictedTo: 0
copyright: true

## General comment
Disposal process for a single room ventilator with heat recovery;

## Included processes
Transport to dismantling facilities, machines for handling in sorting plant, electricity demand for sorting plant, final disposal of waste material. Cut-off to recycling for metals.

## Geography
Specific to the technology mix encountered in sorting plants in Switzerland.

## Technology
Disposal to a sorting plant assumed. Metal pieces, copper in cables and electronic devices are recycled, plastic parts are incinerated, inert wastes (e.g. rock wool) are landfilled.

## Time period
Amount of material investigated in 2013. Disposal technology mix as used in late 1990ies

## Reference product
- Disposal, single room ventilator with heat recovery window frame model [CH]: 1 p
  SWITZERLAND

## Inputs from technosphere
- Transport, freight, lorry, 7.5t-16t gross weight, fleet average [CH]: 0.01979 tkm; lognormal SD95 2.5947
  (3,3,2,2,3,4); uncertainty for transport, Basic uncertainty: 2
- Disposal, polyethylene, 0.4% water, to municipal incineration [CH]: 1.425 kg; lognormal SD95 1.9279
  (3,3,2,2,3,4); uncertainty for material disposal, Basic uncertainty: 1.05
- Disposal, wood untreated, 20% water, to municipal incineration [CH]: 10.01 kg; lognormal SD95 1.9279
  (3,3,2,2,3,4); uncertainty for material disposal, Basic uncertainty: 1.05
- Disposal, industrial devices, to WEEE treatment [CH]: 3.355 kg; lognormal SD95 1.9279
  (3,3,2,2,3,4); uncertainty for material disposal, Basic uncertainty: 1.05

## Sampling procedure
Waste-specific calculation based on production input data

## Sources
- Klingler M., Kasser U., Savi D., Primas A., Stettler Y., Gujer P., 2014, 2014 - LCA ventilation and heating systems - Klingler, Schlussbericht, BFE, Buero fuer Umweltchemie, B&H AG, Zuerich, CH
Klingler M., Kasser U., Savi D., Primas A., Stettler Y., Gujer P. (2014) Ökobilanzdaten für Lüftungs- und Wärmeanlagen. Schlussbericht, BFE. Bundesamt für Energie (BFE). Bern.
Type: Separate publication
Source: Report
First author: Klingler M.
Other authors: Kasser U., Savi D., Primas A., Stettler Y., Gujer P.
Year: 2014
Title of anthology: Schlussbericht, BFE
Place of publication: Bern
Publisher: Bundesamt für Energie (BFE)
