# Disposal, residues, mechanical treatment, laptop computer, in MSWI

Dataset: EcoSpold 1, unit process
Functional unit: 1 kg
Category: waste management / municipal incineration
Geography: CH
Time period: 2004-01 to 2004-12
Generated by: Gabor Doka
accessRestrictedTo: 0
copyright: true

## General comment
This dataset represents the activity of waste disposal of residue from mechanical treatment, laptop computer in a municipal solid waste incinerator (MSWI) Recommended use of this dataset: Only for incineration of shredder residues generated in the recycling (mechanical treatment) of laptop computers Inventoried waste contains 1.85% rubber; 45.2% Plastics from electronic consumer goods; 45.2% Plastics from electronic industrial goods; 1.99% MSWI iron scrap; 3.61% Alu in MSW; 0.335% Glass; 1.71% wiring copper; 0.0372% Pb in ASR inert; 0.0188% silver; . Waste composition (wet, in ppm): upper heating value 33.34 MJ/kg; lower heating value 31.96 MJ/kg; H2O 8363.2; O 50617; H 68908; C 752530; S 400.02; N 12031; P 468.2; B n.a.; Cl 6302.9; Br 4975.2; F 226.14; I n.a.; Ag 187.58; As 6.7843; Ba 160.11; Cd 136.45; Co 26.665; Cr 72.375; Cu 20243; Hg 0.76891; Mn 53.974; Mo 2.7137; Ni 474.07; Pb 514.24; Sb 4341.8; Se 1.7726; Sn 196.95; V 5.6506; Zn 698.91; Be 0.42204; Sc n.a.; Sr 74.701; Ti 4049.8; Tl 0.33763; W n.a.; Si 4501.6; Fe 17643; Ca 3059.2; Al 38275; K 105.84; Mg n.a.; Na 342.36; Share of carbon in waste that is biogenic 0%. Share of metals in waste not oxidised and bulk-recyclable (exclude very small or thin parts) Iron: 91.91%; Alu: 93.81%; Copper: 84.39%. One kg of this waste produces 0.1022 kg of slag and 0.02052 kg of residues, which are landfilled. Additional solidification with 0.008207 kg of cement. Net energy production: 4.09MJ/kg electric energy and 7.96MJ/kg thermal energy. Recovery of metal scrap to recycling: 9.3819g iron scrap, 11.016g aluminium scrap, 5.2121g copper scrap.;;

## Included processes
Waste incineration from waste reception gate further downstream (excluding transport to the MSWI plant). Waste-specific air and water emisions from incineration, auxiliary material consumption for flue gas cleaning. Short-term emissions to river water and long-term emisisons to ground water from slag compartment (from bottom ash) and residual material landfill (from solidified fly ashes and scrubber slugde). Waste-specific process energy demands for MSWI and net energy generation.

## Geography
Specific to the technology mix encountered in Switzerland in 2010. Well applicable to modern incineration practices in Europe, North America or Japan.

## Technology
average Swiss MSWI plants in 2010 (grate incinerators) with electrostatic precipitator for fly ash (ESP), wet flue gas scrubber and 25% SNCR , 42.77% SCR-high dust , 32.68% SCR-low dust -DeNOx facilities and 0% without Denox (weighted according to mass of burnt waste, representing Swiss average). Efficiency of iron scrap separation from slag : 58%. Efficiency of non-ferrous scrap separation from slag : 31%. Gross electric efficiency technology mix 15.84% and Gross thermal efficiency technology mix 28.51%

## Time period
Waste composition as given in literature reference, theoretical data or other source. Transfer coefficients for modern MSWI.

## Reference product
- Disposal, residues, mechanical treatment, laptop computer, in MSWI [CH]: 1 kg
  SWITZERLAND

## Inputs from technosphere
- Ammonia, liquid, at regional storehouse [CH]: 0.0021393 kg; lognormal SD95 5.1544
  Input to DeNOx stage (100% NH3). uncertainty calculated from uncertainty in average DeNOx input, uncertainty in the share of thermal NOx, uncertainty of nitrogen content in average municipal waste and the uncertainty in nitrogen content in *this* waste.
- Transport, freight, rail [RER]: 0.010747 tkm; lognormal SD95 1.2551
  Transport services to transport incineration residues to landfills and to transport auxilliary inputs of the incinerator plant. uncertainty calculated from uncertainty in average auxiliary material input, the uncertainty of the waste composition of this waste and the uncertainty in generic transportation distances
- Process-specific burdens, residual material landfill [CH]: 0.020518 kg; lognormal SD95 1.5993
  mass-specific expenditures required for landfilling of incineration residues. uncertainty is calculated from uncertainties in waste composition and transfer coefficients in incinerator
- Cement, unspecified, at plant [CH]: 0.0082071 kg; lognormal SD95 1.6599
  Cement required for solidification of landfilled residual material. Uncertainty calculated from uncertainty of the waste composition of this waste, of transfer coefficients in the incinerator and of the solidification recipe.
- Transport, freight, lorry, 16t-32t gross weight, fleet average [CH]: 0.013967 tkm; lognormal SD95 1.2109
  (same comment as for Transport, freight, rail)
- Sodium hydroxide, 50% in H2O, production mix, at plant [RER]: 0.00087451 kg; lognormal SD95 2.7317
  auxilliary inputs for the flue gas treatment stage of the incinerator plant. uncertainty calculated from uncertainty in average NaOH input, of transfer coefficients in the incinerator, and the uncertainty of the waste composition of this waste
- Titanium dioxide, production mix, at plant [RER]: 0.00013404 kg; lognormal SD95 7.6078
  Input to DeNOx stage (TiO2 catalyst carrier) uncertainty calculated from uncertainty in average DeNOx input, uncertainty in the share of thermal NOx, uncertainty of nitrogen content in average municipal waste and the uncertainty in nitrogen content in *this* waste.
- Disposal, cement, hydrated, 0% water, to residual material landfill [CH]: 0.020518 kg; lognormal SD95 1.6599
  Hydrated cement output for solidification of landfilled residual material. Uncertainty calculated from uncertainty of the waste composition of this waste and transfer coefficients in the incinerator and of the solidification recipe.
- Natural gas, burned in industrial furnace 1MW [CH]: 0.40006 MJ; lognormal SD95 5.1544
  Input to DeNOx stage, to heat up flue gas in low-dust SCR. uncertainty calculated from uncertainty in average DeNOx input, uncertainty in the share of thermal NOx, uncertainty of nitrogen content in average municipal waste and the uncertainty in nitrogen content in *this* waste.
- Residual material landfill facility [CH]: 4.2745e-11 p; lognormal SD95 1.5993
  landfill infrastructure required for landfilling of incineration residues. uncertainty is calculated from uncertainties in waste composition and transfer coefficients in incinerator
- Chromium oxide, flakes, at plant [RER]: 2.7354e-6 kg; lognormal SD95 7.6078
  Input to DeNOx stage. uncertainty calculated from uncertainty in average DeNOx input, uncertainty in the share of thermal NOx, uncertainty of nitrogen content in average municipal waste and the uncertainty in nitrogen content in *this* waste.
- Slag compartment [CH]: 1.7905e-10 p; lognormal SD95 1.4736
  landfill infrastructure required for landfilling of bottom ash. uncertainty is calculated from uncertainties in waste composition and transfer coefficients in incinerator
- Municipal waste incineration plant [CH]: 2.5e-10 p; lognormal SD95 1
  demands per kilogram waste. uncertainty is heeded in the module
- Chemicals inorganic, at plant [GLO]: 0.00029338 kg; lognormal SD95 2.5205
  auxilliary inputs for the wastewater treatment stage of the incinerator plant. Proxy for Polyelectrolyte. uncertainty calculated from uncertainty in average Polyelectrolyte input, of transfer coefficients in the incinerator, and the uncertainty of the waste composition of this waste
- Hydrochloric acid, 30% in H2O, at plant [RER]: 7.7114e-5 kg; lognormal SD95 2.5205
  auxilliary inputs for the wastewater treatment stage of the incinerator plant. uncertainty calculated from uncertainty in average HCl input, of transfer coefficients in the incinerator, and the uncertainty of the waste composition of this waste
- Chemicals organic, at plant [GLO]: 4.86e-5 kg; lognormal SD95 5.6414
  auxilliary inputs for the wastewater treatment stage of the incinerator plant. Proxy for (pure) Trisodium-trimercapto-s-triazine (CAS 17766-26-6), used as 15% diluted solution, aka TMT15. uncertainty calculated from uncertainty in average TMT15 input, of transfer coefficients in the incinerator, and the uncertainty of the waste composition of this waste
- Quicklime, milled, packed, at plant [CH]: 0.0038791 kg; lognormal SD95 3.1186
  auxilliary inputs for the flue gas treatment stage of the incinerator plant. uncertainty calculated from uncertainty in average CaO input, of transfer coefficients in the incinerator, and the uncertainty of the waste composition of this waste
- Process-specific burdens, slag compartment [CH]: 0.10072 kg; lognormal SD95 1.4736
  mass-specific expenditures required for landfilling of bottom ash. uncertainty is calculated from uncertainties in waste composition and transfer coefficients in incinerator
- Water, decarbonised, at plant [RER]: 1.8707 kg; lognormal SD95 2.7676
  Incinerator process water used in flue gas scrubber stage. uncertainty calculated from uncertainty in average water input, and the uncertainty of the waste composition of this waste
- Iron (III) chloride, 40% in H2O, at plant [CH]: 0.00012552 kg; lognormal SD95 2.7676
  auxilliary inputs for the wastewater treatment stage of the incinerator plant. uncertainty calculated from uncertainty in average FeCl3 input, of transfer coefficients in the incinerator, and the uncertainty of the waste composition of this waste

## Emissions to nature
- Aluminium [emissions to water, river]: 5.6426e-7 kg; lognormal SD95 7.2311
  Emissions to water from waste composition and transfer coefficients in incinerator and landfills. uncertainty is calculated from uncertainties in waste composition and transfer coefficients in incinerator and landfills
- Hydrogen chloride [emissions to air, high. pop.]: 3.4886e-6 kg; lognormal SD95 3.8075
  Emission to air from waste composition and transfer coefficients. uncertainty is calculated from uncertainties in waste composition and transfer coefficients in incinerator
- Nitrate [emissions to water, groundwater, long-term]: 0.00043271 kg; lognormal SD95 3.2823
  Long-term emissions from landfilling of incineration residues. uncertainty is calculated from uncertainties in waste composition and transfer coefficients in incinerator and landfills.
- Dinitrogen monoxide [emissions to air, high. pop.]: 0.00017944 kg; lognormal SD95 8.2985
  Nitrogen species emitted to air after DeNOx stage. uncertainty calculated from uncertainty in average N-emissions and uncertainty in the share of thermal NOx and the uncertainty in nitrogen content in *this* waste.
- Sulfur dioxide [emissions to air, high. pop.]: 4.0933e-6 kg; lognormal SD95 5.9161
  (same comment as for Hydrogen chloride)
- Chromium [emissions to air, high. pop.]: 4.1469e-8 kg; lognormal SD95 7.6176
  (same comment as for Hydrogen chloride)
- Vanadium [emissions to water, river]: 3.289e-9 kg; lognormal SD95 13.334
  (same comment as for Aluminium)
- Fluoride [emissions to water, groundwater, long-term]: 0.00020275 kg; lognormal SD95 3.9632
  (same comment as for Nitrate)
- Antimony [emissions to air, high. pop.]: 3.4747e-9 kg; lognormal SD95 4.3681
  (same comment as for Hydrogen chloride)
- Potassium [emissions to air, high. pop.]: 5.2288e-7 kg; lognormal SD95 7.1289
  (same comment as for Hydrogen chloride)
- Cobalt [emissions to air, high. pop.]: 4.8494e-8 kg; lognormal SD95 8.5849
  (same comment as for Hydrogen chloride)
- Lead [emissions to air, high. pop.]: 1.0987e-8 kg; lognormal SD95 5.9049
  (same comment as for Hydrogen chloride)
- Sodium [emissions to water, groundwater, long-term]: 0.00028066 kg; lognormal SD95 5.0076
  (same comment as for Nitrate)
- Heat, waste [emissions to water, river]: 5.652 MJ; lognormal SD95 1.2905
  Waste heat generated from heating value of this waste plus any electricity required to process it. uncertainty is calculated from uncertainties in waste composition and uncertainties in energy efficiency and the uncertainty in internal energy demand
- Particulates, < 2.5 um [emissions to air, high. pop.]: 1.7834e-6 kg; lognormal SD95 3.385
  Incomplete combustion product emitted to air. uncertainty calculated from uncertainty in average operation emissions, and the uncertainty of the flue gas volume from this waste.
- Thallium [emissions to water, river]: 2.0684e-10 kg; lognormal SD95 15.546
  (same comment as for Aluminium)
- Calcium [emissions to air, high. pop.]: 2.2154e-5 kg; lognormal SD95 4.2436
  (same comment as for Hydrogen chloride)
- Carbon monoxide, fossil [emissions to air, high. pop.]: 2.5391e-5 kg; lognormal SD95 5.6417
  (same comment as for Particulates, < 2.5 um)
- Benzene [emissions to air, high. pop.]: 1.4937e-8 kg; lognormal SD95 1.6925
  (same comment as for Particulates, < 2.5 um)
- Calcium [emissions to water, groundwater, long-term]: 0.0023399 kg; lognormal SD95 4.0003
  (same comment as for Nitrate)
- Zinc [emissions to water, groundwater, long-term]: 0.00021607 kg; lognormal SD95 28.393
  (same comment as for Nitrate)
- Zinc [emissions to air, high. pop.]: 4.6505e-7 kg; lognormal SD95 5.5225
  (same comment as for Hydrogen chloride)
- Dioxin, 2,3,7,8 Tetrachlorodibenzo-p- [emissions to air, high. pop.]: 2.9872e-14 kg; lognormal SD95 3.385
  (same comment as for Particulates, < 2.5 um)
- Sodium [emissions to water, river]: 6.0667e-5 kg; lognormal SD95 4.0105
  (same comment as for Aluminium)
- Cyanide [emissions to air, high. pop.]: 3.855e-5 kg; lognormal SD95 8.2985
  (same comment as for Dinitrogen monoxide)
- Sulfate [emissions to water, river]: 0.0001994 kg; lognormal SD95 3.3987
  (same comment as for Aluminium)
- Iron [emissions to water, river]: 9.4705e-8 kg; lognormal SD95 9.7792
  (same comment as for Aluminium)
- Strontium [emissions to water, river]: 4.7034e-8 kg; lognormal SD95 13.698
  (same comment as for Aluminium)
- Nitrate [emissions to water, river]: 0.00015336 kg; lognormal SD95 2.6982
  (same comment as for Aluminium)
- Lead [emissions to water, groundwater, long-term]: 0.00044535 kg; lognormal SD95 9.0189
  (same comment as for Nitrate)
- Mercury [emissions to air, high. pop.]: 2.1801e-8 kg; lognormal SD95 12.674
  (same comment as for Hydrogen chloride)
- Strontium [emissions to air, high. pop.]: 7.4701e-9 kg; lognormal SD95 7.6729
  (same comment as for Hydrogen chloride)
- Chromium [emissions to water, river]: 3.6875e-9 kg; lognormal SD95 7.7162
  (same comment as for Aluminium)
- Tin [emissions to air, high. pop.]: 1.1995e-10 kg; lognormal SD95 7.0225
  (same comment as for Hydrogen chloride)
- Thallium [emissions to air, high. pop.]: 3.3763e-10 kg; lognormal SD95 13.838
  (same comment as for Hydrogen chloride)
- Chromium VI [emissions to water, river]: 1.328e-6 kg; lognormal SD95 8.0482
  (same comment as for Aluminium)
- Manganese [emissions to water, river]: 3.4146e-9 kg; lognormal SD95 14.702
  (same comment as for Aluminium)
- Titanium [emissions to water, groundwater, long-term]: 0.0012107 kg; lognormal SD95 4.9138
  (same comment as for Nitrate)
- DOC, Dissolved Organic Carbon [emissions to water, river]: 0.00038443 kg; lognormal SD95 1.3761
  (same comment as for Aluminium)
- Nickel [emissions to air, high. pop.]: 5.6931e-7 kg; lognormal SD95 5.8081
  (same comment as for Hydrogen chloride)
- Phosphate [emissions to water, groundwater, long-term]: 6.1247e-5 kg; lognormal SD95 83.527
  (same comment as for Nitrate)
- Titanium [emissions to air, high. pop.]: 3.3599e-6 kg; lognormal SD95 4.1209
  (same comment as for Hydrogen chloride)
- Barium [emissions to water, river]: 2.155e-8 kg; lognormal SD95 8.9199
  (same comment as for Aluminium)
- Chromium VI [emissions to water, groundwater, long-term]: 4.5192e-6 kg; lognormal SD95 18.565
  (same comment as for Nitrate)
- Phosphate [emissions to water, river]: 2.5535e-7 kg; lognormal SD95 4.4833
  (same comment as for Aluminium)
- Silicon [emissions to air, high. pop.]: 4.1774e-9 kg; lognormal SD95 4.3264
  (same comment as for Hydrogen chloride)
- Vanadium [emissions to air, high. pop.]: 1.4389e-8 kg; lognormal SD95 10.304
  (same comment as for Hydrogen chloride)
- Benzo(a)pyrene [emissions to air, high. pop.]: 3.324e-13 kg; lognormal SD95 3.385
  (same comment as for Particulates, < 2.5 um)
- Aluminium [emissions to water, groundwater, long-term]: 0.022063 kg; lognormal SD95 2.5721
  (same comment as for Nitrate)
- Vanadium [emissions to water, groundwater, long-term]: 8.0222e-7 kg; lognormal SD95 20.671
  (same comment as for Nitrate)
- Toluene [emissions to air, high. pop.]: 2.9874e-8 kg; lognormal SD95 1.6925
  (same comment as for Particulates, < 2.5 um)
- TOC, Total Organic Carbon [emissions to water, river]: 0.00038443 kg; lognormal SD95 1.3761
  (same comment as for Aluminium)
- Nitrogen oxides [emissions to air, high. pop.]: 0.00079652 kg; lognormal SD95 5.506
  sum of fuel-Nox and thermal-NOx emitted to air after DeNOx stage. uncertainty calculated from uncertainty in average N-emissions and uncertainty in the share of thermal NOx and the uncertainty in nitrogen content in *this* waste.
- NMVOC, non-methane volatile organic compounds, unspecified origin [emissions to air, high. pop.]: 6.7978e-7 kg; lognormal SD95 1.6925
  (same comment as for Particulates, < 2.5 um)
- Molybdenum [emissions to air, high. pop.]: 3.5707e-9 kg; lognormal SD95 11.222
  (same comment as for Hydrogen chloride)
- Potassium [emissions to water, groundwater, long-term]: 8.2274e-5 kg; lognormal SD95 4.2703
  (same comment as for Nitrate)
- BOD5, Biological Oxygen Demand [emissions to water, groundwater, long-term]: 0.0018485 kg; lognormal SD95 1.2653
  (same comment as for Nitrate)
- Benzene, pentachloro- [emissions to air, high. pop.]: 7.8917e-11 kg; lognormal SD95 1.6925
  (same comment as for Particulates, < 2.5 um)
- Silicon [emissions to water, groundwater, long-term]: 0.00028645 kg; lognormal SD95 109.07
  (same comment as for Nitrate)
- Cadmium [emissions to air, high. pop.]: 6.9466e-8 kg; lognormal SD95 6.9696
  (same comment as for Hydrogen chloride)
- Tin [emissions to water, river]: 5.0711e-9 kg; lognormal SD95 11.64
  (same comment as for Aluminium)
- Silver [emissions to water, river]: 6.5125e-9 kg; lognormal SD95 16.609
  (same comment as for Aluminium)
- Potassium [emissions to water, river]: 2.3038e-5 kg; lognormal SD95 4.61
  (same comment as for Aluminium)
- Cadmium [emissions to water, groundwater, long-term]: 1.0113e-5 kg; lognormal SD95 155.4
  (same comment as for Nitrate)
- Sodium [emissions to air, high. pop.]: 1.036e-6 kg; lognormal SD95 6.0516
  (same comment as for Hydrogen chloride)
- Fluoride [emissions to water, river]: 1.7292e-5 kg; lognormal SD95 4.2474
  (same comment as for Aluminium)
- Molybdenum [emissions to water, river]: 7.4117e-7 kg; lognormal SD95 7.4066
  (same comment as for Aluminium)
- TOC, Total Organic Carbon [emissions to water, groundwater, long-term]: 0.0022362 kg; lognormal SD95 1.2653
  (same comment as for Nitrate)
- Arsenic [emissions to water, river]: 4.6996e-6 kg; lognormal SD95 9.0405
  (same comment as for Aluminium)
- Aluminium [emissions to air, high. pop.]: 1.7675e-9 kg; lognormal SD95 3.0625
  (same comment as for Hydrogen chloride)
- Nickel [emissions to water, groundwater, long-term]: 0.00045588 kg; lognormal SD95 5.5426
  (same comment as for Nitrate)
- COD, Chemical Oxygen Demand [emissions to water, groundwater, long-term]: 0.0056513 kg; lognormal SD95 1.2653
  (same comment as for Nitrate)
- Tin [emissions to water, groundwater, long-term]: 8.353e-5 kg; lognormal SD95 12.342
  (same comment as for Nitrate)
- Mercury [emissions to water, groundwater, long-term]: 4.8972e-8 kg; lognormal SD95 34.978
  (same comment as for Nitrate)
- Selenium [emissions to air, high. pop.]: 2.1147e-8 kg; lognormal SD95 11.628
  (same comment as for Hydrogen chloride)
- Sulfate [emissions to water, groundwater, long-term]: 0.00099453 kg; lognormal SD95 3.9145
  (same comment as for Nitrate)
- Iron [emissions to water, groundwater, long-term]: 0.004275 kg; lognormal SD95 3.5934
  (same comment as for Nitrate)
- Arsenic [emissions to water, groundwater, long-term]: 2.0316e-6 kg; lognormal SD95 9.9507
  (same comment as for Nitrate)
- Carbon dioxide, fossil [emissions to air, high. pop.]: 2.7426 kg; lognormal SD95 1.1055
  (same comment as for Hydrogen chloride)
- Copper [emissions to water, river]: 7.9595e-7 kg; lognormal SD95 7.2494
  (same comment as for Aluminium)
- Bromine [emissions to water, groundwater, long-term]: 0.00047953 kg; lognormal SD95 3.8913
  (same comment as for Nitrate)
- Bromine [emissions to air, high. pop.]: 2.4851e-6 kg; lognormal SD95 3.9601
  (same comment as for Hydrogen chloride)
- Cadmium [emissions to water, river]: 1.3149e-8 kg; lognormal SD95 5.9734
  (same comment as for Aluminium)
- COD, Chemical Oxygen Demand [emissions to water, river]: 0.0008803 kg; lognormal SD95 1.3755
  (same comment as for Aluminium)
- Benzene, hexachloro- [emissions to air, high. pop.]: 3.1233e-11 kg; lognormal SD95 1.6925
  (same comment as for Particulates, < 2.5 um)
- Ammonia [emissions to air, high. pop.]: 2.5153e-6 kg; lognormal SD95 5.506
  (same comment as for Dinitrogen monoxide)
- Beryllium [emissions to water, river]: 2.6433e-10 kg; lognormal SD95 19.349
  (same comment as for Aluminium)
- Thallium [emissions to water, groundwater, long-term]: 1.9702e-7 kg; lognormal SD95 9.6314
  (same comment as for Nitrate)
- Chloride [emissions to water, river]: 0.0048571 kg; lognormal SD95 3.1034
  (same comment as for Aluminium)
- Antimony [emissions to water, groundwater, long-term]: 0.002759 kg; lognormal SD95 3.8408
  (same comment as for Nitrate)
- Lead [emissions to water, river]: 1.9709e-8 kg; lognormal SD95 7.9874
  (same comment as for Aluminium)
- Heat, waste [emissions to air, high. pop.]: 24.572 MJ; lognormal SD95 1.2905
  (same comment as for Heat, waste)
- Zinc [emissions to water, river]: 6.2751e-8 kg; lognormal SD95 4.7323
  (same comment as for Aluminium)
- Nickel [emissions to water, river]: 3.1765e-7 kg; lognormal SD95 9.9895
  (same comment as for Aluminium)
- Selenium [emissions to water, river]: 5.9881e-7 kg; lognormal SD95 8.8594
  (same comment as for Aluminium)
- DOC, Dissolved Organic Carbon [emissions to water, groundwater, long-term]: 0.0022362 kg; lognormal SD95 1.2653
  (same comment as for Nitrate)
- Arsenic [emissions to air, high. pop.]: 5.3143e-8 kg; lognormal SD95 10.049
  (same comment as for Hydrogen chloride)
- Phosphorus [emissions to air, high. pop.]: 4.5963e-7 kg; lognormal SD95 5.8081
  (same comment as for Hydrogen chloride)
- Methane, fossil [emissions to air, high. pop.]: 2.2406e-7 kg; lognormal SD95 1.6925
  (same comment as for Particulates, < 2.5 um)
- Beryllium [emissions to water, groundwater, long-term]: 3.8572e-7 kg; lognormal SD95 12.551
  (same comment as for Nitrate)
- Hydrogen fluoride [emissions to air, high. pop.]: 1.5257e-6 kg; lognormal SD95 6.4218
  (same comment as for Hydrogen chloride)
- Particulates, > 2.5 um, and < 10um [emissions to air, high. pop.]: 8.9616e-9 kg; lognormal SD95 2.2567
  (same comment as for Particulates, < 2.5 um)
- Manganese [emissions to water, groundwater, long-term]: 5.1581e-5 kg; lognormal SD95 7.7427
  (same comment as for Nitrate)
- Antimony [emissions to water, river]: 0.001495 kg; lognormal SD95 4.0148
  (same comment as for Aluminium)
- Molybdenum [emissions to water, groundwater, long-term]: 1.969e-6 kg; lognormal SD95 11.001
  (same comment as for Nitrate)
- Selenium [emissions to water, groundwater, long-term]: 1.1513e-6 kg; lognormal SD95 8.1139
  (same comment as for Nitrate)
- BOD5, Biological Oxygen Demand [emissions to water, river]: 0.00086899 kg; lognormal SD95 1.3806
  (same comment as for Aluminium)
- Silicon [emissions to water, river]: 7.2472e-7 kg; lognormal SD95 5.1778
  (same comment as for Aluminium)
- Cobalt [emissions to water, river]: 4.831e-9 kg; lognormal SD95 11.129
  (same comment as for Aluminium)
- Cobalt [emissions to water, groundwater, long-term]: 2.1721e-5 kg; lognormal SD95 7.8597
  (same comment as for Nitrate)
- Copper [emissions to water, groundwater, long-term]: 0.014722 kg; lognormal SD95 2.9017
  (same comment as for Nitrate)
- Chloride [emissions to water, groundwater, long-term]: 0.0014424 kg; lognormal SD95 3.5991
  (same comment as for Nitrate)
- Bromine [emissions to water, river]: 0.0044931 kg; lognormal SD95 2.3658
  (same comment as for Aluminium)
- Manganese [emissions to air, high. pop.]: 1.192e-9 kg; lognormal SD95 8.0656
  (same comment as for Hydrogen chloride)
- Barium [emissions to water, groundwater, long-term]: 8.0634e-5 kg; lognormal SD95 20.167
  (same comment as for Nitrate)
- Phenol, pentachloro- [emissions to air, high. pop.]: 6.5049e-12 kg; lognormal SD95 1.6925
  (same comment as for Particulates, < 2.5 um)
- Titanium [emissions to water, river]: 1.5099e-6 kg; lognormal SD95 3.5246
  (same comment as for Aluminium)
- Mercury [emissions to water, river]: 8.3505e-10 kg; lognormal SD95 8.3936
  (same comment as for Aluminium)
- Iron [emissions to air, high. pop.]: 2.5582e-9 kg; lognormal SD95 3.4969
  (same comment as for Hydrogen chloride)
- Calcium [emissions to water, river]: 3.2229e-5 kg; lognormal SD95 3.5493
  (same comment as for Aluminium)
- Barium [emissions to air, high. pop.]: 6.2844e-7 kg; lognormal SD95 6.76
  (same comment as for Hydrogen chloride)
- Copper [emissions to air, high. pop.]: 2.6463e-7 kg; lognormal SD95 3.1684
  (same comment as for Hydrogen chloride)
- Strontium [emissions to water, groundwater, long-term]: 7.4604e-5 kg; lognormal SD95 7.3919
  (same comment as for Nitrate)
- Silver [emissions to water, groundwater, long-term]: 0.00018757 kg; lognormal SD95 6.517
  (same comment as for Nitrate)

## Sampling procedure
fully waste-specific calculation based on literature data for average MSWI operation performance

## Extrapolations
Typical elemental transfer coefficients from current studies for modern MSWI, completed with data from coal power plants and estimates, adapted for inert/burnable waste.

## Uncertainty adjustments
uncertainty of waste input composition data derived from generic formula GSD(c) = N*ln(c)+1

## Sources
- Doka G., 2013, 2013 - Updates LCI waste treatment services - Doka, -, Doka LCA, Zuerich, CH
Doka G. (2013) Updates to Life Cycle Inventories of Waste Treatment Services - part II: waste incineration. Doka LCA. Zurich.
Type: Separate publication
Source: Report to document the 2013 changes to the MSWI incinerator model and datasets (URL: http://www.doka.ch/ecoinventMSWIupdateLCI2013.pdf). To be read with the ecoinvent Nr 13 report (Doka 2009, Life Cycle Inventories of Waste Treatment Services) for ecoinvent v2.2.
First author: Doka G.
Year: 2013
Place of publication: Zurich
Publisher: Doka LCA
Original title: Updates to Life Cycle Inventories of Waste Treatment Services - part II: waste incineration

## Validation
Proof reading validation: Passed.; Other validation: none;
