# Sodium sulphate, powder, production mix, at plant

Dataset: EcoSpold 1, unit process
Functional unit: 1 kg
Category: chemicals / inorganic
Geography: RER
Time period: 2000-01 to 2000-12
Production volume: worldwide production 5.5 Mt in 1997
Generated by: Roland Hischier
accessRestrictedTo: 0
copyright: true

## General comment
The functional unit represent 1 kg of sodium sulphate powder. Very large uncertainty of the process data due to the weak data on the process.;

## Included processes
Mixture of three different ways for the production of sodium sulphate: from natural resources, as by-product out of other processes, as main product from chemical processes. Energy amount for conditioning of by-product sodium sulphate included here.

## Technology
data represent a mixture of three possible production ways. Natural resources by evaporation & further treatment, by product out of chemical industry, main product from Mannheim process (NaCl & H2SO4).

## Reference product
- Sodium sulphate, powder, production mix, at plant [RER]: 1 kg
  Europe

## Inputs from technosphere
- Electricity, medium voltage, production ENTSO-E, at grid: 0.333 kWh; lognormal SD95 1.9
  (5,5,1,1,4,5); estimated with data from 1 large chemical plant
- Sodium sulphate, from natural sources, at plant [RER]: 0.6 kg; lognormal SD95 1.2
  (3,1,2,2,1,5); information from US market survey
- Natural gas, burned in industrial furnace 1MWth [CH]: 2 MJ; lognormal SD95 1.9
  (5,5,1,1,4,5); estimated with data from 1 large chemical plant
- Sodium sulphate, from Mannheim process, at plant [RER]: 0.15 kg; lognormal SD95 1.2
  (3,1,2,2,1,5); information from US market survey

## Emissions to nature
- Heat, waste [emissions to air, high. pop.]: 1.2 MJ; lognormal SD95 1.9
  (5,5,1,1,4,5); calculated from electricity input

## Sampling procedure
literature and estimations out of similar processes

## Extrapolations
see technology

## Sources
- Althaus H.-J., Chudacoff M., Hellweg S., Hischier R., Jungbluth N., Osses M., Primas A., 2007, 2007 - LCI chemicals - Althaus, Final report ecoinvent data v2.0, 8, Swiss Centre for LCI, Empa - TSL, ETH, ESU-services Ltd., Chudacoff Oekoscience, Duebendorf, CH
Althaus H.-J., Chudacoff M., Hischier R., Jungbluth N., Osses M., Primas A. (2007) Life Cycle Inventories of Chemicals. Final report ecoinvent data v2.0. Volume: 8. Swiss Centre for LCI, Empa - TSL. Dübendorf, CH.
Type: Measurement on site
Source: CD-ROM
First author: Althaus H.-J.
Other authors: Chudacoff M., Hischier R., Jungbluth N., Osses M., Primas A.
Year: 2007
Title of anthology: Final report ecoinvent data v2.0
Place of publication: Dübendorf, CH
Publisher: Swiss Centre for LCI, Empa - TSL
Volume No: 8

## Validation
Proof reading validation: Passed.; Other validation: none;
