# Transport, freight, lorry, fleet average

Dataset: EcoSpold 1, unit process
Functional unit: 1 tkm
Category: transport systems / road\Transformation
Geography: RER
Time period: 2020-01 to 2020-12
Generated by: Brian Cox
accessRestrictedTo: 0
copyright: False

## General comment
Average of other Mobitool datasets created with the purpose of replacing older datasets in the database. Basis for fleet shares: Switzerland year 2020. Source: HBEFA 5.1, INFRAS.

## Time period
Technology and fleet shares valid for year 2020

## Reference product
- Transport, freight, lorry, fleet average [RER]: 1 tkm

## Inputs from technosphere
- Transport, freight, lorry, 3.5t-7.5t gross weight, fleet average [RER]: 0.00505511 tkm; lognormal SD95 1.06225
  Uncertainty from pedigree matrix: (2,1,2,3,1,1); Share of technologies and euro classes from HBEFA 5.1 for CH 2024, assume equal share of available distance categories
- Transport, freight, lorry, 7.5t-16t gross weight, fleet average [RER]: 0.01446 tkm; lognormal SD95 1.06225
  (same comment as for Transport, freight, lorry, 3.5t-7.5t gross weight, fleet average)
- Transport, freight, lorry, 16t-32t gross weight, fleet average [RER]: 0.356453 tkm; lognormal SD95 1.06225
  (same comment as for Transport, freight, lorry, 3.5t-7.5t gross weight, fleet average)
- Transport, freight, lorry, 32t-40t gross weight, fleet average [RER]: 0.624032 tkm; lognormal SD95 1.06225
  (same comment as for Transport, freight, lorry, 3.5t-7.5t gross weight, fleet average)

## Sources
- Cox B., 2025, 2025 - Mobitool integration project - Cox, INFRAS, Bern, CH

## Validation
Data from HBEFA 5.1 for the year 2020. Some technologies with very small shares in the fleet removed for simplicity. Technology shares normalised to ensure sum of 100%
