# Soft solder, Sn97Cu3, at plant

Dataset: EcoSpold 1, unit process
Functional unit: 1 kg
Category: metals / alloys
Geography: RER
Time period: 2000-01 to 2000-12
Production volume: 2000t for this product.
Generated by: Niels Jungbluth
accessRestrictedTo: 0
copyright: true

## General comment
The inventory is meant to be used as a background dataset for technical processes using soft solder. The lead-free product investigated is Sn97Cu3 that is made from tin (97%) and copper (3%). The investigation is based on data provided by a producer and information from literature.;

## Included processes
Gate to gate including solder mixing and casting, atomisation and paste mixing, including estimate for emissions and infrastructure.

## Technology
Production of lead-free soft solder from metals tin and copper.

## Time period
Time of publications. Most data for 2000.

## Reference product
- Soft solder, Sn97Cu3, at plant [RER]: 1 kg
  Europe

## Inputs from technosphere
- Transport, freight, lorry, fleet average [RER]: 0.141 tkm; lognormal SD95 2.1
  (4,5,na,na,na,na); Standard distance 100km, 50km
- Disposal, separator sludge, 90% water, to hazardous waste incineration [CH]: 0.0075 kg; lognormal SD95 1.1
  (2,3,1,3,1,3); Waste water from production
- Electricity, medium voltage, production ENTSO-E, at grid: 0.25 kWh; lognormal SD95 1.1
  (2,3,1,3,1,3); Questionnaire
- Disposal, municipal solid waste, 22.9% water, to municipal incineration [CH]: 0.025 kg; lognormal SD95 1.1
  (2,3,1,3,1,3); Unspecified wastes
- Natural gas, burned in industrial furnace 1MWth [CH]: 0.828 MJ; lognormal SD95 1.1
  (2,3,1,3,1,3); Questionnaire
- Tap water, at user [RER]: 0.0075 kg; lognormal SD95 1.1
  (2,3,1,3,1,3); Produced waste water
- Chemicals organic, at plant [GLO]: 0.111 kg; lognormal SD95 1.1
  (3,3,2,3,1,3); Assumption for additives based on literature
- Copper, at regional storage [RER]: 0.0273 kg; lognormal SD95 1.1
  (2,3,1,3,1,3); 1% losses
- Transport, freight, rail [RER]: 0.326 tkm; lognormal SD95 2.1
  (4,5,na,na,na,na); Standard distance 100, 200, 600km
- Nitrogen, liquid, at plant [RER]: 0.774 kg; lognormal SD95 1.1
  (3,3,2,3,1,3); Literature, Inert gas
- Solder production plant [RER]: 2e-10 p; lognormal SD95 3
  (2,3,1,3,1,3); Calculation for plant with 100'000t/a and a life time of 50a
- Tin, at regional storage [RER]: 0.882 kg; lognormal SD95 1.1
  (2,3,1,3,1,3); 1% losses

## Emissions to nature
- Tin [emissions to air, unspecified]: 3e-6 kg; lognormal SD95 6.1
  (5,3,1,3,5,5); Estimation (97% of 5mg/m3 in flow rate of inert gas)
- Hydrogen chloride [emissions to air, unspecified]: 1.86e-5 kg; lognormal SD95 2.5
  (5,3,1,3,5,5); Maximum estimation in inert gas flow
- Ammonia [emissions to air, unspecified]: 9.25e-6 kg; lognormal SD95 2.3
  (5,3,1,3,5,5); Maximum estimation in inert gas flow
- Copper [emissions to air, unspecified]: 9.29e-8 kg; lognormal SD95 6.1
  (5,3,1,3,5,5); Estimation (3% of 5mg/m3 in flow rate of inert gas)
- NMVOC, non-methane volatile organic compounds, unspecified origin [emissions to air, unspecified]: 3.08e-5 kg; lognormal SD95 2.5
  (5,3,1,3,5,5); Maximum estimation in inert gas flow
- Particulates, > 10 um [emissions to air, unspecified]: 6.17e-6 kg; lognormal SD95 2.9
  (5,3,1,3,5,5); Maximum estimation in inert gas flow
- Heat, waste [emissions to air, unspecified]: 0.9 MJ; lognormal SD95 1.1
  (2,3,1,3,1,3); Calculation

## Sampling procedure
Questionnaire and literature

## Extrapolations
From one producer to European average.

## Sources
- Classen M., Althaus H.-J., Blaser S., Scharnhorst W., Tuchschmid M., Jungbluth N., Faist Emmenegger M., 2009, 2009 - LCI metals - Classen, Final report ecoinvent data v2.1, 10, Swiss Centre for LCI, Empa, ESU-services Ltd., Duebendorf, CH
Classen M., Althaus H.-J., Blaser S., Doka G., Jungbluth N., Tuchschmid M. (2008) Life Cycle Inventories of Metals. Final report ecoinvent data v2.1. Volume: 10. Issue: 0. Swiss Centre for LCI, Empa - TSL. Dübendorf, CH.
Type: Measurement on site
Source: CD-ROM
First author: Classen M.
Other authors: Althaus H.-J., Blaser S., Doka G., Jungbluth N., Tuchschmid M.
Year: 2008
Title of anthology: Final report ecoinvent data v2.1
Place of publication: Dübendorf, CH
Publisher: Swiss Centre for LCI, Empa - TSL
Volume No: 10
Issue No: 0

## Validation
Proof reading validation: passed; Other validation: none;
