# Gold, from combined gold-silver production, at refinery

Dataset: EcoSpold 1, unit process
Functional unit: 1 kg
Category: metals / non ferro
Geography: PE
Time period: 2002-01 to 2005-12
Production volume: 102.64 t gold and 36.66 t silver per year
Generated by: Matthias Tuchschmid
accessRestrictedTo: 0
copyright: true

## General comment
This multi-output process 'mining and refining, gold-silver deposit' delivers the two co-products 'gold, from combined gold-silver-production, at refinery' and 'silver, from combined gold-silver-production, at refinery'. This data set includes the mining in Peru in open pit mines incl. land use. Air emissions are estimated.;

## Included processes
This data set includes the combined mining and refining of gold and silver in open pit mines in Peru incl. energy and material use, water and air emissions of metals and land use.

## Geography
Material requirements are estimated with Australian data, water emissions are estimated with Data from Papua New Guinea

## Technology
The mining of ore from open pit mines is considered.

## Time period
Period of public environmental report

## Reference product
- Gold, from combined gold-silver production, at refinery [PE]: 1 kg
  PERU

## Inputs from technosphere
- Electricity, medium voltage, at grid [BR]: 3264.02 kWh; lognormal SD95 1.1959
  (3,4,1,5,1,3); Environmental report
- Mine, gold and silver [PE]: 1.9372e-7 p; lognormal SD95 3.0521
  (1,3,1,2,3,3); Annual report
- Disposal, sulfidic tailings, off-site [GLO]: 760393 kg; lognormal SD95 1.1724
  (3,3,1,5,1,3); Environmental report
- Diesel, burned in diesel-electric generating set [GLO]: 76.2911 MJ; lognormal SD95 1.1639
  (3,4,1,2,1,3); Environmental report
- Transport, freight, lorry, 3.5t gross weight, fleet average [RER]: 1.09524 tkm; lognormal SD95 2.2389
  (5,3,1,1,1,3); Estimations
- Blasting [RER]: 413.012 kg; lognormal SD95 1.0882
  (1,3,1,1,1,3); Environmental report
- Limestone, milled, packed, at plant [CH]: 1156.97 kg; lognormal SD95 1.1358
  (3,3,1,1,1,3); Environmental report
- Charcoal, at plant [GLO]: 16.9685 kg; lognormal SD95 1.2038
  (3,3,3,5,1,3); Calculation, based on thesis on Australian precious metal production, data for 1999
- Facilities precious metal refinery [SE]: 2.1804e-7 p; lognormal SD95 3.0909
  (4,5,na,na,na,na); Environmental report
- Sulphuric acid, liquid, at plant [RER]: 5.26326 kg; lognormal SD95 1.1358
  (3,3,1,1,1,3); Environmental report
- Sodium hydroxide, 50% in H2O, production mix, at plant [RER]: 11.6452 kg; lognormal SD95 1.2038
  (same comment as for Charcoal, at plant)
- Hydrochloric acid, 30% in H2O, at plant [RER]: 5.26326 kg; lognormal SD95 1.1358
  (3,3,1,1,1,3); Environmental report
- Zinc, primary, at regional storage [RER]: 2.8946 kg; lognormal SD95 1.2038
  (same comment as for Charcoal, at plant)
- Sodium cyanide, at plant [RER]: 42.603 kg; lognormal SD95 1.1358
  (3,3,1,1,1,3); Environmental report
- Diesel, burned in building machine, average [CH]: 47111.7 MJ; lognormal SD95 1.1639
  (3,4,1,2,1,3); Environmental report
- Transport, freight, lorry, fleet average [RER]: 1700.63 tkm; lognormal SD95 2.2389
  (5,3,1,1,1,3); Estimations

## Inputs from nature
- Water, river [resources, in water]: 2.63037 m3; lognormal SD95 1.1724
  (3,3,1,5,1,3); Environmental report
- Water, well [resources, in water]: 4.26524 m3; lognormal SD95 1.1724
  (3,3,1,5,1,3); Environmental report
- Gold, Au 1.3E-4%, Ag 4.6E-5%, in ore [resources, in ground]: 1.17644 kg; lognormal SD95 1.1724
  (3,3,1,5,1,3); Environmental report

## Emissions to nature
- Lead [emissions to water, river]: 0.020361 kg; lognormal SD95 5.037
  (3,3,2,5,1,3); Estimated with data from combined production, PG
- Arsenic [emissions to water, river]: 0.029718 kg; lognormal SD95 5.037
  (3,3,2,5,1,3); Estimated with data from combined production, PG
- Mercury [emissions to water, river]: 0.00031568 kg; lognormal SD95 5.037
  (3,3,2,5,1,3); Estimated with data from combined production, PG
- Zinc [emissions to water, river]: 49.1215 kg; lognormal SD95 5.037
  (3,3,2,5,1,3); Estimated with data from combined production, PG
- Carbon dioxide, fossil [emissions to air, low. pop.]: 67.755 kg; lognormal SD95 1.1358
  (3,3,1,1,1,3); Environmental report
- Mercury [emissions to air, low. pop.]: 0.003339 kg; lognormal SD95 5.0215
  (3,3,1,1,1,3); Environmental report
- Cadmium [emissions to water, river]: 0.13914 kg; lognormal SD95 3.0325
  (3,3,2,5,1,3); Estimated with data from combined production, PG
- Nickel [emissions to water, river]: 1.84718 kg; lognormal SD95 5.037
  (3,3,2,5,1,3); Estimated with data from combined production, PG
- Copper [emissions to water, river]: 7.71125 kg; lognormal SD95 3.0325
  (3,3,2,5,1,3); Estimated with data from combined production, PG
- Arsenic [emissions to air, low. pop.]: 8.7868e-5 kg; lognormal SD95 5.0357
  (3,3,1,5,1,3); Environmental report
- Cyanide [emissions to water, river]: 12.5092 kg; lognormal SD95 3.0325
  (3,3,2,5,1,3); Estimated with data from combined production, PG
- Lead [emissions to air, low. pop.]: 0.00043934 kg; lognormal SD95 5.0215
  (3,3,1,1,1,3); Environmental report
- Heat, waste [emissions to air, low. pop.]: 11750.8 MJ; lognormal SD95 1.1358
  (3,3,1,1,1,3); Calculation
- Water [emissions to water, unspecified]: 2498.85, 3838.71 kg (2 entries); lognormal SD95 2.5196
  (5,5,5,5,5,BU:1.05); All uncertainty-values set to 5.0 by default. Balance of input water

## Sampling procedure
environmental report

## Extrapolations
See Geography, estimations have been made for refinement of Gold

## Sources
- Classen M., Althaus H.-J., Blaser S., Scharnhorst W., Tuchschmid M., Jungbluth N., Faist Emmenegger M., 2009, 2009 - LCI metals - Classen, Final report ecoinvent data v2.1, 10, Swiss Centre for LCI, Empa, ESU-services Ltd., Duebendorf, CH
Classen M., Althaus H.-J., Blaser S., Doka G., Jungbluth N., Tuchschmid M. (2008) Life Cycle Inventories of Metals. Final report ecoinvent data v2.1. Volume: 10. Issue: 0. Swiss Centre for LCI, Empa - TSL. Dübendorf, CH.
Type: Measurement on site
Source: CD-ROM
First author: Classen M.
Other authors: Althaus H.-J., Blaser S., Doka G., Jungbluth N., Tuchschmid M.
Year: 2008
Title of anthology: Final report ecoinvent data v2.1
Place of publication: Dübendorf, CH
Publisher: Swiss Centre for LCI, Empa - TSL
Volume No: 10
Issue No: 0

## Validation
Proof reading validation: Passed; Other validation: none;
