# Roof tile, market mix, at regional storage

Dataset: EcoSpold 1, unit process
Functional unit: 1 kg
Category: construction materials / others
Geography: CH
Time period: 2000-01 to 2000-12
Production volume: CH consumption of roof tiles and bricks: 842 kt
Share of production covered: 0 %
Generated by: Franziska Wyss
accessRestrictedTo: 0
copyright: true

## General comment
pipeline transport is modelled as freight train transport.;

## Included processes
This data set accounts for 1 kg of roof tiles at the regional storage. 9% are from import, 91% are produced in Switzerland. The imported share is weighted with a factor of 1.1. The imported goods are delievered to Switzerland to 70% from Germany, 16% from Italy 8% from Austria, 2% from Denmark and 1% each comes from Spain and the Netherlands. 1% is delievered by boat, 4% are delievered by freight train and 98% by lorry. The averag import distance is 696 km.

## Reference product
- Roof tile, market mix, at regional storage [CH]: 1 kg
  SWITZERLAND

## Inputs from technosphere
- Transport, freight, rail [RER]: 0.0031283 tkm; lognormal SD95 2.095
  (4,5,na,na,na,na,BU:2); Gewichtete Durchschnittsdistanz für Backsteine beträgt 698 km. Die gewichtete Durchschnittsdistanz für Dachziegelbeträgt 643 km / ;
- Transport, barge [RER]: 0.00059206 tkm; lognormal SD95 2.095
  (same comment as for Transport, freight, rail)
- Transport, freight, lorry, fleet average [RER]: 0.069056 tkm; lognormal SD95 2.095
  (same comment as for Transport, freight, rail)
- Roof tile, at plant [RER]: 1 kg; lognormal SD95 1.05
  (1,1,1,1,1,1,BU:1.05); 1 kg Dachziegel;

## Sampling procedure
statistical data

## Sources
- Kasser U., R. Frischknecht, M. Klingler, D. Savi, R. Itten, F. Wyss,P. Stolz, L. Tschuemperlin, 2016, 2016 - Renewal and exp. of LCA data in KBOB - Kasser, Project report, 489, Buero fuer Umweltchemie, treeze Ltd., Zuerich and Uster, CH
Wyss F., Frischknecht R., Tschümperlin L. (2014) Erweiterung der KBOB -Empfehlung - Abschätzung der Marktsituation von ausgwählten Baustoffen. Project report. Volume: 489. Treeze Ltd.. Uster, CH.
Type: Separate publication
Source: Report
First author: Wyss F.
Other authors: Frischknecht R., Tschümperlin L.
Year: 2014
Title of anthology: Project report
Place of publication: Uster, CH
Publisher: Treeze Ltd.
Volume No: 489
Original title: Erweiterung der KBOB -Empfehlung - Abschätzung der Marktsituation von ausgwählten Baustoffen

## Validation
Proof reading validation: 13.01.2016; Other validation: G:\Projekte laufend\489 Erweiterung KBOB-Liste BFE\EcoSpold\Marktsituation\[489_ecospold_Marktsituation_v0.5.xlsx]X-Process;
