# Palm kernel oil, at oil mill

Dataset: EcoSpold 1, unit process
Functional unit: 1 kg
Category: agricultural / plant oils
Geography: MY
Time period: 2000-01 to 2000-12
Production volume: Processing of fresh palm fruit bunches was 76 Mt in 2005 in MY
Share of production covered: 0 %
Generated by: Edgard Gnansounou
accessRestrictedTo: 0
copyright: true

## General comment
Inventory refers to the production of 1 kg palm oil, respectively palm kernel oil and palm kernel meal, from palm oil. The multioutput-process 'palm fruit bunches, in oil mill' delivers the co-products 'palm oil, at oil mill', 'palm kernel oil, at oil mill' and 'palm kernel meal, at oil mill'. Economic allocation with allocation factor of 81.3% to palm oil, 17.3% to palm kernel oil, and 1.4% to palm kernel meal. Allocation of CO2 emissions is done according to carbon balance.;

## Included processes
This process includes the extraction of palm oil, palm kernel oil and palm kernel meal, from palm fruit bunches. Energy supply from extracted solids (fibres, shells, digester solids and empty fruit bunches) and treatment of specific wastewater effluents are taken into account. System boundary is at the oil mill.

## Geography
Data from various literature references (incl. specific Malaysian and Indonesian industrial data)

## Technology
Typical palm oil mill designed for palm oil and palm kernel oil extraction, Malaysian context. Palm fuit bunches undergo sterilization, stripping, digestion, oil extraction, screening, settling and refining.

## Time period
Data from 1995 to 2006, current technology for palm oil mills in MY

## Reference product
- Palm kernel oil, at oil mill [MY]: 1 kg
  MALAYSIA

## Inputs from technosphere
- Chemicals organic, at plant [GLO]: 0.00013391 kg; lognormal SD95 1.3241
  (4,4,2,1,1,5); Adapted from the dataset 'wood chips, in cogen 6400kWth, wood', according to actual water, carbon and energy content of the fuel (fibres, empty fruit bunch, shell, digester solids)
- Disposal, used mineral oil, 10% water, to hazardous waste incineration [CH]: 7.6518e-5 kg; lognormal SD95 1.3241
  (same comment as for Chemicals organic, at plant)
- Phosphoric acid, industrial grade, 85% in H2O, at plant [RER]: 0.0012555 kg; lognormal SD95 1.1031
  (2,3,1,2,1,3); Literature data & biodiesel producer
- Hexane, at plant [RER]: 0.004363 kg; lognormal SD95 1.1461
  (2,3,1,5,1,3); Literature and industrial data
- Disposal, wood ash mixture, pure, 0% water, to municipal incineration [CH]: 0.0030795 kg; lognormal SD95 1.3241
  (same comment as for Chemicals organic, at plant)
- Water, decarbonised, at plant [RER]: 0.01836 kg; lognormal SD95 1.3241
  (same comment as for Chemicals organic, at plant)
- Palm fruit bunches, at farm [MY]: 6.48785 kg; lognormal SD95 1.209
  (1,2,1,1,1,5); Literature and industrial data, cross-checking of various references
- Cogen unit 6400kWth, wood burning, common components for heat+electricity [CH]: 2.2513e-8 p; lognormal SD95 3.1045
  (same comment as for Chemicals organic, at plant)
- Oil mill [CH]: 1.4298e-9 p; lognormal SD95 3.2843
  (1,4,1,3,4,5); Calculation, according to production capacity and lifetime of the plant
- Disposal, wood ash mixture, pure, 0% water, to landfarming [CH]: 0.0030795 kg; lognormal SD95 1.3241
  (same comment as for Chemicals organic, at plant)
- Ammonia, liquid, at regional storehouse [RER]: 1.913e-7 kg; lognormal SD95 1.3241
  (same comment as for Chemicals organic, at plant)
- Transport, freight, lorry, fleet average [RER]: 0.00056185 tkm; lognormal SD95 2.095
  (4,5,na,na,na,na); Based on ecoinvent Guidelines, standard distances
- Treatment, sewage, from residence, to wastewater treatment, class 2 [CH]: 0.005306 m3; lognormal SD95 1.1635
  (1,3,3,1,1,4); Calculation, to close mass balance of process
- Treatment, sewage, to wastewater treatment, class 2 [CH]: 1.836e-5 m3; lognormal SD95 1.3241
  (same comment as for Chemicals organic, at plant)
- Disposal, municipal solid waste, 22.9% water, to municipal incineration [CH]: 7.6518e-5 kg; lognormal SD95 1.3241
  (same comment as for Chemicals organic, at plant)
- Disposal, wood ash mixture, pure, 0% water, to sanitary landfill [CH]: 0.0061822 kg; lognormal SD95 1.3241
  (same comment as for Chemicals organic, at plant)
- Sodium chloride, powder, at plant [RER]: 9.565e-5 kg; lognormal SD95 1.3241
  (same comment as for Chemicals organic, at plant)
- Lubricating oil, at plant [RER]: 7.6518e-5 kg; lognormal SD95 1.3241
  (same comment as for Chemicals organic, at plant)
- Cogen unit 6400kWth, wood burning, components for electricity only [CH]: 2.2513e-8 p; lognormal SD95 3.1045
  (same comment as for Chemicals organic, at plant)
- Cogen unit 6400kWth, wood burning, building [CH]: 5.6223e-9 p; lognormal SD95 3.1045
  (same comment as for Chemicals organic, at plant)
- Transport, freight, rail [RER]: 0.0033711 tkm; lognormal SD95 2.095
  (4,5,na,na,na,na); Based on ecoinvent Guidelines, standard distances
- Transport, freight, lorry, 7.5t-16t gross weight, fleet average [RER]: 0.64878 tkm; lognormal SD95 2.095
  (4,5,na,na,na,na); Based on ecoinvent Guidelines, standard distances
- Chlorine, liquid, production mix, at plant [RER]: 7.6518e-6 kg; lognormal SD95 1.3241
  (same comment as for Chemicals organic, at plant)
- Tap water, at user [RER]: 3.81161 kg; lognormal SD95 1.1635
  (1,3,3,1,1,4); Literature and industrial data

## Emissions to nature
- m-Xylene [emissions to air, high. pop.]: 2.7032e-6 kg; lognormal SD95 1.6336
  (same comment as for Chemicals organic, at plant)
- Lead [emissions to air, high. pop.]: 5.809e-7 kg; lognormal SD95 5.1193
  (same comment as for Chemicals organic, at plant)
- Magnesium [emissions to air, high. pop.]: 8.4219e-6 kg; lognormal SD95 5.1193
  (same comment as for Chemicals organic, at plant)
- Nitrogen oxides [emissions to air, high. pop.]: 0.0020529 kg; lognormal SD95 1.6336
  (same comment as for Chemicals organic, at plant)
- Ammonia [emissions to air, high. pop.]: 4.0593e-5 kg; lognormal SD95 1.3926
  (same comment as for Chemicals organic, at plant)
- Toluene [emissions to air, high. pop.]: 6.7577e-6 kg; lognormal SD95 1.6336
  (same comment as for Chemicals organic, at plant)
- Benzene [emissions to air, high. pop.]: 2.0499e-5 kg; lognormal SD95 1.6336
  (same comment as for Chemicals organic, at plant)
- Sulfur dioxide [emissions to air, high. pop.]: 5.809e-5 kg; lognormal SD95 1.3241
  (same comment as for Chemicals organic, at plant)
- Arsenic [emissions to air, high. pop.]: 2.3329e-8 kg; lognormal SD95 5.1193
  (same comment as for Chemicals organic, at plant)
- Benzene, ethyl- [emissions to air, high. pop.]: 6.7577e-7 kg; lognormal SD95 1.6336
  (same comment as for Chemicals organic, at plant)
- Dioxin, 2,3,7,8 Tetrachlorodibenzo-p- [emissions to air, high. pop.]: 6.9829e-13 kg; lognormal SD95 3.1045
  (same comment as for Chemicals organic, at plant)
- Sodium [emissions to air, high. pop.]: 3.0328e-5 kg; lognormal SD95 5.1193
  (same comment as for Chemicals organic, at plant)
- Mercury [emissions to air, high. pop.]: 6.9984e-9 kg; lognormal SD95 5.1193
  (same comment as for Chemicals organic, at plant)
- Chromium [emissions to air, high. pop.]: 9.238e-8 kg; lognormal SD95 5.1193
  (same comment as for Chemicals organic, at plant)
- Bromine [emissions to air, high. pop.]: 1.3998e-6 kg; lognormal SD95 5.1193
  (same comment as for Chemicals organic, at plant)
- Carbon dioxide, biogenic [emissions to air, high. pop.]: 4.75545 kg; lognormal SD95 1.05
  (1,1,1,1,1,1); Calculation, to close carbon balance
- Zinc [emissions to air, high. pop.]: 6.9984e-6 kg; lognormal SD95 5.1193
  (same comment as for Chemicals organic, at plant)
- Phosphorus [emissions to air, high. pop.]: 6.9984e-6 kg; lognormal SD95 1.6336
  (same comment as for Chemicals organic, at plant)
- Copper [emissions to air, high. pop.]: 5.1324e-7 kg; lognormal SD95 5.1193
  (same comment as for Chemicals organic, at plant)
- Hydrocarbons, aliphatic, alkanes, unspecified [emissions to air, high. pop.]: 2.0499e-5 kg; lognormal SD95 1.6336
  (same comment as for Chemicals organic, at plant)
- Heat, waste [emissions to air, high. pop.]: 30.1322 MJ; lognormal SD95 1.1376
  (2,4,1,3,1,3); ecoinvent guidelines, calculation from electricity consumption and energy balance
- Phenol, pentachloro- [emissions to air, high. pop.]: 1.8246e-10 kg; lognormal SD95 1.6336
  (same comment as for Chemicals organic, at plant)
- Particulates, < 2.5 um [emissions to air, high. pop.]: 0.0010115 kg; lognormal SD95 3.1045
  (same comment as for Chemicals organic, at plant)
- Nickel [emissions to air, high. pop.]: 1.3998e-7 kg; lognormal SD95 5.1193
  (same comment as for Chemicals organic, at plant)
- Dinitrogen monoxide [emissions to air, high. pop.]: 5.3657e-5 kg; lognormal SD95 1.6336
  (same comment as for Chemicals organic, at plant)
- Hexane [emissions to air, high. pop.]: 0.004363 kg; lognormal SD95 1.5
  (1,1,1,1,1,1); Calculation, based on hexane input
- Chromium VI [emissions to air, high. pop.]: 9.3315e-10 kg; lognormal SD95 5.1193
  (same comment as for Chemicals organic, at plant)
- Cadmium [emissions to air, high. pop.]: 1.6331e-8 kg; lognormal SD95 5.1193
  (same comment as for Chemicals organic, at plant)
- Benzo(a)pyrene [emissions to air, high. pop.]: 1.1263e-8 kg; lognormal SD95 3.1045
  (same comment as for Chemicals organic, at plant)
- Formaldehyde [emissions to air, high. pop.]: 2.9284e-6 kg; lognormal SD95 1.6336
  (same comment as for Chemicals organic, at plant)
- Carbon monoxide, biogenic [emissions to air, high. pop.]: 0.00015769 kg; lognormal SD95 5.1193
  (same comment as for Chemicals organic, at plant)
- Fluorine [emissions to air, high. pop.]: 1.1665e-6 kg; lognormal SD95 1.6336
  (same comment as for Chemicals organic, at plant)
- Benzene, hexachloro- [emissions to air, high. pop.]: 1.6219e-13 kg; lognormal SD95 3.1045
  (same comment as for Chemicals organic, at plant)
- PAH, polycyclic aromatic hydrocarbons [emissions to air, high. pop.]: 2.4779e-7 kg; lognormal SD95 3.1045
  (same comment as for Chemicals organic, at plant)
- Manganese [emissions to air, high. pop.]: 3.9892e-6 kg; lognormal SD95 5.1193
  (same comment as for Chemicals organic, at plant)
- Acetaldehyde [emissions to air, high. pop.]: 1.423e-6 kg; lognormal SD95 1.6336
  (same comment as for Chemicals organic, at plant)
- Chlorine [emissions to air, high. pop.]: 4.1993e-6 kg; lognormal SD95 1.6336
  (same comment as for Chemicals organic, at plant)
- Potassium [emissions to air, high. pop.]: 0.0005459 kg; lognormal SD95 5.1193
  (same comment as for Chemicals organic, at plant)
- Calcium [emissions to air, high. pop.]: 0.00013648 kg; lognormal SD95 5.1193
  (same comment as for Chemicals organic, at plant)
- NMVOC, non-methane volatile organic compounds, unspecified origin [emissions to air, high. pop.]: 1.3741e-5 kg; lognormal SD95 1.6336
  (same comment as for Chemicals organic, at plant)
- Hydrocarbons, aliphatic, unsaturated [emissions to air, high. pop.]: 6.9829e-5 kg; lognormal SD95 1.6336
  (same comment as for Chemicals organic, at plant)
- Methane, biogenic [emissions to air, high. pop.]: 9.7765e-6 kg; lognormal SD95 1.6336
  (same comment as for Chemicals organic, at plant)

## Sampling procedure
Cross-checking of various literature sources from 1998 to 2006

## Extrapolations
Direct emissions (resulting from the combustion of sorghum bagasse) are based on the the combustion of wood chips (without emission control), according to the corresponding dry matter content, carbon content and energy content.

## Sources
- Jungbluth N., Chudacoff M., Dauriat A., Dinkel F., Doka G., Faist Emmenegger M., Gnansounou E., Kljun N., Spielmann M., Stettler C., Sutter J., 2007, 2007 - LCI bioenergy - Jungbluth, Final report ecoinvent data v2.0, 17, Swiss Centre for LCI, ESU-services Ltd., Duebendorf and Uster, CH
Jungbluth N., Chudacoff M., Dauriat A., Dinkel F., Doka G., Faist Emmenegger M., Gnansounou E., Kljun N., Spielmann M., Stettler C., Sutter J. (2007) Life Cycle Inventories of Bioenergy. Final report ecoinvent data v2.0. Volume: 17. Swiss Centre for LCI, ESU. Duebendorf and Uster, CH.
Type: Measurement on site
Source: CD-ROM
First author: Jungbluth N.
Other authors: Chudacoff M., Dauriat A., Dinkel F., Doka G., Faist Emmenegger M., Gnansounou E., Kljun N., Spielmann M., Stettler C., Sutter J.
Year: 2007
Title of anthology: Final report ecoinvent data v2.0
Place of publication: Duebendorf and Uster, CH
Publisher: Swiss Centre for LCI, ESU
Volume No: 17

## Validation
Proof reading validation: Passed.; Other validation: none;
