# Tap water, water balance according to MoeK 2013, at user

Dataset: EcoSpold 1, unit process
Functional unit: 1 kg
Category: water / water supply\production
Geography: TH
Time period: 2000-01 to 2017-12
Generated by: Philippe Stolz
accessRestrictedTo: 0
copyright: true

## General comment
This process is based on the dataset "tap water, at user/kg/RER U" from Ecoinvent v2.2. The electricity consumption is regionalised. The water withdrawal and water emissions to water are regionalised. The water embodied in product (1 kg/kg) is not included and has to be accounted for in the processes, which use tap water.;
CAS number: 007732-18-5;
Formula: H2O;

## Included processes
Infrastructure and energy use for water treatment and transportation to the end user. No emissions from water treatment.

## Technology
Example of a water works in CH.

## Time period
Time of publications.

## Reference product
- Tap water, water balance according to MoeK 2013, at user [TH]: 1 kg
  THAILAND

## Inputs from technosphere
- Electricity, medium voltage, at grid [TH]: 0.00039 kWh; lognormal SD95 1.2238
  (2,3,1,3,1,5,BU:1.05); Regionalisation of electricity use.; Ecoinvent v2.2
- Ozone, liquid, at plant [RER]: 3.3333e-6 kg; lognormal SD95 1.2238
  (2,3,1,3,1,5,BU:1.05); ; Ecoinvent v2.2
- Charcoal, at plant [GLO]: 4.17e-6 kg; lognormal SD95 1.2238
  (2,3,1,3,1,5,BU:1.05); ; Ecoinvent v2.2
- Pump station [CH]: 2.0568e-11 p; lognormal SD95 3.0525
  (2,3,1,3,1,5,BU:3); ; Ecoinvent v2.2
- Disposal, wood untreated, 20% water, to municipal incineration [CH]: 4.17e-6 kg; lognormal SD95 1.2238
  (2,3,1,3,1,5,BU:1.05); ; Ecoinvent v2.2
- Transport, freight, lorry, fleet average [CH]: 1.4813e-6 tkm; lognormal SD95 2.095
  (4,5,na,na,na,na,BU:2); ; Ecoinvent v2.2
- Water supply network [CH]: 3.1429e-10 km; lognormal SD95 3.0525
  (2,3,1,3,1,5,BU:3); ; Ecoinvent v2.2
- Transport, freight, rail [RER]: 8.888e-6 tkm; lognormal SD95 2.095
  (4,5,na,na,na,na,BU:2); ; Ecoinvent v2.2
- Hydrogen peroxide, 50% in H2O, at plant [RER]: 8.8e-7 kg; lognormal SD95 1.2238
  (2,3,1,3,1,5,BU:1.05); ; Ecoinvent v2.2
- Treatment, sewage, unpolluted, to wastewater treatment, class 3 [CH]: 1.7656e-5 m3; lognormal SD95 1.2238
  (2,3,1,3,1,5,BU:1.05); ; Ecoinvent v2.2
- Water storage [CH]: 2.0568e-11 p; lognormal SD95 3.0525
  (2,3,1,3,1,5,BU:3); ; Ecoinvent v2.2
- Chlorine, liquid, production mix, at plant [RER]: 1e-7 kg; lognormal SD95 1.2238
  (2,3,1,3,1,5,BU:1.05); ; Ecoinvent v2.2
- Aluminium sulphate, powder, at plant [RER]: 6.33e-6 kg; lognormal SD95 1.2238
  (2,3,1,3,1,5,BU:1.05); ; Ecoinvent v2.2
- Water works [CH]: 1.1907e-11 p; lognormal SD95 3.0525
  (2,3,1,3,1,5,BU:3); ; Ecoinvent v2.2

## Inputs from nature
- Water, unspecified natural origin, TH [resources, in water]: 0.0011287 m3; lognormal SD95 1.0744
  (1,3,1,3,1,1,BU:1.05); Regionalisation of water withdrawal.; Ecoinvent v2.2

## Emissions to nature
- Water, TH [emissions to water, unspecified]: 0.000111 m3; lognormal SD95 1.6169
  (4,5,na,na,na,na,BU:1.5); Regionalisation of water losses.; Ecoinvent v2.2
- Aluminium [emissions to water, river]: 1.2948e-6 kg; lognormal SD95 5.2579
  (5,na,1,1,1,na,BU:5); ; Ecoinvent v2.2
- Heat, waste [emissions to air, high. pop.]: 0.001404 MJ; lognormal SD95 1.2226
  (2,3,1,1,1,5,BU:1.05); ; Ecoinvent v2.2
- Chloride [emissions to water, river]: 5.0352e-6 kg; lognormal SD95 3.2254
  (5,na,1,1,1,na,BU:3); ; Ecoinvent v2.2
- Chlorine [emissions to water, river]: 1e-7 kg; lognormal SD95 3.2254
  (5,na,1,1,1,na,BU:3); ; Ecoinvent v2.2

## Extrapolations
Electricity mix approximated by electricity production in Peru.

## Sources
- Frischknecht R., Nathani C., Alig M., Stolz P., Tschuemperlin L., Hellmueller P., 2018, 2018 - Environmental footprint of switzerland - Frischknecht, Project reports, 603, treeze Ltd., Bern, CH
Frischknecht R., Carsten Nathani, Martina Alig, Philippe Stolz, Laura Tschümperlin, Pino Hellmüller (2017) Entwicklung der globalen Umweltauswirkun-gen von Konsum und Produktion in der Schweiz von 1996 bis 2015. Project reports. Volume: 603. treeze Ltd.. Uster.
Type: Separate publication
Source: Report
First author: Frischknecht R.
Other authors: Carsten Nathani, Martina Alig, Philippe Stolz, Laura Tschümperlin, Pino Hellmüller
Year: 2017
Title of anthology: Project reports
Place of publication: Uster
Publisher: treeze Ltd.
Volume No: 603
Original title: Entwicklung der globalen Umweltauswirkun-gen von Konsum und Produktion in der Schweiz von 1996 bis 2015

## Validation
Proof reading validation: 29.03.2019; Other validation: \\SRV01\ESU-Docs\Projekte laufend\174 Photovoltaic, IEA Task 12\2017 National PV Mixes\EcoSpold\[603-Tap-Water-aus-Proj603-v0.7.xlsx]X-Process;
