# Cork slab, at plant

Dataset: EcoSpold 1, unit process
Functional unit: 1 kg
Category: construction / insulation
Geography: RER
Time period: 2000-01 to 2000-12
Generated by: Hans-Joerg Althaus
accessRestrictedTo: 0
copyright: true

## General comment
this cork product is used e.g. as underlay for floating floorings or as insulation material.;

## Included processes
Includes the material and energy inputs to the production processes, transports of the material inputs and the available process emissions.

## Geography
production data for one major producer in Portugal used for Europe

## Technology
mix of continuous fabrication and fabrication in moulds and splitting (batch process)

## Reference product
- Cork slab, at plant [RER]: 1 kg
  Europe

## Inputs from technosphere
- Transport, freight, lorry, fleet average [RER]: 0.345 tkm; lognormal SD95 2
  (1,3,1,3,1,4);
- Cork, raw, at forest road [PT]: 1.06 kg; lognormal SD95 1.1
  (1,3,1,3,1,4);
- Wood chips, from industry, softwood, burned in furnace 300kW [CH]: 6 MJ; lognormal SD95 1.1
  (1,3,1,3,1,4);
- Wooden board manufacturing plant, organic bonded boards [RER]: 1e-10 p; lognormal SD95 3
  (1,3,1,3,1,4);
- Melamine formaldehyde resin, at plant [RER]: 0.056 kg; lognormal SD95 1.1
  (1,3,1,3,1,4);
- Urea formaldehyde resin, at plant [RER]: 0.056 kg; lognormal SD95 1.1
  (1,3,1,3,1,4);
- Phenolic resin, at plant [RER]: 0.028 kg; lognormal SD95 1.1
  (1,3,1,3,1,4);
- Electricity, medium voltage, production ENTSO-E, at grid: 1 kWh; lognormal SD95 1.1
  (1,3,1,3,1,4);

## Emissions to nature
- Formaldehyde [emissions to air, unspecified]: 0.00014 kg; lognormal SD95 2.1
  (4,3,1,3,1,4);
- Heat, waste [emissions to air, unspecified]: 3.6 MJ; lognormal SD95 1.1
  (1,3,1,3,1,4);

## Sampling procedure
literature

## Extrapolations
see geography

## Sources
- Kellenberger D., Althaus H.-J., Jungbluth N., Kuenniger T., Lehmann M., Thalmann P., 2007, 2007 - LCI building products - Kellenberger, Final report ecoinvent data v2.0, 7, Swiss Centre for LCI, Empa - TSL, ESU-services Ltd., Bau- und Umweltchimie, Duebendorf, CH
Kellenberger D., Althaus H.-J., Jungbluth N., Künniger T. (2007) Life Cycle Inventories of Building Products. Final report ecoinvent data v2.0. Volume: 7. Swiss Centre for LCI, Empa - TSL. Dübendorf, CH.
Type: Measurement on site
Source: CD-ROM
First author: Kellenberger D.
Other authors: Althaus H.-J., Jungbluth N., Künniger T.
Year: 2007
Title of anthology: Final report ecoinvent data v2.0
Place of publication: Dübendorf, CH
Publisher: Swiss Centre for LCI, Empa - TSL
Volume No: 7

## Validation
Proof reading validation: Passed; Other validation: none;
