# Tomato, seedling, conventional, soilless production, at production site

Dataset: EcoSpold 1, unit process
Functional unit: 1 p
Category: agricultural / agricultural means of production\seed
Geography: RER
Time period: 2015-01 to 2020-12
Generated by: Melina Glimmann
accessRestrictedTo: 0
copyright: true

## General comment
This inventory refers to 1 tomato seedling. About 15000 seedlings are needed per ha.

## Geography
The inventory is modelled for Europe

## Reference product
- Tomato, seedling, conventional, soilless production, at production site [RER]: 1 p

## Inputs from technosphere
- Transport, freight, lorry, fleet average [CH]: 0.00085236 tkm; lognormal SD95 2.38261
  (4,4,4,2,4,5,BU:2); ;
- Magnesium sulphate, at plant [RER]: 0.00104 kg; lognormal SD95 1.6906
  (4,4,4,2,4,5,BU:1.05); ;
- Chemicals inorganic, at plant [GLO]: 5e-8 kg; lognormal SD95 1.6906
  (4,4,4,2,4,5,BU:1.05); ;
- Greenhouse, glass walls and roof, metal tubes [CH]: 0.00666 m2a; lognormal SD95 3.37589
  (4,4,4,2,4,5,BU:3); ;
- Transport, freight, lorry, 32t-40t gross weight, fleet average [RER]: 0.0014546, 0.01542 tkm (2 entries); lognormal SD95 2.38261
  (4,4,4,2,4,5,BU:2); ;
- Tomatoes conventional, hors-sol, at greenhouse [ES]: 0.00307 kg; lognormal SD95 1.6906
  (4,4,4,2,4,5,BU:1.05); ;
- Pesticide unspecified, at regional storehouse [RER]: 2.88e-8 kg; lognormal SD95 1.6906
  (4,4,4,2,4,5,BU:1.05); ;
- Transport, aircraft, freight, long-haul [RER]: 0.00921 tkm; lognormal SD95 2.38261
  (4,4,4,2,4,5,BU:2); ;
- Natural gas, burned in industrial furnace 1MW [CH]: 14.4 MJ; lognormal SD95 1.6906
  (4,4,4,2,4,5,BU:1.05); ;
- Rock wool, at plant [CH]: 0.04713 kg; lognormal SD95 1.6906
  (4,4,4,2,4,5,BU:1.05); ;
- Potassium nitrate, as K2O, at regional storehouse [RER]: 0.00148 kg; lognormal SD95 1.6906
  (4,4,4,2,4,5,BU:1.05); ;
- Polystyrene, general purpose, GPPS, at plant [RER]: 0.00414 kg; lognormal SD95 1.6906
  (4,4,4,2,4,5,BU:1.05); ;
- Average mineral fertiliser, as K2O, at regional storehouse [RER]: 0.00015048 kg; lognormal SD95 1.6906
  (4,4,4,2,4,5,BU:1.05); ;
- xx Monoammonium phosphate, as P2O5, at regional storehouse [RER]: 0.0001924 kg; lognormal SD95 1.6906
  (4,4,4,2,4,5,BU:1.05); ;
- Transport, transoceanic freight ship [OCE]: 0.0025406 tkm; lognormal SD95 2.38261
  (4,4,4,2,4,5,BU:2); ;
- Calcium nitrate, as N, at regional storehouse [RER]: 0.00028675 kg; lognormal SD95 1.6906
  (4,4,4,2,4,5,BU:1.05); ;
- xx Monoammonium phosphate, as N, at regional storehouse [RER]: 4.07e-5 kg; lognormal SD95 1.6906
  (4,4,4,2,4,5,BU:1.05); ;
- Copper oxide, at plant [RER]: 1.15e-6 kg; lognormal SD95 1.6906
  (4,4,4,2,4,5,BU:1.05); ;
- Electricity mix [NL]: 0.5 kWh; lognormal SD95 1.6906
  (4,4,4,2,4,5,BU:1.05); ;
- Nitric acid, 50% in H2O, at plant [RER]: 0.0003645 kg; lognormal SD95 1.6906
  (4,4,4,2,4,5,BU:1.05); ;
- Average mineral fertiliser, as P2O5, at regional storehouse [RER]: 0.00022704 kg; lognormal SD95 1.6906
  (4,4,4,2,4,5,BU:1.05); ;

## Inputs from nature
- Water, river [resources, in water]: 0.003 m3; lognormal SD95 1.6906
  (4,4,4,2,4,5,BU:1.05); ;

## Emissions to nature
- Dinitrogen monoxide [emissions to air, low. pop.]: 2.7722e-7, 9.4419e-6 kg (2 entries); lognormal SD95 1.93789
  (4,4,4,2,4,5,BU:1.5); ;
- Ammonia [emissions to air, low. pop.]: 1.2723e-5 kg; lognormal SD95 1.7396
  (4,4,4,2,4,5,BU:1.2); ;
- Copper [emissions to water, river]: 8.0095e-9 kg; lognormal SD95 3.37589
  (4,4,4,2,4,5,BU:3); ;
- Chromium [emissions to water, river]: 3.9316e-8 kg; lognormal SD95 3.37589
  (4,4,4,2,4,5,BU:3); ;
- Nickel [emissions to water, river]: 7.3637e-9 kg; lognormal SD95 5.43151
  (4,4,4,2,4,5,BU:5); ;
- Mercury [emissions to water, river]: 7.17e-11 kg; lognormal SD95 5.43151
  (4,4,4,2,4,5,BU:5); ;
- Zinc [emissions to water, river]: 5.6825e-8 kg; lognormal SD95 5.43151
  (4,4,4,2,4,5,BU:5); ;
- Abamectin [emissions to soil, agricultural]: 2.88e-8 kg; lognormal SD95 1.7396
  (4,4,4,2,4,5,BU:1.2); ;
- Copper [emissions to soil, agricultural]: 1.15e-6 kg; lognormal SD95 1.7013
  (4,4,4,2,4,5,BU:1.1); ;
- Lead [emissions to water, river]: 1.0577e-9 kg; lognormal SD95 5.43151
  (4,4,4,2,4,5,BU:5); ;
- Nitrogen oxides [emissions to air, low. pop.]: 1.535e-5 kg; lognormal SD95 1.93789
  (4,4,4,2,4,5,BU:1.5); ;
- Cadmium [emissions to water, river]: 3.1171e-9 kg; lognormal SD95 3.37589
  (4,4,4,2,4,5,BU:3); ;
- Water [emissions to water, unspecified]: 2.85 kg; lognormal SD95 2.5196
  (5,5,5,5,5,BU:1.05); All uncertainty-values set to 5.0 by default. Balance of input water

## Sampling procedure
The data is based on literature and expert judgements.

## Sources
- Kaegi T., Glimmann M., Conte F., Roberts G., 2021, 2021 - LCA tomatoes and green beans production - Kaegi, Carbotech on behalf of BAFU, Carbotech AG, Zuerich, CH

## Validation
16.08.2022 \\tsclient\Schreibtisch\WinShare\BAFU Gemuese\Spargeln und Erdbeeren\[EcoSpold_Bafu_Gemuese_Tomato seedling_RER v1.xlsx]X-Process
