# Disposal, building, reinforced concrete, to final disposal

Dataset: EcoSpold 1, unit process
Functional unit: 1 kg
Category: construction waste / unspecified
Geography: CH
Time period: 2000-01 to 2000-12
Generated by: Gabor Doka
accessRestrictedTo: 0
copyright: true

## General comment
The waste contains 0.97kg inert material (GSD=100.1%) and 0.03kg steel (GSD=107.9%). Waste density is 2300 kg/m3. ;

## Included processes
energy for dismantling, particulate matter emissions from dismantling and handling, transport to dismantling facilities, final disposal of waste material,

## Geography
Specific to the technology mix encountered in Switzerland in late 1990ies

## Technology
Building demolition with skid-steer loaders.

## Reference product
- Disposal, building, reinforced concrete, to final disposal [CH]: 1 kg
  SWITZERLAND

## Inputs from technosphere
- Transport, freight, lorry, 16t-32t gross weight, fleet average [CH]: 0.015 tkm; lognormal SD95 1
  transport to disposal facilities. Uncertainty calculated from uncertainty in transported masses and the uncertainty in generic transportation distances
- Diesel, burned in building machine, average [CH]: 0.0612 MJ; lognormal SD95 1.7
  energy for demolition. Uncertainty from range in (DAFSTB 1996)
- Disposal, steel, 0% water, to construction waste landfill [CH]: 0.03 kg; lognormal SD95 1.2
  disposed masses. Uncertainty calculated from uncertainty of waste composition
- Disposal, inert waste, 5% water, to construction waste landfill [CH]: 0.97 kg; lognormal SD95 1
  disposed masses. Uncertainty calculated from uncertainty of waste composition

## Emissions to nature
- Particulates, > 10 um [emissions to air, high. pop.]: 8.35e-5 kg; lognormal SD95 1.6
  emission from dismantling and handling. (2,3,3,3,1,5) & basic uncertainty of 1.5; from one extrapolated PM10 emission factor and generic PM fractions from measurements
- Particulates, > 2.5 um, and < 10um [emissions to air, high. pop.]: 6.34e-5 kg; lognormal SD95 2.1
  emission from dismantling and handling. (2,3,3,3,1,5) & basic uncertainty of 2; from one extrapolated PM10 emission factor and generic PM fractions from measurements
- Particulates, < 2.5 um [emissions to air, high. pop.]: 1.66e-5 kg; lognormal SD95 3.1
  emission from dismantling and handling. (2,3,3,3,1,5) & basic uncertainty of 3; from one extrapolated PM10 emission factor and generic PM fractions from measurements

## Sampling procedure
waste-specific calculation based on literature data

## Sources
- Doka G., 2009, 2009 - LCI waste treatment services - Doka, Final report ecoinvent data v2.0, 13, Swiss Centre for LCI, Doka LCA, Duebendorf and St. Gallen, CH
Doka G. (2007) Life Cycle Inventories of Waste Treatment Services. Final report ecoinvent data v2.0. Volume: 13. Swiss Centre for LCI, Empa - TSL. Dübendorf, CH.
Type: Separate publication
Source: CD-ROM
First author: Doka G.
Year: 2007
Title of anthology: Final report ecoinvent data v2.0
Place of publication: Dübendorf, CH
Publisher: Swiss Centre for LCI, Empa - TSL
Volume No: 13

## Validation
Proof reading validation: Passed. Calculation for standard deviation 95 of transport services differs from standard Pedigree approach in this project and figure obtained by this procedure (2.09). Uncertainty for estimation of distance is not included.; Other validation: none;
