# Disposal, wood pole, chrome preserved, 20% water, to municipal incineration

Dataset: EcoSpold 1, unit process
Functional unit: 1 kg
Category: waste management / municipal incineration
Geography: CH
Time period: 2000-01 to 2000-12
Generated by: Gabor Doka
accessRestrictedTo: 0
copyright: true

## General comment
This dataset represents the activity of waste disposal of waste wood pole, chrome preserved in a municipal solid waste incinerator (MSWI) Recommended use of this dataset: For disposal of bulk or small parts of chrome preserved wood poles as used for electricity grids. Please note there is another, slightly different chrome preserved wood for genereal building products. Waste composition (wet, in ppm): upper heating value 15.36 MJ/kg; lower heating value 13.99 MJ/kg; H2O 173450; O 370840; H 49982; C 400020; S 288.79; N 983.43; P 108.57; B 58.919; Cl 329.76; Br n.a.; F 21.03; I n.a.; Ag n.a.; As 0.42061; Ba n.a.; Cd 0.19979; Co 0.086459; Cr 2281.5; Cu 786.37; Hg 0.31861; Mn 52.927; Mo 0.82721; Ni 0.5538; Pb 27.767; Sb n.a.; Se n.a.; Sn n.a.; V n.a.; Zn 17.743; Be n.a.; Sc n.a.; Sr n.a.; Ti n.a.; Tl n.a.; W n.a.; Si n.a.; Fe 15.423; Ca 130.42; Al 6.3093; K 65.176; Mg 196.85; Na 334.08; Share of carbon in waste that is biogenic 100%. Share of metals in waste not oxidised and bulk-recyclable (exclude very small or thin parts) Iron: 0%; Alu: 0%; Copper: 0%. One kg of this waste produces 0.01088 kg of slag and 0.004415 kg of residues, which are landfilled. Additional solidification with 0.001766 kg of cement. Net energy production: 1.74MJ/kg electric energy and 3.49MJ/kg thermal energy. Recovery of metal scrap to recycling: 0g iron scrap, 0g aluminium scrap, 0g copper scrap.;;

## Included processes
Waste incineration from waste reception gate further downstream (excluding transport to the MSWI plant). Waste-specific air and water emisions from incineration, auxiliary material consumption for flue gas cleaning. Short-term emissions to river water and long-term emisisons to ground water from slag compartment (from bottom ash) and residual material landfill (from solidified fly ashes and scrubber slugde). Waste-specific process energy demands for MSWI and net energy generation.

## Geography
Specific to the technology mix encountered in Switzerland in 2010. Well applicable to modern incineration practices in Europe, North America or Japan.

## Technology
average Swiss MSWI plants in 2010 (grate incinerators) with electrostatic precipitator for fly ash (ESP), wet flue gas scrubber and 25% SNCR , 42.77% SCR-high dust , 32.68% SCR-low dust -DeNOx facilities and 0% without Denox (weighted according to mass of burnt waste, representing Swiss average). Efficiency of iron scrap separation from slag : 58%. Efficiency of non-ferrous scrap separation from slag : 31%. Gross electric efficiency technology mix 15.84% and Gross thermal efficiency technology mix 28.51%

## Time period
Waste composition as given in literature reference, theoretical data or other source. Transfer coefficients for modern MSWI.

## Reference product
- Disposal, wood pole, chrome preserved, 20% water, to municipal incineration [CH]: 1 kg
  SWITZERLAND

## Inputs from technosphere
- Chromium oxide, flakes, at plant [RER]: 5.9341e-7 kg; lognormal SD95 5.1731
  Input to DeNOx stage. uncertainty calculated from uncertainty in average DeNOx input, uncertainty in the share of thermal NOx, uncertainty of nitrogen content in average municipal waste and the uncertainty in nitrogen content in *this* waste.
- Ammonia, liquid, at regional storehouse [CH]: 0.0004641 kg; lognormal SD95 3.3924
  Input to DeNOx stage (100% NH3). uncertainty calculated from uncertainty in average DeNOx input, uncertainty in the share of thermal NOx, uncertainty of nitrogen content in average municipal waste and the uncertainty in nitrogen content in *this* waste.
- Municipal waste incineration plant [CH]: 2.5e-10 p; lognormal SD95 1
  demands per kilogram waste. uncertainty is heeded in the module
- Process-specific burdens, residual material landfill [CH]: 0.0044147 kg; lognormal SD95 1.5969
  mass-specific expenditures required for landfilling of incineration residues. uncertainty is calculated from uncertainties in waste composition and transfer coefficients in incinerator
- Titanium dioxide, production mix, at plant [RER]: 2.9077e-5 kg; lognormal SD95 5.1731
  Input to DeNOx stage (TiO2 catalyst carrier) uncertainty calculated from uncertainty in average DeNOx input, uncertainty in the share of thermal NOx, uncertainty of nitrogen content in average municipal waste and the uncertainty in nitrogen content in *this* waste.
- Transport, freight, rail [RER]: 0.0025008 tkm; lognormal SD95 1.2717
  Transport services to transport incineration residues to landfills and to transport auxilliary inputs of the incinerator plant. uncertainty calculated from uncertainty in average auxiliary material input, the uncertainty of the waste composition of this waste and the uncertainty in generic transportation distances
- Chemicals inorganic, at plant [GLO]: 2.9987e-5 kg; lognormal SD95 1.8519
  auxilliary inputs for the wastewater treatment stage of the incinerator plant. Proxy for Polyelectrolyte. uncertainty calculated from uncertainty in average Polyelectrolyte input, of transfer coefficients in the incinerator, and the uncertainty of the waste composition of this waste
- Cement, unspecified, at plant [CH]: 0.0017659 kg; lognormal SD95 1.6577
  Cement required for solidification of landfilled residual material. Uncertainty calculated from uncertainty of the waste composition of this waste, of transfer coefficients in the incinerator and of the solidification recipe.
- Sodium hydroxide, 50% in H2O, production mix, at plant [RER]: 0.00013455 kg; lognormal SD95 3.3026
  auxilliary inputs for the flue gas treatment stage of the incinerator plant. uncertainty calculated from uncertainty in average NaOH input, of transfer coefficients in the incinerator, and the uncertainty of the waste composition of this waste
- Process-specific burdens, slag compartment [CH]: 0.010073 kg; lognormal SD95 1.4411
  mass-specific expenditures required for landfilling of bottom ash. uncertainty is calculated from uncertainties in waste composition and transfer coefficients in incinerator
- Hydrochloric acid, 30% in H2O, at plant [RER]: 7.8819e-6 kg; lognormal SD95 1.8519
  auxilliary inputs for the wastewater treatment stage of the incinerator plant. uncertainty calculated from uncertainty in average HCl input, of transfer coefficients in the incinerator, and the uncertainty of the waste composition of this waste
- Disposal, cement, hydrated, 0% water, to residual material landfill [CH]: 0.0044147 kg; lognormal SD95 1.6577
  Hydrated cement output for solidification of landfilled residual material. Uncertainty calculated from uncertainty of the waste composition of this waste and transfer coefficients in the incinerator and of the solidification recipe.
- Water, decarbonised, at plant [RER]: 0.1912 kg; lognormal SD95 2.5268
  Incinerator process water used in flue gas scrubber stage. uncertainty calculated from uncertainty in average water input, and the uncertainty of the waste composition of this waste
- Iron (III) chloride, 40% in H2O, at plant [CH]: 7.0319e-6 kg; lognormal SD95 2.5268
  auxilliary inputs for the wastewater treatment stage of the incinerator plant. uncertainty calculated from uncertainty in average FeCl3 input, of transfer coefficients in the incinerator, and the uncertainty of the waste composition of this waste
- Chemicals organic, at plant [GLO]: 5.3265e-6 kg; lognormal SD95 13.566
  auxilliary inputs for the wastewater treatment stage of the incinerator plant. Proxy for (pure) Trisodium-trimercapto-s-triazine (CAS 17766-26-6), used as 15% diluted solution, aka TMT15. uncertainty calculated from uncertainty in average TMT15 input, of transfer coefficients in the incinerator, and the uncertainty of the waste composition of this waste
- Quicklime, milled, packed, at plant [CH]: 0.0001817 kg; lognormal SD95 5.7607
  auxilliary inputs for the flue gas treatment stage of the incinerator plant. uncertainty calculated from uncertainty in average CaO input, of transfer coefficients in the incinerator, and the uncertainty of the waste composition of this waste
- Residual material landfill facility [CH]: 9.1972e-12 p; lognormal SD95 1.5969
  landfill infrastructure required for landfilling of incineration residues. uncertainty is calculated from uncertainties in waste composition and transfer coefficients in incinerator
- Slag compartment [CH]: 1.7908e-11 p; lognormal SD95 1.4411
  landfill infrastructure required for landfilling of bottom ash. uncertainty is calculated from uncertainties in waste composition and transfer coefficients in incinerator
- Natural gas, burned in industrial furnace 1MW [CH]: 0.086787 MJ; lognormal SD95 3.3924
  Input to DeNOx stage, to heat up flue gas in low-dust SCR. uncertainty calculated from uncertainty in average DeNOx input, uncertainty in the share of thermal NOx, uncertainty of nitrogen content in average municipal waste and the uncertainty in nitrogen content in *this* waste.
- Transport, freight, lorry, 16t-32t gross weight, fleet average [CH]: 0.0042352 tkm; lognormal SD95 1.2454
  (same comment as for Transport, freight, rail)

## Emissions to nature
- DOC, Dissolved Organic Carbon [emissions to water, river]: 0.00020435 kg; lognormal SD95 1.5329
  Emissions to water from waste composition and transfer coefficients in incinerator and landfills. uncertainty is calculated from uncertainties in waste composition and transfer coefficients in incinerator and landfills
- Methane, biogenic [emissions to air, high. pop.]: 5.0587e-7 kg; lognormal SD95 1.8422
  Incomplete combustion product emitted to air. uncertainty calculated from uncertainty in average operation emissions, and the uncertainty of the flue gas volume from this waste.
- Calcium [emissions to water, river]: 1.4438e-6 kg; lognormal SD95 5.3391
  (same comment as for DOC, Dissolved Organic Carbon)
- Nitrate [emissions to water, groundwater, long-term]: 3.5371e-5 kg; lognormal SD95 5.1101
  Long-term emissions from landfilling of incineration residues. uncertainty is calculated from uncertainties in waste composition and transfer coefficients in incinerator and landfills.
- Benzene [emissions to air, high. pop.]: 3.3725e-8 kg; lognormal SD95 1.8422
  (same comment as for Methane, biogenic)
- COD, Chemical Oxygen Demand [emissions to water, groundwater, long-term]: 0.003004 kg; lognormal SD95 1.3688
  (same comment as for Nitrate)
- Zinc [emissions to water, groundwater, long-term]: 5.3956e-6 kg; lognormal SD95 37.945
  (same comment as for Nitrate)
- Cobalt [emissions to water, groundwater, long-term]: 7.043e-8 kg; lognormal SD95 14.955
  (same comment as for Nitrate)
- Fluoride [emissions to water, groundwater, long-term]: 1.8855e-5 kg; lognormal SD95 5.2824
  (same comment as for Nitrate)
- Molybdenum [emissions to water, river]: 2.2593e-7 kg; lognormal SD95 8.3888
  (same comment as for DOC, Dissolved Organic Carbon)
- Magnesium [emissions to water, river]: 9.1848e-7 kg; lognormal SD95 7.4116
  (same comment as for DOC, Dissolved Organic Carbon)
- Chromium [emissions to air, high. pop.]: 1.9922e-6 kg; lognormal SD95 4.5369
  Emission to air from waste composition and transfer coefficients. uncertainty is calculated from uncertainties in waste composition and transfer coefficients in incinerator
- Cobalt [emissions to water, river]: 1.5664e-11 kg; lognormal SD95 19.126
  (same comment as for DOC, Dissolved Organic Carbon)
- Iron [emissions to air, high. pop.]: 2.764e-11 kg; lognormal SD95 9.5481
  (same comment as for Chromium)
- Mercury [emissions to water, river]: 3.4602e-10 kg; lognormal SD95 9.151
  (same comment as for DOC, Dissolved Organic Carbon)
- Phenol, pentachloro- [emissions to air, high. pop.]: 1.4687e-11 kg; lognormal SD95 1.8422
  (same comment as for Methane, biogenic)
- Nickel [emissions to air, high. pop.]: 6.957e-10 kg; lognormal SD95 13.177
  (same comment as for Chromium)
- Potassium [emissions to water, river]: 1.4188e-5 kg; lognormal SD95 4.8823
  (same comment as for DOC, Dissolved Organic Carbon)
- Chromium [emissions to water, river]: 1.7715e-7 kg; lognormal SD95 4.6275
  (same comment as for DOC, Dissolved Organic Carbon)
- Heat, waste [emissions to water, river]: 2.8842 MJ; lognormal SD95 1.5805
  Waste heat generated from heating value of this waste plus any electricity required to process it. uncertainty is calculated from uncertainties in waste composition and uncertainties in energy efficiency and the uncertainty in internal energy demand
- Dioxin, 2,3,7,8 Tetrachlorodibenzo-p- [emissions to air, high. pop.]: 6.7445e-14 kg; lognormal SD95 3.6845
  (same comment as for Methane, biogenic)
- Benzene, pentachloro- [emissions to air, high. pop.]: 1.7818e-10 kg; lognormal SD95 1.8422
  (same comment as for Methane, biogenic)
- Chloride [emissions to water, river]: 0.00025316 kg; lognormal SD95 5.1063
  (same comment as for DOC, Dissolved Organic Carbon)
- TOC, Total Organic Carbon [emissions to water, river]: 0.00020435 kg; lognormal SD95 1.5329
  (same comment as for DOC, Dissolved Organic Carbon)
- Fluoride [emissions to water, river]: 1.6081e-6 kg; lognormal SD95 5.6415
  (same comment as for DOC, Dissolved Organic Carbon)
- Lead [emissions to air, high. pop.]: 2.2876e-9 kg; lognormal SD95 8.7025
  (same comment as for Chromium)
- Sodium [emissions to water, groundwater, long-term]: 0.00024057 kg; lognormal SD95 3.643
  (same comment as for Nitrate)
- Nickel [emissions to water, river]: 3.721e-10 kg; lognormal SD95 19.243
  (same comment as for DOC, Dissolved Organic Carbon)
- Arsenic [emissions to water, river]: 2.9136e-7 kg; lognormal SD95 12.17
  (same comment as for DOC, Dissolved Organic Carbon)
- Iron [emissions to water, river]: 4.0545e-10 kg; lognormal SD95 10.485
  (same comment as for DOC, Dissolved Organic Carbon)
- Benzene, hexachloro- [emissions to air, high. pop.]: 7.0517e-11 kg; lognormal SD95 1.8422
  (same comment as for Methane, biogenic)
- Aluminium [emissions to air, high. pop.]: 5.1441e-12 kg; lognormal SD95 10.693
  (same comment as for Chromium)
- Iron [emissions to water, groundwater, long-term]: 7.7806e-6 kg; lognormal SD95 10.471
  (same comment as for Nitrate)
- NMVOC, non-methane volatile organic compounds, unspecified origin [emissions to air, high. pop.]: 1.5348e-6 kg; lognormal SD95 1.8422
  (same comment as for Methane, biogenic)
- Aluminium [emissions to water, groundwater, long-term]: 4.5626e-6 kg; lognormal SD95 9.1976
  (same comment as for Nitrate)
- Toluene [emissions to air, high. pop.]: 6.7449e-8 kg; lognormal SD95 1.8422
  (same comment as for Methane, biogenic)
- Phosphate [emissions to water, river]: 6.1041e-8 kg; lognormal SD95 5.2201
  (same comment as for DOC, Dissolved Organic Carbon)
- Zinc [emissions to water, river]: 1.6008e-9 kg; lognormal SD95 7.178
  (same comment as for DOC, Dissolved Organic Carbon)
- Molybdenum [emissions to air, high. pop.]: 1.0884e-9 kg; lognormal SD95 12.674
  (same comment as for Chromium)
- Carbon dioxide, biogenic [emissions to air, high. pop.]: 1.4578 kg; lognormal SD95 1.3591
  (same comment as for Chromium)
- Potassium [emissions to air, high. pop.]: 3.22e-7 kg; lognormal SD95 7.6176
  (same comment as for Chromium)
- Nitrate [emissions to water, river]: 1.2536e-5 kg; lognormal SD95 3.8854
  (same comment as for DOC, Dissolved Organic Carbon)
- Molybdenum [emissions to water, groundwater, long-term]: 6.0018e-7 kg; lognormal SD95 12.473
  (same comment as for Nitrate)
- Chloride [emissions to water, groundwater, long-term]: 7.6414e-5 kg; lognormal SD95 5.9754
  (same comment as for Nitrate)
- Boron [emissions to water, river]: 4.6164e-7 kg; lognormal SD95 9.4899
  (same comment as for DOC, Dissolved Organic Carbon)
- Carbon monoxide, biogenic [emissions to air, high. pop.]: 5.7328e-5 kg; lognormal SD95 6.1408
  (same comment as for Methane, biogenic)
- Sulfate [emissions to water, groundwater, long-term]: 0.00071527 kg; lognormal SD95 4.0368
  (same comment as for Nitrate)
- DOC, Dissolved Organic Carbon [emissions to water, groundwater, long-term]: 0.0011887 kg; lognormal SD95 1.3688
  (same comment as for Nitrate)
- Aluminium [emissions to water, river]: 6.828e-10 kg; lognormal SD95 11.117
  (same comment as for DOC, Dissolved Organic Carbon)
- Arsenic [emissions to water, groundwater, long-term]: 1.2595e-7 kg; lognormal SD95 13.379
  (same comment as for Nitrate)
- Mercury [emissions to water, groundwater, long-term]: 2.0293e-8 kg; lognormal SD95 36.848
  (same comment as for Nitrate)
- Potassium [emissions to water, groundwater, long-term]: 5.0667e-5 kg; lognormal SD95 4.5289
  (same comment as for Nitrate)
- TOC, Total Organic Carbon [emissions to water, groundwater, long-term]: 0.0011887 kg; lognormal SD95 1.3688
  (same comment as for Nitrate)
- Magnesium [emissions to water, groundwater, long-term]: 0.00017432 kg; lognormal SD95 6.2825
  (same comment as for Nitrate)
- Arsenic [emissions to air, high. pop.]: 3.2947e-9 kg; lognormal SD95 13.469
  (same comment as for Chromium)
- Manganese [emissions to water, river]: 8.2387e-9 kg; lognormal SD95 6.6705
  (same comment as for DOC, Dissolved Organic Carbon)
- Chromium VI [emissions to water, river]: 6.3763e-5 kg; lognormal SD95 5.0959
  (same comment as for DOC, Dissolved Organic Carbon)
- Particulates, > 2.5 um, and < 10um [emissions to air, high. pop.]: 2.0233e-8 kg; lognormal SD95 2.4563
  (same comment as for Methane, biogenic)
- Sulfate [emissions to water, river]: 0.00014651 kg; lognormal SD95 3.5308
  (same comment as for DOC, Dissolved Organic Carbon)
- Lead [emissions to water, groundwater, long-term]: 1.3425e-5 kg; lognormal SD95 62.421
  (same comment as for Nitrate)
- Cadmium [emissions to water, groundwater, long-term]: 1.4579e-8 kg; lognormal SD95 216.45
  (same comment as for Nitrate)
- Particulates, < 2.5 um [emissions to air, high. pop.]: 4.0265e-6 kg; lognormal SD95 3.6845
  (same comment as for Methane, biogenic)
- BOD5, Biological Oxygen Demand [emissions to water, river]: 0.00046193 kg; lognormal SD95 1.5406
  (same comment as for DOC, Dissolved Organic Carbon)
- Hydrogen fluoride [emissions to air, high. pop.]: 1.4189e-7 kg; lognormal SD95 8.785
  (same comment as for Chromium)
- Ammonia [emissions to air, high. pop.]: 5.4567e-7 kg; lognormal SD95 3.6368
  Nitrogen species emitted to air after DeNOx stage. uncertainty calculated from uncertainty in average N-emissions and uncertainty in the share of thermal NOx and the uncertainty in nitrogen content in *this* waste.
- Manganese [emissions to air, high. pop.]: 1.0108e-8 kg; lognormal SD95 7.9524
  (same comment as for Chromium)
- Copper [emissions to air, high. pop.]: 7.2024e-8 kg; lognormal SD95 5.4756
  (same comment as for Chromium)
- Magnesium [emissions to air, high. pop.]: 2.0763e-7 kg; lognormal SD95 6.6049
  (same comment as for Chromium)
- Dinitrogen monoxide [emissions to air, high. pop.]: 1.4667e-5 kg; lognormal SD95 10.966
  (same comment as for Ammonia)
- Benzo(a)pyrene [emissions to air, high. pop.]: 7.5048e-13 kg; lognormal SD95 3.6845
  (same comment as for Methane, biogenic)
- Lead [emissions to water, river]: 2.6561e-9 kg; lognormal SD95 7.0309
  (same comment as for DOC, Dissolved Organic Carbon)
- Nitrogen oxides [emissions to air, high. pop.]: 0.00017279 kg; lognormal SD95 3.6368
  sum of fuel-Nox and thermal-NOx emitted to air after DeNOx stage. uncertainty calculated from uncertainty in average N-emissions and uncertainty in the share of thermal NOx and the uncertainty in nitrogen content in *this* waste.
- Cadmium [emissions to water, river]: 1.9149e-11 kg; lognormal SD95 11.338
  (same comment as for DOC, Dissolved Organic Carbon)
- Cyanide [emissions to air, high. pop.]: 3.1512e-6 kg; lognormal SD95 10.966
  (same comment as for Ammonia)
- COD, Chemical Oxygen Demand [emissions to water, river]: 0.00046794 kg; lognormal SD95 1.5318
  (same comment as for DOC, Dissolved Organic Carbon)
- Sodium [emissions to air, high. pop.]: 2.7429e-6 kg; lognormal SD95 6.0516
  (same comment as for Chromium)
- Nickel [emissions to water, groundwater, long-term]: 5.3159e-7 kg; lognormal SD95 12.679
  (same comment as for Nitrate)
- Copper [emissions to water, river]: 1.019e-7 kg; lognormal SD95 5.1449
  (same comment as for DOC, Dissolved Organic Carbon)
- BOD5, Biological Oxygen Demand [emissions to water, groundwater, long-term]: 0.00098261 kg; lognormal SD95 1.3688
  (same comment as for Nitrate)
- Boron [emissions to water, groundwater, long-term]: 5.0104e-5 kg; lognormal SD95 6.5645
  (same comment as for Nitrate)
- Hydrogen chloride [emissions to air, high. pop.]: 1.8818e-7 kg; lognormal SD95 6.1632
  (same comment as for Chromium)
- Calcium [emissions to water, groundwater, long-term]: 9.7142e-5 kg; lognormal SD95 6.4533
  (same comment as for Nitrate)
- Heat, waste [emissions to air, high. pop.]: 11.215 MJ; lognormal SD95 1.5805
  (same comment as for Heat, waste)
- Copper [emissions to water, groundwater, long-term]: 0.00070241 kg; lognormal SD95 5.1761
  (same comment as for Nitrate)
- Manganese [emissions to water, groundwater, long-term]: 3.2652e-5 kg; lognormal SD95 17.259
  (same comment as for Nitrate)
- Mercury [emissions to air, high. pop.]: 9.0338e-9 kg; lognormal SD95 13.838
  (same comment as for Chromium)
- Zinc [emissions to air, high. pop.]: 1.1892e-8 kg; lognormal SD95 9.0601
  (same comment as for Chromium)
- Sodium [emissions to water, river]: 9.0772e-5 kg; lognormal SD95 3.6488
  (same comment as for DOC, Dissolved Organic Carbon)
- Phosphate [emissions to water, groundwater, long-term]: 1.4548e-5 kg; lognormal SD95 90.689
  (same comment as for Nitrate)
- Cobalt [emissions to air, high. pop.]: 1.5724e-10 kg; lognormal SD95 16.16
  (same comment as for Chromium)
- Calcium [emissions to air, high. pop.]: 1.0264e-6 kg; lognormal SD95 6.9169
  (same comment as for Chromium)
- Chromium VI [emissions to water, groundwater, long-term]: 0.00020929 kg; lognormal SD95 7.8566
  (same comment as for Nitrate)
- Sulfur dioxide [emissions to air, high. pop.]: 3.0712e-6 kg; lognormal SD95 6.205
  (same comment as for Chromium)
- Cadmium [emissions to air, high. pop.]: 1.0183e-10 kg; lognormal SD95 14.669
  (same comment as for Chromium)
- Phosphorus [emissions to air, high. pop.]: 1.1034e-7 kg; lognormal SD95 7.1824
  (same comment as for Chromium)

## Sampling procedure
fully waste-specific calculation based on literature data for average MSWI operation performance

## Extrapolations
Typical elemental transfer coefficients from current studies for modern MSWI, completed with data from coal power plants and estimates, adapted for inert/burnable waste.

## Uncertainty adjustments
uncertainty of waste input composition data derived from generic formula GSD(c) = N*ln(c)+1

## Sources
- Doka G., 2013, 2013 - Updates LCI waste treatment services - Doka, -, Doka LCA, Zuerich, CH
Doka G. (2013) Updates to Life Cycle Inventories of Waste Treatment Services - part II: waste incineration. Doka LCA. Zurich.
Type: Separate publication
Source: Report to document the 2013 changes to the MSWI incinerator model and datasets (URL: http://www.doka.ch/ecoinventMSWIupdateLCI2013.pdf). To be read with the ecoinvent Nr 13 report (Doka 2009, Life Cycle Inventories of Waste Treatment Services) for ecoinvent v2.2.
First author: Doka G.
Year: 2013
Place of publication: Zurich
Publisher: Doka LCA
Original title: Updates to Life Cycle Inventories of Waste Treatment Services - part II: waste incineration

## Validation
Proof reading validation: Passed.; Other validation: none;
