# Crude oil, market mix, at long distance transport

Dataset: EcoSpold 1, unit process
Functional unit: 1 kg
Category: oil / transport
Geography: RER
Time period: 2023 to 2025
Production volume: 549.8 million tons of directly imported crude oil to RER region in 2023.
Generated by: Maresa Bussa
accessRestrictedTo: 0
copyright: true

## General comment
Calculation for transport distances assuming transport by pipeline offshore and onshore as well as sea transport in tanker. Sites and modes of transportation based on the supply situation in 2023.

## Included processes
Transportation of crude oil from exploration sites to refineries in RER-region. Includes transport service requirements and emissions from oil handling and evaporation.

## Geography
Calculations include production and transport of crude oil from 35 countries.

## Technology
Operation of crude oil pipelines by electricity.

## Time period
Transport modes investigated for 2023.

## Reference product
- Crude oil, market mix, at long distance transport [RER]: 1 kg

## Inputs from technosphere
- Crude oil, at production [AE]: 0.0099071 kg; lognormal SD95 1.209
  (1,1,1,3,3,BU:1.05); In 2023, 5.445 megatons of crude oil are imported from United Arab Emirates to Europe-region, assuming 44% offshore production. Assumed transport distances: Offshore, at origin: 100km by pipeline. Onshore, at origin: 100km by pipeline. For transport to destination: 11484km by ship plus additional 100km by onshore pipeline at destination. Port of origin for shipping is assumed to be Dubai or Abu Dhabi .
- Crude oil, at production [AO]: 0.036319 kg; lognormal SD95 1.209
  (1,1,1,3,3,BU:1.05); In 2023, 19.961 megatons of crude oil are imported from Angola to Europe-region, assuming 30% offshore production. Assumed transport distances: Offshore, at origin: 100km by pipeline. Onshore, at origin: 100km by pipeline. For transport to destination: 9217km by ship plus additional 100km by onshore pipeline at destination. Port of origin for shipping is assumed to be 0.
- Crude oil, at production [AR]: 0.0044885 kg; lognormal SD95 1.209
  (1,1,1,3,3,BU:1.05); In 2023, 2.467 megatons of crude oil are imported from Argentina to Europe-region, assuming 30% offshore production. Assumed transport distances: Offshore, at origin: 100km by pipeline. Onshore, at origin: 500km by pipeline. For transport to destination: 11744km by ship plus additional 100km by onshore pipeline at destination. Port of origin for shipping is assumed to be Buenos Aires.
- Crude oil, at production [AZ]: 0.031308 kg; lognormal SD95 1.209
  (1,1,1,3,3,BU:1.05); In 2023, 17.207 megatons of crude oil are imported from Azerbaijan to Europe-region, assuming 90% offshore production. Assumed transport distances: Offshore, at origin: 43km by pipeline. Onshore, at origin: 1800km by pipeline. For transport to destination: 6265km by ship plus additional 100km by onshore pipeline at destination. Port of origin for shipping is assumed to be Ceyhan (Mersin).
- Crude oil, at production [BR]: 0.01609 kg; lognormal SD95 1.209
  (1,1,1,3,3,BU:1.05); In 2023, 8.843 megatons of crude oil are imported from Brazil to Europe-region, assuming 96.7% offshore production. Assumed transport distances: Offshore, at origin: 140km by pipeline. Onshore, at origin: 800km by pipeline. For transport to destination: 10056km by ship plus additional 100km by onshore pipeline at destination. Port of origin for shipping is assumed to be Santos.
- Crude oil, at production [CA]: 0.012192 kg; lognormal SD95 1.209
  (1,1,1,3,3,BU:1.05); In 2023, 6.701 megatons of crude oil are imported from Canada to Europe-region, assuming 7.3% offshore production. Assumed transport distances: Offshore, at origin: 100km by pipeline. Onshore, at origin: 3000km by pipeline. For transport to destination: 5836km by ship plus additional 100km by onshore pipeline at destination. Port of origin for shipping is assumed to be Quebec.
- Crude oil, at production [CN]: 0.00076601 kg; lognormal SD95 1.209
  (1,1,1,3,3,BU:1.05); In 2023, 0.421 megatons of crude oil are imported from China to Europe-region, assuming 4% offshore production. Assumed transport distances: Offshore, at origin: 100km by pipeline. Onshore, at origin: 100km by pipeline. For transport to destination: 18207km by ship plus additional 100km by onshore pipeline at destination. Port of origin for shipping is assumed to be Guangdong.
- Crude oil, at production [CO]: 0.0035857 kg; lognormal SD95 1.209
  (1,1,1,3,3,BU:1.05); In 2023, 1.971 megatons of crude oil are imported from Colombia to Europe-region, assuming 12.5% offshore production. Assumed transport distances: Offshore, at origin: 100km by pipeline. Onshore, at origin: 800km by pipeline. For transport to destination: 9771km by ship plus additional 100km by onshore pipeline at destination. Port of origin for shipping is assumed to be Tumaco.
- Crude oil, at production [DE]: 0.0047651 kg; lognormal SD95 1.209
  (1,1,1,3,3,BU:1.05); In 2023, 0 megatons of crude oil are imported from Germany to Europe-region, and 2.619 megatons are consumed or refined locally, assuming 60.3% offshore production. Assumed transport distances: Offshore, at origin: 10km by pipeline. Onshore, at origin: 100km by pipeline. For transport to destination: 0km by ship plus additional 0km by onshore pipeline at destination. Port of origin for shipping is assumed to be Hamburg.
- Crude oil, at production [DZ]: 0.038379 kg; lognormal SD95 1.209
  (1,1,1,3,3,BU:1.05); In 2023, 21.093 megatons of crude oil are imported from Algeria to Europe-region, assuming 0% offshore production. Assumed transport distances: Offshore, at origin: 100km by pipeline. Onshore, at origin: 700km by pipeline. For transport to destination: 3284km by ship plus additional 100km by onshore pipeline at destination. Port of origin for shipping is assumed to be Algiers.
- Crude oil, at production [EC]: 0.0022312 kg; lognormal SD95 1.209
  (1,1,1,3,3,BU:1.05); In 2023, 1.226 megatons of crude oil are imported from Ecuador to Europe-region, assuming 2.4% offshore production. Assumed transport distances: Offshore, at origin: 100km by pipeline. Onshore, at origin: 300km by pipeline. For transport to destination: 10056km by ship plus additional 100km by onshore pipeline at destination. Port of origin for shipping is assumed to be Guayaquil.
- Crude oil, at production [EG]: 0.018955 kg; lognormal SD95 1.209
  (1,1,1,3,3,BU:1.05); In 2023, 10.417 megatons of crude oil are imported from Egypt to Europe-region, assuming 22% offshore production. Assumed transport distances: Offshore, at origin: 100km by pipeline. Onshore, at origin: 100km by pipeline. For transport to destination: 5850km by ship plus additional 100km by onshore pipeline at destination. Port of origin for shipping is assumed to be Alexandria.
- Crude oil, at production [FR]: 0.0014102 kg; lognormal SD95 1.209
  (1,1,1,3,3,BU:1.05); In 2023, 0 megatons of crude oil are imported from France to Europe-region, and 0.775 megatons are consumed or refined locally, assuming 30% offshore production. Assumed transport distances: Offshore, at origin: 100km by pipeline. Onshore, at origin: 100km by pipeline. For transport to destination: 0km by ship plus additional 0km by onshore pipeline at destination. Port of origin for shipping is assumed to be Marseille.
- Crude oil, at production [GB]: 0.056005 kg; lognormal SD95 1.209
  (1,1,1,3,3,BU:1.05); In 2023, 0 megatons of crude oil are imported from United Kingdom to Europe-region, and 30.781 megatons are consumed or refined locally, assuming 98% offshore production. Assumed transport distances: Offshore, at origin: 166km by pipeline. Onshore, at origin: 100km by pipeline. For transport to destination: 0km by ship plus additional 0km by onshore pipeline at destination. Port of origin for shipping is assumed to be Southampton.
- Crude oil, at production [GQ]: 0.0026192 kg; lognormal SD95 1.209
  (1,1,1,3,3,BU:1.05); In 2023, 1.44 megatons of crude oil are imported from Equatorial Guinea to Europe-region, assuming 100% offshore production. Assumed transport distances: Offshore, at origin: 100km by pipeline. Onshore, at origin: 100km by pipeline. For transport to destination: 8299km by ship plus additional 100km by onshore pipeline at destination. Port of origin for shipping is assumed to be Malabo.
- Crude oil, at production [IN]: 0.0034516 kg; lognormal SD95 1.2077
  (1,1,1,1,3,BU:1.05); In 2023, 1.897 megatons of crude oil are imported from India to Europe-region, assuming 45% offshore production. Assumed transport distances: Offshore, at origin: 100km by pipeline. Onshore, at origin: 1000km by pipeline. For transport to destination: 11705km by ship plus additional 100km by onshore pipeline at destination. Port of origin for shipping is assumed to be Mumbai.
- Crude oil, at production [IQ]: 0.089492 kg; lognormal SD95 1.2077
  (1,1,1,1,3,BU:1.05); In 2023, 49.185 megatons of crude oil are imported from Iraq to Europe-region, assuming 0% offshore production. Assumed transport distances: Offshore, at origin: 0km by pipeline. Onshore, at origin: 500km by pipeline. For transport to destination: 2900km by ship plus additional 100km by onshore pipeline at destination. Port of origin for shipping is assumed to be Basrah.
- Crude oil, at production [IR]: 0.0019396 kg; lognormal SD95 1.209
  (1,1,1,3,3,BU:1.05); In 2023, 1.066 megatons of crude oil are imported from Iran to Europe-region, assuming 15.8% offshore production. Assumed transport distances: Offshore, at origin: 100km by pipeline. Onshore, at origin: 400km by pipeline. For transport to destination: 12077km by ship plus additional 100km by onshore pipeline at destination. Port of origin for shipping is assumed to be Bahregan Sar Oilfield.
- Crude oil, at production [IT]: 0.0072221 kg; lognormal SD95 1.209
  (1,1,1,3,3,BU:1.05); In 2023, 0 megatons of crude oil are imported from Italy to Europe-region, and 3.969 megatons are consumed or refined locally, assuming 30% offshore production. Assumed transport distances: Offshore, at origin: 100km by pipeline. Onshore, at origin: 100km by pipeline. For transport to destination: 0km by ship plus additional 0km by onshore pipeline at destination. Port of origin for shipping is assumed to be Trieste.
- Crude oil, at production [KW]: 0.0061606 kg; lognormal SD95 1.209
  (1,1,1,3,3,BU:1.05); In 2023, 3.386 megatons of crude oil are imported from Kuwait to Europe-region, assuming 1% offshore production. Assumed transport distances: Offshore, at origin: 100km by pipeline. Onshore, at origin: 20km by pipeline. For transport to destination: 12186km by ship plus additional 100km by onshore pipeline at destination. Port of origin for shipping is assumed to be Shuaiba.
- Crude oil, at production [KZ]: 0.087183 kg; lognormal SD95 1.2077
  (1,1,1,1,3,BU:1.05); In 2023, 47.916 megatons of crude oil are imported from Kazakhstan to Europe-region, assuming 12.7% offshore production. Assumed transport distances: Offshore, at origin: 100km by pipeline. Onshore, at origin: 3400km by pipeline. For transport to destination: 0km by ship plus additional 1400km by onshore pipeline at destination. Port of origin for shipping is assumed to be Novorossiysk.
- Crude oil, at production [LY]: 0.037952 kg; lognormal SD95 1.209
  (1,1,1,3,3,BU:1.05); In 2023, 20.858 megatons of crude oil are imported from Libya to Europe-region, assuming 20% offshore production. Assumed transport distances: Offshore, at origin: 100km by pipeline. Onshore, at origin: 200km by pipeline. For transport to destination: 5002km by ship plus additional 100km by onshore pipeline at destination. Port of origin for shipping is assumed to be Sirtica Terminal.
- Crude oil, at production [MX]: 0.014621 kg; lognormal SD95 1.2077
  (1,1,1,1,3,BU:1.05); In 2023, 8.035 megatons of crude oil are imported from Mexico to Europe-region, assuming 89.6% offshore production. Assumed transport distances: Offshore, at origin: 307km by pipeline. Onshore, at origin: 240km by pipeline. For transport to destination: 10000km by ship plus additional 100km by onshore pipeline at destination. Port of origin for shipping is assumed to be Veracruz.
- Crude oil, at production [NG]: 0.04812 kg; lognormal SD95 1.209
  (1,1,1,3,3,BU:1.05); In 2023, 26.447 megatons of crude oil are imported from Nigeria to Europe-region, assuming 90% offshore production. Assumed transport distances: Offshore, at origin: 60km by pipeline. Onshore, at origin: 140km by pipeline. For transport to destination: 7725km by ship plus additional 100km by onshore pipeline at destination. Port of origin for shipping is assumed to be Lagos.
- Crude oil, at production [NL]: 0.0010868 kg; lognormal SD95 1.209
  (1,1,1,3,3,BU:1.05); In 2023, 0 megatons of crude oil are imported from Netherlands to Europe-region, and 0.597 megatons are consumed or refined locally, assuming 90% offshore production. Assumed transport distances: Offshore, at origin: 50km by pipeline. Onshore, at origin: 100km by pipeline. For transport to destination: 0km by ship plus additional 0km by onshore pipeline at destination. Port of origin for shipping is assumed to be Rotterdam.
- Crude oil, at production [NO]: 0.15865 kg; lognormal SD95 1.209
  (1,1,1,3,3,BU:1.05); In 2023, 0 megatons of crude oil are imported from Norway to Europe-region, and 87.193 megatons are consumed or refined locally, assuming 100% offshore production. Assumed transport distances: Offshore, at origin: 195km by pipeline. Onshore, at origin: 200km by pipeline. For transport to destination: 0km by ship plus additional 0km by onshore pipeline at destination. Port of origin for shipping is assumed to be Bergen.
- Crude oil, at production [PL]: 0.0019334 kg; lognormal SD95 1.2077
  (1,1,1,1,3,BU:1.05); In 2023, 0 megatons of crude oil are imported from Poland to Europe-region, and 1.063 megatons are consumed or refined locally, assuming 30% offshore production. Assumed transport distances: Offshore, at origin: 100km by pipeline. Onshore, at origin: 100km by pipeline. For transport to destination: 0km by ship plus additional 0km by onshore pipeline at destination. Port of origin for shipping is assumed to be Gdansk.
- Crude oil, at production [RO]: 0.0049967 kg; lognormal SD95 1.209
  (1,1,1,3,3,BU:1.05); In 2023, 0 megatons of crude oil are imported from Romania to Europe-region, and 2.746 megatons are consumed or refined locally, assuming 30% offshore production. Assumed transport distances: Offshore, at origin: 100km by pipeline. Onshore, at origin: 100km by pipeline. For transport to destination: 0km by ship plus additional 0km by onshore pipeline at destination. Port of origin for shipping is assumed to be Constanța.
- Crude oil, at production [RU]: 0.05895 kg; lognormal SD95 1.2077
  (1,1,1,1,3,BU:1.05); In 2023, 32.399 megatons of crude oil are imported from Russian Federation to Europe-region, assuming 17.8% offshore production. Assumed transport distances: Offshore, at origin: 100km by pipeline. Onshore, at origin: 3800km by pipeline. For transport to destination: 0km by ship plus additional 3700km by onshore pipeline at destination. Port of origin for shipping is assumed to be St. Petersburg.
- Crude oil, at production [SA]: 0.074103 kg; lognormal SD95 1.2077
  (1,1,1,1,3,BU:1.05); In 2023, 40.727 megatons of crude oil are imported from Saudi Arabia to Europe-region, assuming 34.6% offshore production. Assumed transport distances: Offshore, at origin: 100km by pipeline. Onshore, at origin: 1300km by pipeline. For transport to destination: 11919km by ship plus additional 100km by onshore pipeline at destination. Port of origin for shipping is assumed to be Ju' aimah.
- Crude oil, at production [TM]: 0.0095071 kg; lognormal SD95 1.2077
  (1,1,1,1,3,BU:1.05); In 2023, 5.225 megatons of crude oil are imported from Turkmenistan to Europe-region, assuming 25.6% offshore production. Assumed transport distances: Offshore, at origin: 200km by pipeline. Onshore, at origin: 2700km by pipeline. For transport to destination: 6565km by ship plus additional 100km by onshore pipeline at destination. Port of origin for shipping is assumed to be Ceyhan (plus shipping Turkmenbashi to BAKU).
- Crude oil, at production [UA]: 0.0038514 kg; lognormal SD95 1.2077
  (1,1,1,1,3,BU:1.05); In 2023, 0 megatons of crude oil are imported from Ukraine to Europe-region, and 2.117 megatons are consumed or refined locally, assuming 30% offshore production. Assumed transport distances: Offshore, at origin: 100km by pipeline. Onshore, at origin: 100km by pipeline. For transport to destination: 0km by ship plus additional 0km by onshore pipeline at destination. Port of origin for shipping is assumed to be Odessa.
- Crude oil, at production [US]: 0.14624 kg; lognormal SD95 1.2077
  (1,1,1,1,3,BU:1.05); In 2023, 80.373 megatons of crude oil are imported from United States to Europe-region, assuming 14.6% offshore production. Assumed transport distances: Offshore, at origin: 286km by pipeline. Onshore, at origin: 1100km by pipeline. For transport to destination: 9700km by ship plus additional 100km by onshore pipeline at destination. Port of origin for shipping is assumed to be Houston.
- Crude oil, at production [UZ]: 0.0020369 kg; lognormal SD95 1.209
  (1,1,1,3,3,BU:1.05); In 2023, 1.119 megatons of crude oil are imported from Uzbekistan to Europe-region, assuming 0% offshore production. Assumed transport distances: Offshore, at origin: 100km by pipeline. Onshore, at origin: 2600km by pipeline. For transport to destination: 6565km by ship plus additional 100km by onshore pipeline at destination. Port of origin for shipping is assumed to be Ceyhan (plus shipping Turkmenbashi to BAKU).
- Crude oil, at production [VE]: 0.0038301 kg; lognormal SD95 1.209
  (1,1,1,3,3,BU:1.05); In 2023, 2.105 megatons of crude oil are imported from Venezuela to Europe-region, assuming 30% offshore production. Assumed transport distances: Offshore, at origin: 100km by pipeline. Onshore, at origin: 100km by pipeline. For transport to destination: 7734km by ship plus additional 100km by onshore pipeline at destination. Port of origin for shipping is assumed to be Puerto La Cruz / Jose Petroterminal.
- Transport, transoceanic tanker [OCE]: 4.7039 tkm; lognormal SD95 2.0618
  (3,2,1,3,3,BU:2); Calculation based on estimated shipping route and pipelines according to searates.com and export data for 2023.
- Transport, crude oil pipeline, offshore [OCE]: 0.067573 tkm; lognormal SD95 1.2377
  (3,2,1,3,3,BU:1.05); Calculation based on estimated shipping route and pipelines according to searates.com and export data for 2023.
- Transport, crude oil pipeline, onshore [RER]: 1.1027 tkm; lognormal SD95 1.2377
  (same comment as for Transport, crude oil pipeline, offshore)

## Emissions to nature
- Hydrocarbons, aliphatic, alkanes, unspecified [emissions to air, low. pop.]: 1.35e-6 kg; lognormal SD95 1.5913
  (3,4,4,1,1,BU:1.5); Evaporation losses for storage and handling
- Benzene [emissions to air, low. pop.]: 4.5e-7 kg; lognormal SD95 3.0703
  (3,4,4,1,1,BU:3); Evaporation losses for storage and handling
- Butane [emissions to air, low. pop.]: 0.00012642 kg; lognormal SD95 1.5913
  (3,4,4,1,1,BU:1.5); Evaporation losses for storage and handling
- Methane, fossil [emissions to air, low. pop.]: 1.498e-6 kg; lognormal SD95 1.5913
  (3,4,4,1,1,BU:1.5); Evaporation losses for storage and handling
- Ethane [emissions to air, low. pop.]: 1.601e-6 kg; lognormal SD95 1.5913
  (3,4,4,1,1,BU:1.5); Evaporation losses for storage and handling
- Hexane [emissions to air, low. pop.]: 5.3876e-5 kg; lognormal SD95 1.5913
  (3,4,4,1,1,BU:1.5); Evaporation losses for storage and handling
- Pentane [emissions to air, low. pop.]: 9.558e-5 kg; lognormal SD95 1.5913
  (3,4,4,1,1,BU:1.5); Evaporation losses for storage and handling
- Propane [emissions to air, low. pop.]: 6.1296e-5 kg; lognormal SD95 1.5913
  (3,4,4,1,1,BU:1.5); Evaporation losses for storage and handling
- Toluene [emissions to air, low. pop.]: 2.7e-7 kg; lognormal SD95 1.5913
  (3,4,4,1,1,BU:1.5); Evaporation losses for storage and handling

## Sampling procedure
Literature. Online calculators for distances. The consumption mix is calculated based on international trade statistics for 2023.

## Sources
- Meili C., Jungbluth N., Bussa M., Stefanel A., 2025, 2025 - LCI long-distance transport crude oil - Meili, Project report, 565, ESU-services Ltd., Schaffhausen, CH

## Validation
Passed.
https://esuservices-my.sharepoint.com/personal/jungbluth_esu-services_ch/Documents/ESU-intern/565 Beratung BAFU/EcoSpoldDataXML/[EcoSpold-oil-transport-2025-v1.0.xlsb]X-Process
