# Electronic passive elements, washing machine, at plant

Dataset: EcoSpold 1, unit process, infrastructure
Functional unit: 1 p
Category: private consumption / household devices
Geography: CH
Time period: 2000-01 to 2000-12
Share of production covered: 0 %
Generated by: Mireille Faist Emmenegger
accessRestrictedTo: 0
copyright: true

## General comment
The material requirements are based on the measured average weight of the different parts (diodes, capacitors, etc.) and of an average composition of the parts. Transport distances are standard distances for the raw materials.;

## Included processes
This process describes the material and related transport requirements for the electronic parts (without printed wiring boards) of a washing machine.

## Geography
The electronic passive elements are for a Swiss washing machine for a household.

## Technology
Electronic passive elements for an actual washing machine for a household.

## Time period
The material composition of the electronic parts is based on data from 2001. Weight and number of the elements of the PWBs were collected 2004.

## Reference product
- Electronic passive elements, washing machine, at plant [CH]: 1 p
  SWITZERLAND

## Inputs from technosphere
- Tin, at regional storage [RER]: 0.0041584 kg; lognormal SD95 1.1249
  (1,3,1,1,1,4); literature & own measurements
- Transport, freight, lorry, 16t-32t gross weight, fleet average [CH]: 0.0060455 tkm; lognormal SD95 2.095
  (4,5,na,na,na,na); standard distances
- Gold, at regional storage [RER]: 9.2207e-5 kg; lognormal SD95 1.1249
  (1,3,1,1,1,4); literature & own measurements
- Silver, from combined gold-silver production, at refinery [CL]: 3.1528e-5 kg; lognormal SD95 1.1249
  (1,3,1,1,1,4); literature & own measurements
- Sanitary ceramics, at regional storage [CH]: 0.036595 kg; lognormal SD95 1.1249
  (1,3,1,1,1,4); literature & own measurements
- Epoxy resin, liquid, at plant [RER]: 0.00097497 kg; lognormal SD95 1.1249
  (1,3,1,1,1,4); literature & own measurements
- Copper, primary, at refinery [GLO]: 0.10361 kg; lognormal SD95 1.1249
  (1,3,1,1,1,4); literature & own measurements
- Polyester resin, unsaturated, at plant [RER]: 0.028439 kg; lognormal SD95 1.1249
  (1,3,1,1,1,4); literature & own measurements
- Zinc, primary, at regional storage [RER]: 7.8003e-5 kg; lognormal SD95 1.1249
  (1,3,1,1,1,4); literature & own measurements
- Aluminium, primary, at plant [RER]: 0.00010864 kg; lognormal SD95 1.1249
  (1,3,1,1,1,4); literature & own measurements
- Polyethylene, HDPE, granulate, at plant [RER]: 0.011456 kg; lognormal SD95 1.1249
  (1,3,1,1,1,4); literature & own measurements
- Lead, at regional storage [RER]: 0.00018615 kg; lognormal SD95 1.1249
  (1,3,1,1,1,4); literature & own measurements
- Polypropylene, granulate, at plant [RER]: 0.013873 kg; lognormal SD95 1.1249
  (1,3,1,1,1,4); literature & own measurements
- Transport, freight, rail, electricity with shunting [CH]: 0.050605 tkm; lognormal SD95 2.095
  (4,5,na,na,na,na); standard distances
- Nickel, 99.5%, at plant [GLO]: 0.001941 kg; lognormal SD95 1.1249
  (1,3,1,1,1,4); literature & own measurements

## Extrapolations
Material composition of the electronic parts are extrapolated from the mobile communication technology.

## Sources
- Hischier R., Classen M., Lehmann M., Scharnhorst W., 2007, 2007 - LCI electric and electronic equipment - Hischier, 0, 0, Swiss Centre for LCI, Empa - TSL, Duebendorf and St. Gallen, CH
Faist Emmenegger M., Jungbluth N., Frischknecht R. (2004) Life Cycle Inventories. Project reports. Volume: 0. ESU-services. Uster, CH.

## Validation
Proof reading validation: 1; Other validation: none;
