# Disposal, lignite ash from stove, 0% water, to municipal incineration

Dataset: EcoSpold 1, unit process
Functional unit: 1 kg
Category: waste management / municipal incineration
Geography: CH
Time period: 2000-01 to 2000-12
Generated by: Gabor Doka
accessRestrictedTo: 0
copyright: true

## General comment
This dataset represents the activity of waste disposal of lignite ash in a municipal solid waste incinerator (MSWI) Recommended use of this dataset: For small amounts of lignite ash from small scale furnaces, which go to disposal as part of communal waste mixture. Larger amounts will be landfilled or could be used in building material production. Waste composition (wet, in ppm): upper heating value 2.578 MJ/kg; H2O n.a.; O 83797; H n.a.; C 100000; S n.a.; N n.a.; P 392; B 2100; Cl n.a.; Br 38.8; F n.a.; I 16.4; Ag n.a.; As 46; Ba 980; Cd 5.49; Co 147; Cr 134.4; Cu 58.5; Hg 0.1; Mn 198; Mo 66.5; Ni 145.5; Pb 47; Sb 38; Se 14; Sn 15.84; V 339.5; Zn 266; Be 9.8; Sc 4.95; Sr 679; Ti 980; Tl 0.19; W n.a.; Si 470400; Fe 52920; Ca 196000; Al 46060; K 5880; Mg 29400; Na 8820; Share of carbon in waste that is biogenic 0%. Share of metals in waste not oxidised and bulk-recyclable (exclude very small or thin parts) Iron: 0%; Alu: 0%; Copper: 0%. One kg of this waste produces 2.194 kg of slag and 0 kg of residues, which are landfilled. Net energy production: 0MJ/kg electric energy and 0MJ/kg thermal energy. Recovery of metal scrap to recycling: 0g iron scrap, 0g aluminium scrap, 0g copper scrap.;;

## Included processes
Waste incineration from waste reception gate further downstream (excluding transport to the MSWI plant). Waste-specific air and water emisions from incineration, auxiliary material consumption for flue gas cleaning. Short-term emissions to river water and long-term emisisons to ground water from slag compartment (from bottom ash) and residual material landfill (from solidified fly ashes and scrubber slugde). Waste-specific process energy demands for MSWI and net energy generation.

## Geography
Specific to the technology mix encountered in Switzerland in 2010. Well applicable to modern incineration practices in Europe, North America or Japan.

## Technology
average Swiss MSWI plants in 2010 (grate incinerators) with electrostatic precipitator for fly ash (ESP), wet flue gas scrubber and 25% SNCR , 42.77% SCR-high dust , 32.68% SCR-low dust -DeNOx facilities and 0% without Denox (weighted according to mass of burnt waste, representing Swiss average). Efficiency of iron scrap separation from slag : 58%. Efficiency of non-ferrous scrap separation from slag : 31%. Gross electric efficiency technology mix 15.84% and Gross thermal efficiency technology mix 28.51%

## Time period
Waste composition as given in literature reference, theoretical data or other source. Transfer coefficients for modern MSWI.

## Reference product
- Disposal, lignite ash from stove, 0% water, to municipal incineration [CH]: 1 kg
  SWITZERLAND

## Inputs from technosphere
- Electricity from waste, at municipal waste incineration plant [CH]: 0.073137 kWh; lognormal SD95 1.05
  Net electricity required to incinerate this waste (subsidiesed from high-calorific waste fractions). uncertainty is calculated from uncertainties in waste composition and uncertainties in energy efficiency and the uncertainty in internal energy demand
- Natural gas, burned in industrial furnace 1MW [CH]: 0.050097 MJ; lognormal SD95 2.0066
  Input to DeNOx stage, to heat up flue gas in low-dust SCR. uncertainty calculated from uncertainty in average DeNOx input, uncertainty in the share of thermal NOx, uncertainty of nitrogen content in average municipal waste and the uncertainty in nitrogen content in *this* waste.
- Chromium oxide, flakes, at plant [RER]: 3.4254e-7 kg; lognormal SD95 3.8106
  Input to DeNOx stage. uncertainty calculated from uncertainty in average DeNOx input, uncertainty in the share of thermal NOx, uncertainty of nitrogen content in average municipal waste and the uncertainty in nitrogen content in *this* waste.
- Process-specific burdens, slag compartment [CH]: 2.144 kg; lognormal SD95 1.4296
  mass-specific expenditures required for landfilling of bottom ash. uncertainty is calculated from uncertainties in waste composition and transfer coefficients in incinerator
- Heat from waste, at municipal waste incineration plant [CH]: 0.37196 MJ; lognormal SD95 1.05
  Net heat required to incinerate this waste (subsidiesed from high-calorific waste fractions). uncertainty is calculated from uncertainties in waste composition and uncertainties in energy efficiency and the uncertainty in internal energy demand
- Slag compartment [CH]: 3.8115e-9 p; lognormal SD95 1.4296
  landfill infrastructure required for landfilling of bottom ash. uncertainty is calculated from uncertainties in waste composition and transfer coefficients in incinerator
- Transport, freight, lorry, 16t-32t gross weight, fleet average [CH]: 0.088396 tkm; lognormal SD95 1.4149
  Transport services to transport incineration residues to landfills and to transport auxilliary inputs of the incinerator plant. uncertainty calculated from uncertainty in average auxiliary material input, the uncertainty of the waste composition of this waste and the uncertainty in generic transportation distances
- Titanium dioxide, production mix, at plant [RER]: 1.6785e-5 kg; lognormal SD95 3.8106
  Input to DeNOx stage (TiO2 catalyst carrier) uncertainty calculated from uncertainty in average DeNOx input, uncertainty in the share of thermal NOx, uncertainty of nitrogen content in average municipal waste and the uncertainty in nitrogen content in *this* waste.
- Transport, freight, rail [RER]: 0.0012928 tkm; lognormal SD95 1.0598
  (same comment as for Transport, freight, lorry, 16t-32t gross weight, fleet average)
- Municipal waste incineration plant [CH]: 2.5e-10 p; lognormal SD95 1
  demands per kilogram waste. uncertainty is heeded in the module
- Ammonia, liquid, at regional storehouse [CH]: 0.0002679 kg; lognormal SD95 2.0066
  Input to DeNOx stage (100% NH3). uncertainty calculated from uncertainty in average DeNOx input, uncertainty in the share of thermal NOx, uncertainty of nitrogen content in average municipal waste and the uncertainty in nitrogen content in *this* waste.

## Emissions to nature
- Barium [emissions to water, groundwater, long-term]: 0.00097985 kg; lognormal SD95 5.079
  Long-term emissions from landfilling of incineration residues. uncertainty is calculated from uncertainties in waste composition and transfer coefficients in incinerator and landfills.
- Thallium [emissions to water, river]: 1.1965e-10 kg; lognormal SD95 23.559
  Emissions to water from waste composition and transfer coefficients in incinerator and landfills. uncertainty is calculated from uncertainties in waste composition and transfer coefficients in incinerator and landfills
- Aluminium [emissions to water, river]: 6.0519e-7 kg; lognormal SD95 10.84
  (same comment as for Thallium)
- Iodide [emissions to water, groundwater, long-term]: 1.476e-12 kg; lognormal SD95 9.1959
  (same comment as for Barium)
- Benzene, pentachloro- [emissions to air, high. pop.]: 2.1174e-10 kg; lognormal SD95 1.5
  Incomplete combustion product emitted to air. uncertainty calculated from uncertainty in average operation emissions, and the uncertainty of the flue gas volume from this waste.
- COD, Chemical Oxygen Demand [emissions to water, river]: 0.00045445 kg; lognormal SD95 4.7734
  (same comment as for Thallium)
- Cadmium [emissions to water, groundwater, long-term]: 5.4872e-6 kg; lognormal SD95 10.188
  (same comment as for Barium)
- Lead [emissions to water, groundwater, long-term]: 4.6999e-5 kg; lognormal SD95 7.8584
  (same comment as for Barium)
- Selenium [emissions to water, river]: 2.2265e-7 kg; lognormal SD95 11.903
  (same comment as for Thallium)
- Iron [emissions to water, river]: 4.4279e-7 kg; lognormal SD95 11.256
  (same comment as for Thallium)
- BOD5, Biological Oxygen Demand [emissions to water, groundwater, long-term]: 0.041183 kg; lognormal SD95 2.007
  (same comment as for Barium)
- Manganese [emissions to water, groundwater, long-term]: 0.00019799 kg; lognormal SD95 6.4671
  (same comment as for Barium)
- Potassium [emissions to water, groundwater, long-term]: 0.0051694 kg; lognormal SD95 3.7284
  (same comment as for Barium)
- Arsenic [emissions to water, groundwater, long-term]: 4.5931e-5 kg; lognormal SD95 7.8803
  (same comment as for Barium)
- Mercury [emissions to water, river]: 2.6198e-9 kg; lognormal SD95 18.37
  (same comment as for Thallium)
- Calcium [emissions to water, groundwater, long-term]: 0.19514 kg; lognormal SD95 1.6768
  (same comment as for Barium)
- Lead [emissions to water, river]: 8.5792e-10 kg; lognormal SD95 19.993
  (same comment as for Thallium)
- Particulates, > 2.5 um, and < 10um [emissions to air, high. pop.]: 2.4045e-8 kg; lognormal SD95 2
  (same comment as for Benzene, pentachloro-)
- DOC, Dissolved Organic Carbon [emissions to water, groundwater, long-term]: 0.04982 kg; lognormal SD95 2.007
  (same comment as for Barium)
- Mercury [emissions to water, groundwater, long-term]: 9.738e-8 kg; lognormal SD95 15.341
  (same comment as for Barium)
- Zinc [emissions to water, groundwater, long-term]: 0.00026599 kg; lognormal SD95 6.1983
  (same comment as for Barium)
- Aluminium [emissions to water, groundwater, long-term]: 0.037625 kg; lognormal SD95 2.48
  (same comment as for Barium)
- Potassium [emissions to water, river]: 0.0007106 kg; lognormal SD95 4.3234
  (same comment as for Thallium)
- Phenol, pentachloro- [emissions to air, high. pop.]: 1.7453e-11 kg; lognormal SD95 1.5
  (same comment as for Benzene, pentachloro-)
- Manganese [emissions to water, river]: 1.0134e-8 kg; lognormal SD95 15.926
  (same comment as for Thallium)
- Nickel [emissions to water, river]: 9.1624e-8 kg; lognormal SD95 12.803
  (same comment as for Thallium)
- TOC, Total Organic Carbon [emissions to water, river]: 0.00017983 kg; lognormal SD95 4.7734
  (same comment as for Thallium)
- Cobalt [emissions to water, groundwater, long-term]: 0.00014698 kg; lognormal SD95 6.7442
  (same comment as for Barium)
- Silicon [emissions to water, river]: 1.7357e-5 kg; lognormal SD95 8.1773
  (same comment as for Thallium)
- Benzene, hexachloro- [emissions to air, high. pop.]: 8.38e-11 kg; lognormal SD95 1.5
  (same comment as for Benzene, pentachloro-)
- BOD5, Biological Oxygen Demand [emissions to water, river]: 0.00014865 kg; lognormal SD95 4.7734
  (same comment as for Thallium)
- Antimony [emissions to water, groundwater, long-term]: 5.4989e-6 kg; lognormal SD95 17.218
  (same comment as for Barium)
- Toluene [emissions to air, high. pop.]: 8.0155e-8 kg; lognormal SD95 1.5
  (same comment as for Benzene, pentachloro-)
- NMVOC, non-methane volatile organic compounds, unspecified origin [emissions to air, high. pop.]: 1.8239e-6 kg; lognormal SD95 1.5
  (same comment as for Benzene, pentachloro-)
- Silicon [emissions to water, groundwater, long-term]: 0.0040248 kg; lognormal SD95 117.68
  (same comment as for Barium)
- Chromium VI [emissions to water, groundwater, long-term]: 8.7946e-7 kg; lognormal SD95 61.466
  (same comment as for Barium)
- Bromine [emissions to water, groundwater, long-term]: 3.492e-12 kg; lognormal SD95 8.2743
  (same comment as for Barium)
- Tin [emissions to water, river]: 2.5336e-10 kg; lognormal SD95 22.234
  (same comment as for Thallium)
- Methane, fossil [emissions to air, high. pop.]: 6.0116e-7 kg; lognormal SD95 1.5
  (same comment as for Benzene, pentachloro-)
- Ammonia [emissions to air, high. pop.]: 3.1498e-7 kg; lognormal SD95 2.2455
  Nitrogen species emitted to air after DeNOx stage. uncertainty calculated from uncertainty in average N-emissions and uncertainty in the share of thermal NOx and the uncertainty in nitrogen content in *this* waste.
- Beryllium [emissions to water, groundwater, long-term]: 9.7938e-6 kg; lognormal SD95 9.5295
  (same comment as for Barium)
- Strontium [emissions to water, river]: 4.2758e-7 kg; lognormal SD95 10.852
  (same comment as for Thallium)
- Phosphate [emissions to water, river]: 2.6473e-8 kg; lognormal SD95 16.168
  (same comment as for Thallium)
- Tin [emissions to water, groundwater, long-term]: 1.5752e-5 kg; lognormal SD95 9.0007
  (same comment as for Barium)
- Iron [emissions to water, groundwater, long-term]: 0.027529 kg; lognormal SD95 2.9286
  (same comment as for Barium)
- Heat, waste [emissions to air, high. pop.]: 2.3123 MJ; lognormal SD95 2.1805
  Waste heat generated from heating value of this waste plus any electricity required to process it. uncertainty is calculated from uncertainties in waste composition and uncertainties in energy efficiency and the uncertainty in internal energy demand
- Scandium [emissions to water, groundwater, long-term]: 4.6508e-6 kg; lognormal SD95 10.311
  (same comment as for Barium)
- Chromium VI [emissions to water, river]: 3.8433e-9 kg; lognormal SD95 17.45
  (same comment as for Thallium)
- Cobalt [emissions to water, river]: 2.0451e-8 kg; lognormal SD95 14.881
  (same comment as for Thallium)
- COD, Chemical Oxygen Demand [emissions to water, groundwater, long-term]: 0.1259 kg; lognormal SD95 2.007
  (same comment as for Barium)
- Selenium [emissions to water, groundwater, long-term]: 1.3443e-5 kg; lognormal SD95 9.1378
  (same comment as for Barium)
- Benzo(a)pyrene [emissions to air, high. pop.]: 8.9185e-13 kg; lognormal SD95 3
  (same comment as for Benzene, pentachloro-)
- Sodium [emissions to water, river]: 0.0010764 kg; lognormal SD95 4.0296
  (same comment as for Thallium)
- Barium [emissions to water, river]: 1.5021e-7 kg; lognormal SD95 12.151
  (same comment as for Thallium)
- Cadmium [emissions to water, river]: 2.8246e-9 kg; lognormal SD95 17.974
  (same comment as for Thallium)
- Molybdenum [emissions to water, river]: 3.0984e-6 kg; lognormal SD95 9.021
  (same comment as for Thallium)
- Zinc [emissions to water, river]: 7.9182e-9 kg; lognormal SD95 16.304
  (same comment as for Thallium)
- Antimony [emissions to water, river]: 2.5625e-8 kg; lognormal SD95 14.578
  (same comment as for Thallium)
- TOC, Total Organic Carbon [emissions to water, groundwater, long-term]: 0.04982 kg; lognormal SD95 2.007
  (same comment as for Barium)
- Arsenic [emissions to water, river]: 6.9195e-8 kg; lognormal SD95 13.212
  (same comment as for Thallium)
- Phosphate [emissions to water, groundwater, long-term]: 1.5858e-5 kg; lognormal SD95 107.17
  (same comment as for Barium)
- Bromine [emissions to water, river]: 3.88e-5 kg; lognormal SD95 8.0542
  (same comment as for Thallium)
- DOC, Dissolved Organic Carbon [emissions to water, river]: 0.00017983 kg; lognormal SD95 4.7734
  (same comment as for Thallium)
- Scandium [emissions to water, river]: 2.9916e-7 kg; lognormal SD95 11.847
  (same comment as for Thallium)
- Vanadium [emissions to water, river]: 1.5061e-7 kg; lognormal SD95 12.144
  (same comment as for Thallium)
- Heat, waste [emissions to water, river]: 0.52868 MJ; lognormal SD95 2.1805
  (same comment as for Heat, waste)
- Strontium [emissions to water, groundwater, long-term]: 0.00067857 kg; lognormal SD95 5.3827
  (same comment as for Barium)
- Nitrogen oxides [emissions to air, high. pop.]: 9.9744e-5 kg; lognormal SD95 2.2455
  sum of fuel-Nox and thermal-NOx emitted to air after DeNOx stage. uncertainty calculated from uncertainty in average N-emissions and uncertainty in the share of thermal NOx and the uncertainty in nitrogen content in *this* waste.
- Calcium [emissions to water, river]: 0.00085522 kg; lognormal SD95 4.3017
  (same comment as for Thallium)
- Vanadium [emissions to water, groundwater, long-term]: 3.3182e-5 kg; lognormal SD95 18.796
  (same comment as for Barium)
- Boron [emissions to water, river]: 1.6454e-5 kg; lognormal SD95 7.0625
  (same comment as for Thallium)
- Molybdenum [emissions to water, groundwater, long-term]: 6.3401e-5 kg; lognormal SD95 7.5118
  (same comment as for Barium)
- Nickel [emissions to water, groundwater, long-term]: 0.00014541 kg; lognormal SD95 6.7538
  (same comment as for Barium)
- Copper [emissions to water, river]: 2.0311e-9 kg; lognormal SD95 18.509
  (same comment as for Thallium)
- Titanium [emissions to water, groundwater, long-term]: 0.00029393 kg; lognormal SD95 7.5582
  (same comment as for Barium)
- Benzene [emissions to air, high. pop.]: 4.0078e-8 kg; lognormal SD95 1.5
  (same comment as for Benzene, pentachloro-)
- Titanium [emissions to water, river]: 4.7279e-9 kg; lognormal SD95 17.108
  (same comment as for Thallium)
- Iodide [emissions to water, river]: 1.64e-5 kg; lognormal SD95 8.9629
  (same comment as for Thallium)
- Magnesium [emissions to water, river]: 0.0001117 kg; lognormal SD95 5.4982
  (same comment as for Thallium)
- Sodium [emissions to water, groundwater, long-term]: 0.0077436 kg; lognormal SD95 3.4506
  (same comment as for Barium)
- Carbon monoxide, fossil [emissions to air, high. pop.]: 6.8127e-5 kg; lognormal SD95 5
  (same comment as for Benzene, pentachloro-)
- Magnesium [emissions to water, groundwater, long-term]: 0.029288 kg; lognormal SD95 2.6837
  (same comment as for Barium)
- Particulates, < 2.5 um [emissions to air, high. pop.]: 4.7849e-6 kg; lognormal SD95 3
  (same comment as for Benzene, pentachloro-)
- Boron [emissions to water, groundwater, long-term]: 0.0017473 kg; lognormal SD95 4.5257
  (same comment as for Barium)
- Thallium [emissions to water, groundwater, long-term]: 1.8988e-7 kg; lognormal SD95 14.444
  (same comment as for Barium)
- Copper [emissions to water, groundwater, long-term]: 5.8498e-5 kg; lognormal SD95 7.638
  (same comment as for Barium)
- Dioxin, 2,3,7,8 Tetrachlorodibenzo-p- [emissions to air, high. pop.]: 8.015e-14 kg; lognormal SD95 3
  (same comment as for Benzene, pentachloro-)
- Beryllium [emissions to water, river]: 6.1712e-9 kg; lognormal SD95 16.724
  (same comment as for Thallium)

## Sampling procedure
fully waste-specific calculation based on literature data for average MSWI operation performance

## Extrapolations
Typical elemental transfer coefficients from current studies for modern MSWI, completed with data from coal power plants and estimates, adapted for inert/burnable waste.

## Uncertainty adjustments
uncertainty of waste input composition data derived from generic formula GSD(c) = N*ln(c)+1

## Sources
- Doka G., 2013, 2013 - Updates LCI waste treatment services - Doka, -, Doka LCA, Zuerich, CH
Doka G. (2013) Updates to Life Cycle Inventories of Waste Treatment Services - part II: waste incineration. Doka LCA. Zurich.
Type: Separate publication
Source: Report to document the 2013 changes to the MSWI incinerator model and datasets (URL: http://www.doka.ch/ecoinventMSWIupdateLCI2013.pdf). To be read with the ecoinvent Nr 13 report (Doka 2009, Life Cycle Inventories of Waste Treatment Services) for ecoinvent v2.2.
First author: Doka G.
Year: 2013
Place of publication: Zurich
Publisher: Doka LCA
Original title: Updates to Life Cycle Inventories of Waste Treatment Services - part II: waste incineration

## Validation
Proof reading validation: Passed.; Other validation: none;
