# xxx Flat plate collector, at plant

Dataset: EcoSpold 1, unit process, infrastructure
Functional unit: 1 m2
Category: energy, obsolete / others, obsolete
Geography: CH
Production volume: About 30'000m2 of flat plate collectors were sold in CH in 2001.
Generated by: Niels Jungbluth
accessRestrictedTo: 0
copyright: true

## General comment
The flat plate collector has selective black chrome coating on copper made in the US. ;

## Included processes
Production and disposal of a flat plate collector in Switzerland. Including materials, water and energy use of production.

## Technology
Assembly of a flat plate collector. The collector has a copper sheet coated by black chrome coating.

## Time period
Material data have been investigated for a collector produced in 2002. Data for energy uses during production have been investigated for 2001.

## Reference product
- xxx Flat plate collector, at plant [CH]: 1 m2
  SWITZERLAND

## Inputs from technosphere
- Disposal, building, glass sheet, to sorting plant [CH]: 9.12 kg; lognormal SD95 1.3
  (3,5,1,1,1,5); Estimation
- Transport, transoceanic freight ship [OCE]: 95.5 tkm; lognormal SD95 2
  (3,4,3,1,1,3); Glass and copper from US
- Disposal, packaging cardboard, 19.6% water, to municipal incineration [CH]: 3.68 kg; lognormal SD95 1.3
  (3,5,1,1,1,5); Estimation
- Treatment, heat carrier liquid, 40% C3H8O2, to wastewater treatment, class 2 [CH]: 0.00239 m3; lognormal SD95 1.3
  (2,5,1,1,1,5); Questionnaire
- Transport, freight, rail [RER]: 16.8 tkm; lognormal SD95 2.1
  (4,5,na,na,na,na); Standard distance 600km
- Soft solder, Sn97Cu3, at plant [RER]: 0.0588 kg; lognormal SD95 1.3
  (2,5,1,1,1,5); Questionnaire
- Solar collector factory [RER]: 2e-7 p; lognormal SD95 3.1
  (2,5,1,1,3,5); Questionnaire
- Water, completely softened, at plant [RER]: 1.38 kg; lognormal SD95 1.3
  (2,5,1,1,1,5); Questionnaire, extrapolation for life time 10a
- Transport, freight, lorry, 16t-32t gross weight, fleet average [CH]: 1.4 tkm; lognormal SD95 2.1
  (4,5,na,na,na,na); Standard distance 50km
- Tap water, at user [RER]: 9.4 kg; lognormal SD95 1.4
  (2,5,1,1,3,5); Questionnaire
- Electricity, medium voltage, at grid [CH]: 1.16 kWh; lognormal SD95 1.4
  (2,5,1,1,3,5); Questionnaire
- Propylene glycol, liquid, at plant [RER]: 1.01 kg; lognormal SD95 1.3
  (2,5,1,1,1,5); Questionnaire, extrapolation for life time 10a
- Aluminium, production mix, wrought alloy, at plant [RER]: 3.93 kg; lognormal SD95 1.3
  (2,5,1,1,1,5); Questionnaire
- Disposal, building, mineral wool, to sorting plant [CH]: 2.43 kg; lognormal SD95 1.3
  (3,5,1,1,1,5); Estimation
- Synthetic rubber, at plant [RER]: 0.732 kg; lognormal SD95 1.3
  (2,5,1,1,1,5); Questionnaire
- Rock wool, packed, at plant [CH]: 2.43 kg; lognormal SD95 1.3
  (2,5,1,1,1,5); Questionnaire
- Treatment, sewage, from residence, to wastewater treatment, class 2 [CH]: 0.0094 m3; lognormal SD95 1.3
  (2,5,1,1,1,5); Questionnaire
- Chromium steel 18/8, at plant [RER]: 4.14 kg; lognormal SD95 1.3
  (2,5,1,1,1,5); Questionnaire, fixing parts
- Brazing solder, cadmium free, at plant [RER]: 0.00368 kg; lognormal SD95 1.3
  (2,5,1,1,1,5); Questionnaire
- Selective coating, copper sheet, black chrome [RER]: 1 m2; lognormal SD95 1.3
  (2,5,1,1,1,5); Questionnaire
- Copper, at regional storage [RER]: 2.82 kg; lognormal SD95 1.3
  (2,5,1,1,1,5); Questionnaire
- Corrugated board, mixed fibre, single wall, at plant [CH]: 3.68 kg; lognormal SD95 1.2
  (3,4,3,1,1,3); Company information, packaging
- Silicone product, at plant [RER]: 0.0588 kg; lognormal SD95 1.3
  (2,5,1,1,1,5); Questionnaire
- Transport, freight, lorry, fleet average [RER]: 11.7 tkm; lognormal SD95 2
  (3,4,3,1,1,3); 1100km for glass from DK, 600km for copper in the US
- Disposal, plastics, mixture, 15.3% water, to municipal incineration [CH]: 0.79 kg; lognormal SD95 1.3
  (3,5,1,1,1,5); Estimation
- Sheet rolling, copper [RER]: 2.82 kg; lognormal SD95 1.3
  (2,5,1,1,1,5); Questionnaire
- Anti-reflexx coating, etching, solar glass [DK]: 1 m2; lognormal SD95 1.3
  (2,5,1,1,1,5); Questionnaire
- Solar glass, low-iron, at regional storage [RER]: 9.12 kg; lognormal SD95 1.3
  (2,5,1,1,1,5); Questionnaire

## Emissions to nature
- Heat, waste [emissions to air, high. pop.]: 4.16 MJ; lognormal SD95 1.3
  (2,5,1,1,1,5); Questionnaire

## Sampling procedure
Questionnaires.

## Sources
- Jungbluth N., 2007, 2007 - Solar collector systems - Jungbluth, Sachbilanzen von Energiesystemen. Final report No. 6 ecoinvent data v2.0, 6, Swiss Centre for LCI, ESU-services Ltd., Duebendorf, CH
Jungbluth, N. (2007) Sonnenkollektor-Anlagen. Sachbilanzen von Energiesystemen. Final report No. 6 ecoinvent data v2.0. Editors: Dones R.. Volume: 6. Swiss Centre for LCI, PSI. Dübendorf and Villigen, CH.
Type: Measurement on site
Source: CD-ROM
First author: Jungbluth, N.
Year: 2007
Name of editors: Dones R.
Title of anthology: Sachbilanzen von Energiesystemen. Final report No. 6 ecoinvent data v2.0
Place of publication: Dübendorf and Villigen, CH
Publisher: Swiss Centre for LCI, PSI
Volume No: 6

## Validation
Proof reading validation: Passed.; Other validation: none;
