# xxx Electricity, high voltage, production CENTREL, at grid

Dataset: EcoSpold 1, unit process
Functional unit: 1 kWh
Category: electricity / notMaintained
Geography: CENTREL
Time period: 2000-01 to 2000-12
Generated by: René Itten
accessRestrictedTo: 0
copyright: true

## General comment
This dataset describes the transmission of high voltage electricity.;

## Included processes
Included are the electricity production using , the transmission network and direct emissions to air (ozone and N2O). Electricity losses are accounted for.

## Geography
Data apply to public and self producers. Geographical classification according to IEA. Ozone- and NO2-emission factors are based on published measurements made in various countries. Assumptions for transmission network, losses and emissions are based on Swissdata.

## Technology
Average technology used to transmit and distribute electricity. Includes underground and overhead lines. Electricity production according to related datasets

## Time period
Statistics for 2008

## Reference product
- xxx Electricity, high voltage, production CENTREL, at grid [CENTREL]: 1 kWh
  Central european power association

## Inputs from technosphere
- Transmission network, electricity, high voltage [CH]: 6.82e-9 km; lognormal SD95 3.1614
  (3,1,4,5,3,5); based on consumption statistics
- xxx Electricity, production mix CENTREL [CENTREL]: 1.0378 kWh; lognormal SD95 1.2355
  (3,1,1,1,3,1); specific losses of network estimated based on statistics

## Emissions to nature
- Heat, waste [emissions to soil, unspecified]: 0.0068073 MJ; lognormal SD95 1.3221
  (4,1,3,1,1,5); estimations based on losses
- Dinitrogen monoxide [emissions to air, unspecified]: 5e-6 kg; lognormal SD95 1.5
  (-,-,-,-,-,-); standard deviation based on variation reported in literature
- Ozone [emissions to air, unspecified]: 4.5e-6 kg; lognormal SD95 1.5
  (-,-,-,-,-,-); standard deviation based on variation reported in literature
- Heat, waste [emissions to air, unspecified]: 0.12934 MJ; lognormal SD95 1.3221
  (4,1,3,1,1,5); estimations based on losses

## Sources
- Frischknecht R., Itten R., Flury K., 2012, 2012 - GHG emis. from Swiss elec. mixes - Frischknecht, Project reports, 401, ESU-services Ltd., Uster, CH
Itten, R., Frischknecht, R. (2012) Life Cycle Inventories of electricity mixes. Project reports. Volume: 401. ESU-services Ltd.. Uster, CH.
Type: Separate publication
First author: Itten, R.
Other authors: Frischknecht, R.
Year: 2012
Title of anthology: Project reports
Place of publication: Uster, CH
Publisher: ESU-services Ltd.
Volume No: 401

## Validation
Proof reading validation: 22.06.2012; Other validation: Z:\ESU-Docs\Projekte laufend\401 Update Strommix v3.0\EcoSpold\[401-electricity-mix-europe-RER-world-GLO-v1.0.xlsx]X-Process;
