# Clay, at mine

Dataset: EcoSpold 1, unit process
Functional unit: 1 kg
Category: minerals / unspecified
Geography: CH
Time period: 2000-01 to 2000-12
Generated by: Daniel Kellenberger
accessRestrictedTo: 0
copyright: true

## General comment
assumed thickness of clay layer in nature: 30m. No electricity consumption as transports are made by heavy diesel machines and further treatment (including water consumption) is included in "brick, at plant" or "roof tile, at plant". Different types of transformation in Europe, therefore "transformation, to unknown" has been chosen.;
Synonyms: Lehm, loam;

## Included processes
includes excavation by digger, transportation to first grinding machine, the land-use of the mining and the recultivation area

## Geography
recultivation, bauxite mine has been used as Proxy

## Technology
typical technology for swiss clay mining

## Reference product
- Clay, at mine [CH]: 1 kg
  SWITZERLAND

## Inputs from technosphere
- Diesel, burned in building machine, average [CH]: 0.0297 MJ; lognormal SD95 1.1
  (1,3,1,1,1,1);
- Recultivation, bauxite mine [GLO]: 1.67e-5 m2; lognormal SD95 2.3
  (5,2,3,1,3,1);

## Inputs from nature
- Occupation, mineral extraction site [resources, land]: 0.000167 m2a; lognormal SD95 1.8
  (5,2,3,1,1,1);
- Transformation, from unknown [resources, land]: 1.67e-5 m2; lognormal SD95 2.3
  (5,2,3,1,1,1);
- Clay [resources, in ground]: 1 kg; lognormal SD95 1.1
  (1,1,1,1,1,1);
- Transformation, to unknown [resources, land]: 1.67e-5 m2; lognormal SD95 2.3
  (5,2,3,1,1,1);
- Transformation, to mineral extraction site [resources, land]: 1.67e-5 m2; lognormal SD95 2.3
  (5,2,3,1,1,1);

## Sources
- Kellenberger D., Althaus H.-J., Jungbluth N., Kuenniger T., Lehmann M., Thalmann P., 2007, 2007 - LCI building products - Kellenberger, Final report ecoinvent data v2.0, 7, Swiss Centre for LCI, Empa - TSL, ESU-services Ltd., Bau- und Umweltchimie, Duebendorf, CH
Kellenberger D., Althaus H.-J., Jungbluth N., Künniger T. (2007) Life Cycle Inventories of Building Products. Final report ecoinvent data v2.0. Volume: 7. Swiss Centre for LCI, Empa - TSL. Dübendorf, CH.
Type: Measurement on site
Source: CD-ROM
First author: Kellenberger D.
Other authors: Althaus H.-J., Jungbluth N., Künniger T.
Year: 2007
Title of anthology: Final report ecoinvent data v2.0
Place of publication: Dübendorf, CH
Publisher: Swiss Centre for LCI, Empa - TSL
Volume No: 7

## Validation
Proof reading validation: Passed; Other validation: none;
