# Transport, passenger helicopter, twin-engine, Fahrzeug

Dataset: EcoSpold 1, unit process
Functional unit: 1 hr
Category: transport systems / helicopter
Geography: CH
Time period: 2009-01 to 2015-12
Production volume: 40500h
Share of production covered: 100 %
Generated by: Annika Messmer
accessRestrictedTo: 0
copyright: true

## General comment
A twin engine helicopter of the type Airbus Helicopters EC 135 VIP with a weight of 1490kg and a life time of 10000 flight hours is assumed. The average flight duration is assumed to be 5min and an average of 12 LTO per hour are required. Specific cruise emission factors for a Airbus Helicopters EC 135 VIP helicopter is provided of the federal office of civil aviation (FOCCA);

## Included processes
This dataset describes the demand of helicopter, demand of LTOs, energy requirements and emissions of one hour helicopter flight.

## Technology
Data is for an average Swiss helicopter for freight transport (6500kg) using kerosene

## Time period
Time of publications

## Reference product
- Transport, passenger helicopter, twin-engine, Fahrzeug [CH]: 1 hr
  SWITZERLAND

## Inputs from technosphere
- Aircraft, medium haul [RER]: 2.5648e-6 p; lognormal SD95 4.2474
  (5,5,5,5,5,5,BU:3); extrapolated using a mediumhaul aircraft, weight of twin engine helicopter 1490.0 kg and weight of a single engin helicopter 1280.0kg. For the effort of the maintenence a surcharge of 5% of the production is added.; swisshelicopter.ch, last visit 17.12.2015"

## Sampling procedure
Statistics

## Extrapolations
helicopter input is extrapolated by a medium haul aircraft.

## Sources
- Messmer A., Frischknecht R., 2016, 2016 - LCI air transport services - Messmer, Project report, 544, treeze Ltd., Uster, CH
Messmer A., Frischknecht R. (2015) Life cycle inventories of air transport services. Project report. Volume: 544. treeze Ltd.. Uster, CH.
Type: Separate publication
Source: Report
First author: Messmer A.
Other authors: Frischknecht R.
Year: 2015
Title of anthology: Project report
Place of publication: Uster, CH
Publisher: treeze Ltd.
Volume No: 544

## Validation
Proof reading validation: 04.04.2017; Other validation: \\SRV01\ESU-Docs\Projektablage\544 Aktualisierung mobitool\Helikoptertransport\Ecospold\[544_helicopter-transport_EIV2_v.04.xlsx]X-Process;
