# Ethanol, 99.7% in H2O, from biomass, at distillation

Dataset: EcoSpold 1, unit process
Functional unit: 1 kg
Category: fuels / biofuels\ethanol
Geography: CN
Time period: 2000-01 to 2000-12
Production volume: Production volume of ethanol for use as a fuel was 1'500 Ml in 2004 in CN
Share of production covered: 0 %
Generated by: Edgard Gnansounou
accessRestrictedTo: 0
copyright: true

## General comment
Inventory refers to the production of 1 kg anhydrous ethanol 99.7% (dry basis, i.e. 1.003 kg anhydrous ethanol 99.7% wet basis). Dehydration is carried out by molecular sieve technology. Ethanol is produced from sweet sorghum, in the average CN context.;
CAS number: 000064-17-5;
Formula: C2H6O ;
Synonyms: Alkohol, alcohol dehydrated, algrain, Anhydrol, cologne spirit, cologne spirits (alcohol), Denatured alcohol, Ethyl alcohol, Ethanol, ethanol 200 proof, Ethanol absolute, ethyl hydrate, ethyl hydroxide, fermentation alcohol, grain alcohol, bioethanol, bio-ethanol;

## Included processes
This dataset includes the dehydration of hydrated ethanol (95%) to anhydrous ethanol (99.7%). Hydrated ethanol input is sorghum-based ethanol, produced in the CN context. Treatment of waste streams is included.

## Geography
Data is from the etha+ project (Alcosuisse, CH) and the ASIATIC project (LASEN, CH), adapted to CN context

## Technology
Dehydration is done by molecular sieve technology.

## Time period
Data from 1992 to 2005, current technology

## Reference product
- Ethanol, 99.7% in H2O, from biomass, at distillation [CN]: 1 kg
  CHINA

## Inputs from technosphere
- Disposal, used mineral oil, 10% water, to hazardous waste incineration [CH]: 4.4156e-6 kg; lognormal SD95 1.3451
  (4,4,2,5,1,5); Adapted from the dataset 'wood chips, in cogen 6400kWth, wood', according to actual water, carbon and energy content of the fuel (pressed sorghum bagasse)
- Lubricating oil, at plant [RER]: 4.4156e-6 kg; lognormal SD95 1.3279
  (2,4,1,2,3,5); Compilation of data from sugarcane and sorghum milling, industrial data
- Cogen unit 6400kWth, wood burning, building [CH]: 3.2444e-10 p; lognormal SD95 3.117
  (same comment as for Disposal, used mineral oil, 10% water, to hazardous waste incineration)
- Water, decarbonised, at plant [RER]: 0.0010595 kg; lognormal SD95 1.3451
  (same comment as for Disposal, used mineral oil, 10% water, to hazardous waste incineration)
- Disposal, wood ash mixture, pure, 0% water, to municipal incineration [CH]: 0.0001777 kg; lognormal SD95 1.3451
  (same comment as for Disposal, used mineral oil, 10% water, to hazardous waste incineration)
- Chlorine, liquid, production mix, at plant [RER]: 4.4156e-7 kg; lognormal SD95 1.3451
  (same comment as for Disposal, used mineral oil, 10% water, to hazardous waste incineration)
- Disposal, municipal solid waste, 22.9% water, to municipal incineration [CH]: 4.4156e-6 kg; lognormal SD95 1.3451
  (same comment as for Disposal, used mineral oil, 10% water, to hazardous waste incineration)
- Treatment, sewage, from residence, to wastewater treatment, class 2 [CH]: 4.9623e-5 m3; lognormal SD95 1.3451
  (4,4,2,5,1,5); Calculation, according to mass balance
- Ammonia, liquid, at regional storehouse [RER]: 1.1039e-8 kg; lognormal SD95 1.3451
  (same comment as for Disposal, used mineral oil, 10% water, to hazardous waste incineration)
- Chemicals organic, at plant [GLO]: 7.7272e-6 kg; lognormal SD95 1.3451
  (same comment as for Disposal, used mineral oil, 10% water, to hazardous waste incineration)
- Bagasse, from sweet sorghum, at distillery [CN]: 0.13129 kg; lognormal SD95 1.2435
  (2,4,1,3,1,5); Calculation, according to energy requirements for dehydration
- Sodium chloride, powder, at plant [RER]: 5.5194e-6 kg; lognormal SD95 1.3451
  (same comment as for Disposal, used mineral oil, 10% water, to hazardous waste incineration)
- Ethanol fermentation plant [CH]: 5.67e-11 p; lognormal SD95 3.0616
  (2,4,1,3,1,5); Calculation, according to feed capacity and lifetime of the plant
- Cogen unit 6400kWth, wood burning, common components for heat+electricity [CH]: 1.2991e-9 p; lognormal SD95 3.117
  (same comment as for Disposal, used mineral oil, 10% water, to hazardous waste incineration)
- Cogen unit 6400kWth, wood burning, components for electricity only [CH]: 1.2991e-9 p; lognormal SD95 3.117
  (same comment as for Disposal, used mineral oil, 10% water, to hazardous waste incineration)
- Ethanol, 95% in H2O, from sweet sorghum, at distillery [CN]: 1 kg; lognormal SD95 1.2435
  (2,4,1,3,1,5); Calculation, according to ethanol content of input and ouput
- Disposal, wood ash mixture, pure, 0% water, to sanitary landfill [CH]: 0.00035674 kg; lognormal SD95 1.3451
  (same comment as for Disposal, used mineral oil, 10% water, to hazardous waste incineration)
- Disposal, wood ash mixture, pure, 0% water, to landfarming [CH]: 0.0001777 kg; lognormal SD95 1.3451
  (same comment as for Disposal, used mineral oil, 10% water, to hazardous waste incineration)
- Treatment, sewage, to wastewater treatment, class 2 [CH]: 1.0595e-6 m3; lognormal SD95 1.3451
  (same comment as for Disposal, used mineral oil, 10% water, to hazardous waste incineration)

## Emissions to nature
- Cadmium [emissions to air, high. pop.]: 9.4234e-10 kg; lognormal SD95 5.1335
  (same comment as for Disposal, used mineral oil, 10% water, to hazardous waste incineration)
- Ammonia [emissions to air, high. pop.]: 2.3424e-6 kg; lognormal SD95 1.4115
  (same comment as for Disposal, used mineral oil, 10% water, to hazardous waste incineration)
- Benzene, hexachloro- [emissions to air, high. pop.]: 8.692e-15 kg; lognormal SD95 3.117
  (same comment as for Disposal, used mineral oil, 10% water, to hazardous waste incineration)
- Zinc [emissions to air, high. pop.]: 4.0386e-7 kg; lognormal SD95 5.1335
  (same comment as for Disposal, used mineral oil, 10% water, to hazardous waste incineration)
- Phosphorus [emissions to air, high. pop.]: 4.0386e-7 kg; lognormal SD95 1.6486
  (same comment as for Disposal, used mineral oil, 10% water, to hazardous waste incineration)
- Hydrocarbons, aliphatic, alkanes, unspecified [emissions to air, high. pop.]: 1.0986e-6 kg; lognormal SD95 1.6486
  (same comment as for Disposal, used mineral oil, 10% water, to hazardous waste incineration)
- Fluorine [emissions to air, high. pop.]: 6.731e-8 kg; lognormal SD95 1.6486
  (same comment as for Disposal, used mineral oil, 10% water, to hazardous waste incineration)
- Particulates, < 2.5 um [emissions to air, high. pop.]: 5.4204e-5 kg; lognormal SD95 3.117
  (same comment as for Disposal, used mineral oil, 10% water, to hazardous waste incineration)
- Calcium [emissions to air, high. pop.]: 7.8753e-6 kg; lognormal SD95 5.1335
  (same comment as for Disposal, used mineral oil, 10% water, to hazardous waste incineration)
- NMVOC, non-methane volatile organic compounds, unspecified origin [emissions to air, high. pop.]: 7.3641e-7 kg; lognormal SD95 1.6486
  (same comment as for Disposal, used mineral oil, 10% water, to hazardous waste incineration)
- Phenol, pentachloro- [emissions to air, high. pop.]: 9.7785e-12 kg; lognormal SD95 1.6486
  (same comment as for Disposal, used mineral oil, 10% water, to hazardous waste incineration)
- Potassium [emissions to air, high. pop.]: 3.1501e-5 kg; lognormal SD95 5.1335
  (same comment as for Disposal, used mineral oil, 10% water, to hazardous waste incineration)
- Methane, biogenic [emissions to air, high. pop.]: 5.2394e-7 kg; lognormal SD95 1.6486
  (same comment as for Disposal, used mineral oil, 10% water, to hazardous waste incineration)
- Copper [emissions to air, high. pop.]: 2.9617e-8 kg; lognormal SD95 5.1335
  (same comment as for Disposal, used mineral oil, 10% water, to hazardous waste incineration)
- Formaldehyde [emissions to air, high. pop.]: 1.5694e-7 kg; lognormal SD95 1.6486
  (same comment as for Disposal, used mineral oil, 10% water, to hazardous waste incineration)
- Magnesium [emissions to air, high. pop.]: 4.8598e-7 kg; lognormal SD95 5.1335
  (same comment as for Disposal, used mineral oil, 10% water, to hazardous waste incineration)
- Dinitrogen monoxide [emissions to air, high. pop.]: 3.0963e-6 kg; lognormal SD95 1.6486
  (same comment as for Disposal, used mineral oil, 10% water, to hazardous waste incineration)
- Mercury [emissions to air, high. pop.]: 4.0386e-10 kg; lognormal SD95 5.1335
  (same comment as for Disposal, used mineral oil, 10% water, to hazardous waste incineration)
- Heat, waste [emissions to air, high. pop.]: 1.7838 MJ; lognormal SD95 1.3117
  (2,3,1,1,3,5); ecoinvent guidelines, calculation from electricity consumption and energy balance
- Dioxin, 2,3,7,8 Tetrachlorodibenzo-p- [emissions to air, high. pop.]: 3.7424e-14 kg; lognormal SD95 3.117
  (same comment as for Disposal, used mineral oil, 10% water, to hazardous waste incineration)
- m-Xylene [emissions to air, high. pop.]: 1.4487e-7 kg; lognormal SD95 1.6486
  (same comment as for Disposal, used mineral oil, 10% water, to hazardous waste incineration)
- Benzo(a)pyrene [emissions to air, high. pop.]: 6.0361e-10 kg; lognormal SD95 3.117
  (same comment as for Disposal, used mineral oil, 10% water, to hazardous waste incineration)
- PAH, polycyclic aromatic hydrocarbons [emissions to air, high. pop.]: 1.3279e-8 kg; lognormal SD95 3.117
  (same comment as for Disposal, used mineral oil, 10% water, to hazardous waste incineration)
- Chromium VI [emissions to air, high. pop.]: 5.3848e-11 kg; lognormal SD95 5.1335
  (same comment as for Disposal, used mineral oil, 10% water, to hazardous waste incineration)
- Nickel [emissions to air, high. pop.]: 8.0772e-9 kg; lognormal SD95 5.1335
  (same comment as for Disposal, used mineral oil, 10% water, to hazardous waste incineration)
- Carbon dioxide, biogenic [emissions to air, high. pop.]: 0.14971 kg; lognormal SD95 1.05
  (1,1,1,1,1,1); Calculation, to close carbon balance (incl. carbon from the combustion of bagasse)
- Hydrocarbons, aliphatic, unsaturated [emissions to air, high. pop.]: 3.7424e-6 kg; lognormal SD95 1.6486
  (same comment as for Disposal, used mineral oil, 10% water, to hazardous waste incineration)
- Acetaldehyde [emissions to air, high. pop.]: 8.2119e-8 kg; lognormal SD95 1.6486
  (same comment as for Disposal, used mineral oil, 10% water, to hazardous waste incineration)
- Sodium [emissions to air, high. pop.]: 1.7501e-6 kg; lognormal SD95 5.1335
  (same comment as for Disposal, used mineral oil, 10% water, to hazardous waste incineration)
- Chlorine [emissions to air, high. pop.]: 2.4232e-7 kg; lognormal SD95 1.6486
  (same comment as for Disposal, used mineral oil, 10% water, to hazardous waste incineration)
- Benzene [emissions to air, high. pop.]: 1.0986e-6 kg; lognormal SD95 1.6486
  (same comment as for Disposal, used mineral oil, 10% water, to hazardous waste incineration)
- Lead [emissions to air, high. pop.]: 3.3521e-8 kg; lognormal SD95 5.1335
  (same comment as for Disposal, used mineral oil, 10% water, to hazardous waste incineration)
- Toluene [emissions to air, high. pop.]: 3.6217e-7 kg; lognormal SD95 1.6486
  (same comment as for Disposal, used mineral oil, 10% water, to hazardous waste incineration)
- Manganese [emissions to air, high. pop.]: 2.302e-7 kg; lognormal SD95 5.1335
  (same comment as for Disposal, used mineral oil, 10% water, to hazardous waste incineration)
- Benzene, ethyl- [emissions to air, high. pop.]: 3.6217e-8 kg; lognormal SD95 1.6486
  (same comment as for Disposal, used mineral oil, 10% water, to hazardous waste incineration)
- Nitrogen oxides [emissions to air, high. pop.]: 0.00011847 kg; lognormal SD95 1.6486
  (same comment as for Disposal, used mineral oil, 10% water, to hazardous waste incineration)
- Arsenic [emissions to air, high. pop.]: 1.3462e-9 kg; lognormal SD95 5.1335
  (same comment as for Disposal, used mineral oil, 10% water, to hazardous waste incineration)
- Carbon monoxide, biogenic [emissions to air, high. pop.]: 8.4506e-6 kg; lognormal SD95 5.1335
  (same comment as for Disposal, used mineral oil, 10% water, to hazardous waste incineration)
- Chromium [emissions to air, high. pop.]: 5.331e-9 kg; lognormal SD95 5.1335
  (same comment as for Disposal, used mineral oil, 10% water, to hazardous waste incineration)
- Bromine [emissions to air, high. pop.]: 8.0772e-8 kg; lognormal SD95 5.1335
  (same comment as for Disposal, used mineral oil, 10% water, to hazardous waste incineration)
- Sulfur dioxide [emissions to air, high. pop.]: 3.3521e-6 kg; lognormal SD95 1.3451
  (same comment as for Disposal, used mineral oil, 10% water, to hazardous waste incineration)

## Sampling procedure
Data is from the etha+ project (Alcosuisse, CH) and the ASIATIC project (LASEN, CH), technology by French ethanol plant supplier, modelling by ENERS (CH)

## Extrapolations
Direct emissions (resulting from the combustion of sorghum bagasse) are based on the the combustion of wood chips (without emission control), according to the corresponding dry matter content, carbon content and energy content.

## Sources
- Jungbluth N., Chudacoff M., Dauriat A., Dinkel F., Doka G., Faist Emmenegger M., Gnansounou E., Kljun N., Spielmann M., Stettler C., Sutter J., 2007, 2007 - LCI bioenergy - Jungbluth, Final report ecoinvent data v2.0, 17, Swiss Centre for LCI, ESU-services Ltd., Duebendorf and Uster, CH
Jungbluth N., Chudacoff M., Dauriat A., Dinkel F., Doka G., Faist Emmenegger M., Gnansounou E., Kljun N., Spielmann M., Stettler C., Sutter J. (2007) Life Cycle Inventories of Bioenergy. Final report ecoinvent data v2.0. Volume: 17. Swiss Centre for LCI, ESU. Duebendorf and Uster, CH.
Type: Measurement on site
Source: CD-ROM
First author: Jungbluth N.
Other authors: Chudacoff M., Dauriat A., Dinkel F., Doka G., Faist Emmenegger M., Gnansounou E., Kljun N., Spielmann M., Stettler C., Sutter J.
Year: 2007
Title of anthology: Final report ecoinvent data v2.0
Place of publication: Duebendorf and Uster, CH
Publisher: Swiss Centre for LCI, ESU
Volume No: 17

## Validation
Proof reading validation: Passed.; Other validation: none;
