# Disposal, desktop computer, to WEEE treatment

Dataset: EcoSpold 1, unit process
Functional unit: 1 p
Category: electronics waste / unspecified
Geography: CH
Time period: 2023-01 to 2029-12
Production volume: 82.5 kt total WEEE
Share of production covered: 100 %
Generated by: Roland Hischier
accessRestrictedTo: 0
copyright: true

## General comment
mix process of the two disposal ways - the manual dismantling and the mechanical treatment (in a shredder). Update 2023: The average mass of 8.8 kg is used as in the dataset for desktop computer, where the split to manual and mechanical treatment is assumed to be the same as in the original dataset. Another change is that the batteries flows are now removed since desktop computers do not contain lithium ion batteries.; Geography: data of the situation in Switzerland;

## Included processes
This dataset represents the statistical mixture of the two different disposal ways for WEEE devices in Switzerland.

## Geography
data of the situation in Switzerland

## Technology
current mix of manual and mechanical treatment in Switzerland

## Reference product
- Disposal, desktop computer, to WEEE treatment [CH]: 1 p
  SWITZERLAND

## Inputs from technosphere
- Dismantling, desktop computer, manually, at plant [CH]: 2.024 kg; lognormal SD95 1.21
  (1,1,1,1,1,5,BU:1.05); data from Swiss WEEE systems - reported in Hischier (2005)
- Dismantling, desktop computer, mechanically, at plant [CH]: 6.776 kg; lognormal SD95 1.21
  (1,1,1,1,1,5,BU:1.05); data from Swiss WEEE systems - reported in Hischier (2005)

## Sampling procedure
statistical data

## Sources
- Hischier R., Classen M., Lehmann M., Scharnhorst W., 2007, 2007 - LCI electric and electronic equipment - Hischier, Final report ecoinvent Data v2.0, 18, Swiss Centre for LCI, Empa - TSL, Duebendorf and St. Gallen, CH

## Validation
Proof reading validation: Passed, Other validation: none, Validator: Mischa Zschokke, Company: Carbotech, Country: CH
