# Sand-lime brick, at plant

Dataset: EcoSpold 1, unit process
Functional unit: 1 kg
Category: construction / bricks
Geography: DE
Time period: 2000-01 to 2000-12
Generated by: Daniel Kellenberger
accessRestrictedTo: 0
copyright: true

## General comment
The air emissions are not measured . However, air emissions should all stem from combustion processes, which are accounted for via the modules for energy requirements. A certain amount of CO2 is bound from air by the hydrated lime during the hardening process and is therefore modeled as a resource. No exact information on the composition of the wastewater is available. Thus a proxy is inventoried. The total yearly production amount of a German company is assumed to be 120'000 tons (based on the yearly production volume). The lifespan of the plant is assumed to be 50 years.;

## Included processes
includes the whole manufacturing process to produce sand-lime bricks (raw material provision, raw material mixing, forming by pressing, hardening by autoclave, packing, and storage), transports to plant, and infrastructure. No material/energy requirement for administration are included.

## Technology
The raw materials are mixed with appropriate proportions. In a reaction vessel the quicklime is hydrated to hydrated lime. Pressing the raw moulded blanks give them a certain form. In an autoclave the blanks are hardened with saturated steam at a pressure of 12 to 16 bar and a temperature of 160 to 200°C during 4 to 8 hours.

## Reference product
- Sand-lime brick, at plant [DE]: 1 kg
  GERMANY

## Inputs from technosphere
- Mine, clay [CH]: 1.67e-10 p; lognormal SD95 3.55
  (5,5,1,1,4,5);
- Tap water, at user [RER]: 0.225 kg; lognormal SD95 1.22
  (1,3,2,3,3,2);
- Sand, at mine [CH]: 0.948 kg; lognormal SD95 1.22
  (1,3,2,3,3,2);
- Quicklime, milled, packed, at plant [CH]: 0.0855 kg; lognormal SD95 1.22
  (1,3,2,3,3,2);
- Limestone, milled, packed, at plant [CH]: 0.0333 kg; lognormal SD95 1.22
  (1,3,2,3,3,2);
- Heat, light fuel oil, at industrial furnace 1MW [CH]: 0.207 MJ; lognormal SD95 1.22
  (1,3,2,3,3,2);
- Disposal, municipal solid waste, 22.9% water, to municipal incineration [CH]: 0.000125 kg; lognormal SD95 1.22
  (1,3,2,3,3,2);
- Treatment, concrete production effluent, to wastewater treatment, class 3 [CH]: 8.33e-5 m3; lognormal SD95 1.57
  (1,3,2,3,3,2);
- Transport, freight, lorry, 16t-32t gross weight, fleet average [CH]: 0.00901 tkm; lognormal SD95 2.02
  (1,2,3,1,1,3);
- Transport, freight, rail, electricity with shunting [CH]: 0.00428 tkm; lognormal SD95 2.02
  (1,2,3,1,1,3);
- Heat, natural gas, at industrial furnace 1MW [CH]: 0.148 MJ; lognormal SD95 1.22
  (1,3,2,3,3,2);
- Packing, clay products [CH]: 1 kg; lognormal SD95 1.88
  (5,5,1,1,4,5);
- Electricity, medium voltage, at grid [CH]: 0.00962 kWh; lognormal SD95 1.22
  (1,3,2,3,3,2);
- Heat, heavy fuel oil, at industrial furnace 1MW [CH]: 0.0148 MJ; lognormal SD95 1.22
  (1,3,2,3,3,2);

## Inputs from nature
- Carbon dioxide, in air [resources, in air]: 0.067 kg; lognormal SD95 1.32
  (4,2,3,1,1,5);

## Emissions to nature
- Heat, waste [emissions to air, unspecified]: 0.0346 MJ; lognormal SD95 1.22
  (1,3,2,3,3,2);

## Sampling procedure
Literature

## Extrapolations
See geography

## Sources
- Kellenberger D., Althaus H.-J., Jungbluth N., Kuenniger T., Lehmann M., Thalmann P., 2007, 2007 - LCI building products - Kellenberger, Final report ecoinvent data v2.0, 7, Swiss Centre for LCI, Empa - TSL, ESU-services Ltd., Bau- und Umweltchimie, Duebendorf, CH
Kellenberger D., Althaus H.-J., Jungbluth N., Künniger T. (2007) Life Cycle Inventories of Building Products. Final report ecoinvent data v2.0. Volume: 7. Swiss Centre for LCI, Empa - TSL. Dübendorf, CH.
Type: Measurement on site
Source: CD-ROM
First author: Kellenberger D.
Other authors: Althaus H.-J., Jungbluth N., Künniger T.
Year: 2007
Title of anthology: Final report ecoinvent data v2.0
Place of publication: Dübendorf, CH
Publisher: Swiss Centre for LCI, Empa - TSL
Volume No: 7

## Validation
Proof reading validation: passed; Other validation: none;
