# Laptop computer, at plant

Dataset: EcoSpold 1, unit process
Functional unit: 1 p
Category: electronics / devices
Geography: GLO
Time period: 2023-01 to 2029-12
Synonyms: Notebook; Lifebook
Generated by: Lugas Raka Adrianto, Maulana Permana Ajie, Didier Beloin-Saint-Pierre
accessRestrictedTo: 0
copyright: false

## General comment
This dataset can be applied to describe the production of a typical laptop computer in the last 3 years before the reference year 2010s (Intel® Celeron® M, 4 GB RAM, 500 GB HDD, 15.4 inch screen, total weight with expansion base 2.77 kg;

## Included processes
Describes the production of a laptop computer. Calculated per 1 produced laptop computer (1 unit). Included are the materials (mainly metals and plastics) with their respective manufacturing processes (e.g. sheet rolling, press moulding). Further inventoried is the infrastructure (factory), the electricity for the assembly of the laptop computer, the water consumption and industrial waste water, the required ship, rail and road transport for input materials, the packaging, plus the disposal of the laptop.

## Geography
The data is based on information by a leading international computer manufacturer. Such a laptop computer may be assembled anywhere in the world. Therefore a global dataset is justifiable.

## Technology
The production of a laptop computer includes the metal processing step sheet rolling and press moulding of the magnesium partsPlastic parts are blow moulded or extruded into required shapes. The process technology of the parts (capacitors, resistors, microchips etc.) mounted on to the printed wiring board are described in individual datasets.

## Reference product
- Laptop computer, at plant [GLO]: 1 p
  Global

## Inputs from technosphere
- Aluminium, production mix, at plant [RER]: 0.418 kg; lognormal SD95 1.34
  (1,4,3,3,3,5,BU:1.03) Data from Babbit et al 2020 and Teehan et al 2013
- Battery, Li-ion, NMC111, rechargeable, prismatic [GLO]: 0.244 kg; lognormal SD95 1.34
  (1,4,3,3,3,5,BU:1.03) Data from Babbit et al 2020 and Teehan et al 2013
- Cable, network cable, category 5, without plugs, at plant [GLO]: 0.156 m; lognormal SD95 1.34
  (1,4,3,3,3,5,BU:1.03)
- Steel, low-alloyed, at plant [RER]: 0.313 kg; lognormal SD95 1.34
  (1,4,3,3,3,5,BU:1.03) Data from Babbit et al 2020 and Teehan et al 2013
- Copper, primary, at refinery [GLO]: 0.048 kg; lognormal SD95 1.34
  (1,4,3,3,3,5,BU:1.03) Data from Babbit et al 2020 and Teehan et al 2013
- Corrugated board, recycling fibre, double wall, at plant [RER]: 0.737 kg; lognormal SD95 1.34
  (1,4,3,3,3,5,BU:1.03) Adjusted according to laptop mass
- Electricity, medium voltage, production GLO, at grid [GLO]: 5.27778 kWh; lognormal SD95 1.34
  (1,4,3,3,3,5,BU:1.03) Data from Babbit et al 2020 and Teehan et al 2013
- Extrusion, plastic pipes [RER]: 0.368 kg; lognormal SD95 1.34
  (1,4,3,3,3,5,BU:1.03) Adjusted according to laptop mass
- HDD, laptop computer, at plant [GLO]: 1 p; lognormal SD95 1.34
  (1,4,3,3,3,5,BU:1.03) Data from Babbit et al 2020 and Teehan et al 2013
- Integrated circuit, IC, memory type, at plant [GLO]: 0.021 kg; lognormal SD95 1.34
  (1,4,3,3,3,5,BU:1.03) Data from Babbit et al 2020 and Teehan et al 2013
- LED module, at plant [GLO]: 0.54 kg; lognormal SD95 1.34
  (1,4,3,3,3,5,BU:1.03) Data from Babbit et al 2020 and Teehan et al 2013
- Packaging film, LDPE, at plant [RER]: 0.044 kg; lognormal SD95 1.34
  (1,4,3,3,3,5,BU:1.03) Adjusted according to laptop mass
- Photovoltaic cell factory [DE]: 3.038e-8 p; lognormal SD95 3.12
  (1,4,3,3,3,5,BU:3.00)
- Plugs, inlet and outlet, for network cable, at plant [GLO]: 1 p; lognormal SD95 1.34
  (1,4,3,3,3,5,BU:1.03)
- Polystyrene foam slab, at plant [RER]: 0.0781 kg; lognormal SD95 1.34
  (1,4,3,3,3,5,BU:1.03) Adjusted according to laptop mass
- Polystyrene, high impact, HIPS, at plant [RER]: 0.372 kg; lognormal SD95 1.34
  (1,4,3,3,3,5,BU:1.03) Adjusted according to laptop mass
- Power adapter, for laptop, at plant [GLO]: 1 p; lognormal SD95 1.34
  (1,4,3,3,3,5,BU:1.03)
- Printed wiring board, mounted, Laptop PC mainboard, at plant [GLO]: 0.171 kg; lognormal SD95 1.34
  (1,4,3,3,3,5,BU:1.03) Total PWB = 0.337 kg, Data from Babbit et al 2020 and Teehan et al 2013
- Printed wiring board, surface mounted, unspec., solder mix, at plant [GLO]: 0.166 kg; lognormal SD95 1.34
  (same comment as for Printed wiring board, mounted, Laptop PC mainboard, at plant)
- Section bar extrusion, aluminium [RER]: 0.418 kg; lognormal SD95 1.34
  (1,4,3,3,3,5,BU:1.03) Data from Babbit et al 2020 and Teehan et al 2013
- Sheet rolling, aluminium [RER]: 0.418 kg; lognormal SD95 1.34
  (1,4,3,3,3,5,BU:1.03) Data from Babbit et al 2020 and Teehan et al 2013
- Sheet rolling, copper [RER]: 0.048 kg; lognormal SD95 1.34
  (1,4,3,3,3,5,BU:1.03) Data from Babbit et al 2020 and Teehan et al 2013
- Sheet rolling, steel [RER]: 0.313 kg; lognormal SD95 1.34
  (1,4,3,3,3,5,BU:1.03) Data from Babbit et al 2020 and Teehan et al 2013
- Tap water, at user [RER]: 1620 kg; lognormal SD95 1.34
  (1,4,3,3,3,5,BU:1.03)
- Transport, freight, rail [RER]: 0.559 tkm; lognormal SD95 2.12
  (1,4,3,3,3,5,BU:2.00) Adjusted according to laptop mass
- Transport, freight, lorry, fleet average [RER]: 0.28 tkm; lognormal SD95 2.12
  (1,4,3,3,3,5,BU:2.00) Adjusted according to laptop mass
- Transport, transoceanic freight ship [OCE]: 59.5 tkm; lognormal SD95 2.12
  (1,4,3,3,3,5,BU:2.00) Adjusted according to laptop mass
- Disposal, laptop computer, to WEEE treatment [CH]: 1 p; lognormal SD95 1.34
  (1,4,3,3,3,5,BU:1.03)
- Disposal, polyethylene, 0.4% water, to municipal incineration [CH]: 0.044 kg; lognormal SD95 1.34
  (1,4,3,3,3,5,BU:1.03)
- Disposal, polystyrene, 0.2% water, to municipal incineration [CH]: 0.089 kg; lognormal SD95 1.34
  (1,4,3,3,3,5,BU:1.03)
- Treatment, sewage, unpolluted, to wastewater treatment, class 3 [CH]: 1.62 m3; lognormal SD95 1.34
  (1,4,3,3,3,5,BU:1.03)

## Sampling procedure
Literature and own assumptions for processing and electricity consumption calculations.

## Extrapolations
see Geography and Technology

## Sources
- Raka Adrianto L., Permana Ajie M., Beloin-Saint-Pierre D., 2024, 2024 - LCI ICT sector - Raka Adrianto, Empa, St. Gallen, CH

## Validation
Proof reading validation: Passed, Other validation: none, Validator: Mischa Zschokke, Company: Carbotech, Country: CH
