# Slurry store and processing

Dataset: EcoSpold 1, unit process, infrastructure
Functional unit: 1 m3
Category: agricultural / operations\infrastructure
Geography: CH
Time period: 2000-01 to 2000-12
Production volume: Existing slurry store volume in CH in 1996: 14'847'685 m3.
Generated by: Dunja Dux
accessRestrictedTo: 0
copyright: true

## General comment
The module includes a covered, underfloor and rectangular slurry store made of concrete. Also included is a marine screw agitator. Size: 300 m3. Lifetime of the building is 40 years.;

## Included processes
The inventory takes into account the use of construction materials and building machines for construction, repair and replacement including waste disposal and the transportation of the materials to the building site. Not taken into account were direct emission of the construction, disposal of production waste and the use of resources during utilization phase.

## Technology
The data of the inventory are based on one example of a typical agricultural building.

## Reference product
- Slurry store and processing [CH]: 1 m3
  SWITZERLAND

## Inputs from technosphere
- Disposal, building, concrete, not reinforced, to final disposal [CH]: 53.6 kg; lognormal SD95 1.05
  (1,2,1,1,1,na)
- Excavation, hydraulic digger, average [CH]: 2.53 m3; lognormal SD95 1.05
  (1,2,1,1,1,na)
- Electricity, low voltage, at grid [CH]: 0.478 kWh; lognormal SD95 1.05
  (1,2,1,1,1,na)
- Concrete, normal, at plant [CH]: 0.367 m3; lognormal SD95 1.05
  (1,2,1,1,1,na)
- Chromium steel 18/8, at plant [RER]: 1.74 kg; lognormal SD95 1.05
  (1,2,1,1,1,na)
- Cast iron, at plant [RER]: 1.91 kg; lognormal SD95 1.05
  (1,2,1,1,1,na)
- Disposal, building, bulk iron (excluding reinforcement), to sorting plant [CH]: 3.75 kg; lognormal SD95 1.05
  (1,2,1,1,1,na)
- Reinforcing steel, at plant [RER]: 22.6 kg; lognormal SD95 1.05
  (1,2,1,1,1,na)
- Disposal, building, waste wood, untreated, to final disposal [CH]: 1.36 kg; lognormal SD95 1.05
  (1,2,1,1,1,na)
- Excavation, skid-steer loader [RER]: 1.49 m3; lognormal SD95 1.05
  (1,2,1,1,1,na)
- Sawnwood, production mix, softwood, dried (u=20%), planed, at sawmill [CH]: 0.00272 m3; lognormal SD95 1.05
  (1,2,1,1,1,na)
- Disposal, building, reinforced concrete, to final disposal [CH]: 829 kg; lognormal SD95 1.05
  (1,2,1,1,1,na)
- Poor concrete, at plant [CH]: 0.0244 m3; lognormal SD95 1.05
  (1,2,1,1,1,na)
- Transport, freight, lorry, 16t-32t gross weight, fleet average [CH]: 44.4 tkm; lognormal SD95 2
  (1,2,1,1,1,na)
- Zinc coating, pieces [RER]: 0.109 m2; lognormal SD95 1.05
  (1,2,1,1,1,na)

## Inputs from nature
- Occupation, construction site [resources, land]: 0.376 m2a; lognormal SD95 1.5
  (1,2,1,1,1,na)
- Transformation, to urban, discontinuously built [resources, land]: 0.376 m2; lognormal SD95 2
  (1,2,1,1,1,na)
- Transformation, from pasture, man made [resources, land]: 0.376 m2; lognormal SD95 2
  (1,2,1,1,1,na)
- Occupation, urban, discontinuously built [resources, land]: 15 m2a; lognormal SD95 1.5
  (1,2,1,1,1,na)

## Emissions to nature
- Heat, waste [emissions to air, low. pop.]: 1.72 MJ; lognormal SD95 1.05
  (1,2,1,1,1,na)

## Sampling procedure
The inventory is calculated based on a solid database of agricultural buildings.

## Sources
- Nemecek T., Kaegi T., 2007, 2007 - LCI agricultural prod. systems - Nemecek, Ecoinvent report version 2.0, 15, Swiss Centre for LCI, ART, Duebendorf and Zuerich, CH
Nemecek, T., Kägi, T., Blaser, S. (2007) Life Cycle Inventories of Agricultural Production Systems. Ecoinvent report version 2.0. Editors: 0. Volume: 15. Swiss Centre for LCI, ART. Duebendorf and Zurich, CH.
Type: Measurement on site
Source: CD-ROM
First author: Nemecek, T.
Other authors: Kägi, T., Blaser, S.
Year: 2007
Name of editors: 0
Title of anthology: Ecoinvent report version 2.0
Place of publication: Duebendorf and Zurich, CH
Publisher: Swiss Centre for LCI, ART
Volume No: 15

## Validation
Proof reading validation: Passed.; Other validation: none;
