# Disposal, hard coal ash, 0% water, to residual material landfill

Dataset: EcoSpold 1, unit process
Functional unit: 1 kg
Category: landfill / residual material landfill
Geography: SK
Time period: 2000-01 to 2000-12
Generated by: Gabor Doka
accessRestrictedTo: 0
copyright: true

## General comment
Inventoried waste contains 100% SK hard coal ash; . waste composition (wet, in ppm): H2O n.a.; O 704100; H n.a.; C n.a.; S 2598.8; N n.a.; P 461.39; B 251.99; Cl 36.068; Br 28.502; F 31.61; I 2.5825; Ag n.a.; As 20.205; Ba 1125.8; Cd 1.404; Co 25.356; Cr 118.11; Cu 60.362; Hg 0.053913; Mn 656.88; Mo 9.8214; Ni 90.617; Pb 90.925; Sb 5.1656; Se 4.145; Sn 176.44; V 164.35; Zn 109.95; Be 6.269; Sc 23.632; Sr 929.16; Ti 6773; Tl 3.2285; W 3.291; Si 116940; Fe 28772; Ca 9842.9; Al 81959; K 8916.9; Mg 29425; Na 6231.3; Share of carbon in waste that is biogenic 60.4%. ;;

## Included processes
Waste-specific short-term emissions to water from leachate. Long-term emissions from landfill to ground water.

## Geography
Technology encountered in Switzerland in 2000. Landfill includes base seal and leachate collection system.

## Technology
Swiss residual material landfill for polluted, inorganic waste. With base seal and leachate collection system. Recultivation after closure.

## Time period
Waste composition as given in literature reference, theoretical data or other source. Transfer coefficients from prospective model.

## Reference product
- Disposal, hard coal ash, 0% water, to residual material landfill [SK]: 1 kg
  SLOVAKIA (Slovak Republic)

## Inputs from technosphere
- Residual material landfill facility [CH]: 2.0833e-9 p; lognormal SD95 1
  demands per kilogram waste. uncertainty is heeded in the module
- Process-specific burdens, residual material landfill [CH]: 1 kg; lognormal SD95 1
  demands per kilogram waste. uncertainty is heeded in the module

## Emissions to nature
- Sulfate [emissions to water, river]: 0.00083645 kg; lognormal SD95 5.0055
  uncertainty is calculated from uncertainties in waste composition and transfer coefficients in residual landfill
- Mercury [emissions to water, groundwater, long-term]: 2.5448e-9 kg; lognormal SD95 61.825
  uncertainty is calculated from uncertainties in waste composition and transfer coefficients in incinerator and landfills.
- Iron [emissions to water, groundwater, long-term]: 0.0001442 kg; lognormal SD95 218.77
  (same comment as for Mercury)
- Selenium [emissions to water, river]: 1.4618e-6 kg; lognormal SD95 10.781
  (same comment as for Sulfate)
- Tungsten [emissions to water, river]: 1.1606e-6 kg; lognormal SD95 11.058
  (same comment as for Sulfate)
- Zinc [emissions to water, river]: 2.2497e-9 kg; lognormal SD95 18.33
  (same comment as for Sulfate)
- Manganese [emissions to water, river]: 9.0585e-9 kg; lognormal SD95 16.097
  (same comment as for Sulfate)
- Fluoride [emissions to water, river]: 1.713e-6 kg; lognormal SD95 9.7222
  (same comment as for Sulfate)
- Lead [emissions to water, river]: 7.8737e-10 kg; lognormal SD95 20.132
  (same comment as for Sulfate)
- Nickel [emissions to water, groundwater, long-term]: 3.2807e-5 kg; lognormal SD95 9.2161
  (same comment as for Mercury)
- Calcium [emissions to water, groundwater, long-term]: 0.00088938 kg; lognormal SD95 14.787
  (same comment as for Mercury)
- Arsenic [emissions to water, groundwater, long-term]: 2.0205e-14 kg; lognormal SD95 8.93
  (same comment as for Mercury)
- Fluoride [emissions to water, groundwater, long-term]: 2.9897e-5 kg; lognormal SD95 8.2681
  (same comment as for Mercury)
- Aluminium [emissions to water, groundwater, long-term]: 0.02433 kg; lognormal SD95 4.1607
  (same comment as for Mercury)
- Cadmium [emissions to water, river]: 1.5913e-11 kg; lognormal SD95 27.88
  (same comment as for Sulfate)
- Aluminium [emissions to water, river]: 4.0617e-5 kg; lognormal SD95 6.5551
  (same comment as for Sulfate)
- Boron [emissions to water, groundwater, long-term]: 0.00024777 kg; lognormal SD95 6.2475
  (same comment as for Mercury)
- Calcium [emissions to water, river]: 1.4848e-6 kg; lognormal SD95 9.5284
  (same comment as for Sulfate)
- Iodide [emissions to water, river]: 2.5825e-6 kg; lognormal SD95 11.078
  (same comment as for Sulfate)
- Tin [emissions to water, river]: 5.5816e-9 kg; lognormal SD95 16.852
  (same comment as for Sulfate)
- Selenium [emissions to water, groundwater, long-term]: 2.6833e-6 kg; lognormal SD95 10.564
  (same comment as for Mercury)
- Titanium [emissions to water, groundwater, long-term]: 0.0020106 kg; lognormal SD95 5.8713
  (same comment as for Mercury)
- Boron [emissions to water, river]: 1.9743e-6 kg; lognormal SD95 9.2137
  (same comment as for Sulfate)
- Vanadium [emissions to water, groundwater, long-term]: 0.00012632 kg; lognormal SD95 6.7611
  (same comment as for Mercury)
- Sulfate [emissions to water, groundwater, long-term]: 0.0069598 kg; lognormal SD95 4.3195
  (same comment as for Mercury)
- Arsenic [emissions to water, river]: 2.0205e-5 kg; lognormal SD95 8.7383
  (same comment as for Sulfate)
- Copper [emissions to water, groundwater, long-term]: 2.3236e-6 kg; lognormal SD95 46.41
  (same comment as for Mercury)
- Silicon [emissions to water, river]: 0.000263 kg; lognormal SD95 5.0548
  (same comment as for Sulfate)
- Copper [emissions to water, river]: 3.8792e-9 kg; lognormal SD95 17.442
  (same comment as for Sulfate)
- Magnesium [emissions to water, groundwater, long-term]: 0.0033434 kg; lognormal SD95 10.895
  (same comment as for Mercury)
- Barium [emissions to water, river]: 1.5524e-8 kg; lognormal SD95 15.294
  (same comment as for Sulfate)
- Magnesium [emissions to water, river]: 5.5816e-6 kg; lognormal SD95 8.259
  (same comment as for Sulfate)
- Mercury [emissions to water, river]: 4.2484e-12 kg; lognormal SD95 30.299
  (same comment as for Sulfate)
- Sodium [emissions to water, river]: 0.0023385 kg; lognormal SD95 3.8321
  (same comment as for Sulfate)
- Zinc [emissions to water, groundwater, long-term]: 1.3475e-6 kg; lognormal SD95 123.2
  (same comment as for Mercury)
- Thallium [emissions to water, river]: 1.9513e-9 kg; lognormal SD95 18.586
  (same comment as for Sulfate)
- Strontium [emissions to water, river]: 5.6159e-7 kg; lognormal SD95 10.53
  (same comment as for Sulfate)
- Titanium [emissions to water, river]: 3.3565e-6 kg; lognormal SD95 8.6117
  (same comment as for Sulfate)
- Phosphate [emissions to water, river]: 5.2764e-7 kg; lognormal SD95 11.972
  (same comment as for Sulfate)
- Molybdenum [emissions to water, groundwater, long-term]: 4.509e-8 kg; lognormal SD95 9.7268
  (same comment as for Mercury)
- Thallium [emissions to water, groundwater, long-term]: 1.1688e-6 kg; lognormal SD95 13.306
  (same comment as for Mercury)
- Iodide [emissions to water, groundwater, long-term]: 2.5825e-13 kg; lognormal SD95 11.297
  (same comment as for Mercury)
- Beryllium [emissions to water, river]: 3.789e-9 kg; lognormal SD95 17.499
  (same comment as for Sulfate)
- Antimony [emissions to water, groundwater, long-term]: 3.3439e-6 kg; lognormal SD95 10.306
  (same comment as for Mercury)
- Cadmium [emissions to water, groundwater, long-term]: 9.5317e-9 kg; lognormal SD95 262.47
  (same comment as for Mercury)
- Antimony [emissions to water, river]: 1.8217e-6 kg; lognormal SD95 10.521
  (same comment as for Sulfate)
- Silicon [emissions to water, groundwater, long-term]: 0.11668 kg; lognormal SD95 1.9275
  (same comment as for Mercury)
- Molybdenum [emissions to water, river]: 9.7763e-6 kg; lognormal SD95 9.5271
  (same comment as for Sulfate)
- Sodium [emissions to water, groundwater, long-term]: 0.0038929 kg; lognormal SD95 3.7159
  (same comment as for Mercury)
- Chloride [emissions to water, river]: 1.0316e-5 kg; lognormal SD95 8.453
  (same comment as for Sulfate)
- Vanadium [emissions to water, river]: 4.0335e-7 kg; lognormal SD95 10.964
  (same comment as for Sulfate)
- Bromine [emissions to water, groundwater, long-term]: 5.6063e-6 kg; lognormal SD95 8.5134
  (same comment as for Mercury)
- Chromium VI [emissions to water, river]: 7.0999e-6 kg; lognormal SD95 8.2056
  (same comment as for Sulfate)
- Scandium [emissions to water, river]: 3.3352e-6 kg; lognormal SD95 9.3155
  (same comment as for Sulfate)
- Beryllium [emissions to water, groundwater, long-term]: 2.2696e-6 kg; lognormal SD95 12.428
  (same comment as for Mercury)
- Iron [emissions to water, river]: 2.4074e-7 kg; lognormal SD95 11.861
  (same comment as for Sulfate)
- Cobalt [emissions to water, groundwater, long-term]: 4.335e-6 kg; lognormal SD95 16.031
  (same comment as for Mercury)
- Manganese [emissions to water, groundwater, long-term]: 5.426e-6 kg; lognormal SD95 161.54
  (same comment as for Mercury)
- Cobalt [emissions to water, river]: 7.2371e-9 kg; lognormal SD95 16.463
  (same comment as for Sulfate)
- Nickel [emissions to water, river]: 5.4769e-8 kg; lognormal SD95 13.501
  (same comment as for Sulfate)
- Potassium [emissions to water, groundwater, long-term]: 0.0064034 kg; lognormal SD95 3.4591
  (same comment as for Mercury)
- Bromine [emissions to water, river]: 2.2896e-5 kg; lognormal SD95 8.3859
  (same comment as for Sulfate)
- Tungsten [emissions to water, groundwater, long-term]: 2.1304e-6 kg; lognormal SD95 10.837
  (same comment as for Mercury)
- Lead [emissions to water, groundwater, long-term]: 4.7164e-7 kg; lognormal SD95 275.85
  (same comment as for Mercury)
- Strontium [emissions to water, groundwater, long-term]: 0.00033639 kg; lognormal SD95 6.8466
  (same comment as for Mercury)
- Potassium [emissions to water, river]: 0.0025135 kg; lognormal SD95 3.674
  (same comment as for Sulfate)
- Barium [emissions to water, groundwater, long-term]: 9.2991e-6 kg; lognormal SD95 157.12
  (same comment as for Mercury)
- Scandium [emissions to water, groundwater, long-term]: 2.0297e-5 kg; lognormal SD95 8.5818
  (same comment as for Mercury)
- Tin [emissions to water, groundwater, long-term]: 3.3433e-6 kg; lognormal SD95 80.667
  (same comment as for Mercury)
- Chromium VI [emissions to water, groundwater, long-term]: 2.2428e-5 kg; lognormal SD95 6.9991
  (same comment as for Mercury)
- Phosphate [emissions to water, groundwater, long-term]: 0.00031606 kg; lognormal SD95 9.9546
  (same comment as for Mercury)
- Chloride [emissions to water, groundwater, long-term]: 2.5752e-5 kg; lognormal SD95 8.1599
  (same comment as for Mercury)

## Sampling procedure
Landfill model based on observed leachate concentrations in literature. Extrapolated to 60'000 years heeding chemical characteristics. Initial waste composition from various literature sources.

## Uncertainty adjustments
uncertainty of waste input composition data derived from generic formula GSD(c) = N*ln(c)+1. Mean long-term emissions are the emissions until the next glacial period occurs (in 60'000a) and the landfill is eroded. Maximal long-term emissions are the complete emissions of all landfilled material (except Cr). Minimal long-term emissions are derived implicitly from the mean and maximal values assuming a lognormal distribution.

## Sources
- Doka G., 2009, 2009 - LCI waste treatment services - Doka, Final report ecoinvent data v2.1, 13, Swiss Centre for LCI, Doka LCA, Duebendorf and St. Gallen, CH
Doka G. (2009) Life Cycle Inventories of Waste Treatment Services. Final report ecoinvent data v2.1. Volume: 13. Swiss Centre for LCI, Empa - TSL. Dübendorf, CH.
Type: Measurement on site
Source: CD-ROM
First author: Doka G.
Year: 2009
Title of anthology: Final report ecoinvent data v2.1
Place of publication: Dübendorf, CH
Publisher: Swiss Centre for LCI, Empa - TSL
Volume No: 13

## Validation
Proof reading validation: passed.; Other validation: none;
