# Hard coal, burned in power plant

Dataset: EcoSpold 1, unit process
Functional unit: 1 MJ
Category: electricity by fuel / coal\power plant
Geography: PL
Time period: 2018-01 to 2020-01
Production volume: 690 PJ
Share of production covered: 95 %
Generated by: Christopher Oberschelp
accessRestrictedTo: 0
copyright: true

## General comment
The module describes the operation of an average plant in the region. The plant is used for middle load with 4000 hours of operation at full capacity per year. The plant is assumed to operate 150000 hours during its lifetime. For the assessment of main characteristics (LHV, sulphur and ash content of coal, efficiency of the plant) and criteria emissions (SOx, NOx, particles, mercury) a bottom-up approach has been used and supplemented by typical emission factors in cases of data gaps (based on EEA/EPA). CO2, CH4 and N2O emissions have been derived from fuel types (from IEA data) and IPCC emission factors. Airborne emission data has been updated for 2019, whereas other inputs and outputs come from the original dataset. The dataset consists on the collection of information about single plants. Base data on all major power plants in 2019 have been integrated, to the extent possible. The size distribution of particles has been derived from non-linear calculations based on typical ratios for different total emission amounts based on CEPMEIP. Emissions of trace substances (except for mercury) were derived from emission factors in the literature (EEA/EPA). The waste heat releases to air and water have been allocated on the basis of the assumed share of river cooled power plants and assumptions on the direct losses to air. The share of the recycled ash is country-specific. For the disposal of the remaining ash, typical country-specific compositions are taken into account in appropriate disposal modules. NA;

## Included processes
Energy conversion for energy supply. Use of fuel oil for startup is accounted for. Particle removal is included in this module. DeSOx and DeNOx are described in different modules; they are applied here according to a simplified estimate assuming an average unabated emission and the specific abated regional emission rates; SOx and NOx emissions are the reduced ones. It is assumed that 25 % of the plants are river cooled, 75 % use cooling tower (average UCTE). The water treatment is described in separate modules. The disposal of non-recycled ashes is modelled separately.

## Geography
PL in 2019

## Technology
Average installed technology.

## Reference product
- Hard coal, burned in power plant [PL]: 1 MJ

## Inputs from technosphere
- Hard coal power plant [RER]: 1.3e-12 p; lognormal SD95 3.02
  (3,3,2,3,1,3);
- Hard coal supply mix [PL]: 0.0453 kg; lognormal SD95 1.17
  own assumption, based on uncertainty on power plant data base and coal quality (mismatch between regional supply mix and input coal)
- Chlorine, liquid, production mix, at plant [RER]: 1e-5 kg; lognormal SD95 1.65
  (5,4,3,2,3,5); rough guess
- Light fuel oil, at regional storage [RER]: 1.7e-5 kg; lognormal SD95 1.2
  (3,4,3,3,1,3); typical value for hard coal plant in DE
- Water, completely softened, at plant [RER]: 0.006 kg; lognormal SD95 1.4
  (4,5,3,2,3,3); estimate based on literature
- Water, decarbonised, at plant [RER]: 0.15 kg; lognormal SD95 1.4
  (4,5,3,2,3,3); estimate based on literature
- SOx retained, in hard coal flue gas desulphurisation [RER]: 0.000732 kg; lognormal SD95 2.5649
  (5,5,5,5,5,5,BU:1.05)based on difference of a generic average unabated emission intensities (EMEP/EEA air pollutant emission inventory guidebook) and the local abated emission intensity
- NOx retained, in SCR [GLO]: 0.000129 kg; lognormal SD95 2.5649
  (same comment as for SOx retained, in hard coal flue gas desulphurisation)
- Transport, freight, rail [RER]: 0.000477 tkm; lognormal SD95 2.1
  (4,2,2,3,1,5); average distance is guesstimate
- Transport, freight, lorry, fleet average [RER]: 0.000143 tkm; lognormal SD95 2.1
  (4,2,2,3,1,5); average distance is guesstimate
- Disposal, hard coal ash, 0% water, to residual material landfill [PL]: 0.00715 kg; lognormal SD95 1.58
  (5,1,1,5,3,1); calculated from mass balance
- Disposal, residue from cooling tower, 30% water, to sanitary landfill [CH]: 5e-6 kg; lognormal SD95 1.5
  (5,1,1,1,1,1); calculated from mass balance

## Inputs from nature
- Water, cooling, unspecified natural origin/m3 [resources, in water]: 0.0035 m3; lognormal SD95 1.4
  (4,5,3,2,1,5); estimate based on literature

## Emissions to nature
- Heat, waste [emissions to water, river]: 0.154 MJ; lognormal SD95 1.07
  (2,1,1,1,1,1); calculated from energy balance
- Heat, waste [emissions to air, high. pop.]: 0.584 MJ; lognormal SD95 1.07
  (2,1,1,1,1,1); calculated from energy balance
- Antimony [emissions to air, high. pop.]: 5.71e-10 kg; lognormal SD95 5.31
  (5,1,1,1,1,5); calculated from trace element balance, input uncertain
- Arsenic [emissions to air, high. pop.]: 7.1e-9 kg; lognormal SD95 5.2623
  (1,3,5,3,1,1,BU:5)based on available emission factors (EMEP/EEA air pollutant emission inventory guidebook)
- Barium [emissions to air, high. pop.]: 2.35e-8 kg; lognormal SD95 5.31
  (5,1,1,1,1,5); calculated from trace element balance, input uncertain
- Benzene [emissions to air, high. pop.]: 2.17e-7 kg; lognormal SD95 1.65
  (3,5,3,2,1,5); based on available literature
- Benzo(a)pyrene [emissions to air, high. pop.]: 2e-13 kg; lognormal SD95 1.65
  (3,5,3,2,1,5); based on available literature
- Boron [emissions to air, high. pop.]: 2.13e-7 kg; lognormal SD95 5.31
  (5,1,1,1,1,5); calculated from trace element balance, input uncertain
- Bromine [emissions to air, high. pop.]: 5.71e-7 kg; lognormal SD95 2.28
  (5,1,1,1,1,5); calculated from trace element balance, input uncertain
- Butane [emissions to air, high. pop.]: 1.9e-8 kg; lognormal SD95 1.65
  (3,5,3,2,1,5); based on available literature
- Cadmium [emissions to air, high. pop.]: 9e-10 kg; lognormal SD95 5.2623
  (same comment as for Arsenic)
- Carbon dioxide, fossil [emissions to air, high. pop.]: 0.0946 kg; lognormal SD95 1.0714
  (2,1,1,1,1,1,BU:1.05)calculated from fuel composition and emission factors (based on International Energy Agency data and IPCC guidelines)
- Carbon monoxide, fossil [emissions to air, high. pop.]: 8.7e-6 kg; lognormal SD95 5.2585
  (1,1,5,3,1,1,BU:5)based on available emission factors (EMEP/EEA air pollutant emission inventory guidebook)
- Chromium [emissions to air, high. pop.]: 4.5e-9 kg; lognormal SD95 5.2623
  (same comment as for Arsenic)
- Chromium VI [emissions to air, high. pop.]: 2.59e-10 kg; lognormal SD95 4
  based on range of data
- Cobalt [emissions to air, high. pop.]: 1.24e-9 kg; lognormal SD95 5.31
  (5,1,1,1,1,5); calculated from trace element balance, input uncertain
- Copper [emissions to air, high. pop.]: 7.8e-9 kg; lognormal SD95 5.2623
  (same comment as for Arsenic)
- Dinitrogen monoxide [emissions to air, high. pop.]: 1.5e-6 kg; lognormal SD95 1.5044
  (2,1,1,1,1,1,BU:1.5)calculated from fuel composition and emission factors (based on International Energy Agency data and IPCC guidelines)
- Ethane [emissions to air, high. pop.]: 4.1e-8 kg; lognormal SD95 1.65
  (3,5,3,2,1,5); based on available literature
- Formaldehyde [emissions to air, high. pop.]: 5.8e-8 kg; lognormal SD95 1.65
  (3,5,3,2,1,5); based on available literature
- Hydrocarbons, aliphatic, alkanes, unspecified [emissions to air, high. pop.]: 2.19e-7 kg; lognormal SD95 1.65
  (3,5,3,2,1,5); based on available literature
- Hydrocarbons, aliphatic, unsaturated [emissions to air, high. pop.]: 2.16e-7 kg; lognormal SD95 1.65
  (3,5,3,2,1,5); based on available literature
- Hydrogen chloride [emissions to air, high. pop.]: 3.05e-5 kg; lognormal SD95 2.28
  (5,1,1,1,1,5); calculated from trace element balance, input uncertain
- Hydrogen fluoride [emissions to air, high. pop.]: 2.73e-6 kg; lognormal SD95 2.28
  (5,1,1,1,1,5); calculated from trace element balance, input uncertain
- Iodine [emissions to air, high. pop.]: 2.92e-7 kg; lognormal SD95 2.28
  (5,1,1,1,1,5); calculated from trace element balance, input uncertain
- Lead [emissions to air, high. pop.]: 7.3e-9 kg; lognormal SD95 5.2623
  (same comment as for Arsenic)
- Lead-210 [emissions to air, high. pop.]: 1.64e-5 kBq; lognormal SD95 3.27
  (5,1,1,1,1,5); calculated from trace element balance, input uncertain
- Manganese [emissions to air, high. pop.]: 1.24e-8 kg; lognormal SD95 5.31
  (5,1,1,1,1,5); calculated from trace element balance, input uncertain
- Mercury [emissions to air, high. pop.]: 6.07e-9 kg; lognormal SD95 5.2623
  (1,3,1,1,1,1,BU:5)calculated from reported emissions (European Environmental Agency)
- Methane, fossil [emissions to air, high. pop.]: 1e-5 kg; lognormal SD95 1.5044
  (same comment as for Dinitrogen monoxide)
- Molybdenum [emissions to air, high. pop.]: 7.05e-10 kg; lognormal SD95 5.31
  (5,1,1,1,1,5); calculated from trace element balance, input uncertain
- Nickel [emissions to air, high. pop.]: 4.9e-9 kg; lognormal SD95 5.2623
  (same comment as for Arsenic)
- Nitrogen oxides [emissions to air, high. pop.]: 8e-5 kg; lognormal SD95 1.5
  (1,1,1,1,1,1,BU:1.5)calculated from reported emissions (European Environmental Agency)
- PAH, polycyclic aromatic hydrocarbons [emissions to air, high. pop.]: 6.78e-11 kg; lognormal SD95 3.2292
  (1,3,5,3,1,1,BU:3)based on available emission factors (EMEP/EEA air pollutant emission inventory guidebook)
- Particulates, < 2.5 um [emissions to air, high. pop.]: 1.82e-6 kg; lognormal SD95 3
  (1,1,1,1,1,1,BU:3)calculated from reported emissions (European Environmental Agency)
- Particulates, > 10 um [emissions to air, high. pop.]: 1.91e-6 kg; lognormal SD95 1.5
  (1,1,1,1,1,1,BU:1.5)calculated from reported emissions (European Environmental Agency)
- Particulates, > 2.5 um, and < 10um [emissions to air, high. pop.]: 3.73e-6 kg; lognormal SD95 2
  (1,1,1,1,1,1,BU:2)calculated from reported emissions (European Environmental Agency)
- Pentane [emissions to air, high. pop.]: 1.47e-7 kg; lognormal SD95 1.65
  (3,5,3,2,1,5); based on available literature
- Polonium-210 [emissions to air, high. pop.]: 3e-5 kBq; lognormal SD95 3.27
  (5,1,1,1,1,5); calculated from trace element balance, input uncertain
- Potassium-40 [emissions to air, high. pop.]: 4.03e-6 kBq; lognormal SD95 3.27
  (5,1,1,1,1,5); calculated from trace element balance, input uncertain
- Propane [emissions to air, high. pop.]: 3.5e-8 kg; lognormal SD95 1.65
  (3,5,3,2,1,5); based on available literature
- Propene [emissions to air, high. pop.]: 1.6e-8 kg; lognormal SD95 1.65
  (3,5,3,2,1,5); based on available literature
- Radium-226 [emissions to air, high. pop.]: 4.23e-6 kBq; lognormal SD95 3.27
  (5,1,1,1,1,5); calculated from trace element balance, input uncertain
- Radium-228 [emissions to air, high. pop.]: 1.58e-6 kBq; lognormal SD95 3.27
  (5,1,1,1,1,5); calculated from trace element balance, input uncertain
- Radon-220 [emissions to air, high. pop.]: 0.000366 kBq; lognormal SD95 3.27
  (5,1,1,1,1,5); calculated from trace element balance, input uncertain
- Radon-222 [emissions to air, high. pop.]: 0.00065 kBq; lognormal SD95 3.27
  (5,1,1,1,1,5); calculated from trace element balance, input uncertain
- Selenium [emissions to air, high. pop.]: 2.3e-8 kg; lognormal SD95 5.2623
  (same comment as for Arsenic)
- Strontium [emissions to air, high. pop.]: 2.32e-8 kg; lognormal SD95 5.31
  (5,1,1,1,1,5); calculated from trace element balance, input uncertain
- Sulfur dioxide [emissions to air, high. pop.]: 8.8e-5 kg; lognormal SD95 1.05
  (1,1,1,1,1,1,BU:1.05)calculated from reported emissions (European Environmental Agency)
- Thorium-228 [emissions to air, high. pop.]: 8.49e-7 kBq; lognormal SD95 3.27
  (5,1,1,1,1,5); calculated from trace element balance, input uncertain
- Thorium-232 [emissions to air, high. pop.]: 1.33e-6 kBq; lognormal SD95 3.27
  (5,1,1,1,1,5); calculated from trace element balance, input uncertain
- Toluene [emissions to air, high. pop.]: 1.09e-7 kg; lognormal SD95 1.65
  (3,5,3,2,1,5); based on available literature
- Uranium-238 [emissions to air, high. pop.]: 3.53e-6 kBq; lognormal SD95 3.27
  (5,1,1,1,1,5); calculated from trace element balance, input uncertain
- Vanadium [emissions to air, high. pop.]: 6.22e-9 kg; lognormal SD95 5.31
  (5,1,1,1,1,5); calculated from trace element balance, input uncertain
- Xylene [emissions to air, high. pop.]: 9.22e-7 kg; lognormal SD95 1.65
  (3,5,3,2,1,5); based on available literature
- Zinc [emissions to air, high. pop.]: 1.9e-8 kg; lognormal SD95 5.2623
  (same comment as for Arsenic)
- NMVOC, non-methane volatile organic compounds, unspecified origin [emissions to air, high. pop.]: 1e-6 kg; lognormal SD95 1.7755
  (1,2,5,3,1,1,BU:1.5)based on available emission factors (EMEP/EEA air pollutant emission inventory guidebook)
- Polychlorinated biphenyls [emissions to air, high. pop.]: 3.3e-15 kg; lognormal SD95 3.2292
  (1,3,5,1,1,1,BU:3)based on available emission factors (EMEP/EEA air pollutant emission inventory guidebook)
- Benzene, hexachloro- [emissions to air, high. pop.]: 6.7e-12 kg; lognormal SD95 3.2292
  (same comment as for Polychlorinated biphenyls)
- Carbon black [emissions to air, unspecified]: 7.46e-8 kg; lognormal SD95 5.2623
  (same comment as for Arsenic)
- Dioxin, 2,3,7,8 Tetrachlorodibenzo-p- [emissions to air, unspecified]: 1e-14 kg; lognormal SD95 3.2292
  (same comment as for PAH, polycyclic aromatic hydrocarbons)
- Water [emissions to water, unspecified]: 3.325 kg; lognormal SD95 2.5196
  (5,5,5,5,5,BU:1.05); All uncertainty-values set to 5.0 by default. Balance of input water

## Sampling procedure
Databases/ literature data based on regional statistics.

## Extrapolations
Extrapolations for some exchanges applied where not all plants in the region reported complete data. See exchange comments for details.

## Sources
- Itten R., Oberschelp C., Kroehnert H., Stucki M., 2023, 2023 - LCI solid fossil fuel - Itten, Project report, ZHAW, Waedenswil, CH

## Validation
27.07.2023
