# xx Drilling, CNC, chromium steel

Dataset: EcoSpold 1, unit process
Functional unit: 1 kg
Category: processing, obsolete / metals\chipping
Geography: RER
Time period: 2006-01 to 2007-12
Share of production covered: 0 %
Generated by: Roland Steiner
accessRestrictedTo: 0
copyright: true

## General comment
The reference for drilling is 1 kg of metal removed by drilling. As there is a large variation from factory to factory with regard to the LCI, it is advised that in case this dataset becomes important in the results, it has to be investigated further if the rough estimations made are applicable or not. ;

## Included processes
This dataset encompasses the direct electricity consumption of the machine. In the case of CNC drilling compressed air and lubricant oil (incl. disposal) are accounted for. Furthermore, the metal removed is already included. Machine as well as factory infrastructure and operation are considered as well. The metal removed is assumed to be recycled. Maintenance and tool (bit) replacements are not included. Degreasing is not included and has to be added if necessary.

## Geography
Geographical coverage encompasses the industrialised countries.

## Technology
Average technology

## Reference product
- xx Drilling, CNC, chromium steel [RER]: 1 kg
  Europe

## Inputs from technosphere
- Disposal, used mineral oil, 10% water, to hazardous waste incineration [CH]: 0.00382 kg; lognormal SD95 1.48
  (3,5,4,5,3,5); estimated disposal pathway
- Compressed air, average installation, >30kW, 7 bar gauge, at supply network [RER]: 1.28 m3; lognormal SD95 1.48
  (3,5,4,5,3,5); estimated
- Metal working factory operation, average heat energy [RER]: 4.41 kg; lognormal SD95 1.48
  (3,5,4,5,3,5); estimated
- Chromium steel 18/8, at plant [RER]: 1 kg; lognormal SD95 1.05
  (1,1,1,1,1,1); material removed
- Lubricating oil, at plant [RER]: 0.00382 kg; lognormal SD95 1.48
  (3,5,4,5,3,5); estimated
- Metal working factory [RER]: 2.02e-9 p; lognormal SD95 3.21
  (3,5,4,5,3,5); estimated
- Metal working machine, unspecified, at plant [RER]: 3.95e-5 kg; lognormal SD95 3.21
  (3,5,4,5,3,5); estimated
- Electricity, low voltage, production ENTSO-E, at grid: 0.75 kWh; lognormal SD95 1.24
  (1,3,2,1,3,4); estimated from literature

## Emissions to nature
- Heat, waste [emissions to air, high. pop.]: 2.7 MJ; lognormal SD95 1.24
  (1,3,2,1,3,4); due to electricity consumption

## Sources
- Steiner R., Frischknecht R., 2007, 2007 - LCI metal proc. and comp. air supply - Steiner, Final report ecoinvent Data v2.0, 23, Swiss Centre for LCI, ESU-services Ltd., Duebendorf and Uster, CH
Steiner, R., Frischknecht, R. (2007) Life Cycle Inventories of Metal Processing and Compressed Air Supply. Final report ecoinvent Data v2.0. Editors: 0. 0. Volume: 23. Issue: 0. Swiss Centre for LCI, ESU. Dübendorf and Uster, CH.
Type: Measurement on site
Source: CD-ROM
First author: Steiner, R.
Other authors: Frischknecht, R.
Year: 2007
Name of editors: 0
Title of anthology: Final report ecoinvent Data v2.0
Place of publication: Dübendorf and Uster, CH
Publisher: Swiss Centre for LCI, ESU
Journal: 0
Volume No: 23
Issue No: 0
Original title: Life Cycle Inventories of Metal Processing and Compressed Air Supply

## Validation
Proof reading validation: passed; Other validation: none;
