# Disposal, residues, mechanical treatment, IT accessoires, in MSWI

Dataset: EcoSpold 1, unit process
Functional unit: 1 kg
Category: waste management / municipal incineration
Geography: CH
Time period: 2004-01 to 2004-12
Generated by: Gabor Doka
accessRestrictedTo: 0
copyright: true

## General comment
This dataset represents the activity of waste disposal of residue from mechanical treatment, IT accessory in a municipal solid waste incinerator (MSWI) Recommended use of this dataset: Only for incineration of shredder residues generated in the recycling (mechanical treatment) of computer peripherals (keyboards, mouse) Inventoried waste contains 1.9% rubber; 46.5% Plastics from electronic consumer goods; 46.5% Plastics from electronic industrial goods; 1.57% MSWI iron scrap; 0.353% Alu in MSW; 1.03% Glass; 1.99% wiring copper; 0.0536% Pb in ASR inert; 0.0111% silver; . Waste composition (wet, in ppm): upper heating value 34.31 MJ/kg; lower heating value 32.89 MJ/kg; H2O 8744.4; O 54844; H 70912; C 774420; S 408.04; N 12381; P 478.01; B n.a.; Cl 6321.9; Br 5119.9; F 232.72; I n.a.; Ag 110.86; As 6.9816; Ba 164.77; Cd 140.31; Co 27.44; Cr 70.858; Cu 23077; Hg 0.79127; Mn 44.112; Mo 2.7927; Ni 482.86; Pb 679.2; Sb 4467.1; Se 1.8241; Sn 199.49; V 4.6241; Zn 717.33; Be 0.43432; Sc n.a.; Sr 76.874; Ti 4167.6; Tl 0.34745; W n.a.; Si 6962.3; Fe 14273; Ca 3650.5; Al 5901.6; K 108.91; Mg n.a.; Na 797.06; Share of carbon in waste that is biogenic 0%. Share of metals in waste not oxidised and bulk-recyclable (exclude very small or thin parts) Iron: 89.71%; Alu: 59.48%; Copper: 86.19%. One kg of this waste produces 0.08462 kg of slag and 0.02111 kg of residues, which are landfilled. Additional solidification with 0.008446 kg of cement. Net energy production: 4.22MJ/kg electric energy and 8.19MJ/kg thermal energy. Recovery of metal scrap to recycling: 7.4029g iron scrap, 1.0141g aluminium scrap, 6.0778g copper scrap.;;

## Included processes
Waste incineration from waste reception gate further downstream (excluding transport to the MSWI plant). Waste-specific air and water emisions from incineration, auxiliary material consumption for flue gas cleaning. Short-term emissions to river water and long-term emisisons to ground water from slag compartment (from bottom ash) and residual material landfill (from solidified fly ashes and scrubber slugde). Waste-specific process energy demands for MSWI and net energy generation.

## Geography
Specific to the technology mix encountered in Switzerland in 2010. Well applicable to modern incineration practices in Europe, North America or Japan.

## Technology
average Swiss MSWI plants in 2010 (grate incinerators) with electrostatic precipitator for fly ash (ESP), wet flue gas scrubber and 25% SNCR , 42.77% SCR-high dust , 32.68% SCR-low dust -DeNOx facilities and 0% without Denox (weighted according to mass of burnt waste, representing Swiss average). Efficiency of iron scrap separation from slag : 58%. Efficiency of non-ferrous scrap separation from slag : 31%. Gross electric efficiency technology mix 15.84% and Gross thermal efficiency technology mix 28.51%

## Time period
Waste composition as given in literature reference, theoretical data or other source. Transfer coefficients for modern MSWI.

## Reference product
- Disposal, residues, mechanical treatment, IT accessoires, in MSWI [CH]: 1 kg
  SWITZERLAND

## Inputs from technosphere
- Process-specific burdens, slag compartment [CH]: 0.083067 kg; lognormal SD95 1.4748
  mass-specific expenditures required for landfilling of bottom ash. uncertainty is calculated from uncertainties in waste composition and transfer coefficients in incinerator
- Slag compartment [CH]: 1.4767e-10 p; lognormal SD95 1.4748
  landfill infrastructure required for landfilling of bottom ash. uncertainty is calculated from uncertainties in waste composition and transfer coefficients in incinerator
- Quicklime, milled, packed, at plant [CH]: 0.0039919 kg; lognormal SD95 3.1171
  auxilliary inputs for the flue gas treatment stage of the incinerator plant. uncertainty calculated from uncertainty in average CaO input, of transfer coefficients in the incinerator, and the uncertainty of the waste composition of this waste
- Titanium dioxide, production mix, at plant [RER]: 0.00013794 kg; lognormal SD95 7.5869
  Input to DeNOx stage (TiO2 catalyst carrier) uncertainty calculated from uncertainty in average DeNOx input, uncertainty in the share of thermal NOx, uncertainty of nitrogen content in average municipal waste and the uncertainty in nitrogen content in *this* waste.
- Chemicals inorganic, at plant [GLO]: 0.00030192 kg; lognormal SD95 2.5186
  auxilliary inputs for the wastewater treatment stage of the incinerator plant. Proxy for Polyelectrolyte. uncertainty calculated from uncertainty in average Polyelectrolyte input, of transfer coefficients in the incinerator, and the uncertainty of the waste composition of this waste
- Transport, freight, lorry, 16t-32t gross weight, fleet average [CH]: 0.013551 tkm; lognormal SD95 1.2071
  Transport services to transport incineration residues to landfills and to transport auxilliary inputs of the incinerator plant. uncertainty calculated from uncertainty in average auxiliary material input, the uncertainty of the waste composition of this waste and the uncertainty in generic transportation distances
- Sodium hydroxide, 50% in H2O, production mix, at plant [RER]: 0.00089995 kg; lognormal SD95 2.7304
  auxilliary inputs for the flue gas treatment stage of the incinerator plant. uncertainty calculated from uncertainty in average NaOH input, of transfer coefficients in the incinerator, and the uncertainty of the waste composition of this waste
- Disposal, cement, hydrated, 0% water, to residual material landfill [CH]: 0.021115 kg; lognormal SD95 1.654
  Hydrated cement output for solidification of landfilled residual material. Uncertainty calculated from uncertainty of the waste composition of this waste and transfer coefficients in the incinerator and of the solidification recipe.
- Natural gas, burned in industrial furnace 1MW [CH]: 0.41171 MJ; lognormal SD95 5.137
  Input to DeNOx stage, to heat up flue gas in low-dust SCR. uncertainty calculated from uncertainty in average DeNOx input, uncertainty in the share of thermal NOx, uncertainty of nitrogen content in average municipal waste and the uncertainty in nitrogen content in *this* waste.
- Process-specific burdens, residual material landfill [CH]: 0.021115 kg; lognormal SD95 1.5931
  mass-specific expenditures required for landfilling of incineration residues. uncertainty is calculated from uncertainties in waste composition and transfer coefficients in incinerator
- Ammonia, liquid, at regional storehouse [CH]: 0.0022017 kg; lognormal SD95 5.137
  Input to DeNOx stage (100% NH3). uncertainty calculated from uncertainty in average DeNOx input, uncertainty in the share of thermal NOx, uncertainty of nitrogen content in average municipal waste and the uncertainty in nitrogen content in *this* waste.
- Municipal waste incineration plant [CH]: 2.5e-10 p; lognormal SD95 1
  demands per kilogram waste. uncertainty is heeded in the module
- Residual material landfill facility [CH]: 4.3989e-11 p; lognormal SD95 1.5931
  landfill infrastructure required for landfilling of incineration residues. uncertainty is calculated from uncertainties in waste composition and transfer coefficients in incinerator
- Transport, freight, rail [RER]: 0.01106 tkm; lognormal SD95 1.2515
  (same comment as for Transport, freight, lorry, 16t-32t gross weight, fleet average)
- Cement, unspecified, at plant [CH]: 0.0084459 kg; lognormal SD95 1.654
  Cement required for solidification of landfilled residual material. Uncertainty calculated from uncertainty of the waste composition of this waste, of transfer coefficients in the incinerator and of the solidification recipe.
- Water, decarbonised, at plant [RER]: 1.9251 kg; lognormal SD95 2.7575
  Incinerator process water used in flue gas scrubber stage. uncertainty calculated from uncertainty in average water input, and the uncertainty of the waste composition of this waste
- Hydrochloric acid, 30% in H2O, at plant [RER]: 7.9357e-5 kg; lognormal SD95 2.5186
  auxilliary inputs for the wastewater treatment stage of the incinerator plant. uncertainty calculated from uncertainty in average HCl input, of transfer coefficients in the incinerator, and the uncertainty of the waste composition of this waste
- Chromium oxide, flakes, at plant [RER]: 2.8151e-6 kg; lognormal SD95 7.5869
  Input to DeNOx stage. uncertainty calculated from uncertainty in average DeNOx input, uncertainty in the share of thermal NOx, uncertainty of nitrogen content in average municipal waste and the uncertainty in nitrogen content in *this* waste.
- Chemicals organic, at plant [GLO]: 5.0014e-5 kg; lognormal SD95 5.6224
  auxilliary inputs for the wastewater treatment stage of the incinerator plant. Proxy for (pure) Trisodium-trimercapto-s-triazine (CAS 17766-26-6), used as 15% diluted solution, aka TMT15. uncertainty calculated from uncertainty in average TMT15 input, of transfer coefficients in the incinerator, and the uncertainty of the waste composition of this waste
- Iron (III) chloride, 40% in H2O, at plant [CH]: 0.00012917 kg; lognormal SD95 2.7575
  auxilliary inputs for the wastewater treatment stage of the incinerator plant. uncertainty calculated from uncertainty in average FeCl3 input, of transfer coefficients in the incinerator, and the uncertainty of the waste composition of this waste

## Emissions to nature
- Cadmium [emissions to water, river]: 1.3472e-8 kg; lognormal SD95 5.9393
  Emissions to water from waste composition and transfer coefficients in incinerator and landfills. uncertainty is calculated from uncertainties in waste composition and transfer coefficients in incinerator and landfills
- Benzo(a)pyrene [emissions to air, high. pop.]: 3.0964e-13 kg; lognormal SD95 3.3632
  Incomplete combustion product emitted to air. uncertainty calculated from uncertainty in average operation emissions, and the uncertainty of the flue gas volume from this waste.
- Strontium [emissions to water, river]: 4.8402e-8 kg; lognormal SD95 13.658
  (same comment as for Cadmium)
- Mercury [emissions to water, river]: 8.5934e-10 kg; lognormal SD95 8.3697
  (same comment as for Cadmium)
- Copper [emissions to air, high. pop.]: 2.7233e-7 kg; lognormal SD95 3.0976
  Emission to air from waste composition and transfer coefficients. uncertainty is calculated from uncertainties in waste composition and transfer coefficients in incinerator
- Tin [emissions to air, high. pop.]: 1.2344e-10 kg; lognormal SD95 6.9696
  (same comment as for Copper)
- Dioxin, 2,3,7,8 Tetrachlorodibenzo-p- [emissions to air, high. pop.]: 2.7827e-14 kg; lognormal SD95 3.3632
  (same comment as for Benzo(a)pyrene)
- Titanium [emissions to water, river]: 1.5539e-6 kg; lognormal SD95 3.5125
  (same comment as for Cadmium)
- Lead [emissions to water, river]: 2.3021e-8 kg; lognormal SD95 8.7578
  (same comment as for Cadmium)
- Carbon dioxide, fossil [emissions to air, high. pop.]: 2.8224 kg; lognormal SD95 1.0947
  (same comment as for Copper)
- Silver [emissions to water, river]: 3.849e-9 kg; lognormal SD95 17.449
  (same comment as for Cadmium)
- Phenol, pentachloro- [emissions to air, high. pop.]: 6.0596e-12 kg; lognormal SD95 1.6816
  (same comment as for Benzo(a)pyrene)
- Phosphorus [emissions to air, high. pop.]: 4.73e-7 kg; lognormal SD95 5.8081
  (same comment as for Copper)
- Arsenic [emissions to water, river]: 4.8363e-6 kg; lognormal SD95 9.0108
  (same comment as for Cadmium)
- Particulates, > 2.5 um, and < 10um [emissions to air, high. pop.]: 8.3482e-9 kg; lognormal SD95 2.2421
  (same comment as for Benzo(a)pyrene)
- Vanadium [emissions to water, groundwater, long-term]: 7.0916e-7 kg; lognormal SD95 19.767
  Long-term emissions from landfilling of incineration residues. uncertainty is calculated from uncertainties in waste composition and transfer coefficients in incinerator and landfills.
- Molybdenum [emissions to air, high. pop.]: 3.6745e-9 kg; lognormal SD95 11.156
  (same comment as for Copper)
- Particulates, < 2.5 um [emissions to air, high. pop.]: 1.6613e-6 kg; lognormal SD95 3.3632
  (same comment as for Benzo(a)pyrene)
- BOD5, Biological Oxygen Demand [emissions to water, river]: 0.00089427 kg; lognormal SD95 1.3767
  (same comment as for Cadmium)
- Toluene [emissions to air, high. pop.]: 2.7829e-8 kg; lognormal SD95 1.6816
  (same comment as for Benzo(a)pyrene)
- Thallium [emissions to water, river]: 2.1285e-10 kg; lognormal SD95 15.507
  (same comment as for Cadmium)
- Cobalt [emissions to air, high. pop.]: 4.9905e-8 kg; lognormal SD95 8.5264
  (same comment as for Copper)
- Nitrogen oxides [emissions to air, high. pop.]: 0.00081972 kg; lognormal SD95 5.4881
  sum of fuel-Nox and thermal-NOx emitted to air after DeNOx stage. uncertainty calculated from uncertainty in average N-emissions and uncertainty in the share of thermal NOx and the uncertainty in nitrogen content in *this* waste.
- Antimony [emissions to water, river]: 0.0015385 kg; lognormal SD95 3.9949
  (same comment as for Cadmium)
- Hydrogen chloride [emissions to air, high. pop.]: 3.59e-6 kg; lognormal SD95 3.8046
  (same comment as for Copper)
- COD, Chemical Oxygen Demand [emissions to water, river]: 0.00090591 kg; lognormal SD95 1.3716
  (same comment as for Cadmium)
- Iron [emissions to air, high. pop.]: 2.6326e-9 kg; lognormal SD95 3.61
  (same comment as for Copper)
- Methane, fossil [emissions to air, high. pop.]: 2.0872e-7 kg; lognormal SD95 1.6816
  (same comment as for Benzo(a)pyrene)
- Titanium [emissions to air, high. pop.]: 3.4576e-6 kg; lognormal SD95 4.0804
  (same comment as for Copper)
- Barium [emissions to water, groundwater, long-term]: 8.298e-5 kg; lognormal SD95 20.133
  (same comment as for Vanadium)
- TOC, Total Organic Carbon [emissions to water, river]: 0.00039561 kg; lognormal SD95 1.3722
  (same comment as for Cadmium)
- Titanium [emissions to water, groundwater, long-term]: 0.0012459 kg; lognormal SD95 4.8952
  (same comment as for Vanadium)
- Antimony [emissions to air, high. pop.]: 3.5758e-9 kg; lognormal SD95 4.3264
  (same comment as for Copper)
- Zinc [emissions to water, groundwater, long-term]: 0.00022045 kg; lognormal SD95 28.541
  (same comment as for Vanadium)
- Zinc [emissions to air, high. pop.]: 4.7858e-7 kg; lognormal SD95 5.4756
  (same comment as for Copper)
- Silicon [emissions to air, high. pop.]: 4.2989e-9 kg; lognormal SD95 4.0401
  (same comment as for Copper)
- Aluminium [emissions to air, high. pop.]: 1.8189e-9 kg; lognormal SD95 4.2025
  (same comment as for Copper)
- Aluminium [emissions to water, river]: 2.7633e-7 kg; lognormal SD95 5.7781
  (same comment as for Cadmium)
- Benzene, pentachloro- [emissions to air, high. pop.]: 7.3515e-11 kg; lognormal SD95 1.6816
  (same comment as for Benzo(a)pyrene)
- Fluoride [emissions to water, river]: 1.7795e-5 kg; lognormal SD95 4.2322
  (same comment as for Cadmium)
- Benzene [emissions to air, high. pop.]: 1.3915e-8 kg; lognormal SD95 1.6816
  (same comment as for Benzo(a)pyrene)
- Nickel [emissions to water, river]: 3.2374e-7 kg; lognormal SD95 9.9567
  (same comment as for Cadmium)
- Calcium [emissions to water, groundwater, long-term]: 0.0029081 kg; lognormal SD95 3.9036
  (same comment as for Vanadium)
- Nickel [emissions to air, high. pop.]: 5.8587e-7 kg; lognormal SD95 5.8081
  (same comment as for Copper)
- Mercury [emissions to water, groundwater, long-term]: 5.0397e-8 kg; lognormal SD95 34.918
  (same comment as for Vanadium)
- Phosphate [emissions to water, groundwater, long-term]: 6.2874e-5 kg; lognormal SD95 83.253
  (same comment as for Vanadium)
- Calcium [emissions to water, river]: 3.5359e-5 kg; lognormal SD95 3.5391
  (same comment as for Cadmium)
- TOC, Total Organic Carbon [emissions to water, groundwater, long-term]: 0.0023013 kg; lognormal SD95 1.2627
  (same comment as for Vanadium)
- Potassium [emissions to water, groundwater, long-term]: 8.4667e-5 kg; lognormal SD95 4.2553
  (same comment as for Vanadium)
- Carbon monoxide, fossil [emissions to air, high. pop.]: 2.3653e-5 kg; lognormal SD95 5.6053
  (same comment as for Benzo(a)pyrene)
- Strontium [emissions to air, high. pop.]: 7.6874e-9 kg; lognormal SD95 7.6176
  (same comment as for Copper)
- Cobalt [emissions to water, river]: 4.9715e-9 kg; lognormal SD95 11.098
  (same comment as for Cadmium)
- Aluminium [emissions to water, groundwater, long-term]: 0.0037834 kg; lognormal SD95 3.6415
  (same comment as for Vanadium)
- Sulfur dioxide [emissions to air, high. pop.]: 4.2123e-6 kg; lognormal SD95 5.8984
  (same comment as for Copper)
- Selenium [emissions to air, high. pop.]: 2.1762e-8 kg; lognormal SD95 11.56
  (same comment as for Copper)
- Thallium [emissions to water, groundwater, long-term]: 2.0275e-7 kg; lognormal SD95 9.6044
  (same comment as for Vanadium)
- Iron [emissions to water, groundwater, long-term]: 0.0035506 kg; lognormal SD95 3.7375
  (same comment as for Vanadium)
- Bromine [emissions to air, high. pop.]: 2.5574e-6 kg; lognormal SD95 3.9601
  (same comment as for Copper)
- Sulfate [emissions to water, groundwater, long-term]: 0.0010136 kg; lognormal SD95 3.8927
  (same comment as for Vanadium)
- Silicon [emissions to water, groundwater, long-term]: 0.00031472 kg; lognormal SD95 115.68
  (same comment as for Vanadium)
- Cadmium [emissions to water, groundwater, long-term]: 1.0292e-5 kg; lognormal SD95 155.65
  (same comment as for Vanadium)
- Antimony [emissions to water, groundwater, long-term]: 0.0028391 kg; lognormal SD95 3.8216
  (same comment as for Vanadium)
- Arsenic [emissions to water, groundwater, long-term]: 2.0907e-6 kg; lognormal SD95 9.918
  (same comment as for Vanadium)
- Molybdenum [emissions to water, river]: 7.6273e-7 kg; lognormal SD95 7.3838
  (same comment as for Cadmium)
- BOD5, Biological Oxygen Demand [emissions to water, groundwater, long-term]: 0.0019023 kg; lognormal SD95 1.2627
  (same comment as for Vanadium)
- Chloride [emissions to water, groundwater, long-term]: 0.001462 kg; lognormal SD95 3.6545
  (same comment as for Vanadium)
- Heat, waste [emissions to air, high. pop.]: 25.272 MJ; lognormal SD95 1.2849
  Waste heat generated from heating value of this waste plus any electricity required to process it. uncertainty is calculated from uncertainties in waste composition and uncertainties in energy efficiency and the uncertainty in internal energy demand
- Sodium [emissions to air, high. pop.]: 1.0662e-6 kg; lognormal SD95 5.3824
  (same comment as for Copper)
- Cadmium [emissions to air, high. pop.]: 7.1487e-8 kg; lognormal SD95 6.9696
  (same comment as for Copper)
- Nickel [emissions to water, groundwater, long-term]: 0.00046414 kg; lognormal SD95 5.5257
  (same comment as for Vanadium)
- Cyanide [emissions to air, high. pop.]: 3.9671e-5 kg; lognormal SD95 8.272
  Nitrogen species emitted to air after DeNOx stage. uncertainty calculated from uncertainty in average N-emissions and uncertainty in the share of thermal NOx and the uncertainty in nitrogen content in *this* waste.
- Sodium [emissions to water, groundwater, long-term]: 0.00067929 kg; lognormal SD95 4.8822
  (same comment as for Vanadium)
- DOC, Dissolved Organic Carbon [emissions to water, river]: 0.00039561 kg; lognormal SD95 1.3722
  (same comment as for Cadmium)
- Selenium [emissions to water, groundwater, long-term]: 1.1848e-6 kg; lognormal SD95 8.0892
  (same comment as for Vanadium)
- Nitrate [emissions to water, river]: 0.00015782 kg; lognormal SD95 2.6863
  (same comment as for Cadmium)
- Barium [emissions to water, river]: 2.2176e-8 kg; lognormal SD95 8.8932
  (same comment as for Cadmium)
- Zinc [emissions to water, river]: 6.4519e-8 kg; lognormal SD95 4.7184
  (same comment as for Cadmium)
- Manganese [emissions to water, river]: 2.9288e-9 kg; lognormal SD95 14.274
  (same comment as for Cadmium)
- Ammonia [emissions to air, high. pop.]: 2.5886e-6 kg; lognormal SD95 5.4881
  (same comment as for Cyanide)
- Heat, waste [emissions to water, river]: 5.8145 MJ; lognormal SD95 1.2849
  (same comment as for Heat, waste)
- Manganese [emissions to water, groundwater, long-term]: 4.165e-5 kg; lognormal SD95 7.9825
  (same comment as for Vanadium)
- Arsenic [emissions to air, high. pop.]: 5.4689e-8 kg; lognormal SD95 9.9856
  (same comment as for Copper)
- Chromium VI [emissions to water, groundwater, long-term]: 4.627e-6 kg; lognormal SD95 17.644
  (same comment as for Vanadium)
- Selenium [emissions to water, river]: 6.1623e-7 kg; lognormal SD95 8.8326
  (same comment as for Cadmium)
- NMVOC, non-methane volatile organic compounds, unspecified origin [emissions to air, high. pop.]: 6.3325e-7 kg; lognormal SD95 1.6816
  (same comment as for Benzo(a)pyrene)
- Nitrate [emissions to water, groundwater, long-term]: 0.0004453 kg; lognormal SD95 3.2637
  (same comment as for Vanadium)
- Tin [emissions to water, river]: 5.1676e-9 kg; lognormal SD95 11.698
  (same comment as for Cadmium)
- COD, Chemical Oxygen Demand [emissions to water, groundwater, long-term]: 0.0058157 kg; lognormal SD95 1.2627
  (same comment as for Vanadium)
- Mercury [emissions to air, high. pop.]: 2.2435e-8 kg; lognormal SD95 12.602
  (same comment as for Copper)
- Tin [emissions to water, groundwater, long-term]: 8.2786e-5 kg; lognormal SD95 12.687
  (same comment as for Vanadium)
- Vanadium [emissions to water, river]: 2.8564e-9 kg; lognormal SD95 12.763
  (same comment as for Cadmium)
- Vanadium [emissions to air, high. pop.]: 1.4807e-8 kg; lognormal SD95 10.498
  (same comment as for Copper)
- Silver [emissions to water, groundwater, long-term]: 0.00011086 kg; lognormal SD95 7.0119
  (same comment as for Vanadium)
- Manganese [emissions to air, high. pop.]: 1.2267e-9 kg; lognormal SD95 8.2369
  (same comment as for Copper)
- Bromine [emissions to water, river]: 0.0046238 kg; lognormal SD95 2.3567
  (same comment as for Cadmium)
- Potassium [emissions to water, river]: 2.3708e-5 kg; lognormal SD95 4.5942
  (same comment as for Cadmium)
- Phosphate [emissions to water, river]: 2.6252e-7 kg; lognormal SD95 4.4718
  (same comment as for Cadmium)
- Copper [emissions to water, river]: 8.7223e-7 kg; lognormal SD95 7.3652
  (same comment as for Cadmium)
- Bromine [emissions to water, groundwater, long-term]: 0.00049347 kg; lognormal SD95 3.8712
  (same comment as for Vanadium)
- Lead [emissions to water, groundwater, long-term]: 0.00060831 kg; lognormal SD95 7.3744
  (same comment as for Vanadium)
- Lead [emissions to air, high. pop.]: 1.1306e-8 kg; lognormal SD95 5.6644
  (same comment as for Copper)
- Barium [emissions to air, high. pop.]: 6.4672e-7 kg; lognormal SD95 6.7081
  (same comment as for Copper)
- Cobalt [emissions to water, groundwater, long-term]: 2.2353e-5 kg; lognormal SD95 7.8316
  (same comment as for Vanadium)
- Silicon [emissions to water, river]: 8.3176e-7 kg; lognormal SD95 5.1755
  (same comment as for Cadmium)
- Thallium [emissions to air, high. pop.]: 3.4745e-10 kg; lognormal SD95 13.838
  (same comment as for Copper)
- Molybdenum [emissions to water, groundwater, long-term]: 2.0262e-6 kg; lognormal SD95 10.967
  (same comment as for Vanadium)
- Chloride [emissions to water, river]: 0.0048564 kg; lognormal SD95 3.1863
  (same comment as for Cadmium)
- Strontium [emissions to water, groundwater, long-term]: 7.6774e-5 kg; lognormal SD95 7.3637
  (same comment as for Vanadium)
- Chromium [emissions to air, high. pop.]: 4.2675e-8 kg; lognormal SD95 7.6176
  (same comment as for Copper)
- Fluoride [emissions to water, groundwater, long-term]: 0.00020865 kg; lognormal SD95 3.9488
  (same comment as for Vanadium)
- Benzene, hexachloro- [emissions to air, high. pop.]: 2.9095e-11 kg; lognormal SD95 1.6816
  (same comment as for Benzo(a)pyrene)
- Calcium [emissions to air, high. pop.]: 2.2798e-5 kg; lognormal SD95 4.1209
  (same comment as for Copper)
- Sulfate [emissions to water, river]: 0.00020421 kg; lognormal SD95 3.3896
  (same comment as for Cadmium)
- Chromium VI [emissions to water, river]: 1.3665e-6 kg; lognormal SD95 8.0698
  (same comment as for Cadmium)
- Beryllium [emissions to water, river]: 2.7202e-10 kg; lognormal SD95 19.302
  (same comment as for Cadmium)
- Iron [emissions to water, river]: 8.3807e-8 kg; lognormal SD95 9.4926
  (same comment as for Cadmium)
- Copper [emissions to water, groundwater, long-term]: 0.016681 kg; lognormal SD95 2.8224
  (same comment as for Vanadium)
- Hydrogen fluoride [emissions to air, high. pop.]: 1.5701e-6 kg; lognormal SD95 6.3956
  (same comment as for Copper)
- Potassium [emissions to air, high. pop.]: 5.3809e-7 kg; lognormal SD95 7.1289
  (same comment as for Copper)
- Chromium [emissions to water, river]: 3.7947e-9 kg; lognormal SD95 7.7348
  (same comment as for Cadmium)
- Sodium [emissions to water, river]: 0.00011671 kg; lognormal SD95 4.5015
  (same comment as for Cadmium)
- Dinitrogen monoxide [emissions to air, high. pop.]: 0.00018466 kg; lognormal SD95 8.272
  (same comment as for Cyanide)
- Beryllium [emissions to water, groundwater, long-term]: 3.9694e-7 kg; lognormal SD95 12.515
  (same comment as for Vanadium)
- DOC, Dissolved Organic Carbon [emissions to water, groundwater, long-term]: 0.0023013 kg; lognormal SD95 1.2627
  (same comment as for Vanadium)

## Sampling procedure
fully waste-specific calculation based on literature data for average MSWI operation performance

## Extrapolations
Typical elemental transfer coefficients from current studies for modern MSWI, completed with data from coal power plants and estimates, adapted for inert/burnable waste.

## Uncertainty adjustments
uncertainty of waste input composition data derived from generic formula GSD(c) = N*ln(c)+1

## Sources
- Doka G., 2013, 2013 - Updates LCI waste treatment services - Doka, -, Doka LCA, Zuerich, CH
Doka G. (2013) Updates to Life Cycle Inventories of Waste Treatment Services - part II: waste incineration. Doka LCA. Zurich.
Type: Separate publication
Source: Report to document the 2013 changes to the MSWI incinerator model and datasets (URL: http://www.doka.ch/ecoinventMSWIupdateLCI2013.pdf). To be read with the ecoinvent Nr 13 report (Doka 2009, Life Cycle Inventories of Waste Treatment Services) for ecoinvent v2.2.
First author: Doka G.
Year: 2013
Place of publication: Zurich
Publisher: Doka LCA
Original title: Updates to Life Cycle Inventories of Waste Treatment Services - part II: waste incineration

## Validation
Proof reading validation: Passed.; Other validation: none;
