# Pig iron, at plant

Dataset: EcoSpold 1, unit process
Functional unit: 1 kg
Category: metals / extraction
Geography: RER
Time period: 2018-01 to 2020-12
Generated by: Mischa Zschokke
accessRestrictedTo: 0
copyright: true

## General comment
Economic allocation with factor 0.985. assumption: 94% of slag is reused, 6% is landfilled.;
Synonyms: In UVEK2018 enthalten;

## Included processes
Blast furnace process. Emissions are abated

## Technology
Industry data.

## Time period
Time of publications.

## Reference product
- Pig iron, at plant [RER]: 1 kg
  Europe

## Inputs from technosphere
All rows: lognormal SD95 1
- Disposal, slag, unalloyed electr. steel, 0% water, to residual material landfill [CH]: 0.01466 kg
- Limestone, at mine [CH]: 0.025321 kg
- Steam, for chemical processes, at plant [RER]: 0.059161 kg
- Electricity, medium voltage, production ENTSO-E, at grid: 0.073345 kWh
- Transport, transoceanic freight ship [OCE]: 1.4631 tkm
- Sinter, iron, at plant [RER]: 1.0739 kg
- Blast furnace [RER]: 1.3136e-11 p
- Treatment, pig iron production effluent, to wastewater treatment, class 3 [CH]: 0.006808 m3
- Natural gas, high pressure, at consumer [RER]: 0.16552, 0.080198 MJ (2 entries)
- Oxygen, liquid, at plant [RER]: 0.06054, 0.053597 kg (2 entries)
- Basic oxygen furnace gas, burned in power plant [RER]: 0.20986 MJ
- Pig iron, at plant [RER]: 0.019803 kg
- Hard coal coke, at plant [RER]: 0.3537 MJ
- Tap water, at user [CH]: 0.0033498 kg
- Disposal, inert waste, 5% water, to construction waste landfill [CH]: 0.0030542 kg
- Transport, freight, rail [RER]: 0.24793 tkm
- Blast furnace gas, burned in power plant [RER]: 1.5133 MJ
- Pellets, iron, at plant [RER]: 0.35271 kg
- Compressed air, average installation, <30kW, 8 bar gauge, at supply network [RER]: 0.0089656 m3
- Transport, freight, lorry, fleet average [RER]: 0.0098918 tkm
- Light fuel oil, at regional storage [RER]: 0.029656 kg
- Disposal, sludge, pig iron production, 8.6% water, to residual material landfill [CH]: 0.01202 kg
- Transport, barge [RER]: 0.016256 tkm
- Coke oven gas, at plant [GLO]: 0.021133, 0.27981 MJ (2 entries)
- Iron ore, 65% Fe, at beneficiation [GLO]: 0.17734 kg
- Hard coal mix, at regional storage [UCTE]: 0.15961 kg
- Nitrogen, liquid, at plant [RER]: 0.056696 kg

## Inputs from nature
- Water, cooling, unspecified natural origin/m3 [resources, in water]: 0.011463 m3; lognormal SD95 1

## Emissions to nature
- Lead [emissions to air, unspecified]: 1.3104e-8 kg; lognormal SD95 1
- Particulates, > 2.5 um, and < 10um [emissions to air, unspecified]: 1.8414e-5 kg; lognormal SD95 1
- Sulfur dioxide [emissions to air, unspecified]: 9.9509e-5 kg; lognormal SD95 1
- Zinc [emissions to air, unspecified]: 8.2366e-9 kg; lognormal SD95 1
- Cadmium [emissions to air, unspecified]: 1.4187e-10 kg; lognormal SD95 1
- Manganese [emissions to air, unspecified]: 4.8375e-8 kg; lognormal SD95 1
- Carbon monoxide, fossil [emissions to air, unspecified]: 2.8178e-5 kg; lognormal SD95 1
- Arsenic [emissions to air, unspecified]: 1.2611e-10 kg; lognormal SD95 1
- Chromium [emissions to air, unspecified]: 6.4927e-9 kg; lognormal SD95 1
- Particulates, < 2.5 um [emissions to air, unspecified]: 8.9888e-5 kg; lognormal SD95 1
- Carbon dioxide, fossil [emissions to air, unspecified]: 0.84 kg; lognormal SD95 1
- Nitrogen oxides [emissions to air, unspecified]: 2.0493e-6 kg; lognormal SD95 1
- Nickel [emissions to air, unspecified]: 6.207e-9 kg; lognormal SD95 1
- Mercury [emissions to air, unspecified]: 1.2611e-10 kg; lognormal SD95 1
- Water [emissions to water, unspecified]: 10.8898 kg; lognormal SD95 2.5196
  (5,5,5,5,5,BU:1.05); All uncertainty-values set to 5.0 by default. Balance of input water

## Sampling procedure
Data from literature

## Extrapolations
Some generic datasets from ecoinvent have been used.

## Sources
- Zschokke M., Bolt P., Conrad S., 2021, 2021 - LCI steel and iron processes - Zschokke, Project report, Carbotech AG, Zuerich, CH
M. Zschokke, S. Conrad, P. Bolt (2020) Life cycle inventories of steel and iron processes for UVEK:2020. Project report. carbotech. Zurich, CH.
Type: Separate publication
Source: Report
First author: M. Zschokke
Other authors: S. Conrad, P. Bolt
Year: 2020
Title of anthology: Project report
Place of publication: Zurich, CH
Publisher: carbotech
Original title: Life cycle inventories of steel and iron processes for UVEK:2020

## Validation
Proof reading validation: 23.02.2021; Other validation: C:\Users\Administrator\Desktop\Feb corrected\[pig iron, blast furnace, at plant, RER_v.0.8.xlsx]X-Process;
