# Cleft timber, spruce, sustainable forest management, measured as dry mass, at forest road

Dataset: EcoSpold 1, unit process
Functional unit: 1 kg
Category: wood / wooden materials\new processes\other material
Geography: DE
Time period: 2000-01 to 2016-12
Generated by: default
accessRestrictedTo: 0
copyright: true

## Reference product
- Cleft timber, spruce, sustainable forest management, measured as dry mass, at forest road [DE]: 1 kg

## Inputs from technosphere
- Power sawing, without catalytic converter [RER]: 0.0009423 hr
  Pedigree: (2,1,2,1,1).
- Skidding [RER]: 0.0001422 hr
  Pedigree: (2,1,2,1,1).
- Diesel, burned in building machine, average [CH]: 0.0191 MJ
  Pedigree: (2,1,2,1,1).
- Clefting of energy wood [RER]: 0.0005915 hr
  Pedigree: (2,1,2,1,1).
- Gravel, crushed, at mine [CH]: 0.1649 kg
  Pedigree: (2,1,2,1,1).
- Harvesting, forestry harvester [RER]: 3.248e-5 hr
  Pedigree: (2,1,2,1,1).
- Tree seedling, from unheated greenhouse, 1000 units, at tree nursery [RER]: 0.007143 p
  Pedigree: (3,1,2,1,1).
- Forwarding, forwarder [RER]: 4.341e-5 hr
  Pedigree: (2,1,2,1,1).

## Inputs from nature
- Energy, gross calorific value, in biomass [resources, biotic]: 20.4 MJ
  Pedigree: (1,1,2,1,1).
- Transformation, to forest, intensive [resources, land]: 0.02331 m2
  Pedigree: (1,1,2,1,1).
- Occupation, forest, intensive [resources, land]: 2.331 m2a
  Pedigree: (1,1,2,1,1).
- Transformation, from traffic area, rail/road embankment [resources, land]: 0.0005141 m2
  Pedigree: (1,1,2,1,1).
- Carbon dioxide, in air [resources, in air]: 1.81 kg
  Pedigree: (1,1,2,1,1).
- Transformation, to traffic area, rail/road embankment [resources, land]: 0.0005141 m2
  Pedigree: (1,1,2,1,1).
- Wood, soft, standing [resources, biotic]: 0.00233 m3
  Pedigree: (1,1,2,1,1).
- Transformation, from forest, intensive, normal [resources, land]: 0.02331 m2
  Pedigree: (1,1,2,1,1).
- Occupation, traffic area, rail/road embankment [resources, land]: 0.05141 m2a
  Pedigree: (1,1,2,1,1).

## Sources
- Werner F., 2017, 2017 - LCI wood and wood based products - Werner, Project Report, 0, Environment & Development, Zuerich, CH
