# Biogas, from biowaste, at agricultural co-fermentation, covered

Dataset: EcoSpold 1, unit process
Functional unit: 1 m3
Category: fuels / biofuels\biogas
Geography: CH
Time period: 2006-01 to 2006-12
Production volume: 12 mio. m3 Biogas
Share of production covered: 50 %
Generated by: Konrad Schleiss
accessRestrictedTo: 0
copyright: true

## General comment
This process can only be used together with the process "biogas, mix, at agricultural co-fermentation, covered" because bio waste is not treated in agricultural biogas plants alone but only together with liquid manure. This process has been generated to give the possibility to model co-fermentation with different inputs. The multioutput-process "bio waste, to agriculture co-fermentation, covered" delivers the co-products "biogas", "application of digested matter" and the service "disposal of bio waste". The functional unit refers to 1 kg fresh matter of vegetable and organic waste and catering waste. The allocation is based on economic criteria. ;

## Included processes
This process contains the infrastructure, the energy used and the emissions of the fermentation process.

## Geography
This dataset is valid for agricultural plants in Switzerland in the year 2006

## Technology
To reduce methane emission the stock container is covered, to reduce NH3 emissions the digested matter will be spread with a trail hose.

## Time period
Time of publications.

## Reference product
- Biogas, from biowaste, at agricultural co-fermentation, covered [CH]: 1 m3
  SWITZERLAND

## Inputs from technosphere
- Anaerobic digestion plant covered, agriculture [CH]: 1.6487e-7 p; lognormal SD95 1.2264
  (2,3,2,3,1,5); plant producing 300'000m3 biogas, lifetime 20 years
- Electricity, at cogen with ignition biogas engine, agric. covered, alloc. exergy [CH]: 0.0077723 kWh; lognormal SD95 1.2264
  (2,3,2,3,1,5); Evaluation of 20 plants producing about 50% of the agricultural biogas. Half of the plants produce their own electricity
- Transport, freight, lorry, 16t-32t gross weight, fleet average [CH]: 0.02262 tkm; lognormal SD95 2.0104
  (2,3,1,2,1,3); The transport for the co-substrate of 20 plants producing about 50% of the agricultural biogas have been evaluated.
- Electricity, at cogen with biogas engine, agricultural covered, alloc. exergy [CH]: 0.023751 kWh; lognormal SD95 1.2264
  (same comment as for Electricity, at cogen with ignition biogas engine, agric. covered, all)
- Heat, at cogen with ignition biogas engine, agricultural covered, alloc. exergy [CH]: 0.89574 MJ; lognormal SD95 1.2502
  (2,3,3,3,1,5); Needed heat is produced by the cogeneration
- Heat, at cogen with biogas engine, agricultural covered, allocation exergy [CH]: 2.6827 MJ; lognormal SD95 1.2264
  (2,3,2,3,1,5); Needed heat is produced by the cogeneration
- Electricity, low voltage, at grid [CH]: 0.03155 kWh; lognormal SD95 1.2502
  (2,3,3,3,1,5); Evaluation of 20 plants producing about 50% of the agricultural biogas. Half of the plants uses electricity from the grid

## Inputs from nature
- Carbon dioxide, in air [resources, in air]: 3.21999 kg; lognormal SD95 1.2685
  (3,3,3,3,1,5); The carbon dioxide fixation in the bio waste is accounted for as CO2 as resource. The actual value is based on the bio waste composition.

## Emissions to nature
- Carbon dioxide, biogenic [emissions to air, low. pop.]: 1.26869 kg; lognormal SD95 1.2502
  (2,3,3,3,1,5); The stock is covered to avoid methane emissions. So the emission is about 1%.
- Methane, biogenic [emissions to air, low. pop.]: 0.002165 kg; lognormal SD95 1.5846
  (same comment as for Carbon dioxide, biogenic)
- Heat, waste [emissions to air, low. pop.]: 0.22706 MJ; lognormal SD95 1.2502
  (2,3,3,3,1,5); own calculations from electricity used
- Hydrogen sulfide [emissions to air, low. pop.]: 0.0010866 kg; lognormal SD95 1.596
  (3,3,3,3,1,5); Literature studies done for the process bio waste to anaerobic digestion
- Ammonia [emissions to air, low. pop.]: 0.0025383 kg; lognormal SD95 1.3286
  (2,3,3,3,1,5); Difference of ammonia emissions compared to the un-fermented manure.
- Dinitrogen monoxide [emissions to air, low. pop.]: 0.00079475 kg; lognormal SD95 1.5846
  (2,3,3,3,1,5); Proportional to the ammonia emission

## Sampling procedure
field data, The data are the average of 20 plants in Switzerland to produce electricity according the criteria of "naturemade".

## Sources
- Jungbluth N., Chudacoff M., Dauriat A., Dinkel F., Doka G., Faist Emmenegger M., Gnansounou E., Kljun N., Spielmann M., Stettler C., Sutter J., 2007, 2007 - LCI bioenergy - Jungbluth, Final report ecoinvent data v2.0, 17, Swiss Centre for LCI, ESU-services Ltd., Duebendorf and Uster, CH
Jungbluth N., Chudacoff M., Dauriat A., Dinkel F., Doka G., Faist Emmenegger M., Gnansounou E., Kljun N., Spielmann M., Stettler C., Sutter J. (2007) Life Cycle Inventories of Bioenergy. Final report ecoinvent data v2.0. Volume: 17. Swiss Centre for LCI, ESU. Duebendorf and Uster, CH.
Type: Measurement on site
Source: CD-ROM
First author: Jungbluth N.
Other authors: Chudacoff M., Dauriat A., Dinkel F., Doka G., Faist Emmenegger M., Gnansounou E., Kljun N., Spielmann M., Stettler C., Sutter J.
Year: 2007
Title of anthology: Final report ecoinvent data v2.0
Place of publication: Duebendorf and Uster, CH
Publisher: Swiss Centre for LCI, ESU
Volume No: 17

## Validation
Proof reading validation: Passed; Other validation: none;
