# Natural rubber based sealing, at plant

Dataset: EcoSpold 1, unit process
Functional unit: 1 kg
Category: construction / sealing
Geography: DE
Time period: 1996-01 to 2003-12
Generated by: Martin Lehmann
accessRestrictedTo: 0
copyright: true

## General comment
Caoutchouc is approximated by the dataset "Chemicals, organic". Included are white spirit and the required transportation by rail and road, and hydrocarbon emissions to air. This dataset does not include any energy consumption during the production phase.;

## Included processes
The dataset describes the production of a rubber-based sealing compound to be used e.g. in the aluminium cladding production.

## Geography
Data retrieved from a safety data sheet by a German producer. Applicable for Europe.

## Technology
Simple mass balance including transport. No process energy included.

## Reference product
- Natural rubber based sealing, at plant [DE]: 1 kg
  GERMANY

## Inputs from technosphere
- Transport, freight, lorry, fleet average [RER]: 0.1 tkm; lognormal SD95 2.11
  (4,4,1,1,1,5,5)
- White spirit, at plant [RER]: 0.486 kg; lognormal SD95 1.27
  (2,4,3,2,1,5,3)
- Chemicals organic, at plant [GLO]: 0.744 kg; lognormal SD95 1.27
  (2,4,3,2,1,5,3)
- Chemical plant, organics [RER]: 4e-10 p; lognormal SD95 3.06
  (2,4,1,3,1,5,9)
- Transport, freight, rail [RER]: 0.6 tkm; lognormal SD95 2.11
  (4,4,1,1,1,5,5)

## Emissions to nature
- NMVOC, non-methane volatile organic compounds, unspecified origin [emissions to air, unspecified]: 0.23 kg; lognormal SD95 2.08
  (2,4,3,1,1,5,23)

## Sampling procedure
Company information

## Extrapolations
see Geography

## Uncertainty adjustments
Representative for Germany.

## Sources
- Kellenberger D., Althaus H.-J., Jungbluth N., Kuenniger T., Lehmann M., Thalmann P., 2007, 2007 - LCI building products - Kellenberger, Final report ecoinvent data v2.0, 7, Swiss Centre for LCI, Empa - TSL, ESU-services Ltd., Bau- und Umweltchimie, Duebendorf, CH
Kellenberger D., Althaus H.-J., Jungbluth N., Künniger T. (2007) Life Cycle Inventories of Building Products. Final report ecoinvent data v2.0. Volume: 7. Swiss Centre for LCI, Empa - TSL. Dübendorf, CH.
Type: Measurement on site
Source: CD-ROM
First author: Kellenberger D.
Other authors: Althaus H.-J., Jungbluth N., Künniger T.
Year: 2007
Title of anthology: Final report ecoinvent data v2.0
Place of publication: Dübendorf, CH
Publisher: Swiss Centre for LCI, Empa - TSL
Volume No: 7

## Validation
Proof reading validation: passed; Other validation: none;
