# xx Heat, at local distribution cogen 160kWe Jakobsberg, allocation electricity

Dataset: EcoSpold 1, unit process
Functional unit: 1 MJ
Category: energy, obsolete / cogeneration, obsolete\gas, obsolete
Geography: CH
Time period: 2000-01 to 2000-12
Generated by: Thomas Heck
accessRestrictedTo: 0
copyright: true

## General comment
Heat distibuted to end user over small local distribution network.;

## Included processes
The module includes heat from system cogen (i.e. the cogeneration unit, a heat pump and two oil boilers) and distribution.

## Geography
Efficiencies refer to a specific plant in Switzerland.

## Technology
Specific cogeneration unit installed in Switzerland. Small new district heating according to (Frischknecht et al. 1996)

## Reference product
- xx Heat, at local distribution cogen 160kWe Jakobsberg, allocation electricity [CH]: 1 MJ
  SWITZERLAND

## Inputs from technosphere
- Polyethylene, HDPE, granulate, at plant [RER]: 1.5e-5 kg; lognormal SD95 2.06
  basic uncertainty:2;(4,na,3,1,1,na);
- Steel, converter, unalloyed, at plant [RER]: 6e-5 kg; lognormal SD95 2.06
  basic uncertainty:2;(4,na,3,1,1,na);
- Electricity, medium voltage, at grid [CH]: 0.00278 kWh; lognormal SD95 1.55
  basic uncertainty:1.05;(3,3,3,3,4,3);
- Heat, at system cogen 160kWe Jakobsberg, allocation electricity [CH]: 1.06 MJ; lognormal SD95 1.05
  includes losses during heat transport; basic uncertainty
- Excavation, skid-steer loader [RER]: 2e-6 m3; lognormal SD95 2.06
  basic uncertainty:2;(4,na,3,1,1,na);
- Polyurethane, flexible foam, at plant [RER]: 3e-6 kg; lognormal SD95 2.06
  basic uncertainty:2;(4,na,3,1,1,na);
- Transport, freight, rail, electricity with shunting [CH]: 4e-5 tkm; lognormal SD95 2.49
  uncertainty of transport distance and of amount of material
- Transport, freight, lorry, 16t-32t gross weight, fleet average [CH]: 4e-6 tkm; lognormal SD95 2.49
  uncertainty of transport distance and of amount of material
- Disposal, inert waste, 5% water, to construction waste landfill [CH]: 2e-5 kg; lognormal SD95 2.06
  basic uncertainty:2;(4,na,3,1,1,na);
- Disposal, polyethylene, 0.4% water, to municipal incineration [CH]: 1.8e-6 kg; lognormal SD95 2.06
  basic uncertainty:2;(4,na,3,1,1,na);

## Emissions to nature
- Heat, waste [emissions to air, high. pop.]: -0.05 MJ; lognormal SD95 1.55
  equivalent to electricity input minus heat losses during heat transport
- Heat, waste [emissions to soil, industrial]: 0.06 MJ; lognormal SD95 1.55
  heat losses during heat transport

## Sampling procedure
Operator information

## Sources
- Heck T., 2007, 2007 - Combined heat power generation - Heck, Sachbilanzen von Energiesystemen. Final report No. 6 ecoinvent data v2.0, 6, Swiss Centre for LCI, PSI, Duebendorf and Villigen, CH
Heck, T. (2007) Wärme-Kraft-Kopplung. Sachbilanzen von Energiesystemen. Final report No. 6 ecoinvent data v2.0. Editors: Dones R.. Volume: 6. Swiss Centre for LCI, PSI. Dübendorf and Villigen, CH.
Type: Measurement on site
Source: CD-ROM
First author: Heck, T.
Year: 2007
Name of editors: Dones R.
Title of anthology: Sachbilanzen von Energiesystemen. Final report No. 6 ecoinvent data v2.0
Place of publication: Dübendorf and Villigen, CH
Publisher: Swiss Centre for LCI, PSI
Volume No: 6

## Validation
Proof reading validation: prepared; Other validation: none;
