# Hard coal power plant, 500MW

Dataset: EcoSpold 1, unit process, infrastructure
Functional unit: 1 p
Category: electricity by fuel / coal\power plant\infrastructure
Geography: GLO
Time period: 2004-01 to 2004-12
Generated by: Christian Bauer
accessRestrictedTo: 0
copyright: true

## General comment
Estimation based on literature data for power plants with this capacity.;

## Included processes
The module includes materials, energy and transport requirements used for construction of the plant. Disposal of material after dismantling is also included.

## Geography
German data for the end of the 1980s and US data for early 1980s.

## Technology
Average technology in 1980s.

## Reference product
- Hard coal power plant, 500MW [GLO]: 1 p
  Global

## Inputs from technosphere
- Disposal, building, mineral wool, to sorting plant [CH]: 375000 kg; lognormal SD95 2
  own assumption, based on range of literature data
- Rock wool, at plant [CH]: 375000 kg; lognormal SD95 2
  own assumption, based on range of literature data
- Heat, light fuel oil, at industrial furnace 1MW [RER]: 8.1e7 MJ; lognormal SD95 2
  own assumption, based on range of literature data
- Transport, freight, lorry, fleet average [RER]: 1.12e7 tkm; lognormal SD95 2.1
  standard for transports
- Disposal, building, reinforced concrete, to final disposal [CH]: 1.31e8 kg; lognormal SD95 2
  own assumption, based on range of literature data
- Concrete, normal, at plant [CH]: 52500 m3; lognormal SD95 2
  own assumption, based on range of literature data
- Diesel, burned in building machine, average [CH]: 8.1e7 MJ; lognormal SD95 2
  own assumption, based on range of literature data
- Steel, low-alloyed, at plant [RER]: 3.6e6 kg; lognormal SD95 2
  own assumption, based on range of literature data
- Copper, at regional storage [RER]: 650000 kg; lognormal SD95 2
  own assumption, based on range of literature data
- Polyethylene, HDPE, granulate, at plant [RER]: 500000 kg; lognormal SD95 2
  own assumption, based on range of literature data
- Electricity, medium voltage, production ENTSO-E, at grid: 5.25e6 kWh; lognormal SD95 2
  own assumption, based on range of literature data
- Aluminium, production mix, at plant [RER]: 300000 kg; lognormal SD95 2
  own assumption, based on range of literature data
- Reinforcing steel, at plant [RER]: 4.22e7 kg; lognormal SD95 2
  own assumption, based on range of literature data
- Chromium steel 18/8, at plant [RER]: 400000 kg; lognormal SD95 2
  own assumption, based on range of literature data
- Disposal, building, polyethylene/polypropylene products, to final disposal [CH]: 500000 kg; lognormal SD95 2
  own assumption, based on range of literature data
- Transport, freight, rail [RER]: 9.62e6 tkm; lognormal SD95 2.1
  standard for transports

## Inputs from nature
All rows: lognormal SD95 2
- Occupation, industrial area [resources, land]: 1.17e6 m2a
  own assumption, based on range of literature data
- Occupation, construction site [resources, land]: 250000 m2a
  own assumption, based on range of literature data
- Transformation, to industrial area, vegetation [resources, land]: 40000 m2
  own assumption, based on range of literature data
- Transformation, to industrial area [resources, land]: 45000 m2
  own assumption, based on range of literature data
- Transformation, to traffic area, road network [resources, land]: 40000 m2
  own assumption, based on range of literature data
- Occupation, traffic area, road network [resources, land]: 1.04e6 m2a
  own assumption, based on range of literature data
- Transformation, from unknown [resources, land]: 125000 m2
  own assumption, based on range of literature data
- Occupation, industrial area, vegetation [resources, land]: 1.04e6 m2a
  own assumption, based on range of literature data

## Emissions to nature
- Heat, waste [emissions to air, low. pop.]: 1.89e7 MJ; lognormal SD95 2
  own assumption

## Sampling procedure
literature

## Extrapolations
see Geography/Text

## Sources
- Dones R., Bauer C., Roeder A., 2007, 2007 - Coal - Dones, Sachbilanzen von Energiesystemen. Final report No. 6 ecoinvent data v2.0, 6, Swiss Centre for LCI, PSI, Duebendorf and Villigen, CH
Röder, A., Ch. Bauer, R. Dones (2007) Kohle. Sachbilanzen von Energiesystemen. Final report No. 6 ecoinvent data v2.0. Editors: Dones R.. Volume: 6. Swiss Centre for LCI, PSI. Dübendorf and Villigen, CH.
Type: Measurement on site
Source: CD-ROM
First author: Röder, A.
Other authors: Ch. Bauer, R. Dones
Year: 2007
Name of editors: Dones R.
Title of anthology: Sachbilanzen von Energiesystemen. Final report No. 6 ecoinvent data v2.0
Place of publication: Dübendorf and Villigen, CH
Publisher: Swiss Centre for LCI, PSI
Volume No: 6

## Validation
Proof reading validation: passed; Other validation: none;
