# xx Heat, biogas, at diffusion absorption heat pump 4kW, future

Dataset: EcoSpold 1, unit process
Functional unit: 1 MJ
Category: energy, obsolete / heat, obsolete\heat pumps, obsolete
Geography: CH
Time period: 2000-01 to 2005-12
Generated by: Alex Primas
accessRestrictedTo: 0
copyright: true

## General comment
NOx and CO emissions derived from measurements of gas boilers operated with natural gas under controlled conditions;
Synonyms: DAHP, DAWP;

## Included processes
The module includes input biogas input from low pressure gas network (CH), infrastructure (heat pump with peak boiler and borehole heat exchanger), emissions to air and water, and electricity needed for operation.

## Geography
Natural gas input modelled for Switzerland. Process applicable in central European conditions.

## Technology
Diffusion absorption heat pump with 4 kWth nominal thermal power connected to a short borehole heat exchanger. The unit includes a peak load boiler which allows a maximal output power of 11 kWth. Operation with connection to low pressure gas network. Seasonal performance factor (SPF) of 1.32. Supply temperature of the heating system 50°C.

## Reference product
- xx Heat, biogas, at diffusion absorption heat pump 4kW, future [CH]: 1 MJ
  SWITZERLAND

## Inputs from technosphere
- Diffusion absorption heat pump 4kW, future [CH]: 6.01e-7 p; lognormal SD95 3.1047
  (4,4,2,2,1,5); uncertainty of life time
- xxx Borehole heat exchanger 150 m [CH]: 6.41e-8 p; lognormal SD95 3.1047
  (4,4,2,2,1,5); uncertainty of life time
- Electricity, low voltage, at grid [CH]: 0.0055556 kWh; lognormal SD95 1.6773
  (4,5,2,2,4,5); estimate based on gas boiler data
- Methane, 96 vol-%, from biogas, low pressure, at consumer [CH]: 0.75758 MJ; lognormal SD95 1.2637
  (3,4,2,2,1,5); uncertainty of operation temperatures of source and supply

## Inputs from nature
- Energy, geothermal, converted [resources, in ground]: 0.24242 MJ; lognormal SD95 1.2637
  (3,4,2,2,1,5); uncertainty of operation supply energy and heating value

## Emissions to nature
- Nitrite [emissions to water, river]: 2.2727e-9 kg; lognormal SD95 3
  rough estimate based on gas boiler data
- Butane [emissions to air, high. pop.]: 5.303e-7 kg; lognormal SD95 8
  rough estimate based on gas boiler data
- Propionic acid [emissions to air, high. pop.]: 1.5152e-8 kg; lognormal SD95 8
  rough estimate based on gas boiler data
- Sulfur dioxide [emissions to air, high. pop.]: 3.7879e-7 kg; lognormal SD95 1.1
  based on composition of refined biogas
- Acetic acid [emissions to air, high. pop.]: 1.1364e-7 kg; lognormal SD95 8
  rough estimate based on gas boiler data
- Carbon monoxide, biogenic [emissions to air, high. pop.]: 4.4697e-6 kg; lognormal SD95 7.4
  rough estimate based on calculation for gas boiler
- Acetaldehyde [emissions to air, high. pop.]: 7.5758e-10 kg; lognormal SD95 8
  rough estimate based on gas boiler data
- Benzene [emissions to air, high. pop.]: 3.0303e-7 kg; lognormal SD95 8
  rough estimate based on gas boiler data
- Benzo(a)pyrene [emissions to air, high. pop.]: 7.5758e-12 kg; lognormal SD95 8
  rough estimate based on gas boiler data
- Mercury [emissions to air, high. pop.]: 2.2727e-11 kg; lognormal SD95 5
  rough estimate based on gas boiler data
- Particulates, < 2.5 um [emissions to air, high. pop.]: 7.5758e-8 kg; lognormal SD95 2
  rough estimate based on gas boiler data
- Dinitrogen monoxide [emissions to air, high. pop.]: 3.7879e-7 kg; lognormal SD95 8
  rough estimate based on gas boiler data
- Toluene [emissions to air, high. pop.]: 1.5152e-7 kg; lognormal SD95 8
  rough estimate based on gas boiler data
- Methane, biogenic [emissions to air, high. pop.]: 1.5152e-6 kg; lognormal SD95 8
  rough estimate based on gas boiler data
- Heat, waste [emissions to air, high. pop.]: 1.1013 MJ; lognormal SD95 1.2637
  (3,4,2,2,1,5); uncertainty of operation supply energy and heating value
- Formaldehyde [emissions to air, high. pop.]: 7.5758e-8 kg; lognormal SD95 8
  rough estimate based on gas boiler data
- Nitrate [emissions to water, river]: 9.8485e-8 kg; lognormal SD95 3
  rough estimate based on gas boiler data
- Propane [emissions to air, high. pop.]: 1.5152e-7 kg; lognormal SD95 8
  rough estimate based on gas boiler data
- Sulfite [emissions to water, river]: 3.7879e-8 kg; lognormal SD95 3
  rough estimate based on gas boiler data
- Pentane [emissions to air, high. pop.]: 9.0909e-7 kg; lognormal SD95 8
  rough estimate based on gas boiler data
- Carbon dioxide, biogenic [emissions to air, high. pop.]: 0.042285 kg; lognormal SD95 1.1
  based on composition of refined biogas
- Sulfate [emissions to water, river]: 3.7879e-8 kg; lognormal SD95 3
  rough estimate based on gas boiler data
- Dioxin, 2,3,7,8 Tetrachlorodibenzo-p- [emissions to air, high. pop.]: 2.2e-17 kg; lognormal SD95 8
  based on composition of refined biogas
- Nitrogen oxides [emissions to air, high. pop.]: 7.5e-6 kg; lognormal SD95 3.6
  rough estimate based on calculation for gas boiler
- PAH, polycyclic aromatic hydrocarbons [emissions to air, high. pop.]: 7.5758e-9 kg; lognormal SD95 8
  rough estimate based on gas boiler data

## Sampling procedure
Literature data and manufacturer information, emissions values from ecoinvent process natural gas, burned in boiler condensing modulating under 100kW

## Sources
- Primas A., 2007, 2007 - LCI new CHP systems - Primas, Final report ecoinvent Data v2.0, 20, Swiss Centre for LCI, B&H AG, Duebendorf and Zuerich, CH
Primas A., 0 (2007) Life Cycle Inventories of new CHP systems. Final report ecoinvent Data v2.0. Editors: 0. Volume: 20. Swiss Centre for LCI, B&H AG. Duebendorf and Zurich, CH.
Type: Measurement on site
Source: CD-ROM
First author: Primas A.
Other authors: 0
Year: 2007
Name of editors: 0
Title of anthology: Final report ecoinvent Data v2.0
Place of publication: Duebendorf and Zurich, CH
Publisher: Swiss Centre for LCI, B&H AG
Volume No: 20

## Validation
Proof reading validation: passed; Other validation: none;
