# Calendering, rigid sheets

Dataset: EcoSpold 1, unit process
Functional unit: 1 kg
Category: plastics / unspecified
Geography: RER
Time period: 2000-01 to 2000-12
Generated by: Roland Hischier
accessRestrictedTo: 0
copyright: true

## General comment
1 kg of this process equals 0.997 kg of calendered rigid plastic sheets.;

## Included processes
This process contains the auxillaries and energy demand for the mentioned convertion process of plastics. The converted amount of plastics is NOT included into the dataset.

## Geography
information from different European and Swiss converting companies

## Technology
present technologies

## Time period
time to which data refer

## Reference product
- Calendering, rigid sheets [RER]: 1 kg
  Europe

## Inputs from technosphere
- Disposal, polyvinylchloride, 0.2% water, to municipal incineration [CH]: 0.00339 kg; lognormal SD95 1.3
  (2,3,2,1,3,4); typical values, based on a European and a Swiss study
- Lubricating oil, at plant [RER]: 0.000619 kg; lognormal SD95 1.3
  (2,3,2,1,3,4); typical values, based on a European and a Swiss study
- Core board, at plant [RER]: 0.00797 kg; lognormal SD95 1.3
  (2,3,2,1,3,4); typical values, based on a European and a Swiss study
- Electricity, medium voltage, production ENTSO-E, at grid: 0.505 kWh; lognormal SD95 1.3
  (2,3,2,1,3,4); typical values, based on a European and a Swiss study
- Transport, freight, lorry, 7.5t-16t gross weight, fleet average [RER]: 0.0498 tkm; lognormal SD95 2.1
  (2,3,2,1,3,4); typical values, based on a European and a Swiss study
- EUR-flat pallet [RER]: 0.000453 p; lognormal SD95 1.3
  (2,3,2,1,3,4); typical values, based on a European and a Swiss study
- Heat, natural gas, at industrial furnace 1MW [CH]: 0.169 MJ; lognormal SD95 1.3
  (2,3,2,1,3,4); typical values, based on a European and a Swiss study
- Solid bleached board, SBB, at plant [RER]: 0.00299 kg; lognormal SD95 1.3
  (2,3,2,1,3,4); typical values, based on a European and a Swiss study
- Polyethylene, LDPE, granulate, at plant [RER]: 0.00179 kg; lognormal SD95 1.3
  (2,3,2,1,3,4); typical values, based on a European and a Swiss study
- Packaging box production unit [RER]: 1.43e-9 p; lognormal SD95 3.1
  (4,na,na,na,na,na); estimation
- Steam, for chemical processes, at plant [RER]: 0.234 kg; lognormal SD95 1.3
  (2,3,2,1,3,4); typical values, based on a European and a Swiss study

## Inputs from nature
- Water, cooling, unspecified natural origin/m3 [resources, in water]: 0.019 m3; lognormal SD95 1.3
  (2,3,2,1,3,4); typical values, based on a European and a Swiss study

## Emissions to nature
- Heat, waste [emissions to air, high. pop.]: 1.82 MJ; lognormal SD95 1.3
  (2,3,2,1,3,4); typical values, based on a European and a Swiss study
- NMVOC, non-methane volatile organic compounds, unspecified origin [emissions to air, high. pop.]: 1.72e-6 kg; lognormal SD95 2.1
  (2,3,2,1,3,4); typical values, based on a European and a Swiss study
- Particulates, > 2.5 um, and < 10um [emissions to air, high. pop.]: 3.85e-6 kg; lognormal SD95 2.1
  (2,3,2,1,3,4); typical values, based on a European and a Swiss study
- Water [emissions to water, unspecified]: 18.05 kg; lognormal SD95 2.5196
  (5,5,5,5,5,BU:1.05); All uncertainty-values set to 5.0 by default. Balance of input water

## Sampling procedure
company data

## Extrapolations
no extrapolation

## Sources
- Hischier R., 2007, 2007 - LCI packagings and graphical papers - Hischier, Final report ecoinvent data v2.0, 11, Swiss Centre for LCI, Empa - TSL, Duebendorf and St. Gallen, CH
Hischier R. (2007) Life Cycle Inventories of Packaging and Graphical Paper. Final report ecoinvent data v2.0. Volume: 11. Swiss Centre for LCI, Empa - TSL. Dübendorf, CH.
Type: Measurement on site
Source: CD-ROM
First author: Hischier R.
Year: 2007
Title of anthology: Final report ecoinvent data v2.0
Place of publication: Dübendorf, CH
Publisher: Swiss Centre for LCI, Empa - TSL
Volume No: 11

## Validation
Proof reading validation: Eintrag "none" bei uncertainty adjustment fehlt -> korrigiert.; Other validation: none;
