# Hazardous waste incineration plant

Dataset: EcoSpold 1, unit process, infrastructure
Functional unit: 1 p
Category: waste / infrastructure
Geography: CH
Time period: 2000-01 to 2000-12
Production volume: 2 Swiss HWI plants with a total capacity of 53'000 t/a.
Share of production covered: 39 %
Generated by: Gabor Doka
accessRestrictedTo: 0
copyright: true

## General comment
adapted from municipal waste incineration plant with a factor of 0.36. 20000 tons of waste per year. Operation time 40 years.;
Synonyms: HWI, SAVA;

## Included processes
plant building infrastructure and demolition, land occupations and transformations

## Geography
Based on technology encountered in Switzerland in 2000. Well applicable to modern incineration practices in Europe or North America or Japan.

## Technology
Swiss HWI plant in 2000 with wet flue gas scrubber and low-dust SCR DeNOx facility.

## Reference product
- Hazardous waste incineration plant [CH]: 1 p
  SWITZERLAND

## Inputs from technosphere
- Bitumen, at refinery [CH]: 288000 kg; lognormal SD95 3.3
  (2,3,3,1,4,5) & basic uncertainty of 3; adapted from figures for MSWI
- Reinforcing steel, at plant [RER]: 1.41e6 kg; lognormal SD95 3.3
  (2,3,3,1,4,5) & basic uncertainty of 3; adapted from figures for MSWI
- Disposal, building, reinforced concrete, to sorting plant [CH]: 1.48e7 kg; lognormal SD95 3.3
  (2,3,3,1,4,5) & basic uncertainty of 3; adapted from figures for MSWI
- Disposal, building, concrete, not reinforced, to sorting plant [CH]: 3.6e6 kg; lognormal SD95 3.3
  (2,3,3,1,4,5) & basic uncertainty of 3; adapted from figures for MSWI
- Transport, freight, rail [RER]: 525000 tkm; lognormal SD95 2.3
  uncertainty calculated from uncertainty of transported infrastructure masses and uncertainty of default transport distances
- Disposal, building, bitumen sheet, to final disposal [CH]: 288000 kg; lognormal SD95 3.3
  (2,3,3,1,4,5) & basic uncertainty of 3; adapted from figures for MSWI
- Transport, freight, lorry, 16t-32t gross weight, fleet average [CH]: 1.02e6 tkm; lognormal SD95 2.3
  (same comment as for Transport, freight, rail)
- Chromium steel 18/8, at plant [RER]: 28800 kg; lognormal SD95 3.3
  (2,3,3,1,4,5) & basic uncertainty of 3; adapted from figures for MSWI
- Gravel, round, at mine [CH]: 1.26e7 kg; lognormal SD95 3.3
  (2,3,3,1,4,5) & basic uncertainty of 3; adapted from figures for MSWI
- Sand, at mine [CH]: 3.6e6 kg; lognormal SD95 3.3
  (2,3,3,1,4,5) & basic uncertainty of 3; adapted from figures for MSWI
- Cement, unspecified, at plant [CH]: 1.8e6 kg; lognormal SD95 3.3
  (2,3,3,1,4,5) & basic uncertainty of 3; adapted from figures for MSWI

## Inputs from nature
- Transformation, to industrial area, built up [resources, land]: 1080 m2; lognormal SD95 2.4
  (4,5,1,1,4,5) & basic uncertainty of 2; adapted from figures for MSWI. estimate on land area and production volume
- Occupation, construction site [resources, land]: 5400 m2a; lognormal SD95 1.9
  (4,5,1,1,4,5) & basic uncertainty of 1.5; adapted from figures for MSWI. estimate on land area, production volume and building, operation and demolition time
- Transformation, from unknown [resources, land]: 1080 m2; lognormal SD95 2.4
  (same comment as for Transformation, to industrial area, built up)
- Occupation, industrial area, built up [resources, land]: 43200 m2a; lognormal SD95 1.9
  (same comment as for Occupation, construction site)

## Sampling procedure
The 2 Swiss HWI plants, used as the inventory reference technology mix, have a total annual capacity of 53'000 tons of hazardous waste. This corresonds to 39% of the Swiss total installed capacity in 2000. Swiss average plants size is 20'000 t/a.

## Sources
- Doka G., 2009, 2009 - LCI waste treatment services - Doka, Final report ecoinvent data v2.0, 13, Swiss Centre for LCI, Doka LCA, Duebendorf and St. Gallen, CH
Doka G. (2007) Life Cycle Inventories of Waste Treatment Services. Final report ecoinvent data v2.0. Volume: 13. Swiss Centre for LCI, Empa - TSL. Dübendorf, CH.
Type: Separate publication
Source: CD-ROM
First author: Doka G.
Year: 2007
Title of anthology: Final report ecoinvent data v2.0
Place of publication: Dübendorf, CH
Publisher: Swiss Centre for LCI, Empa - TSL
Volume No: 13

## Validation
Proof reading validation: Passed. Calculation for standard deviation 95 of infrastructure, land occupation, transport services and other services can differ from standard Pedigree approach used in this project and figures obtained by this procedure. ; Other validation: none;
