# Resource correction, CuMo, copper, negative

Dataset: EcoSpold 1, unit process
Functional unit: 1 kg
Category: metals / non ferro\resource corrections
Geography: GLO
Time period: 2000-01 to 2005-12
Generated by: Mischa Classen
accessRestrictedTo: 0
copyright: true

## General comment
This dataset is designed to adjust resource demand in multi-output processes with mixed allocation schemes for resources (physical) and others (economical). In cases where the the upstream concentrate-inventory is allocated by economic criterias, the resouce demand of the individual refernece flos does not reflect the physical reality. Therefore the resource allocation is adjusted using this dataset in a way, that the resource demand of the specific reference flows from the multi-output process reflect the effective material composition .;

## Reference product
- Resource correction, CuMo, copper, negative [GLO]: 1 kg
  Global

## Inputs from nature
- Copper, 0.99% in sulfide, Cu 0.36% and Mo 8.2E-3% in crude ore [resources, in ground]: -1 kg; lognormal SD95 1
  calcualted

## Sources
- Classen M., Althaus H.-J., Blaser S., Scharnhorst W., Tuchschmid M., Jungbluth N., Faist Emmenegger M., 2009, 2009 - LCI metals - Classen, Final report ecoinvent data v2.1, 10, Swiss Centre for LCI, Empa, ESU-services Ltd., Duebendorf, CH
Classen M., Althaus H.-J., Blaser S., Doka G., Jungbluth N., Tuchschmid M. (2008) Life Cycle Inventories of Metals. Final report ecoinvent data v2.1. Volume: 10. Issue: 0. Swiss Centre for LCI, Empa - TSL. Dübendorf, CH.
Type: Measurement on site
Source: CD-ROM
First author: Classen M.
Other authors: Althaus H.-J., Blaser S., Doka G., Jungbluth N., Tuchschmid M.
Year: 2008
Title of anthology: Final report ecoinvent data v2.1
Place of publication: Dübendorf, CH
Publisher: Swiss Centre for LCI, Empa - TSL
Volume No: 10
Issue No: 0

## Validation
Proof reading validation: Passed; Other validation: none;
