# xx Copper concentrate, couple production Mo

Dataset: EcoSpold 1, unit process
Functional unit: 1 kg
Category: material, obsolete / metals, obsolete\non ferro, obsolete
Geography: GLO
Time period: 2000-01 to 2000-12
Production volume: 52000 t Mo in Molybdenite
Share of production covered: 40 %
Generated by: Mischa Classen
accessRestrictedTo: 0
copyright: true

## General comment
The module describes the exploitation of molybdenite as main product. It is designed solely as part of the molybdenum production mix. The multi-output-process "mining molybdenite" delivers the co-products "molybdenite concentrate, main product" and "copper, concentrate, couple production Mo". Molybdenite form coupled production is designed for its use in the world-wide production-mix.;

## Included processes
The module includes a mining and a beneficiation step with the mining infrastructure and disposal of overburden and tailings (see part II "Auxiliary Processes").

## Geography
Mining is done 70% open pit and 30% underground, followed by joint beneficiation of copper and molybdenite trough flotation, where considerable amounts of agents are added. Overburden and tailings are disposed near the mining site.

## Technology
This module is valid for the whole corresponding region. Some agents used like lime or sodium cyanide originate from data sets valid for Switzerland or Europe. Processes like blasting and transport originate from data sets valid for Switzerland or Europe.

## Reference product
- xx Copper concentrate, couple production Mo [GLO]: 1 kg
  Global

## Inputs from technosphere
- Disposal, sulfidic tailings, off-site [GLO]: 86.419 kg; lognormal SD95 1.13
  (2,2,2,1,1,4,6)
- Non-ferrous metal mine, surface [GLO]: 3.1951e-10 p; lognormal SD95 3.36
  (5,5,1,1,3,5,9)
- Aluminium hydroxide, plant [RER]: 2.6878e-10 p; lognormal SD95 3.07
  (3,2,2,1,3,4,9)
- Electricity, hydropower, at run-of-river power plant [RER]: 0.39071 kWh; lognormal SD95 1.14
  (2,3,2,1,1,4,2)
- Blasting [RER]: 0.031951 kg; lognormal SD95 1.13
  (2,2,2,1,1,4,4)
- Chemicals organic, at plant [GLO]: 0.0072179 kg; lognormal SD95 2
  reported values
- Conveyor belt, at plant [RER]: 2.4208e-6 m; lognormal SD95 3.36
  (5,5,1,1,3,5,9)
- Sodium cyanide, at plant [RER]: 0.0011214 kg; lognormal SD95 2
  reported values
- Diesel, burned in building machine, average [CH]: 0.0025187 MJ; lognormal SD95 1.13
  (2,2,2,1,1,4,4)
- Chemicals inorganic, at plant [GLO]: 0.024564 kg; lognormal SD95 2
  reported values
- Chromium steel 18/8, at plant [RER]: 0.023763 kg; lognormal SD95 1.2
  reported values
- Electricity, medium voltage, production ENTSO-E, at grid: 0.26077 kWh; lognormal SD95 1.14
  (2,3,2,1,1,4,2)
- Limestone, milled, packed, at plant [CH]: 0.038092 kg; lognormal SD95 1.04
  reported values
- Non-ferrous metal mine, underground [GLO]: 1.3973e-10 p; lognormal SD95 3.36
  (5,5,1,1,3,5,9)

## Inputs from nature
- Occupation, mineral extraction site [resources, land]: 0.0016643 m2a; lognormal SD95 1.51
  (2,2,2,1,1,2,7)
- Water, river [resources, in water]: 0.031951 m3; lognormal SD95 1.13
  (2,2,1,1,1,4,12)
- Transformation, from unknown [resources, land]: 5.5625e-5 m2; lognormal SD95 2.01
  (2,2,2,1,1,2,8)
- Transformation, to mineral extraction site [resources, land]: 5.5625e-5 m2; lognormal SD95 2.01
  (2,2,2,1,1,2,8)
- Copper, 0.97% in sulfide, Cu 0.36% and Mo 4.1E-2% in crude ore [resources, in ground]: 0.356 kg; lognormal SD95 1.13
  (2,2,2,1,1,4,12)

## Emissions to nature
- Particulates, < 2.5 um [emissions to air, low. pop.]: 0.007476 kg; lognormal SD95 2.69
  (3,2,1,1,5,4,23)
- TOC, Total Organic Carbon [emissions to water, river]: 0.00012994 kg; lognormal SD95 10
  reported values
- Cyanide [emissions to water, river]: 0.00012371 kg; lognormal SD95 1.84
  (4,2,2,3,4,4,33)
- Zinc [emissions to water, river]: 2.4208e-6 kg; lognormal SD95 10
  reported values
- Chromium [emissions to water, river]: 1.7444e-8 kg; lognormal SD95 10
  reported values
- Suspended solids, unspecified [emissions to water, river]: 0.00016554 kg; lognormal SD95 10
  reported values
- Chromium [emissions to air, low. pop.]: 1.4685e-6 kg; lognormal SD95 1.59
  (3,2,1,1,3,4,31)
- Calcium [emissions to water, river]: 0.021894 kg; lognormal SD95 10
  reported values
- COD, Chemical Oxygen Demand [emissions to water, river]: 0.00033286 kg; lognormal SD95 10
  reported values
- Selenium [emissions to air, low. pop.]: 7.3514e-10 kg; lognormal SD95 1.59
  (3,2,1,1,3,4,31)
- Carbon dioxide, fossil [emissions to air, low. pop.]: 0.012015 kg; lognormal SD95 2.3
  (5,3,3,6,5,5,24)
- Lead [emissions to air, low. pop.]: 2.0559e-7 kg; lognormal SD95 1.59
  (3,2,1,1,3,4,31)
- Copper [emissions to air, low. pop.]: 7.3514e-7 kg; lognormal SD95 1.59
  (3,2,1,1,3,4,31)
- Beryllium [emissions to air, low. pop.]: 3.827e-8 kg; lognormal SD95 1.59
  (3,2,1,1,3,4,31)
- Copper [emissions to water, river]: 2.5276e-7 kg; lognormal SD95 10
  reported values
- Cadmium [emissions to water, river]: 1.0146e-8 kg; lognormal SD95 10
  reported values
- Zinc [emissions to air, low. pop.]: 2.7946e-6 kg; lognormal SD95 1.59
  (3,2,1,1,3,4,31)
- Fluorine [emissions to air, low. pop.]: 1.3973e-5 kg; lognormal SD95 1.59
  (3,2,1,1,3,4,31)
- Arsenic [emissions to air, low. pop.]: 2.2072e-8 kg; lognormal SD95 1.59
  (3,2,1,1,3,4,31)
- Nitrogen, organic bound [emissions to water, river]: 0.00072713 kg; lognormal SD95 10
  reported values
- Cobalt [emissions to air, low. pop.]: 2.937e-7 kg; lognormal SD95 1.59
  (3,2,1,1,3,4,31)
- Lead [emissions to water, river]: 8.9e-8 kg; lognormal SD95 10
  reported values
- Nickel [emissions to water, river]: 7.7786e-7 kg; lognormal SD95 10
  reported values
- DOC, Dissolved Organic Carbon [emissions to water, river]: 0.00012994 kg; lognormal SD95 10
  reported values
- Iron [emissions to water, river]: 9.256e-6 kg; lognormal SD95 10
  reported values
- Carbon disulfide [emissions to air, low. pop.]: 0.0031951 kg; lognormal SD95 2.31
  (4,2,2,5,4,4,23)
- Mercury [emissions to water, river]: 1.2015e-9 kg; lognormal SD95 10
  reported values
- Manganese [emissions to water, river]: 7.8854e-7 kg; lognormal SD95 10
  reported values
- Antimony [emissions to air, low. pop.]: 2.937e-9 kg; lognormal SD95 1.59
  (3,2,1,1,3,4,31)
- Sulfate [emissions to water, river]: 0.075383 kg; lognormal SD95 10
  reported values
- Arsenic [emissions to water, river]: 9.434e-8 kg; lognormal SD95 10
  reported values
- Particulates, > 10 um [emissions to air, low. pop.]: 0.00072268 kg; lognormal SD95 2.69
  (3,2,1,1,5,4,19)
- Cobalt [emissions to water, river]: 2.5009e-8 kg; lognormal SD95 10
  reported values
- Heat, waste [emissions to air, low. pop.]: 2.3496 MJ; lognormal SD95 1.14
  (2,3,2,1,1,4,13)
- Boron [emissions to air, low. pop.]: 1.4685e-7 kg; lognormal SD95 1.59
  (3,2,1,1,3,4,31)
- Particulates, > 2.5 um, and < 10um [emissions to air, low. pop.]: 0.0065059 kg; lognormal SD95 3.69
  (3,2,1,1,5,4,20)
- Nickel [emissions to air, low. pop.]: 1.1748e-6 kg; lognormal SD95 1.59
  (3,2,1,1,3,4,31)
- Cadmium [emissions to air, low. pop.]: 1.6198e-9 kg; lognormal SD95 1.59
  (3,2,1,1,3,4,31)
- Mercury [emissions to air, low. pop.]: 7.3514e-10 kg; lognormal SD95 1.59
  (3,2,1,1,3,4,31)
- Aluminium [emissions to water, river]: 2.759e-6 kg; lognormal SD95 10
  reported values
- BOD5, Biological Oxygen Demand [emissions to water, river]: 0.00033286 kg; lognormal SD95 10
  reported values
- Manganese [emissions to air, low. pop.]: 1.3973e-5 kg; lognormal SD95 1.59
  (3,2,1,1,3,4,31)
- Water [emissions to water, unspecified]: 30.3534 kg; lognormal SD95 2.5196
  (5,5,5,5,5,BU:1.05); All uncertainty-values set to 5.0 by default. Balance of input water

## Sampling procedure
literature

## Extrapolations
see Geography and Technology

## Sources
- Classen M., Althaus H.-J., Blaser S., Scharnhorst W., Tuchschmid M., Jungbluth N., Faist Emmenegger M., 2009, 2009 - LCI metals - Classen, Final report ecoinvent data v2.1, 10, Swiss Centre for LCI, Empa, ESU-services Ltd., Duebendorf, CH
Classen M., Althaus H.-J., Blaser S., Doka G., Jungbluth N., Tuchschmid M. (2008) Life Cycle Inventories of Metals. Final report ecoinvent data v2.1. Volume: 10. Issue: 0. Swiss Centre for LCI, Empa - TSL. Dübendorf, CH.
Type: Measurement on site
Source: CD-ROM
First author: Classen M.
Other authors: Althaus H.-J., Blaser S., Doka G., Jungbluth N., Tuchschmid M.
Year: 2008
Title of anthology: Final report ecoinvent data v2.1
Place of publication: Dübendorf, CH
Publisher: Swiss Centre for LCI, Empa - TSL
Volume No: 10
Issue No: 0

## Validation
Proof reading validation: passed; Other validation: none;
