# Pump 40W, at plant

Dataset: EcoSpold 1, unit process, infrastructure
Functional unit: 1 p
Category: heat / solar\infrastructure
Geography: CH
Time period: 2000-01 to 2000-12
Generated by: Niels Jungbluth
accessRestrictedTo: 0
copyright: true

## General comment
Water pump Grundfos UP 15-35x20 with a capacity of 40W for use in solar collector systems.;

## Included processes
Production and disposal of a water pump. Including materials. Not including energy use of production and infrastructure for factory.

## Technology
Circulating pump for heat exchange fluid in solar collector systems for a one family dwelling.

## Time period
Time of weighting the different parts of the pump.

## Reference product
- Pump 40W, at plant [CH]: 1 p
  SWITZERLAND

## Inputs from technosphere
- Copper, at regional storage [RER]: 0.25 kg; lognormal SD95 1.33
  (2,5,3,1,1,5); Own measurement
- Hot water tank factory [CH]: 2e-7 p; lognormal SD95 4.01
  (5,5,3,1,5,5); Rough estimation
- Disposal, plastics, mixture, 15.3% water, to municipal incineration [CH]: 0.007 kg; lognormal SD95 1.33
  (2,5,3,1,1,5); Estimation
- Disposal, building, polyvinylchloride products, to final disposal [CH]: 0.03 kg; lognormal SD95 1.33
  (2,5,3,1,1,5); Estimation
- Chromium steel 18/8, at plant [RER]: 0.92 kg; lognormal SD95 1.33
  (2,5,3,1,1,5); Own measurement
- Transport, freight, rail [RER]: 1.46 tkm; lognormal SD95 2.1
  (4,5,na,na,na,na); Standard distance 600km
- Synthetic rubber, at plant [RER]: 0.007 kg; lognormal SD95 1.33
  (2,5,3,1,1,5); Own measurement
- Transport, freight, lorry, 16t-32t gross weight, fleet average [CH]: 0.121 tkm; lognormal SD95 2.1
  (4,5,na,na,na,na); Standard distance 50km
- Polyvinylchloride, at regional storage [RER]: 0.03 kg; lognormal SD95 1.33
  (2,5,3,1,1,5); Own measurement
- Cast iron, at plant [RER]: 1.2 kg; lognormal SD95 1.33
  (2,5,3,1,1,5); Own measurement
- Aluminium, production mix, wrought alloy, at plant [RER]: 0.02 kg; lognormal SD95 1.33
  (2,5,3,1,1,5); Own measurement

## Sampling procedure
Own weighting of the different parts of the pump.

## Sources
- Jungbluth N., 2007, 2007 - Solar collector systems - Jungbluth, Sachbilanzen von Energiesystemen. Final report No. 6 ecoinvent data v2.0, 6, Swiss Centre for LCI, ESU-services Ltd., Duebendorf, CH
Jungbluth, N. (2007) Sonnenkollektor-Anlagen. Sachbilanzen von Energiesystemen. Final report No. 6 ecoinvent data v2.0. Editors: Dones R.. Volume: 6. Swiss Centre for LCI, PSI. Dübendorf and Villigen, CH.
Type: Measurement on site
Source: CD-ROM
First author: Jungbluth, N.
Year: 2007
Name of editors: Dones R.
Title of anthology: Sachbilanzen von Energiesystemen. Final report No. 6 ecoinvent data v2.0
Place of publication: Dübendorf and Villigen, CH
Publisher: Swiss Centre for LCI, PSI
Volume No: 6

## Validation
Proof reading validation: Passed.; Other validation: none;
