# Nuclear spent fuel, in conditioning, at plant

Dataset: EcoSpold 1, unit process
Functional unit: 1 kg
Category: nuclear waste / unspecified
Geography: CN
Time period: 1999-01 to 2002-12
Generated by: Roberto Dones
accessRestrictedTo: 0
copyright: true

## General comment
Datasets established on tha basis of the modelling for CH. Difference is Chinese electricity mix, own assumption for distance travelled by spent fuel and steel using CN (coal) freight train transport.This plant is hypothesized at the same site of the repository. As first approximation the welding of lid and bottom of the canister is described with the ecoinvent module with double lenght. Electricity use is estimated hypothesizing 50 m total movement of the canister within the plant. The total spent fuel to condition is assumed to be 1800 t heavy metal, complying with the current (around 2003) Swiss scenario. This dataset has been developed with the goal to serve a preliminary estimation of the Chinese nuclear chain for the Chinese electricity mix. Hence, it cannot be used for comparisons of conditioning among countries.;

## Included processes
It includes transport of spent fuel elements and steel for canister, requirement of steel for canisters, steel welding, electricity consumption, and infrastructure requirement.

## Geography
Swiss conditions adapted to China.

## Technology
Estimation of current technologies

## Reference product
- Nuclear spent fuel, in conditioning, at plant [CN]: 1 kg
  CHINA

## Inputs from technosphere
- Radioactive waste, in final repository for nuclear waste SF, HLW, and ILW [CH]: 0.0023 m3; lognormal SD95 1.15
  uncertainty from dimension of container & content of U in heavy metal
- Chromium steel 18/8, at plant [RER]: 15.7 kg; lognormal SD95 1.15
  variation in lenght of canister
- Electricity, medium voltage, at grid [CN]: 0.0024 kWh; lognormal SD95 2
  own assumption
- Transport, freight, lorry, fleet average [RER]: 1.56 tkm; lognormal SD95 3
  own assumptions (2.1 is standard for transports)
- Transport, coal freight, rail [CN]: 32.9 tkm; lognormal SD95 3
  own assumptions (2.1 is standard for transports)
- Nuclear spent fuel conditioning plant [CN]: 5.56e-7 p; lognormal SD95 2
  uncertainty in the scenario
- Welding, arc, steel [RER]: 0.008 m; lognormal SD95 3
  own assumption

## Sampling procedure
Literature

## Sources
- Dones R., Bauer C., Doka G., 2009, 2009 - Nuclear energy - Dones, Sachbilanzen von Energiesystemen. Final report No. 6 ecoinvent v2.1, 6, Swiss Centre for LCI, PSI, Doka LCA, Duebendorf and Villigen, CH
Dones, R., Doka G. (2009) Kernenergie. Sachbilanzen von Energiesystemen. Final report No. 6 ecoinvent v2.1. Editors: Bauer C.. Volume: 6. Swiss Centre for LCI, PSI. Dübendorf and Villigen, CH.
Type: Measurement on site
Source: CD-ROM
First author: Dones, R.
Other authors: Doka G.
Year: 2009
Name of editors: Bauer C.
Title of anthology: Sachbilanzen von Energiesystemen. Final report No. 6 ecoinvent v2.1
Place of publication: Dübendorf and Villigen, CH
Publisher: Swiss Centre for LCI, PSI
Volume No: 6

## Validation
Proof reading validation: passed; Other validation: none;
