# Electricity, at cogen 300kWth, natural gas, allocation exergy

Dataset: EcoSpold 1, unit process
Functional unit: 1 kWh
Category: electricity by fuel / natural gas\cogeneration
Geography: CH
Time period: 2015-01 to 2020-12
Generated by: Thomas Kaegi
accessRestrictedTo: 0
copyright: true

## General comment
Inventory for 1 MJ heat from natural gas, burned in a cogeneration unit with a capacity of 300 kWth. The multioutput process "natural gas, burned in cogen 300kWth delivers the coproducts "heat, at cogen 300kWth, natural gas, allocation exergy" and "electricity, at cogen 300kWth, natural gas, allocation exergy". The energy efficiency is 38% for electricity and 49% for heat. The exergy factor is 1 for ectricity and 0.170 for heat. This leads to the allocation factor of 0.82 for electricity an 0.18 for heat.;

## Included processes
Included are the natural gas burning in a 300 kWth cogen unit which in turn includes fuel input, infrastructure (boiler), air and water emissions and electrictiy needed for operation. The efficiency and allocation according to exergy is considered

## Geography
Data apply to the combustion in Switzerland.

## Technology
efficiency of average technology available on the market

## Time period
Time of publications.

## Reference product
- Electricity, at cogen 300kWth, natural gas, allocation exergy [CH]: 1 kWh
  SWITZERLAND

## Inputs from technosphere
- Natural gas, burned in cogen 300kWth [CH]: 7.8467 MJ; lognormal SD95 1.2077
  (1,1,1,1,1,5,BU:1.05); ;

## Sampling procedure
Data from literature

## Sources
- Kaegi T., Waldburger L., Kern C., Roberts G., Zschokke M., Conte F., Weber L., 2021, 2021 - LCI heating systems - Kaegi, Carbotech im Auftrag des BAFU, Carbotech AG, Zuerich, CH
Kägi Thomas, Livia Waldburger, Cyril Kern, Gavin Roberts, Mischa Zschokke, Flora Conte, Lea Weber (2020) LCI of heating systems. Carbotech im Auftrag des BAFU. Carbotech AG. Zürich. CH.
Type: Separate publication
Source: Report
First author: Kägi Thomas
Other authors: Livia Waldburger, Cyril Kern, Gavin Roberts, Mischa Zschokke, Flora Conte, Lea Weber
Year: 2020
Title of anthology: Carbotech im Auftrag des BAFU
Place of publication: Zürich. CH
Publisher: Carbotech AG

## Validation
Proof reading validation: 14.09.2020; Other validation: Z:\Schreibtisch\WinShare\BAFU Heizsysteme\_A-Konvertieren\BHKW\[EcoSpold_heat natural gas cogen300kw_v0.1.xlsx]X-Process;
