# xx Grass from meadow intensive, organic, at field

Dataset: EcoSpold 1, unit process
Functional unit: 1 kg
Category: material, obsolete / agricultural, obsolete\plant production, obsolete
Geography: CH
Time period: 2000-01 to 2004-12
Generated by: Fredy Dinkel
accessRestrictedTo: 0
copyright: true

## General comment
Refers to 1 kg dry matter of fresh gras from intensive organic production with 1.66 kg CO2 and 17.9 MJ per kg dry matter. The dry matter content of fresh gras is about 10-15%;

## Included processes
The inventories include the cultivation of gras on a temporary meadow. Included steps are soil cultivation, fertilisation (cattle slurry and manure), harvest, loading for transport.

## Geography
Refers to a production in the Swiss plateau (lowlands <700m).

## Technology
Intensive organic production.

## Reference product
- xx Grass from meadow intensive, organic, at field [CH]: 1 kg
  SWITZERLAND

## Inputs from technosphere
- Sowing [CH]: 2.8986e-5 ha; lognormal SD95 1.2165
  (2,2,1,1,3,1); Cultivation of soil as in Hersener et al. 1997, assumed cultivation time 3 years.
- Fodder loading, by self-loading trailer [CH]: 0.056 m3; lognormal SD95 1.2165
  (2,2,1,1,3,1); Calculation with 120 kg/m3 and dry matter content 15% at harvest (=0.056 m3/kg DM)
- Transport, freight, lorry, 3.5t gross weight, fleet average [CH]: 1.7391e-5 tkm; lognormal SD95 2.0517
  (2,2,1,1,1,5); As in Nemecek et al. (2004), transport distances for seed 15 km from storehouse
- Grass seed organic, at regional storehouse [CH]: 0.0011594 kg; lognormal SD95 1.0907
  (2,2,1,1,1,3); As in Hersener et al. (1997), 40 kg/ha. Assumed cultivation time 3 years
- Tillage, cultivating, chiselling [CH]: 2.8986e-5 ha; lognormal SD95 1.2165
  (same comment as for Sowing)
- Tillage, harrowing, by rotary harrow [CH]: 2.8986e-5 ha; lognormal SD95 1.2165
  (same comment as for Sowing)
- Slurry spreading, by vacuum tanker [CH]: 0.006087 m3; lognormal SD95 1.2165
  (2,2,1,1,3,1); Amount N corresponding to the fertilization recommendations in Walter et al. (2004). Portion of slurry and manure as for hay from natural intensive meadow in ecoinvent report No.15 (Nemecek et al. 2004). Initial fertilization of slurry before seeding considered addtionally.
- Mowing, by rotary mower [CH]: 0.00043478 ha; lognormal SD95 1.2152
  (2,1,1,1,1,5); 4-6 harvests (Walter et al. 2004), 5 harvests assumed
- Solid manure loading and spreading, by hydraulic loader and spreader [CH]: 0.86957 kg; lognormal SD95 1.2165
  (same comment as for Slurry spreading, by vacuum tanker)
- Tillage, rolling [CH]: 2.8986e-5 ha; lognormal SD95 1.2165
  (same comment as for Sowing)

## Inputs from nature
- Transformation, to arable, organic [resources, land]: 0.28986 m2; lognormal SD95 2.0483
  (4,2,1,1,1,1); Calculation for one ha with a cultivation time of 3 years and a netto yield of 11'500 kg DM/year. (Experts assumption R. Tschachtli, LBBZ, 2005: cultivation time of 2-3 years in regions high arable use, 3-4 years in regions with low arable use ). Assumption all area used as arable land after use as meadow.
- Transformation, from pasture, man made, intensive [resources, land]: 0.086957 m2; lognormal SD95 2.0483
  (4,2,1,1,1,1); Calculation for one ha with a cultivation time of 3 years and a netto yield of 11'500 kg DM/year (experts assumption R. Tschachtli, LBBZ, 2005: cultivation time of 2-3 years in regions high arable use, 3-4 years in regions with low arable use ). Assumption 30% of area used as meadow before and 70% as arable land.
- Occupation, pasture, man made, intensive [resources, land]: 0.86957 m2a; lognormal SD95 1.5095
  (2,2,1,1,1,3); Cultivation of a hectare over one year with a yield of 11500 kg DM per year.
- Energy, gross calorific value, in biomass [resources, biotic]: 17.9 MJ; lognormal SD95 1.0907
  (2,1,1,3,1,3); Calculation with 17.9 MJ/kg DM (Nemecek et al. 2004, Tab. 4.7))
- Carbon dioxide, in air [resources, in air]: 1.6594 kg; lognormal SD95 1.0907
  (2,1,1,3,1,3); Calculation with uptake of 0.453 kg carbon per kg DM grass (Maier et al. 1998), which equals a total amount of 1.661 kg CO2 / kg DM grass. A correction of -0.00162 kg CO2 is considered for the input within grass seeds.
- Transformation, from arable, organic [resources, land]: 0.2029 m2; lognormal SD95 2.0483
  (same comment as for Transformation, from pasture, man made, intensive)

## Emissions to nature
- Lead [emissions to soil, agricultural]: -1.9857e-6 kg; lognormal SD95 1.6367
  (2,1,4,3,3,4); Calculation input - output bilance using data about metal content of grass, seed and fertilizers summarized in Nemecek et al. (2004)
- Cadmium [emissions to soil, agricultural]: -6.5038e-8 kg; lognormal SD95 1.6367
  (same comment as for Lead)
- Nickel [emissions to soil, agricultural]: -1.824e-7 kg; lognormal SD95 1.6367
  (same comment as for Lead)
- Nitrogen oxides [emissions to air, low. pop.]: 7.1693e-5 kg; lognormal SD95 1.7962
  (2,1,3,3,4,3); Formula as in ecoinvent report No. 15, chapter 4.4 (Nemecek et al. 2004)
- Phosphate [emissions to water, groundwater]: 1.5405e-5 kg; lognormal SD95 1.8071
  (2,2,3,3,4,4); Formula as in ecoinvent report No. 15, chapter 4.4 (Nemecek et al. 2004)
- Nitrate [emissions to water, groundwater]: 0.0059648 kg; lognormal SD95 1.8071
  (2,2,3,3,4,4); Formula as in ecoinvent report No. 15, chapter 4.4 (Nemecek et al. 2004)
- Phosphate [emissions to water, river]: 5.3238e-5 kg; lognormal SD95 1.8071
  (2,2,3,3,4,4); Formula as in ecoinvent report No. 15, chapter 4.4 (Nemecek et al. 2004)
- Mercury [emissions to soil, agricultural]: -1.0696e-8 kg; lognormal SD95 1.6367
  (same comment as for Lead)
- Ammonia [emissions to air, low. pop.]: 0.0038927 kg; lognormal SD95 1.5846
  (2,1,3,3,4,3); Formula as in ecoinvent report No. 15, chapter 4.4 (Nemecek et al. 2004)
- Phosphorus [emissions to water, river]: 2.6852e-5 kg; lognormal SD95 1.8071
  (2,2,3,3,4,4); Formula as in ecoinvent report No. 15, chapter 4.4 (Nemecek et al. 2004)
- Copper [emissions to soil, agricultural]: 2.1346e-6 kg; lognormal SD95 1.6367
  (same comment as for Lead)
- Dinitrogen monoxide [emissions to air, low. pop.]: 0.0003414 kg; lognormal SD95 1.7962
  (2,1,3,3,4,3); Formula as in ecoinvent report No. 15, chapter 4.4 (Nemecek et al. 2004)
- Zinc [emissions to soil, agricultural]: 9.1478e-6 kg; lognormal SD95 1.6367
  (same comment as for Lead)
- Chromium [emissions to soil, agricultural]: 2.6779e-7 kg; lognormal SD95 1.6367
  (same comment as for Lead)

## Sampling procedure
Data were compiled from statistics, fertilising recommendations, documents from extension services and expert knowledge.

## Sources
- Jungbluth N., Chudacoff M., Dauriat A., Dinkel F., Doka G., Faist Emmenegger M., Gnansounou E., Kljun N., Spielmann M., Stettler C., Sutter J., 2007, 2007 - LCI bioenergy - Jungbluth, Final report ecoinvent data v2.0, 17, Swiss Centre for LCI, ESU-services Ltd., Duebendorf and Uster, CH
Jungbluth N., Chudacoff M., Dauriat A., Dinkel F., Doka G., Faist Emmenegger M., Gnansounou E., Kljun N., Spielmann M., Stettler C., Sutter J. (2007) Life Cycle Inventories of Bioenergy. Final report ecoinvent data v2.0. Volume: 17. Swiss Centre for LCI, ESU. Duebendorf and Uster, CH.
Type: Measurement on site
Source: CD-ROM
First author: Jungbluth N.
Other authors: Chudacoff M., Dauriat A., Dinkel F., Doka G., Faist Emmenegger M., Gnansounou E., Kljun N., Spielmann M., Stettler C., Sutter J.
Year: 2007
Title of anthology: Final report ecoinvent data v2.0
Place of publication: Duebendorf and Uster, CH
Publisher: Swiss Centre for LCI, ESU
Volume No: 17

## Validation
Proof reading validation: Passed.; Other validation: none;
