# xx Grass silage organic, at farm

Dataset: EcoSpold 1, unit process
Functional unit: 1 kg
Category: material, obsolete / agricultural, obsolete\plant production, obsolete
Geography: CH
Time period: 2000-01 to 2004-12
Generated by: Fredy Dinkel
accessRestrictedTo: 0
copyright: true

## General comment
Refers to 1 kg dry matter of grass silage from intensive organic production with 1.65 kg CO2 and an average of 18.3 MJ per kg dry matter (17.9 MJ/kg DM for intensive and 18.9 MJ/kg DM for extensive) . The dry matter content of grass silage is about 35%;

## Included processes
The inventories include the organic production of grass for silage from 40% natural intensive meadows, 40% natural extensive meadows and 20% temporary meadows. Included steps are soil cultivation, fertilisation (slurry and manure), harvest, baling, loading and transport.

## Geography
Refers to a production in the Swiss plateau (lowlands <700m).

## Technology
Intensive and extnesive ogranic production.

## Reference product
- xx Grass silage organic, at farm [CH]: 1 kg
  SWITZERLAND

## Inputs from technosphere
- Mowing, by rotary mower [CH]: 0.00046639 ha; lognormal SD95 1.2165
  (2,2,1,1,3,1); Calculation from inventories of intensive natural meadows (portion 40%), extensive natural meadows (portion 40%) and intensive temporary meadows (20%). Silage loss about 10%.
- Slurry spreading, by vacuum tanker [CH]: 0.0052126 m3; lognormal SD95 1.2165
  (same comment as for Mowing, by rotary mower)
- Loading bales [CH]: 0.0057143 p; lognormal SD95 1.3078
  (2,2,1,3,3,5); Number of bales calculated with 175 kg DM per unit
- Transport, freight, lorry, 3.5t gross weight, fleet average [CH]: 5.487e-6 tkm; lognormal SD95 2.0517
  (2,2,1,1,1,5); Calculation from inventories of intensive natural meadows (portion 40%), extensive natural meadows (portion 40%) and intensive temporary meadows (20%). Silage loss about 10%.
- Baling [CH]: 0.0057143 p; lognormal SD95 1.3078
  (2,2,1,3,3,5); Calculation with 175 kg DM per unit
- Grass seed IP, at regional storehouse [CH]: 0.0003658 kg; lognormal SD95 1.0907
  (2,2,1,1,1,3); Calculation from inventories of intensive natural meadows (portion 40%), extensive natural meadows (portion 40%) and intensive temporary meadows (20%). Silage loss about 10%.
- Tillage, rolling [CH]: 9.1449e-6 ha; lognormal SD95 1.2165
  (same comment as for Mowing, by rotary mower)
- Solid manure loading and spreading, by hydraulic loader and spreader [CH]: 0.82305 kg; lognormal SD95 1.2165
  (same comment as for Mowing, by rotary mower)
- Transport, freight, lorry, fleet average [CH]: 0.0015 tkm; lognormal SD95 1.2165
  (2,2,1,1,1,5); Transport distance of bales 1.5 km from the field to the farm
- Swath, by rotary windrower [CH]: 0.00046639 ha; lognormal SD95 1.2165
  (2,2,1,1,1,5); Short drying to reduce water content from 85% to 65% for silage production (4-5 harvest for intensive meadows, 1 harvest for extensive meadows)
- Haying, by rotary tedder [CH]: 0.00046639 ha; lognormal SD95 1.2165
  (same comment as for Swath, by rotary windrower)
- Sowing [CH]: 9.1449e-6 ha; lognormal SD95 1.2165
  (same comment as for Mowing, by rotary mower)
- Tillage, harrowing, by rotary harrow [CH]: 9.1449e-6 ha; lognormal SD95 1.2165
  (same comment as for Mowing, by rotary mower)
- Tillage, cultivating, chiselling [CH]: 9.1449e-6 ha; lognormal SD95 1.2165
  (same comment as for Mowing, by rotary mower)

## Inputs from nature
- Energy, gross calorific value, in biomass [resources, biotic]: 18.3 MJ; lognormal SD95 1.0907
  (2,1,1,3,1,3); Calculation from inventories of intensive natural meadows (portion 40%), extensive natural meadows (portion 40%) and intensive temporary meadows (20%). Silage loss about 10%.
- Carbon dioxide, in air [resources, in air]: 1.661 kg; lognormal SD95 1.0907
  (same comment as for Energy, gross calorific value, in biomass)
- Transformation, to pasture, man made, intensive [resources, land]: 0.027435 m2; lognormal SD95 2.0483
  (4,2,1,1,1,1); Calculation from inventories of intensive natural meadows (portion 40%), extensive natural meadows (portion 40%) and intensive temporary meadows (20%). Silage loss about 10%.
- Transformation, from pasture and meadow, organic [resources, land]: 0.010974 m2; lognormal SD95 2.0483
  (same comment as for Transformation, to pasture, man made, intensive)
- Transformation, to pasture and meadow, organic [resources, land]: 0.010974 m2; lognormal SD95 2.0483
  (same comment as for Transformation, to pasture, man made, intensive)
- Transformation, to arable, organic [resources, land]: 0.091449 m2; lognormal SD95 2.0483
  (same comment as for Transformation, to pasture, man made, intensive)
- Transformation, from arable, organic [resources, land]: 0.064015 m2; lognormal SD95 2.0483
  (same comment as for Transformation, to pasture, man made, intensive)
- Transformation, from pasture, man made, intensive [resources, land]: 0.05487 m2; lognormal SD95 2.0483
  (same comment as for Transformation, to pasture, man made, intensive)
- Occupation, pasture, man made, organic [resources, land]: 0.5487 m2a; lognormal SD95 1.5051
  (2,2,1,1,1,1); Calculation from inventories of intensive natural meadows (portion 40%), extensive natural meadows (portion 40%) and intensive temporary meadows (20%). Silage loss about 10%.
- Occupation, pasture, man made, intensive [resources, land]: 0.82305 m2a; lognormal SD95 1.6175
  (4,2,1,1,1,5); Calculation from inventories of intensive natural meadows (portion 40%), extensive natural meadows (portion 40%) and intensive temporary meadows (20%). Silage loss about 10%.

## Emissions to nature
- Copper [emissions to soil, agricultural]: -1.2401e-8 kg; lognormal SD95 1.6367
  (2,1,4,3,3,4); Calculation from inventories of intensive natural meadows (portion 40%), extensive natural meadows (portion 40%) and intensive temporary meadows (20%). Silage loss about 10%.
- Nitrogen oxides [emissions to air, low. pop.]: 6.6454e-5 kg; lognormal SD95 1.8071
  (2,2,3,3,4,4); Calculation from inventories of intensive natural meadows (portion 40%), extensive natural meadows (portion 40%) and intensive temporary meadows (20%). Silage loss about 10%.
- Nitrate [emissions to water, groundwater]: 0.0028502 kg; lognormal SD95 1.8071
  (same comment as for Nitrogen oxides)
- Nickel [emissions to soil, agricultural]: -5.212e-7 kg; lognormal SD95 1.6367
  (same comment as for Copper)
- Dinitrogen monoxide [emissions to air, low. pop.]: 0.00031645 kg; lognormal SD95 1.8071
  (same comment as for Nitrogen oxides)
- Lead [emissions to soil, agricultural]: -2.4871e-6 kg; lognormal SD95 1.6367
  (same comment as for Copper)
- Mercury [emissions to soil, agricultural]: -4.1509e-8 kg; lognormal SD95 1.6367
  (same comment as for Copper)
- Chromium [emissions to soil, agricultural]: 9.0407e-9 kg; lognormal SD95 1.6367
  (same comment as for Copper)
- Zinc [emissions to soil, agricultural]: -6.2551e-7 kg; lognormal SD95 1.6367
  (same comment as for Copper)
- Phosphate [emissions to water, river]: 8.1987e-5 kg; lognormal SD95 1.8071
  (same comment as for Nitrogen oxides)
- Ammonia [emissions to air, low. pop.]: 0.003593 kg; lognormal SD95 1.5967
  (same comment as for Nitrogen oxides)
- Phosphate [emissions to water, groundwater]: 2.0619e-5 kg; lognormal SD95 1.8071
  (same comment as for Nitrogen oxides)
- Phosphorus [emissions to water, river]: 8.9776e-6 kg; lognormal SD95 1.8071
  (same comment as for Nitrogen oxides)
- Cadmium [emissions to soil, agricultural]: -8.5979e-8 kg; lognormal SD95 1.6367
  (same comment as for Copper)

## Sampling procedure
Data were compiled from statistics, fertilising recommendations, documents from extension services and expert knowledge.

## Sources
- Jungbluth N., Chudacoff M., Dauriat A., Dinkel F., Doka G., Faist Emmenegger M., Gnansounou E., Kljun N., Spielmann M., Stettler C., Sutter J., 2007, 2007 - LCI bioenergy - Jungbluth, Final report ecoinvent data v2.0, 17, Swiss Centre for LCI, ESU-services Ltd., Duebendorf and Uster, CH
Jungbluth N., Chudacoff M., Dauriat A., Dinkel F., Doka G., Faist Emmenegger M., Gnansounou E., Kljun N., Spielmann M., Stettler C., Sutter J. (2007) Life Cycle Inventories of Bioenergy. Final report ecoinvent data v2.0. Volume: 17. Swiss Centre for LCI, ESU. Duebendorf and Uster, CH.
Type: Measurement on site
Source: CD-ROM
First author: Jungbluth N.
Other authors: Chudacoff M., Dauriat A., Dinkel F., Doka G., Faist Emmenegger M., Gnansounou E., Kljun N., Spielmann M., Stettler C., Sutter J.
Year: 2007
Title of anthology: Final report ecoinvent data v2.0
Place of publication: Duebendorf and Uster, CH
Publisher: Swiss Centre for LCI, ESU
Volume No: 17

## Validation
Proof reading validation: Passed.; Other validation: none;
