# Disposal, coatings in CRT screens, to municipal waste incineration

Dataset: EcoSpold 1, unit process
Functional unit: 1 kg
Category: waste management / municipal incineration
Geography: CH
Time period: 2004-01 to 2004-12
Generated by: Gabor Doka
accessRestrictedTo: 0
copyright: true

## General comment
This dataset represents the activity of waste disposal of coating from waste cathode ray tube display in a municipal solid waste incinerator (MSWI) Recommended use of this dataset: Only for incineration of LCD module of a LCD screen separated during the recycling of used LCD screens Waste composition (wet, in ppm): H2O 100000; O 44700; H n.a.; C n.a.; S 225000; N n.a.; P n.a.; B n.a.; Cl n.a.; Br n.a.; F n.a.; I n.a.; Ag 3020; As n.a.; Ba 3100; Cd n.a.; Co n.a.; Cr n.a.; Cu 2570; Hg n.a.; Mn n.a.; Mo n.a.; Ni n.a.; Pb n.a.; Sb n.a.; Se n.a.; Sn n.a.; V n.a.; Zn 368000; Be n.a.; Sc n.a.; Sr 248000; Ti n.a.; Tl n.a.; W n.a.; Si n.a.; Fe n.a.; Ca n.a.; Al 5590; K n.a.; Mg n.a.; Na n.a.; Share of carbon in waste that is biogenic 60.4%. Share of metals in waste not oxidised and bulk-recyclable (exclude very small or thin parts) Iron: 0%; Alu: 0%; Copper: 0%. One kg of this waste produces 1.605 kg of slag and 0 kg of residues, which are landfilled. Net energy production: 0MJ/kg electric energy and 0MJ/kg thermal energy. Recovery of metal scrap to recycling: 0g iron scrap, 0g aluminium scrap, 0g copper scrap.;;

## Included processes
Waste incineration from waste reception gate further downstream (excluding transport to the MSWI plant). Waste-specific air and water emisions from incineration, auxiliary material consumption for flue gas cleaning. Short-term emissions to river water and long-term emisisons to ground water from slag compartment (from bottom ash) and residual material landfill (from solidified fly ashes and scrubber slugde). Waste-specific process energy demands for MSWI and net energy generation.

## Geography
Specific to the technology mix encountered in Switzerland in 2010. Well applicable to modern incineration practices in Europe, North America or Japan.

## Technology
average Swiss MSWI plants in 2010 (grate incinerators) with electrostatic precipitator for fly ash (ESP), wet flue gas scrubber and 25% SNCR , 42.77% SCR-high dust , 32.68% SCR-low dust -DeNOx facilities and 0% without Denox (weighted according to mass of burnt waste, representing Swiss average). Efficiency of iron scrap separation from slag : 58%. Efficiency of non-ferrous scrap separation from slag : 31%. Gross electric efficiency technology mix 15.84% and Gross thermal efficiency technology mix 28.51%

## Time period
Waste composition as given in literature reference, theoretical data or other source. Transfer coefficients for modern MSWI.

## Reference product
- Disposal, coatings in CRT screens, to municipal waste incineration [CH]: 1 kg
  SWITZERLAND

## Inputs from technosphere
- Ammonia, liquid, at regional storehouse [CH]: 0.00014114 kg; lognormal SD95 2.0066
  Input to DeNOx stage (100% NH3). uncertainty calculated from uncertainty in average DeNOx input, uncertainty in the share of thermal NOx, uncertainty of nitrogen content in average municipal waste and the uncertainty in nitrogen content in *this* waste.
- Electricity from waste, at municipal waste incineration plant [CH]: 0.050335 kWh; lognormal SD95 1.05
  Net electricity required to incinerate this waste (subsidiesed from high-calorific waste fractions). uncertainty is calculated from uncertainties in waste composition and uncertainties in energy efficiency and the uncertainty in internal energy demand
- Chromium oxide, flakes, at plant [RER]: 1.8047e-7 kg; lognormal SD95 3.8106
  Input to DeNOx stage. uncertainty calculated from uncertainty in average DeNOx input, uncertainty in the share of thermal NOx, uncertainty of nitrogen content in average municipal waste and the uncertainty in nitrogen content in *this* waste.
- Natural gas, burned in industrial furnace 1MW [CH]: 0.026394 MJ; lognormal SD95 2.0066
  Input to DeNOx stage, to heat up flue gas in low-dust SCR. uncertainty calculated from uncertainty in average DeNOx input, uncertainty in the share of thermal NOx, uncertainty of nitrogen content in average municipal waste and the uncertainty in nitrogen content in *this* waste.
- Heat from waste, at municipal waste incineration plant [CH]: 0.19597 MJ; lognormal SD95 1.05
  Net heat required to incinerate this waste (subsidiesed from high-calorific waste fractions). uncertainty is calculated from uncertainties in waste composition and uncertainties in energy efficiency and the uncertainty in internal energy demand
- Process-specific burdens, slag compartment [CH]: 1.6046 kg; lognormal SD95 1.3993
  mass-specific expenditures required for landfilling of bottom ash. uncertainty is calculated from uncertainties in waste composition and transfer coefficients in incinerator
- Slag compartment [CH]: 2.8526e-9 p; lognormal SD95 1.3993
  landfill infrastructure required for landfilling of bottom ash. uncertainty is calculated from uncertainties in waste composition and transfer coefficients in incinerator
- Transport, freight, lorry, 16t-32t gross weight, fleet average [CH]: 0.065574 tkm; lognormal SD95 1.3896
  Transport services to transport incineration residues to landfills and to transport auxilliary inputs of the incinerator plant. uncertainty calculated from uncertainty in average auxiliary material input, the uncertainty of the waste composition of this waste and the uncertainty in generic transportation distances
- Municipal waste incineration plant [CH]: 2.5e-10 p; lognormal SD95 1
  demands per kilogram waste. uncertainty is heeded in the module
- Titanium dioxide, production mix, at plant [RER]: 8.8431e-6 kg; lognormal SD95 3.8106
  Input to DeNOx stage (TiO2 catalyst carrier) uncertainty calculated from uncertainty in average DeNOx input, uncertainty in the share of thermal NOx, uncertainty of nitrogen content in average municipal waste and the uncertainty in nitrogen content in *this* waste.
- Transport, freight, rail [RER]: 0.0006811 tkm; lognormal SD95 1.0598
  (same comment as for Transport, freight, lorry, 16t-32t gross weight, fleet average)

## Emissions to nature
- Strontium [emissions to water, river]: 0.00015617 kg; lognormal SD95 5.7418
  Emissions to water from waste composition and transfer coefficients in incinerator and landfills. uncertainty is calculated from uncertainties in waste composition and transfer coefficients in incinerator and landfills
- Benzene, pentachloro- [emissions to air, high. pop.]: 2.3651e-10 kg; lognormal SD95 1.5
  Incomplete combustion product emitted to air. uncertainty calculated from uncertainty in average operation emissions, and the uncertainty of the flue gas volume from this waste.
- Dioxin, 2,3,7,8 Tetrachlorodibenzo-p- [emissions to air, high. pop.]: 8.9524e-14 kg; lognormal SD95 3
  (same comment as for Benzene, pentachloro-)
- Particulates, < 2.5 um [emissions to air, high. pop.]: 5.3446e-6 kg; lognormal SD95 3
  (same comment as for Benzene, pentachloro-)
- Ammonia [emissions to air, high. pop.]: 1.6595e-7 kg; lognormal SD95 2.2455
  Nitrogen species emitted to air after DeNOx stage. uncertainty calculated from uncertainty in average N-emissions and uncertainty in the share of thermal NOx and the uncertainty in nitrogen content in *this* waste.
- Nitrogen oxides [emissions to air, high. pop.]: 5.2551e-5 kg; lognormal SD95 2.2455
  sum of fuel-Nox and thermal-NOx emitted to air after DeNOx stage. uncertainty calculated from uncertainty in average N-emissions and uncertainty in the share of thermal NOx and the uncertainty in nitrogen content in *this* waste.
- Phenol, pentachloro- [emissions to air, high. pop.]: 1.9494e-11 kg; lognormal SD95 1.5
  (same comment as for Benzene, pentachloro-)
- Barium [emissions to water, river]: 4.7516e-7 kg; lognormal SD95 10.759
  (same comment as for Strontium)
- Silver [emissions to water, groundwater, long-term]: 0.0030199 kg; lognormal SD95 4.2025
  Long-term emissions from landfilling of incineration residues. uncertainty is calculated from uncertainties in waste composition and transfer coefficients in incinerator and landfills.
- Heat, waste [emissions to water, river]: 0.035669 MJ; lognormal SD95 1.0649
  Waste heat generated from heating value of this waste plus any electricity required to process it. uncertainty is calculated from uncertainties in waste composition and uncertainties in energy efficiency and the uncertainty in internal energy demand
- Silver [emissions to water, river]: 1.0485e-7 kg; lognormal SD95 12.66
  (same comment as for Strontium)
- Particulates, > 2.5 um, and < 10um [emissions to air, high. pop.]: 2.6857e-8 kg; lognormal SD95 2
  (same comment as for Benzene, pentachloro-)
- NMVOC, non-methane volatile organic compounds, unspecified origin [emissions to air, high. pop.]: 2.0372e-6 kg; lognormal SD95 1.5
  (same comment as for Benzene, pentachloro-)
- Sulfate [emissions to water, groundwater, long-term]: 0.61344 kg; lognormal SD95 1.6169
  (same comment as for Silver)
- Aluminium [emissions to water, river]: 7.3447e-8 kg; lognormal SD95 13.177
  (same comment as for Strontium)
- Copper [emissions to water, groundwater, long-term]: 0.0025699 kg; lognormal SD95 4.323
  (same comment as for Silver)
- Copper [emissions to water, river]: 8.9228e-8 kg; lognormal SD95 12.865
  (same comment as for Strontium)
- Zinc [emissions to water, groundwater, long-term]: 0.36799 kg; lognormal SD95 1.3945
  (same comment as for Silver)
- Carbon monoxide, fossil [emissions to air, high. pop.]: 3.0126e-5 kg; lognormal SD95 5
  (same comment as for Benzene, pentachloro-)
- Toluene [emissions to air, high. pop.]: 8.953e-8 kg; lognormal SD95 1.5
  (same comment as for Benzene, pentachloro-)
- Benzene [emissions to air, high. pop.]: 4.4765e-8 kg; lognormal SD95 1.5
  (same comment as for Benzene, pentachloro-)
- Zinc [emissions to water, river]: 1.0955e-5 kg; lognormal SD95 8.4892
  (same comment as for Strontium)
- Benzene, hexachloro- [emissions to air, high. pop.]: 9.3601e-11 kg; lognormal SD95 1.5
  (same comment as for Benzene, pentachloro-)
- Carbon monoxide, biogenic [emissions to air, high. pop.]: 4.5969e-5 kg; lognormal SD95 5
  (same comment as for Benzene, pentachloro-)
- Methane, fossil [emissions to air, high. pop.]: 2.6584e-7 kg; lognormal SD95 1.5
  (same comment as for Benzene, pentachloro-)
- Benzo(a)pyrene [emissions to air, high. pop.]: 9.9616e-13 kg; lognormal SD95 3
  (same comment as for Benzene, pentachloro-)
- Barium [emissions to water, groundwater, long-term]: 0.0030995 kg; lognormal SD95 4.1831
  (same comment as for Silver)
- Heat, waste [emissions to air, high. pop.]: 0.14554 MJ; lognormal SD95 1.0649
  (same comment as for Heat, waste)
- Aluminium [emissions to water, groundwater, long-term]: 0.0045663 kg; lognormal SD95 3.8163
  (same comment as for Silver)
- Methane, biogenic [emissions to air, high. pop.]: 4.0564e-7 kg; lognormal SD95 1.5
  (same comment as for Benzene, pentachloro-)
- Strontium [emissions to water, groundwater, long-term]: 0.24784 kg; lognormal SD95 1.5683
  (same comment as for Silver)
- Sulfate [emissions to water, river]: 0.061556 kg; lognormal SD95 2.3668
  (same comment as for Strontium)

## Sampling procedure
fully waste-specific calculation based on literature data for average MSWI operation performance

## Extrapolations
Typical elemental transfer coefficients from current studies for modern MSWI, completed with data from coal power plants and estimates, adapted for inert/burnable waste.

## Uncertainty adjustments
uncertainty of waste input composition data derived from generic formula GSD(c) = N*ln(c)+1

## Sources
- Doka G., 2013, 2013 - Updates LCI waste treatment services - Doka, -, Doka LCA, Zuerich, CH
Doka G. (2013) Updates to Life Cycle Inventories of Waste Treatment Services - part II: waste incineration. Doka LCA. Zurich.
Type: Separate publication
Source: Report to document the 2013 changes to the MSWI incinerator model and datasets (URL: http://www.doka.ch/ecoinventMSWIupdateLCI2013.pdf). To be read with the ecoinvent Nr 13 report (Doka 2009, Life Cycle Inventories of Waste Treatment Services) for ecoinvent v2.2.
First author: Doka G.
Year: 2013
Place of publication: Zurich
Publisher: Doka LCA
Original title: Updates to Life Cycle Inventories of Waste Treatment Services - part II: waste incineration

## Validation
Proof reading validation: Passed.; Other validation: none;
