# Maintenance, lorry 40t

Dataset: EcoSpold 1, unit process, infrastructure
Functional unit: 1 p
Category: transport systems / road\operations\infrastructure
Geography: CH
Time period: 2000-01 to 2000-12
Generated by: Michael Spielmann
accessRestrictedTo: 0
copyright: true

## General comment
Data are merely rough estimates based on expert estimates.;

## Included processes
The inventory includes materials used for alteration parts and energy consumption of garages. Rail and road transport of materials is accounted for

## Geography
Data represent Swiss conditions

## Technology
no technologies are specified

## Time period
Data represents conditions of the early 1990ties

## Reference product
- Maintenance, lorry 40t [CH]: 1 p
  SWITZERLAND

## Inputs from technosphere
- Lead, at regional storage [RER]: 210 kg; lognormal SD95 2
  Literature studies. Original data is derived from expert estimates.
- Lubricating oil, at plant [RER]: 1170 kg; lognormal SD95 2
  Literature studies. Original data is derived from expert estimates.
- Sulphuric acid, liquid, at plant [RER]: 79.71 kg; lognormal SD95 2
- Reinforcing steel, at plant [RER]: 1240 kg; lognormal SD95 2
  Literature studies. Original data is derived from expert estimates and comprising steel used in tyres and oil filters, brake shoes, exhaust.
- Transport, freight, lorry, 16t-32t gross weight, fleet average [CH]: 411 tkm; lognormal SD95 2.17
  Literature studies. Original data is derived from expert estimates.
- Transport, freight, rail, electricity with shunting [CH]: 1640 tkm; lognormal SD95 2.17
  Literature studies. Original data is derived from expert estimates.
- Paper, woodfree, uncoated, at regional storage [RER]: 35 kg; lognormal SD95 2
  Literature studies. Original data is derived from expert estimates.
- Light fuel oil, burned in industrial furnace 1MW, non-modulating [RER]: 56700 MJ; lognormal SD95 2
  Literature studies. Original data is derived from expert estimates.
- Polyethylene, HDPE, granulate, at plant [RER]: 142 kg; lognormal SD95 2
  Literature studies. Original data is derived from expert estimates.
- Electricity, low voltage, at grid [CH]: 4430 kWh; lognormal SD95 2
  Literature studies. Original data is derived from expert estimates.
- Synthetic rubber, at plant [RER]: 4210 kg; lognormal SD95 2
  Literature studies. Original data is derived from expert estimates.

## Sampling procedure
data based on expert estimate and further assumption to determine the material consumption.

## Sources
- Spielmann M., Bauer C., Dones R., Tuchschmid M., 2007, 2007 - Transport services - Spielmann, Final report ecoinvent Data v2.0, 14, Swiss Centre for LCI, PSI, ESU-services Ltd., Duebendorf, Villigen and Uster, CH
Spielmann M., Dones R; Bauer C. (2007) Life Cycle Inventories of Transport Services. Final report ecoinvent Data v2.0. Volume: 14. Issue: 0. Swiss Centre for LCI, PSI. Dübendorf and Villigen, CH.
Type: Measurement on site
Source: CD-ROM
First author: Spielmann M.
Other authors: Dones R; Bauer C.
Year: 2007
Title of anthology: Final report ecoinvent Data v2.0
Place of publication: Dübendorf and Villigen, CH
Publisher: Swiss Centre for LCI, PSI
Volume No: 14
Issue No: 0

## Validation
Proof reading validation: passed.; Other validation: none;
