# Metal working factory operation, average heat energy

Dataset: EcoSpold 1, unit process
Functional unit: 1 kg
Category: metals / general manufacturing
Geography: RER
Time period: 2006-01 to 2007-12
Share of production covered: 0 %
Generated by: Roland Steiner
accessRestrictedTo: 0
copyright: true

## General comment
1 kg of this process is needed to produce 1 kg of final product. The data is an estimation based on the average consumption of factories separated into process specific (included in metal working machine operation) and ancillary processes (included here).;

## Included processes
This dataset includes ancillary processes to operate a metal working factory. This encompasses electricity for lighting and general water consumption. Heat energy is from average sources.

## Geography
Average data from several local to global sized companies. The main focus is on Germany and Europe.

## Technology
The companies are expected to cover the whole range of metal working.

## Reference product
- Metal working factory operation, average heat energy [RER]: 1 kg
  Europe

## Inputs from technosphere
All rows: lognormal SD95 1.24
- Tap water, at user [RER]: 12.5 kg
  (1,3,2,1,3,4); average value of factories with different sizes
- Disposal, municipal solid waste, 22.9% water, to municipal incineration [CH]: 0.137 kg
  (1,3,2,1,3,4); average value of factories with different sizes
- Treatment, sewage, to wastewater treatment, class 1 [CH]: 0.0121 m3
  (1,3,2,1,3,4); average value of factories with different sizes
- Natural gas, burned in boiler modulating >100kW [RER]: 0.957 MJ
  (1,3,2,1,3,4); average value of factories with different sizes
- Light fuel oil, burned in industrial furnace 1MW, non-modulating [RER]: 0.363 MJ
  (1,3,2,1,3,4); average value of factories with different sizes
- Disposal, hazardous waste, 25% water, to hazardous waste incineration [CH]: 0.0245 kg
  (1,3,2,1,3,4); average value of factories with different sizes
- Electricity, low voltage, production ENTSO-E, at grid: 0.0509 kWh
  (1,3,2,1,3,4); average value of factories with different sizes
- Heavy fuel oil, burned in industrial furnace 1MW, non-modulating [RER]: 0.00458 MJ
  (1,3,2,1,3,4); average value of factories with different sizes
- Disposal, municipal solid waste, 22.9% water, to sanitary landfill [CH]: 0.00624 kg
  (1,3,2,1,3,4); average value of factories with different sizes

## Emissions to nature
- Heat, waste [emissions to air, high. pop.]: 0.183 MJ; lognormal SD95 1.24
  (1,3,2,1,3,4); due to electricity consumption

## Sources
- Steiner R., Frischknecht R., 2007, 2007 - LCI metal proc. and comp. air supply - Steiner, Final report ecoinvent Data v2.0, 23, Swiss Centre for LCI, ESU-services Ltd., Duebendorf and Uster, CH
Steiner, R., Frischknecht, R. (2007) Life Cycle Inventories of Metal Processing and Compressed Air Supply. Final report ecoinvent Data v2.0. Editors: 0. 0. Volume: 23. Issue: 0. Swiss Centre for LCI, ESU. Dübendorf and Uster, CH.
Type: Measurement on site
Source: CD-ROM
First author: Steiner, R.
Other authors: Frischknecht, R.
Year: 2007
Name of editors: 0
Title of anthology: Final report ecoinvent Data v2.0
Place of publication: Dübendorf and Uster, CH
Publisher: Swiss Centre for LCI, ESU
Journal: 0
Volume No: 23
Issue No: 0
Original title: Life Cycle Inventories of Metal Processing and Compressed Air Supply

## Validation
Proof reading validation: passed; Other validation: none;
