# Transport, barge tanker

Dataset: EcoSpold 1, unit process
Functional unit: 1 tkm
Category: transport systems / ship
Geography: RER
Time period: 2000-01 to 2000-12
Share of production covered: 100 %
Generated by: Annika Messmer
accessRestrictedTo: 0
copyright: true

## General comment
Inventory refers to the entire transport life cycle. Port infrastructure expenditures and environmental interventions are allocated based the yearly throughput. Vessel manufacturing is allocated based on the total kilometric performance (6'921'600km) and its transport performance (2164t/unit). The canal demand is estimated based on the total transport performance on the Rhein (41400000000tkm) and the transport distance of 850km.;

## Included processes
The module calls the modules addressing: production of vessel; construction and land use of port; operation, maintenance and disposal of port. In addition canal construction and maintenance are called. Also included are fuel useage and the emissions of vessel operation.

## Technology
diesel engine technology

## Time period
Time of publications

## Reference product
- Transport, barge tanker [RER]: 1 tkm
  Europe

## Inputs from technosphere
- Port facilities [RER]: 5.2907e-14 p; lognormal SD95 3.0616
  (2,4,1,3,1,5,BU:3); assumed throughput port in Rotterdam: 444733000t per year ; Yearly report, Port Rotterdam 2014
- Operation, maintenance, port [RER]: 5.2907e-12 p; lognormal SD95 3.0616
  (2,4,1,3,1,5,BU:3); assumed throughput port in Rotterdam: 44473300000t per year; Yearly report, Port Rotterdam 2014
- Maintenance, operation, canal [RER]: 2.0531e-5 my; lognormal SD95 3.3302
  (4,4,1,3,4,5,BU:3); assumed total yearly transport performance on the Rhein: 41400000000tkm and a transport distance of 850km; 0
- Canal [RER]: 2.0531e-5 my; lognormal SD95 3.3302
  (4,4,1,3,4,5,BU:3); calculated based on the total yearly transport performance on the Rhein: 41400000000tkm and a transport distance of 850km; Marktbeobachtung 2014 Binnenschifffahrt Europa
- Barge tanker [RER]: 7.0153e-10 p; lognormal SD95 3.0525
  (2,3,1,3,1,5,BU:3); assumed transport distance: 850km and 50 rides a year and a average life time of 33 years; own assumption, ecoinvent report 14, Tremod 2012
- Maintenance, barge [RER]: 7.0153e-10 p; lognormal SD95 3.0947
  (4,3,1,3,1,5,BU:3); ;
- Diesel, at regional storage [RER]: 0.0097 kg; lognormal SD95 1.2435
  (2,4,1,3,1,5,BU:1.05); assumed diesel consumption 8g/tkm for barge ship and 10g/tkm for barge tanker; Tremod 2012

## Emissions to nature
- Heptane [emissions to air, low. pop.]: 3.0518e-7 kg; lognormal SD95 1.6886
  (3,5,2,3,3,5,BU:1.5); emission factor of diesel: 3.15E-2 g/kg diesel; BAFU 2015: Non-road database; EMEP/EEA guidebook 2013, Tab. 3-112
- Nickel [emissions to air, low. pop.]: 8.536e-11 kg; lognormal SD95 5.1616
  (2,5,2,3,3,5,BU:5); emission factor of diesel: 8.80E-9 g/kg diesel; EMEP/EEA guidebook 2013, 1.A.3.b.i-iv, Tab. 3-103
- Zinc [emissions to air, low. pop.]: 1.6859e-8 kg; lognormal SD95 5.1616
  (2,5,2,3,3,5,BU:5); emission factor of diesel: 1.74E-6 g/kg diesel; EMEP/EEA guidebook 2013, 1.A.3.b.i-iv, Tab. 3-103
- Heat, waste [emissions to air, low. pop.]: 0.39964 MJ; lognormal SD95 1.3843
  (2,5,2,3,3,5,BU:1.05); devault value;
- Benzo(a)pyrene [emissions to air, low. pop.]: 7.469e-11 kg; lognormal SD95 3.1507
  (3,5,2,3,3,5,BU:3); emission factor of diesel: 7.70E-6 g/kg diesel; ecoinvent report 14
- Particulates, < 2.5 um [emissions to air, low. pop.]: 1.2893e-5 kg; lognormal SD95 3.1507
  (3,5,2,3,3,5,BU:3); emission factor of diesel: 1.33E+0 g/kg diesel; BAFU 2015: non road database
- Butane [emissions to air, low. pop.]: 1.5259e-7 kg; lognormal SD95 1.6886
  (3,5,2,3,3,5,BU:1.5); emission factor of diesel: 1.57E-2 g/kg diesel; BAFU 2015: Non-road database; EMEP/EEA guidebook 2013, Tab. 3-112
- Acetaldehyde [emissions to air, low. pop.]: 4.6489e-6 kg; lognormal SD95 1.6886
  (3,5,2,3,3,5,BU:1.5); emission factor of diesel: 4.79E-1 g/kg diesel; BAFU 2015: Non-road database; EMEP/EEA guidebook 2013, Tab. 3-112
- Benzaldehyde [emissions to air, low. pop.]: 1.3937e-6 kg; lognormal SD95 1.6886
  (3,5,2,3,3,5,BU:1.5); emission factor of diesel: 1.44E-1 g/kg diesel; BAFU 2015: Non-road database; EMEP/EEA guidebook 2013, Tab. 3-112
- Methane, fossil [emissions to air, low. pop.]: 5.9546e-7 kg; lognormal SD95 1.6886
  (3,5,2,3,3,5,BU:1.5); emission factor of diesel: 6.14E-2 g/kg diesel; BAFU 2015: non road database
- Toluene [emissions to air, low. pop.]: 1.0173e-8 kg; lognormal SD95 1.6886
  (3,5,2,3,3,5,BU:1.5); emission factor of diesel: 1.05E-3 g/kg diesel; BAFU 2015: Non-road database; EMEP/EEA guidebook 2013, Tab. 3-112
- Chromium VI [emissions to air, low. pop.]: 5.82e-13 kg; lognormal SD95 5.1616
  (2,5,2,3,3,5,BU:5); emission factor of diesel: 6.00E-11 g/kg diesel; EMEP/EEA guidebook 2013, 1.A.3.b.i-iv, Tab. 3-103
- Arsenic [emissions to air, low. pop.]: 9.7e-13 kg; lognormal SD95 5.1616
  (2,5,2,3,3,5,BU:5); emission factor of diesel: 1.00E-10 g/kg diesel; EMEP/EEA guidebook 2013, 1.A.3.b.i-iv, Tab. 3-103
- Dinitrogen monoxide [emissions to air, low. pop.]: 1.4967e-6 kg; lognormal SD95 1.6886
  (3,5,2,3,3,5,BU:1.5); emission factor of diesel: 1.54E-1 g/kg diesel; BAFU 2015: non road database
- Acrolein [emissions to air, low. pop.]: 1.8006e-6 kg; lognormal SD95 1.6886
  (3,5,2,3,3,5,BU:1.5); emission factor of diesel: 1.86E-1 g/kg diesel; BAFU 2015: Non-road database; EMEP/EEA guidebook 2013, Tab. 3-112
- Mercury [emissions to air, low. pop.]: 5.141e-11 kg; lognormal SD95 5.1616
  (2,5,2,3,3,5,BU:5); emission factor of diesel: 5.30E-9 g/kg diesel; EMEP/EEA guidebook 2013, 1.A.3.b.i-iv, Tab. 3-103
- NMVOC, non-methane volatile organic compounds, unspecified origin [emissions to air, low. pop.]: 8.2632e-5 kg; lognormal SD95 1.6886
  (3,5,2,3,3,5,BU:1.5); emission factor of diesel: 8.52E+0 g/kg diesel; BAFU 2015: Non-road database; EMEP/EEA guidebook 2013, Tab. 3-112
- Ethane [emissions to air, low. pop.]: 3.0518e-8 kg; lognormal SD95 1.6886
  (3,5,2,3,3,5,BU:1.5); emission factor of diesel: 3.15E-3 g/kg diesel; BAFU 2015: Non-road database; EMEP/EEA guidebook 2013, Tab. 3-112
- Copper [emissions to air, low. pop.]: 2.0564e-10 kg; lognormal SD95 5.1616
  (2,5,2,3,3,5,BU:5); emission factor of diesel: 2.12E-8 g/kg diesel; EMEP/EEA guidebook 2013, 1.A.3.b.i-iv, Tab. 3-103
- Carbon monoxide, fossil [emissions to air, low. pop.]: 0.00020344 kg; lognormal SD95 5.1721
  (3,5,2,3,3,5,BU:5); emission factor of diesel: 2.10E+1 g/kg diesel; BAFU 2015: non road database
- Benzene [emissions to air, low. pop.]: 1.6093e-7 kg; lognormal SD95 3.1507
  (3,5,2,3,3,5,BU:3); emission factor of diesel: 1.66E-2 g/kg diesel; BAFU 2015: non road database
- Formaldehyde [emissions to air, low. pop.]: 8.545e-6 kg; lognormal SD95 1.6886
  (3,5,2,3,3,5,BU:1.5); emission factor of diesel: 8.81E-1 g/kg diesel; BAFU 2015: Non-road database; EMEP/EEA guidebook 2013, Tab. 3-112
- Selenium [emissions to air, low. pop.]: 9.7e-13 kg; lognormal SD95 5.1616
  (same comment as for Arsenic)
- Sulfur dioxide [emissions to air, low. pop.]: 1.94e-7 kg; lognormal SD95 1.3984
  (3,5,2,3,3,5,BU:1.05); emission factor of diesel: 2.00E-2 g/kg diesel; HBEFA 3.1.
- Cadmium [emissions to air, low. pop.]: 8.439e-11 kg; lognormal SD95 5.1616
  (2,5,2,3,3,5,BU:5); emission factor of diesel: 8.70E-9 g/kg diesel; EMEP/EEA guidebook 2013, 1.A.3.b.i-iv, Tab. 3-103
- Chromium [emissions to air, low. pop.]: 2.91e-10 kg; lognormal SD95 5.1616
  (2,5,2,3,3,5,BU:5); emission factor of diesel: 3.00E-8 g/kg diesel; EMEP/EEA guidebook 2013, 1.A.3.b.i-iv, Tab. 3-103
- Nitrogen oxides [emissions to air, low. pop.]: 0.00040113 kg; lognormal SD95 1.6886
  (3,5,2,3,3,5,BU:1.5); emission factor of diesel: 4.14E+1 g/kg diesel; BAFU 2015: non road database
- o-Xylene [emissions to air, low. pop.]: 4.0691e-7 kg; lognormal SD95 1.6886
  (3,5,2,3,3,5,BU:1.5); emission factor of diesel: 4.19E-2 g/kg diesel; BAFU 2015: Non-road database; EMEP/EEA guidebook 2013, Tab. 3-112
- Propane [emissions to air, low. pop.]: 1.0173e-7 kg; lognormal SD95 1.6886
  (3,5,2,3,3,5,BU:1.5); emission factor of diesel: 1.05E-2 g/kg diesel; BAFU 2015: Non-road database; EMEP/EEA guidebook 2013, Tab. 3-112
- Particulates, > 2.5 um, and < 10um [emissions to air, low. pop.]: 5.3082e-7 kg; lognormal SD95 2.1564
  (3,5,2,3,3,5,BU:2); emission factor of diesel: 5.47E-2 g/kg diesel;
- Styrene [emissions to air, low. pop.]: 5.6967e-7 kg; lognormal SD95 1.6886
  (3,5,2,3,3,5,BU:1.5); emission factor of diesel: 5.87E-2 g/kg diesel; BAFU 2015: Non-road database; EMEP/EEA guidebook 2013, Tab. 3-112
- Particulates, > 10 um [emissions to air, low. pop.]: 5.4479e-7 kg; lognormal SD95 1.6886
  (3,5,2,3,3,5,BU:1.5); emission factor of diesel: 5.62E-2 g/kg diesel;
- Pentane [emissions to air, low. pop.]: 6.1036e-8 kg; lognormal SD95 1.6886
  (3,5,2,3,3,5,BU:1.5); emission factor of diesel: 6.29E-3 g/kg diesel; BAFU 2015: Non-road database; EMEP/EEA guidebook 2013, Tab. 3-112
- m-Xylene [emissions to air, low. pop.]: 9.9692e-7 kg; lognormal SD95 1.6886
  (3,5,2,3,3,5,BU:1.5); emission factor of diesel: 1.03E-1 g/kg diesel; BAFU 2015: Non-road database; EMEP/EEA guidebook 2013, Tab. 3-112
- Carbon dioxide, fossil [emissions to air, low. pop.]: 0.030556 kg; lognormal SD95 1.3984
  (3,5,2,3,3,5,BU:1.05); emission factor of diesel: 3.15E+3 g/kg diesel; BAFU 2015: non road database
- Lead [emissions to air, low. pop.]: 5.0537e-10 kg; lognormal SD95 5.1616
  (2,5,2,3,3,5,BU:5); emission factor of diesel: 5.21E-8 g/kg diesel; EMEP/EEA guidebook 2013, 1.A.3.b.i-iv, Tab. 3-103

## Sampling procedure
Sampling Procedure

## Extrapolations
Extrapolations

## Sources
- Messmer A., Frischknecht R., 2016, 2016 - LCI water transport services - Messmer, Project report, 544, treeze Ltd., Uster, CH
Annika Messmer, Rolf Frischknecht (2015) Life cycle inventories of water transport services. Project report. Volume: 544. treeze Ltd.. Uster, CH.
Type: Separate publication
Source: Report
First author: Annika Messmer
Other authors: Rolf Frischknecht
Year: 2015
Title of anthology: Project report
Place of publication: Uster, CH
Publisher: treeze Ltd.
Volume No: 544

## Validation
Proof reading validation: 04.04.2017; Other validation: \\SRV01\ESU-Docs\Projektablage\544 Aktualisierung mobitool\Schiff\Frachtschiff\Ecospold\[544_Binnenschifffahrt_EIV2_v0.5.xlsx]X-Process;
