# xx Gypsum plaster board, at plant

Dataset: EcoSpold 1, unit process
Functional unit: 1 kg
Category: material, obsolete / construction, obsolete\coverings, obsolete
Geography: CH
Time period: 2000-01 to 2000-12
Generated by: Hans-Joerg Althaus
accessRestrictedTo: 0
copyright: true

## General comment
produced 100% from natural gypsum (no FGD). Energy consumption is extrapolated from production of solid gypsum board;

## Included processes
production of board (incl. drying)

## Geography
data for Switzerland

## Technology
Average technology for consumption in Switzerland

## Reference product
- xx Gypsum plaster board, at plant [CH]: 1 kg
  SWITZERLAND

## Inputs from technosphere
- Electricity, medium voltage, at grid [DE]: 0.0937 kWh; lognormal SD95 1.23
  (2,1,2,1,3,3,2)
- Wooden board manufacturing plant, organic bonded boards [RER]: 1.67e-11 p; lognormal SD95 4.25
  (5,5,5,5,5,5,9)
- Transport, freight, lorry, 16t-32t gross weight, fleet average [CH]: 0.3 tkm; lognormal SD95 2.01
  (2,1,2,1,1,3,5)
- Potato starch, at plant [DE]: 0.0029 kg; lognormal SD95 1.09
  (2,1,2,1,1,3,3)
- Tap water, at user [RER]: 0.364 kg; lognormal SD95 1.23
  (2,1,2,1,3,3,4)
- Whitelined chipboard, WLC, at plant [RER]: 0.0484 kg; lognormal SD95 1.09
  (2,1,2,1,1,3,3)
- Stucco, at plant [CH]: 0.811 kg; lognormal SD95 1.09
  (2,1,2,1,1,3,3)
- Silicone product, at plant [RER]: 0.000129 kg; lognormal SD95 1.09
  (2,1,2,1,1,3,3)
- Glass fibre, at plant [RER]: 0.000161 kg; lognormal SD95 1.09
  (2,1,2,1,1,3,3)
- Light fuel oil, burned in industrial furnace 1MW, non-modulating [RER]: 1.36 MJ; lognormal SD95 1.23
  (2,1,2,1,3,3,1)
- Alkylbenzene sulfonate, linear, petrochemical, at plant [RER]: 9.68e-6 kg; lognormal SD95 1.09
  (2,1,2,1,1,3,3)

## Inputs from nature
- Water, unspecified natural origin/m3 [resources, in water]: 0.000182 m3; lognormal SD95 1.23
  (2,1,2,1,3,3,4)

## Emissions to nature
- Heat, waste [emissions to air, low. pop.]: 0.337 MJ; lognormal SD95 1.09
  (2,1,2,1,1,3,13)
- Water [emissions to water, unspecified]: 0.1729 kg; lognormal SD95 2.5196
  (5,5,5,5,5,BU:1.05); All uncertainty-values set to 5.0 by default. Balance of input water

## Sampling procedure
environmental report

## Sources
- Kellenberger D., Althaus H.-J., Jungbluth N., Kuenniger T., Lehmann M., Thalmann P., 2007, 2007 - LCI building products - Kellenberger, Final report ecoinvent data v2.0, 7, Swiss Centre for LCI, Empa - TSL, ESU-services Ltd., Bau- und Umweltchimie, Duebendorf, CH
Kellenberger D., Althaus H.-J., Jungbluth N., Künniger T. (2007) Life Cycle Inventories of Building Products. Final report ecoinvent data v2.0. Volume: 7. Swiss Centre for LCI, Empa - TSL. Dübendorf, CH.
Type: Measurement on site
Source: CD-ROM
First author: Kellenberger D.
Other authors: Althaus H.-J., Jungbluth N., Künniger T.
Year: 2007
Title of anthology: Final report ecoinvent data v2.0
Place of publication: Dübendorf, CH
Publisher: Swiss Centre for LCI, Empa - TSL
Volume No: 7

## Validation
Proof reading validation: passed; Other validation: none;
