# xx Palm methyl ester, production MY, at service station

Dataset: EcoSpold 1, unit process
Functional unit: 1 kg
Category: material, obsolete / fuels, obsolete\biofuels, obsolete
Geography: CH
Time period: 2000-01 to 2000-12
Production volume: Production of biodiesel for use as a fuel was marginal in 2005 in MY
Share of production covered: 0 %
Generated by: Edgard Gnansounou
accessRestrictedTo: 0
copyright: true

## General comment
Inventory refers to the distribution of 1 kg of palm methyl ester (PME) in Switzerland. PME is imported from Malaysia and produced from palm oil. Distribution to the final consumer (service station) including all necessary transports.;
Formula: C17H33O3;
Synonyms: XME, PME, biodiesel, bio-diesel;

## Included processes
This dataset includes the transport of palm (oil) methyl ester (PME) from esterification plants in Malaysia to Switzerland (11700 km by tanker, 500 km by train, 100 km by truck), and distribution to the end user (100 km by rail and 150 km by road). Operation of storage tanks and fuel station is included. Emissions from evaporation and treatment of effluents are also included.

## Geography
Transport to Malaysian harbour (100 km by road), and then oversea to Marseille harbour (11700 km by tanker). Delivery from Marseille to Geneva (500 km by train), and distribution in CH (100 km by rail and 150 km by road). Surveys for distribution mainly for DE and CH.

## Technology
Distribution of fuels

## Reference product
- xx Palm methyl ester, production MY, at service station [CH]: 1 kg
  SWITZERLAND

## Inputs from technosphere
- Transport, freight, rail, electricity with shunting [CH]: 0.10005 tkm; lognormal SD95 2.095
  (4,5,na,na,na,na); Based on ecoinvent Guidelines, standard distances
- Treatment, sewage, to wastewater treatment, class 2 [CH]: 6.89e-7 m3; lognormal SD95 1.2502
  (2,4,1,3,3,3); Used water
- Palm methyl ester, at esterification plant [MY]: 1.0005 kg; lognormal SD95 1.05
  (1,1,1,1,1,1); Product plus losses
- Treatment, rainwater mineral oil storage, to wastewater treatment, class 2 [CH]: 7.5e-5 m3; lognormal SD95 1.3966
  (4,5,3,3,3,na); Treatment of rainwater with pollutants
- Transport, transoceanic tanker [OCE]: 11.706 tkm; lognormal SD95 2.095
  (4,5,na,na,na,na); Assumption, distance to Rotterdam (NL) or Marseille (FR)
- Transport, freight, rail [RER]: 0.50025 tkm; lognormal SD95 2.095
  (4,5,na,na,na,na); Assumption, standard distances
- Transport, freight, lorry, 16t-32t gross weight, fleet average [CH]: 0.15007 tkm; lognormal SD95 2.095
  (4,5,na,na,na,na); Based on ecoinvent Guidelines, standard distances
- Light fuel oil, burned in boiler 100kW, non-modulating [CH]: 0.000621 MJ; lognormal SD95 1.2502
  (2,4,1,3,3,3); Data for fuel distribution (storage and filling station)
- Transport, freight, lorry, fleet average [RER]: 0.10005 tkm; lognormal SD95 2.095
  (4,5,na,na,na,na); Assumption, standard distances
- Disposal, separator sludge, 90% water, to hazardous waste incineration [CH]: 0.000168 kg; lognormal SD95 1.2748
  (2,4,3,3,3,3); Sludge from storage, environmental report and literature
- Regional distribution, oil products [RER]: 2.6205e-10 p; lognormal SD95 3.0584
  (3,na,1,3,3,na); Average data for petrol station
- Electricity, low voltage, at grid [CH]: 0.0067 kWh; lognormal SD95 1.2502
  (2,4,1,3,3,3); Data for fuel distribution (storage and filling station)
- Tap water, at user [CH]: 0.000689 kg; lognormal SD95 1.2502
  (2,4,1,3,3,3); Data for petrol distribution
- Disposal, municipal solid waste, 22.9% water, to sanitary landfill [CH]: 6.27e-6 kg; lognormal SD95 1.2502
  (2,4,1,3,3,3); Environmental report for wastes

## Emissions to nature
- TOC, Total Organic Carbon [emissions to water, river]: 0.00043261 kg; lognormal SD95 1.7026
  (4,5,2,5,3,4); Calculation, according to emissions of oil to soil
- DOC, Dissolved Organic Carbon [emissions to water, river]: 0.00043261 kg; lognormal SD95 1.7026
  (4,5,2,5,3,4); Calculation, according to emissions of oil to soil
- Heat, waste [emissions to air, high. pop.]: 0.02412 MJ; lognormal SD95 1.1376
  (2,4,1,3,1,3); ecoinvent guidelines, calculation from electricity consumption and energy balance
- Oils, biogenic [emissions to soil, industrial]: 0.0005 kg; lognormal SD95 1.7026
  (4,5,2,5,3,4); Losses 0.05% according to product properties
- BOD5, Biological Oxygen Demand [emissions to water, river]: 0.0035 kg; lognormal SD95 1.7026
  (4,5,2,5,3,4); Calculation, according to emissions of oil to soil
- COD, Chemical Oxygen Demand [emissions to water, river]: 0.0035 kg; lognormal SD95 1.7026
  (4,5,2,5,3,4); Calculation, according to emissions of oil to soil

## Sampling procedure
Environmental reports and literature. Calculation of freight distances.

## Sources
- Jungbluth N., Chudacoff M., Dauriat A., Dinkel F., Doka G., Faist Emmenegger M., Gnansounou E., Kljun N., Spielmann M., Stettler C., Sutter J., 2007, 2007 - LCI bioenergy - Jungbluth, Final report ecoinvent data v2.0, 17, Swiss Centre for LCI, ESU-services Ltd., Duebendorf and Uster, CH
Jungbluth N., Chudacoff M., Dauriat A., Dinkel F., Doka G., Faist Emmenegger M., Gnansounou E., Kljun N., Spielmann M., Stettler C., Sutter J. (2007) Life Cycle Inventories of Bioenergy. Final report ecoinvent data v2.0. Volume: 17. Swiss Centre for LCI, ESU. Duebendorf and Uster, CH.
Type: Measurement on site
Source: CD-ROM
First author: Jungbluth N.
Other authors: Chudacoff M., Dauriat A., Dinkel F., Doka G., Faist Emmenegger M., Gnansounou E., Kljun N., Spielmann M., Stettler C., Sutter J.
Year: 2007
Title of anthology: Final report ecoinvent data v2.0
Place of publication: Duebendorf and Uster, CH
Publisher: Swiss Centre for LCI, ESU
Volume No: 17

## Validation
Proof reading validation: Passed.; Other validation: none;
