# xxx Door, inner, wood, at plant

Dataset: EcoSpold 1, unit process
Functional unit: 1 m2
Category: material, obsolete / construction, obsolete\doors, obsolete
Geography: RER
Time period: 1997-01 to 2005-12
Generated by: Martin Lehmann
accessRestrictedTo: 0
copyright: true

## General comment
The dataset can be applied to describe an average room door. The door frame is made of massive wood, the door leaf is made of wood. The lock, door handles and frame joints are fabricated from steel. Data are based on a door of 0.8x2.0 m and scaled to 1m2. 1 m2 of the wooden inner door weighs 27.6 kg. The functional life time for the door frame is 50 years, for the door leaf it is 30 years.
Geography: Data from producers in Switzerland.
Technology: The technology represents average European production.
Version: 2.2

Local category: Bauteile
Local subcategory: Türen

## Included processes
This dataset describes the production of 1m2 (visible area) inner door, including the processes for the installation. Not included are transports from plant to construction site.

## Reference product
- xxx Door, inner, wood, at plant [RER]: 1 m2
  Europe

## Inputs from technosphere
- Diesel, burned in building machine, average [CH]: 2.57 MJ; lognormal SD95 2.05
  composite
- Alkyd paint, white, 60% in H2O, at plant [RER]: 0.844 kg; lognormal SD95 1.22
  (1,3,4,3,1,1,3)
- Sawnwood, hardwood, raw, dried (u=10%), planed, at regional storage [CH]: 0.003537 kg; lognormal SD95 1.22
  (1,3,4,3,1,1,3); Wood input linked to updated supply chain; 0.00000524 m3 converted to kg by using density of 675 kg/m3
- Transport, freight, rail [RER]: 0.0112 tkm; lognormal SD95 2.05
  composite
- Zinc, primary, at regional storage [RER]: 0.00054 kg; lognormal SD95 1.22
  (1,3,4,3,1,1,4)
- Disposal, municipal solid waste, 22.9% water, to municipal incineration [CH]: 0.095 kg; lognormal SD95 1.22
  composite
- Kraft paper, unbleached, at plant [RER]: 0.169 kg; lognormal SD95 1.22
  (1,3,4,3,1,1,4)
- Nylon 66, at plant [RER]: 0.027 kg; lognormal SD95 1.22
  composite
- Polyethylene, LDPE, granulate, at plant [RER]: 0.625 kg; lognormal SD95 1.22
  (1,3,4,3,1,1,4)
- Melamine formaldehyde resin, at plant [RER]: 0.112 kg; lognormal SD95 1.22
  (1,3,4,3,1,1,3)
- Vinyl acetate, at plant [RER]: 0.212 kg; lognormal SD95 1.22
  (1,3,4,3,1,1,3)
- Glass wool mat, at plant [CH]: 0.000287 kg; lognormal SD95 1.22
  composite
- Acrylic dispersion, 65% in H2O, at plant [RER]: 0.187 kg; lognormal SD95 1.22
  (1,3,4,3,1,1,3)
- Disposal, plastics, mixture, 15.3% water, to municipal incineration [CH]: 0.0075 kg; lognormal SD95 1.22
  (1,3,4,3,1,1,6)
- Synthetic rubber, at plant [RER]: 0.156 kg; lognormal SD95 1.22
  (1,3,4,3,1,1,3)
- Wood chips, softwood, wet, measured as dry mass, at sawmill [RER]: 6.7431 kg; lognormal SD95 1.22
  (1,3,4,3,1,1,3); ; density according to ecoinvent v2.2: 169 kg/m3
- Metal working factory [RER]: 1.26e-8 p; lognormal SD95 3.06
  (2,4,1,3,1,5,9)
- Steel, low-alloyed, at plant [RER]: 0.0544 kg; lognormal SD95 1.22
  composite
- Ammonia, liquid, at regional storehouse [RER]: 0.00754 kg; lognormal SD95 1.22
  composite
- Lubricating oil, at plant [RER]: 0.0195 kg; lognormal SD95 1.22
  composite
- Acrylic filler, at plant [RER]: 0.0125 kg; lognormal SD95 1.22
  (1,3,4,3,1,1,3)
- Brazing solder, cadmium free, at plant [RER]: 0.000375 kg; lognormal SD95 1.22
  (1,3,4,3,1,1,3)
- Hardwood, allocation correction, 1 [RER]: -2.19e-5 m3; lognormal SD95 1.22
  (1,3,4,3,1,1,1)
- Natural gas, burned in industrial furnace 1MWth [CH]: 0.0511 MJ; lognormal SD95 1.22
  composite
- Ethylene dichloride, at plant [RER]: 3.67e-5 kg; lognormal SD95 1.22
  (1,3,4,3,1,1,4)
- Urea formaldehyde resin, at plant [RER]: 0.231 kg; lognormal SD95 1.22
  (1,3,4,3,1,1,3)
- Disposal, inert material, 0% water, to sanitary landfill [CH]: 0.00794 kg; lognormal SD95 1.22
  composite
- Transport, freight, lorry, 7.5t-16t gross weight, fleet average [CH]: 4.03 tkm; lognormal SD95 1.93
  composite
- Aluminium, production mix, at plant [RER]: 0.15 kg; lognormal SD95 1.22
  (1,3,4,3,1,1,3)
- Transport, freight, lorry, 32t-40t gross weight, fleet average [CH]: 6.28 tkm; lognormal SD95 2.05
  composite
- Wheat IP, at feed mill [CH]: 0.0569 kg; lognormal SD95 1.22
  (1,3,4,3,1,1,4)
- Disposal, polyethylene, 0.4% water, to municipal incineration [CH]: 0.625 kg; lognormal SD95 1.22
  (1,3,4,3,1,1,6)
- Sawnwood, softwood, raw, dried (u=10%), planed, at regional storage [CH]: 18.321 kg; lognormal SD95 1.22
  (1,3,4,3,1,1,3); Wood input linked to updated supply chain; 0.0394 m3 converted to kg by using density of 465 kg/m3
- Disposal, hazardous waste, 25% water, to hazardous waste incineration [CH]: 3.3e-5 kg; lognormal SD95 1.22
  (1,3,4,3,1,1,6)
- Fibreboard, hard, at plant [RER]: 0.00687 m3; lognormal SD95 1.22
  (1,3,4,3,1,1,3)
- Softwood, allocation correction, 1 [RER]: -0.0069 m3; lognormal SD95 1.22
  composite
- Packaging, corrugated board, mixed fibre, single wall, at plant [RER]: 0.00328 kg; lognormal SD95 1.22
  composite
- Hydrochloric acid, 30% in H2O, at plant [RER]: 0.0163 kg; lognormal SD95 1.22
  composite
- Particleboard, uncoated, average glue mix, at regional storage [CH]: 11.584 kg; lognormal SD95 1.22
  (1,3,4,3,1,1,3); Wood input linked to updated supply chain; 0.0181 m3 converted to kg by using density of 640 kg/m3
- Wood chips, from industry, softwood, burned in furnace 1000kW [CH]: 126 MJ; lognormal SD95 1.22
  composite
- Reinforcing steel, at plant [RER]: 0.75 kg; lognormal SD95 1.22
  composite
- Disposal, used mineral oil, 10% water, to hazardous waste incineration [CH]: 0.0025 kg; lognormal SD95 1.22
  (1,3,4,3,1,1,6)
- Zinc coating, pieces [RER]: 0.06 m2; lognormal SD95 1.22
  composite
- Electricity, medium voltage, production ENTSO-E, at grid: 15.3 kWh; lognormal SD95 1.22
  composite
- Anodising, aluminium sheet [RER]: 0.0137 m2; lognormal SD95 1.22
  (1,3,4,3,1,1,3)
- Chemicals organic, at plant [GLO]: 0.00359 kg; lognormal SD95 1.22
  composite
- Acrylic varnish, 87.5% in H2O, at plant [RER]: 0.187 kg; lognormal SD95 1.22
  (1,3,4,3,1,1,3)

## Emissions to nature
- Ethane, 1,2-dichloro- [emissions to air, unspecified]: 3.67e-6 kg; lognormal SD95 2.05
  (1,3,4,3,1,1,23)
- NMVOC, non-methane volatile organic compounds, unspecified origin [emissions to air, unspecified]: 0.000488 kg; lognormal SD95 2.05
  (1,3,4,3,1,1,23)
- Heat, waste [emissions to air, unspecified]: 55.2 MJ; lognormal SD95 1.22
  composite

## Sampling procedure
Published study, Internet search

## Extrapolations
see Geography

## Sources
- Kellenberger D., Althaus H.-J., Jungbluth N., Kuenniger T., Lehmann M., Thalmann P., 2007, 2007 - LCI building products - Kellenberger, Final report ecoinvent data v2.0, 7, Swiss Centre for LCI, Empa - TSL, ESU-services Ltd., Bau- und Umweltchimie, Duebendorf, CH
Kellenberger D., Althaus H.-J., Jungbluth N., Künniger T. (2007) Life Cycle Inventories of Building Products. Final report ecoinvent data v2.0. Volume: 7. Swiss Centre for LCI, Empa - TSL. Dübendorf, CH.
Type: Measurement on site
Source: CD-ROM
First author: Kellenberger D.
Other authors: Althaus H.-J., Jungbluth N., Künniger T.
Year: 2007
Title of anthology: Final report ecoinvent data v2.0
Place of publication: Dübendorf, CH
Publisher: Swiss Centre for LCI, Empa - TSL
Volume No: 7

## Validation
Proof reading validation: passed; Other validation: none;
