# xx Hardwood, allocation correction, 2

Dataset: EcoSpold 1, unit process
Functional unit: 1 m3
Category: material, obsolete / wood, obsolete\extraction, obsolete\allocation corrections, obsolete
Geography: RER
Time period: 2000-01 to 2000-12
Generated by: Hans-Joerg Althaus
accessRestrictedTo: 0
copyright: true

## General comment
This module is used to allocate the propper mass, energy and CO2 uptake from nature for the products for which economic allocation is made
Technology: none
Version: 2.2

Production volume: none
Local category: Holzbaustoffe
Local subcategory: Gewinnung

## Included processes
Includes the wood resource, the CO2 absorption from air and the energy in biomass

## Reference product
- xx Hardwood, allocation correction, 2 [RER]: 1 m3
  Europe

## Inputs from nature
- Carbon dioxide, in air [resources, in air]: 1180 kg; lognormal SD95 1
  calculated correction term
- Energy, gross calorific value, in biomass [resources, biotic]: 12700 MJ; lognormal SD95 1
  calculated correction term
- Wood, hard, standing [resources, biotic]: 1 m3; lognormal SD95 1
  calculated correction term

## Sources
- Werner F., Althaus H.-J., Kuenniger T., Richter K., Jungbluth N., 2007, 2007 - LCI wood as fuel and const. mat. - Werner, Final report ecoinvent data v2.0, 9, Swiss Centre for LCI, Empa - TSL, ESU-services Ltd., Duebendorf, CH
Werner F., Althaus H.-J., Künniger T., Richter K., Jungbluth N. (2007) 1Life Cycle Inventories of Wood as Fuel and Construction Material. Final report ecoinvent data v2.0. Volume: 9. Issue: 0. Swiss Centre for LCI, Empa - TSL. Dübendorf, CH.
Type: Measurement on site
Source: CD-ROM
First author: Werner F.
Other authors: Althaus H.-J., Künniger T., Richter K., Jungbluth N.
Year: 2007
Title of anthology: Final report ecoinvent data v2.0
Place of publication: Dübendorf, CH
Publisher: Swiss Centre for LCI, Empa - TSL
Volume No: 9
Issue No: 0

## Validation
Proof reading validation: passed; Other validation: none;
