# xx Natural gas liquids, from natural gas, helium extraction

Dataset: EcoSpold 1, unit process
Functional unit: 1 kg
Category: material, obsolete / chemicals, obsolete\gases, obsolete
Geography: GLO
Time period: 2000-01 to 2007-12
Share of production covered: 100 %
Generated by: Juergen Sutter
accessRestrictedTo: 0
copyright: true

## General comment
The multioutput-process "natural gas, helium extraction" of delivers the co-products helium, natural gas liquids and sales gas. The allocation is based on mass calculation.;

## Included processes
Extraction of helium from natural gas including materials, energy uses, infrastructure and emissions.

## Geography
The inventory is modelled for the world..

## Technology
Helium extraction from natural gas

## Time period
Time of publications.

## Reference product
- xx Natural gas liquids, from natural gas, helium extraction [GLO]: 1 kg
  Global

## Inputs from technosphere
- Gas motor 206kW [RER]: 2.7822e-8 p; lognormal SD95 3.0189
  (2,1,3,1,1,3); Ullmanns 2004
- Air separation plant [RER]: 7.7056e-10 p; lognormal SD95 3.0909
  (4,5,na,na,na,na); Estimation
- Transport, freight, lorry, fleet average [RER]: 0.12227 tkm; lognormal SD95 2.095
  (4,5,na,na,na,na); Standard distance 100km
- Transport, freight, rail [RER]: 0.73361 tkm; lognormal SD95 2.095
  (4,5,na,na,na,na); Standard distance 600km
- Natural gas, high pressure, at consumer [RER]: 56.2452 MJ; lognormal SD95 1.1358
  (2,1,3,1,1,3); Ullmanns 2004

## Inputs from nature
- Water, cooling, unspecified natural origin/m3 [resources, in water]: 0.0033016 m3; lognormal SD95 1.3001
  (4,5,na,na,na,na); Estimation

## Emissions to nature
- Carbon monoxide, fossil [emissions to air, high. pop.]: 0.00025486 kg; lognormal SD95 5.1037
  (4,5,na,na,na,na); Estimation
- NMVOC, non-methane volatile organic compounds, unspecified origin [emissions to air, high. pop.]: 3.3981e-5 kg; lognormal SD95 1.6169
  (4,5,na,na,na,na); Estimation
- Nitrogen oxides [emissions to air, high. pop.]: 8.4953e-5 kg; lognormal SD95 1.6169
  (4,5,na,na,na,na); Estimation
- Particulates, < 2.5 um [emissions to air, high. pop.]: 8.4953e-6 kg; lognormal SD95 3.0909
  (4,5,na,na,na,na); Estimation
- Dioxin, 2,3,7,8 Tetrachlorodibenzo-p- [emissions to air, high. pop.]: 1.23e-16 kg; lognormal SD95 3.0909
  (4,5,na,na,na,na); Estimation
- Carbon dioxide, fossil [emissions to air, high. pop.]: 0.23787 kg; lognormal SD95 1.3001
  (4,5,na,na,na,na); Estimation
- Heat, waste [emissions to air, high. pop.]: 4.67234 MJ; lognormal SD95 1.1358
  (2,1,3,1,1,3); Calculated from the energy input
- Mercury [emissions to air, high. pop.]: 6.3715e-10 kg; lognormal SD95 5.1037
  (4,5,na,na,na,na); Estimation
- Methane, fossil [emissions to air, high. pop.]: 7.8237e-5 kg; lognormal SD95 1.6169
  (4,5,na,na,na,na); Estimation
- Sulfur dioxide [emissions to air, high. pop.]: 2.3362e-6 kg; lognormal SD95 1.3001
  (4,5,na,na,na,na); Estimation
- Water [emissions to water, unspecified]: 3.13652 kg; lognormal SD95 2.5196
  (5,5,5,5,5,BU:1.05); All uncertainty-values set to 5.0 by default. Balance of input water

## Sampling procedure
Literature data

## Extrapolations
Transports are calculated with standard values.

## Sources
- Sutter J., 2007, 2007 - LCI highly pure chemicals - Sutter, Final report ecoinvent Data v2.0, 19, Swiss Centre for LCI, ETH, Duebendorf and Uster, CH
Sutter, J., 0 (2007) Life Cycle Inventories of Highly Pure Chemicals. Final report ecoinvent Data v2.0. Editors: 0. Volume: 19. Swiss Centre for LCI, ETHZ. Duebendorf and St. Gallen, CH.
Type: Measurement on site
Source: CD-ROM
First author: Sutter, J.
Other authors: 0
Year: 2007
Name of editors: 0
Title of anthology: Final report ecoinvent Data v2.0
Place of publication: Duebendorf and St. Gallen, CH
Publisher: Swiss Centre for LCI, ETHZ
Volume No: 19

## Validation
Proof reading validation: passed.; Other validation: none;
