# Electricity, at cogen 300kWth, biomethane, economic allocation

Dataset: EcoSpold 1, unit process
Functional unit: 1 kWh
Category: electricity by fuel / biomethane\cogeneration
Geography: CH
Time period: 2015-01 to 2020-12
Generated by: Thomas Kaegi
accessRestrictedTo: 0
copyright: true

## General comment
Inventory for 1 MJ heat from biomethane, burned in a cogeneration unit with a capacity of 300 kWth. The multioutput process "biomethane, burned in cogen 300kWth delivers the coproducts "heat, at cogen 300kWth, biomethane, allocation exergy" and "electricity, at cogen 300kWth, biomethane, allocation exergy". The energy efficiency is 38% for electricity and 49% for heat. The economic factor is 0.72 for electricity and 0.28 for heat. This leads to the allocation factor of 0.66 for electricity and 0.34 for heat.;
Synonyms: Strom, ab BHKW 300kWth, Biogas, aufbereitet, ökonomische Allokation;

## Included processes
Included are the biomethane burning in a 300 kWth cogen unit which in turn includes fuel input, infrastructure (boiler), air and water emissions and electrictiy needed for operation. The efficiency and economic allocation is considered

## Geography
Data apply to the combustion in Switzerland.

## Technology
efficiency of average technology available on the market

## Time period
Time of publications.

## Reference product
- Electricity, at cogen 300kWth, biomethane, economic allocation [CH]: 1 kWh
  SWITZERLAND

## Inputs from technosphere
- Biomethane, burned in cogen 300kWth [CH]: 6.3357 MJ; lognormal SD95 1.2077
  (1,1,1,1,1,5,BU:1.05); ;

## Sampling procedure
Data from literature

## Sources
- Kaegi T., Waldburger L., Kern C., Roberts G., Zschokke M., Conte F., Weber L., 2021, 2021 - LCI heating systems - Kaegi, Carbotech im Auftrag des BAFU, Carbotech AG, Zuerich, CH
Kägi Thomas, Livia Waldburger, Cyril Kern, Gavin Roberts, Mischa Zschokke, Flora Conte, Lea Weber (2020) LCI of heating systems. Carbotech im Auftrag des BAFU. Carbotech AG. Zürich. CH.
Type: Separate publication
Source: Report
First author: Kägi Thomas
Other authors: Livia Waldburger, Cyril Kern, Gavin Roberts, Mischa Zschokke, Flora Conte, Lea Weber
Year: 2020
Title of anthology: Carbotech im Auftrag des BAFU
Place of publication: Zürich. CH
Publisher: Carbotech AG

## Validation
Proof reading validation: 19.04.2021; Other validation: Z:\Schreibtisch\WinShare\BAFU Heizsysteme\A zum Konvertieren\[EcoSpold_heat biomethane cogen300kw_v0.1.xlsx]X-Process;
