# Organophosphorus-compounds, at regional storehouse

Dataset: EcoSpold 1, unit process
Functional unit: 1 kg
Category: chemicals / pesticides
Geography: RER
Time period: 1987-01 to 1987-12
Share of production covered: 100 %
Generated by: Juergen Sutter
accessRestrictedTo: 0
copyright: true

## General comment
Production of organophosphorous-compounds including materials, energy uses, infrastructure and emissions.;

## Geography
The inventory is modelled for Europe.

## Technology
pesticides

## Time period
Time of publications

## Reference product
- Organophosphorus-compounds, at regional storehouse [RER]: 1 kg
  Europe

## Inputs from technosphere
- Phosphorus, white, liquid, at plant [RER]: 0.077105 kg; lognormal SD95 1.3765
  (4,5,1,1,1,5); Stoechiometric calculation
- Acetic anhydride, at plant [RER]: 0.13995 kg; lognormal SD95 1.3765
  (4,5,1,1,1,5); Stoechiometric calculation
- Heat, unspecific, in chemical plant [RER]: 8.8262 MJ; lognormal SD95 1.3765
  (4,5,1,1,1,5); Estimation
- Methanol, at plant [GLO]: 0.14258 kg; lognormal SD95 1.3765
  (4,5,1,1,1,5); Stoechiometric calculation
- Sulphuric acid, liquid, at plant [RER]: 0.10174 kg; lognormal SD95 1.3765
  (4,5,1,1,1,5); Stoechiometric calculation
- Sodium chloride, powder, at plant [RER]: 0.03966 kg; lognormal SD95 1.3765
  (4,5,1,1,1,5); Stoechiometric calculation
- Formaldehyde, production mix, at plant [RER]: 0.092812 kg; lognormal SD95 1.3765
  (4,5,1,1,1,5); Stoechiometric calculation
- Nitric acid, 50% in H2O, at plant [RER]: 0.15494 kg; lognormal SD95 1.3765
  (4,5,1,1,1,5); Stoechiometric calculation
- Hydrochloric acid, 30% in H2O, at plant [RER]: 0.1172 kg; lognormal SD95 1.3765
  (4,5,1,1,1,5); Stoechiometric calculation
- Phosphoric acid, industrial grade, 85% in H2O, at plant [RER]: 0.029249 kg; lognormal SD95 1.3765
  (4,5,1,1,1,5); Stoechiometric calculation
- Secondary sulphur, at refinery [RER]: 0.21124 kg; lognormal SD95 1.3765
  (4,5,1,1,1,5); Stoechiometric calculation
- Transport, freight, lorry, fleet average [RER]: 0.84298 tkm; lognormal SD95 2.095
  (4,5,na,na,na,na); Standard distances
- Acetaldehyde, at plant [RER]: 0.12382 kg; lognormal SD95 1.3765
  (4,5,1,1,1,5); Stoechiometric calculation
- Ammonia, liquid, at regional storehouse [RER]: 0.065648 kg; lognormal SD95 1.3765
  (4,5,1,1,1,5); Stoechiometric calculation
- Ethylene oxide, at plant [RER]: 0.15489 kg; lognormal SD95 1.3765
  (4,5,1,1,1,5); Stoechiometric calculation
- Aluminium hydroxide, at plant [RER]: 0.019882 kg; lognormal SD95 1.3765
  (4,5,1,1,1,5); Stoechiometric calculation
- Transport, freight, rail [RER]: 4.3097 tkm; lognormal SD95 2.095
  (4,5,na,na,na,na); Standard distances
- Sodium carbonate from ammonium chloride production, at plant [GLO]: 0.11583 kg; lognormal SD95 1.3765
  (4,5,1,1,1,5); Stoechiometric calculation
- Sodium hydroxide, 50% in H2O, production mix, at plant [RER]: 0.58786 kg; lognormal SD95 1.3765
  (4,5,1,1,1,5); Stoechiometric calculation
- Electricity, medium voltage, production ENTSO-E, at grid: 1.408 kWh; lognormal SD95 1.3765
  (4,5,1,1,1,5); Estimation
- Phenol, at plant [RER]: 0.056575 kg; lognormal SD95 1.3765
  (4,5,1,1,1,5); Stoechiometric calculation
- Sulphur dioxide, liquid, at plant [RER]: 0.024509 kg; lognormal SD95 1.3765
  (4,5,1,1,1,5); Stoechiometric calculation
- Water, decarbonised, at plant [RER]: 0.040529 kg; lognormal SD95 1.3765
  (4,5,1,1,1,5); Stoechiometric calculation
- Phosphorous chloride, at plant [RER]: 0.33639 kg; lognormal SD95 1.3765
  (4,5,1,1,1,5); Stoechiometric calculation
- Chlorine, liquid, production mix, at plant [RER]: 0.30699 kg; lognormal SD95 1.3765
  (4,5,1,1,1,5); Stoechiometric calculation
- Ethanol from ethylene, at plant [RER]: 0.10412 kg; lognormal SD95 1.3765
  (4,5,1,1,1,5); Stoechiometric calculation
- Chemical plant, organics [RER]: 1.6544e-9 p; lognormal SD95 3.0909
  (4,5,na,na,na,na); Estimation

## Inputs from nature
- Water, cooling, unspecified natural origin/m3 [resources, in water]: 0.099265 m3; lognormal SD95 1.3765
  (4,5,1,1,1,5); Estimation

## Emissions to nature
- Aluminium [emissions to water, river]: 0.00067101 kg; lognormal SD95 5.1037
  (4,5,na,na,na,na); Estimation
- Heat, waste [emissions to air, high. pop.]: 5.0688 MJ; lognormal SD95 1.3765
  (4,5,1,1,1,5); Calculated from the electricity input
- Nitrogen oxides [emissions to air, high. pop.]: 0.0026041 kg; lognormal SD95 1.6169
  (4,5,na,na,na,na); Estimation
- Carbon dioxide, fossil [emissions to air, high. pop.]: 0.30065 kg; lognormal SD95 1.3001
  (4,5,na,na,na,na); Estimation
- Ammonia [emissions to air, high. pop.]: 0.00016483 kg; lognormal SD95 1.3713
  (4,5,na,na,na,na); Estimation
- Chloroacetic acid [emissions to air, high. pop.]: 0.00017609 kg; lognormal SD95 1.6169
  (4,5,na,na,na,na); Estimation
- Phosphate [emissions to water, river]: 0.024447 kg; lognormal SD95 1.6169
  (4,5,na,na,na,na); Estimation
- Acetic acid [emissions to water, river]: 0.00098434 kg; lognormal SD95 3.0909
  (4,5,na,na,na,na); Estimation
- Ammonium, ion [emissions to water, river]: 0.0095374 kg; lognormal SD95 1.6169
  (4,5,na,na,na,na); Estimation
- Acetaldehyde [emissions to water, river]: 0.0029778 kg; lognormal SD95 3.0909
  (4,5,na,na,na,na); Estimation
- Phenol [emissions to air, high. pop.]: 0.00011315 kg; lognormal SD95 1.6169
  (4,5,na,na,na,na); Estimation
- Chloride [emissions to water, river]: 0.59266 kg; lognormal SD95 3.0909
  (4,5,na,na,na,na); Estimation
- Methanol [emissions to water, river]: 0.0071574 kg; lognormal SD95 3.0909
  (4,5,na,na,na,na); Estimation
- Acetaldehyde [emissions to air, high. pop.]: 0.00024763 kg; lognormal SD95 1.6169
  (4,5,na,na,na,na); Estimation
- Sodium [emissions to water, river]: 0.36381 kg; lognormal SD95 5.1037
  (4,5,na,na,na,na); Estimation
- Formaldehyde [emissions to air, high. pop.]: 0.00018562 kg; lognormal SD95 1.6169
  (4,5,na,na,na,na); Estimation
- Sulfide [emissions to water, river]: 0.10414 kg; lognormal SD95 1.6169
  (4,5,na,na,na,na); Estimation
- Formaldehyde [emissions to water, river]: 0.0004455 kg; lognormal SD95 3.0909
  (4,5,na,na,na,na); Estimation
- Nitrate [emissions to water, river]: 0.0097066 kg; lognormal SD95 1.6169
  (4,5,na,na,na,na); Estimation
- Phosphorus [emissions to water, river]: 0.0038339 kg; lognormal SD95 1.6169
  (4,5,na,na,na,na); Estimation
- Sulfate [emissions to water, river]: 0.099661 kg; lognormal SD95 1.6169
  (4,5,na,na,na,na); Estimation
- Methanol [emissions to air, high. pop.]: 0.00028516 kg; lognormal SD95 1.6169
  (4,5,na,na,na,na); Estimation
- Phenol [emissions to water, river]: 0.00027156 kg; lognormal SD95 3.0909
  (4,5,na,na,na,na); Estimation
- Chloroacetic acid [emissions to water, river]: 0.00044022 kg; lognormal SD95 3.0909
  (4,5,na,na,na,na); Estimation
- Carbonate [emissions to water, river]: 0.0032783 kg; lognormal SD95 3.0909
  (4,5,na,na,na,na); Estimation
- Acetic acid [emissions to air, high. pop.]: 0.0002799 kg; lognormal SD95 1.6169
  (4,5,na,na,na,na); Estimation
- Ethanol [emissions to air, high. pop.]: 0.0002604 kg; lognormal SD95 1.6169
  (4,5,na,na,na,na); Estimation
- Ethanol [emissions to water, river]: 0.00064523 kg; lognormal SD95 3.0909
  (4,5,na,na,na,na); Estimation
- Sulfur dioxide [emissions to air, high. pop.]: 0.047792 kg; lognormal SD95 1.3001
  (4,5,na,na,na,na); Estimation
- Chlorine [emissions to air, high. pop.]: 0.00092364 kg; lognormal SD95 1.6169
  (4,5,na,na,na,na); Estimation
- Methylamine [emissions to air, high. pop.]: 4.2856e-5 kg; lognormal SD95 1.6169
  (4,5,na,na,na,na); Estimation
- Methylamine [emissions to water, river]: 0.00010285 kg; lognormal SD95 3.0909
  (4,5,na,na,na,na); Estimation
- Hydrogen sulfide [emissions to air, high. pop.]: 7.6322e-5 kg; lognormal SD95 1.6169
  (4,5,na,na,na,na); Estimation
- Water [emissions to water, unspecified]: 94.3017 kg; lognormal SD95 2.5196
  (5,5,5,5,5,BU:1.05); All uncertainty-values set to 5.0 by default. Balance of input water

## Sampling procedure
Literature data

## Extrapolations
Transports and emissions are modelled with standard methods.

## Sources
- Nemecek T., Kaegi T., 2007, 2007 - LCI agricultural prod. systems - Nemecek, Ecoinvent report version 2.0, 15, Swiss Centre for LCI, ART, Duebendorf and Zuerich, CH
Nemecek, T., Kägi, T., Blaser, S. (2007) Life Cycle Inventories of Agricultural Production Systems. Ecoinvent report version 2.0. Editors: 0. Volume: 15. Swiss Centre for LCI, ART. Duebendorf and Zurich, CH.
Type: Measurement on site
Source: CD-ROM
First author: Nemecek, T.
Other authors: Kägi, T., Blaser, S.
Year: 2007
Name of editors: 0
Title of anthology: Ecoinvent report version 2.0
Place of publication: Duebendorf and Zurich, CH
Publisher: Swiss Centre for LCI, ART
Volume No: 15

## Validation
Proof reading validation: Passed.; Other validation: none;
