# Disposal, wood particle board 10% binder 3.5% MF resin as building waste, to municipal waste incineration

Dataset: EcoSpold 1, unit process
Functional unit: 1 kg
Category: waste management / building demolition
Geography: CH
Time period: 2019-01 to 2021-12
Generated by: Daniel Savi
accessRestrictedTo: 0
copyright: true

## Reference product
- Disposal, wood particle board 10% binder 3.5% MF resin as building waste, to municipal waste incineration [CH]: 1 kg
  SWITZERLAND

## Inputs from technosphere
- Disposal, wood and wood materials as construction waste, wood incineration process [CH]: 0.865 kg
- Transport, freight, lorry, 16t-32t gross weight, fleet average [CH]: 0.031 tkm
- Disposal, polyurethane, 0.2% water, to municipal incineration [CH]: 0.1 kg
- Disposal, plastics, mixture, 15.3% water, to municipal incineration [CH]: 0.0413223 kg

## Sources
- Klingler M., Savi D., Doka G., 2019, 2019 - LCA disposal of building materials - Klingler, -, Buero fuer Umweltchemie, Zuerich, CH
M. Klingler (2019) Harmonisierte O¨kobilanzen der Entsorgung von Baustoffen - Fu¨r die Liste der O¨kobilanzdaten im Baubereich. Zürich.

Source: M. Klingler, D. Savi (2019) Harmonisierte O¨kobilanzen der Entsorgung von Baustoffen - Fu¨r die Liste der O¨kobilanzdaten im Baubereich, Büro für Umweltchemie, Zürich
First author: M. Klingler
Year: 2019
Place of publication: Zürich
Original title: Harmonisierte O¨kobilanzen der Entsorgung von Baustoffen - Fu¨r die Liste der O¨kobilanzdaten im Baubereich
