# Wood pellet, measured as dry mass, at plant

Dataset: EcoSpold 1, unit process
Functional unit: 1 kg
Category: wood / wooden materials\new processes\other material
Geography: RER
Time period: 2000-01 to 2016-12
Generated by: default
accessRestrictedTo: 0
copyright: true

## Reference product
- Wood pellet, measured as dry mass, at plant [RER]: 1 kg

## Inputs from technosphere
- Maize starch, at plant [DE]: 0.005 kg; lognormal SD95 1.09356
  Pedigree: (2,3,2,4,1).
- Transport, freight, rail [RER]: 0.11 tkm; lognormal SD95 1.5103
  Pedigree: (1,1,4,5,4).
- Electricity, medium voltage, production ENTSO-E, at grid: 0.096 kWh; lognormal SD95 1.11577
  Pedigree: (2,3,2,4,1).
- Heat, wood pellets, at furnace 50kW [CH]: 0.112 MJ; lognormal SD95 1.11577
  Pedigree: (2,3,2,4,1).
- Wood chips, production mix, wet, measured as dry mass, at forest road & at sawmill [RER]: 0.12 kg; lognormal SD95 1.09356
  Pedigree: (2,3,2,4,1).
- Shavings, softwood, measured as dry mass, at planing mill [RER]: 0.15 kg; lognormal SD95 1.09356
  Pedigree: (2,3,2,4,1).
- Mouse device, optical, with cable, at plant [GLO]: 8e-9 p; lognormal SD95 1.09356
  Pedigree: (2,3,2,4,1).
- Saw dust, production mix, wet, measured as dry mass, at sawmill [RER]: 0.57 kg; lognormal SD95 1.09356
  Pedigree: (2,3,2,4,1).
- Transport, freight, lorry, fleet average [RER]: 0.06 tkm; lognormal SD95 1.5103
  Pedigree: (1,1,4,5,4).
- Shavings, hardwood, measured as dry mass, at planing mill [RER]: 0.15 kg; lognormal SD95 1.09356
  Pedigree: (2,3,2,4,1).
- Disposal, used mineral oil, 10% water, to hazardous waste incineration [CH]: 8.4e-5 kg
- Desktop computer, without screen, at plant [GLO]: 8e-9 p; lognormal SD95 1.09356
  Pedigree: (2,3,2,4,1).
- Lubricating oil, at plant [RER]: 8.4e-5 kg; lognormal SD95 1.11577
  Pedigree: (2,3,2,4,1).
- Wood pellet manufacturing, infrastructure [RER]: 4e-10 p; lognormal SD95 1.09356
  Pedigree: (2,3,2,4,1).
- Wood chips, production mix, wet, measured as dry mass, at forest road & at sawmill [CH]: 0.00987 kg; lognormal SD95 1.09356
  Pedigree: (2,3,2,4,1).
- LCD flat screen, 17 inches, at plant [GLO]: 1.6e-8 p; lognormal SD95 1.09356
  Pedigree: (2,3,2,4,1).
- Keyboard, standard version, at plant [GLO]: 8e-9 p; lognormal SD95 1.09356
  Pedigree: (2,3,2,4,1).
- Packaging film, LDPE, at plant [RER]: 0.00228 kg; lognormal SD95 1.11577
  Pedigree: (2,3,2,4,1).

## Inputs from nature
- Water, river [resources, in water]: 3e-5 m3; lognormal SD95 1.11577
  Pedigree: (2,3,2,4,1).
- Water, process, unspecified natural origin/m3 [resources, unspecified]: 2.55e-5 m3

## Emissions to nature
- Water [emissions to air, unspecified]: 4.5e-6 kg; lognormal SD95 1.36764
  Pedigree: (4,4,4,2,4).
- Water [emissions to water, unspecified]: 0.0285 kg; lognormal SD95 2.5196
  (5,5,5,5,5,BU:1.05); All uncertainty-values set to 5.0 by default. Balance of input water

## Sources
- Werner F., 2017, 2017 - LCI wood and wood based products - Werner, Project Report, 0, Environment & Development, Zuerich, CH
