# Transport, aircraft, passenger, Infrastruktur

Dataset: EcoSpold 1, unit process
Functional unit: 1 personkm
Category: transport systems / civil engineering_transport
Geography: RER
Time period: 2016-01 to 2019-12
Production volume: 243'982'000'000pkm
Share of production covered: 100 %
Generated by: Rolf Frischknecht
accessRestrictedTo: 0
copyright: true

## General comment
Inventory refers to the entire transport life cycle. The avereage aircraft transport operated by Lufthansa Group includes 23.2% short-haul, 13.5% medium-haul and 63.3% long-haul flights. The mix of short-, medium- and long-haul flights is based on information from Lufthansa Group.;

## Included processes
The dataset describes the operation of aircrafts including taxying, take-off and landing covering fuel consumption and operation emissions. Aircraft manufacture and maintenance, airport construction, operation and dismantling are inputs to this dataset

## Technology
Aircraft operation modelled based on passenger aircrafts operated by Lufthansa Group in 2019. The emission profiles distinguish between LTO and cruise.

## Time period
Start date refers to emission factor data. End date refers to year of reporting fuel consumption and transport activities

## Reference product
- Transport, aircraft, passenger, Infrastruktur [RER]: 1 personkm
  Europe

## Inputs from technosphere
- Operation, maintenance, airport [RER]: 2.5459e-11 p; lognormal SD95 2.0646
  (2,4,1,3,1,5,BU:2); ;
- Disposal, airport [RER]: 2.5459e-13 p; lognormal SD95 3.0616
  (2,4,1,3,1,5,BU:3); ;
- Airport [RER]: 2.5459e-13 p; lognormal SD95 3.0616
  (2,4,1,3,1,5,BU:3); Freight: share short-haul: 0.04, share medium-haul: 0.08, share long-haul: 0.88; Geschäftsbericht Lufthansa 2019

## Sampling procedure
fuel consumption is based on corporate data, emission profiles are based on FOEN statistics

## Extrapolations
Allocation between passengers and freight based on weight (average passenger weight between 158kg and 163kg); allocation between booking classes based on seat area.

## Sources
- Messmer A., Frischknecht R., 2016, 2016 - LCI air transport services - Messmer, Project report, 544, treeze Ltd., Uster, CH
Messmer A., Frischknecht R. (2015) Life cycle inventories of air transport services. Project report. Volume: 544. treeze Ltd.. Uster, CH.
Type: Separate publication
Source: Report
First author: Messmer A.
Other authors: Frischknecht R.
Year: 2015
Title of anthology: Project report
Place of publication: Uster, CH
Publisher: treeze Ltd.
Volume No: 544

## Validation
Proof reading validation: 09.03.2021; Other validation: G:\Projekte laufend\735 Aktualisierung Flugtransporte\EcoSpold\[735_aircraftTransport_2021_v0.10.xlsx]X-Process;
