# Flooring, cork parquet, at regional storage

Dataset: EcoSpold 1, unit process
Functional unit: 1 m2
Category: flooring / flooring kbob
Geography: CH
Time period: 2012-01 to 2012-12
Share of production covered: 0 %
Generated by: Matthias Klingler
accessRestrictedTo: 0
copyright: true

## General comment
Durchschnittliches Flächengewicht = 2.2 kg/m2;

## Included processes
Daten aus Ecodevis für Korkbeläge

## Reference product
- Flooring, cork parquet, at regional storage [CH]: 1 m2

## Inputs from technosphere
- Palm oil, at oil mill [MY]: 0.084 kg; lognormal SD95 1.1257
- Polyols, at plant [RER]: 0.107 kg; lognormal SD95 1.1257
- Electricity, medium voltage, production ENTSO-E, at grid: 1.795 kWh; lognormal SD95 1.1257
- Kaolin, at plant [RER]: 0.011 kg; lognormal SD95 1.1257
- Chemicals organic, at plant [GLO]: 0.014 kg; lognormal SD95 1.1257
- Methylene diphenyl diisocyanate, at plant [RER]: 0.044 kg; lognormal SD95 1.1257
- Paraffin, at plant [RER]: 0.005 kg; lognormal SD95 1.1257
- Titanium dioxide, production mix, at plant [RER]: 0.011 kg; lognormal SD95 1.1257
- Acrylic dispersion, 65% in H2O, at plant [RER]: 0.034 kg; lognormal SD95 1.1257
- Transport, freight, rail [RER]: 0.517 tkm; lognormal SD95 1.311
- Cork, raw, at forest road [PT]: 1.857 kg; lognormal SD95 1.1257
- Wooden board manufacturing plant, organic bonded boards [RER]: 1.776e-10 p; lognormal SD95 1.6822
- Transport, freight, lorry, 32t-40t gross weight, fleet average [RER]: 1.204 tkm; lognormal SD95 1.311

## Sources
- Werner F., 2017, 2017 - LCI wood and wood based products - Werner, Project Report, 0, Environment & Development, Zuerich, CH

## Validation
Proof reading validation: 13.03.2013; Other validation: \\SERVER\Users\Admin\Documents\Projekte laufend\297 BAFU Anfragen\Bodenbeläge\[c Ecospold alle Prozesse_v0.2.xlsx]X-Process;
