# xx Hydrochloric acid, 36% in H2O, from reacting propylene and chlorine, at plant

Dataset: EcoSpold 1, unit process
Functional unit: 1 kg
Category: material, obsolete / chemicals, obsolete\acids (inorganic), obsolete
Geography: RER
Time period: 2004-01 to 2004-12
Generated by: Mike Chudacoff
accessRestrictedTo: 0
copyright: true

## General comment
Liquid propene is reacted with gaseous chlorine;

## Included processes
Multi-output process that produces three outputs from the reaction of propylene with chlorine: allyl chloride, hydrochloric acid (36wt%) and 1,3-dichloropropene.

## Geography
RER

## Technology
based on industry data in the US and Europe

## Reference product
- xx Hydrochloric acid, 36% in H2O, from reacting propylene and chlorine, at plant [RER]: 1 kg
  Europe

## Inputs from technosphere
- Chemical plant, organics [RER]: 1.1976e-11 p; lognormal SD95 1.3001
  (4,5,na,na,na,na); infrastructure of a typical plant
- Transport, freight, lorry, fleet average [RER]: 0.004497 tkm; lognormal SD95 1.3001
  (4,5,na,na,na,na); standard trucking distance
- Treatment, sewage, unpolluted, to wastewater treatment, class 3 [CH]: 1.0479e-7 m3; lognormal SD95 1.2102
  (4,2,1,3,1,1); approximation
- Disposal, solvents mixture, 16.5% water, to hazardous waste incineration [CH]: 0.00041916 kg; lognormal SD95 1.2102
  (4,2,1,3,1,1); approximation
- Electricity, medium voltage, production ENTSO-E, at grid: 0.0038024 kWh; lognormal SD95 1.0773
  (2,2,1,3,1,1); literature
- Heat, unspecific, in chemical plant [RER]: 0.065868 MJ; lognormal SD95 1.0773
  (2,2,1,3,1,1); industry source
- Water, completely softened, at plant [RER]: 0.032485 kg; lognormal SD95 1.0773
  (2,2,1,3,1,1); literature
- Propylene, at plant [RER]: 0.020329 kg; lognormal SD95 1.0773
  (2,2,1,3,1,1); literature
- Chlorine, liquid, production mix, at plant [RER]: 0.035599 kg; lognormal SD95 1.0773
  (2,2,1,3,1,1); literature
- Transport, freight, rail [RER]: 0.026946 tkm; lognormal SD95 1.3001
  (4,5,na,na,na,na); standard rail transport distance

## Emissions to nature
All rows: lognormal SD95 1.2102
- COD, Chemical Oxygen Demand [emissions to water, river]: 0.00010479 kg
  (4,2,1,3,1,1); calculation
- Heat, waste [emissions to air, high. pop.]: 0.013772 MJ
  (4,2,1,3,1,1); estimated
- TOC, Total Organic Carbon [emissions to water, river]: 3.8922e-5 kg
  (4,2,1,3,1,1); calculation
- DOC, Dissolved Organic Carbon [emissions to water, river]: 3.8922e-5 kg
  (4,2,1,3,1,1); calculation
- AOX, Adsorbable Organic Halogen as Cl [emissions to water, river]: 4.491e-6 kg
  (4,2,1,3,1,1); calculation
- BOD5, Biological Oxygen Demand [emissions to water, river]: 0.00010479 kg
  (4,2,1,3,1,1); calculation

## Sources
- Jungbluth N., Chudacoff M., Dauriat A., Dinkel F., Doka G., Faist Emmenegger M., Gnansounou E., Kljun N., Spielmann M., Stettler C., Sutter J., 2007, 2007 - LCI bioenergy - Jungbluth, Final report ecoinvent data v2.0, 17, Swiss Centre for LCI, ESU-services Ltd., Duebendorf and Uster, CH
Jungbluth N., Chudacoff M., Dauriat A., Dinkel F., Doka G., Faist Emmenegger M., Gnansounou E., Kljun N., Spielmann M., Stettler C., Sutter J. (2007) Life Cycle Inventories of Bioenergy. Final report ecoinvent data v2.0. Volume: 17. Swiss Centre for LCI, ESU. Duebendorf and Uster, CH.
Type: Measurement on site
Source: CD-ROM
First author: Jungbluth N.
Other authors: Chudacoff M., Dauriat A., Dinkel F., Doka G., Faist Emmenegger M., Gnansounou E., Kljun N., Spielmann M., Stettler C., Sutter J.
Year: 2007
Title of anthology: Final report ecoinvent data v2.0
Place of publication: Duebendorf and Uster, CH
Publisher: Swiss Centre for LCI, ESU
Volume No: 17

## Validation
Proof reading validation: Passed.; Other validation: none;
