# xx Electrode, positive, LiMn2O4, at plant

Dataset: EcoSpold 1, unit process
Functional unit: 1 kg
Category: material, obsolete / electronics, obsolete\devices, obsolete\module, obsolete
Geography: GLO
Time period: 2004-01 to 2004-12
Generated by: Wolfram Scharnhorst
accessRestrictedTo: 0
copyright: true

## General comment
The functional unit represents 1 kg of the positive LiMn2O4 electrode material for the production of LiIo rechargable batteries. Process data is taken mainly from an environmental report of a battery producer as well as from literature. In addition own measurements of sizes and weights of batteries were used.;

## Included processes
(Raw) materials, transport efforts and energy consumption for the production of the positive electrode for LiIo recharable batteries. Neither waste nor emissions to air or water are taken into account.

## Geography
This module relates to the global situation (electricity consumption according to the main producing countries).

## Technology
Construction details as described for LiIo rechargable batteries and manufacturing conditions as documented in the environmental report were adopted.

## Reference product
- xx Electrode, positive, LiMn2O4, at plant [GLO]: 1 kg
  Global

## Inputs from technosphere
- Sheet rolling, aluminium [RER]: 0.14525 kg; lognormal SD95 1.3643
  (4,4,3,3,3,4,3)
- Transport, freight, lorry, fleet average [RER]: 0.69976 tkm; lognormal SD95 2.095
  (4,5,na,na,na,na,5)
- Helium, at plant [GLO]: 5.6022 kg; lognormal SD95 1.4153
  (4,4,4,3,3,4,4)
- Transport, freight, rail [RER]: 3.7808 tkm; lognormal SD95 2.095
  (4,5,na,na,na,na,5)
- N-methyl-2-pyrrolidone, at plant [RER]: 0.28424 kg; lognormal SD95 2.5649
  (5,5,5,5,5,5,4)
- Graphite, at plant [RER]: 0.044444 kg; lognormal SD95 1.0622
  (1,2,2,1,1,1,4)
- Manganese concentrate, at beneficiation [GLO]: 0.82195 kg; lognormal SD95 1.0814
  (2,2,2,2,1,1,4)
- Phosphoric acid, fertiliser grade, 70% in H2O, at plant [GLO]: 0.14525 kg; lognormal SD95 1.3643
  (4,4,3,3,3,4,4)
- Electricity, medium voltage, at grid [CN]: 2.1333 kWh; lognormal SD95 1.2093
  (1,2,1,2,3,1,2)
- Acetylene, at regional storehouse [CH]: 0.022222 kg; lognormal SD95 1.0622
  (1,2,2,1,1,1,4)
- Polyvinylidenchloride, granulate, at plant [RER]: 0.044444 kg; lognormal SD95 1.0622
  (1,2,2,1,1,1,4)
- Electricity, medium voltage, at grid [JP]: 1.4222 kWh; lognormal SD95 1.2093
  (1,2,1,2,3,1,2)
- Copper carbonate, at plant [RER]: 0.032807 kg; lognormal SD95 1.0814
  (2,2,2,2,1,1,4)

## Emissions to nature
- Heat, waste [emissions to air, high. pop.]: 12.8 MJ; lognormal SD95 2.1107
  (2,3,3,2,3,3,31)

## Sampling procedure
Literature, measurements

## Extrapolations
see technology & general comments

## Sources
- Hischier R., Classen M., Lehmann M., Scharnhorst W., 2007, 2007 - LCI electric and electronic equipment - Hischier, Final report ecoinvent Data v2.0, 18, Swiss Centre for LCI, Empa - TSL, Duebendorf and St. Gallen, CH
Hischier R., Classen M., Lehmann M., Scharnhorst W. (2007) Life Cycle Inventories of Electric and Electronic Equipment - Production, Use & Disposal. Final report ecoinvent Data v2.0. Volume: 18. Swiss Centre for LCI, Empa - TSL. Duebendorf and St. Gallen, CH.
Type: Measurement on site
Source: CD-ROM
First author: Hischier R.
Other authors: Classen M., Lehmann M., Scharnhorst W.
Year: 2007
Title of anthology: Final report ecoinvent Data v2.0
Place of publication: Duebendorf and St. Gallen, CH
Publisher: Swiss Centre for LCI, Empa - TSL
Volume No: 18
Original title: Life Cycle Inventories of Electric and Electronic Equipment - Production, Use & Disposal

## Validation
Proof reading validation: passed.; Other validation: none;
