# Disposal, energy saving bulb, inert, 0% water, to municipal incineration

Dataset: EcoSpold 1, unit process
Functional unit: 1 kg
Category: waste management / municipal incineration
Geography: CH
Time period: 2000-01 to 2000-12
Generated by: Gabor Doka
accessRestrictedTo: 0
copyright: true

## General comment
Inventoried waste contains 100% Energiesparlampe Intertes;

## Included processes
waste-specific air and water emisions from incineration, auxiliary material consumption for flue gas cleaning. Short-term emissions to river water and long-term emisisons to ground water from slag compartment (from bottom slag) and residual material landfill (from solidified fly ashes and scrubber slugde). Process energy demands for MSWI.

## Geography
Specific to the technology mix encountered in Switzerland in 2000. Well applicable to modern incineration practices in Europe, North America or Japan.

## Technology
average Swiss MSWI plants in 2000 (grate incinerators) with electrostatic precipitator for fly ash (ESP), wet flue gas scrubber and 29.4% SNCR , 32.2% SCR-high dust , 24.6% SCR-low dust -DeNOx facilities and 13.8% without Denox (by burnt waste, according to Swiss average). Share of waste incinerated in plants with magnetic scrap separation from slag : 50%. Gross electric efficiency technology mix 12.997% and Gross thermal efficiency technology mix 25.57%

## Time period
Waste composition as given in literature reference, theoretical data or other source. Transfer coefficients for modern Swiss MSWI. Emission speciation based on early 90ies data.

## Reference product
- Disposal, energy saving bulb, inert, 0% water, to municipal incineration [CH]: 1 kg
  SWITZERLAND

## Inputs from technosphere
- Electricity from waste, at municipal waste incineration plant [CH]: 0.14377 kWh; lognormal SD95 3.78
  uncertainty is calculated from uncertainties in waste composition and uncertainties in energy efficiency and the uncertainty in internal energy demand
- Slag compartment [CH]: 1.8776e-9 p; lognormal SD95 1.2335
  uncertainty is calculated from uncertainties in waste composition and transfer coefficients in incinerator
- Heat from waste, at municipal waste incineration plant [CH]: 0.83868 MJ; lognormal SD95 1.05
  (same comment as for Electricity from waste, at municipal waste incineration plant)
- Municipal waste incineration plant [CH]: 2.5e-10 p; lognormal SD95 1
  demands per kilogram waste. uncertainty is heeded in the module
- Process-specific burdens, slag compartment [CH]: 1.0561 kg; lognormal SD95 1.2335
  (same comment as for Slag compartment)
- Transport, freight, lorry, 16t-32t gross weight, fleet average [CH]: 0.042246 tkm; lognormal SD95 1.2335
  uncertainty calculated from calculated from uncertainties in waste composition, in transfer coefficients in incinerator, uncertainty in average auxiliary material input, the unertainty of the waste composition of this waste and the uncertainty in generic transportation distances
- Process-specific burdens, municipal waste incineration [CH]: 1 kg; lognormal SD95 1
  demands per kilogram waste. uncertainty is heeded in the module

## Emissions to nature
- Sodium [emissions to water, river]: 0.005588 kg; lognormal SD95 2.9889
  uncertainty is calculated from uncertainties in waste composition and transfer coefficients in incinerator and landfills
- Heat, waste [emissions to air, high. pop.]: 0.44446 MJ; lognormal SD95 1.0649
  (same comment as for Electricity from waste, at municipal waste incineration plant)
- Carbon monoxide, biogenic [emissions to air, high. pop.]: 0.00013465 kg; lognormal SD95 5.01
  (1,3,2,2,1,2) & basic uncertainty of 5; literature data from switzerland and germany adapted to plant age distribution in switzerland
- Chromium VI [emissions to water, groundwater, long-term]: 1.3094e-5 kg; lognormal SD95 51.541
  Long-term emissions from landfilling of incineration residues. uncertainty is calculated from uncertainties in waste composition and transfer coefficients in incinerator and landfills.
- Heat, waste [emissions to water, river]: 0.073108 MJ; lognormal SD95 1.0649
  (same comment as for Electricity from waste, at municipal waste incineration plant)
- Calcium [emissions to water, groundwater, long-term]: 0.051494 kg; lognormal SD95 2.3592
  (same comment as for Chromium VI)
- Aluminium [emissions to water, river]: 4.6906e-7 kg; lognormal SD95 11.084
  (same comment as for Sodium)
- Methane, fossil [emissions to air, high. pop.]: 2.5267e-6 kg; lognormal SD95 1.57
  (2,3,4,2,1,2) & basic uncertainty of 1.5; confidential data from 5 plants in Switzerland and Germany
- Barium [emissions to water, groundwater, long-term]: 3.5695e-5 kg; lognormal SD95 8.1399
  (same comment as for Chromium VI)
- Iron [emissions to water, river]: 1.0978e-6 kg; lognormal SD95 10.491
  (same comment as for Sodium)
- Methane, biogenic [emissions to air, high. pop.]: 3.8554e-6 kg; lognormal SD95 1.57
  (same comment as for Methane, fossil)
- Aluminium [emissions to water, groundwater, long-term]: 0.029162 kg; lognormal SD95 2.6255
  (same comment as for Chromium VI)
- Chloride [emissions to water, groundwater, long-term]: 1.8947e-5 kg; lognormal SD95 6.9347
  (same comment as for Chromium VI)
- Lead [emissions to water, groundwater, long-term]: 0.0052829 kg; lognormal SD95 3.7978
  (same comment as for Chromium VI)
- Iron [emissions to water, groundwater, long-term]: 0.06825 kg; lognormal SD95 2.4719
  (same comment as for Chromium VI)
- Silicon [emissions to water, river]: 9.4753e-6 kg; lognormal SD95 8.4284
  (same comment as for Sodium)
- Chromium VI [emissions to water, river]: 5.7221e-8 kg; lognormal SD95 13.454
  (same comment as for Sodium)
- Copper [emissions to water, groundwater, long-term]: 0.082107 kg; lognormal SD95 2.1093
  (same comment as for Chromium VI)
- Silicon [emissions to water, groundwater, long-term]: 0.0021972 kg; lognormal SD95 119.27
  (same comment as for Chromium VI)
- Antimony [emissions to water, river]: 3.0757e-7 kg; lognormal SD95 11.252
  (same comment as for Sodium)
- Antimony [emissions to water, groundwater, long-term]: 6.6001e-5 kg; lognormal SD95 13.512
  (same comment as for Chromium VI)
- Tin [emissions to water, groundwater, long-term]: 0.0051103 kg; lognormal SD95 3.8174
  (same comment as for Chromium VI)
- Mercury [emissions to water, river]: 4.4876e-6 kg; lognormal SD95 8.4969
  (same comment as for Sodium)
- Copper [emissions to water, river]: 2.8508e-6 kg; lognormal SD95 9.2303
  (same comment as for Sodium)
- Chloride [emissions to water, river]: 0.00012015 kg; lognormal SD95 6.801
  (same comment as for Sodium)
- Barium [emissions to water, river]: 5.4721e-9 kg; lognormal SD95 16.897
  (same comment as for Sodium)
- Sodium [emissions to water, groundwater, long-term]: 0.040202 kg; lognormal SD95 2.433
  (same comment as for Chromium VI)
- Nickel [emissions to water, groundwater, long-term]: 0.00053516 kg; lognormal SD95 5.5838
  (same comment as for Chromium VI)
- Mercury [emissions to water, groundwater, long-term]: 0.00016681 kg; lognormal SD95 6.6016
  (same comment as for Chromium VI)
- Lead [emissions to water, river]: 9.6434e-8 kg; lognormal SD95 12.808
  (same comment as for Sodium)
- Carbon monoxide, fossil [emissions to air, high. pop.]: 8.8246e-5 kg; lognormal SD95 5.01
  (same comment as for Carbon monoxide, biogenic)
- Cadmium [emissions to water, groundwater, long-term]: 1.7841e-5 kg; lognormal SD95 8.8714
  (same comment as for Chromium VI)
- Cadmium [emissions to water, river]: 9.1838e-9 kg; lognormal SD95 16.103
  (same comment as for Sodium)
- Calcium [emissions to water, river]: 0.00022567 kg; lognormal SD95 5.0124
  (same comment as for Sodium)
- Nickel [emissions to water, river]: 3.3721e-7 kg; lognormal SD95 11.139
  (same comment as for Sodium)
- Zinc [emissions to water, groundwater, long-term]: 0.0071418 kg; lognormal SD95 3.5882
  (same comment as for Chromium VI)
- Tin [emissions to water, river]: 8.2199e-8 kg; lognormal SD95 13.019
  (same comment as for Sodium)
- Zinc [emissions to water, river]: 2.126e-7 kg; lognormal SD95 11.811
  (same comment as for Sodium)

## Sampling procedure
waste-specific calculation based on literature data

## Extrapolations
Typical elemental transfer coefficients from current studies for modern MSWI, completed with data from coal power plants and estimates, adapted for inert/burnable waste.

## Uncertainty adjustments
uncertainty of waste input composition data derived from generic formula GSD(c) = N*ln(c)+1

## Sources
- Doka G., 2009, 2009 - LCI waste treatment services - Doka, Final report ecoinvent data v2.0, 13, Swiss Centre for LCI, Doka LCA, Duebendorf and St. Gallen, CH
Doka G. (2007) Life Cycle Inventories of Waste Treatment Services. Final report ecoinvent data v2.0. Volume: 13. Swiss Centre for LCI, Empa - TSL. Dübendorf, CH.
Type: Measurement on site
Source: CD-ROM
First author: Doka G.
Year: 2007
Title of anthology: Final report ecoinvent data v2.0
Place of publication: Dübendorf, CH
Publisher: Swiss Centre for LCI, Empa - TSL
Volume No: 13
