# Connector, computer, peripherical type, at plant

Dataset: EcoSpold 1, unit process
Functional unit: 1 kg
Category: electronics / component
Geography: GLO
Time period: 2023-01 to 2029-12
Generated by: Lugas Raka Adrianto, Maulana Permana Ajie, Didier Beloin-Saint-Pierre
accessRestrictedTo: 0
copyright: false

## General comment
The data represent a current computer peripherical type connector, as used in current computers. Material data are taken from product sheets of producers. The energy demand is estimated based on literature. Infrastructure and transport efforts rough estimations. The dataset represents 1 kg of computer peripherical type connectors with a weight of 10 gram/unit. In 2023 updates, only production efforts are modified to reflect improved energy efficiency in the manufacturing;

## Included processes
This dataset covers raw material input, energy consumption, infrastructure and transport efforts for the production of computer peripherical type connectors.

## Geography
Data represent a global valuable composition of a serial computer port.

## Technology
average connector production technology, based on literature and assumptions

## Reference product
- Connector, computer, peripherical type, at plant [GLO]: 1 kg
  Global

## Inputs from technosphere
- Copper, primary, at refinery [GLO]: 0.075 kg; lognormal SD95 1.45
  (4,5,4,3,1,5,BU:1.06); estimation, calculated weight, based on qualitative information
- Electricity, medium voltage, production GLO, at grid [GLO]: 5.208 kWh; lognormal SD95 1.65
  (3,4,4,3,4,5,BU:1.07); literature value as first approximation used
- Polyethylene, HDPE, granulate, at plant [RER]: 0.183 kg; lognormal SD95 1.45
  (4,5,4,3,1,5,BU:1.06); estimation, calculated weight, based on qualitative information
- Printed wiring board mounting plant [GLO]: 2.08e-7 p; lognormal SD95 3.18
  (4,5,4,3,1,5,BU:3.00); rough estimation of infrastructure
- Steel, low-alloyed, at plant [RER]: 0.302 kg; lognormal SD95 1.45
  (4,5,4,3,1,5,BU:1.06); estimation, calculated weight, based on qualitative information
- Transport, freight, rail [RER]: 0.6006 tkm; lognormal SD95 2.19
  (4,5,4,3,1,5,BU:2.00); standard distances
- Transport, freight, lorry, fleet average [RER]: 0.1001 tkm; lognormal SD95 2.19
  (4,5,4,3,1,5,BU:2.00); standard distances
- Brass, at plant [CH]: 0.29 kg; lognormal SD95 2.19
  (4,5,4,3,1,5,BU:2.00); standard distances
- Polyvinylchloride, at regional storage [RER]: 0.162 kg; lognormal SD95 2.19
  (4,5,4,3,1,5,BU:2.00); standard distances

## Emissions to nature
- Heat, waste [emissions to air, high. pop.]: 23.436 MJ; lognormal SD95 1.73
  (4,5,4,3,1,5,BU:1.50); calculated from electricity input

## Sampling procedure
literature

## Extrapolations
see Geography & Technology

## Sources
- Raka Adrianto L., Permana Ajie M., Beloin-Saint-Pierre D., 2024, 2024 - LCI ICT sector - Raka Adrianto, Empa, St. Gallen, CH

## Validation
Proof reading validation: Passed, Other validation: none, Validator: Mischa Zschokke, Company: Carbotech, Country: CH
