# Carbon dioxide liquid, at plant

Dataset: EcoSpold 1, unit process
Functional unit: 1 kg
Category: chemicals / gases
Geography: RER
Time period: 2000-01 to 2000-12
Generated by: Roland Hischier
accessRestrictedTo: 0
copyright: true

## General comment
The functional unit represents 1 kg of liquid carbon dioxide. Data are based on a Swiss study about different cooling mediums.;
CAS number: 000124-38-9;
Formula: CO2;

## Included processes
This module contains material and energy input and emissions for the production of liquid carbon dioxide out of waste gases from different production processes. Water consumption and infrastructure have been estimated.

## Geography
Data based on literature study about differnt cooling mediums used in Switzerland. Data are assumed to be valuable for European conditions.

## Technology
Extraction of carbon dioxide out of waste gas streams from different production processes with a 15-20% MEA (monoethanolamine) solution, followed by a purification and a liquefaction step, using each electricity as energy source.

## Time period
date of published literature

## Reference product
- Carbon dioxide liquid, at plant [RER]: 1 kg
  Europe

## Inputs from technosphere
- Transport, freight, rail [RER]: 0.0078 tkm; lognormal SD95 2.1
  (4,5,na,na,na,na); standard distances
- Electricity, medium voltage, production ENTSO-E, at grid: 0.4 kWh; lognormal SD95 1.3
  (2,5,2,1,1,5); purification & liquefaction, based on literature
- Transport, freight, lorry, fleet average [RER]: 0.0013 tkm; lognormal SD95 2.1
  (4,5,na,na,na,na); standard distances
- Chemical plant, organics [RER]: 4e-10 p; lognormal SD95 3.8
  (4,5,1,3,5,4); estimation
- Heat, natural gas, at industrial furnace 1MW [CH]: 2.87 MJ; lognormal SD95 1.3
  (2,5,2,1,1,5); average form range in Frischknecht 1999
- Monoethanolamine, at plant [RER]: 0.013 kg; lognormal SD95 2.1
  (4,5,1,3,5,4); estimation
- Heat, heavy fuel oil, at industrial furnace 1MW [RER]: 0.507 MJ; lognormal SD95 1.3
  (2,5,2,1,1,5); average form range in Frischknecht 1999

## Inputs from nature
- Water, cooling, unspecified natural origin/m3 [resources, in water]: 0.024 m3; lognormal SD95 1.9
  (5,5,1,1,4,5); estimated with data from a large chem. plant
- Water, unspecified natural origin/m3 [resources, in water]: 0.006 m3; lognormal SD95 1.9
  (5,5,1,1,4,5); estimated with data from a large chem. plant

## Emissions to nature
- Monoethanolamine [emissions to air, high. pop.]: 0.013 kg; lognormal SD95 2.1
  (2,5,2,1,1,5); average form range in Frischknecht 1999
- Heat, waste [emissions to air, high. pop.]: 1.43 MJ; lognormal SD95 1.3
  (2,5,2,1,1,5); calculated from electricity input
- Carbon dioxide, fossil [emissions to air, high. pop.]: 0.005 kg; lognormal SD95 1.3
  (2,5,2,1,1,5); according to Frischknecht 1999
- Methane, fossil [emissions to air, high. pop.]: 0.01 kg; lognormal SD95 2.1
  (2,5,2,1,1,5); according to Frischknecht 1999
- Water [emissions to water, unspecified]: 22.8, 5.7 kg (2 entries); lognormal SD95 2.5196
  (5,5,5,5,5,BU:1.05); All uncertainty-values set to 5.0 by default. Balance of input water

## Sampling procedure
Data from literature and own assumptions (infrastructure, input of chemicals)

## Extrapolations
Energy amount and emissions from information in a Swiss study used for European conditions. The CO2 input is a by-product from the antecedent process and has no burdens.

## Sources
- Althaus H.-J., Chudacoff M., Hellweg S., Hischier R., Jungbluth N., Osses M., Primas A., 2007, 2007 - LCI chemicals - Althaus, Final report ecoinvent data v2.0, 8, Swiss Centre for LCI, Empa - TSL, ETH, ESU-services Ltd., Chudacoff Oekoscience, Duebendorf, CH
Althaus H.-J., Chudacoff M., Hischier R., Jungbluth N., Osses M., Primas A. (2007) Life Cycle Inventories of Chemicals. Final report ecoinvent data v2.0. Volume: 8. Swiss Centre for LCI, Empa - TSL. Dübendorf, CH.
Type: Measurement on site
Source: CD-ROM
First author: Althaus H.-J.
Other authors: Chudacoff M., Hischier R., Jungbluth N., Osses M., Primas A.
Year: 2007
Title of anthology: Final report ecoinvent data v2.0
Place of publication: Dübendorf, CH
Publisher: Swiss Centre for LCI, Empa - TSL
Volume No: 8

## Validation
Proof reading validation: passed.; Other validation: none;
