# Polystyrene scrap, old, at plant

Dataset: EcoSpold 1, unit process
Functional unit: 1 kg
Category: plastics / thermoplasts
Geography: CH
Time period: 2000-01 to 2000-12
Share of production covered: 0 %
Generated by: Annelore Kleijer
accessRestrictedTo: 0
copyright: true

## General comment
Based on the Ecoinvent data from “disposal, building, polystyrene isolation, flame-retardant, to final disposal”
Technology: none
Version: 2.2
Synonyms: EPS

0.0
Production volume: unknown
Local category: Kunststoffe
Local subcategory: Polymere (Granulate)

Synonyms: EPS;

## Included processes
Includes the collection and transport of post consumer scrap from dismantling to scrap dealer

## Reference product
- Polystyrene scrap, old, at plant [CH]: 1 kg
  SWITZERLAND

## Inputs from technosphere
- Transport, freight, lorry, 16t-32t gross weight, fleet average [CH]: 0.01 tkm; lognormal SD95 2.0165
  (2,4,1,1,1,1); Average of 10 km

## Sources
- Althaus H.-J., Bauer C., Doka G., Frischknecht R., Jungbluth N., Nemecek T., Simons A., Stucki M., Sutter J., Tuchschmid M., 2010, 2010 - Changes in ecoinvent v2.1 and v2.2 - Althaus, Final report ecoinvent data v2.2, 16, Swiss Centre for LCI, Duebendorf and St. Gallen, CH
Hischier, R., Althaus H.-J., Bauer, Chr., Büsser S., Doka, G., Frischknecht R., Kleijer A., Leuenberger M., Nemecek, T., Simons A. (2010) Documentation of changes implemented in ecoinvent Data v2.2. Final report ecoinvent data v2.2. Volume: 16. Swiss Centre for LCI. Dübendorf. CH.
Type: Measurement on site
Source: CD-ROM
First author: Hischier, R.
Other authors: Althaus H.-J., Bauer, Chr., Büsser S., Doka, G., Frischknecht R., Kleijer A., Leuenberger M., Nemecek, T., Simons A.
Year: 2010
Title of anthology: Final report ecoinvent data v2.2
Place of publication: Dübendorf. CH
Publisher: Swiss Centre for LCI
Volume No: 16

## Validation
Proof reading validation: passed; Other validation: none;
