# Production of nickel-based catalyst for methanation

Dataset: EcoSpold 1, unit process
Functional unit: 1 kg
Category: fuels / synthetic\infrastructure
Geography: RER
Time period: 2024-01 to 2024-01
Generated by: Romain Sacchi
accessRestrictedTo: 0
copyright: true

## General comment
Source: Life cycle assessment of power-to-gas with biogas as the carbon source, Zhang et al., 2020, Sustainable Energy and Fuels, https://doi.org/10.1039/C9SE00986H

## Reference product
- Production of nickel-based catalyst for methanation [RER]: 1 kg
  not defined

## Inputs from technosphere
- Aluminium alloy, AlMg3, at plant [RER]: 0.81 kg; lognormal SD95 2.565
  {5;5;5;5;5;5;1.05;}
- Nickel, 99.5%, at plant [GLO]: 0.19 kg; lognormal SD95 2.565
  {5;5;5;5;5;5;1.05;}
- Transport, freight, rail [RER]: 0.2 tkm; lognormal SD95 2.208
  Generic transport distances calculated based on Table 4.2 of the ecoinvent v.2 Methodology report. Distribution: 0.5 kg over 400.0 km.
- Transport, freight, lorry, 16t-32t gross weight, fleet average [RER]: 0.1 tkm; lognormal SD95 2.208
  Generic transport distances calculated based on Table 4.2 of the ecoinvent v.2 Methodology report. Distribution: 0.5 kg over 200.0 km.

## Sampling procedure
Sampling procedure: Literature data

## Sources
- Sacchi R., Bauer C., 2024, 2024 - LCA power-to-X in residential sector - Sacchi, Project report, PSI, Villigen, CH

## Validation
Proof reading validation: Passed, Other validation: none, Validator: Rolf Frischknecht, Telephone: 0041 44 940 61 91, E-mail: frischknecht@treeze.ch, Company: treeze, Country: CH
