# Green beans IP, at farm

Dataset: EcoSpold 1, unit process
Functional unit: 1 kg
Category: agricultural / agricultural production\plant protection
Geography: CH
Time period: 2017-01 to 2020-12
Generated by: Melina Glimmann
accessRestrictedTo: 0
copyright: true

## General comment
The inventory refers to the production of green beans in Switzerland, based on Swiss integrated production

## Geography
The inventory is modelled for Switzerland

## Reference product
- Green beans IP, at farm [CH]: 1 kg

## Inputs from technosphere
- Application of plant protection products, by field sprayer [CH]: 0.00010769 ha; lognormal SD95 1.218
  (2,1,2,1,1,5,BU:1.05); ;
- Average mineral fertiliser, as K2O, at regional storehouse [RER]: 0.0032307 kg; lognormal SD95 1.218
  (2,1,2,1,1,5,BU:1.05); ;
- Average mineral fertiliser, as P2O5, at regional storehouse [RER]: 0.0010769 kg; lognormal SD95 1.218
  (2,1,2,1,1,5,BU:1.05); ;
- Tillage, ploughing [CH]: 0.00010769 ha; lognormal SD95 1.218
  (2,1,2,1,1,5,BU:1.05); ;
- Green manure IP, until April [CH]: 0.00010769 ha; lognormal SD95 1.218
  (2,1,2,1,1,5,BU:1.05); ;
- Irrigation, sprinkler [CH]: 0.032307 m3; lognormal SD95 3.04991
  (2,1,2,1,1,5,BU:3); ;
- Diphenylether-compounds, at regional storehouse [RER]: 2.1107e-5 kg; lognormal SD95 1.218
  (2,1,2,1,1,5,BU:1.05); ;
- Transport, freight, lorry, 16t-32t gross weight, fleet average [CH]: 0.00043076 tkm; lognormal SD95 2.0524
  (2,1,2,1,1,5,BU:2); ;
- Benzo[thia]diazole-compounds, at regional storehouse [RER]: 4.7599e-5 kg; lognormal SD95 1.218
  (2,1,2,1,1,5,BU:1.05); ;
- Tillage, currying, by weeder [CH]: 0.00010769 ha; lognormal SD95 1.218
  (2,1,2,1,1,5,BU:1.05); ;
- Sowing [CH]: 0.00010769 ha; lognormal SD95 1.218
  (2,1,2,1,1,5,BU:1.05); ;
- Transport, freight, lorry, fleet average [CH]: 0.01036 tkm; lognormal SD95 2.0524
  (2,1,2,1,1,5,BU:2); ;
- Pea seed IP, at regional storehouse [CH]: 0.004846 kg; lognormal SD95 1.218
  (2,1,2,1,1,5,BU:1.05); ;
- Fertilising, by broadcaster [CH]: 0.00010769 ha; lognormal SD95 1.218
  (2,1,2,1,1,5,BU:1.05); ;
- Tillage, harrowing, by spring tine harrow [CH]: 0.00021538 ha; lognormal SD95 1.218
  (2,1,2,1,1,5,BU:1.05); ;
- Combine harvesting [CH]: 0.00010769 ha; lognormal SD95 1.218
  (2,1,2,1,1,5,BU:1.05); ;
- Transport, freight, lorry, 3.5t gross weight, fleet average [CH]: 0.00043076 tkm; lognormal SD95 2.0524
  (2,1,2,1,1,5,BU:2); ;

## Inputs from nature
- Carbon dioxide, in air [resources, in air]: 1.2061 kg; lognormal SD95 1.3001
  (4,1,1,1,1,5,BU:1.05); ;
- Energy, gross calorific value, in biomass [resources, biotic]: 15.4 MJ; lognormal SD95 1.3001
  (4,1,1,1,1,5,BU:1.05); ;
- Transformation, to annual crop, non-irrigated [resources, land]: 1.0769 m2; lognormal SD95 1.31639
  (4,1,1,1,1,5,BU:1.1); ;
- Occupation, annual crop, non-irrigated [resources, land]: 0.53844 m2a; lognormal SD95 1.31639
  (4,1,1,1,1,5,BU:1.1); ;
- Transformation, from annual crop, non-irrigated [resources, land]: 1.0769 m2; lognormal SD95 1.31639
  (4,1,1,1,1,5,BU:1.1); ;

## Emissions to nature
- Water, CH [emissions to water, unspecified]: 0.0087767 m3; lognormal SD95 1.8752
  (4,1,1,1,4,5,BU:1.5); ;
- Nitrate [emissions to water, groundwater]: 0.012212 kg; lognormal SD95 1.8752
  (4,1,1,1,4,5,BU:1.5); ;
- Bentazone [emissions to soil, agricultural]: 4.7599e-5 kg; lognormal SD95 1.6719
  (4,1,1,1,4,5,BU:1.2); ;
- Water, embodied in product, CH [economic issues, unspecified]: 0.90997 kg; lognormal SD95 1.62091
  (4,1,1,1,4,5,BU:1.05); ;
- Fluazifop-P-butyl [emissions to soil, agricultural]: 2.1107e-5 kg; lognormal SD95 1.6719
  (4,1,1,1,4,5,BU:1.2); ;
- Zinc [emissions to water, river]: 2.3821e-7 kg; lognormal SD95 5.36358
  (4,1,1,1,4,5,BU:5); ;
- Phosphorus [emissions to water, river]: 7.5382e-6 kg; lognormal SD95 1.8752
  (4,1,1,1,4,5,BU:1.5); ;
- Nitrogen oxides [emissions to air, low. pop.]: 1.9621e-5 kg; lognormal SD95 1.8752
  (4,1,1,1,4,5,BU:1.5); ;
- Chromium [emissions to water, river]: 1.2083e-6 kg; lognormal SD95 3.3171
  (4,1,1,1,4,5,BU:3); ;
- Nickel [emissions to water, river]: 1.0142e-10 kg; lognormal SD95 5.36358
  (4,1,1,1,4,5,BU:5); ;
- Copper [emissions to water, river]: 1.7769e-7 kg; lognormal SD95 3.3171
  (4,1,1,1,4,5,BU:3); ;
- Cadmium [emissions to water, river]: 2.5404e-9 kg; lognormal SD95 3.3171
  (4,1,1,1,4,5,BU:3); ;
- Lead [emissions to water, river]: 1.4549e-9 kg; lognormal SD95 5.36358
  (4,1,1,1,4,5,BU:5); ;
- Cadmium [emissions to soil, agricultural]: 4.7566e-9 kg; lognormal SD95 1.63211
  (4,1,1,1,4,5,BU:1.1); ;
- Dinitrogen monoxide [emissions to air, low. pop.]: 9.342e-5 kg; lognormal SD95 1.8752
  (4,1,1,1,4,5,BU:1.5); ;
- Phosphorus [emissions to water, groundwater]: 7.9873e-5 kg; lognormal SD95 1.8752
  (4,1,1,1,4,5,BU:1.5); ;
- Water, CH [emissions to air, unspecified]: 22.615 kg; lognormal SD95 1.8752
  (4,1,1,1,4,5,BU:1.5); ;

## Sampling procedure
Data were compiled from literature

## Extrapolations
field work and pesticide application were etrapolated from fava beans production

## Sources
- Kaegi T., Glimmann M., Conte F., Roberts G., 2021, 2021 - LCA tomatoes and green beans production - Kaegi, Carbotech on behalf of BAFU, Carbotech AG, Zuerich, CH

## Validation
15.12.2021 \\tsclient\Schreibtisch\WinShare\BAFU Gemuese\2021-12-15\[EcoSpold_Bafu_Gemuese_Green beans IP_CH v1.xlsx]X-Process
