# Potassium nitrate, as K2O, at regional storehouse

Dataset: EcoSpold 1, unit process
Functional unit: 1 kg
Category: chemicals / fertilisers (inorganic)
Geography: RER
Time period: 1999-01 to 1999-12
Generated by: Angelika Heil
accessRestrictedTo: 0
copyright: true

## General comment
Refers to 1 kg N, resp. 1 kg K2O in potassium nitrate with a N-content of 14.0% and a K2O-content of 44.0%. The multioutput-process 'potassium nitrate, at regional storehouse' delivers the co-products 'potassium nitrate phosphate, as N, at regional storehouse' and 'potassium nitrate phosphate, as K2O, at regional storehouse'. Allocation factors are based on the energy requirements of the respective nutrients for the production processes: 61% for 'potassium nitrate phosphate, as N, at regional storehouse' and 39% for 'potassium nitrate phosphate, as K2O, at regional storehouse' (exceptions see report). The allocated inventories must always be used simultaneously.;
CAS number: 007757-79-1;
Formula: KNO3;

## Included processes
The unit process inventory takes into account the production of potassium nitrate from potassium chloride and nitric acid. Transports of raw materials and intermediate products to the fertiliser plant as well as the transport of the fertiliser product from the factory to the regional department store were included. Production and waste treatment of catalysts, coating and packaging of the final fertiliser products were not included. Infrastructure was included by means of a proxy module.

## Technology
Production inventory was derived from detailed literature studies and specifications from the manufacturer, relevant for the European production. Transport specifications of the fertiliser product to the regional department store, which were not included in the reference used for this inventory, were complemented by data given in Patyk & Reinhardt (1997).

## Time period
Year when the principal reference used for this inventory was published.

## Reference product
- Potassium nitrate, as K2O, at regional storehouse [RER]: 1 kg
  Europe

## Inputs from technosphere
- Transport, freight, rail [RER]: 1.03445 tkm; lognormal SD95 2.09
  (4,5,na,na,na,na)
- Potassium chloride, as K2O, at regional storehouse [RER]: 1 kg; lognormal SD95 1.09
  (2,1,1,2,1,3)
- Heat, natural gas, at industrial furnace 1MW [CH]: 4.00347 MJ; lognormal SD95 1.09
  (2,1,1,2,1,3)
- Chemical plant, organics [RER]: 3.5118e-10 p; lognormal SD95 3.01
  (2,1,1,2,1,3)

## Emissions to nature
- Heat, waste [emissions to air, high. pop.]: -1.26425 MJ; lognormal SD95 1.31
  (2,3,2,3,3,5)

## Sampling procedure
Values given in the reference originate from manufacturers and/or other data sources which in turn refer to the real situation and hence are largely secured. However, the emissions of N and P into the water may be somewhat uncertain. When no information on the speciation of N- and P emissions was given in the reference, the most likely speciation based on expert's opinion is presented.

## Sources
- Nemecek T., Kaegi T., 2007, 2007 - LCI agricultural prod. systems - Nemecek, Ecoinvent report version 2.0, 15, Swiss Centre for LCI, ART, Duebendorf and Zuerich, CH
Nemecek, T., Kägi, T., Blaser, S. (2007) Life Cycle Inventories of Agricultural Production Systems. Ecoinvent report version 2.0. Editors: 0. Volume: 15. Swiss Centre for LCI, ART. Duebendorf and Zurich, CH.
Type: Measurement on site
Source: CD-ROM
First author: Nemecek, T.
Other authors: Kägi, T., Blaser, S.
Year: 2007
Name of editors: 0
Title of anthology: Ecoinvent report version 2.0
Place of publication: Duebendorf and Zurich, CH
Publisher: Swiss Centre for LCI, ART
Volume No: 15

## Validation
Proof reading validation: Passed.; Other validation: none;
