# Optical brighteners, in paper production, at plant

Dataset: EcoSpold 1, unit process
Functional unit: 1 kg
Category: chemicals / others
Geography: RER
Time period: 2000-01 to 2000-12
Generated by: Roland Hischier
accessRestrictedTo: 0
copyright: true

## General comment
The functional unit represent 1 kg of optical brighteners. Very large uncertainty of the process data, as only a mixture of different materials is included.;

## Included processes
Mixture of two optical brighteners. Only input of mentioned substances is taken into account.

## Geography
Data used has no specific geographical origin (two examples included already into the database chosen). Data are used as European average data.

## Technology
equal split to two substances without any further inputs/outputs

## Reference product
- Optical brighteners, in paper production, at plant [RER]: 1 kg
  Europe

## Inputs from technosphere
- Fluorescent whitening agent distyrylbiphenyl type, at plant [RER]: 0.5 kg; lognormal SD95 1.7
  (5,5,3,3,3,5); estimated, based on available modules
- DAS-1, fluorescent whitening agent triazinylaminostilben type, at plant [RER]: 0.5 kg; lognormal SD95 1.7
  (5,5,3,3,3,5); estimated, based on available modules

## Sampling procedure
see technology

## Sources
- Hischier R., 2007, 2007 - LCI packagings and graphical papers - Hischier, Final report ecoinvent data v2.0, 11, Swiss Centre for LCI, Empa - TSL, Duebendorf and St. Gallen, CH
Hischier R. (2007) Life Cycle Inventories of Packaging and Graphical Paper. Final report ecoinvent data v2.0. Volume: 11. Swiss Centre for LCI, Empa - TSL. Dübendorf, CH.
Type: Measurement on site
Source: CD-ROM
First author: Hischier R.
Year: 2007
Title of anthology: Final report ecoinvent data v2.0
Place of publication: Dübendorf, CH
Publisher: Swiss Centre for LCI, Empa - TSL
Volume No: 11

## Validation
Proof reading validation: passed; Other validation: none;
