# Printing colour, rotogravure, 55% toluene, at plant

Dataset: EcoSpold 1, unit process
Functional unit: 1 kg
Category: chemicals / others
Geography: RER
Time period: 2000-01 to 2000-12
Generated by: Roland Hischier
accessRestrictedTo: 0
copyright: true

## General comment
The functional unit represent 1 kg of printing color (black and colored mixed!) for the rotogravure printing sector.;

## Included processes
Material inputs (solvents, binders, pigments) estimation of energy consumption. No emissions to air/water nor solid wastes included.

## Technology
estimation, based on data from offset printing plus personal communications

## Reference product
- Printing colour, rotogravure, 55% toluene, at plant [RER]: 1 kg
  Europe

## Inputs from technosphere
- Chemical plant, organics [RER]: 4e-10 p; lognormal SD95 3.2
  (5,na,na,na,na,na); estimation
- Carbon black, at plant [GLO]: 0.07 kg; lognormal SD95 1.6
  (3,3,1,3,4,5); estimation, based on information from producer about offset
- Alkyd resin, long oil, 70% in white spirit, at plant [RER]: 0.31 kg; lognormal SD95 1.6
  (3,3,1,3,4,5); estimation, based on information from producer about offset
- Toluene, liquid, at plant [RER]: 0.55 kg; lognormal SD95 1.6
  (3,3,1,3,4,5); estimation, based on information from producer about offset
- Heat, light fuel oil, at industrial furnace 1MW [RER]: 0.875 MJ; lognormal SD95 1.6
  (3,3,1,3,4,5); estimation, based on information from producer about offset
- Transport, freight, rail [RER]: 0.6 tkm; lognormal SD95 2.1
  (4,5,na,na,na,na); standard distances
- Transport, freight, lorry, fleet average [RER]: 0.1 tkm; lognormal SD95 2.1
  (4,5,na,na,na,na); standard distances
- Heat, natural gas, at industrial furnace 1MW [CH]: 0.875 MJ; lognormal SD95 1.6
  (3,3,1,3,4,5); estimation, based on information from producer about offset
- Polyethylene terephthalate, granulate, amorphous, at plant [RER]: 0.07 kg; lognormal SD95 1.6
  (3,3,1,3,4,5); estimation, based on information from producer about offset
- Electricity, medium voltage, production ENTSO-E, at grid: 0.35 kWh; lognormal SD95 1.6
  (3,3,1,3,4,5); estimation, based on information from producer about offset

## Inputs from nature
- Water, cooling, unspecified natural origin/m3 [resources, in water]: 0.00075 m3; lognormal SD95 1.6
  (3,3,1,3,4,5); estimation, based on information from producer about offset

## Emissions to nature
- Heat, waste [emissions to air, high. pop.]: 1.26 MJ; lognormal SD95 1.6
  (3,3,1,3,4,5); estimation, based on information from producer about offset
- Water [emissions to water, unspecified]: 0.7125 kg; lognormal SD95 2.5196
  (5,5,5,5,5,BU:1.05); All uncertainty-values set to 5.0 by default. Balance of input water

## Sources
- Hischier R., 2007, 2007 - LCI packagings and graphical papers - Hischier, Final report ecoinvent data v2.0, 11, Swiss Centre for LCI, Empa - TSL, Duebendorf and St. Gallen, CH
Hischier R. (2007) Life Cycle Inventories of Packaging and Graphical Paper. Final report ecoinvent data v2.0. Volume: 11. Swiss Centre for LCI, Empa - TSL. Dübendorf, CH.
Type: Measurement on site
Source: CD-ROM
First author: Hischier R.
Year: 2007
Title of anthology: Final report ecoinvent data v2.0
Place of publication: Dübendorf, CH
Publisher: Swiss Centre for LCI, Empa - TSL
Volume No: 11

## Validation
Proof reading validation: passed; Other validation: none;
