# Electrolyzer production, 1MWe, SOEC, Balance of Plant

Dataset: EcoSpold 1, unit process
Functional unit: 1 p
Category: fuels / synthetic\infrastructure
Geography: RER
Time period: 2024-01 to 2024-01
Generated by: Romain Sacchi
accessRestrictedTo: 0
copyright: true

## General comment
1 MWe Solid Oxide electrolyzer based on Niklas Gerloff, Comparative Life-Cycle-Assessment analysis of three major water electrolysis technologies while applying various energy scenarios for a greener hydrogen production, Journal of Energy Storage, Volume 43, 2021, https://doi.org/10.1/j.est0.20.1. Produced amount of H2 over 20 years: 3,776,000 kg. Amounts of lanthanum oxide and strontium carbonate are unsure. Values have already account for 7 stack replacements over 20 years of use, excluding the initial component. For further secifications (e.g., efficiency, lifetime, etc.), refer to Sacchi, R. and Bauer, C. LCA of Power-to-X processes and applications in the residential sector. Paul Scherrer Institut, 2023.

## Reference product
- Electrolyzer production, 1MWe, SOEC, Balance of Plant [RER]: 1 p
  not defined

## Inputs from technosphere
- Sheet rolling, aluminium [RER]: 100 kg; lognormal SD95 1.329
  power electronics (rectifier, voltage adaptation) {2;4;1;3;3;5;1.05;}
- Reinforcing steel, at plant [RER]: 900 kg; lognormal SD95 1.329
  frequency converters {2;4;1;3;3;5;1.05;}
- Chromium steel 18/8, at plant [RER]: 5858 kg; lognormal SD95 1.329
  heat exchangers {2;4;1;3;3;5;1.05;}
- Chromium steel 18/8, at plant [RER]: 64.1 kg; lognormal SD95 1.329
  flange {2;4;1;3;3;5;1.05;}
- Wire drawing, copper [RER]: 0.7 kg; lognormal SD95 1.329
  frequency converter -water pump {2;4;1;3;3;5;1.05;}
- Sheet rolling, chromium steel [RER]: 7500 kg; lognormal SD95 1.329
  container with pipes and fittings for diaphragm compressor {2;4;1;3;3;5;1.05;}
- Chromium steel 18/8, at plant [RER]: 150.3 kg; lognormal SD95 1.329
  vessel {2;4;1;3;3;5;1.05;}
- Electronics for control units [RER]: 100 kg; lognormal SD95 1.329
  control electronics {2;4;1;3;3;5;1.05;}
- Polyethylene, LDPE, granulate, at plant [RER]: 534 kg; lognormal SD95 1.329
  water purifier & feed tank {2;4;1;3;3;5;1.05;}
- Sheet rolling, chromium steel [RER]: 150.3 kg; lognormal SD95 1.329
  vessel {2;4;1;3;3;5;1.05;}
- Reinforcing steel, at plant [RER]: 3 kg; lognormal SD95 1.329
  frequency converter -water pump {2;4;1;3;3;5;1.05;}
- Steel, low-alloyed, at plant [RER]: 2250 kg; lognormal SD95 1.329
  container {2;4;1;3;3;5;1.05;}
- Reinforcing steel, at plant [RER]: 7 kg; lognormal SD95 1.329
  water pump {2;4;1;3;3;5;1.05;}
- Wire drawing, copper [RER]: 200 kg; lognormal SD95 1.329
  power electronics (rectifier, voltage adaptation) {2;4;1;3;3;5;1.05;}
- Reinforcing steel, at plant [RER]: 267 kg; lognormal SD95 1.329
  water purifier & feed tank {2;4;1;3;3;5;1.05;}
- Transport, freight, lorry, 16t-32t gross weight, fleet average [RER]: 3939 tkm; lognormal SD95 2.208
  Generic transport distances calculated based on Table 4.2 of the ecoinvent v.2 Methodology report. Distribution: 875.3 kg over 4500.0 km.
- Sheet rolling, chromium steel [RER]: 27.4 kg; lognormal SD95 1.329
  mixer {2;4;1;3;3;5;1.05;}
- Chromium steel 18/8, at plant [RER]: 588 kg; lognormal SD95 1.329
  buffer tank {2;4;1;3;3;5;1.05;}
- Aluminium, production mix, wrought alloy, at plant [RER]: 1 kg; lognormal SD95 1.329
  frequency converter -water pump {2;4;1;3;3;5;1.05;}
- Sheet rolling, steel [RER]: 5000 kg; lognormal SD95 1.329
  container with pipes and fittings for diaphragm compressor {2;4;1;3;3;5;1.05;}
- Electricity, low voltage, production GLO, at grid [GLO]: 76420 kWh; lognormal SD95 1.329
  assembly energy {2;4;1;3;3;5;1.05;}
- Extrusion, plastic pipes [RER]: 534 kg; lognormal SD95 1.329
  water purifier & feed tank {2;4;1;3;3;5;1.05;}
- Reinforcing steel, at plant [RER]: 600 kg; lognormal SD95 1.329
  power electronics (rectifier, voltage adaptation) {2;4;1;3;3;5;1.05;}
- Wire drawing, copper [RER]: 2.8 kg; lognormal SD95 1.329
  control panel {2;4;1;3;3;5;1.05;}
- Tube insulation, elastomere, at plant [DE]: 0.2 kg; lognormal SD95 1.329
  frequency converter -water pump {2;4;1;3;3;5;1.05;}
- Sheet rolling, chromium steel [RER]: 64.1 kg; lognormal SD95 1.329
  flange {2;4;1;3;3;5;1.05;}
- Reinforcing steel, at plant [RER]: 399 kg; lognormal SD95 1.329
  separator {2;4;1;3;3;5;1.05;}
- Reinforcing steel, at plant [RER]: 8.5 kg; lognormal SD95 1.329
  control panel {2;4;1;3;3;5;1.05;}
- Chromium steel 18/8, at plant [RER]: 27.4 kg; lognormal SD95 1.329
  mixer {2;4;1;3;3;5;1.05;}
- Sheet rolling, chromium steel [RER]: 2025 kg; lognormal SD95 1.329
  diaphragm compressor {2;4;1;3;3;5;1.05;}
- Cast iron, at plant [RER]: 3000 kg; lognormal SD95 1.329
  diaphragm compressor {2;4;1;3;3;5;1.05;}
- Reinforcing steel, at plant [RER]: 5000 kg; lognormal SD95 1.329
  container with pipes and fittings for diaphragm compressor {2;4;1;3;3;5;1.05;}
- Reinforcing steel, at plant [RER]: 6500 kg; lognormal SD95 1.329
  diaphragm compressor {2;4;1;3;3;5;1.05;}
- Copper, primary, at refinery [GLO]: 225 kg; lognormal SD95 1.329
  frequency converters {2;4;1;3;3;5;1.05;}
- Ethylene glycol, at plant [RER]: 35 kg; lognormal SD95 1.329
  diaphragm compressor {2;4;1;3;3;5;1.05;}
- Sheet rolling, steel [RER]: 399 kg; lognormal SD95 1.329
  separator {2;4;1;3;3;5;1.05;}
- Tube insulation, elastomere, at plant [DE]: 1.4 kg; lognormal SD95 1.329
  control panel {2;4;1;3;3;5;1.05;}
- Sheet rolling, steel [RER]: 2000 kg; lognormal SD95 1.329
  diaphragm compressor {2;4;1;3;3;5;1.05;}
- Chromium steel 18/8, at plant [RER]: 7500 kg; lognormal SD95 1.329
  container with pipes and fittings for diaphragm compressor {2;4;1;3;3;5;1.05;}
- Sheet rolling, steel [RER]: 1504 kg; lognormal SD95 1.329
  tubing {2;4;1;3;3;5;1.05;}
- Concrete, normal, at plant [CH]: 2.3 m3; lognormal SD95 1.329
  foundation {2;4;1;3;3;5;1.05;}
- Wire drawing, copper [RER]: 225 kg; lognormal SD95 1.329
  frequency converters {2;4;1;3;3;5;1.05;}
- Injection moulding [RER]: 1.4 kg; lognormal SD95 1.329
  control panel {2;4;1;3;3;5;1.05;}
- Sheet rolling, steel [RER]: 600 kg; lognormal SD95 1.329
  power electronics (rectifier, voltage adaptation) {2;4;1;3;3;5;1.05;}
- Transport, freight, rail [RER]: 7650 tkm; lognormal SD95 2.208
  Generic transport distances calculated based on Table 4.2 of the ecoinvent v.2 Methodology report. Distribution: 1233.82 kg over 6200.0 km.
- Sheet rolling, steel [RER]: 8.5 kg; lognormal SD95 1.329
  control panel {2;4;1;3;3;5;1.05;}
- Steel, low-alloyed, at plant [RER]: 1504 kg; lognormal SD95 1.329
  tubing {2;4;1;3;3;5;1.05;}
- Transport, barge tanker [RER]: 60.51 tkm; lognormal SD95 2.208
  Generic transport distances calculated based on Table 4.2 of the ecoinvent v.2 Methodology report. Distribution: 75.64 kg over 800.0 km.
- Aluminium, production mix, wrought alloy, at plant [RER]: 100 kg; lognormal SD95 1.329
  power electronics (rectifier, voltage adaptation) {2;4;1;3;3;5;1.05;}
- Copper, primary, at refinery [GLO]: 2.8 kg; lognormal SD95 1.329
  control panel {2;4;1;3;3;5;1.05;}
- Sheet rolling, chromium steel [RER]: 5858 kg; lognormal SD95 1.329
  heat exchangers {2;4;1;3;3;5;1.05;}
- Aluminium, production mix, wrought alloy, at plant [RER]: 300 kg; lognormal SD95 1.329
  frequency converters {2;4;1;3;3;5;1.05;}
- Welding, arc, steel [RER]: 33.3 m; lognormal SD95 1.329
  buffer tank {2;4;1;3;3;5;1.05;}
- Acrylonitrile-butadiene-styrene copolymer, ABS, at plant [RER]: 1.4 kg; lognormal SD95 1.329
  control panel {2;4;1;3;3;5;1.05;}
- Copper, primary, at refinery [GLO]: 0.7 kg; lognormal SD95 1.329
  frequency converter -water pump {2;4;1;3;3;5;1.05;}
- Sheet rolling, chromium steel [RER]: 2.4 kg; lognormal SD95 1.329
  splitter {2;4;1;3;3;5;1.05;}
- Reinforcing steel, at plant [RER]: 452.1 kg; lognormal SD95 1.329
  skid component {2;4;1;3;3;5;1.05;}
- Sheet rolling, steel [RER]: 452.1 kg; lognormal SD95 1.329
  skid component {2;4;1;3;3;5;1.05;}
- Tube insulation, elastomere, at plant [DE]: 75 kg; lognormal SD95 1.329
  frequency converters {2;4;1;3;3;5;1.05;}
- Chromium steel 18/8, at plant [RER]: 2025 kg; lognormal SD95 1.329
  diaphragm compressor {2;4;1;3;3;5;1.05;}
- Sheet rolling, steel [RER]: 2250 kg; lognormal SD95 1.329
  container {2;4;1;3;3;5;1.05;}
- Copper, primary, at refinery [GLO]: 200 kg; lognormal SD95 1.329
  power electronics (rectifier, voltage adaptation) {2;4;1;3;3;5;1.05;}
- Sheet rolling, steel [RER]: 267 kg; lognormal SD95 1.329
  water purifier & feed tank {2;4;1;3;3;5;1.05;}
- Chromium steel 18/8, at plant [RER]: 2.4 kg; lognormal SD95 1.329
  splitter {2;4;1;3;3;5;1.05;}
- Tube insulation, elastomere, at plant [DE]: 100 kg; lognormal SD95 1.329
  power electronics (rectifier, voltage adaptation) {2;4;1;3;3;5;1.05;}
- Sheet rolling, chromium steel [RER]: 588 kg; lognormal SD95 1.329
  buffer tank {2;4;1;3;3;5;1.05;}
- Sheet rolling, steel [RER]: 7 kg; lognormal SD95 1.329
  water pump {2;4;1;3;3;5;1.05;}

## Sampling procedure
Sampling procedure: Literature data

## Sources
- Sacchi R., Bauer C., 2024, 2024 - LCA power-to-X in residential sector - Sacchi, Project report, PSI, Villigen, CH

## Validation
Proof reading validation: Passed, Other validation: none, Validator: Rolf Frischknecht, Telephone: 0041 44 940 61 91, E-mail: frischknecht@treeze.ch, Company: treeze, Country: CH
