# Hard coal, burned in power plant

Dataset: EcoSpold 1, unit process
Functional unit: 1 MJ
Category: electricity by fuel / coal\power plant
Geography: IN
Time period: 2018-01 to 2020-01
Synonyms: 0
Production volume: 11000 PJ
Share of production covered: 95 %
Generated by: Christopher Oberschelp
accessRestrictedTo: 0
copyright: true

## General comment
The module describes the operation of an average plant in the region. The plant is used for middle load with 4000 hours of operation at full capacity per year. The plant is assumed to operate 150000 hours during its lifetime. For the assessment of main characteristics (LHV, sulphur and ash content of coal, efficiency of the plant) and criteria emissions (SOx, NOx, particles, mercury) a bottom-up approach has been used and supplemented by typical emission factors in cases of data gaps (based on EEA/EPA). CO2, CH4 and N2O emissions have been derived from fuel types (from IEA data) and IPCC emission factors. Airborne emission data has been updated for 2019, whereas other inputs and outputs come from the original dataset. The dataset consists on the collection of information about single plants. Base data on all major power plants in 2019 have been integrated, to the extent possible. The size distribution of particles has been derived from non-linear calculations based on typical ratios for different total emission amounts based on CEPMEIP. Emissions of trace substances (except for mercury) were derived from emission factors in the literature (EEA/EPA). The waste heat releases to air and water have been allocated on the basis of the assumed share of river cooled power plants and assumptions on the direct losses to air. The share of the recycled ash is country-specific. For the disposal of the remaining ash, typical country-specific compositions are taken into account in appropriate disposal modules. NA;

## Included processes
Energy conversion for energy supply. Use of fuel oil for startup is accounted for. Particle removal is included in this module. DeSOx and DeNOx are described in different modules; they are applied here according to a simplified estimate assuming an average unabated emission and the specific abated regional emission rates; SOx and NOx emissions are the reduced ones. It is assumed that 25 % of the plants are river cooled, 75 % use cooling tower (average UCTE). The water treatment is described in separate modules. The disposal of non-recycled ashes is modelled separately.

## Geography
IN in 2019

## Technology
Average installed technology.

## Reference product
- Hard coal, burned in power plant [IN]: 1 MJ

## Inputs from technosphere
- Hard coal power plant [CN]: 1.3e-12 p; lognormal SD95 3
  (1,1,1,1,1,1,BU:3);
- Hard coal supply mix [IN]: 0.0668 kg; lognormal SD95 1.05
  (1,1,1,1,1,1,BU:1.05); CEA 2009
- Chlorine, liquid, production mix, at plant [RER]: 1e-5 kg; lognormal SD95 1.3117
  (2,3,1,1,3,5,BU:1.05);
- Light fuel oil, at regional storage [RER]: 0.00015121 kg; lognormal SD95 1.3001
  (4,5,na,na,na,na,BU:1.05); CEA 2009
- Water, decarbonised, at plant [RER]: 0.012692 kg; lognormal SD95 1.3001
  (4,5,na,na,na,na,BU:1.05); 0.19 m3 DM water / ton coal
- SOx retained, in hard coal flue gas desulphurisation [RER]: 0.000406 kg; lognormal SD95 2.5649
  (5,5,5,5,5,5,BU:1.05)based on difference of a generic average unabated emission intensities (EMEP/EEA air pollutant emission inventory guidebook) and the local abated emission intensity
- NOx retained, in SCR [GLO]: 9.01e-5 kg; lognormal SD95 2.5649
  (same comment as for SOx retained, in hard coal flue gas desulphurisation)
- Transport, coal freight, rail [CN]: 1.35e-6 tkm; lognormal SD95 2.0641
  (2,4,1,1,1,5,BU:2);
- Transport, freight, lorry, fleet average [RER]: 6.75e-7 tkm; lognormal SD95 2.095
  (4,5,na,na,na,na,BU:2);
- Disposal, hard coal ash, 0% water, to residual material landfill [PL]: 0.031737 kg; lognormal SD95 1.24
  (2,4,1,1,1,5,BU:1.05);
- Disposal, residue from cooling tower, 30% water, to sanitary landfill [CH]: 5e-6 kg; lognormal SD95 1.24
  (2,4,1,1,1,5,BU:1.05);

## Inputs from nature
- Water, cooling, unspecified natural origin/m3 [resources, in water]: 0.0035 m3; lognormal SD95 1.0541
  (1,2,1,1,1,1,BU:1.05);

## Emissions to nature
- Antimony [emissions to air, high. pop.]: 1.7426e-7 kg; lognormal SD95 5.0696
  (2,4,1,1,1,5,BU:5);
- Arsenic [emissions to air, high. pop.]: 7.1e-9 kg; lognormal SD95 5.2623
  (1,3,5,5,1,1,BU:5)based on available emission factors (EMEP/EEA air pollutant emission inventory guidebook)
- Barium [emissions to air, high. pop.]: 1.1306e-7 kg; lognormal SD95 5.1111
  (2,3,1,1,3,5,BU:5);
- Benzene [emissions to air, high. pop.]: 2.17e-7 kg; lognormal SD95 3.0974
  (2,3,1,1,3,5,BU:3);
- Benzo(a)pyrene [emissions to air, high. pop.]: 2e-13 kg; lognormal SD95 3.0974
  (2,3,1,1,3,5,BU:3);
- Boron [emissions to air, high. pop.]: 7e-7 kg; lognormal SD95 5.1111
  (2,3,1,1,3,5,BU:5);
- Bromine [emissions to air, high. pop.]: 5.71e-7 kg; lognormal SD95 5.1111
  (2,3,1,1,3,5,BU:5);
- Butane [emissions to air, high. pop.]: 1.9e-8 kg; lognormal SD95 1.6249
  (2,3,1,1,3,5,BU:1.5);
- Cadmium [emissions to air, high. pop.]: 9e-10 kg; lognormal SD95 5.2623
  (same comment as for Arsenic)
- Carbon dioxide, fossil [emissions to air, high. pop.]: 0.094866 kg; lognormal SD95 1.0714
  (2,1,1,1,1,1,BU:1.05)calculated from fuel composition and emission factors (based on International Energy Agency data and IPCC guidelines)
- Carbon monoxide, fossil [emissions to air, high. pop.]: 8.7e-6 kg; lognormal SD95 5.2585
  (1,1,5,5,1,1,BU:5)based on available emission factors (EMEP/EEA air pollutant emission inventory guidebook)
- Chromium [emissions to air, high. pop.]: 4.5e-9 kg; lognormal SD95 5.2623
  (same comment as for Arsenic)
- Chromium VI [emissions to air, high. pop.]: 3.4417e-9 kg; lognormal SD95 5.1111
  (2,3,1,1,3,5,BU:5); 11% of Cr
- Cobalt [emissions to air, high. pop.]: 5.7763e-9 kg; lognormal SD95 5.1111
  (2,3,1,1,3,5,BU:5);
- Copper [emissions to air, high. pop.]: 7.8e-9 kg; lognormal SD95 5.2623
  (same comment as for Arsenic)
- Dinitrogen monoxide [emissions to air, high. pop.]: 1.5e-6 kg; lognormal SD95 1.5044
  (2,1,1,1,1,1,BU:1.5)calculated from fuel composition and emission factors (based on International Energy Agency data and IPCC guidelines)
- Ethane [emissions to air, high. pop.]: 4.1e-8 kg; lognormal SD95 1.6249
  (2,3,1,1,3,5,BU:1.5);
- Formaldehyde [emissions to air, high. pop.]: 5.8e-8 kg; lognormal SD95 1.6249
  (2,3,1,1,3,5,BU:1.5);
- Hydrocarbons, aliphatic, alkanes, unspecified [emissions to air, high. pop.]: 2.19e-7 kg; lognormal SD95 1.6249
  (2,3,1,1,3,5,BU:1.5);
- Hydrocarbons, aliphatic, unsaturated [emissions to air, high. pop.]: 2.16e-7 kg; lognormal SD95 1.6249
  (2,3,1,1,3,5,BU:1.5);
- Hydrogen chloride [emissions to air, high. pop.]: 3.05e-5 kg; lognormal SD95 1.6249
  (2,3,1,1,3,5,BU:1.5);
- Hydrogen fluoride [emissions to air, high. pop.]: 2.73e-6 kg; lognormal SD95 1.6249
  (2,3,1,1,3,5,BU:1.5);
- Iodine [emissions to air, high. pop.]: 2.92e-7 kg; lognormal SD95 5.1111
  (2,3,1,1,3,5,BU:5);
- Lead [emissions to air, high. pop.]: 7.3e-9 kg; lognormal SD95 5.2623
  (same comment as for Arsenic)
- Lead-210 [emissions to air, high. pop.]: 0.000121 kBq; lognormal SD95 3.0974
  (2,3,1,1,3,5,BU:3);
- Manganese [emissions to air, high. pop.]: 6.0401e-8 kg; lognormal SD95 5.1111
  (2,3,1,1,3,5,BU:5);
- Mercury [emissions to air, high. pop.]: 1.14e-8 kg; lognormal SD95 5.2623
  (1,3,1,1,1,1,BU:5)calculated from reported emissions (Agarwalla et al., 2021)
- Methane, fossil [emissions to air, high. pop.]: 1e-5 kg; lognormal SD95 1.5044
  (same comment as for Dinitrogen monoxide)
- Molybdenum [emissions to air, high. pop.]: 4.2746e-8 kg; lognormal SD95 5.1111
  (2,3,1,1,3,5,BU:5);
- Nickel [emissions to air, high. pop.]: 4.9e-9 kg; lognormal SD95 5.2623
  (same comment as for Arsenic)
- Nitrogen oxides [emissions to air, high. pop.]: 0.0001189 kg; lognormal SD95 1.5
  (1,2,1,1,1,1,BU:1.5)calculated from reported emissions (Indian Institute of Technology Delhi)
- PAH, polycyclic aromatic hydrocarbons [emissions to air, high. pop.]: 6.78e-11 kg; lognormal SD95 3.2292
  (1,3,5,5,1,1,BU:3)based on available emission factors (EMEP/EEA air pollutant emission inventory guidebook)
- Particulates, < 2.5 um [emissions to air, high. pop.]: 6.02e-6 kg; lognormal SD95 3
  (1,2,1,1,1,1,BU:3)calculated from reported emissions (Indian Institute of Technology Delhi)
- Particulates, > 10 um [emissions to air, high. pop.]: 7.69e-6 kg; lognormal SD95 1.5
  (same comment as for Nitrogen oxides)
- Particulates, > 2.5 um, and < 10um [emissions to air, high. pop.]: 8.59e-6 kg; lognormal SD95 2
  (1,2,1,1,1,1,BU:2)calculated from reported emissions (Indian Institute of Technology Delhi)
- Pentane [emissions to air, high. pop.]: 1.47e-7 kg; lognormal SD95 1.6249
  (2,3,1,1,3,5,BU:1.5);
- Polonium-210 [emissions to air, high. pop.]: 0.000222 kBq; lognormal SD95 3.0974
  (2,3,1,1,3,5,BU:3);
- Potassium-40 [emissions to air, high. pop.]: 1.1687e-5 kBq; lognormal SD95 3.0974
  (2,3,1,1,3,5,BU:3);
- Propane [emissions to air, high. pop.]: 3.5e-8 kg; lognormal SD95 1.6249
  (2,3,1,1,3,5,BU:1.5);
- Propene [emissions to air, high. pop.]: 1.6e-8 kg; lognormal SD95 1.6249
  (2,3,1,1,3,5,BU:1.5);
- Radium-226 [emissions to air, high. pop.]: 0.00033792 kBq; lognormal SD95 3.0974
  (2,3,1,1,3,5,BU:3);
- Radium-228 [emissions to air, high. pop.]: 9.9868e-5 kBq; lognormal SD95 3.0974
  (2,3,1,1,3,5,BU:3);
- Radon-220 [emissions to air, high. pop.]: 0.00065 kBq; lognormal SD95 3.0974
  (2,3,1,1,3,5,BU:3);
- Radon-222 [emissions to air, high. pop.]: 0.000366 kBq; lognormal SD95 3.0974
  (2,3,1,1,3,5,BU:3);
- Selenium [emissions to air, high. pop.]: 2.3e-8 kg; lognormal SD95 5.2623
  (same comment as for Arsenic)
- Strontium [emissions to air, high. pop.]: 3.5581e-8 kg; lognormal SD95 5.1111
  (2,3,1,1,3,5,BU:5);
- Sulfur dioxide [emissions to air, high. pop.]: 0.0004145 kg; lognormal SD95 1.05
  (1,2,1,1,1,1,BU:1.05)calculated from reported emissions (Indian Institute of Technology Delhi)
- Thorium-228 [emissions to air, high. pop.]: 5.3808e-5 kBq; lognormal SD95 3.0974
  (2,3,1,1,3,5,BU:3);
- Thorium-232 [emissions to air, high. pop.]: 8.4586e-5 kBq; lognormal SD95 3.0974
  (2,3,1,1,3,5,BU:3);
- Toluene [emissions to air, high. pop.]: 1.09e-7 kg; lognormal SD95 1.6249
  (2,3,1,1,3,5,BU:1.5);
- Uranium-238 [emissions to air, high. pop.]: 2.61e-5 kBq; lognormal SD95 3.0974
  (2,3,1,1,3,5,BU:3);
- Vanadium [emissions to air, high. pop.]: 2.79e-8 kg; lognormal SD95 5.1111
  (2,3,1,1,3,5,BU:5);
- Xylene [emissions to air, high. pop.]: 9.22e-7 kg; lognormal SD95 1.6249
  (2,3,1,1,3,5,BU:1.5);
- Zinc [emissions to air, high. pop.]: 1.9e-8 kg; lognormal SD95 5.2623
  (same comment as for Arsenic)
- NMVOC, non-methane volatile organic compounds, unspecified origin [emissions to air, high. pop.]: 1e-6 kg; lognormal SD95 1.7755
  (1,2,5,5,1,1,BU:1.5)based on available emission factors (EMEP/EEA air pollutant emission inventory guidebook)
- Polychlorinated biphenyls [emissions to air, high. pop.]: 3.3e-15 kg; lognormal SD95 3.2292
  (same comment as for PAH, polycyclic aromatic hydrocarbons)
- Benzene, hexachloro- [emissions to air, high. pop.]: 6.7e-12 kg; lognormal SD95 3.2292
  (same comment as for PAH, polycyclic aromatic hydrocarbons)
- Carbon black [emissions to air, unspecified]: 1.72e-7 kg; lognormal SD95 5.2623
  (same comment as for Arsenic)
- Dioxin, 2,3,7,8 Tetrachlorodibenzo-p- [emissions to air, unspecified]: 1e-14 kg; lognormal SD95 3.2292
  (same comment as for PAH, polycyclic aromatic hydrocarbons)
- Water [emissions to water, unspecified]: 3.325 kg; lognormal SD95 2.5196
  (5,5,5,5,5,BU:1.05); All uncertainty-values set to 5.0 by default. Balance of input water

## Sampling procedure
Databases/ literature data based on regional statistics.

## Extrapolations
Extrapolations for some exchanges applied where not all plants in the region reported complete data. See exchange comments for details.

## Sources
- Itten R., Oberschelp C., Kroehnert H., Stucki M., 2023, 2023 - LCI solid fossil fuel - Itten, Project report, ZHAW, Waedenswil, CH

## Validation
27.07.2023
