# Biogas purification, to methane, 97 vol-%, glycol washing process

Dataset: EcoSpold 1, unit process
Functional unit: 1 m3
Category: fuels / biofuels\methane
Geography: CH
Time period: 2010-01 to 2010-12
Production volume: 450 m3/h in Switzerland in 2010
Share of production covered: 100 %
Generated by: Matthias Stucki
accessRestrictedTo: 0
copyright: true

## General comment
Inventory refers to 1 m3 of methane. Electricity consumption and emissions represent the raw gas compression, H2S removal, gas conditioning and methane enrichment of biogas. The disposal of activated carbon is neglected. Infrastructure expenditures are included employing generic data for facilities of a chemical plant as approximation.;
Synonyms: Selexol, Genosorb;

## Included processes
Emissions due to leakage and purification of biogas. Input of energy and auxiliary materials. Biogas input excluded from the dataset.

## Geography
Data represents conditions of biogas purification plants in Switzerland. Energy and material consumption data are from two Swiss operators. Emissions from leakage are calculated.

## Technology
Glycol washing using Gensorob as washing agent.

## Reference product
- Biogas purification, to methane, 97 vol-%, glycol washing process [CH]: 1 m3

## Inputs from technosphere
- Potassium hydroxide, at regional storage [RER]: 3.9753e-6 kg; lognormal SD95 3.0909
  (4,5,1,5,1,5); activated carbon impregnation with 2.5 % of potassium iodide for H2S removal
- Disposal, hazardous waste, 25% water, to hazardous waste incineration [CH]: 0.00017547 kg; lognormal SD95 1.521
  (4,2,1,3,1,5); used washing chemicals
- Transport, freight, lorry, 7.5t-16t gross weight, fleet average [CH]: 2.6872e-5 tkm; lognormal SD95 2.095
  (4,5,na,na,na,na); standard distance 50km
- Triethylene glycol, at plant [RER]: 8.7735e-5 kg; lognormal SD95 1.1635
  (3,2,1,3,1,5); assumption from amino washing
- Dimethyl ether, at plant [RER]: 8.7735e-5 kg; lognormal SD95 3.0077
  (3,2,1,3,1,5); 50% of genosorb
- Chemical plant, organics [RER]: 4e-10 p; lognormal SD95 3.3094
  (3,4,3,3,4,5); generic value
- Charcoal, at plant [GLO]: 0.000208 kg; lognormal SD95 3.0909
  (1,4,1,3,3,5); EMPA (2009)
- Electricity, medium voltage, at grid [CH]: 0.88789 kWh; lognormal SD95 1.0907
  (2,3,2,3,1,4); literature
- Transport, freight, rail, electricity with shunting [CH]: 0.00032247 tkm; lognormal SD95 2.095
  (4,5,na,na,na,na); standard distance 600km
- Lubricating oil, at plant [RER]: 0.00015 kg; lognormal SD95 1.0907
  (1,4,1,3,3,5); EMPA (2009)

## Emissions to nature
- Methane, biogenic [emissions to air, high. pop.]: 0.015643 kg; lognormal SD95 2.0165
  (1,3,1,1,1,5); Emission factor in literature
- Carbon dioxide, biogenic [emissions to air, high. pop.]: 0.47886 kg; lognormal SD95 1.1249
  (4,3,1,1,1,5); calculated from difference between input and output
- Heat, waste [emissions to air, high. pop.]: 3.1964 MJ; lognormal SD95 1.0907
  (2,3,2,3,1,4); calculated from energy consumption
- Hydrogen sulfide [emissions to air, high. pop.]: 2.3107e-6 kg; lognormal SD95 1.521
  (4,3,1,1,1,5); calculated from H2S content in waste gas
- Sulfur dioxide [emissions to air, high. pop.]: 8.7704e-6 kg; lognormal SD95 1.1267
  (4,1,1,1,1,5); retained sulphur is oxidised

## Sampling procedure
Literature data, personal communication

## Sources
- Stucki M., Jungbluth N., Leuenberger M., 2011, 2011 - LCA biogas prod. from diff. substrates - Stucki, Project report, 320, ESU-services Ltd., Uster, CH
Stucki M., Jungbluth N., Leuenberger M. (2011) Life Cycle Assessment of Biogas Production from Different Substrates. Project report. Volume: 320. ESU-services Ltd.. Uster, CH.
Type: Separate publication
Source: Report
First author: Stucki M.
Other authors: Jungbluth N., Leuenberger M.
Year: 2011
Title of anthology: Project report
Place of publication: Uster, CH
Publisher: ESU-services Ltd.
Volume No: 320
Original title: Life Cycle Assessment of Biogas Production from Different Substrates

## Validation
Proof reading validation: 31.01.2012; Other validation: \\Server\e\ESU-Docs\Projektablage\320_FP Biomasse Biogas_Substrate\Ecospold\Veröffentlicht\[stucki-2011-biogas-purification.xlsx]X-Process;
