# Pipeline, natural gas, long distance, high capacity, offshore

Dataset: EcoSpold 1, unit process, infrastructure
Functional unit: 1 km
Category: pipeline / infrastructure
Geography: GLO
Time period: 2000-01 to 2000-12
Generated by: Mireille Faist Emmenegger
accessRestrictedTo: 0
copyright: true

## General comment
It is assumed that all pipelines stays in the sea at the end of their lifetime. The weighted average life time of the pipeline is 45 years.;

## Included processes
This dataset describes the infrastructure needed for a long-distance undersea pipeline with a capacity from average 1.6 e6 Sm3/h gas including material requirements, construction, anode emissions and disposal.

## Technology
The quantity of steel and concrete is calculated for an average Norwegian North Sea pipeline (diameter 1000mm, thickness steel 25mm, thickness concrete 100mm).

## Reference product
- Pipeline, natural gas, long distance, high capacity, offshore [GLO]: 1 km
  Global

## Inputs from technosphere
- Disposal, municipal solid waste, 22.9% water, to municipal incineration [CH]: 1260 kg; lognormal SD95 1.1
  (2,3,1,1,1,3); environmental report
- Disposal, hazardous waste, 25% water, to hazardous waste incineration [CH]: 1130 kg; lognormal SD95 1.1
  (2,3,1,1,1,3); environmental report
- Transport, freight, rail [RER]: 122000 tkm; lognormal SD95 2.09
  (4,5,na,na,na,na); standard distance
- Concrete, sole plate and foundation, at plant [CH]: 361 m3; lognormal SD95 1.31
  (2,1,4,1,1,5); estimates based on published data
- Disposal, natural gas pipeline, 0% water, to construction waste landfill [CH]: 303000 kg; lognormal SD95 1.41
  (3,5,3,1,3,5); estimates
- Copper, at regional storage [RER]: 0.21 kg; lognormal SD95 10.4
  (5,5,1,1,1,na); Estimation for aluminium anode, basic uncertainity estimated = 10
- Transport, transoceanic freight ship [OCE]: 182000 tkm; lognormal SD95 2.33
  (5,3,1,1,3,5); estimated distances
- Diesel, burned in building machine, average [CH]: 2.53e6 MJ; lognormal SD95 2.01
  (2,3,1,1,5,3); environmental report
- Drawing of pipes, steel [RER]: 605000 kg; lognormal SD95 1.22
  (2,1,1,1,1,5); estimates based on published data
- Reinforcing steel, at plant [RER]: 605000 kg; lognormal SD95 1.22
  (2,1,1,1,1,5); estimates based on published data
- Zinc, primary, at regional storage [RER]: 175 kg; lognormal SD95 10.4
  (5,5,1,1,1,na); Estimation for aluminium anode, basic uncertainity estimated = 10
- Cast iron, at plant [RER]: 4.2 kg; lognormal SD95 10.4
  (5,5,1,1,1,na); Estimation for aluminium anode, basic uncertainity estimated = 10
- MG-silicon, at plant [NO]: 5.25 kg; lognormal SD95 10.4
  (5,5,1,1,1,na); Estimation for aluminium anode, basic uncertainity estimated = 10
- Aluminium, production mix, cast alloy, at plant [RER]: 3320 kg; lognormal SD95 10.4
  (5,5,1,1,1,na); Estimation for aluminium anode, basic uncertainity estimated = 10
- Transport, freight, lorry, fleet average [RER]: 76100 tkm; lognormal SD95 2.09
  (4,5,na,na,na,na); standard distance

## Inputs from nature
- Transformation, from industrial area, benthos [resources, land]: 55 m2; lognormal SD95 2.11
  (4,3,3,1,1,5); estimates
- Transformation, to industrial area, benthos [resources, land]: 110 m2; lognormal SD95 2.11
  (4,3,3,1,1,5); estimates
- Transformation, from seabed, unspecified [resources, land]: 110 m2; lognormal SD95 2.11
  (4,3,3,1,1,5); estimates
- Water, unspecified natural origin/m3 [resources, in water]: 805 m3; lognormal SD95 1.1
  (2,3,1,1,1,3); environmental report
- Transformation, to sea and ocean [resources, land]: 55 m2; lognormal SD95 2.11
  (4,3,3,1,1,5); estimates
- Occupation, industrial area, benthos [resources, land]: 5500 m2a; lognormal SD95 2.11
  (4,3,3,1,1,5); estimates

## Emissions to nature
- Iron [emissions to water, ocean]: 3.57 kg; lognormal SD95 10.4
  (5,5,1,1,1,na); Estimation 85% utilisation of anode
- Aluminium [emissions to water, ocean]: 2820 kg; lognormal SD95 10.4
  (5,5,1,1,1,na); Estimation 85% utilisation of anode
- Copper [emissions to water, ocean]: 0.178 kg; lognormal SD95 10.4
  (5,5,1,1,1,na); Estimation 85% utilisation of anode
- Silicon [emissions to water, ocean]: 4.46 kg; lognormal SD95 10.4
  (5,5,1,1,1,na); Estimation 85% utilisation of anode
- Titanium [emissions to water, ocean]: 0.744 kg; lognormal SD95 10.4
  (5,5,1,1,1,na); Estimation 85% utilisation of anode
- Zinc [emissions to water, ocean]: 149 kg; lognormal SD95 10.4
  (5,5,1,1,1,na); Estimation 85% utilisation of anode
- Water [emissions to water, unspecified]: 764750 kg; lognormal SD95 2.5196
  (5,5,5,5,5,BU:1.05); All uncertainty-values set to 5.0 by default. Balance of input water

## Sampling procedure
environmental report

## Sources
- Faist Emmenegger M., Heck T., Jungbluth N., Tuchschmid M., 2007, 2007 - Natural gas - Faist-Emmeneger, Sachbilanzen von Energiesystemen. Final report No. 6 ecoinvent data v2.0, 6, Swiss Centre for LCI, PSI, ESU-services Ltd., Duebendorf and Villigen, CH
Faist Emmenegger, M., Heck, T., Jungbluth, N. (2007) Erdgas. Sachbilanzen von Energiesystemen. Final report No. 6 ecoinvent data v2.0. Editors: Dones R.. Volume: 6. Swiss Centre for LCI, PSI. Dübendorf and Villigen, CH.
Type: Measurement on site
Source: CD-ROM
First author: Faist Emmenegger, M.
Other authors: Heck, T., Jungbluth, N.
Year: 2007
Name of editors: Dones R.
Title of anthology: Sachbilanzen von Energiesystemen. Final report No. 6 ecoinvent data v2.0
Place of publication: Dübendorf and Villigen, CH
Publisher: Swiss Centre for LCI, PSI
Volume No: 6

## Validation
Proof reading validation: Passed.; Other validation: none;
