# Substation, land-based, 740MW offshore wind farm

Dataset: EcoSpold 1, unit process, infrastructure
Functional unit: 1 unit
Category: wind power / production of components
Geography: RER
Time period: 2024 to 2024
Share of production covered: 100 %
Generated by: Hanna Kroehnert
accessRestrictedTo: 0
copyright: true

## Included processes
Land-based substation of a 740 MW offshore wind farm. Included processes: manufacturing, transports, installation, replacements, decommission and waste treatement. Calculated for FU of 1p.
Data are based on the IEA Wind 740-10 MW Reference Offshore Wind Plant, derived in the IEA Wind Task 55, consisting of 74 wind turbines with a nominal capacity of 10 MW (Kainz, Quick, et al., 2024).

Main data source:
Kainz, S. (2025). Life Cycle Inventory of the IEA Wind 740-10-MW Reference Offshore Wind Plant with irregular layout [Dataset]. Zenodo. https://doi.org/10.5281/ZENODO.15880601

## Reference product
- Substation, land-based, 740MW offshore wind farm [RER]: 1 unit

## Inputs from technosphere
- Aluminium, production mix, at plant [RER]: 40150 kg; lognormal SD95 1.1466
  (2,3,3,2,1,3,BU:1.05); Input based on Kainz, S. (2025)
- Copper, at regional storage [RER]: 83037 kg; lognormal SD95 1.1466
  (2,3,3,2,1,3,BU:1.05); Input based on Kainz, S. (2025)
- Epoxy resin, liquid, at plant [RER]: 671.01 kg; lognormal SD95 1.1466
  (2,3,3,2,1,3,BU:1.05); Input based on Kainz, S. (2025)
- Glass fibre, at plant [RER]: 3757.7 kg; lognormal SD95 1.1466
  (2,3,3,2,1,3,BU:1.05); Input based on Kainz, S. (2025)
- Steel, low-alloyed, at plant [RER]: 391120 kg; lognormal SD95 1.1466
  (2,3,3,2,1,3,BU:1.05); Input based on Kainz, S. (2025)
- Coating powder, at plant [RER]: 335.51 kg; lognormal SD95 1.1466
  (2,3,3,2,1,3,BU:1.05); Input based on Kainz, S. (2025)
- Polyvinylchloride, at regional storage [RER]: 96.827 kg; lognormal SD95 1.1466
  (2,3,3,2,1,3,BU:1.05); Input based on Kainz, S. (2025)
- Ceramic tiles, at regional storage [CH]: 14135 kg; lognormal SD95 1.1466
  (2,3,3,2,1,3,BU:1.05); Input based on Kainz, S. (2025)
- Lubricating oil, at plant [RER]: 163400 kg; lognormal SD95 1.1466
  (2,3,3,2,1,3,BU:1.05); Input based on Kainz, S. (2025)
- Kraft paper, unbleached, at plant [RER]: 6742.6 kg; lognormal SD95 1.1466
  (2,3,3,2,1,3,BU:1.05); Input based on Kainz, S. (2025)
- Fibreboard soft, at plant (u=7%) [CH]: 128.45 m3; lognormal SD95 1.1466
  (2,3,3,2,1,3,BU:1.05); Input based on Kainz, S. (2025)
- Aluminium product manufacturing, average metal working [RER]: 40150 kg; lognormal SD95 1.1466
  (2,3,3,2,1,3,BU:1.05); Input based on Kainz, S. (2025)
- Copper product manufacturing, average metal working [RER]: 83037 kg; lognormal SD95 1.1466
  (2,3,3,2,1,3,BU:1.05); Input based on Kainz, S. (2025)
- Sheet rolling, steel [RER]: 391120 kg; lognormal SD95 1.1466
  (2,3,3,2,1,3,BU:1.05); Input based on Kainz, S. (2025)
- Injection moulding [RER]: 96.827 kg; lognormal SD95 1.1466
  (2,3,3,2,1,3,BU:1.05); Input based on Kainz, S. (2025)
- Transport, freight, lorry, fleet average [RER]: 360710 tkm; lognormal SD95 2.0675
  (4,3,3,1,1,3,BU:2); Includes the transportation of components to port of installation.
- Transport, freight, lorry, diesel, 26t gross weight, 2010, EURO-V, regional delivery [RER]: 97042 tkm; lognormal SD95 2.0675
  (4,3,3,1,1,3,BU:2); Includes the transportation of materials to component manufacturing site and components to waste treatement site.
- Transport, transoceanic freight ship [OCE]: 3.2464e6 tkm; lognormal SD95 2.2975
  (4,3,3,1,4,3,BU:2); Includes the transportation of components to installation port and vessel activiy for installation and decommissioning.
- Operation, freight train, diesel [RER]: 211150 tkm; lognormal SD95 2.0675
  (4,3,3,1,1,3,BU:2); Includes the transportation of components to port of installation.
- Recycling steel and iron [RER]: 450450 kg; lognormal SD95 1.2748
  (2,4,3,3,3,3,BU:1.05); Own calculation; recycling of steel and iron; assumed recycling rate: 95%
- Disposal, steel, 0% water, to construction waste landfill [CH]: 23708 kg; lognormal SD95 1.2748
  (2,4,3,3,3,3,BU:1.05); Own calculation; landfill of steel and iron; assumed landfill rate: 5%
- Disposal, aluminium, 0% water, to sanitary landfill [CH]: 2007.5 kg; lognormal SD95 1.2748
  (2,4,3,3,3,3,BU:1.05); Own calculation; landfill of aluminum; assumed landfill rate: 5%
- Disposal, plastics, mixture, 15.3% water, to municipal incineration [CH]: 48.413 kg; lognormal SD95 1.2748
  (2,4,3,3,3,3,BU:1.05); Own calculation; incineration of plastic materials; assumed incineration rate: 50%
- Disposal, plastics, mixture, 15.3% water, to sanitary landfill [CH]: 48.413 kg; lognormal SD95 1.2748
  (2,4,3,3,3,3,BU:1.05); Own calculation; landfill of plastic materials; assumed landfill rate: 50%
- Disposal, inert material, 0% water, to sanitary landfill [CH]: 207020 kg; lognormal SD95 1.2748
  (2,4,3,3,3,3,BU:1.05); Own calculation; landfill of remaining materials (which are not classified as steel and iron, aluminum, copper or plastics); assumed landfill rate 100%

## Sources
- Kroehnert H., Frehner A., Stucki M., 2025, 2025 - LCI wind Energy - Kroehnert, Project report, 0, ZHAW, Waedenswil, CH

## Validation
22.07.2025
"S:\pools\n\N-IUNR-FG-LCA\Projekte\Wind LCA\LCI-Update\Sachbilanz"
