# Soap, at plant

Dataset: EcoSpold 1, unit process
Functional unit: 1 kg
Category: chemicals / washing agents\tensides
Geography: RER
Time period: 2000-01 to 2000-12
Share of production covered: 60 %
Generated by: Rainer Zah
accessRestrictedTo: 0
copyright: true

## General comment
data based on the ECOSOL study of the European surfactant industry. Allocations in multioutput processes were made, using the relative mass outputs of products.;
CAS number: 068952-95-4;

## Included processes
This module contains material and energy input, production of waste and emissions for the production of soap out of fatty acids from palm and coconut oil. Transports and infrastructure have been estimated. No water consumption included.

## Technology
Average technology for the production of soap out of a blend of fatty acids from palm and coconut oil, representing typical European production mix in the mid 90s. The ratio of short to long fatty acid chains is 20:80, the moisture 13%.

## Time period
data of published literature

## Reference product
- Soap, at plant [RER]: 1 kg
  Europe

## Inputs from technosphere
- Transport, freight, lorry, fleet average [RER]: 0.088 tkm; lognormal SD95 2.1
  (2,3,3,2,1,4);
- Chemical plant, organics [RER]: 4e-10 p; lognormal SD95 3.1
  (2,3,3,2,1,4);
- Sodium hydroxide, 50% in H2O, production mix, at plant [RER]: 0.119 kg; lognormal SD95 1.3
  (2,3,3,2,1,4);
- Electricity, medium voltage, production ENTSO-E, at grid: 0.0183 kWh; lognormal SD95 1.3
  (2,3,3,2,1,4);
- Crude coconut oil, at plant [PH]: 0.139 kg; lognormal SD95 1.3
  (2,3,3,2,1,4);
- Transport, freight, rail [RER]: 0.528 tkm; lognormal SD95 2.1
  (2,3,3,2,1,4);
- Sodium chloride, powder, at plant [RER]: 0.005 kg; lognormal SD95 1.3
  (2,3,3,2,1,4);
- Disposal, inert waste, 5% water, to construction waste landfill [CH]: 0.00239 kg; lognormal SD95 1.3
  (2,3,3,2,1,4);
- Fatty acids, from vegetarian oil, at plant [RER]: 0.016 kg; lognormal SD95 1.3
  (2,3,3,2,1,4);
- Heat, unspecific, in chemical plant [RER]: 3.92 MJ; lognormal SD95 1.3
  (2,3,3,2,1,4);
- Palm oil, at oil mill [MY]: 0.614 kg; lognormal SD95 1.3
  (2,3,3,2,1,4);

## Emissions to nature
- Mercury [emissions to air, high. pop.]: 3.3e-7 kg; lognormal SD95 5.1
  (2,3,3,2,1,4);
- Particulates, > 10 um [emissions to air, high. pop.]: 0.000151 kg; lognormal SD95 1.6
  (2,3,3,2,1,4);
- Suspended solids, unspecified [emissions to water, river]: 0.00144, 0.00244 kg (2 entries); lognormal SD95 1.6
  (2,3,3,2,1,4);
- Mercury [emissions to water, river]: 3.82e-8 kg; lognormal SD95 5.1
  (2,3,3,2,1,4);
- Nitrogen [emissions to water, river]: 6.06e-6 kg; lognormal SD95 5.1
  (2,3,3,2,1,4);
- Nickel [emissions to water, river]: 3.53e-8 kg; lognormal SD95 5.1
  (2,3,3,2,1,4);
- Sulfur dioxide [emissions to air, high. pop.]: 1.11e-5 kg; lognormal SD95 1.3
  (2,3,3,2,1,4);
- NMVOC, non-methane volatile organic compounds, unspecified origin [emissions to air, high. pop.]: 4.5e-6 kg; lognormal SD95 1.6
  (2,3,3,2,1,4);
- Chlorine [emissions to air, high. pop.]: 6.11e-8 kg; lognormal SD95 1.6
  (2,3,3,2,1,4);
- Carbon monoxide, fossil [emissions to air, high. pop.]: 3.32e-6 kg; lognormal SD95 5.1
  (2,3,3,2,1,4);
- Sulfide [emissions to water, river]: 2.7e-6 kg; lognormal SD95 1.6
  (2,3,3,2,1,4);
- COD, Chemical Oxygen Demand [emissions to water, river]: 0.00638 kg; lognormal SD95 1.6
  (2,3,3,2,1,4);
- Acidity, unspecified [emissions to water, river]: 4.19e-6 kg; lognormal SD95 1.6
  (2,3,3,2,1,4);
- Chromium [emissions to water, river]: 2.01e-7 kg; lognormal SD95 5.1
  (2,3,3,2,1,4);
- Methane, fossil [emissions to air, high. pop.]: 0.000178 kg; lognormal SD95 1.3
  (2,3,3,2,1,4);
- Carbon dioxide, fossil [emissions to air, high. pop.]: 3.5e-5 kg; lognormal SD95 1.3
  (2,3,3,2,1,4);
- BOD5, Biological Oxygen Demand [emissions to water, river]: 0.00134 kg; lognormal SD95 1.6
  (2,3,3,2,1,4);
- Carbon dioxide, biogenic [emissions to air, high. pop.]: 0.00635 kg; lognormal SD95 1.3
  (2,3,3,2,1,4);
- Iron [emissions to water, river]: 0.00061 kg; lognormal SD95 5.1
  (2,3,3,2,1,4);
- Lead [emissions to water, river]: 1.61e-8 kg; lognormal SD95 5.1
  (2,3,3,2,1,4);
- Zinc [emissions to water, river]: 1.77e-7 kg; lognormal SD95 5.1
  (2,3,3,2,1,4);

## Sampling procedure
data out of ECOSOL study of European Surfactant Industry. Common translation rules used, reported in Chemical report (Althaus et al. 2003).

## Extrapolations
unspecified metal emissions to water omitted.

## Sources
- Zah R., Hischier R., 2007, 2007 - LCI detergents - Zah, Final report ecoinvent data v2.0, 12, Swiss Centre for LCI, Empa - TSL, Duebendorf and St. Gallen, CH
Zah R., Hischier R. (2007) Life Cycle Inventories of Detergents. Final report ecoinvent data v2.0. Volume: 12. Swiss Centre for LCI, Empa - TSL. Dübendorf, CH.
Type: Measurement on site
Source: CD-ROM
First author: Zah R.
Other authors: Hischier R.
Year: 2007
Title of anthology: Final report ecoinvent data v2.0
Place of publication: Dübendorf, CH
Publisher: Swiss Centre for LCI, Empa - TSL
Volume No: 12

## Validation
Proof reading validation: Passed.; Other validation: none;
