# High pressure hydrogen Type I storage tank production

Dataset: EcoSpold 1, unit process
Functional unit: 1 p
Category: pipeline / infrastructure
Geography: GLO
Time period: 2024-01 to 2024-01
Generated by: Romain Sacchi
accessRestrictedTo: 0
copyright: true

## General comment
Inventory for a high pressure storage Type I tank, with a capacity of 35 kg of hydrogen at 200 bar. Rough approximation: based on Jumbo cylinder model from Sino Energy Tech. A 2’420 kg heavy steel tank for a volume of 2’320 liters, for storing hydrogen at a pressure of 200 bar, equivalent to 35 kg of hydrogen stored at 15 degrees Celsius. The dataset "storage production, 10'000 l" is used as a proxy, and only the inputs of steel, steel working and transport inputs have been modified accordingly. A lifetime of 20 years is assumed. For more information, refer to Sacchi and Bauer, 2023.

## Reference product
- High pressure hydrogen Type I storage tank production [GLO]: 1 p
  not defined

## Inputs from technosphere
- Reinforcing steel, at plant [RER]: 2420 kg
- Sheet rolling, steel [RER]: 2420 kg
- Aluminium, production mix, wrought alloy, at plant [RER]: 87.2 kg
- Sheet rolling, aluminium [RER]: 87.2 kg
- Rock wool, at plant [CH]: 84 kg
- Welding, arc, aluminium [RER]: 17.7 m
- Welding, arc, steel [RER]: 15.4 m
- Alkyd paint, white, 60% in H2O, at plant [RER]: 4.2 kg
- Chromium steel 18/8, at plant [RER]: 3.7 kg
- Transport, freight, lorry, 16t-32t gross weight, fleet average [RER]: 91.8 tkm
- Transport, freight, rail [RER]: 1296 tkm
- Transport, freight, rail [RER]: 502.2 tkm; lognormal SD95 2.208
  Generic transport distances calculated based on Table 4.2 of the ecoinvent v.2 Methodology report. Distribution: 836.97 kg over 600.0 km.
- Transport, freight, lorry, 16t-32t gross weight, fleet average [RER]: 301.5 tkm; lognormal SD95 2.208
  Generic transport distances calculated based on Table 4.2 of the ecoinvent v.2 Methodology report. Distribution: 334.99 kg over 900.0 km.
- Transport, barge tanker [RER]: 8.4 tkm; lognormal SD95 2.208
  Generic transport distances calculated based on Table 4.2 of the ecoinvent v.2 Methodology report. Distribution: 84.0 kg over 100.0 km.
- Treatment, pig iron production effluent, to wastewater treatment, class 3 [CH]: 84 m3
- Disposal, mineral wool, 0% water, to construction waste landfill [CH]: 10.2 kg

## Inputs from nature
- Water, unspecified natural origin/m3 [resources, in water]: 12.8 m3

## Emissions to nature
- Water [emissions to water, unspecified]: 12160 kg; lognormal SD95 2.5196
  (5,5,5,5,5,BU:1.05); All uncertainty-values set to 5.0 by default. Balance of input water

## Sampling procedure
Sampling procedure: Literature data

## Sources
- Sacchi R., Bauer C., 2024, 2024 - LCA power-to-X in residential sector - Sacchi, Project report, PSI, Villigen, CH

## Validation
Proof reading validation: Passed, Other validation: none, Validator: Rolf Frischknecht, Telephone: 0041 44 940 61 91, E-mail: frischknecht@treeze.ch, Company: treeze, Country: CH
