# Treatment, sewage grass refinery, to wastewater treatment, class 3

Dataset: EcoSpold 1, unit process
Functional unit: 1 m3
Category: wastewater treatment / unspecified
Geography: CH
Time period: 2000-01 to 2000-12
Share of production covered: 1 %
Generated by: Michael Spielmann
accessRestrictedTo: 0
copyright: true

## General comment
Wastewater purified in a medium size municipal wastewater treatment plant (capacity class 3), with an average capacity size of 24900 per-captia-equivalents PCE. \nWastewater contains (in kg/m3): TOC: 25.4 (GSD=122.5%);

## Included processes
Infrastructure materials for municipal wastewater treatment plant, transports, dismantling. Land use burdens.

## Technology
Three stage wastewater treatment (mechanical, biological, chemical) including sludge digestion (fermentation) according to the average technology in Switzerland

## Reference product
- Treatment, sewage grass refinery, to wastewater treatment, class 3 [CH]: 1 m3
  SWITZERLAND

## Inputs from technosphere
- Residual material landfill facility [CH]: 2.4927e-11 p; lognormal SD95 1.4495
  burden from sludge incineration. Uncertainty calculated from wastewater composition and treatment model
- Disposal, cement, hydrated, 0% water, to residual material landfill [CH]: 0.011965 kg; lognormal SD95 1.5179
  (same comment as for Residual material landfill facility)
- Transport, freight, rail [RER]: 0.00047881 tkm; lognormal SD95 1.5176
  direct wastewater treatment plant burden plus burden from sludge incineration. Uncertainty calculated from wastewater composition and treatment model
- Sewer grid, class 3 [CH]: 2.1782e-7 km; lognormal SD95 1
  uncertainty heeded in exchanges of the module
- Process-specific burdens, residual material landfill [CH]: 0.011965 kg; lognormal SD95 1.4495
  (same comment as for Residual material landfill facility)
- Slag compartment [CH]: 4.6091e-11 p; lognormal SD95 1.4438
  (same comment as for Residual material landfill facility)
- Electricity from waste, at municipal waste incineration plant [CH]: 2.2573 kWh; lognormal SD95 3.7918
  (same comment as for Residual material landfill facility)
- Municipal waste incineration plant [CH]: 3.9252e-9 p; lognormal SD95 1.0952
  (same comment as for Residual material landfill facility)
- Wastewater treatment plant, class 3 [CH]: 5.6882e-9 p; lognormal SD95 1
  uncertainty heeded in exchanges of the module
- Process-specific burdens, municipal waste incineration [CH]: 15.701 kg; lognormal SD95 1.0952
  (same comment as for Residual material landfill facility)
- Chemicals inorganic, at plant [GLO]: 2.2289e-7 kg; lognormal SD95 1.5652
  (same comment as for Residual material landfill facility)
- Hydrochloric acid, 30% in H2O, at plant [RER]: 1.3373e-7 kg; lognormal SD95 1.5652
  (same comment as for Residual material landfill facility)
- Cement, unspecified, at plant [CH]: 0.0047859 kg; lognormal SD95 1.5179
  (same comment as for Residual material landfill facility)
- Transport, freight, lorry, 16t-32t gross weight, fleet average [CH]: 1.845 tkm; lognormal SD95 1.0617
  (same comment as for Transport, freight, rail)
- Heat from waste, at municipal waste incineration plant [CH]: 13.168 MJ; lognormal SD95 1.1087
  (same comment as for Residual material landfill facility)
- Process-specific burdens, slag compartment [CH]: 0.025926 kg; lognormal SD95 1.4438
  (same comment as for Residual material landfill facility)
- Slurry spreading, by vacuum tanker [CH]: 0.074219 m3; lognormal SD95 1.0736
  burden from sludge spreading. Uncertainty calculated from wastewater composition and treatment model
- Electricity, low voltage, at grid [CH]: 29.356 kWh; lognormal SD95 1.404
  direct wastewater treatment plant burden. Uncertainty calculated from wastewater composition and treatment model
- Disposal, plastics, mixture, 15.3% water, to municipal incineration [CH]: 0.0155 kg; lognormal SD95 1.07
  (same comment as for Electricity, low voltage, at grid)
- Disposal, paper, 11.2% water, to municipal incineration [CH]: 0.0155 kg; lognormal SD95 1.07
  (same comment as for Electricity, low voltage, at grid)

## Emissions to nature
- COD, Chemical Oxygen Demand [emissions to water, groundwater, long-term]: 0.085588 kg; lognormal SD95 1.4273
  emission from sludge incineration. Uncertainty calculated from wastewater composition and treatment model
- COD, Chemical Oxygen Demand [emissions to water, river]: 11.368 kg; lognormal SD95 1.1138
  sewer overload discharge plus direct wastewater treatment plant emission plus emission from sludge incineration. Uncertainty calculated from wastewater composition and treatment model
- TOC, Total Organic Carbon [emissions to water, groundwater, long-term]: 0.033867 kg; lognormal SD95 1.4273
  (same comment as for COD, Chemical Oxygen Demand)
- Carbon dioxide, fossil [emissions to air, high. pop.]: 70.727 kg; lognormal SD95 1.1707
  (same comment as for COD, Chemical Oxygen Demand)
- Carbon [emissions to soil, agricultural]: 3.0578 kg; lognormal SD95 1.3499
  emission from sludge spreading. Uncertainty calculated from wastewater composition and treatment model
- Methane, fossil [emissions to air, high. pop.]: 0.18948 kg; lognormal SD95 1.615
  (same comment as for COD, Chemical Oxygen Demand)
- BOD5, Biological Oxygen Demand [emissions to water, river]: 3.7332 kg; lognormal SD95 1.1573
  (same comment as for COD, Chemical Oxygen Demand)
- BOD5, Biological Oxygen Demand [emissions to water, groundwater, long-term]: 0.027995 kg; lognormal SD95 1.4273
  (same comment as for COD, Chemical Oxygen Demand)
- DOC, Dissolved Organic Carbon [emissions to water, river]: 2.8449 kg; lognormal SD95 1.148
  (same comment as for COD, Chemical Oxygen Demand)
- Carbon monoxide, fossil [emissions to air, high. pop.]: 0.05988 kg; lognormal SD95 1.7797
  (same comment as for COD, Chemical Oxygen Demand)
- TOC, Total Organic Carbon [emissions to water, river]: 3.0457 kg; lognormal SD95 1.1232
  (same comment as for COD, Chemical Oxygen Demand)
- Heat, waste [emissions to air, high. pop.]: 314.02 MJ; lognormal SD95 1.2475
  direct wastewater treatment plant emission plus emission from sludge incineration. Uncertainty calculated from wastewater composition and treatment model
- Heat, waste [emissions to water, river]: 448.31 MJ; lognormal SD95 1.1483
  (same comment as for Heat, waste)
- DOC, Dissolved Organic Carbon [emissions to water, groundwater, long-term]: 0.033867 kg; lognormal SD95 1.4273
  (same comment as for COD, Chemical Oxygen Demand)
- NMVOC, non-methane volatile organic compounds, unspecified origin [emissions to air, high. pop.]: 0.000861 kg; lognormal SD95 2.3001
  direct digester gas emission. Uncertainty calculated from wastewater composition and treatment model

## Sampling procedure
literature

## Extrapolations
wastewater compositions from literature and/or estimates

## Sources
- Jungbluth N., Chudacoff M., Dauriat A., Dinkel F., Doka G., Faist Emmenegger M., Gnansounou E., Kljun N., Spielmann M., Stettler C., Sutter J., 2007, 2007 - LCI bioenergy - Jungbluth, Final report ecoinvent data v2.0, 17, Swiss Centre for LCI, ESU-services Ltd., Duebendorf and Uster, CH
Jungbluth N., Chudacoff M., Dauriat A., Dinkel F., Doka G., Faist Emmenegger M., Gnansounou E., Kljun N., Spielmann M., Stettler C., Sutter J. (2007) Life Cycle Inventories of Bioenergy. Final report ecoinvent data v2.0. Volume: 17. Swiss Centre for LCI, ESU. Duebendorf and Uster, CH.
Type: Measurement on site
Source: CD-ROM
First author: Jungbluth N.
Other authors: Chudacoff M., Dauriat A., Dinkel F., Doka G., Faist Emmenegger M., Gnansounou E., Kljun N., Spielmann M., Stettler C., Sutter J.
Year: 2007
Title of anthology: Final report ecoinvent data v2.0
Place of publication: Duebendorf and Uster, CH
Publisher: Swiss Centre for LCI, ESU
Volume No: 17

## Validation
Proof reading validation: passed.; Other validation: none;
