# Printed wiring board, mixed mounted, unspec., solder mix, at plant

Dataset: EcoSpold 1, unit process
Functional unit: 1 kg
Category: electronics / component
Geography: GLO
Time period: 2023-01 to 2029-12
Generated by: Lugas Raka Adrianto, Maulana Permana Ajie, Didier Beloin-Saint-Pierre
accessRestrictedTo: 0
copyright: false

## General comment
Data are based on own assumption - assuming a 50:50 mix between the two technologies (through-hole, surface mount); Geography: Own estimation - used for the global average;

## Included processes
This dataset represents a mix of the two mounting technologies (surface mount / through-hole mount); using for each of them a dataset representing a solder mix of Pb-containing and Pb-free solder. It includes processes of components mounting using lead and lead free solder technology.

## Technology
Dataset represents the mix of lead and lead-free mounting of unspecified PWBs.

## Reference product
- Printed wiring board, mixed mounted, unspec., solder mix, at plant [GLO]: 1 kg
  Global

## Inputs from technosphere
- Printed wiring board, surface mounted, unspec., solder mix, at plant [GLO]: 0.5 kg; lognormal SD95 1.45
  (4,3,4,3,3,5,BU:1.05); equal share
- Printed wiring board, through-hole mounted, unspec., solder mix, at plant [GLO]: 0.5 kg; lognormal SD95 1.45
  (4,3,4,3,3,5,BU:1.05); equal share, assumed

## Sampling procedure
own estimation

## Extrapolations
see Geography & Technology

## Sources
- Raka Adrianto L., Permana Ajie M., Beloin-Saint-Pierre D., 2024, 2024 - LCI ICT sector - Raka Adrianto, Empa, St. Gallen, CH

## Validation
Proof reading validation: Passed, Other validation: none, Validator: Mischa Zschokke, Company: Carbotech, Country: CH
