# Transport, freight, rail, electricity only

Dataset: EcoSpold 1, unit process
Functional unit: 1 tkm
Category: transport systems / train
Geography: RER
Time period: 2009-01 to 2015-12
Production volume: 105894Mio tkm
Share of production covered: 100 %
Generated by: Luana Krebs
accessRestrictedTo: 0
copyright: true

## General comment
Inventory refers to the entire transport life cycle. For rail infrastructure, expenditures and environmental interventions due to construction, renewal and disposal of rail tracks have been allocated based on the Gross tonne kilometre performance (218286 Mio. Gtkm). Expenditures due to operation of the rail infrastructure, as well as land use have been allocated based on the yearly train kilometre performance (105894 Mio. tkm). For the operation of goods transportation average data by rail in DE, AT,FR and IT were used. The data has been determined top down, by combining the total yearly energy consumption and the yearly performance of goods transportation.;

## Included processes
The inventory includes the actual energy consumption for an average goods train in Europe using electric energy. No diesel consumption and emissions of shunting processes are accounted for. But the production and maintenance of vehicles and railyway tracks are included.

## Technology
Average technology

## Time period
Time of publications

## Reference product
- Transport, freight, rail, electricity only [RER]: 1 tkm
  Europe

## Inputs from technosphere
- Railway track [CH]: 7.0345e-5 my; lognormal SD95 3.3302
  (4,4,1,3,4,5,BU:3); estimation based on track demand per Gtkm for CH (3,31E-8km/Gtkm) and the specific gross transport performance per tkm (Gtkm/tkm)); SBB Zahlen und Fakten 2014, UIC Statistic 2012
- Locomotive [RER]: 4.81e-10 p; lognormal SD95 3.3302
  (4,4,1,3,4,5,BU:3); average of the freight transport in AT (10%), IT (7%), FR (15%), DE (62%) and CH (5%); SBB Zahlen und Fakten 2014, UIC Statistic 2012
- Disposal, railway track [CH]: 7.0345e-5 my; lognormal SD95 3.3302
  (4,4,1,3,4,5,BU:3); same demand as for rail track; SBB Zahlen und Fakten 2014, UIC Statistic 2012
- Electricity, medium voltage, production ENTSO-E, at grid: 0.034067 kWh; lognormal SD95 1.6367
  (4,4,1,3,4,5,BU:1.05); electricity consumption in AT, DE, IT, FR, CH for freight transport, assumed losses 4,39%; UIC Statistik 2016 & 2018, SBB pers. Correspondence, Okt. 2020
- Maintenance, goods wagon [RER]: 4.1217e-9 p; lognormal SD95 3.3302
  (4,4,1,3,4,5,BU:3); same demand as for goods wagon; SBB Zahlen und Fakten 2014, UIC Statistic 2012
- Maintenance, locomotive [RER]: 4.81e-10 p; lognormal SD95 3.3302
  (4,4,1,3,4,5,BU:3); same demand as for locomotive; SBB Zahlen und Fakten 2014, UIC Statistic 2012
- Disposal, locomotive [RER]: 4.81e-10 p; lognormal SD95 3.3302
  (same comment as for Maintenance, locomotive)
- Goods wagon [RER]: 4.1217e-9 p; lognormal SD95 3.3302
  (same comment as for Locomotive)
- Operation, maintenance, railway track [CH]: 7.0345e-5 my; lognormal SD95 3.3302
  (same comment as for Disposal, railway track)

## Emissions to nature
- Lead [emissions to soil, industrial]: 1.7231e-12 kg; lognormal SD95 1.8893
  (4,4,1,3,4,5,BU:1.5); estimation based on the emission per Gkm from CH (kg/pkmunit/vkm)) and the average load; Data from ANABEL; Personal correspondence Gunter Adolf, SBB, June 2016; UIC Statistic 2012
- Zinc [emissions to soil, industrial]: 1.0186e-11 kg; lognormal SD95 1.8893
  (4,4,1,3,4,5,BU:1.5); estimation based on the emission per Gkm from CH (0,00E+0unit/vkm)) and the average load; Data from ANABEL; Personal correspondence Gunter Adolf, SBB, June 2016; UIC Statistic 2012
- Lead [emissions to air, unspecified]: 4.8545e-12 kg; lognormal SD95 5.3787
  (4,4,1,3,4,5,BU:5); estimation based on the emission per Gkm from CH (kg/pkmunit/vkm)) and the average load; Data from ANABEL; Personal correspondence Gunter Adolf, SBB, June 2016; UIC Statistic 2012
- Copper [emissions to air, unspecified]: 2.9119e-10 kg; lognormal SD95 5.3787
  (4,4,1,3,4,5,BU:5); estimation based on the emission per Gkm from CH (0,00E+0unit/vkm)) and the average load; Data from ANABEL; Personal correspondence Gunter Adolf, SBB, June 2016; UIC Statistic 2012
- Zinc [emissions to air, unspecified]: 2.8696e-11 kg; lognormal SD95 5.3787
  (same comment as for Copper)
- Iron [emissions to soil, industrial]: 9.3821e-9 kg; lognormal SD95 1.8893
  (4,4,1,3,4,5,BU:1.5); estimation based on the emission per Gkm from CH (4,41E-9unit/vkm)) and the average load; Data from ANABEL; Personal correspondence Gunter Adolf, SBB, June 2016; UIC Statistic 2012
- Chromium [emissions to air, unspecified]: 4.624e-11 kg; lognormal SD95 5.3787
  (same comment as for Lead)
- Antimony [emissions to soil, industrial]: 5.1655e-12 kg; lognormal SD95 1.8893
  (same comment as for Lead)
- Antimony [emissions to air, unspecified]: 1.4553e-11 kg; lognormal SD95 5.3787
  (same comment as for Lead)
- Manganese [emissions to soil, industrial]: 4.0364e-11 kg; lognormal SD95 1.8893
  (same comment as for Lead)
- Zinc [emissions to water, unspecified]: 2.7881e-10 kg; lognormal SD95 5.3787
  (same comment as for Copper)
- Oils, unspecified [emissions to soil, industrial]: 3.0741e-9 kg; lognormal SD95 1.8893
  (4,4,1,3,4,5,BU:1.5); hydro carbon emissions assumed as oil emission; Data from ANABEL; Personal correspondence Gunter Adolf, SBB, June 2016; UIC Statistic 2012
- Manganese [emissions to air, unspecified]: 1.1372e-10 kg; lognormal SD95 5.3787
  (same comment as for Lead)
- Copper [emissions to water, unspecified]: 2.9223e-11 kg; lognormal SD95 3.3302
  (4,4,1,3,4,5,BU:3); estimation based on the emission per Gkm from CH (0,00E+0unit/vkm)) and the average load; Data from ANABEL; Personal correspondence Gunter Adolf, SBB, June 2016; UIC Statistic 2012
- Copper [emissions to soil, industrial]: 1.0336e-10 kg; lognormal SD95 1.8893
  (same comment as for Zinc)
- Heat, waste [emissions to air, unspecified]: 0.12264 MJ; lognormal SD95 2.1158
  (4,3,2,5,5,5,BU:1.05); default value;
- Noise, rail, freight train [non material emissions, unspecified]: 1 tkm; lognormal SD95 2.3193
  (3,3,3,5,5,5,BU:1.5); ; Ecological Scarcity method 2013; Frischknecht & Büsser Knöpfel 2013
- Chromium [emissions to soil, industrial]: 1.6413e-11 kg; lognormal SD95 1.8893
  (same comment as for Lead)
- Iron [emissions to air, unspecified]: 2.6432e-8 kg; lognormal SD95 5.3787
  (4,4,1,3,4,5,BU:5); estimation based on the emission factors per Gkm of freight transport in Switzerland and specific gross ton kilometric performance per tkm (Gtkm/tkm); Data from ANABEL; Personal correspondence Gunter Adolf, SBB, June 2016; UIC Statistic 2012

## Sampling procedure
Statistics

## Extrapolations
For the determination of the train and rail track demand per tkm date of Switzerland was used and extrapolated with the tkm of DE

## Sources
- Krebs L., Frischknecht R., 2020, 2020 - Update Mobitool 2020 - Krebs, Project report, 713, treeze Ltd., Uster, CH
L. Krebs, R. Frischknecht (2020) Aktualisierung Ökobilanzdaten mobitool 2020, Teil 1. Project report. Volume: 713. treeze Ltd.. Uster, CH.
Type: Separate publication
Source: Report
First author: L. Krebs
Other authors: R. Frischknecht
Year: 2020
Title of anthology: Project report
Place of publication: Uster, CH
Publisher: treeze Ltd.
Volume No: 713

## Validation
Proof reading validation: 10.11.2020; Other validation: G:\Projekte laufend\713 Aktualisierung mobitool 2020\EcoSpold\[713-Transport-Train-freight-average_RER_EIV2_v0.1.xlsx]X-Process;
