# Thermal insulation plaster EPS, at plant

Dataset: EcoSpold 1, unit process
Functional unit: 1 kg
Category: construction materials / plaster
Geography: CH
Time period: 2000-01 to 2016-12
Generated by: Daniel Savi
accessRestrictedTo: 0
copyright: true

## General comment
Wärmedämmputz EPS, Herstellung
Version: 0.0

Local category: construction materials
Local subcategory: Putze

## Reference product
- Thermal insulation plaster EPS, at plant [CH]: 1 kg
  SWITZERLAND

## Inputs from technosphere
- Compressed air, average installation, <30kW, 8 bar gauge, at supply network [RER]: 0.038 m3; lognormal SD95 1.10306
- Manufacturing, wet green mortar, per kg mortar [CH]: 1 kg; lognormal SD95 1.10306
  (2;3;1;2;2)
- Plaster bag incl. transport packaging, at plant [CH]: 0.024024 p; lognormal SD95 1.30007
  (4;5;1;1;1)
- Disposal, inert waste, 5% water, to construction waste landfill [CH]: 0.005 kg; lognormal SD95 1.30007
  (4;5;1;1;1)
- Polystyrene foam slab, at plant [RER]: 0.046 kg; lognormal SD95 1.10306
  (2;3;1;2;2)
- Transport, freight, lorry, 16t-32t gross weight, fleet average [RER]: 0.2218 tkm; lognormal SD95 2.01043
  (2;3;1;2;2)
- Chemicals inorganic, at plant [GLO]: 0.0038 kg; lognormal SD95 1.10306
- Tap water, at user [CH]: 0.015 kg; lognormal SD95 1.10306
- Portland cement, strength class Z 42.5, at plant [CH]: 0.953 kg; lognormal SD95 1.10306
- Carboxymethyl cellulose, powder, at plant [RER]: 0.0019 kg; lognormal SD95 1.10306

## Sources
- Kasser U., R. Frischknecht, M. Klingler, D. Savi, R. Itten, F. Wyss,P. Stolz, L. Tschuemperlin, 2016, 2016 - Renewal and exp. of LCA data in KBOB - Kasser, -, Buero fuer Umweltchemie, treeze Ltd., Zuerich and Uster, CH
U. Kasser, R. Frischknecht, M. Klingler, D. Savi, R. Itten, F. Wyss,P. Stolz, L. Tschümperlin 2016 (2015Z) Erneuerung und Erweiterung der Ökobilanzdaten in der KBOB-Liste "Ökobilanzdaten im Baubereich", Projekt QualiBOB. unknown.

First author: U. Kasser, R. Frischknecht, M. Klingler, D. Savi, R. Itten, F. Wyss,P. Stolz, L. Tschümperlin 2016
Year: 2015Z
Place of publication: unknown
Original title: Erneuerung und Erweiterung der Ökobilanzdaten in der KBOB-Liste "Ökobilanzdaten im Baubereich", Projekt QualiBOB
