# Paper, woodfree, coated, at integrated mill

Dataset: EcoSpold 1, unit process
Functional unit: 1 kg
Category: paper+ board / graphic paper
Geography: RER
Time period: 2000-01 to 2000-12
Production volume: Total European production in 2000: 9'746 kt (CEPI statistics)
Generated by: Roland Hischier
accessRestrictedTo: 0
copyright: true

## Included processes
This module includes the European production of coated woodfree paper in an integrated paper mill - including transports to paper mill, wood handling, chemical pulping and bleaching, paper production, energy production on-site, recovery cycles of chemicals and internal waste water treatment.; Geography: Data from a finnish database and from several European fine paper producers used as European average data.

## Technology
Average of present used technology

## Reference product
- Paper, woodfree, coated, at integrated mill [RER]: 1 kg
  Europe

## Inputs from technosphere
- Electricity, medium voltage, at grid [GB]: 0.0206 kWh; lognormal SD95 1.09
  (1,3,1,3,1,3); average from finnish database and several companies
- Sulphur dioxide, liquid, at plant [RER]: 0.00109 kg; lognormal SD95 1.24
  (2,4,1,3,1,5); average data from finnish database
- Nitrogen, liquid, at plant [RER]: 0.00012 kg; lognormal SD95 1.24
  (2,4,1,3,1,5); average data from finnish database
- Magnesium sulphate, at plant [RER]: 0.00234 kg; lognormal SD95 1.24
  (2,4,1,3,1,5); average data from finnish database
- Electricity, medium voltage, production ENTSO-E, at grid: 0.251 kWh; lognormal SD95 1.09
  (1,3,1,3,1,3); average from finnish database and several companies
- Transport, freight, lorry, fleet average [RER]: 0.563 tkm; lognormal SD95 2.09
  (4,5,na,na,na,na); standard distances
- Methanol, at plant [GLO]: 0.00119 kg; lognormal SD95 1.24
  (2,4,1,3,1,5); average data from finnish database
- Pulpwood, pine, sustainable forest management, measured as solid wood under bark, at forest road [SE]: 0.0001175 m3
  (1,3,1,3,1,3); average from several european fine paper producers; DS
- Chemicals organic, at plant [GLO]: 0.00263 kg; lognormal SD95 1.24
  (2,4,1,3,1,5); average data from finnish database
- Hard coal, at regional storage [WEU]: 0.00844 kg; lognormal SD95 1.09
  (1,3,1,3,1,3); average from finnish database and several companies
- Carbon dioxide liquid, at plant [RER]: 0.00109 kg; lognormal SD95 1.24
  (2,4,1,3,1,5); average data from finnish database
- Pulpwood, spruce, sustainable forest management, measured as solid wood under bark, at forest road [DE]: 0.000809 m3; lognormal SD95 1.09
  (1,3,1,3,1,3); average from several european fine paper producers
- Disposal, municipal solid waste, 22.9% water, to sanitary landfill [CH]: 0.0152 kg; lognormal SD95 1.09
  (1,3,1,3,1,3); average from finnish database and several companies
- Electricity, medium voltage, production NORDEL, at grid [NORDEL]: 0.0787 kWh; lognormal SD95 1.09
  (1,3,1,3,1,3); average from finnish database and several companies
- Sulphate pulp, average, at regional storage [RER]: 0.0296 kg; lognormal SD95 1.09
  (1,3,1,3,1,3); average from several european fine paper producers
- Carboxymethyl cellulose, powder, at plant [RER]: 0.0022 kg; lognormal SD95 1.24
  (2,4,1,3,1,5); average data from finnish database
- Potato starch, at plant [DE]: 0.0152 kg; lognormal SD95 1.24
  (2,4,1,3,1,5); average data from finnish database
- Disposal, municipal solid waste, 22.9% water, to municipal incineration [CH]: 0.0152 kg; lognormal SD95 1.09
  (1,3,1,3,1,3); average from finnish database and several companies
- Pulpwood, beech, sustainable forest management, measured as solid wood under bark, at forest road [DE]: 0.00121 m3; lognormal SD95 1.09
  (1,3,1,3,1,3); average from several european fine paper producers
- Pulpwood, spruce, sustainable forest management, measured as solid wood under bark, at forest road [SE]: 0.0001175 m3
  (1,3,1,3,1,3); average from several european fine paper producers; DS
- Quicklime, milled, loose, at plant [CH]: 0.00472 kg; lognormal SD95 1.24
  (2,4,1,3,1,5); average data from finnish database
- AKD sizer, in paper production, at plant [RER]: 0.00213 kg; lognormal SD95 1.24
  (2,4,1,3,1,5); average data from finnish database
- Heavy fuel oil, at regional storage [RER]: 0.0279 kg; lognormal SD95 1.09
  (1,3,1,3,1,3); average from finnish database and several companies
- Optical brighteners, in paper production, at plant [RER]: 0.002 kg; lognormal SD95 1.24
  (2,4,1,3,1,5); average data from finnish database
- Natural gas, high pressure, at consumer [RER]: 1.84 MJ; lognormal SD95 1.09
  (1,3,1,3,1,3); average from finnish database and several companies
- Paper mill, integrated [RER]: 5.44e-11 p; lognormal SD95 3.05
  (4,na,na,na,na,na); own assumption
- Latex, at plant [RER]: 0.041 kg; lognormal SD95 1.24
  (2,4,1,3,1,5); average data from finnish database
- Kaolin, at plant [RER]: 0.172 kg; lognormal SD95 1.09
  (1,3,1,3,1,3); average from several european fine paper producers
- Pulpwood, birch, sustainable forest management, measured as solid wood under bark, at forest road [SE]: 0.000351 m3; lognormal SD95 1.09
  (1,3,1,3,1,3); average from several european fine paper producers
- Sulphuric acid, liquid, at plant [RER]: 0.0165 kg; lognormal SD95 1.24
  (2,4,1,3,1,5); average data from finnish database
- Wood chips, softwood, wet, measured as dry mass, at sawmill [RER]: 0.02079 kg
  (1,3,1,3,1,3); average from several european fine paper producers
- Disposal, hazardous waste, 0% water, to underground deposit [DE]: 4e-5 kg; lognormal SD95 1.09
  (1,3,1,3,1,3); average from finnish database and several companies
- Sodium chlorate, powder, at plant [RER]: 0.0137 kg; lognormal SD95 1.24
  (2,4,1,3,1,5); average data from finnish database
- Sodium chloride, powder, at plant [RER]: 0.00022 kg; lognormal SD95 1.24
  (2,4,1,3,1,5); average data from finnish database
- Sodium hydroxide, 50% in H2O, production mix, at plant [RER]: 0.0206 kg; lognormal SD95 1.24
  (2,4,1,3,1,5); average data from finnish database
- Hydrogen peroxide, 50% in H2O, at plant [RER]: 0.00401 kg; lognormal SD95 1.24
  (2,4,1,3,1,5); average data from finnish database
- Disposal, wood ash mixture, pure, 0% water, to sanitary landfill [CH]: 0.00345 kg; lognormal SD95 1.09
  (1,3,1,3,1,3); average from finnish database and several companies
- Limestone, milled, loose, at plant [CH]: 0.172 kg; lognormal SD95 1.09
  (1,3,1,3,1,3); average from several european fine paper producers
- Slab and siding, softwood, wet, measured as dry mass, at sawmill [RER]: 0.07155 kg
  (1,3,1,3,1,3); average from several european fine paper producers
- Lignite briquettes, at plant [DE]: 1.63 MJ; lognormal SD95 1.09
  (1,3,1,3,1,3); average from finnish database and several companies
- Oxygen, liquid, at plant [RER]: 0.0129 kg; lognormal SD95 1.24
  (2,4,1,3,1,5); average data from finnish database
- Transport, freight, rail [RER]: 0.507 tkm; lognormal SD95 2.09
  (4,5,na,na,na,na); standard distances

## Inputs from nature
- Water, cooling, unspecified natural origin/m3 [resources, in water]: 0.0563 m3; lognormal SD95 1.09
  (1,3,1,3,1,3); average from several european fine paper producers
- Water, unspecified natural origin/m3 [resources, in water]: 0.0524 m3; lognormal SD95 1.09
  (1,3,1,3,1,3); average from finnish database and several companies

## Emissions to nature
- Benzo(a)pyrene [emissions to air, high. pop.]: 3.92e-8 kg; lognormal SD95 1.88
  (2,5,2,1,4,5); estimation - based on respective heating modules
- Fluorine [emissions to air, high. pop.]: 6.53e-7 kg; lognormal SD95 1.88
  (2,5,2,1,4,5); estimation - based on respective heating modules
- Particulates, < 2.5 um [emissions to air, high. pop.]: 0.000679 kg; lognormal SD95 3.32
  (2,5,2,1,4,5); estimation - based on respective heating modules
- Benzene, hexachloro- [emissions to air, high. pop.]: 9.4e-14 kg; lognormal SD95 1.88
  (2,5,2,1,4,5); estimation - based on respective heating modules
- Suspended solids, unspecified [emissions to water, river]: 0.00119 kg; lognormal SD95 1.51
  (1,3,1,3,1,3); average from finnish database and several companies
- Polonium-210 [emissions to air, high. pop.]: 0.000207 kBq; lognormal SD95 3.32
  (2,5,2,1,4,5); estimation - based on respective heating modules
- Strontium [emissions to air, high. pop.]: 4.78e-7 kg; lognormal SD95 5.37
  (2,5,2,1,4,5); estimation - based on respective heating modules
- Mercury [emissions to air, high. pop.]: 2.34e-8 kg; lognormal SD95 5.37
  (2,5,2,1,4,5); estimation - based on respective heating modules
- Hydrogen sulfide [emissions to air, high. pop.]: 1.63e-7 kg; lognormal SD95 1.88
  (2,5,2,1,4,5); estimation - based on respective heating modules
- Dioxin, 2,3,7,8 Tetrachlorodibenzo-p- [emissions to air, high. pop.]: 5.61e-12 kg; lognormal SD95 1.88
  (2,5,2,1,4,5); estimation - based on respective heating modules
- NMVOC, non-methane volatile organic compounds, unspecified origin [emissions to air, high. pop.]: 3.66e-5 kg; lognormal SD95 1.88
  (2,5,2,1,4,5); estimation - based on respective heating modules
- Lead-210 [emissions to air, high. pop.]: 0.000112 kBq; lognormal SD95 3.32
  (2,5,2,1,4,5); estimation - based on respective heating modules
- Carbon monoxide, biogenic [emissions to air, high. pop.]: 0.000627 kg; lognormal SD95 5.37
  (2,5,2,1,4,5); estimation - based on respective heating modules
- Sulfur dioxide [emissions to air, high. pop.]: 0.00049 kg; lognormal SD95 1.09
  (1,3,1,3,1,3); average from finnish database and several companies
- Ethyne [emissions to air, high. pop.]: 8.27e-6 kg; lognormal SD95 1.88
  (2,5,2,1,4,5); estimation - based on respective heating modules
- Hydrocarbons, aliphatic, unsaturated [emissions to air, high. pop.]: 4.88e-5 kg; lognormal SD95 1.88
  (2,5,2,1,4,5); estimation - based on respective heating modules
- Thorium-232 [emissions to air, high. pop.]: 8.35e-6 kBq; lognormal SD95 3.32
  (2,5,2,1,4,5); estimation - based on respective heating modules
- Methane, fossil [emissions to air, high. pop.]: 0.000499 kg; lognormal SD95 1.88
  (2,5,2,1,4,5); estimation - based on respective heating modules
- Copper [emissions to air, high. pop.]: 3.91e-7 kg; lognormal SD95 5.37
  (2,5,2,1,4,5); estimation - based on respective heating modules
- Aluminium [emissions to air, high. pop.]: 2.2e-5 kg; lognormal SD95 1.88
  (2,5,2,1,4,5); estimation - based on respective heating modules
- Radium-228 [emissions to air, high. pop.]: 2.99e-5 kBq; lognormal SD95 3.32
  (2,5,2,1,4,5); estimation - based on respective heating modules
- Titanium [emissions to air, high. pop.]: 5.05e-7 kg; lognormal SD95 5.37
  (2,5,2,1,4,5); estimation - based on respective heating modules
- Barium [emissions to air, high. pop.]: 4.43e-7 kg; lognormal SD95 5.37
  (2,5,2,1,4,5); estimation - based on respective heating modules
- Acetone [emissions to air, high. pop.]: 1.72e-7 kg; lognormal SD95 1.88
  (2,5,2,1,4,5); estimation - based on respective heating modules
- Zinc [emissions to air, high. pop.]: 3.98e-6 kg; lognormal SD95 5.37
  (2,5,2,1,4,5); estimation - based on respective heating modules
- Acetaldehyde [emissions to air, high. pop.]: 9.71e-7 kg; lognormal SD95 1.88
  (2,5,2,1,4,5); estimation - based on respective heating modules
- AOX, Adsorbable Organic Halogen as Cl [emissions to water, river]: 0.00011 kg; lognormal SD95 1.51
  (1,3,1,3,1,3); average from finnish database and several companies
- Ammonia [emissions to air, high. pop.]: 2.26e-5 kg; lognormal SD95 1.88
  (2,5,2,1,4,5); estimation - based on respective heating modules
- Hydrogen chloride [emissions to air, high. pop.]: 1.69e-5 kg; lognormal SD95 1.88
  (2,5,2,1,4,5); estimation - based on respective heating modules
- Thallium [emissions to air, high. pop.]: 5.91e-10 kg; lognormal SD95 5.37
  (2,5,2,1,4,5); estimation - based on respective heating modules
- Vanadium [emissions to air, high. pop.]: 3.21e-6 kg; lognormal SD95 5.37
  (2,5,2,1,4,5); estimation - based on respective heating modules
- Cobalt [emissions to air, high. pop.]: 1e-7 kg; lognormal SD95 5.37
  (2,5,2,1,4,5); estimation - based on respective heating modules
- Carbon dioxide, fossil [emissions to air, high. pop.]: 0.374 kg; lognormal SD95 1.09
  (1,3,1,3,1,3); average from finnish database and several companies
- Particulates, > 10 um [emissions to air, high. pop.]: 0.000242 kg; lognormal SD95 1.88
  (2,5,2,1,4,5); estimation - based on respective heating modules
- Hydrocarbons, aliphatic, alkanes, unspecified [emissions to air, high. pop.]: 2.08e-5 kg; lognormal SD95 1.88
  (2,5,2,1,4,5); estimation - based on respective heating modules
- Nitrogen oxides [emissions to air, high. pop.]: 0.00168 kg; lognormal SD95 1.51
  (1,3,1,3,1,3); average from finnish database and several companies
- Butane [emissions to air, high. pop.]: 1.29e-6 kg; lognormal SD95 3.32
  (2,5,2,1,4,5); estimation - based on respective heating modules
- Phenol [emissions to air, high. pop.]: 8.15e-7 kg; lognormal SD95 1.88
  (2,5,2,1,4,5); estimation - based on respective heating modules
- Radon-220 [emissions to air, high. pop.]: 6.76e-6 kBq; lognormal SD95 3.32
  (2,5,2,1,4,5); estimation - based on respective heating modules
- Potassium-40 [emissions to air, high. pop.]: 3.05e-5 kBq; lognormal SD95 3.32
  (2,5,2,1,4,5); estimation - based on respective heating modules
- Silicon [emissions to air, high. pop.]: 0.000201 kg; lognormal SD95 5.37
  (2,5,2,1,4,5); estimation - based on respective heating modules
- Scandium [emissions to air, high. pop.]: 1.34e-9 kg; lognormal SD95 5.37
  (2,5,2,1,4,5); estimation - based on respective heating modules
- Cadmium [emissions to air, high. pop.]: 6e-8 kg; lognormal SD95 5.37
  (2,5,2,1,4,5); estimation - based on respective heating modules
- Chromium VI [emissions to air, high. pop.]: 2.54e-9 kg; lognormal SD95 5.37
  (2,5,2,1,4,5); estimation - based on respective heating modules
- Phosphorus [emissions to air, high. pop.]: 4.1e-6 kg; lognormal SD95 1.88
  (2,5,2,1,4,5); estimation - based on respective heating modules
- Chromium [emissions to air, high. pop.]: 1.9e-7 kg; lognormal SD95 5.37
  (2,5,2,1,4,5); estimation - based on respective heating modules
- Pentane [emissions to air, high. pop.]: 2.21e-6 kg; lognormal SD95 1.88
  (2,5,2,1,4,5); estimation - based on respective heating modules
- Beryllium [emissions to air, high. pop.]: 4.43e-9 kg; lognormal SD95 5.37
  (2,5,2,1,4,5); estimation - based on respective heating modules
- Manganese [emissions to air, high. pop.]: 2.27e-6 kg; lognormal SD95 5.37
  (2,5,2,1,4,5); estimation - based on respective heating modules
- Thorium [emissions to air, high. pop.]: 5.4e-9 kg; lognormal SD95 5.37
  (2,5,2,1,4,5); estimation - based on respective heating modules
- Methane, biogenic [emissions to air, high. pop.]: 5.22e-6 kg; lognormal SD95 1.88
  (2,5,2,1,4,5); estimation - based on respective heating modules
- Benzene, ethyl- [emissions to air, high. pop.]: 3.92e-7 kg; lognormal SD95 1.88
  (2,5,2,1,4,5); estimation - based on respective heating modules
- BOD5, Biological Oxygen Demand [emissions to water, river]: 0.00121 kg; lognormal SD95 1.51
  (1,3,1,3,1,3); average from finnish database and several companies
- Boron [emissions to air, high. pop.]: 1.87e-5 kg; lognormal SD95 5.37
  (2,5,2,1,4,5); estimation - based on respective heating modules
- Chlorine [emissions to air, high. pop.]: 2.35e-6 kg; lognormal SD95 3.32
  (2,5,2,1,4,5); estimation - based on respective heating modules
- PAH, polycyclic aromatic hydrocarbons [emissions to air, high. pop.]: 1.64e-7 kg; lognormal SD95 1.88
  (2,5,2,1,4,5); estimation - based on respective heating modules
- Acetic acid [emissions to air, high. pop.]: 9.66e-7 kg; lognormal SD95 1.88
  (2,5,2,1,4,5); estimation - based on respective heating modules
- Radon-222 [emissions to air, high. pop.]: 6.76e-6 kBq; lognormal SD95 3.32
  (2,5,2,1,4,5); estimation - based on respective heating modules
- Lead [emissions to air, high. pop.]: 4.72e-7 kg; lognormal SD95 5.37
  (2,5,2,1,4,5); estimation - based on respective heating modules
- Nitrogen [emissions to water, river]: 0.00013 kg; lognormal SD95 1.51
  (1,3,1,3,1,3); average from finnish database and several companies
- Potassium [emissions to air, high. pop.]: 0.000308 kg; lognormal SD95 5.37
  (2,5,2,1,4,5); estimation - based on respective heating modules
- Molybdenum [emissions to air, high. pop.]: 9.16e-8 kg; lognormal SD95 5.37
  (2,5,2,1,4,5); estimation - based on respective heating modules
- COD, Chemical Oxygen Demand [emissions to water, river]: 0.0133 kg; lognormal SD95 1.51
  (1,3,1,3,1,3); average from finnish database and several companies
- Ethane [emissions to air, high. pop.]: 2.48e-5 kg; lognormal SD95 1.88
  (2,5,2,1,4,5); estimation - based on respective heating modules
- Uranium [emissions to air, high. pop.]: 8.85e-9 kg; lognormal SD95 5.37
  (2,5,2,1,4,5); estimation - based on respective heating modules
- Selenium [emissions to air, high. pop.]: 1.4e-7 kg; lognormal SD95 5.37
  (2,5,2,1,4,5); estimation - based on respective heating modules
- Radium-226 [emissions to air, high. pop.]: 2.9e-5 kBq; lognormal SD95 3.32
  (2,5,2,1,4,5); estimation - based on respective heating modules
- Uranium-238 [emissions to air, high. pop.]: 2.43e-5 kBq; lognormal SD95 3.32
  (2,5,2,1,4,5); estimation - based on respective heating modules
- Bromine [emissions to air, high. pop.]: 8.11e-7 kg; lognormal SD95 1.88
  (2,5,2,1,4,5); estimation - based on respective heating modules
- Particulates, > 2.5 um, and < 10um [emissions to air, high. pop.]: 7.58e-5 kg; lognormal SD95 2.33
  (2,5,2,1,4,5); estimation - based on respective heating modules
- Carbon monoxide, fossil [emissions to air, high. pop.]: 0.00656 kg; lognormal SD95 5.37
  (2,5,2,1,4,5); estimation - based on respective heating modules
- Carbon dioxide, biogenic [emissions to air, high. pop.]: 1.44 kg; lognormal SD95 1.09
  (1,3,1,3,1,3); average from finnish database and several companies
- Arsenic [emissions to air, high. pop.]: 1.16e-7 kg; lognormal SD95 1.88
  (2,5,2,1,4,5); estimation - based on respective heating modules
- Xylene [emissions to air, high. pop.]: 5.4e-6 kg; lognormal SD95 1.88
  (2,5,2,1,4,5); estimation - based on respective heating modules
- Sodium [emissions to air, high. pop.]: 2.17e-5 kg; lognormal SD95 5.37
  (2,5,2,1,4,5); estimation - based on respective heating modules
- Antimony [emissions to air, high. pop.]: 4.16e-8 kg; lognormal SD95 1.88
  (2,5,2,1,4,5); estimation - based on respective heating modules
- Phenol, pentachloro- [emissions to air, high. pop.]: 1.06e-10 kg; lognormal SD95 1.88
  (2,5,2,1,4,5); estimation - based on respective heating modules
- Heat, waste [emissions to air, high. pop.]: 20.8 MJ; lognormal SD95 1.09
  (1,3,1,3,1,3); calculated from electricity and fuel input
- Propene [emissions to air, high. pop.]: 8.27e-6 kg; lognormal SD95 1.88
  (2,5,2,1,4,5); estimation - based on respective heating modules
- Thorium-228 [emissions to air, high. pop.]: 1.34e-5 kBq; lognormal SD95 3.32
  (2,5,2,1,4,5); estimation - based on respective heating modules
- Ethanol [emissions to air, high. pop.]: 3.45e-7 kg; lognormal SD95 1.88
  (2,5,2,1,4,5); estimation - based on respective heating modules
- Methanol [emissions to air, high. pop.]: 5.86e-7 kg; lognormal SD95 1.88
  (2,5,2,1,4,5); estimation - based on respective heating modules
- m-Xylene [emissions to air, high. pop.]: 1.57e-6 kg; lognormal SD95 1.88
  (2,5,2,1,4,5); estimation - based on respective heating modules
- Benzene [emissions to air, high. pop.]: 2.09e-5 kg; lognormal SD95 1.88
  (2,5,2,1,4,5); estimation - based on respective heating modules
- Magnesium [emissions to air, high. pop.]: 1.8e-5 kg; lognormal SD95 5.37
  (2,5,2,1,4,5); estimation - based on respective heating modules
- Hydrogen fluoride [emissions to air, high. pop.]: 6.75e-7 kg; lognormal SD95 1.88
  (2,5,2,1,4,5); estimation - based on respective heating modules
- Hydrocarbons, aromatic [emissions to air, high. pop.]: 1.72e-7 kg; lognormal SD95 1.88
  (2,5,2,1,4,5); estimation - based on respective heating modules
- Calcium [emissions to air, high. pop.]: 0.000159 kg; lognormal SD95 3.32
  (2,5,2,1,4,5); estimation - based on respective heating modules
- Ethene [emissions to air, high. pop.]: 4.96e-5 kg; lognormal SD95 5.37
  (2,5,2,1,4,5); estimation - based on respective heating modules
- Tin [emissions to air, high. pop.]: 3.45e-9 kg; lognormal SD95 5.37
  (2,5,2,1,4,5); estimation - based on respective heating modules
- Dinitrogen monoxide [emissions to air, high. pop.]: 3.57e-5 kg; lognormal SD95 1.88
  (2,5,2,1,4,5); estimation - based on respective heating modules
- Formaldehyde [emissions to air, high. pop.]: 2.58e-6 kg; lognormal SD95 1.88
  (2,5,2,1,4,5); estimation - based on respective heating modules
- Nickel [emissions to air, high. pop.]: 9.23e-7 kg; lognormal SD95 5.37
  (2,5,2,1,4,5); estimation - based on respective heating modules
- Iron [emissions to air, high. pop.]: 2.35e-5 kg; lognormal SD95 5.37
  (2,5,2,1,4,5); estimation - based on respective heating modules
- Propionic acid [emissions to air, high. pop.]: 3.69e-8 kg; lognormal SD95 1.88
  (2,5,2,1,4,5); estimation - based on respective heating modules
- Propane [emissions to air, high. pop.]: 1.69e-5 kg; lognormal SD95 1.88
  (2,5,2,1,4,5); estimation - based on respective heating modules
- Iodine [emissions to air, high. pop.]: 7.69e-8 kg; lognormal SD95 1.88
  (2,5,2,1,4,5); estimation - based on respective heating modules
- Toluene [emissions to air, high. pop.]: 5.98e-6 kg; lognormal SD95 1.88
  (2,5,2,1,4,5); estimation - based on respective heating modules
- Phosphorus [emissions to water, river]: 1.3e-5 kg; lognormal SD95 1.51
  (1,3,1,3,1,3); average from finnish database and several companies
- Water [emissions to water, unspecified]: 53.485, 49.78 kg (2 entries); lognormal SD95 2.5196
  (5,5,5,5,5,BU:1.05); All uncertainty-values set to 5.0 by default. Balance of input water

## Sources
- Hischier R., 2007, 2007 - LCI packagings and graphical papers - Hischier, Final report ecoinvent data v2.0, 11, Swiss Centre for LCI, Empa - TSL, Duebendorf and St. Gallen, CH
Hischier R. (2007) Life Cycle Inventories of Packaging and Graphical Paper. Final report ecoinvent data v2.0. Volume: 11. Swiss Centre for LCI, Empa - TSL. Dübendorf, CH.
Type: Measurement on site
Source: CD-ROM
First author: Hischier R.
Year: 2007
Title of anthology: Final report ecoinvent data v2.0
Place of publication: Dübendorf, CH
Publisher: Swiss Centre for LCI, Empa - TSL
Volume No: 11

## Validation
Proof reading validation: passed; Other validation: none;
