# Heavy fuel oil, burned in power plant

Dataset: EcoSpold 1, unit process
Functional unit: 1 MJ
Category: electricity by fuel / oil\power plant
Geography: SK
Time period: 2000-01 to 2000-12
Production volume: 0 TWh from power plants and 0.3 TWh from combined cycle plants.
Generated by: Niels Jungbluth
accessRestrictedTo: 0
copyright: true

## General comment
Emissions, materials use, infrastructure, etc. for oil input to power plants;

## Included processes
All energy use, use of chemicals, emissions to air and water including treatment of flue gasses and effluents.

## Geography
Estimation for the country.

## Technology
Estimation for average technology.

## Time period
No new data for today situation thus assessment with older data and data for Europe.

## Reference product
- Heavy fuel oil, burned in power plant [SK]: 1 MJ
  SLOVAKIA (Slovak Republic)

## Inputs from technosphere
- Disposal, lignite ash, 0% water, to opencast refill [SK]: 0.0099712 kg; lognormal SD95 1.0907
  (2,2,1,1,1,3); Literature data for this country
- Disposal, municipal solid waste, 22.9% water, to municipal incineration [CH]: 5.8698e-5 kg; lognormal SD95 1.0907
  (2,2,1,1,1,3); Literature data for this country
- Water, completely softened, at plant [RER]: 0.01 kg; lognormal SD95 1.1267
  (2,2,1,1,1,4); Literature data for this country
- Disposal, bilge oil, 90% water, to hazardous waste incineration [CH]: 1.9125e-6 kg; lognormal SD95 1.0907
  (2,2,1,1,1,3); Literature data for this country
- Oil power plant 500MW [RER]: 1.2359e-12 p; lognormal SD95 3.0487
  (2,na,1,1,1,5); Estimation based on case study
- Heavy fuel oil, at regional storage [RER]: 0.024272 kg; lognormal SD95 1.0907
  (2,2,1,1,1,3); Literature data for heating value
- Ammonia, liquid, at regional storehouse [RER]: 6.3206e-5 kg; lognormal SD95 1.2435
  (2,4,1,3,1,5); IPPC 2001 for flue gas treatment
- Water, decarbonised, at plant [RER]: 0.05 kg; lognormal SD95 1.1267
  (2,2,1,1,1,4); Literature data for this country
- Limestone, crushed, washed [CH]: 0.0013762 kg; lognormal SD95 1.2435
  (2,4,1,3,1,5); IPPC 2001 for flue gas treatment

## Inputs from nature
- Water, cooling, unspecified natural origin/m3 [resources, in water]: 0.0097336 m3; lognormal SD95 1.1267
  (2,2,1,1,1,4); Literature data for this country

## Emissions to nature
- Dioxin, 2,3,7,8 Tetrachlorodibenzo-p- [emissions to air, high. pop.]: 1e-14 kg; lognormal SD95 3.0616
  (2,4,1,3,1,5); Literature
- Hydrocarbons, aliphatic, alkanes, unspecified [emissions to air, high. pop.]: 1.0638e-6 kg; lognormal SD95 1.8257
  Calculation based on VOC emission. Deviation calculated from ranges
- Zinc [emissions to air, high. pop.]: 2.9072e-7 kg; lognormal SD95 8.9865
  Calculation based on particle emission. Deviation calculated from ranges
- Nitrogen oxides [emissions to air, high. pop.]: 0.00041963 kg; lognormal SD95 1.5095
  (2,2,1,1,1,3); Literature data for this country
- TOC, Total Organic Carbon [emissions to water, river]: 1.0272e-6 kg; lognormal SD95 1.5095
  (2,2,1,1,1,3); Literature data for this country
- Methanol [emissions to air, high. pop.]: 5.3191e-7 kg; lognormal SD95 1.8257
  Calculation based on VOC emission. Deviation calculated from ranges
- Formaldehyde [emissions to air, high. pop.]: 7.9787e-7 kg; lognormal SD95 1.8257
  Calculation based on VOC emission. Deviation calculated from ranges
- PAH, polycyclic aromatic hydrocarbons [emissions to air, high. pop.]: 1.8e-9 kg; lognormal SD95 3.0616
  (2,4,1,3,1,5); Literature
- Zinc [emissions to water, river]: 6.31e-9 kg; lognormal SD95 5.008
  (2,2,1,1,1,3); Literature data for this country
- Particulates, < 2.5 um [emissions to air, high. pop.]: 0.00010902 kg; lognormal SD95 3.007
  (2,2,1,1,1,3); Literature data for this country
- Iron [emissions to air, high. pop.]: 7e-8 kg; lognormal SD95 5.0882
  (3,3,3,3,3,3); Literature
- Methane, fossil [emissions to air, high. pop.]: 5.3191e-6 kg; lognormal SD95 1.8257
  Calculation based on VOC emission. Deviation calculated from ranges
- Hypochlorite [emissions to water, river]: 3.3e-7 kg; lognormal SD95 1.6115
  (3,4,3,3,3,3); Literature
- Copper [emissions to water, river]: 2.5362e-9 kg; lognormal SD95 5.008
  (2,2,1,1,1,3); Literature data for this country
- Acetaldehyde [emissions to air, high. pop.]: 2.6053e-7 kg; lognormal SD95 1.8257
  Calculation based on VOC emission. Deviation calculated from ranges
- Hydrocarbons, aliphatic, unsaturated [emissions to air, high. pop.]: 5.3191e-8 kg; lognormal SD95 1.8257
  Calculation based on VOC emission. Deviation calculated from ranges
- Carbon dioxide, fossil [emissions to air, unspecified]: 0.00061791 kg; lognormal SD95 1.2152
  (2,na,1,1,1,5); Calculation for limestone use
- Thallium [emissions to water, river]: 3.7028e-9 kg; lognormal SD95 5.008
  (2,2,1,1,1,3); Literature data for this country
- Calcium [emissions to air, high. pop.]: 3e-8 kg; lognormal SD95 1.6001
  (3,3,3,3,3,3); Literature
- BOD5, Biological Oxygen Demand [emissions to water, river]: 1.5499e-5 kg; lognormal SD95 1.5095
  (2,2,1,1,1,3); Literature data for this country
- Lead [emissions to air, high. pop.]: 4.1186e-7 kg; lognormal SD95 8.9865
  Calculation based on particle emission. Deviation calculated from ranges
- Manganese [emissions to air, high. pop.]: 1.3325e-7 kg; lognormal SD95 8.9865
  Calculation based on particle emission. Deviation calculated from ranges
- Acetic acid [emissions to air, high. pop.]: 1.0638e-6 kg; lognormal SD95 1.8257
  Calculation based on VOC emission. Deviation calculated from ranges
- Carbon dioxide, fossil [emissions to air, high. pop.]: 0.0779 kg; lognormal SD95 1.0907
  (2,2,1,1,1,3); Literature data for this country
- Nitrogen [emissions to water, river]: 8.166e-6 kg; lognormal SD95 1.5095
  (2,2,1,1,1,3); Literature data for this country
- Iron [emissions to water, river]: 1.2566e-7 kg; lognormal SD95 5.008
  (2,2,1,1,1,3); Literature data for this country
- Vanadium [emissions to water, river]: 3.6129e-8 kg; lognormal SD95 5.008
  (2,2,1,1,1,3); Literature data for this country
- Benzo(a)pyrene [emissions to air, high. pop.]: 1.5e-11 kg; lognormal SD95 3.1104
  (3,3,4,3,3,3); Literature
- Manganese [emissions to water, river]: 3.5833e-9 kg; lognormal SD95 5.008
  (2,2,1,1,1,3); Literature data for this country
- Nickel [emissions to air, high. pop.]: 3.3433e-6 kg; lognormal SD95 8.9865
  Calculation based on particle emission. Deviation calculated from ranges
- Ammonia [emissions to air, high. pop.]: 1e-7 kg; lognormal SD95 1.5095
  (2,2,1,1,1,3); Literature data for this country
- Sodium [emissions to air, high. pop.]: 3e-7 kg; lognormal SD95 1.6001
  (3,3,3,3,3,3); Literature
- Lead [emissions to water, river]: 4.9888e-9 kg; lognormal SD95 5.008
  (2,2,1,1,1,3); Literature data for this country
- Chromium VI [emissions to air, high. pop.]: 3.1121e-10 kg; lognormal SD95 20.071
  (3,3,3,3,1,2); Literature, basic uncertainity = 20
- Carbon monoxide, fossil [emissions to air, high. pop.]: 4.5719e-5 kg; lognormal SD95 5.008
  (2,2,1,1,1,3); Literature data for this country
- Cobalt [emissions to water, river]: 2.3889e-10 kg; lognormal SD95 5.008
  (2,2,1,1,1,3); Literature data for this country
- Beryllium [emissions to air, high. pop.]: 5.5772e-11 kg; lognormal SD95 5.0363
  (3,3,3,3,1,3); Literature
- Heat, waste [emissions to water, river]: 0.23771 MJ; lognormal SD95 1.1358
  (3,3,1,1,1,3); Calculation with 35% share of cooling water, electricity supply subtracted
- Vanadium [emissions to air, high. pop.]: 1.2114e-5 kg; lognormal SD95 10.559
  Calculation based on particle emission. Deviation calculated from ranges
- Phosphorus [emissions to water, river]: 1.8514e-8 kg; lognormal SD95 1.5095
  (2,2,1,1,1,3); Literature data for this country
- Suspended solids, unspecified [emissions to water, river]: 0.00012467 kg; lognormal SD95 1.5095
  (2,2,1,1,1,3); Literature data for this country
- Cadmium [emissions to water, river]: 2.9065e-10 kg; lognormal SD95 5.008
  (2,2,1,1,1,3); Literature data for this country
- Particulates, > 10 um [emissions to air, high. pop.]: 6.0568e-5 kg; lognormal SD95 12.057
  Calculation based onTSP emission and particle size distribution. Deviation calculated from ranges
- Chromium [emissions to air, high. pop.]: 1.4142e-7 kg; lognormal SD95 11.174
  Calculation based on particle emission. Deviation calculated from ranges
- Hydrocarbons, unspecified [emissions to water, river]: 3.711e-8 kg; lognormal SD95 3.007
  (2,2,1,1,1,3); Literature data for this country
- Hydrogen fluoride [emissions to air, high. pop.]: 3.01e-8 kg; lognormal SD95 1.5723
  (2,3,1,1,3,3); Literature
- Tin [emissions to water, river]: 1.1944e-10 kg; lognormal SD95 5.008
  (2,2,1,1,1,3); Literature data for this country
- Cadmium [emissions to air, high. pop.]: 3.8279e-8 kg; lognormal SD95 8.9865
  Calculation based on particle emission. Deviation calculated from ranges
- Copper [emissions to air, high. pop.]: 5.6934e-7 kg; lognormal SD95 9.9013
  Calculation based on particle emission. Deviation calculated from ranges
- Ethanol [emissions to air, high. pop.]: 5.3191e-7 kg; lognormal SD95 1.8257
  Calculation based on VOC emission. Deviation calculated from ranges
- COD, Chemical Oxygen Demand [emissions to water, river]: 1.6952e-5 kg; lognormal SD95 1.5095
  (2,2,1,1,1,3); Literature data for this country
- Oils, unspecified [emissions to water, river]: 5.6674e-8 kg; lognormal SD95 3.007
  (2,2,1,1,1,3); Literature data for this country
- Acetone [emissions to air, high. pop.]: 2.6053e-7 kg; lognormal SD95 1.8257
  Calculation based on VOC emission. Deviation calculated from ranges
- Arsenic [emissions to air, high. pop.]: 7.9949e-8 kg; lognormal SD95 8.9865
  Calculation based on particle emission. Deviation calculated from ranges
- Sulfate [emissions to water, river]: 0.00019977 kg; lognormal SD95 1.5095
  (2,2,1,1,1,3); Literature data for this country
- Nickel [emissions to water, river]: 1.7671e-8 kg; lognormal SD95 5.008
  (2,2,1,1,1,3); Literature data for this country
- Cobalt [emissions to air, high. pop.]: 4.2397e-7 kg; lognormal SD95 8.9865
  Calculation based on particle emission. Deviation calculated from ranges
- Benzene [emissions to air, high. pop.]: 5.3191e-8 kg; lognormal SD95 1.8257
  Calculation based on VOC emission. Deviation calculated from ranges
- Mercury [emissions to water, river]: 1.2542e-10 kg; lognormal SD95 5.008
  (2,2,1,1,1,3); Literature data for this country
- Sulfide [emissions to water, river]: 5.375e-8 kg; lognormal SD95 1.5095
  (2,2,1,1,1,3); Literature data for this country
- Hydrogen chloride [emissions to air, high. pop.]: 4.51e-8 kg; lognormal SD95 1.5723
  (2,3,1,1,3,3); Literature
- Heat, waste [emissions to air, high. pop.]: 0.44146 MJ; lognormal SD95 1.0882
  (2,1,1,1,1,3); Calculation
- Molybdenum [emissions to air, high. pop.]: 9.2063e-8 kg; lognormal SD95 8.9865
  Calculation based on particle emission. Deviation calculated from ranges
- Chloride [emissions to water, river]: 2.4438e-5 kg; lognormal SD95 1.5095
  (2,2,1,1,1,3); Literature data for this country
- Sulfur dioxide [emissions to air, high. pop.]: 0.00036088 kg; lognormal SD95 1.0907
  (2,2,1,1,1,3); Literature data for this country
- Particulates, > 2.5 um, and < 10um [emissions to air, high. pop.]: 7.2681e-5 kg; lognormal SD95 2.0074
  (2,2,1,1,1,3); Literature data for this country
- Hydrocarbons, aromatic [emissions to air, high. pop.]: 1.0638e-8 kg; lognormal SD95 1.8257
  Calculation based on VOC emission. Deviation calculated from ranges
- Sulfite [emissions to water, river]: 1.8036e-6 kg; lognormal SD95 1.5095
  (2,2,1,1,1,3); Literature data for this country
- Propane [emissions to air, high. pop.]: 5.3191e-8 kg; lognormal SD95 1.8257
  Calculation based on VOC emission. Deviation calculated from ranges
- Mercury [emissions to air, high. pop.]: 1.5e-10 kg; lognormal SD95 12.83
  Calculation from ranges
- Arsenic [emissions to water, river]: 1.1944e-10 kg; lognormal SD95 5.008
  (2,2,1,1,1,3); Literature data for this country
- Dinitrogen monoxide [emissions to air, high. pop.]: 4e-6 kg; lognormal SD95 1.5095
  (2,2,1,1,1,3); Literature data for this country
- Chromium [emissions to water, river]: 3.0618e-9 kg; lognormal SD95 5.008
  (2,2,1,1,1,3); Literature data for this country
- AOX, Adsorbable Organic Halogen as Cl [emissions to water, river]: 3.8747e-7 kg; lognormal SD95 1.5095
  (2,2,1,1,1,3); Literature data for this country
- Selenium [emissions to air, high. pop.]: 6.0568e-8 kg; lognormal SD95 8.9865
  Calculation based on particle emission. Deviation calculated from ranges
- Fluoride [emissions to water, river]: 2.0306e-7 kg; lognormal SD95 1.5095
  (2,2,1,1,1,3); Literature data for this country
- Hypochlorite [emissions to water, ocean]: 3.7e-7 kg; lognormal SD95 1.6115
  (3,4,3,3,3,3); Literature
- Water [emissions to water, unspecified]: 9.24692 kg; lognormal SD95 2.5196
  (5,5,5,5,5,BU:1.05); All uncertainty-values set to 5.0 by default. Balance of input water

## Sampling procedure
Literature

## Sources
- Jungbluth N., 2007, 2007 - Crude oil - Jungbluth, Sachbilanzen von Energiesystemen. Final report No. 6 ecoinvent data v2.0, 6, Swiss Centre for LCI, ESU-services Ltd., Duebendorf and Uster, CH
Jungbluth, N. (2007) Erdöl. Sachbilanzen von Energiesystemen. Final report No. 6 ecoinvent data v2.0. Editors: Dones R.. Volume: 6. Swiss Centre for LCI, PSI. Dübendorf and Villigen, CH.
Type: Measurement on site
Source: CD-ROM
First author: Jungbluth, N.
Year: 2007
Name of editors: Dones R.
Title of anthology: Sachbilanzen von Energiesystemen. Final report No. 6 ecoinvent data v2.0
Place of publication: Dübendorf and Villigen, CH
Publisher: Swiss Centre for LCI, PSI
Volume No: 6

## Validation
Proof reading validation: Passed.; Other validation: none;
