# Housing system with fully-slatted floor, pig

Dataset: EcoSpold 1, unit process, infrastructure
Functional unit: 1 p
Category: agricultural / operations\infrastructure
Geography: CH
Time period: 2000-01 to 2000-12
Production volume: Existing fully-slatted floor housing system for pig in CH in 1996: 1706 units.
Generated by: Dunja Dux
accessRestrictedTo: 0
copyright: true

## General comment
The module includes a pen for fattening pigs with fully-slatted floor, fittings, slurry store, concentrate silo, wet mix feeding system and straw storage area. Size 300 pig places. Lifetime of the building is 50 years.;

## Included processes
The inventory takes into account the use of construction materials and building machines for construction, repair and replacement including waste disposal and the transportation of the materials to the building site. Not taken into account were direct emission of the construction, disposal of production waste and the use of resources during utilization phase.

## Geography
The inventory applies for Swiss agricultural buildings only, because of the solid method of construction.

## Technology
The data of the inventory are based on one example of a typical agricultural building.

## Reference product
- Housing system with fully-slatted floor, pig [CH]: 1 p
  SWITZERLAND

## Inputs from technosphere
- Copper, at regional storage [RER]: 3.07 kg; lognormal SD95 1.05
  (1,2,1,1,1,na)
- Disposal, building, polystyrene isolation, flame-retardant, to final disposal [CH]: 7.25 kg; lognormal SD95 1.05
  (1,2,1,1,1,na)
- Polyurethane, rigid foam, at plant [RER]: 4.48 kg; lognormal SD95 1.05
  (1,2,1,1,1,na)
- Excavation, hydraulic digger, average [CH]: 6.16 m3; lognormal SD95 1.05
  (1,2,1,1,1,na)
- Polypropylene, granulate, at plant [RER]: 0.0136 kg; lognormal SD95 1.05
  (1,2,1,1,1,na)
- Disposal, building, cement (in concrete) and mortar, to final disposal [CH]: 266 kg; lognormal SD95 1.05
  (1,2,1,1,1,na)
- Sawnwood, production mix, softwood, dried (u=20%), planed, at sawmill [RER]: 0.127 m3; lognormal SD95 1.05
  (1,2,1,1,1,na)
- Electricity, low voltage, at grid [CH]: 5.32 kWh; lognormal SD95 1.05
  (1,2,1,1,1,na)
- Concrete, normal, at plant [CH]: 1.64 m3; lognormal SD95 1.05
  (1,2,1,1,1,na)
- Zinc coating, pieces [RER]: 2.32 m2; lognormal SD95 1.05
  (1,2,1,1,1,na)
- Aluminium, production mix, at plant [RER]: 1.84 kg; lognormal SD95 1.05
  (1,2,1,1,1,na)
- Disposal, building, polyvinylchloride products, to final disposal [CH]: 7.64 kg; lognormal SD95 1.05
  (1,2,1,1,1,na)
- Rock wool, at plant [CH]: 3.19 kg; lognormal SD95 1.05
  (1,2,1,1,1,na)
- Zinc coating, coils [RER]: 1.74 m2; lognormal SD95 1.05
  (1,2,1,1,1,na)
- Fibre cement facing tile, at plant [CH]: 44.9 kg; lognormal SD95 1.05
  (1,2,1,1,1,na)
- Steel, low-alloyed, at plant [RER]: 8.18 kg; lognormal SD95 1.05
  (1,2,1,1,1,na)
- Disposal, glass, 0% water, to municipal incineration [CH]: 0.241 kg; lognormal SD95 1.05
  (1,2,1,1,1,na)
- Gravel, round, at mine [CH]: 504 kg; lognormal SD95 1.05
  (1,2,1,1,1,na)
- Disposal, building, polyethylene/polypropylene products, to final disposal [CH]: 2.02 kg; lognormal SD95 1.05
  (1,2,1,1,1,na)
- Excavation, skid-steer loader [RER]: 3.47 m3; lognormal SD95 1.05
  (1,2,1,1,1,na)
- Polystyrene foam slab, at plant [RER]: 0.953 kg; lognormal SD95 1.05
  (1,2,1,1,1,na)
- Brick, at plant [RER]: 328 kg; lognormal SD95 1.05
  (1,2,1,1,1,na)
- Fibre cement corrugated slab, at plant [CH]: 7.89 kg; lognormal SD95 1.05
  (1,2,1,1,1,na)
- Transport, freight, lorry, 16t-32t gross weight, fleet average [CH]: 271 tkm; lognormal SD95 2
  (1,2,1,1,1,na)
- Flat glass, uncoated, at plant [RER]: 1.98 kg; lognormal SD95 1.05
  (1,2,1,1,1,na)
- Disposal, building, mineral wool, to final disposal [CH]: 3.19 kg; lognormal SD95 1.05
  (1,2,1,1,1,na)
- Reinforcing steel, at plant [RER]: 95.2 kg; lognormal SD95 1.05
  (1,2,1,1,1,na)
- Disposal, building, concrete, not reinforced, to final disposal [CH]: 381 kg; lognormal SD95 1.05
  (1,2,1,1,1,na)
- Polyethylene, HDPE, granulate, at plant [RER]: 1.93 kg; lognormal SD95 1.05
  (1,2,1,1,1,na)
- Disposal, building, polyurethane foam, to final disposal [CH]: 4.48 kg; lognormal SD95 1.05
  (1,2,1,1,1,na)
- Bitumen, at refinery [CH]: 0.264 kg; lognormal SD95 1.05
  (1,2,1,1,1,na)
- Disposal, plastics, mixture, 15.3% water, to municipal incineration [CH]: 0.161 kg; lognormal SD95 1.05
  (1,2,1,1,1,na)
- Sheet rolling, steel [RER]: 8.18 kg; lognormal SD95 1.05
  (1,2,1,1,1,na)
- Disposal, building, waste wood, untreated, to final disposal [CH]: 64 kg; lognormal SD95 1.05
  (1,2,1,1,1,na)
- Extrusion, plastic film [RER]: 9.58 kg; lognormal SD95 1.05
  (1,2,1,1,1,na)
- Chromium steel 18/8, at plant [RER]: 16.4 kg; lognormal SD95 1.05
  (1,2,1,1,1,na)
- Cast iron, at plant [RER]: 42.1 kg; lognormal SD95 1.05
  (1,2,1,1,1,na)
- Disposal, building, brick, to final disposal [CH]: 381 kg; lognormal SD95 1.05
  (1,2,1,1,1,na)
- Disposal, building, bitumen sheet, to final disposal [CH]: 0.264 kg; lognormal SD95 1.05
  (1,2,1,1,1,na)
- Sanitary ceramics, at regional storage [CH]: 22.6 kg; lognormal SD95 1.05
  (1,2,1,1,1,na)
- Disposal, building, glass sheet, to final disposal [CH]: 24.6 kg; lognormal SD95 1.05
  (1,2,1,1,1,na)
- Glass fibre reinforced plastic, polyester resin, hand lay-up, at plant [RER]: 0.242 kg; lognormal SD95 1.05
  (1,2,1,1,1,na)
- Portland cement, strength class Z 42.5, at plant [CH]: 191 kg; lognormal SD95 1.05
  (1,2,1,1,1,na)
- Glass fibre, at plant [RER]: 0.242 kg; lognormal SD95 1.05
  (1,2,1,1,1,na)
- Poor concrete, at plant [CH]: 0.173 m3; lognormal SD95 1.05
  (1,2,1,1,1,na)
- Disposal, building, bulk iron (excluding reinforcement), to sorting plant [CH]: 71.9 kg; lognormal SD95 1.05
  (1,2,1,1,1,na)
- Disposal, building, reinforced concrete, to final disposal [CH]: 3700 kg; lognormal SD95 1.05
  (1,2,1,1,1,na)
- Cement mortar, at plant [CH]: 81.4 kg; lognormal SD95 1.05
  (1,2,1,1,1,na)
- Polyvinylchloride, bulk polymerised, at plant [RER]: 7.64 kg; lognormal SD95 1.05
  (1,2,1,1,1,na)

## Inputs from nature
- Occupation, construction site [resources, land]: 6.49 m2a; lognormal SD95 1.5
  (1,2,1,1,1,na)
- Transformation, from pasture, man made [resources, land]: 3.25 m2; lognormal SD95 2
  (1,2,1,1,1,na)
- Transformation, to urban, discontinuously built [resources, land]: 3.25 m2; lognormal SD95 2
  (1,2,1,1,1,na)
- Occupation, urban, discontinuously built [resources, land]: 162 m2a; lognormal SD95 1.5
  (1,2,1,1,1,na)

## Emissions to nature
- Heat, waste [emissions to air, low. pop.]: 19.1 MJ; lognormal SD95 1.05
  (1,2,1,1,1,na)

## Sampling procedure
The inventory is calculated based on a solid database of agricultural buildings.

## Sources
- Nemecek T., Kaegi T., 2007, 2007 - LCI agricultural prod. systems - Nemecek, Ecoinvent report version 2.0, 15, Swiss Centre for LCI, ART, Duebendorf and Zuerich, CH
Nemecek, T., Kägi, T., Blaser, S. (2007) Life Cycle Inventories of Agricultural Production Systems. Ecoinvent report version 2.0. Editors: 0. Volume: 15. Swiss Centre for LCI, ART. Duebendorf and Zurich, CH.
Type: Measurement on site
Source: CD-ROM
First author: Nemecek, T.
Other authors: Kägi, T., Blaser, S.
Year: 2007
Name of editors: 0
Title of anthology: Ecoinvent report version 2.0
Place of publication: Duebendorf and Zurich, CH
Publisher: Swiss Centre for LCI, ART
Volume No: 15

## Validation
Proof reading validation: Passed.; Other validation: none;
