# Heat, biomethane, at industrial furnace 1MW

Dataset: EcoSpold 1, unit process
Functional unit: 1 MJ
Category: heat / biomass\heating systems
Geography: CH
Time period: 2016-01 to 2019-12
Generated by: Thomas Kaegi
accessRestrictedTo: 0
copyright: true

## General comment
Inventory for 1 MJ heat from biogas, burned in an industrial furnace with a capacity of 1 MW with 5000 operating hours. Efficiency depends on use patterns such as input and output temperature and is here estimated with efficiency 95 % (Hu);
Synonyms: Nutzwärme, Biogas, aufbereitet, ab Industriefeuerung 1MW;

## Included processes
Included are the biogas burning in an industrial furnace (1 MW), which in turn includes fuel input, infrastructure (furnace), air and water emissions and electrictiy needed for operation. The inventory uses the average net efficiency for the type of boiler referring to the lower calorific value. The heat distribution ios not included

## Geography
Data apply to the supply in Switzerland. Production occurs at SAPA Building Systems AG in Nenzing (AT) and Bellenberg (DE).

## Time period
Time of publications.

## Reference product
- Heat, biomethane, at industrial furnace 1MW [CH]: 1 MJ
  SWITZERLAND

## Inputs from technosphere
- Biomethane, burned in industrial furnace 1MW [CH]: 1.0526 MJ; lognormal SD95 1.2226
  (2,3,1,1,1,5,BU:1.05); ;

## Sampling procedure
heat efficieny based on literature

## Sources
- Kaegi T., Zschokke M., Dinkel F., 2022, 2022 - LCI biogas and biomethane processes - Kaegi, Carbotech on behalf of VSG, Carbotech AG, Zuerich, CH
Kägi Thomas, Mischa Zschokke, Fredy Dinkel (2019) Technical Report: Life Cycle Inventories for Biogas and Biomethane Processes. Carbotech on behalf of VSG. Carbotech AG. Zürich. CH.
Type: Separate publication
Source: pdf
First author: Kägi Thomas
Other authors: Mischa Zschokke, Fredy Dinkel
Year: 2019
Title of anthology: Carbotech on behalf of VSG
Place of publication: Zürich. CH
Publisher: Carbotech AG
Original title: Technical Report: Life Cycle Inventories for Biogas and Biomethane Processes

## Validation
Proof reading validation: 19.04.2021; Other validation: Z:\Schreibtisch\WinShare\BAFU Heizsysteme\A zum Konvertieren\[EcoSpold_heat_biomethane_v0.1.xlsx]X-Process;
