# xx Packaging glass, brown, at plant

Dataset: EcoSpold 1, unit process
Functional unit: 1 kg
Category: material, obsolete / glass, obsolete\packaging, obsolete
Geography: DE
Time period: 2000-01 to 2000-12
Production volume: German production in 2000: 7 Mio t
Share of production covered: 67 %
Generated by: Roland Hischier
accessRestrictedTo: 0
copyright: true

## General comment
A production site with a sorting capacity of 100 kt per year and a total life span of 50 a is assumed.;

## Included processes
This module includes the material and energy efforts for: preparation of the glass melt, melting furnace, feeder, container forming, cooling down, packaging. Transports for the input materials are included as well as direct emissions to air, waste water and waste.

## Geography
average German situation, based on an industry survey

## Technology
Mix of really used technologies in Germany

## Reference product
- xx Packaging glass, brown, at plant [DE]: 1 kg
  GERMANY

## Inputs from technosphere
- Polyethylene, HDPE, granulate, at plant [RER]: 0.0117 kg; lognormal SD95 1.24
  (2,4,1,2,1,5); estimation from IPPC study
- Silica sand, at plant [DE]: 0.195 kg; lognormal SD95 1.08
  (1,2,2,1,1,3); data from a German study (UBA)
- Disposal, municipal solid waste, 22.9% water, to sanitary landfill [CH]: 0.0025 kg; lognormal SD95 1.24
  (2,4,1,2,1,5); estimation from IPPC study
- Soda, powder, at plant [RER]: 0.0607 kg; lognormal SD95 1.08
  (1,2,2,1,1,3); data from a German study (UBA)
- Dolomite, at plant [RER]: 0.0362 kg; lognormal SD95 1.08
  (1,2,2,1,1,3); data from a German study (UBA)
- Glass production site [RER]: 1.25e-10 p; lognormal SD95 3.51
  (5,4,1,3,4,5); own estimation
- Natural gas, high pressure, at consumer [RER]: 2.86 MJ; lognormal SD95 1.08
  (1,2,2,1,1,3); data from a German study (UBA)
- Transport, freight, lorry, fleet average [RER]: 0.138 tkm; lognormal SD95 2.06
  (1,4,1,3,1,5); estimation from data of 1 European producer
- Graphite, at plant [RER]: 1.25e-6 kg; lognormal SD95 1.08
  (1,2,2,1,1,3); data from a German study (UBA)
- Electricity, medium voltage, at grid [DE]: 0.159 kWh; lognormal SD95 1.08
  (1,2,2,1,1,3); data from a German study (UBA)
- EUR-flat pallet [RER]: 0.000716 p; lognormal SD95 1.24
  (2,4,1,2,1,5); estimation from IPPC study
- Transport, freight, lorry, 7.5t-16t gross weight, fleet average [RER]: 0.000147 tkm; lognormal SD95 2.06
  (1,4,1,3,1,5); estimation from data of 1 European producer
- Heavy fuel oil, at regional storage [RER]: 0.0233 kg; lognormal SD95 1.08
  (1,2,2,1,1,3); data from a German study (UBA)
- Glass cullets, sorted, at sorting plant [RER]: 0.689 kg; lognormal SD95 1.08
  (1,2,2,1,1,3); data from a German study (UBA)
- Solid unbleached board, SUB, at plant [RER]: 0.0176 kg; lognormal SD95 1.24
  (2,4,1,2,1,5); estimation from IPPC study
- Diesel, at regional storage [RER]: 0.00144 kg; lognormal SD95 1.08
  (1,2,2,1,1,3); data from a German study (UBA)
- Feldspar, at plant [RER]: 0.0374 kg; lognormal SD95 1.08
  (1,2,2,1,1,3); data from a German study (UBA)
- Limestone, milled, loose, at plant [CH]: 0.0402 kg; lognormal SD95 1.08
  (1,2,2,1,1,3); data from a German study (UBA)
- Lubricating oil, at plant [RER]: 2.38e-5 kg; lognormal SD95 1.08
  (1,2,2,1,1,3); data from a German study (UBA)
- Chemicals inorganic, at plant [GLO]: 0.00202 kg; lognormal SD95 1.08
  (1,2,2,1,1,3); data from a German study (UBA)
- Disposal, municipal solid waste, 22.9% water, to municipal incineration [CH]: 0.0025 kg; lognormal SD95 1.24
  (2,4,1,2,1,5); estimation from IPPC study

## Inputs from nature
- Water, unspecified natural origin/m3 [resources, in water]: 0.000212 m3; lognormal SD95 1.08
  (1,2,2,1,1,3); data from a German study (UBA)

## Emissions to nature
- Antimony [emissions to air, high. pop.]: 1.55e-8 kg; lognormal SD95 5.07
  (1,4,1,3,1,5); estimation from data of 1 European producer
- Copper [emissions to air, high. pop.]: 1.55e-8 kg; lognormal SD95 5.07
  (1,4,1,3,1,5); estimation from data of 1 European producer
- Heat, waste [emissions to air, high. pop.]: 4.83 MJ; lognormal SD95 1.08
  (1,2,2,1,1,3); calculated from energy input (upper heating value for fuels)
- Particulates, > 2.5 um, and < 10um [emissions to air, high. pop.]: 5.8e-7 kg; lognormal SD95 2.01
  (1,2,2,1,1,3); data from a German study (UBA), split according US-EPA
- Hydrogen fluoride [emissions to air, high. pop.]: 5.13e-6 kg; lognormal SD95 1.51
  (1,2,2,1,1,3); data from a German study (UBA)
- Benzo(a)pyrene [emissions to air, high. pop.]: 1.11e-11 kg; lognormal SD95 2.01
  (1,2,2,1,1,3); data from a German study (UBA)
- Hydrocarbons, aliphatic, alkanes, unspecified [emissions to air, high. pop.]: 1.19e-5 kg; lognormal SD95 1.51
  (1,2,2,1,1,3); data from a German study (UBA)
- Manganese [emissions to air, high. pop.]: 1.55e-8 kg; lognormal SD95 5.07
  (1,4,1,3,1,5); estimation from data of 1 European producer
- Lead [emissions to air, high. pop.]: 1.78e-7 kg; lognormal SD95 5.07
  (1,4,1,3,1,5); estimation from data of 1 European producer
- Sulfur dioxide [emissions to air, high. pop.]: 0.00073 kg; lognormal SD95 1.08
  (1,2,2,1,1,3); data from a German study (UBA)
- Carbon monoxide, fossil [emissions to air, high. pop.]: 7.72e-6 kg; lognormal SD95 5.01
  (1,2,2,1,1,3); data from a German study (UBA)
- Cobalt [emissions to air, high. pop.]: 1.55e-8 kg; lognormal SD95 5.07
  (1,4,1,3,1,5); estimation from data of 1 European producer
- Cadmium [emissions to air, high. pop.]: 1.55e-8 kg; lognormal SD95 5.07
  (1,4,1,3,1,5); estimation from data of 1 European producer
- Arsenic [emissions to air, high. pop.]: 1.55e-8 kg; lognormal SD95 5.07
  (1,4,1,3,1,5); estimation from data of 1 European producer
- Hydrogen chloride [emissions to air, high. pop.]: 1.66e-5 kg; lognormal SD95 1.51
  (1,2,2,1,1,3); data from a German study (UBA)
- Dinitrogen monoxide [emissions to air, high. pop.]: 4.78e-7 kg; lognormal SD95 1.51
  (1,2,2,1,1,3); data from a German study (UBA)
- Nickel [emissions to air, high. pop.]: 1.55e-8 kg; lognormal SD95 5.07
  (1,4,1,3,1,5); estimation from data of 1 European producer
- Methane, fossil [emissions to air, high. pop.]: 9.85e-8 kg; lognormal SD95 1.51
  (1,2,2,1,1,3); data from a German study (UBA)
- Chromium [emissions to air, high. pop.]: 1.55e-8 kg; lognormal SD95 5.07
  (1,4,1,3,1,5); estimation from data of 1 European producer
- Selenium [emissions to air, high. pop.]: 1.69e-6 kg; lognormal SD95 5.07
  (1,4,1,3,1,5); estimation from data of 1 European producer
- Carbon dioxide, fossil [emissions to air, high. pop.]: 0.297 kg; lognormal SD95 1.08
  (1,2,2,1,1,3); data from a German study (UBA)
- Particulates, < 2.5 um [emissions to air, high. pop.]: 1.41e-6 kg; lognormal SD95 3
  (1,2,2,1,1,3); data from a German study (UBA), split according US-EPA
- Dioxin, 2,3,7,8 Tetrachlorodibenzo-p- [emissions to air, high. pop.]: 8.6e-17 kg; lognormal SD95 1.51
  (1,2,2,1,1,3); data from a German study (UBA)
- Particulates, > 10 um [emissions to air, high. pop.]: 8.09e-6 kg; lognormal SD95 1.51
  (1,2,2,1,1,3); data from a German study (UBA)
- Benzene [emissions to air, high. pop.]: 7.79e-8 kg; lognormal SD95 2.01
  (1,2,2,1,1,3); data from a German study (UBA)
- Formaldehyde [emissions to air, high. pop.]: 3.32e-7 kg; lognormal SD95 2.01
  (1,2,2,1,1,3); data from a German study (UBA)
- Nitrogen oxides [emissions to air, high. pop.]: 0.000861 kg; lognormal SD95 1.51
  (1,2,2,1,1,3); data from a German study (UBA)
- NMVOC, non-methane volatile organic compounds, unspecified origin [emissions to air, high. pop.]: 3.59e-6 kg; lognormal SD95 1.51
  (1,2,2,1,1,3); data from a German study (UBA)
- Ammonia [emissions to air, high. pop.]: 2.88e-8 kg; lognormal SD95 1.51
  (1,2,2,1,1,3); data from a German study (UBA)
- Water [emissions to water, unspecified]: 0.2014 kg; lognormal SD95 2.5196
  (5,5,5,5,5,BU:1.05); All uncertainty-values set to 5.0 by default. Balance of input water

## Sampling procedure
German LCA study

## Sources
- Hischier R., 2007, 2007 - LCI packagings and graphical papers - Hischier, Final report ecoinvent data v2.0, 11, Swiss Centre for LCI, Empa - TSL, Duebendorf and St. Gallen, CH
Hischier R. (2007) Life Cycle Inventories of Packaging and Graphical Paper. Final report ecoinvent data v2.0. Volume: 11. Swiss Centre for LCI, Empa - TSL. Dübendorf, CH.
Type: Measurement on site
Source: CD-ROM
First author: Hischier R.
Year: 2007
Title of anthology: Final report ecoinvent data v2.0
Place of publication: Dübendorf, CH
Publisher: Swiss Centre for LCI, Empa - TSL
Volume No: 11

## Validation
Proof reading validation: passed; Other validation: none;
