# Electricity, high voltage, electric utility Obwalden, at grid

Dataset: EcoSpold 1, unit process
Functional unit: 1 kWh
Category: electricity / supply mix
Geography: CH
Time period: 1992-01 to 2013-12
Generated by: Philippe Stolz
accessRestrictedTo: 0
copyright: true

## General comment
This dataset describes the transmission of high voltage electricity.;

## Included processes
Included are the electricity production in the electric utility Obwalden, the transmission network and direct emissions to air (ozone and N2O). Electricity losses are accounted for.

## Geography
Data apply to the supply area of the electric utility Obwalden.

## Technology
Average technology used to transmit and distribute electricity. Includes underground and overhead lines.

## Time period
Time of publications.

## Reference product
- Electricity, high voltage, electric utility Obwalden, at grid [CH]: 1 kWh
  SWITZERLAND

## Inputs from technosphere
- Transmission network, electricity, high voltage [CH]: 6.6958e-9 km; lognormal SD95 3.0909
  (4,5,na,na,na,na,BU:3); based on consumption statistics
- Electricity mix, electric utility Obwalden, at plant [CH]: 1.033 kWh; lognormal SD95 1.05
  (1,1,1,1,1,1,BU:1.05); specific losses of network estimated based on statistics

## Emissions to nature
- Heat, waste [emissions to air, unspecified]: 0.11293 MJ; lognormal SD95 1.2423
  (2,4,1,1,1,5,BU:1.05); estimations based on losses
- Dinitrogen monoxide [emissions to air, unspecified]: 5e-6 kg; lognormal SD95 1.6249
  (2,3,1,1,3,5,BU:1.5); standard deviation based on variation reported in literature
- Heat, waste [emissions to soil, unspecified]: 0.0059435 MJ; lognormal SD95 1.2423
  (2,4,1,1,1,5,BU:1.05); estimations based on losses
- Ozone [emissions to air, unspecified]: 4.5e-6 kg; lognormal SD95 1.5798
  (2,4,1,1,1,5,BU:1.5); standard deviation based on variation reported in literature

## Sampling procedure
Statistical data.

## Sources
- Stolz P., Frischknecht R., 2015, 2015 - LCA solid wood system holzpur - Stolz, Project report, 527, treeze Ltd., Uster, CH
Stolz P., Frischknecht R. (2015) Ökobilanz Vollholzsystem holzpur. Project report. Volume: 527. treeze Ltd.. Uster, CH.
Type: Separate publication
Source: Report
First author: Stolz P.
Other authors: Frischknecht R.
Year: 2015
Title of anthology: Project report
Place of publication: Uster, CH
Publisher: treeze Ltd.
Volume No: 527

## Validation
Proof reading validation: 08.05.2015; Other validation: \\SRV01\ESU-Docs\Projekte laufend\527 Bilanz Holzpur\EcoSpold\[527-Ökobilanz-holzpur-v0.16.xlsx]X-Process;
