# Peat, burned in power plant

Dataset: EcoSpold 1, unit process
Functional unit: 1 MJ
Category: electricity by fuel / lignite\power plant
Geography: ENTSO-E
Time period: 2018-01 to 2020-01
Production volume: 45 PJ
Share of production covered: 95 %
Generated by: Christopher Oberschelp
accessRestrictedTo: 0
copyright: true

## General comment
The module describes the operation of an average plant in the region. The plant is used for middle load with 4000 hours of operation at full capacity per year. The plant is assumed to operate 150000 hours during its lifetime. For the assessment of main characteristics (LHV, sulphur and ash content of coal, efficiency of the plant) and criteria emissions (SOx, NOx, particles, mercury) a bottom-up approach has been used and supplemented by typical emission factors in cases of data gaps (based on EEA/EPA). CO2, CH4 and N2O emissions have been derived from fuel types (from IEA data) and IPCC emission factors. Airborne emission data has been updated for 2019, whereas other inputs and outputs come from the original dataset. The dataset consists on the collection of information about single plants. Base data on all major power plants in 2019 have been integrated, to the extent possible. The size distribution of particles has been derived from non-linear calculations based on typical ratios for different total emission amounts based on CEPMEIP. Emissions of trace substances (except for mercury) were derived from emission factors in the literature (EEA/EPA). The waste heat releases to air and water have been allocated on the basis of the assumed share of river cooled power plants and assumptions on the direct losses to air. The share of the recycled ash is country-specific. For the disposal of the remaining ash, typical country-specific compositions are taken into account in appropriate disposal modules. NA;

## Included processes
Energy conversion for energy supply. Use of fuel oil for startup is accounted for. Particle removal is included in this module. DeSOx and DeNOx are described in different modules; they are applied here according to a simplified estimate assuming an average unabated emission and the specific abated regional emission rates; SOx and NOx emissions are the reduced ones. It is assumed that 25 % of the plants are river cooled, 75 % use cooling tower (average UCTE). The water treatment is described in separate modules. The disposal of non-recycled ashes is modelled separately.

## Geography
ENTSO-E in 2019

## Technology
Average installed technology.

## Reference product
- Peat, burned in power plant [ENTSO-E]: 1 MJ

## Inputs from technosphere
- Lignite power plant [RER]: 9.72e-13 p; lognormal SD95 3.5
  own estimation
- Peat, at mine [NORDEL]: 0.114 kg; lognormal SD95 1.07
  (2,1,1,1,1,1); see power plant data base for details
- Chlorine, liquid, production mix, at plant [RER]: 1e-5 kg; lognormal SD95 2.5
  own estimation
- Water, completely softened, at plant [RER]: 0.006 kg; lognormal SD95 2
  own estimation
- Water, decarbonised, at plant [RER]: 0.15 kg; lognormal SD95 2
  own estimation
- SOx retained, in lignite flue gas desulphurisation [GLO]: 0.00165 kg; lognormal SD95 2.5649
  (5,5,5,5,5,5,BU:1.05)based on difference of a generic average unabated emission intensities (EMEP/EEA air pollutant emission inventory guidebook) and the local abated emission intensity
- NOx retained, in SCR [GLO]: 0.000165 kg; lognormal SD95 2.5649
  (same comment as for SOx retained, in lignite flue gas desulphurisation)
- Transport, freight, rail [RER]: 7.5e-6 tkm; lognormal SD95 2.1
  (4,2,2,3,1,5); average distance is guesstimate
- Disposal, lignite ash, 0% water, to opencast refill [DE]: 0.00705 kg; lognormal SD95 1.5
  (5,1,1,1,1,1); calculated from mass balance

## Inputs from nature
- Water, cooling, unspecified natural origin/m3 [resources, in water]: 0.0035 m3; lognormal SD95 2
  own estimation

## Emissions to nature
- Heat, waste [emissions to air, low. pop.]: 0.672, 0.672 MJ (2 entries); lognormal SD95 1.5
  own estimation
- Antimony [emissions to air, low. pop.]: 1.31e-11 kg; lognormal SD95 7
  own estimation
- Arsenic [emissions to air, low. pop.]: 1.43e-8 kg; lognormal SD95 5.2623
  (1,3,5,3,1,1,BU:5)based on available emission factors (EMEP/EEA air pollutant emission inventory guidebook)
- Barium [emissions to air, low. pop.]: 4.36e-9 kg; lognormal SD95 7
  own estimation
- Benzene [emissions to air, low. pop.]: 2.17e-7 kg; lognormal SD95 3
  own estimation
- Benzo(a)pyrene [emissions to air, low. pop.]: 2e-13 kg; lognormal SD95 3
  own estimation
- Boron [emissions to air, low. pop.]: 2.07e-6 kg; lognormal SD95 7
  own estimation
- Bromine [emissions to air, low. pop.]: 2.76e-8 kg; lognormal SD95 3
  own estimation
- Butane [emissions to air, low. pop.]: 1.9e-8 kg; lognormal SD95 3
  own estimation
- Cadmium [emissions to air, low. pop.]: 1.8e-9 kg; lognormal SD95 5.2623
  (same comment as for Arsenic)
- Carbon dioxide, fossil [emissions to air, low. pop.]: 0.106 kg; lognormal SD95 1.0714
  (2,1,1,1,1,1,BU:1.05)calculated from fuel composition and emission factors (based on International Energy Agency data and IPCC guidelines)
- Carbon monoxide, fossil [emissions to air, low. pop.]: 8.7e-6 kg; lognormal SD95 5.2585
  (1,1,5,3,1,1,BU:5)based on available emission factors (EMEP/EEA air pollutant emission inventory guidebook)
- Chromium [emissions to air, low. pop.]: 9.1e-9 kg; lognormal SD95 5.2623
  (same comment as for Arsenic)
- Chromium VI [emissions to air, low. pop.]: 2.4e-11 kg; lognormal SD95 4
  based on range of data
- Cobalt [emissions to air, low. pop.]: 8.73e-11 kg; lognormal SD95 7
  own estimation
- Copper [emissions to air, low. pop.]: 1e-9 kg; lognormal SD95 5.2623
  (same comment as for Arsenic)
- Dinitrogen monoxide [emissions to air, low. pop.]: 1.5e-6 kg; lognormal SD95 1.5044
  (2,1,1,1,1,1,BU:1.5)calculated from fuel composition and emission factors (based on International Energy Agency data and IPCC guidelines)
- Ethane [emissions to air, low. pop.]: 4.1e-8 kg; lognormal SD95 3
  own estimation
- Formaldehyde [emissions to air, low. pop.]: 5.8e-8 kg; lognormal SD95 3
  own estimation
- Hydrocarbons, aliphatic, alkanes, unspecified [emissions to air, low. pop.]: 2.19e-7 kg; lognormal SD95 3
  own estimation
- Hydrocarbons, aliphatic, unsaturated [emissions to air, low. pop.]: 2.16e-7 kg; lognormal SD95 3
  own estimation
- Hydrogen chloride [emissions to air, low. pop.]: 2.93e-6 kg; lognormal SD95 3
  own estimation
- Hydrogen fluoride [emissions to air, low. pop.]: 8.17e-7 kg; lognormal SD95 3
  own estimation
- Iodine [emissions to air, low. pop.]: 2.59e-8 kg; lognormal SD95 4
  own estimation
- Lead [emissions to air, low. pop.]: 1.5e-8 kg; lognormal SD95 5.2623
  (same comment as for Arsenic)
- Lead-210 [emissions to air, low. pop.]: 1.25e-6 kBq; lognormal SD95 5
  own estimation
- Manganese [emissions to air, low. pop.]: 1.09e-9 kg; lognormal SD95 7
  own estimation
- Mercury [emissions to air, low. pop.]: 2.9e-9 kg; lognormal SD95 5.2623
  (same comment as for Arsenic)
- Methane, fossil [emissions to air, low. pop.]: 1e-6 kg; lognormal SD95 1.5044
  (same comment as for Dinitrogen monoxide)
- Molybdenum [emissions to air, low. pop.]: 8.73e-11 kg; lognormal SD95 7
  own estimation
- Nickel [emissions to air, low. pop.]: 9.7e-9 kg; lognormal SD95 5.2623
  (same comment as for Arsenic)
- Nitrogen oxides [emissions to air, low. pop.]: 8.21e-5 kg; lognormal SD95 1.5
  (1,1,1,1,1,1,BU:1.5)calculated from reported emissions (European Environmental Agency)
- PAH, polycyclic aromatic hydrocarbons [emissions to air, low. pop.]: 6.94e-11 kg; lognormal SD95 3.2292
  (1,3,5,3,1,1,BU:3)based on available emission factors (EMEP/EEA air pollutant emission inventory guidebook)
- Particulates, < 2.5 um [emissions to air, low. pop.]: 2.52e-6 kg; lognormal SD95 3
  (1,1,1,1,1,1,BU:3)calculated from reported emissions (European Environmental Agency)
- Particulates, > 2.5 um, and < 10um [emissions to air, low. pop.]: 5.1e-7 kg; lognormal SD95 2
  (1,1,1,1,1,1,BU:2)calculated from reported emissions (European Environmental Agency)
- Pentane [emissions to air, low. pop.]: 1.47e-7 kg; lognormal SD95 3
  own estimation
- Polonium-210 [emissions to air, low. pop.]: 2.29e-6 kBq; lognormal SD95 5
  own estimation
- Potassium-40 [emissions to air, low. pop.]: 8.12e-7 kBq; lognormal SD95 5
  own estimation
- Propane [emissions to air, low. pop.]: 3.5e-8 kg; lognormal SD95 3
  own estimation
- Propene [emissions to air, low. pop.]: 1.6e-8 kg; lognormal SD95 3
  own estimation
- Radium-226 [emissions to air, low. pop.]: 3.24e-7 kBq; lognormal SD95 5
  own estimation
- Radium-228 [emissions to air, low. pop.]: 3.16e-7 kBq; lognormal SD95 5
  own estimation
- Radon-220 [emissions to air, low. pop.]: 0.000138 kBq; lognormal SD95 5
  own estimation
- Radon-222 [emissions to air, low. pop.]: 0.000245 kBq; lognormal SD95 5
  own estimation
- Selenium [emissions to air, low. pop.]: 4.5e-8 kg; lognormal SD95 5.2623
  (same comment as for Arsenic)
- Strontium [emissions to air, low. pop.]: 4.58e-10 kg; lognormal SD95 7
  own estimation
- Sulfur dioxide [emissions to air, low. pop.]: 2.61e-5 kg; lognormal SD95 1.05
  (1,1,1,1,1,1,BU:1.05)calculated from reported emissions (European Environmental Agency)
- Thorium-228 [emissions to air, low. pop.]: 1.7e-7 kBq; lognormal SD95 5
  own estimation
- Thorium-232 [emissions to air, low. pop.]: 2.67e-7 kBq; lognormal SD95 5
  own estimation
- Toluene [emissions to air, low. pop.]: 1.09e-7 kg; lognormal SD95 3
  own estimation
- Uranium-238 [emissions to air, low. pop.]: 2.7e-7 kBq; lognormal SD95 5
  own estimation
- Vanadium [emissions to air, low. pop.]: 1.09e-10 kg; lognormal SD95 7
  own estimation
- Xylene [emissions to air, low. pop.]: 9.22e-7 kg; lognormal SD95 3
  own estimation
- Zinc [emissions to air, low. pop.]: 8.8e-9 kg; lognormal SD95 5.2623
  (same comment as for Arsenic)
- NMVOC, non-methane volatile organic compounds, unspecified origin [emissions to air, low. pop.]: 1.4e-6 kg; lognormal SD95 1.7755
  (1,2,5,3,1,1,BU:1.5)based on available emission factors (EMEP/EEA air pollutant emission inventory guidebook)
- Polychlorinated biphenyls [emissions to air, low. pop.]: 3.3e-15 kg; lognormal SD95 3.2292
  (same comment as for PAH, polycyclic aromatic hydrocarbons)
- Benzene, hexachloro- [emissions to air, low. pop.]: 6.7e-12 kg; lognormal SD95 3.2292
  (same comment as for PAH, polycyclic aromatic hydrocarbons)
- Dioxin, 2,3,7,8 Tetrachlorodibenzo-p- [emissions to air, unspecified]: 1e-14 kg; lognormal SD95 3.2292
  (same comment as for PAH, polycyclic aromatic hydrocarbons)
- Carbon black [emissions to air, unspecified]: 2.52e-8 kg; lognormal SD95 3.2292
  (same comment as for PAH, polycyclic aromatic hydrocarbons)
- Water [emissions to water, unspecified]: 3.325 kg; lognormal SD95 2.5196
  (5,5,5,5,5,BU:1.05); All uncertainty-values set to 5.0 by default. Balance of input water

## Sampling procedure
Databases/ literature data based on regional statistics.

## Extrapolations
Extrapolations for some exchanges applied where not all plants in the region reported complete data. See exchange comments for details.

## Sources
- Itten R., Oberschelp C., Kroehnert H., Stucki M., 2023, 2023 - LCI solid fossil fuel - Itten, Project report, ZHAW, Waedenswil, CH

## Validation
27.07.2023
