# Exhaust air valve, in-wall housing, plastic/steel, DN 125, at plant

Dataset: EcoSpold 1, unit process
Functional unit: 1 p
Category: construction / ventilation\components
Geography: CH
Time period: 2003-01 to 2003-12
Generated by: Alex Primas
accessRestrictedTo: 0
copyright: true

## General comment
Production of a typical component used for a ventilation system in a multi family house. The house considered in the investigation includes 6 flats with 130 m2 floor area each and a ventilation rate of 120 m3/h.;

## Included processes
Materials used for the production. Estimation of electricity use for the different production steps. Energy use for heating of the production building. Transport of raw materials to the plant. Estimation for the Infrastructure of the Production site included.

## Geography
Data for production in Switzerland used.

## Technology
Exhaust air outlet mounted in room ceiling. Including housing for duct connection. component made of polyvinylchloride and zinc coated steel. Compatible with ducts of 40-120 cm2 section area. Weight per element 0.5 kg

## Time period
Materials investigated in 2003

## Reference product
- Exhaust air valve, in-wall housing, plastic/steel, DN 125, at plant [CH]: 1 p
  SWITZERLAND

## Inputs from technosphere
- Steel, electric, un- and low-alloyed, at plant [RER]: 0.163 kg; lognormal SD95 1.24
  (2,4,1,1,1,5); Questionnaire
- Steel, converter, unalloyed, at plant [RER]: 0.277 kg; lognormal SD95 1.24
  (2,4,1,1,1,5); Questionnaire
- Zinc coating, coils [RER]: 0.08 m2; lognormal SD95 1.26
  (3,4,1,1,1,5); Questionnaire, estimations
- Injection moulding [RER]: 0.099 kg; lognormal SD95 1.24
  (2,4,1,1,1,5); Questionnaire
- Electricity, medium voltage, at grid [CH]: 0.237 kWh; lognormal SD95 1.69
  (3,5,5,1,3,5); Data estimated from related processes
- Light fuel oil, burned in industrial furnace 1MW, non-modulating [RER]: 1.05 MJ; lognormal SD95 1.38
  (4,5,1,2,1,5); Data estimated from related companies
- Disposal, polyvinylchloride, 0.2% water, to municipal incineration [CH]: 0.009 kg; lognormal SD95 1.32
  (4,4,1,1,1,5); Estimations on precentage material disposed
- Polyvinylchloride, at regional storage [RER]: 0.099 kg; lognormal SD95 1.24
  (2,4,1,1,1,5); Questionnaire
- Natural gas, burned in industrial furnace 1MWth [CH]: 1.05 MJ; lognormal SD95 1.38
  (4,5,1,2,1,5); Data estimated from related companies
- Ventilation components factory [RER]: 2e-9 p; lognormal SD95 3.18
  (4,5,1,1,3,5); Calculated with data of a similar company
- Steel, low-alloyed, at plant [RER]: 0.011 kg; lognormal SD95 1.26
  (3,4,1,1,1,5); Questionnaire, estimations
- Sheet rolling, steel [RER]: 0.451 kg; lognormal SD95 1.26
  (3,4,1,1,1,5); Questionnaire, estimations
- Transport, freight, rail [RER]: 0.29 tkm; lognormal SD95 2.09
  (4,5,nA,nA,nA,nA); Standard distance of ecoinvent used
- Transport, freight, lorry, 16t-32t gross weight, fleet average [CH]: 0.0276 tkm; lognormal SD95 2.09
  (4,5,nA,nA,nA,nA); Standard distance of ecoinvent used

## Emissions to nature
- Heat, waste [emissions to air, high. pop.]: 0.853 MJ; lognormal SD95 1.69
  (3,5,5,1,3,5); Calculated from electricity use

## Sampling procedure
Questionnaire and technical information of producer. Data of one common product used.

## Sources
- Haessig W., Primas A., 2007, 2007 - LCI comfort ventilation in dwellings - Haessig, Final report ecoinvent Data v2.0, 25, Swiss Centre for LCI, B+H, Duebendorf and Zuerich, CH
Hässig, W., Primas, A. (2007) Ökologische Aspekte der Komfortlüftungen im Wohnbereich. Final report ecoinvent Data v2.0. Volume: 25. Swiss Centre for LCI, B+H. Dübendorf and Zürich, CH.
Type: Measurement on site
Source: CD-ROM
First author: Hässig, W.
Other authors: Primas, A.
Year: 2007
Title of anthology: Final report ecoinvent Data v2.0
Place of publication: Dübendorf and Zürich, CH
Publisher: Swiss Centre for LCI, B+H
Volume No: 25

## Validation
Proof reading validation: passed; Other validation: none;
