# Cleft timber, production mix, sustainable forest management, measured as dry mass, at forest road

Dataset: EcoSpold 1, unit process
Functional unit: 1 kg
Category: wood / wooden materials\new processes\other material
Geography: CH
Time period: 2000-01 to 2016-12
Generated by: default
accessRestrictedTo: 0
copyright: true

## Reference product
- Cleft timber, production mix, sustainable forest management, measured as dry mass, at forest road [CH]: 1 kg

## Inputs from technosphere
- Cleft timber, hardwood, sustainable forest management, measured as dry mass, at forest road [CH]: 0.777 kg
  Pedigree: (1,1,4,5,4).
- Transport, freight, lorry, fleet average [RER]: 0 tkm
  Pedigree: (1,1,4,5,4).
- Cleft timber, softwood, sustainable forest management, measured as dry mass, at forest road [CH]: 0.223 kg
  Pedigree: (1,1,4,5,4).

## Sources
- Werner F., 2017, 2017 - LCI wood and wood based products - Werner, Project Report, 0, Environment & Development, Zuerich, CH
