# Electricity, nuclear, at power plant boiling water reactor

Dataset: EcoSpold 1, unit process
Functional unit: 1 kWh
Category: electricity by fuel / waste\nuclear\bwr
Geography: CH
Time period: 2000-01 to 2000-12
Generated by: Roberto Dones
accessRestrictedTo: 0
copyright: true

## General comment
PSI data (BFE project 407, Christian Bauer, April 2012).;

## Included processes
The module includes fuel elements, chemicals, and diesel requirements as well as the relevant transport requirements. Water use (fresh and decarbonized) for cooling is included. Considered radioactive waste streams are: spent fuel to reprocessing and conditioning; operational low active waste for conditioning in the intermediate repository; and, contaminated waste from dismantling. Non-radioactive wastes are accounted for.

## Geography
Swiss data of one specific plant for requirements and all Swiss BWRs for emissions.

## Technology
Best current technology for fuel element. Standard technology for commercial operation.

## Reference product
- Electricity, nuclear, at power plant boiling water reactor [CH]: 1 kWh
  SWITZERLAND

## Inputs from technosphere
- Chemicals inorganic, at plant [GLO]: 6.01e-7 kg; lognormal SD95 1.1
  own estimation on data from utility
- Oxygen, liquid, at plant [RER]: 1.5e-5 kg; lognormal SD95 1.1
  own estimation on data from utility
- Nuclear spent fuel, in conditioning, at plant [CH]: 1.61e-6 kg; lognormal SD95 1.05
  referring to current policy
- Argon, liquid, at plant [RER]: 2.34e-5 kg; lognormal SD95 1.1
  own estimation on data from utility
- Anionic resin, at plant [CH]: 1.06e-6 kg; lognormal SD95 1.1
  own estimation on data from utility
- Reinforcing steel, at plant [RER]: 7.7e-7 kg; lognormal SD95 1.1
  own estimation on data from utility
- Nuclear spent fuel, in reprocessing, at plant [RER]: 1.07e-6 kg; lognormal SD95 1.05
  referring to current policy
- Radioactive waste, in interim storage, for final repository LLW [CH]: 1.61e-8 m3; lognormal SD95 1.1
  own estimation on data from utility
- Disposal, used mineral oil, 10% water, to hazardous waste incineration [CH]: 1.46e-6 kg; lognormal SD95 1.1
  own estimation on data from utility
- Borax, anhydrous, powder, at plant [RER]: 2.89e-8 kg; lognormal SD95 1.1
  own estimation on a specific study
- Diesel, burned in diesel-electric generating set [GLO]: 0.000333 MJ; lognormal SD95 1.1
  own estimation on data from utility
- Cement, unspecified, at plant [CH]: 7.71e-6 kg; lognormal SD95 1.3
  own estimation on data from utility
- Radioactive waste, in interim storage conditioning [CH]: 4.68e-10 m3; lognormal SD95 1.1
  own estimation on data from utility
- Disposal, hazardous waste, 25% water, to hazardous waste incineration [CH]: 8.73e-7 kg; lognormal SD95 1.1
  own estimation on data from utility
- Hydrogen, liquid, at plant [RER]: 9.25e-6 kg; lognormal SD95 1.1
  own estimation on data from utility
- Chemicals organic, at plant [GLO]: 1.24e-6 kg; lognormal SD95 1.1
  own estimation on data from utility
- Cationic resin, at plant [CH]: 1.06e-6 kg; lognormal SD95 1.1
  own estimation on data from utility
- Disposal, separator sludge, 90% water, to hazardous waste incineration [CH]: 1.97e-6 kg; lognormal SD95 1.1
  own estimation on data from utility
- Radioactive waste, in final repository for nuclear waste LLW [CH]: 4.05e-8 m3; lognormal SD95 1.4
  estrapolation from a different reactor type
- Acetylene, at regional storehouse [CH]: 3.24e-8 kg; lognormal SD95 1.1
  own estimation on data from utility
- Lubricating oil, at plant [RER]: 1.46e-6 kg; lognormal SD95 1.1
  own estimation on data from utility
- Flat glass, coated, at plant [RER]: 3.93e-6 kg; lognormal SD95 1.1
  own estimation on data from utility
- Boric acid, anhydrous, powder, at plant [RER]: 2.31e-8 kg; lognormal SD95 1.1
  own estimation on a specific study
- Carbon dioxide liquid, at plant [RER]: 1.5e-7 kg; lognormal SD95 1.1
  own estimation on data from utility
- Concrete, normal, at plant [CH]: 1.59e-8 m3; lognormal SD95 1.1
  own estimation on data from utility
- Paper, woodfree, coated, at integrated mill [RER]: 5.78e-7 kg; lognormal SD95 1.1
  own estimation on data from utility
- Steel, low-alloyed, at plant [RER]: 5.4e-6 kg; lognormal SD95 1.5
  own assumption
- Nuclear power plant, boiling water reactor 1000MW [CH]: 2.31e-12 p
  50a lifetime
- Cast iron, at plant [RER]: 1.16e-7 kg; lognormal SD95 1.2
  extrapolation from another plant type
- Transport, freight, lorry, fleet average [RER]: 2.69e-5 tkm; lognormal SD95 2.1
  standard
- Nitrogen, liquid, at plant [RER]: 5.55e-5 kg; lognormal SD95 1.1
  own estimation on data from utility
- U enriched 4.43%, in fuel element for LWR, at nuclear fuel fabrication plant [CH]: 2.28e-6 kg; lognormal SD95 1.1
  according to burnup of 57 MWd/kgU
- Transport, freight, lorry, 16t-32t gross weight, fleet average [CH]: 2.3e-5 tkm; lognormal SD95 2.1
  standard
- Water, decarbonised, at plant [RER]: 3.27 kg; lognormal SD95 1.15
  own estimation

## Inputs from nature
- Water, river [resources, in water]: 0.00473 m3; lognormal SD95 1.15
  own estimation

## Emissions to nature
- Cesium-137 [emissions to water, river]: 0.000453 kBq; lognormal SD95 1.5
  uncertainty declared in reports for radioactive releases
- Krypton-85 [emissions to air, low. pop.]: 0.00468 kBq; lognormal SD95 1.5
  uncertainty declared in reports for radioactive releases
- Xenon-133m [emissions to air, low. pop.]: 0.00107 kBq; lognormal SD95 1.5
  uncertainty declared in reports for radioactive releases
- Iron-59 [emissions to water, river]: 3.22e-7 kBq; lognormal SD95 1.5
  uncertainty declared in reports for radioactive releases
- Niobium-95 [emissions to air, low. pop.]: 1.62e-9 kBq; lognormal SD95 1.5
  uncertainty declared in reports for radioactive releases
- Xenon-133 [emissions to air, low. pop.]: 0.407 kBq; lognormal SD95 1.5
  uncertainty declared in reports for radioactive releases
- Krypton-85m [emissions to air, low. pop.]: 0.0147 kBq; lognormal SD95 1.5
  uncertainty declared in reports for radioactive releases
- Technetium-99m [emissions to water, river]: 3.74e-5 kBq; lognormal SD95 1.5
  uncertainty declared in reports for radioactive releases
- Cesium-134 [emissions to air, low. pop.]: 2.16e-8 kBq; lognormal SD95 1.5
  uncertainty declared in reports for radioactive releases
- Molybdenum-99 [emissions to water, river]: 1.77e-6 kBq; lognormal SD95 1.5
  uncertainty declared in reports for radioactive releases
- Iodine-131 [emissions to air, low. pop.]: 6.44e-5 kBq; lognormal SD95 1.5
  uncertainty declared in reports for radioactive releases
- Xenon-135m [emissions to air, low. pop.]: 0.289 kBq; lognormal SD95 1.5
  uncertainty declared in reports for radioactive releases
- Cobalt-60 [emissions to water, river]: 0.000844 kBq; lognormal SD95 1.5
  uncertainty declared in reports for radioactive releases
- Manganese-54 [emissions to air, low. pop.]: 1.48e-8 kBq; lognormal SD95 1.5
  uncertainty declared in reports for radioactive releases
- Chromium-51 [emissions to air, low. pop.]: 2.89e-8 kBq; lognormal SD95 1.5
  uncertainty declared in reports for radioactive releases
- Ruthenium-103 [emissions to water, river]: 2.67e-8 kBq; lognormal SD95 1.5
  uncertainty declared in reports for radioactive releases
- Hydrogen-3, Tritium [emissions to air, low. pop.]: 0.0614 kBq; lognormal SD95 1.5
  uncertainty declared in reports for radioactive releases
- Xenon-138 [emissions to air, low. pop.]: 0.0683 kBq; lognormal SD95 1.5
  uncertainty declared in reports for radioactive releases
- Heat, waste [emissions to air, low. pop.]: 7.65 MJ; lognormal SD95 1.03
  uncertainty on efficiency
- Zirconium-95 [emissions to air, low. pop.]: 1.59e-9 kBq; lognormal SD95 1.5
  uncertainty declared in reports for radioactive releases
- Zinc-65 [emissions to air, low. pop.]: 7.39e-8 kBq; lognormal SD95 1.5
  uncertainty declared in reports for radioactive releases
- Carbon-14 [emissions to air, low. pop.]: 0.0467 kBq; lognormal SD95 1.5
  uncertainty declared in reports for radioactive releases
- Cesium-134 [emissions to water, river]: 6.21e-6 kBq; lognormal SD95 1.5
  uncertainty declared in reports for radioactive releases
- Iodine-131 [emissions to water, river]: 4.62e-6 kBq; lognormal SD95 1.5
  uncertainty declared in reports for radioactive releases
- Iodine-133 [emissions to water, river]: 2.53e-6 kBq; lognormal SD95 1.5
  uncertainty declared in reports for radioactive releases
- Barium-140 [emissions to water, river]: 4.84e-6 kBq; lognormal SD95 1.5
  uncertainty declared in reports for radioactive releases
- Antimony-124 [emissions to water, river]: 1e-6 kBq; lognormal SD95 1.5
  uncertainty declared in reports for radioactive releases
- Krypton-89 [emissions to air, low. pop.]: 0.00335 kBq; lognormal SD95 1.5
  uncertainty declared in reports for radioactive releases
- Manganese-54 [emissions to water, river]: 7.29e-5 kBq; lognormal SD95 1.5
  uncertainty declared in reports for radioactive releases
- Ruthenium-103 [emissions to air, low. pop.]: 3.86e-10 kBq; lognormal SD95 1.5
  uncertainty declared in reports for radioactive releases
- Krypton-88 [emissions to air, low. pop.]: 0.00786 kBq; lognormal SD95 1.5
  uncertainty declared in reports for radioactive releases
- Lanthanum-140 [emissions to water, river]: 4.55e-6 kBq; lognormal SD95 1.5
  uncertainty declared in reports for radioactive releases
- Lanthanum-140 [emissions to air, low. pop.]: 1.59e-7 kBq; lognormal SD95 1.5
  uncertainty declared in reports for radioactive releases
- Cobalt-58 [emissions to air, low. pop.]: 2.02e-8 kBq; lognormal SD95 1.5
  uncertainty declared in reports for radioactive releases
- Zinc-65 [emissions to water, river]: 0.000182 kBq; lognormal SD95 1.5
  uncertainty declared in reports for radioactive releases
- Aerosols, radioactive, unspecified [emissions to air, low. pop.]: 8.73e-9 kBq; lognormal SD95 1.5
  uncertainty declared in reports for radioactive releases
- Hydrogen-3, Tritium [emissions to water, river]: 0.0975 kBq; lognormal SD95 1.5
  uncertainty declared in reports for radioactive releases
- Strontium-90 [emissions to water, river]: 2.87e-6 kBq; lognormal SD95 1.5
  uncertainty declared in reports for radioactive releases
- Xenon-131m [emissions to air, low. pop.]: 0.0312 kBq; lognormal SD95 1.5
  uncertainty declared in reports for radioactive releases
- Cesium-137 [emissions to air, low. pop.]: 3.74e-7 kBq; lognormal SD95 1.5
  uncertainty declared in reports for radioactive releases
- Cerium-141 [emissions to water, river]: 1.72e-6 kBq; lognormal SD95 1.5
  uncertainty declared in reports for radioactive releases
- Sodium-24 [emissions to water, river]: 1.25e-6 kBq; lognormal SD95 1.5
  uncertainty declared in reports for radioactive releases
- Strontium-89 [emissions to water, river]: 2.55e-5 kBq; lognormal SD95 1.5
  uncertainty declared in reports for radioactive releases
- Xenon-137 [emissions to air, low. pop.]: 0.00917 kBq; lognormal SD95 1.5
  uncertainty declared in reports for radioactive releases
- Zirconium-95 [emissions to water, river]: 2.78e-7 kBq; lognormal SD95 1.5
  uncertainty declared in reports for radioactive releases
- Argon-41 [emissions to air, low. pop.]: 0.00107 kBq; lognormal SD95 1.5
  uncertainty declared in reports for radioactive releases
- Niobium-95 [emissions to water, river]: 2.59e-6 kBq; lognormal SD95 1.5
  uncertainty declared in reports for radioactive releases
- Cobalt-58 [emissions to water, river]: 7.84e-5 kBq; lognormal SD95 1.5
  uncertainty declared in reports for radioactive releases
- Xenon-135 [emissions to air, low. pop.]: 0.255 kBq; lognormal SD95 1.5
  uncertainty declared in reports for radioactive releases
- Silver-110 [emissions to water, river]: 0.00128 kBq; lognormal SD95 1.5
  uncertainty declared in reports for radioactive releases
- Cobalt-60 [emissions to air, low. pop.]: 2.63e-7 kBq; lognormal SD95 1.5
  uncertainty declared in reports for radioactive releases
- Radioactive species, alpha emitters [emissions to water, river]: 4.69e-8 kBq; lognormal SD95 1.5
  uncertainty declared in reports for radioactive releases
- Chromium-51 [emissions to water, river]: 0.000345 kBq; lognormal SD95 1.5
  uncertainty declared in reports for radioactive releases
- Cerium-141 [emissions to air, low. pop.]: 4.51e-7 kBq; lognormal SD95 1.5
  uncertainty declared in reports for radioactive releases
- Antimony-125 [emissions to water, river]: 1.31e-6 kBq; lognormal SD95 1.5
  uncertainty declared in reports for radioactive releases
- Antimony-124 [emissions to air, low. pop.]: 2.16e-9 kBq; lognormal SD95 1.5
  uncertainty declared in reports for radioactive releases
- Krypton-87 [emissions to air, low. pop.]: 0.00594 kBq; lognormal SD95 1.5
  uncertainty declared in reports for radioactive releases
- Barium-140 [emissions to air, low. pop.]: 1.86e-6 kBq; lognormal SD95 1.5
  uncertainty declared in reports for radioactive releases
- Water [emissions to water, unspecified]: 4.4935 kg; lognormal SD95 2.5196
  (5,5,5,5,5,BU:1.05); All uncertainty-values set to 5.0 by default. Balance of input water

## Sampling procedure
Literature, statistics, and information from operators.

## Sources
- Bauer C., Frischknecht R., Eckle P., Flury K., Neal T., Papp K., Schori S., Simons A., Stucki M., Treyer K., 2012, 2012 - LCA electricity generation in Switzerland - Uster, -, 407, Swiss Centre for LCI, ESU-services Ltd., PSI, Uster and Villigen, CH
Ch. Bauer, Frischknecht (2012) Umweltauswirkungen Strom. Volume: 407. PSI. Uster und Villigen, CH.
Type: Separate publication
Source: CD-ROM
First author: Ch. Bauer
Other authors: Frischknecht
Year: 2012
Place of publication: Uster und Villigen, CH
Publisher: PSI
Volume No: 407
