# Disposal, basic oxygen furnace wastes, 0% water, to residual material landfill

Dataset: EcoSpold 1, unit process
Functional unit: 1 kg
Category: waste management / residual material landfill
Geography: CH
Time period: 2000-01 to 2000-12
Generated by: Mischa Zschokke
accessRestrictedTo: 0
copyright: true

## General comment
Correction of Cr(VI) emissions according to "Chromium stability in Steel slag: Elizaveta Cheremisina and Johanna Schenk, www.steel-research.ch, steel research int. 88 (2017) No. 11. According to this literature the Cr(VI) composition of slag from BOF (basic oxigen furnace) and EAF (electric arc furnace) are 0.0001 wt %, 0.000001 kg / kg or 1 mg / kg.\nBecause of the fact that most of the Cr is in the Cr2O3 state. This values are based on model calculations.;
Synonyms: In UVEK2018 enthalten;

## Included processes
Waste-specific short-term emissions to water from leachate. Long-term emissions from landfill to ground water. Expenditures for solidificalion with cement (user-specified option)

## Geography
Switzerland

## Technology
Industry data.

## Time period
Time of publications.

## Reference product
- Disposal, basic oxygen furnace wastes, 0% water, to residual material landfill [CH]: 1 kg
  SWITZERLAND

## Inputs from technosphere
- Transport, freight, lorry, 16t-32t gross weight, fleet average [CH]: 0.02 tkm; lognormal SD95 2.0034
  (2,1,1,1,1,nA,BU:2); ;
- Disposal, cement, hydrated, 0% water, to residual material landfill [CH]: 1 kg; lognormal SD95 1.0744
  (2,2,1,1,1,nA,BU:1.05); ;
- Cement, unspecified, at plant [CH]: 0.4 kg; lognormal SD95 1.0744
  (2,2,1,1,1,nA,BU:1.05); ;
- Transport, freight, rail [RER]: 0.04 tkm; lognormal SD95 2.004
  (2,2,1,1,1,nA,BU:2); ;
- Process-specific burdens, residual material landfill [CH]: 1 kg; lognormal SD95 1.0744
  (2,2,1,1,1,nA,BU:1.05); ;
- Residual material landfill facility [CH]: 2.0833e-9 p; lognormal SD95 3.0038
  (2,2,1,1,1,nA,BU:3); ;

## Emissions to nature
- Magnesium [emissions to water, groundwater]: 0.0025063 kg; lognormal SD95 5.0043
  (2,2,1,1,1,nA,BU:5); ;
- Iron [emissions to water, groundwater]: 0.00052876 kg; lognormal SD95 5.0043
  (2,2,1,1,1,nA,BU:5); ;
- Manganese [emissions to water, groundwater]: 8.6099e-5 kg; lognormal SD95 5.0043
  (2,2,1,1,1,nA,BU:5); ;
- Magnesium [emissions to water, river]: 4.1841e-6 kg; lognormal SD95 5.0043
  (2,2,1,1,1,nA,BU:5); ;
- Chromium VI [emissions to water, river]: 5e-7 kg; lognormal SD95 3.2254
  (1,1,5,1,1,nA,BU:3); total amount in sludge 1mg/kg: assumption 50% to river 50% to groundwater; Cheremisina & Schenk, 2017
- Chromium VI [emissions to water, river]: 0.00024014 kg; lognormal SD95 3.0038
  (2,2,1,1,1,nA,BU:3); ;
- Phosphate [emissions to water, river]: 3.8027e-5 kg; lognormal SD95 1.5051
  (2,2,1,1,1,nA,BU:1.5); ;
- Aluminium [emissions to water, groundwater]: 0.0039382 kg; lognormal SD95 5.0043
  (2,2,1,1,1,nA,BU:5); ;
- Calcium [emissions to water, river]: 5.6816e-5 kg; lognormal SD95 3.0038
  (2,2,1,1,1,nA,BU:3); ;
- Silicon [emissions to water, groundwater]: 0.083663 kg; lognormal SD95 5.0043
  (2,2,1,1,1,nA,BU:5); ;
- Aluminium [emissions to water, river]: 6.5746e-6 kg; lognormal SD95 5.0043
  (2,2,1,1,1,nA,BU:5); ;
- Calcium [emissions to water, groundwater]: 0.034033 kg; lognormal SD95 3.0038
  (2,2,1,1,1,nA,BU:3); ;
- Sulfide [emissions to water, groundwater]: 0.011164 kg; lognormal SD95 1.5051
  (2,2,1,1,1,nA,BU:1.5); ;
- Sulfate [emissions to water, river]: 0.0013417 kg; lognormal SD95 1.5051
  (2,2,1,1,1,nA,BU:1.5); ;
- Phosphate [emissions to water, groundwater]: 0.022778 kg; lognormal SD95 1.5051
  (2,2,1,1,1,nA,BU:1.5); ;
- Chromium VI [emissions to water, groundwater]: 5e-7 kg; lognormal SD95 3.2254
  (same comment as for Chromium VI)
- Manganese [emissions to water, river]: 1.4374e-7 kg; lognormal SD95 5.0043
  (2,2,1,1,1,nA,BU:5); ;
- Iron [emissions to water, river]: 8.8274e-7 kg; lognormal SD95 5.0043
  (2,2,1,1,1,nA,BU:5); ;
- Silicon [emissions to water, river]: 0.00018858 kg; lognormal SD95 5.0043
  (2,2,1,1,1,nA,BU:5); ;

## Sampling procedure
Data from literature

## Extrapolations
Some generic datasets from ecoinvent have been used.

## Sources
- Zschokke M., Bolt P., Conrad S., 2021, 2021 - LCI steel and iron processes - Zschokke, Project report, Carbotech AG, Zuerich, CH
M. Zschokke, S. Conrad, P. Bolt (2020) Life cycle inventories of steel and iron processes for UVEK:2020. Project report. carbotech. Zurich, CH.
Type: Separate publication
Source: Report
First author: M. Zschokke
Other authors: S. Conrad, P. Bolt
Year: 2020
Title of anthology: Project report
Place of publication: Zurich, CH
Publisher: carbotech
Original title: Life cycle inventories of steel and iron processes for UVEK:2020

## Validation
Proof reading validation: 23.02.2021; Other validation: \\tsclient\mischa\UBTeam\AKTUELLE Projekte\BAFU Update Eisenmetalle fu¨r UVEK-2020 - 287.65\Daten\Excel2EcoSpold\A_zum_Konvertieren\Updated February 2021\[Disposal, basic oxygen furnace wastes, CH_v0.2.xlsx]X-Process;
