# Transport, passenger coach, fleet average

Dataset: EcoSpold 1, unit process
Functional unit: 1 personkm
Category: transport systems / road\Transformation
Geography: CH
Time period: 2020-01 to 2020-12
Generated by: Brian Cox
accessRestrictedTo: 0
copyright: False

## General comment
Average of other Mobitool datasets created with the purpose of replacing older datasets in the database. Basis for fleet shares: Switzerland year 2020. Source: HBEFA 5.1, INFRAS.

## Time period
Technology and fleet shares valid for year 2020

## Reference product
- Transport, passenger coach, fleet average [CH]: 1 personkm

## Inputs from technosphere
- Transport, passenger bus, diesel, 13m single deck coach bus, 2002, EURO-III [CH]: 0.059946 personkm; lognormal SD95 1.0587
  Uncertainty from pedigree matrix: (2,1,2,1,1,1); Share of technologies from HBEFA 5.1 for CH 2020
- Transport, passenger bus, diesel, 13m single deck coach bus, 2006, EURO-IV [CH]: 0.0637603 personkm; lognormal SD95 1.0587
  Uncertainty from pedigree matrix: (2,1,2,1,1,1); Share of technologies from HBEFA 5.1 for CH 2021
- Transport, passenger bus, diesel, 13m single deck coach bus, 2010, EURO-V [CH]: 0.304507 personkm; lognormal SD95 1.0587
  Uncertainty from pedigree matrix: (2,1,2,1,1,1); Share of technologies from HBEFA 5.1 for CH 2022
- Transport, passenger bus, diesel, 13m single deck coach bus, 2020, EURO-VI [CH]: 0.571787 personkm; lognormal SD95 1.0587
  Uncertainty from pedigree matrix: (2,1,2,1,1,1); Share of technologies from HBEFA 5.1 for CH 2023

## Sources
- Cox B., 2025, 2025 - Mobitool integration project - Cox, INFRAS, Bern, CH

## Validation
Data from HBEFA 5.1 for the year 2020. Some technologies with very small shares in the fleet removed for simplicity. Technology shares normalised to ensure sum of 100%
