# Silica sand, at plant

Dataset: EcoSpold 1, unit process
Functional unit: 1 kg
Category: chemicals / inorganic
Geography: DE
Time period: 2000-01 to 2000-12
Generated by: Tina Kuenniger
accessRestrictedTo: 0
copyright: true

## General comment
There is almost no difference from the module "sand, at mine". Some more transportation and energy for drying is added. For the calculation of the additional requirement of conveyor belt the total yearly production of a German company (450'000 tons) and a lifespan of 20 years are used.;
Formula: SiO2;

## Included processes
includes the raw material "sand, at plant", a certain additional amount of conveyor belt and the energy for drying the sand. No requirements for administration are included.

## Technology
typical technology for Swiss production

## Reference product
- Silica sand, at plant [DE]: 1 kg
  GERMANY

## Inputs from technosphere
- Sand, at mine [CH]: 1.04 kg; lognormal SD95 1.63
  (5,5,1,3,3,3);
- Heat, light fuel oil, at industrial furnace 1MW [CH]: 0.2 MJ; lognormal SD95 1.23
  (2,3,1,1,3,3);

## Sampling procedure
literature and estimations

## Extrapolations
See geography

## Sources
- Kellenberger D., Althaus H.-J., Jungbluth N., Kuenniger T., Lehmann M., Thalmann P., 2007, 2007 - LCI building products - Kellenberger, Final report ecoinvent data v2.0, 7, Swiss Centre for LCI, Empa - TSL, ESU-services Ltd., Bau- und Umweltchimie, Duebendorf, CH
Kellenberger D., Althaus H.-J., Jungbluth N., Künniger T. (2007) Life Cycle Inventories of Building Products. Final report ecoinvent data v2.0. Volume: 7. Swiss Centre for LCI, Empa - TSL. Dübendorf, CH.
Type: Measurement on site
Source: CD-ROM
First author: Kellenberger D.
Other authors: Althaus H.-J., Jungbluth N., Künniger T.
Year: 2007
Title of anthology: Final report ecoinvent data v2.0
Place of publication: Dübendorf, CH
Publisher: Swiss Centre for LCI, Empa - TSL
Volume No: 7

## Validation
Proof reading validation: passed; Other validation: none;
