# Laminated timber element, transversally prestressed, for outdoor use, at plant

Dataset: EcoSpold 1, unit process
Functional unit: 1 m3
Category: wood / wooden materials\updated processes\other material
Geography: RER
Time period: 2000-01 to 2000-12
Generated by: Hans-Joerg Althaus
accessRestrictedTo: 0
copyright: true

## General comment
Covers screwed-laminated timber element, transversally prestressed, for outdoor use, mainly for bridges. The multi-output process "laminated timber element, outdoor use, production" delivers the three coproducts "laminated timber element, transversally prestressed, for outdoor use, at plant", "industrial residue wood, LTE production, softwood, u=20%, at plant" and "industrial residue wood, LTE production, hardwood, u=20%, at plant". Allocation is based on the over-all proceeds of the process.;

## Included processes
Includes the inputs to the production processes and transports of those inputs. No process emission data are available.

## Geography
Data for Germany used for central Europe

## Technology
Medium enterprise technology (1995)

## Reference product
- Laminated timber element, transversally prestressed, for outdoor use, at plant [RER]: 1 m3
  Europe

## Inputs from technosphere
- Transport, freight, rail [RER]: 84.435 tkm; lognormal SD95 2.09
  (4,5,nA,nA,nA,nA,5)
- Steel, low-alloyed, at plant [RER]: 52.3 kg; lognormal SD95 1.45
  (4,5,1,3,3,5,3)
- Sawnwood, production mix, hardwood, raw, dried (u=10%), at sawmill [RER]: 0.092 m3; lognormal SD95 1.45
  (4,5,1,3,3,5,3)
- Hardwood, allocation correction, 1 [RER]: -0.0236 m3
  calculated correction term; adjusted to (real) basic wood density 614.4 kg/m3 from 650 kg/m3 as assumed in ecoinvent 2.2
- Transport, freight, lorry, fleet average [RER]: 42.2175 tkm; lognormal SD95 2.09
  (4,5,nA,nA,nA,nA,5)
- Softwood, allocation correction, 1 [RER]: -0.297 m3
  calculated correction term; adjusted to (real) basic wood density 422.4 kg/m3 from 450 kg/m3 as assumed in ecoinvent 2.2
- Electricity, medium voltage, production ENTSO-E, at grid: 9.7 kWh; lognormal SD95 1.45
  (4,5,1,3,3,5,2)
- Wooden board manufacturing plant, organic bonded boards [RER]: 3.2301e-8 p; lognormal SD95 3.36
  (4,5,2,3,4,5,9)
- Sawnwood, board, softwood, raw, dried (u=10%), at sawmill [RER]: 1.2416 m3; lognormal SD95 1.45
  (4,5,1,3,3,5,3)

## Emissions to nature
- Heat, waste [emissions to air, unspecified]: 34.92 MJ; lognormal SD95 1.45
  (4,5,1,3,3,5,13)

## Sampling procedure
Literature

## Extrapolations
see Geography and Technology

## Uncertainty adjustments
The assumption that the technology is representative for central Europe is considered in the uncertainties.

## Sources
- Werner F., Althaus H.-J., Kuenniger T., Richter K., Jungbluth N., 2007, 2007 - LCI wood as fuel and const. mat. - Werner, Final report ecoinvent data v2.0, 9, Swiss Centre for LCI, Empa - TSL, ESU-services Ltd., Duebendorf, CH
Werner F., Althaus H.-J., Künniger T., Richter K., Jungbluth N. (2007) 1Life Cycle Inventories of Wood as Fuel and Construction Material. Final report ecoinvent data v2.0. Volume: 9. Issue: 0. Swiss Centre for LCI, Empa - TSL. Dübendorf, CH.
Type: Measurement on site
Source: CD-ROM
First author: Werner F.
Other authors: Althaus H.-J., Künniger T., Richter K., Jungbluth N.
Year: 2007
Title of anthology: Final report ecoinvent data v2.0
Place of publication: Dübendorf, CH
Publisher: Swiss Centre for LCI, Empa - TSL
Volume No: 9
Issue No: 0
