# xx Cellulose fibre, inclusive blowing in, at plant

Dataset: EcoSpold 1, unit process
Functional unit: 1 kg
Category: material, obsolete / construction, obsolete\insulation, obsolete
Geography: CH
Time period: 2000-01 to 2000-12
Generated by: Hans-Joerg Althaus
accessRestrictedTo: 0
copyright: true

## General comment
Cellulose fibre in building applications has a density of 50 kg/m3 and a thermal conductivity of 0.04 W/mK when applied. No emissions are inventoried be-sides the heat waste from electricity use for lack of data.;

## Included processes
includes the input energy and material to the production processes, transports of the materials and the available process emissions. Also included is the packaging and the energy for the application of the fibres as insulation materi-als in buildings.

## Geography
production data from one major producer in Switzerland

## Technology
mechanical separation of fibres from waste paper

## Reference product
- xx Cellulose fibre, inclusive blowing in, at plant [CH]: 1 kg
  SWITZERLAND

## Inputs from technosphere
- Reinforcing steel, at plant [RER]: 0.00181 kg; lognormal SD95 1.22
  (1,3,2,1,1,5);
- Waste paper, mixed, from public collection, for further treatment [CH]: 0.801 kg; lognormal SD95 1.22
  (1,3,2,1,1,5);
- Kraft paper, unbleached, at plant [RER]: 0.037 kg; lognormal SD95 1.22
  (1,3,2,1,1,5);
- Tap water, at user [RER]: 0.0238 kg; lognormal SD95 1.22
  (1,3,2,1,1,5);
- Transport, freight, lorry, 16t-32t gross weight, fleet average [CH]: 0.0532 tkm; lognormal SD95 2.09
  (4,5,n.A.,n.A.,n.A.,n.A.);
- Transport, freight, rail [RER]: 0.205 tkm; lognormal SD95 2.09
  (4,5,n.A.,n.A.,n.A.,n.A.);
- Disposal, paper, 11.2% water, to municipal incineration [CH]: 0.0112 kg; lognormal SD95 1.22
  (1,3,2,1,1,5);
- Packaging film, LDPE, at plant [RER]: 0.000325 kg; lognormal SD95 1.22
  (1,3,2,1,1,5);
- EUR-flat pallet [RER]: 0.00121 p; lognormal SD95 1.22
  (1,3,2,1,1,5);
- Electricity, low voltage, at grid [CH]: 0.102 kWh; lognormal SD95 1.22
  (1,3,2,1,1,5);
- Boric acid, anhydrous, powder, at plant [RER]: 0.0887 kg; lognormal SD95 1.22
  (1,3,2,1,1,5);
- Wood pellet manufacturing, infrastructure [RER]: 1e-8 p; lognormal SD95 3.23
  (5,n.A.,n.A.,n.A.,n.A.,n.A.);
- Borax, anhydrous, powder, at plant [RER]: 0.109 kg; lognormal SD95 1.22
  (1,3,2,1,1,5);
- Diesel, burned in building machine, average [CH]: 0.0112 MJ; lognormal SD95 2.05
  (1,3,2,1,1,5);
- Natural gas, burned in industrial furnace 1MW [CH]: 0.0641 MJ; lognormal SD95 1.22
  (1,3,2,1,1,5);
- Disposal, wood untreated, 20% water, to municipal incineration [CH]: 0.0028 kg; lognormal SD95 1.22
  (1,3,2,1,1,5);
- Disposal, municipal solid waste, 22.9% water, to municipal incineration [CH]: 0.0104 kg; lognormal SD95 1.22
  (1,3,2,1,1,5);

## Emissions to nature
- Heat, waste [emissions to air, unspecified]: 0.366 MJ; lognormal SD95 1.22
  (1,3,2,1,1,5);

## Sampling procedure
literature

## Sources
- Kellenberger D., Althaus H.-J., Jungbluth N., Kuenniger T., Lehmann M., Thalmann P., 2007, 2007 - LCI building products - Kellenberger, Final report ecoinvent data v2.0, 7, Swiss Centre for LCI, Empa - TSL, ESU-services Ltd., Bau- und Umweltchimie, Duebendorf, CH
Kellenberger D., Althaus H.-J., Jungbluth N., Künniger T. (2007) Life Cycle Inventories of Building Products. Final report ecoinvent data v2.0. Volume: 7. Swiss Centre for LCI, Empa - TSL. Dübendorf, CH.
Type: Measurement on site
Source: CD-ROM
First author: Kellenberger D.
Other authors: Althaus H.-J., Jungbluth N., Künniger T.
Year: 2007
Title of anthology: Final report ecoinvent data v2.0
Place of publication: Dübendorf, CH
Publisher: Swiss Centre for LCI, Empa - TSL
Volume No: 7

## Validation
Proof reading validation: passed; Other validation: none;
