# Hard coal, burned in industrial furnace 1-10MW

Dataset: EcoSpold 1, unit process
Functional unit: 1 MJ
Category: heat / coal\furnace
Geography: RER
Time period: 2000-01 to 2000-12
Generated by: Christian Bauer
accessRestrictedTo: 0
copyright: true

## General comment
The stoker boiler is assumed to fire egg coal with quality between long-flame coal and fat coal. The heating value (28.9 MJ/kg) and the composition of the coal are average values available from the literature. The emission data are also taken from literature reporting measurements performed at the end of the 1980s in Germany. Size distribution of particles has been estimated on the basis of recent information from EPA. Emissions of trace elements were calculated using the ash content in the coal and average transfer coefficients for coal power plants with ash retention of 98 %, as first approximation. With the assumption that coal is stored in a dry storage, no leaching is considered. Possible emissions to water during operation of the boiler are not included for missing information.;

## Included processes
Industrial heat production. The module describes the combustion process and includes softened water requirement, coal transport, ash disposal and electricity requirement.

## Geography
German conditions.

## Technology
Average used in early 1990s. Stoker boiler used as reference technology.

## Reference product
- Hard coal, burned in industrial furnace 1-10MW [RER]: 1 MJ
  Europe

## Inputs from technosphere
- Industrial furnace, coal, 1-10 MW [RER]: 5.56e-10 p; lognormal SD95 3.06
  (2,3,3,3,1,5); infrastructure
- Disposal, hard coal ash, 0% water, to residual material landfill [PL]: 0.0029 kg; lognormal SD95 1.51
  (5,1,2,3,1,3); assumption: no reuse
- Electricity, medium voltage, production ENTSO-E, at grid: 0.00418 kWh; lognormal SD95 1.33
  (4,2,3,2,3,3); generic electricity consumption
- Transport, freight, lorry, fleet average [RER]: 0.00015 tkm; lognormal SD95 2.1
  (4,2,1,3,1,5); based on theoretical calculations
- Water, completely softened, at plant [RER]: 0.0075 kg; lognormal SD95 1.35
  (2,5,3,5,1,5); rough estimate
- Hard coal mix, at regional storage [UCTE]: 0.0346 kg; lognormal SD95 1.22
  (4,2,2,3,1,3); fuel input

## Emissions to nature
- Hydrocarbons, aliphatic, unsaturated [emissions to air, high. pop.]: 5e-7 kg; lognormal SD95 1.57
  (2,3,4,3,1,3); total NMVOC and profile estimate
- Propene [emissions to air, high. pop.]: 5e-7 kg; lognormal SD95 1.57
  (2,3,4,3,1,3); total NMVOC and profile estimate
- Magnesium [emissions to air, high. pop.]: 3.79e-6 kg; lognormal SD95 5.17
  (4,5,3,3,1,5); from trace element balance; see report for details
- Lead-210 [emissions to air, high. pop.]: 4.65e-5 kBq; lognormal SD95 5.17
  (4,5,3,3,1,5); from radioactivity of the elements; see report for details
- Particulates, > 2.5 um, and < 10um [emissions to air, high. pop.]: 2e-5 kg; lognormal SD95 2.16
  (4,5,3,3,1,5); total PM and profile estimates
- Methane, fossil [emissions to air, high. pop.]: 1e-5 kg; lognormal SD95 1.57
  (2,3,4,3,1,3); typical value
- Nickel [emissions to air, high. pop.]: 1.9e-8 kg; lognormal SD95 5.17
  (4,5,3,3,1,5); from trace element balance; see report for details
- Ethane [emissions to air, high. pop.]: 1.5e-6 kg; lognormal SD95 1.57
  (2,3,4,3,1,3); total NMVOC and profile estimate
- Ethyne [emissions to air, high. pop.]: 5e-7 kg; lognormal SD95 1.57
  (2,3,4,3,1,3); total NMVOC and profile estimate
- Radon-222 [emissions to air, high. pop.]: 1e-6 kBq; lognormal SD95 5.17
  (4,5,3,3,1,5); from radioactivity of the elements; see report for details
- Toluene [emissions to air, high. pop.]: 1e-7 kg; lognormal SD95 1.57
  (2,3,4,3,1,3); total NMVOC and profile estimate
- Arsenic [emissions to air, high. pop.]: 2.53e-8 kg; lognormal SD95 5.17
  (4,5,3,3,1,5); from trace element balance; see report for details
- Iodine [emissions to air, high. pop.]: 1.14e-8 kg; lognormal SD95 5.17
  (4,5,3,3,1,5); from trace element balance; see report for details
- Beryllium [emissions to air, high. pop.]: 1.26e-9 kg; lognormal SD95 1.57
  (2,3,4,3,1,3); total NMVOC and profile estimate
- Mercury [emissions to air, high. pop.]: 2.84e-9 kg; lognormal SD95 5.17
  (4,5,3,3,1,5); from trace element balance; see report for details
- Polonium-210 [emissions to air, high. pop.]: 8.5e-5 kBq; lognormal SD95 5.17
  (4,5,3,3,1,5); from radioactivity of the elements; see report for details
- Thorium-228 [emissions to air, high. pop.]: 5.5e-6 kBq; lognormal SD95 5.17
  (4,5,3,3,1,5); from radioactivity of the elements; see report for details
- Thallium [emissions to air, high. pop.]: 1.58e-9 kg; lognormal SD95 5.17
  (4,5,3,3,1,5); from trace element balance; see report for details
- Boron [emissions to air, high. pop.]: 4.74e-7 kg; lognormal SD95 5.17
  (4,5,3,3,1,5); from trace element balance; see report for details
- Barium [emissions to air, high. pop.]: 1.26e-7 kg; lognormal SD95 5.17
  (4,5,3,3,1,5); from trace element balance; see report for details
- Manganese [emissions to air, high. pop.]: 2.21e-8 kg; lognormal SD95 5.17
  (4,5,3,3,1,5); from trace element balance; see report for details
- Carbon monoxide, fossil [emissions to air, high. pop.]: 0.0001 kg; lognormal SD95 5.06
  (2,3,4,3,1,3); typical value
- Phosphorus [emissions to air, high. pop.]: 6.32e-8 kg; lognormal SD95 5.17
  (4,5,3,3,1,5); from trace element balance; see report for details
- Hydrocarbons, aliphatic, alkanes, unspecified [emissions to air, high. pop.]: 5e-7 kg; lognormal SD95 1.57
  (2,3,4,3,1,3); total NMVOC and profile estimate
- Sodium [emissions to air, high. pop.]: 6.32e-7 kg; lognormal SD95 5.17
  (4,5,3,3,1,5); from trace element balance; see report for details
- Radon-220 [emissions to air, high. pop.]: 1e-6 kBq; lognormal SD95 5.17
  (4,5,3,3,1,5); from radioactivity of the elements; see report for details
- Molybdenum [emissions to air, high. pop.]: 4.74e-9 kg; lognormal SD95 5.17
  (4,5,3,3,1,5); from trace element balance; see report for details
- Uranium-238 [emissions to air, high. pop.]: 1e-5 kBq; lognormal SD95 5.17
  (4,5,3,3,1,5); from radioactivity of the elements; see report for details
- Benzo(a)pyrene [emissions to air, high. pop.]: 1e-11 kg; lognormal SD95 1.57
  (2,3,4,3,1,3); total NMVOC and profile estimate
- Cobalt [emissions to air, high. pop.]: 3.16e-9 kg; lognormal SD95 5.17
  (4,5,3,3,1,5); from trace element balance; see report for details
- Dioxin, 2,3,7,8 Tetrachlorodibenzo-p- [emissions to air, high. pop.]: 2e-14 kg; lognormal SD95 3.06
  (2,3,4,3,1,3);
- Uranium [emissions to air, high. pop.]: 2.53e-9 kg; lognormal SD95 5.17
  (4,5,3,3,1,5); from trace element balance; see report for details
- Chromium VI [emissions to air, high. pop.]: 2.78e-9 kg; lognormal SD95 4
  based on range of data
- Vanadium [emissions to air, high. pop.]: 3.79e-8 kg; lognormal SD95 5.17
  (4,5,3,3,1,5); from trace element balance; see report for details
- Lead [emissions to air, high. pop.]: 7.58e-8 kg; lognormal SD95 5.17
  (4,5,3,3,1,5); from trace element balance; see report for details
- Radium-228 [emissions to air, high. pop.]: 6.5e-5 kBq; lognormal SD95 5.17
  (4,5,3,3,1,5); from radioactivity of the elements; see report for details
- NMVOC, non-methane volatile organic compounds, unspecified origin [emissions to air, high. pop.]: 1.72e-6 kg; lognormal SD95 1.57
  (2,3,4,3,1,3); total NMVOC and profile estimate
- Tin [emissions to air, high. pop.]: 6.32e-10 kg; lognormal SD95 5.17
  (4,5,3,3,1,5); from trace element balance; see report for details
- Ethene [emissions to air, high. pop.]: 3e-6 kg; lognormal SD95 1.57
  (2,3,4,3,1,3); total NMVOC and profile estimate
- Strontium [emissions to air, high. pop.]: 1.9e-7 kg; lognormal SD95 5.17
  (4,5,3,3,1,5); from trace element balance; see report for details
- Particulates, < 2.5 um [emissions to air, high. pop.]: 2e-5 kg; lognormal SD95 3.15
  (4,5,3,3,1,5); total PM and profile estimates
- Potassium [emissions to air, high. pop.]: 1.26e-6 kg; lognormal SD95 5.17
  (4,5,3,3,1,5); from trace element balance; see report for details
- Antimony [emissions to air, high. pop.]: 1.58e-9 kg; lognormal SD95 5.17
  (4,5,3,3,1,5); from trace element balance; see report for details
- Propane [emissions to air, high. pop.]: 1e-6 kg; lognormal SD95 1.57
  (2,3,4,3,1,3); total NMVOC and profile estimate
- Zinc [emissions to air, high. pop.]: 3.16e-9 kg; lognormal SD95 5.17
  (4,5,3,3,1,5); from trace element balance; see report for details
- Nitrogen oxides [emissions to air, high. pop.]: 0.0002 kg; lognormal SD95 1.57
  (2,3,4,3,1,3); typical value
- Bromine [emissions to air, high. pop.]: 9.48e-9 kg; lognormal SD95 5.17
  (4,5,3,3,1,5); from trace element balance; see report for details
- Thorium [emissions to air, high. pop.]: 1.9e-9 kg; lognormal SD95 5.17
  (4,5,3,3,1,5); from trace element balance; see report for details
- Cadmium [emissions to air, high. pop.]: 1.58e-9 kg; lognormal SD95 5.17
  (4,5,3,3,1,5); from trace element balance; see report for details
- Heat, waste [emissions to air, high. pop.]: 1.06 MJ; lognormal SD95 1.22
  (4,1,1,1,1,3); from theoretical considerations
- Chromium [emissions to air, high. pop.]: 2.25e-8 kg; lognormal SD95 5.17
  (4,5,3,3,1,5); from trace element balance; see report for details
- Xylene [emissions to air, high. pop.]: 1e-7 kg; lognormal SD95 1.57
  (2,3,4,3,1,3); total NMVOC and profile estimate
- Hydrogen chloride [emissions to air, high. pop.]: 4.05e-5 kg; lognormal SD95 1.69
  (4,5,3,3,1,5); from trace element balance; see report for details
- Selenium [emissions to air, high. pop.]: 9.48e-9 kg; lognormal SD95 5.17
  (4,5,3,3,1,5); from trace element balance; see report for details
- Titanium [emissions to air, high. pop.]: 3.79e-7 kg; lognormal SD95 5.17
  (4,5,3,3,1,5); from trace element balance; see report for details
- Benzene [emissions to air, high. pop.]: 5e-7 kg; lognormal SD95 1.57
  (2,3,4,3,1,3); total NMVOC and profile estimate
- Sulfur dioxide [emissions to air, high. pop.]: 0.0005 kg; lognormal SD95 1.4
  (4,5,3,3,1,5); from S-balance
- Silicon [emissions to air, high. pop.]: 1.58e-5 kg; lognormal SD95 5.17
  (4,5,3,3,1,5); from trace element balance; see report for details
- Particulates, > 10 um [emissions to air, high. pop.]: 1e-5 kg; lognormal SD95 1.69
  (4,5,3,3,1,5); total PM and profile estimates
- Calcium [emissions to air, high. pop.]: 1.26e-6 kg; lognormal SD95 5.17
  (4,5,3,3,1,5); from trace element balance; see report for details
- Scandium [emissions to air, high. pop.]: 1.26e-9 kg; lognormal SD95 5.17
  (4,5,3,3,1,5); from trace element balance; see report for details
- Copper [emissions to air, high. pop.]: 1.66e-8 kg; lognormal SD95 5.17
  (4,5,3,3,1,5); from trace element balance; see report for details
- Dinitrogen monoxide [emissions to air, high. pop.]: 1e-6 kg; lognormal SD95 1.57
  (2,3,4,3,1,3); typical value
- Aluminium [emissions to air, high. pop.]: 1.07e-5 kg; lognormal SD95 5.17
  (4,5,3,3,1,5); from trace element balance; see report for details
- Potassium-40 [emissions to air, high. pop.]: 1.35e-5 kBq; lognormal SD95 5.17
  (4,5,3,3,1,5); from radioactivity of the elements; see report for details
- Thorium-232 [emissions to air, high. pop.]: 3.5e-6 kBq; lognormal SD95 5.17
  (4,5,3,3,1,5); from radioactivity of the elements; see report for details
- Formaldehyde [emissions to air, high. pop.]: 8e-8 kg; lognormal SD95 1.57
  (2,3,4,3,1,3); total NMVOC and profile estimate
- Iron [emissions to air, high. pop.]: 4.42e-6 kg; lognormal SD95 5.17
  (4,5,3,3,1,5); from trace element balance; see report for details
- Carbon dioxide, fossil [emissions to air, high. pop.]: 0.0915 kg; lognormal SD95 1.1
  (2,2,2,3,1,3); from carbon balance
- Hydrogen fluoride [emissions to air, high. pop.]: 1.26e-6 kg; lognormal SD95 1.69
  (4,5,3,3,1,5); from trace element balance; see report for details
- Radium-226 [emissions to air, high. pop.]: 1.2e-5 kBq; lognormal SD95 5.17
  (4,5,3,3,1,5); from radioactivity of the elements; see report for details

## Sampling procedure
literature

## Extrapolations
see Geography/Text

## Sources
- Dones R., Bauer C., Roeder A., 2007, 2007 - Coal - Dones, Sachbilanzen von Energiesystemen. Final report No. 6 ecoinvent data v2.0, 6, Swiss Centre for LCI, PSI, Duebendorf and Villigen, CH
Röder, A., Ch. Bauer, R. Dones (2007) Kohle. Sachbilanzen von Energiesystemen. Final report No. 6 ecoinvent data v2.0. Editors: Dones R.. Volume: 6. Swiss Centre for LCI, PSI. Dübendorf and Villigen, CH.
Type: Measurement on site
Source: CD-ROM
First author: Röder, A.
Other authors: Ch. Bauer, R. Dones
Year: 2007
Name of editors: Dones R.
Title of anthology: Sachbilanzen von Energiesystemen. Final report No. 6 ecoinvent data v2.0
Place of publication: Dübendorf and Villigen, CH
Publisher: Swiss Centre for LCI, PSI
Volume No: 6

## Validation
Proof reading validation: passed; Other validation: none;
