# xx Irrigating

Dataset: EcoSpold 1, unit process
Functional unit: 1 m3
Category: processing, obsolete / agricultural, obsolete
Geography: CH
Time period: 2000-01 to 2000-12
Generated by: Dunja Dux
accessRestrictedTo: 0
copyright: true

## General comment
Overhead watering 1 m3 water. Mobile sprinkler system, with fix installed pump (30 m3/h, 7-8 bar, 22 kW), water pipe and hydrant, turbine propulsion, 300 m water hose, exterior diameter 75 mm.;
Synonyms: Beregnen;

## Included processes
The inventory takes into account electricity and diesel fuel consumption, the amount of agricultural machinery, of the shed and the further infrastructure like pump or water hose, etc., which has to be attributed to the irrigation. Also taken into consideration is the amount of emissions to the air from combustion and the emission to the soil from tyre abrasion during the work process. The following activities where considered part of the work process: preliminary work at the farm, like attaching the adequate machine to the tractor; transfer to field (with an assumed distance of 1 km); field work (for a parcel of land of 1 ha surface); transfer to farm and concluding work, like uncoupling the machine. The overlapping during the field work is considered. The amount of water irrigated is taken into account. Not included are dust other than from combustion and noise.

## Geography
The inventories are based on expert estimation made by the FAT, in Switzerland and literature values from Germany and Austria.

## Technology
Emissions and fuel consumption by the newest models of tractors set into operation during the period from 1999 to 2001.

## Time period
Measurements were made in the last few years (1999-2001).

## Reference product
- xx Irrigating [CH]: 1 m3
  SWITZERLAND

## Inputs from technosphere
- Irrigating [CH]: 0.00083333 ha; lognormal SD95 1
  (1,1,1,1,1,na)

## Sampling procedure
Data on fuel consumption and emissions of CO, HC and NOx are expert estimations based on measurements for comparable activities. The other emissions were calculated basing on literature data and the measured fuel consumption.

## Extrapolations
Processes are typical procedures for Switzerland around the year 2000, they are not statistical average processes.

## Sources
- Nemecek T., Kaegi T., 2007, 2007 - LCI agricultural prod. systems - Nemecek, Ecoinvent report version 2.0, 15, Swiss Centre for LCI, ART, Duebendorf and Zuerich, CH
Nemecek, T., Kägi, T., Blaser, S. (2007) Life Cycle Inventories of Agricultural Production Systems. Ecoinvent report version 2.0. Editors: 0. Volume: 15. Swiss Centre for LCI, ART. Duebendorf and Zurich, CH.
Type: Measurement on site
Source: CD-ROM
First author: Nemecek, T.
Other authors: Kägi, T., Blaser, S.
Year: 2007
Name of editors: 0
Title of anthology: Ecoinvent report version 2.0
Place of publication: Duebendorf and Zurich, CH
Publisher: Swiss Centre for LCI, ART
Volume No: 15

## Validation
Proof reading validation: passed; Other validation: none;
