# Polyurethane, rigid foam, at plant

Dataset: EcoSpold 1, unit process
Functional unit: 1 kg
Category: plastics / thermosets
Geography: RER
Time period: 2000-01 to 2000-12
Production volume: 5 Mt (Total PUR consumption 1990)
Generated by: Roland Hischier
accessRestrictedTo: 0
copyright: true

## General comment
Dataset represents just one possible composition for a rigid PUR foam.;
CAS number: 009009-54-5;
Synonyms: PUR;

## Included processes
This dataset contains the transports of the monomers as well as the production (energy, air emissions) of the PUR foam

## Technology
Present technology used in Europe. Transport and infrastructure - average values added.

## Time period
date of publication

## Reference product
- Polyurethane, rigid foam, at plant [RER]: 1 kg
  Europe

## Inputs from technosphere
- Transport, freight, lorry, fleet average [RER]: 0.211 tkm; lognormal SD95 2.1
  (4,5,na,na,na,na); standard distances
- Chemical plant, organics [RER]: 4e-10 p; lognormal SD95 3.1
  (4,na,na,na,na,na); estimation
- Pentane, at plant [RER]: 0.054 kg; lognormal SD95 1.4
  (2,5,2,1,3,5); Typcial example, based on Industry data
- Polyols, at plant [RER]: 0.386 kg; lognormal SD95 1.4
  (2,5,2,1,3,5); Typcial example, based on Industry data
- Disposal, polyurethane, 0.2% water, to municipal incineration [CH]: 0.02 kg; lognormal SD95 1.4
  (2,5,2,1,3,5); Typcial example, based on Industry data
- Electricity, medium voltage, production ENTSO-E, at grid: 0.417 kWh; lognormal SD95 1.4
  (2,5,2,1,3,5); Typcial example, based on Industry data
- Methylene diphenyl diisocyanate, at plant [RER]: 0.616 kg; lognormal SD95 1.4
  (2,5,2,1,3,5); Typcial example, based on Industry data

## Emissions to nature
- Pentane [emissions to air, high. pop.]: 0.003 kg; lognormal SD95 2.2
  (2,5,2,1,3,5); Typcial example, based on Industry data
- Heat, waste [emissions to air, high. pop.]: 1.5 MJ; lognormal SD95 1.4
  (2,5,2,1,3,5); caclulated form electricity input

## Sampling procedure
data from industry report

## Extrapolations
see technology

## Sources
- Hischier R., 2007, 2007 - LCI packagings and graphical papers - Hischier, Final report ecoinvent data v2.0, 11, Swiss Centre for LCI, Empa - TSL, Duebendorf and St. Gallen, CH
Hischier R. (2007) Life Cycle Inventories of Packaging and Graphical Paper. Final report ecoinvent data v2.0. Volume: 11. Swiss Centre for LCI, Empa - TSL. Dübendorf, CH.
Type: Measurement on site
Source: CD-ROM
First author: Hischier R.
Year: 2007
Title of anthology: Final report ecoinvent data v2.0
Place of publication: Dübendorf, CH
Publisher: Swiss Centre for LCI, Empa - TSL
Volume No: 11

## Validation
Proof reading validation: passed; Other validation: none;
