# Wood chips, burned in cogen ORC 1400kWth

Dataset: EcoSpold 1, unit process
Functional unit: 1 MJ
Category: heat / wood\cogeneration\power unit
Geography: CH
Time period: 2000-01 to 2001-12
Generated by: Christian Bauer
accessRestrictedTo: 0
copyright: true

## General comment
Heat of combustion of wood based on low heating value. Emission factors for particulate, CO and NOx taken from measurements;

## Included processes
This module describes the combustion of natural wood chips. Included are the infrastructure, the wood input, the emissions to air, the transport of the fuel, and the disposal of the ashes. Also included are substances needed for operation: lubricating oil, ammonia, organic chemicals, sodium chloride, chlorine and decarbonized water.

## Technology
Specific cogeneration unit installed in Switzerland.

## Reference product
- Wood chips, burned in cogen ORC 1400kWth [CH]: 1 MJ
  SWITZERLAND

## Inputs from technosphere
- Wood chips, hardwood, wet, measured as dry mass, at sawmill [CH]: 0.01927 kg
  uncertainty on energy and water content, and bulk density; species composition as in original DS
- Chlorine, liquid, production mix, at plant [RER]: 3.79e-7 kg; lognormal SD95 1.2
  general assumption
- Disposal, wood ash mixture, pure, 0% water, to municipal incineration [CH]: 0.000132 kg; lognormal SD95 1.05
  homogeneous fuel
- Disposal, used mineral oil, 10% water, to hazardous waste incineration [CH]: 3.79e-6 kg; lognormal SD95 1.2
  general assumption
- Lubricating oil, at plant [RER]: 3.79e-6 kg; lognormal SD95 1.1
  general assumption
- Disposal, wood ash mixture, pure, 0% water, to sanitary landfill [CH]: 0.000265 kg; lognormal SD95 1.05
  homogeneous fuel
- Cogen unit ORC 1400kWth, wood burning, building [CH]: 3.7e-10 p; lognormal SD95 1.2
  uncertainty on lifetime and material
- Cogen unit ORC 1400kWth, wood burning, components for electricity only [CH]: 1.48e-9 p; lognormal SD95 1.2
  essentially uncertainty of assignment of reference system
- Ammonia, liquid, at regional storehouse [CH]: 9.5e-9 kg; lognormal SD95 1.2
  general assumption
- Disposal, wood ash mixture, pure, 0% water, to landfarming [CH]: 0.000132 kg; lognormal SD95 1.05
  homogeneous fuel
- Wood chips, softwood, wet, measured as dry mass, at sawmill [CH]: 0.03504 kg
  (same comment as for Wood chips, hardwood, wet, measured as dry mass, at sawmill)
- Treatment, sewage, to wastewater treatment, class 2 [CH]: 9.11e-7 m3; lognormal SD95 1.2
  general assumption
- Sodium chloride, powder, at plant [RER]: 4.74e-6 kg; lognormal SD95 1.2
  general assumption
- Water, decarbonised, at plant [RER]: 0.000911 kg; lognormal SD95 1.2
  general assumption
- Cogen unit ORC 1400kWth, wood burning, common components for heat+electricity [CH]: 1.48e-9 p; lognormal SD95 1.2
  uncertainty on lifetime and material
- Chemicals organic, at plant [GLO]: 6.64e-6 kg; lognormal SD95 1.2
  general assumption
- Transport, freight, lorry, 16t-32t gross weight, fleet average [CH]: 0.00479 tkm; lognormal SD95 1.2
  general assumption
- Disposal, municipal solid waste, 22.9% water, to municipal incineration [CH]: 3.79e-6 kg; lognormal SD95 1.2
  general assumption

## Emissions to nature
- Lead [emissions to air, high. pop.]: 2.49e-8 kg; lognormal SD95 3.7
  extrapolation
- Benzene, hexachloro- [emissions to air, high. pop.]: 7.2e-15 kg; lognormal SD95 3.7
  extrapolation
- Ammonia [emissions to air, high. pop.]: 1.74e-6 kg; lognormal SD95 3.7
  extrapolation
- Bromine [emissions to air, high. pop.]: 6e-8 kg; lognormal SD95 3.7
  extrapolation
- Fluorine [emissions to air, high. pop.]: 5e-8 kg; lognormal SD95 3.7
  extrapolation
- Benzene [emissions to air, high. pop.]: 9.1e-7 kg; lognormal SD95 3.7
  extrapolation
- Benzene, ethyl- [emissions to air, high. pop.]: 3e-8 kg; lognormal SD95 3.7
  extrapolation
- Nitrogen oxides [emissions to air, high. pop.]: 0.000112 kg; lognormal SD95 1.3
  measurements
- Dinitrogen monoxide [emissions to air, high. pop.]: 2.3e-6 kg; lognormal SD95 3.7
  extrapolation
- Benzo(a)pyrene [emissions to air, high. pop.]: 5e-10 kg; lognormal SD95 3.7
  extrapolation
- Acetaldehyde [emissions to air, high. pop.]: 6.1e-8 kg; lognormal SD95 3.7
  extrapolation
- Sulfur dioxide [emissions to air, high. pop.]: 2.49e-6 kg; lognormal SD95 3.7
  extrapolation
- Zinc [emissions to air, high. pop.]: 3e-7 kg; lognormal SD95 3.7
  extrapolation
- Potassium [emissions to air, high. pop.]: 2.34e-5 kg; lognormal SD95 3.7
  extrapolation
- Mercury [emissions to air, high. pop.]: 3e-10 kg; lognormal SD95 3.7
  extrapolation
- Sodium [emissions to air, high. pop.]: 1.3e-6 kg; lognormal SD95 3.7
  extrapolation
- Hydrocarbons, aliphatic, unsaturated [emissions to air, high. pop.]: 3.1e-6 kg; lognormal SD95 3.7
  extrapolation
- Copper [emissions to air, high. pop.]: 2.2e-8 kg; lognormal SD95 3.7
  extrapolation
- Particulates, < 2.5 um [emissions to air, high. pop.]: 0.000111 kg; lognormal SD95 1.4
  measurements
- Dioxin, 2,3,7,8 Tetrachlorodibenzo-p- [emissions to air, high. pop.]: 3.1e-14 kg; lognormal SD95 3.7
  extrapolation
- Magnesium [emissions to air, high. pop.]: 3.61e-7 kg; lognormal SD95 3.7
  extrapolation
- Carbon dioxide, biogenic [emissions to air, high. pop.]: 0.0984 kg; lognormal SD95 1.05
  uncertainty of carbon content in the wood
- NMVOC, non-methane volatile organic compounds, unspecified origin [emissions to air, high. pop.]: 6.1e-7 kg; lognormal SD95 3.7
  extrapolation
- Calcium [emissions to air, high. pop.]: 5.85e-6 kg; lognormal SD95 3.7
  extrapolation
- Chromium VI [emissions to air, high. pop.]: 4e-11 kg; lognormal SD95 4
  range of data
- Heat, waste [emissions to air, high. pop.]: 1.04 MJ; lognormal SD95 1.05
  own estimation, based on uncertainty of upper heating value and electricity production
- Carbon monoxide, biogenic [emissions to air, high. pop.]: 7e-6 kg; lognormal SD95 1.3
  measurements
- Phosphorus [emissions to air, high. pop.]: 3e-7 kg; lognormal SD95 3.7
  extrapolation
- Formaldehyde [emissions to air, high. pop.]: 1.3e-7 kg; lognormal SD95 3.7
  extrapolation
- Nickel [emissions to air, high. pop.]: 6e-9 kg; lognormal SD95 3.7
  extrapolation
- Arsenic [emissions to air, high. pop.]: 1e-9 kg; lognormal SD95 3.7
  extrapolation
- Hydrocarbons, aliphatic, alkanes, unspecified [emissions to air, high. pop.]: 9.1e-7 kg; lognormal SD95 3.7
  extrapolation
- Toluene [emissions to air, high. pop.]: 3e-7 kg; lognormal SD95 3.7
  extrapolation
- Chromium [emissions to air, high. pop.]: 3.96e-9 kg; lognormal SD95 3.7
  extrapolation
- Methane, biogenic [emissions to air, high. pop.]: 4.34e-7 kg; lognormal SD95 3.7
  extrapolation
- m-Xylene [emissions to air, high. pop.]: 1.2e-7 kg; lognormal SD95 3.7
  extrapolation
- Chlorine [emissions to air, high. pop.]: 1.8e-7 kg; lognormal SD95 3.7
  extrapolation
- Cadmium [emissions to air, high. pop.]: 7e-10 kg; lognormal SD95 3.7
  extrapolation
- Phenol, pentachloro- [emissions to air, high. pop.]: 8.1e-12 kg; lognormal SD95 3.7
  extrapolation
- PAH, polycyclic aromatic hydrocarbons [emissions to air, high. pop.]: 1.1e-8 kg; lognormal SD95 3.7
  extrapolation
- Manganese [emissions to air, high. pop.]: 1.71e-7 kg; lognormal SD95 3.7
  extrapolation

## Sampling procedure
literature

## Sources
- Bauer C., 2007, 2007 - Wood energy - Bauer, Sachbilanzen von Energiesystemen. Final report No. 6 ecoinvent data v2.0, 6, Swiss Centre for LCI, PSI, Duebendorf and Villigen, CH
Bauer, C. (2007) Holzenergie. Sachbilanzen von Energiesystemen. Final report No. 6 ecoinvent data v2.0. Editors: Dones R.. Volume: 6. Swiss Centre for LCI, PSI. Dübendorf and Villigen, CH.
Type: Measurement on site
Source: CD-ROM
First author: Bauer, C.
Year: 2007
Name of editors: Dones R.
Title of anthology: Sachbilanzen von Energiesystemen. Final report No. 6 ecoinvent data v2.0
Place of publication: Dübendorf and Villigen, CH
Publisher: Swiss Centre for LCI, PSI
Volume No: 6

## Validation
Proof reading validation: passed; Other validation: none;
