# Hydrogen, gaseous, 700 bar, from electrolysis, from label-certified electricity, at fuelling station

Dataset: EcoSpold 1, unit process
Functional unit: 1 kg
Category: fuels / hydrogen\Transformation
Geography: CH
Time period: 2020-01 to 2020-12
Generated by: Romain Sacchi
accessRestrictedTo: 0
copyright: False

## General comment
Hydrogen compressed from 25 bar to 700 bar. Electricity for compression: 3.2 kWh/kg H2 @ 700 bar, according to U.S. Department of Energy 2009 (https://www.hydrogen.energy.gov/pdfs/9013_energy_requirements_for_hydrogen_gas_compression.pdf). Includes 250 km of high-pressure truck transport to fuelling station. Includes 2% loss from the H2 plant to the vehicle tank. Original source: Antonini et al. 2020, Hydrogen production from natural gas and biomethane with carbon capture and storage ï¿½ A techno-environmental analysis, doi: 10.1039/D0SE00222D.

## Time period
Base technology year of 2020

## Reference product
- Hydrogen, gaseous, 700 bar, from electrolysis, from label-certified electricity, at fuelling station [CH]: 1 kg

## Inputs from technosphere
- Hydrogen refuelling station [GLO]: 1.15e-7 p; lognormal SD95 1.12945
  Uncertainty from pedigree matrix: (3, 3, 2, 2, 1, 3)
- Hydrogen, gaseous, 25 bar, from electrolysis, from label-certified electricity [CH]: 1.02 kg; lognormal SD95 1.12945
  Uncertainty from pedigree matrix: (3, 3, 2, 2, 1, 3)
- Transport, freight, lorry, 7.5t-16t gross weight, fleet average [RER]: 0.25 tkm; lognormal SD95 1.12945
  Uncertainty from pedigree matrix: (3, 3, 2, 2, 1, 3)
- Electricity, low voltage, certified electricity, at grid [CH]: 3.2 kWh; lognormal SD95 1.12945
  Uncertainty from pedigree matrix: (3, 3, 2, 2, 1, 3)

## Sources
- Sacchi R., Bauer C., 2023, 2023 - LCI on-road vehicles - Sacchi, PSI, Villigen, CH
doi: 10.5281/ZENODO.5156043
