# Silencer, steel, DN 315, 50 mm, at plant

Dataset: EcoSpold 1, unit process
Functional unit: 1 p
Category: construction / ventilation\components
Geography: CH
Time period: 2003-01 to 2003-12
Generated by: Alex Primas
accessRestrictedTo: 0
copyright: true

## General comment
Production of a typical component used for a ventilation system in a multi family house. The house considered in the investigation includes 6 flats with 130 m2 floor area each and a ventilation rate of 120 m3/h.;

## Technology
Silencer made of galvanised steel with 50 mm glass wool for acoustic insulation. Weight of element 20 kg

## Time period
Materials investigated in 2003

## Reference product
- Silencer, steel, DN 315, 50 mm, at plant [CH]: 1 p
  SWITZERLAND

## Inputs from technosphere
- Ventilation components factory [RER]: 8e-8 p; lognormal SD95 3.18
  (4,5,1,1,3,5); Calculated with data of a similar company
- Steel, electric, un- and low-alloyed, at plant [RER]: 6.92 kg; lognormal SD95 1.24
  (2,4,1,1,1,5); Questionnaire
- Natural gas, burned in industrial furnace 1MWth [CH]: 42 MJ; lognormal SD95 1.38
  (4,5,1,2,1,5); Data estimated from related companies
- Sheet rolling, steel [RER]: 18.7 kg; lognormal SD95 1.26
  (3,4,1,1,1,5); Questionnaire, estimations
- Light fuel oil, burned in industrial furnace 1MW, non-modulating [RER]: 42 MJ; lognormal SD95 1.38
  (4,5,1,2,1,5); Data estimated from related companies
- Glass wool mat, at plant [CH]: 3.3 kg; lognormal SD95 1.24
  (2,4,1,1,1,5); Questionnaire
- Steel, converter, unalloyed, at plant [RER]: 11.8 kg; lognormal SD95 1.24
  (2,4,1,1,1,5); Questionnaire
- Disposal, inert waste, 5% water, to construction waste landfill [CH]: 0.3 kg; lognormal SD95 1.32
  (4,4,1,1,1,5); Estimations on precentage material disposed
- Transport, freight, lorry, 16t-32t gross weight, fleet average [CH]: 1.1 tkm; lognormal SD95 2.09
  (4,5,nA,nA,nA,nA); Standard distance of ecoinvent used
- Zinc coating, coils [RER]: 1.46 m2; lognormal SD95 1.26
  (3,4,1,1,1,5); Questionnaire, estimations
- Transport, freight, rail [RER]: 11.9 tkm; lognormal SD95 2.09
  (4,5,nA,nA,nA,nA); Standard distance of ecoinvent used
- Welding, arc, steel [RER]: 2 m; lognormal SD95 1.33
  (2,4,1,1,3,5); Questionnaire, approximation for technology
- Electricity, medium voltage, at grid [CH]: 4.68 kWh; lognormal SD95 1.69
  (3,5,5,1,3,5); Data estimated from related processes

## Emissions to nature
- Heat, waste [emissions to air, high. pop.]: 16.8 MJ; lognormal SD95 1.69
  (3,5,5,1,3,5); Calculated from electricity use

## Sampling procedure
Sampling procedure: Questionnaire and technical information of producer. Data of one common product used.

## Sources
- Haessig W., Primas A., 2007, 2007 - LCI comfort ventilation in dwellings - Haessig, Final report ecoinvent Data v2.0, 25, Swiss Centre for LCI, B+H, Duebendorf and Zuerich, CH
Hässig, W., Primas, A. (2007) Ökologische Aspekte der Komfortlüftungen im Wohnbereich. Final report ecoinvent Data v2.0. Volume: 25. Swiss Centre for LCI, B+H. Dübendorf and Zürich, CH.
Type: Measurement on site
Source: CD-ROM
First author: Hässig, W.
Other authors: Primas, A.
Year: 2007
Title of anthology: Final report ecoinvent Data v2.0
Place of publication: Dübendorf and Zürich, CH
Publisher: Swiss Centre for LCI, B+H
Volume No: 25

## Validation
Proof reading validation: passed; Other validation: none;
