# xx Glass cullets, funnel glass, for CRT glass production, at plant

Dataset: EcoSpold 1, unit process
Functional unit: 1 kg
Category: waste treatment, obsolete / electronic wastes, obsolete\others, obsolete
Geography: GLO
Time period: 2004-01 to 2004-12
Generated by: Roland Hischier
accessRestrictedTo: 0
copyright: true

## General comment
The multioutput-process "treatment CRT glass" delivers the co-products "disposal, treatment of CRT glass”, "glass cullets, panel glass, for CRT glass production, at plant", "glass cullets, funnel glass, for CRT glass production, at plant" and "glass cullets, mixed glass, for CRT glass production, at plant". The allocation is done 100% to the disposal process.;

## Included processes
This dataset represents the treatment of CRT tubes. It includes infrastructure, energy consumption, water consumption and an estimation of the efforts for transportation. The process has no emissions to air / water.

## Geography
Data from a Swiss CRT glass treatment company - used as global average data.

## Technology
Modern, up-to-date CRT treatment plant – with crushing, washing and sorting steps.

## Reference product
- xx Glass cullets, funnel glass, for CRT glass production, at plant [GLO]: 1 kg
  Global

## Sampling procedure
Company information & own estimation

## Extrapolations
see Geography & Technology

## Sources
- Hischier R., Classen M., Lehmann M., Scharnhorst W., 2007, 2007 - LCI electric and electronic equipment - Hischier, Final report ecoinvent Data v2.0, 18, Swiss Centre for LCI, Empa - TSL, Duebendorf and St. Gallen, CH
Hischier R., Classen M., Lehmann M., Scharnhorst W. (2007) Life Cycle Inventories of Electric and Electronic Equipment - Production, Use & Disposal. Final report ecoinvent Data v2.0. Volume: 18. Swiss Centre for LCI, Empa - TSL. Duebendorf and St. Gallen, CH.
Type: Measurement on site
Source: CD-ROM
First author: Hischier R.
Other authors: Classen M., Lehmann M., Scharnhorst W.
Year: 2007
Title of anthology: Final report ecoinvent Data v2.0
Place of publication: Duebendorf and St. Gallen, CH
Publisher: Swiss Centre for LCI, Empa - TSL
Volume No: 18
Original title: Life Cycle Inventories of Electric and Electronic Equipment - Production, Use & Disposal

## Validation
Proof reading validation: passed.; Other validation: none;
