# Disposal, ventilation system, centralized, average for 2 m3(hm2)

Dataset: EcoSpold 1, unit process
Functional unit: 1 m2
Category: waste management / building demolition
Geography: CH
Time period: 2014-01 to 2014-12
Generated by: Alex Primas
accessRestrictedTo: 0
copyright: true

## General comment
Disposal of a ventilation system for a building with a specific air flow rate of 2 m3/h per m2 heated gross floor area. The reference value of the inventory is 1 m2 heated gross floor area. The inventory is based on average data of 4 office buildings, 3 schools and 3 residential care homes with a total heated gross floor area of 61719 m2 and a total nominal air flow of 302190 m3/h, specific weight of the components: 5.61 kg/m2, including average components for air handling units, ducts including insulation, air valves, roof-hoods, dampers, fire dampers, silencers. The data represent a ductwork mainly made of galvanized steel and includes air handling units mainly with heat recovery and a nominal air flow rate of 5'000-20'000 m3/h per unit. No ground heat exchanger is included.;

## Included processes
Transport to dismantling facilities, machines for handling in sorting plant, electricity demand for sorting plant, final disposal of waste material. Cut-off to recycling for metals.

## Geography
Specific to the technology mix encountered in sorting plants in Switzerland.

## Technology
Disposal to a sorting plant assumed. Metal pieces, copper in cables and electronic devices are recycled, plastic parts are incinerated, inert wastes (e.g. rock wool) are landfilled.

## Time period
Amount of material investigated in 2013. Disposal technology mix as used in late 1990ies

## Reference product
- Disposal, ventilation system, centralized, average for 2 m3(hm2) [CH]: 1 m2
  SWITZERLAND

## Inputs from technosphere
- Disposal, spiral-seam duct, steel, zinc coated, s= 1.0mm [CH]: 2.1812e-5 m2; lognormal SD95 1.24
  (2,4,1,1,1,5); Data related to production process
- Disposal, ventilation duct, steel, zinc coated, s= 0.75mm [CH]: 0.099793 m2; lognormal SD95 1.24
  (2,4,1,1,1,5); Data related to production process
- Disposal, ventilation unit 13000 m3/h, w. rotary heat exchanger [CH]: 4.5954e-5 p; lognormal SD95 1.26
  (3,4,1,1,1,5); Data related to production process
- Disposal, ventilation duct, stainless steel, s= 0.62mm [CH]: 0.00046666 m2; lognormal SD95 1.24
  (2,4,1,1,1,5); Data related to production process
- Disposal, ventilation duct, steel, zinc coated, s= 1.25mm [CH]: 0.014226 m2; lognormal SD95 1.24
  (2,4,1,1,1,5); Data related to production process
- Disposal, ventilation duct, stainless steel, s= 1.5mm [CH]: 0.00098826 m2; lognormal SD95 1.24
  (2,4,1,1,1,5); Data related to production process
- Disposal, thermal insulation, 60mm, 40kg/m3, reinforced alumium foil [CH]: 0.0072389 m2; lognormal SD95 1.24
  (2,4,1,1,1,5); Data related to production process
- Disposal, silencer for ventilator unit 3500 m3/h, modular [CH]: 0.00014722 p; lognormal SD95 1.26
  (3,4,1,1,1,5); Data related to production process
- Disposal, silencer for ventilator unit 1800 m3/h, modular, Device [CH]: 6.445e-5 p; lognormal SD95 1.26
  (3,4,1,1,1,5); Data related to production process
- Disposal, thermal insulation, 30mm, 40kg/m3, reinforced alumium foil [CH]: 0.1157 m2; lognormal SD95 1.24
  (2,4,1,1,1,5); Data related to production process
- Disposal, ventilation duct, steel, zinc coated, s= 1.5mm [CH]: 0.0052899 m2; lognormal SD95 1.24
  (2,4,1,1,1,5); Data related to production process
- Disposal, ventilation duct, steel, zinc coated, s= 1.0mm [CH]: 0.035074 m2; lognormal SD95 1.24
  (2,4,1,1,1,5); Data related to production process
- Disposal, ventilation unit 6700 m3/h, w. circuit connected heat exchanger [CH]: 3.6276e-5 p; lognormal SD95 1.26
  (3,4,1,1,1,5); Data related to production process
- Disposal, ventilation unit 6700 m3/h, w. rotary heat exchanger [CH]: 2.1883e-5 p; lognormal SD95 1.26
  (3,4,1,1,1,5); Data related to production process
- Disposal, thermal insulation, 100mm, 40kg/m3, alumium cladding [CH]: 0.0070241 m2; lognormal SD95 1.24
  (2,4,1,1,1,5); Data related to production process
- Disposal, ventilation duct, stainless steel, s= 0.87mm [CH]: 0.0006829 m2; lognormal SD95 1.24
  (2,4,1,1,1,5); Data related to production process
- Disposal, ventilation unit 3500 m3/h, w. cross plate heat excanger [CH]: 6.7156e-5 p; lognormal SD95 1.26
  (3,4,1,1,1,5); Data related to production process
- Disposal, ventilation duct, steel, zinc coated, s= 0.87mm [CH]: 0.048431 m2; lognormal SD95 1.24
  (2,4,1,1,1,5); Data related to production process
- Disposal, ventilation unit 3500 m3/h, w. circuit connected heat exchanger [CH]: 6.1795e-6 p; lognormal SD95 1.26
  (3,4,1,1,1,5); Data related to production process
- Disposal, spiral-seam duct, stainless steel, s= 0.5mm [CH]: 0.00011047 m2; lognormal SD95 1.24
  (2,4,1,1,1,5); Data related to production process
- Disposal, thermal insulation, 30mm, 40kg/m3, stainless steel cladding [CH]: 0.0018184 m2; lognormal SD95 1.24
  (2,4,1,1,1,5); Data related to production process
- Disposal, spiral-seam duct, steel, zinc coated, s= 0.5mm [CH]: 0.049692 m2; lognormal SD95 1.24
  (2,4,1,1,1,5); Data related to production process
- Disposal, ventilation unit 1800 m3/h, w. cross plate heat excanger [CH]: 2.0348e-5 p; lognormal SD95 1.26
  (3,4,1,1,1,5); Data related to production process
- Disposal, spiral-seam duct, steel, zinc coated, s= 0.6mm [CH]: 0.029293 m2; lognormal SD95 1.24
  (2,4,1,1,1,5); Data related to production process
- Disposal, ventilation duct, stainless steel, s= 1.25mm [CH]: 0.0013371 m2; lognormal SD95 1.24
  (2,4,1,1,1,5); Data related to production process
- Disposal, thermal insulation, 60mm, 40kg/m3, stainless steel cladding [CH]: 0.00082644 m2; lognormal SD95 1.24
  (2,4,1,1,1,5); Data related to production process
- Disposal, ventilator unit 3500 m3/h, modular, w. filter, without silencer [CH]: 2.2994e-5 p; lognormal SD95 1.26
  (3,4,1,1,1,5); Data related to production process
- Disposal, ventilation system, various components, m2 [CH]: 1 m2; lognormal SD95 1.24
  (2,4,1,1,1,5); Data related to production process
- Disposal, EI 30 fire insulation, 50mm, 120kg/m3, reinforced alumium foil [CH]: 0.083546 m2; lognormal SD95 1.24
  (2,4,1,1,1,5); Data related to production process
- Disposal, silencer for ventilator unit 13000 m3/h, modular [CH]: 0.00039266 p; lognormal SD95 1.26
  (3,4,1,1,1,5); Data related to production process
- Disposal, thermal insulation, 100mm, 40kg/m3, reinforced alumium foil [CH]: 0.0022137 m2; lognormal SD95 1.24
  (2,4,1,1,1,5); Data related to production process
- Disposal, ventilation unit 6700 m3/h, w. cross plate heat excanger [CH]: 3.6931e-5 p; lognormal SD95 1.26
  (3,4,1,1,1,5); Data related to production process
- Disposal, ventilation equipment, central, 600-1200 m3/h [CH]: 2.5856e-5 p; lognormal SD95 1.26
  (3,4,1,1,1,5); Data related to production process
- Disposal, silencer for ventilator unit 6700 m3/h, modular, Device [CH]: 0.00025694 p; lognormal SD95 1.26
  (3,4,1,1,1,5); Data related to production process
- Disposal, EI 60 fire insulation, 70mm, 120kg/m3, reinforced alumium foil [CH]: 0.017045 m2; lognormal SD95 1.24
  (2,4,1,1,1,5); Data related to production process
- Disposal, ventilation duct, stainless steel, s= 0.75mm [CH]: 9.1357e-5 m2; lognormal SD95 1.24
  (2,4,1,1,1,5); Data related to production process
- Disposal, ventilation unit 13000 m3/h, w. cross plate heat excanger [CH]: 1.3324e-5 p; lognormal SD95 1.26
  (3,4,1,1,1,5); Data related to production process
- Disposal, spiral-seam duct, stainless steel, s= 0.8mm [CH]: 0.00029242 m2; lognormal SD95 1.24
  (2,4,1,1,1,5); Data related to production process
- Disposal, ventilation duct, steel, zinc coated, s= 0.62mm [CH]: 0.077357 m2; lognormal SD95 1.24
  (2,4,1,1,1,5); Data related to production process
- Disposal, building, polyethylene/polypropylene products, to final disposal [CH]: 0.038133 kg; lognormal SD95 1.24
  (2,4,1,1,1,5); Data related to production process
- Disposal, ventilator unit 13000 m3/h, modular, w. filter, without silencer [CH]: 1.5246e-5 p; lognormal SD95 1.26
  (3,4,1,1,1,5); Data related to production process
- Disposal, ventilation duct, stainless steel, s= 1.0mm [CH]: 0.001794 m2; lognormal SD95 1.24
  (2,4,1,1,1,5); Data related to production process
- Disposal, flexible duct, aluminum/PET, DN of 125 [CH]: 0.019767 m; lognormal SD95 1.24
  (2,4,1,1,1,5); Data related to production process
- Disposal, ventilation unit 13000 m3/h, w. circuit connected heat exchanger [CH]: 6.1511e-5 p; lognormal SD95 1.26
  (3,4,1,1,1,5); Data related to production process
- Disposal, spiral-seam duct, steel, zinc coated, s= 0.8mm [CH]: 0.0012418 m2; lognormal SD95 1.24
  (2,4,1,1,1,5); Data related to production process

## Sampling procedure
Waste-specific calculation based on production input data

## Sources
- Klingler M., Kasser U., Savi D., Primas A., Stettler Y., Gujer P., 2014, 2014 - LCA ventilation and heating systems - Klingler, Schlussbericht, BFE, Buero fuer Umweltchemie, B&H AG, Zuerich, CH
Klingler M., Kasser U., Savi D., Primas A., Stettler Y., Gujer P. (2014) Ökobilanzdaten für Lüftungs- und Wärmeanlagen. Schlussbericht, BFE. Bundesamt für Energie (BFE). Bern.
Type: Separate publication
Source: Report
First author: Klingler M.
Other authors: Kasser U., Savi D., Primas A., Stettler Y., Gujer P.
Year: 2014
Title of anthology: Schlussbericht, BFE
Place of publication: Bern
Publisher: Bundesamt für Energie (BFE)
