# Crude oil, production RME, at long distance transport

Dataset: EcoSpold 1, unit process
Functional unit: 1 kg
Category: fuels / oil\transport
Geography: CH
Time period: 1992-01 to 1994-12
Generated by: Niels Jungbluth
accessRestrictedTo: 0
copyright: true

## General comment
Calculation for transport distances to different import sites and modes of transportation based on the supply situation in 1994. It is assumed that this has not changed much in the meantime.;

## Included processes
Transportation of crude oil from exploration site to refinery in Switzerland. Includes transport service requirements and emissions from oil handling and evaporation.

## Geography
Calculations based on assumptions for supply to Swiss refineries.

## Technology
Use of different generic transport devices (pipelines and tanker).

## Time period
Emissions published in 1992. Transport modes investigated for 1994.

## Reference product
- Crude oil, production RME, at long distance transport [CH]: 1 kg
  SWITZERLAND

## Inputs from technosphere
- Crude oil, at production onshore [IQ]: 1.0018 kg; lognormal SD95 1.05
  (1,1,1,1,1,na); Transported good
- Transport, crude oil pipeline, onshore [RER]: 2.04 tkm; lognormal SD95 1.209
  (4,1,1,3,1,na); Calculation for 1994
- Transport, transoceanic tanker [OCE]: 7.8 tkm; lognormal SD95 2.0483
  (4,1,1,3,1,na); Calculation for 1994

## Emissions to nature
- Benzene [emissions to air, unspecified]: 4.5e-7 kg; lognormal SD95 3.1033
  (3,5,4,1,1,na); Literature
- Hexane [emissions to air, high. pop.]: 5.3876e-5 kg; lognormal SD95 1.6321
  (3,5,4,1,1,na); Literature
- Pentane [emissions to air, unspecified]: 9.558e-5 kg; lognormal SD95 1.6321
  (3,5,4,1,1,na); Literature
- Methane, fossil [emissions to air, unspecified]: 1.498e-6 kg; lognormal SD95 1.6321
  (3,5,4,1,1,na); Literature
- Toluene [emissions to air, unspecified]: 2.7e-7 kg; lognormal SD95 1.6321
  (3,5,4,1,1,na); Literature
- Propane [emissions to air, unspecified]: 6.1296e-5 kg; lognormal SD95 1.6321
  (3,5,4,1,1,na); Literature
- Hydrocarbons, aliphatic, alkanes, unspecified [emissions to air, unspecified]: 1.35e-6 kg; lognormal SD95 1.6321
  (3,5,4,1,1,na); Literature
- Butane [emissions to air, unspecified]: 0.00012642 kg; lognormal SD95 1.6321
  (3,5,4,1,1,na); Literature
- Ethane [emissions to air, unspecified]: 1.601e-6 kg; lognormal SD95 1.6321
  (3,5,4,1,1,na); Literature

## Sampling procedure
Literature, statistics and own calculations.

## Sources
- Meili C., Jungbluth N., Bussa M., 2021, 2021 - LCI long-dist. transp. crude oil - Meili, Project report, 565, ESU-services Ltd., Schaffhausen, CH
Meili C., Jungbluth N., Wenzel P. (2018) Life cycle inventory for long distance transport of crude oil. Project report. Volume: 565. ESU-services Ltd.. Schaffhausen, CH.
Type: Separate publication
Source: Report
First author: Meili C.
Other authors: Jungbluth N., Wenzel P.
Year: 2018
Title of anthology: Project report
Place of publication: Schaffhausen, CH
Publisher: ESU-services Ltd.
Volume No: 565

## Validation
Proof reading validation: Passed.; Other validation: none;
