# U enriched 3.8%, in fuel element for LWR, at nuclear fuel fabrication plant

Dataset: EcoSpold 1, unit process
Functional unit: 1 kg
Category: fuels / uranium\enriched
Geography: CN
Time period: 1999-01 to 2002-12
Generated by: Roberto Dones
accessRestrictedTo: 0
copyright: true

## General comment
Data for the operation of European nuclear fuel fabrication plants used herewith for China with following differences: Chinese electricity mix;

## Included processes
The module includes: input of enriched uranium given in terms of separative work units per kg enriched uranium; electricity and light fuel oil used for operation; zirconium requirements for the cladding; water use and wastewater treatment; cement assumed to be used for conditioning of contaminated scrap from decommissioning; transport requirements of operation materials, industrial wastes, and contaminated waste from decommissioning. Radioactive and non-radioactive emissions to air and to water from the operation are also included. The infrastructure requirements are accounted for, though construction and operation data partially refer to different plants rather than to one single unit.

## Technology
Information regards facilities operating in the 1980s, with few more recent data.

## Reference product
- U enriched 3.8%, in fuel element for LWR, at nuclear fuel fabrication plant [CN]: 1 kg
  CHINA

## Inputs from technosphere
- Water, decarbonised, at plant [RER]: 300 kg; lognormal SD95 2
  old reference
- Chromium, at regional storage [RER]: 0.6 kg; lognormal SD95 1.1
  estimation on number, not on module substituting Zr
- Light fuel oil, burned in industrial furnace 1MW, non-modulating [CH]: 32 MJ; lognormal SD95 2
  old reference & own assumption
- Nuclear fuel fabrication plant [CN]: 3.7e-8 p; lognormal SD95 1.5
  own estimation
- Cement, unspecified, at plant [CH]: 0.0065 kg; lognormal SD95 2
  own assumption
- Transport, coal freight, rail [CN]: 1.15 tkm; lognormal SD95 3
  own estimation (2.1 standard in similar datasets)
- Treatment, sewage, unpolluted, to wastewater treatment, class 3 [CH]: 0.135 m3; lognormal SD95 2
  old reference
- Uranium, enriched 3.8%, at CNNC centrifuge enrichment plant [CN]: 5.31 kg; lognormal SD95 1.1
  calculated
- Transport, freight, lorry, fleet average [RER]: 2.62 tkm; lognormal SD95 3
  own estimation (2.1 standard in similar datasets)
- Disposal, inert waste, 5% water, to construction waste landfill [CH]: 0.8 kg; lognormal SD95 1.1
  own assumption
- Electricity, medium voltage, at grid [CN]: 36 kWh; lognormal SD95 2
  old reference & own assumption
- Low active radioactive waste [CH]: 0.000333 m3; lognormal SD95 3
  own assumption

## Emissions to nature
- Calcium [emissions to water, river]: 0.083 kg; lognormal SD95 2
  old reference
- Molybdenum [emissions to water, river]: 2.75e-5 kg; lognormal SD95 2
  old reference
- BOD5, Biological Oxygen Demand [emissions to water, river]: 0.00313 kg; lognormal SD95 2
  old reference
- Magnesium [emissions to water, river]: 0.000402 kg; lognormal SD95 2
  old reference
- Oils, unspecified [emissions to water, river]: 0.00128 kg; lognormal SD95 2
  old reference
- Uranium alpha [emissions to air, low. pop.]: 0.0001 kBq; lognormal SD95 3
  few recent data, or too old data
- Manganese [emissions to water, river]: 1.02e-5 kg; lognormal SD95 2
  old reference
- Nitrogen oxides [emissions to air, low. pop.]: 0.03 kg; lognormal SD95 2
  old reference
- Nitrogen [emissions to water, river]: 0.0703 kg; lognormal SD95 2
  old reference
- Sulfate [emissions to water, river]: 0.0121 kg; lognormal SD95 2
  old reference
- Iron [emissions to water, river]: 0.000153 kg; lognormal SD95 2
  old reference
- Phosphorus [emissions to water, river]: 0.000217 kg; lognormal SD95 2
  old reference
- VOC, volatile organic compounds, unspecified origin [emissions to water, river]: 0.0894 kg; lognormal SD95 2
  old reference
- Heat, waste [emissions to air, low. pop.]: 130 MJ; lognormal SD95 3
  same as electricity
- Ammonium, ion [emissions to water, river]: 0.0581 kg; lognormal SD95 2
  old reference
- Nickel [emissions to water, river]: 0.000147 kg; lognormal SD95 2
  old reference
- Suspended solids, unspecified [emissions to water, river]: 0.0023 kg; lognormal SD95 2
  old reference
- Uranium alpha [emissions to water, river]: 0.8 kBq; lognormal SD95 3
  few recent data, or too old data
- Sodium [emissions to water, river]: 0.00894 kg; lognormal SD95 2
  old reference
- COD, Chemical Oxygen Demand [emissions to water, river]: 0.0166 kg; lognormal SD95 2
  old reference
- Fluoride [emissions to water, river]: 0.0358 kg; lognormal SD95 2
  old reference
- NMVOC, non-methane volatile organic compounds, unspecified origin [emissions to air, low. pop.]: 0.0033 kg; lognormal SD95 2
  old reference
- Silver [emissions to water, river]: 2.17e-5 kg; lognormal SD95 2
  old reference
- Boron [emissions to water, river]: 6.39e-5 kg; lognormal SD95 2
  old reference
- Chloride [emissions to water, river]: 0.00703 kg; lognormal SD95 2
  old reference
- Sulfite [emissions to water, river]: 0.000185 kg; lognormal SD95 2
  old reference

## Sampling procedure
Literature

## Sources
- Dones R., Bauer C., Doka G., 2009, 2009 - Nuclear energy - Dones, Sachbilanzen von Energiesystemen. Final report No. 6 ecoinvent v2.1, 6, Swiss Centre for LCI, PSI, Doka LCA, Duebendorf and Villigen, CH
Dones, R., Doka G. (2009) Kernenergie. Sachbilanzen von Energiesystemen. Final report No. 6 ecoinvent v2.1. Editors: Bauer C.. Volume: 6. Swiss Centre for LCI, PSI. Dübendorf and Villigen, CH.
Type: Measurement on site
Source: CD-ROM
First author: Dones, R.
Other authors: Doka G.
Year: 2009
Name of editors: Bauer C.
Title of anthology: Sachbilanzen von Energiesystemen. Final report No. 6 ecoinvent v2.1
Place of publication: Dübendorf and Villigen, CH
Publisher: Swiss Centre for LCI, PSI
Volume No: 6

## Validation
Proof reading validation: passed; Other validation: none;
