# Magnesium, at plant

Dataset: EcoSpold 1, unit process
Functional unit: 1 kg
Category: metals / non ferro
Geography: RER
Time period: 1998-01 to 1998-12
Production volume: 372000 tonnes in 1998
Share of production covered: 30 %
Generated by: Niels Jungbluth
accessRestrictedTo: 0
copyright: true

## General comment
Large uncertainties exist for data on energy use and SF6 emissions during magnesium production. This inventory describes an assumption for the average production.;
CAS number: 007439-95-4;
Formula: Mg;

## Included processes
Resource extraction until gate of the factory including infrastructure.

## Geography
Data from literature and for 1 producer

## Technology
Production of magnesium from seawater and dolomite in a modern production plant based on data from a Norwegian producer.

## Time period
Environmental report

## Reference product
- Magnesium, at plant [RER]: 1 kg
  Europe

## Inputs from technosphere
- Disposal, separator sludge, 90% water, to hazardous waste incineration [CH]: 0.0574 kg; lognormal SD95 1.57
  (1,3,1,3,4,5); Data from environmental report, type of sludges not clear
- Transport, freight, lorry, fleet average [RER]: 0.143 tkm; lognormal SD95 2.1
  (4,5,na,na,na,na); Standard distance 50km/100km
- Tap water, at user [RER]: 248 kg; lognormal SD95 1.22
  (1,3,1,3,1,5); Data from env. report
- Transport, freight, rail [RER]: 0.272 tkm; lognormal SD95 2.1
  (4,5,na,na,na,na); Standard distance 600km
- Limestone, milled, packed, at plant [CH]: 1.95 kg; lognormal SD95 1.31
  (1,3,1,3,3,5); Estimation for dolomite use
- Electricity, medium voltage, production NORDEL, at grid [NORDEL]: 21.5 kWh; lognormal SD95 1.25
  desaggregated from cumulative energy demand with 82% conversion efficiency, high variation of literature data, type of electricity mix varies for different producers
- Sulphur hexafluoride, liquid, at plant [RER]: 0.0029 kg; lognormal SD95 1.22
  (1,3,1,3,1,5); Estimation based on literature data
- Magnesium plant [RER]: 2e-10 p; lognormal SD95 3.1
  (4,4,1,3,1,5); 50a of uses with a production of 100000t/a
- Disposal, decarbonising waste, 30% water, to residual material landfill [CH]: 0.186 kg; lognormal SD95 1.57
  (1,3,1,3,4,5); Environmental report, type of waste not clear
- Natural gas, burned in industrial furnace 1MWth [CH]: 38.7 MJ; lognormal SD95 2
  desaggregated from cumulative energy demand with assumption of 67% conversion efficiency, variation of literature data
- Transport, transoceanic freight ship [OCE]: 6.2 tkm; lognormal SD95 2.05
  (4,na,na,1,na,na); Imports of Mg from China, imports of charcoal from overseas 10000km
- Treatment, sewage, from residence, to wastewater treatment, class 2 [CH]: 0.248 m3; lognormal SD95 1.31
  (1,3,1,3,3,5); Data from env. report
- Charcoal, at plant [GLO]: 0.45 kg; lognormal SD95 1.26
  (3,4,1,3,1,5); Literature

## Inputs from nature
- Magnesium [resources, in water]: 0.752 kg; lognormal SD95 1.22
  (1,3,1,3,3,3); Data from env. report

## Emissions to nature
- Carbon dioxide, biogenic [emissions to air, low. pop.]: 1.32 kg; lognormal SD95 1.24
  (4,1,3,1,1,3); Calculation from charcoal use, 2.93kg/kg
- Sulfur hexafluoride [emissions to air, low. pop.]: 0.0029 kg; lognormal SD95 4.1
  Estimation, large variations for different producers
- Chlorinated solvents, unspecified [emissions to water, ocean]: 2.48e-8 kg; lognormal SD95 2.01
  (1,3,1,3,1,3); Data from env. report
- Hydrogen chloride [emissions to air, low. pop.]: 0.002 kg; lognormal SD95 2.01
  (1,3,1,3,1,3); Data from env. report
- Dioxin, 2,3,7,8 Tetrachlorodibenzo-p- [emissions to air, low. pop.]: 2.33e-11 kg; lognormal SD95 3.01
  (1,3,1,3,1,3); Data from env. report
- Sulfur dioxide [emissions to air, low. pop.]: 0.00242 kg; lognormal SD95 2.01
  (1,3,1,3,1,3); Data from env. report
- Heat, waste [emissions to air, low. pop.]: 49.7 MJ; lognormal SD95 1.22
  (4,1,1,1,1,3); Calculated from electricity

## Sampling procedure
Environmental data for an important producer

## Extrapolations
From 1 producer to average Europe, energy uses disaggregated from cumulated figures. Type of electricity mix not known.

## Sources
- Classen M., Althaus H.-J., Blaser S., Scharnhorst W., Tuchschmid M., Jungbluth N., Faist Emmenegger M., 2009, 2009 - LCI metals - Classen, Final report ecoinvent data v2.1, 10, Swiss Centre for LCI, Empa, ESU-services Ltd., Duebendorf, CH
Classen M., Althaus H.-J., Blaser S., Doka G., Jungbluth N., Tuchschmid M. (2008) Life Cycle Inventories of Metals. Final report ecoinvent data v2.1. Volume: 10. Issue: 0. Swiss Centre for LCI, Empa - TSL. Dübendorf, CH.
Type: Measurement on site
Source: CD-ROM
First author: Classen M.
Other authors: Althaus H.-J., Blaser S., Doka G., Jungbluth N., Tuchschmid M.
Year: 2008
Title of anthology: Final report ecoinvent data v2.1
Place of publication: Dübendorf, CH
Publisher: Swiss Centre for LCI, Empa - TSL
Volume No: 10
Issue No: 0

## Validation
Proof reading validation: Passed.; Other validation: none;
