# xxx Petrol, unleaded, at refinery

Dataset: EcoSpold 1, unit process
Functional unit: 1 kg
Category: material, obsolete / oil, obsolete\fuels, obsolete
Geography: CH
Time period: 2000-01 to 2000-12
Production volume: 5.0 mio. tonnes crude oil throughput in 2014.
Share of production covered: 100 %
Generated by: Philippe Stolz
accessRestrictedTo: 0
copyright: true

## General comment
Description of all flows of materials and energy due to the throughput of 1kg crude oil in the refinery. The multioutput-process 'crude oil, in refinery' delivers the co-products petrol, unleaded, bitumen, diesel, light fuel oil, heavy fuel oil, kerosene, naphtha, propane/ butane, refinery gas, secondary sulphur and electricity. The impacts of processing are allocated to the different products. Crude oil mix from different regions updated to the year 2016 based on data reported by the Swiss Petroleum Association (Erdölvereinigung).;

## Included processes
All processes on the refinery site excluding the emissions from combustion facilities, including waste water treatment, process emissions and direct discharges to rivers.

## Technology
Average data for the used technology.

## Time period
The most important data (e.g. production, throughput, energy use, regulated emissions) have been investigated for the 2 Swiss refineries for the year 2000. Other data and indicators have been assessed based on older literature data.

## Reference product
- xxx Petrol, unleaded, at refinery [CH]: 1 kg
  SWITZERLAND

## Inputs from technosphere
- Rhodium, at regional storage [RER]: 3.0787e-9 kg; lognormal SD95 1.12
  Range for RER refineries, Reformer Catalyst
- Electricity, medium voltage, at grid [CH]: 0.02851 kWh; lognormal SD95 1.1
  (2,3,1,3,1,3); Average of plant data
- Hydrochloric acid, 30% in H2O, at plant [RER]: 8.7935e-5 kg; lognormal SD95 1.14
  (2,4,1,3,1,3); Env. reports DE
- Tap water, at user [CH]: 0.015018 kg; lognormal SD95 1.1
  (2,3,1,3,1,3); Average of plant data
- Methyl tert-butyl ether, at plant [RER]: 0.05 kg; lognormal SD95 1.1
  (2,3,1,3,1,3); Estimation 5% for gasoline
- Nitrogen, liquid, at plant [RER]: 0.00081414 kg; lognormal SD95 1.14
  (2,4,1,3,1,3); Env. reports DE
- Lime, hydrated, packed, at plant [CH]: 3.4581e-5 kg; lognormal SD95 1.26
  (3,4,1,3,3,na); Estimation based on literature
- Crude oil, production MX, at long distance transport [CH]: 0.15929 kg; lognormal SD95 1.07
  (1,1,1,1,1,3); Swiss Petroleum Association (Erdölvereinigung): Annual Report 2016
- Refinery gas, burned in furnace [CH]: 2.3157 MJ; lognormal SD95 1.09
  (2,1,1,1,1,3); Swiss statistic
- Soap, at plant [RER]: 2.6479e-6 kg; lognormal SD95 1.1
  (2,3,1,3,1,3); Average of plant data
- Calcium chloride, CaCl2, at plant [RER]: 1.6006e-5 kg; lognormal SD95 1.1
  (2,3,1,3,1,3); Average of plant data
- Zeolite, powder, at plant [RER]: 2.0281e-5 kg; lognormal SD95 1.34
  Range for RER refineries
- Propylene glycol, liquid, at plant [RER]: 2.2749e-5 kg; lognormal SD95 1.26
  (3,4,1,3,3,na); Literature
- Chemicals organic, at plant [GLO]: 0.0001741 kg; lognormal SD95 1.19
  (3,4,2,1,1,4); IPPC European plant data
- Zinc, primary, at regional storage [RER]: 2.1876e-7 kg; lognormal SD95 1
  Range for RER refineries, Zn Catalyst
- Crude oil, production RAF, at long distance transport [CH]: 0.020123 kg; lognormal SD95 1.07
  (1,1,1,1,1,3); Swiss Petroleum Association (Erdölvereinigung): Annual Report 2016
- Crude oil, production RU, at long distance transport [CH]: 0.074566 kg; lognormal SD95 1.07
  (1,1,1,1,1,3); Swiss Petroleum Association (Erdölvereinigung): Annual Report 2016
- Refinery [RER]: 5.0975e-11 p; lognormal SD95 3.03
  (3,3,1,1,1,4); Estimation
- Palladium, at regional storage [RER]: 9.7243e-8 kg; lognormal SD95 1.41
  Range for RER refineries, Vanadium Catalyst
- Heavy fuel oil, burned in refinery furnace [CH]: 0.53526 MJ; lognormal SD95 1.09
  (2,1,1,1,1,3); Swiss statistic
- Nickel, 99.5%, at plant [GLO]: 1.4623e-8 kg; lognormal SD95 4.18
  Range for RER refineries, Ni/Mo Catalyst
- Lubricating oil, at plant [RER]: 2.4503e-5 kg; lognormal SD95 1.14
  (2,4,1,3,1,3); Env. reports DE
- Sodium hypochlorite, 15% in H2O, at plant [RER]: 4.9402e-5 kg; lognormal SD95 1.34
  (3,4,4,3,3,na); Literature, waste water treatment
- Sulphuric acid, liquid, at plant [RER]: 1.1758e-5 kg; lognormal SD95 1.1
  (2,3,1,3,1,3); Average of plant data
- Iron sulphate, at plant [RER]: 4.9402e-5 kg; lognormal SD95 1.34
  (3,4,4,3,3,na); Literature, waste water treatment
- Platinum, at regional storage [RER]: 3.0787e-9 kg; lognormal SD95 1.12
  Range for RER refineries, Reformer Catalyst
- Disposal, catalytic converter NOx reduction, 0% water, to underground deposit [DE]: 2.0444e-6 kg; lognormal SD95 1.1
  (2,3,1,3,1,3); Estimation based on literature data
- Molybdenum, at regional storage [RER]: 9.3963e-8 kg; lognormal SD95 2.83
  Range for RER refineries, Co/Mo Catalyst
- Crude oil, production NG, at long distance transport [CH]: 0.33489 kg; lognormal SD95 1.07
  (1,1,1,1,1,3); Swiss Petroleum Association (Erdölvereinigung): Annual Report 2016
- Disposal, refinery sludge, 89.5% water, to hazardous waste incineration [CH]: 0.00012054 kg; lognormal SD95 1.09
  (2,2,1,1,1,3); Average of plant data
- Crude oil, production US, at long distance transport [CH]: 0.16316 kg; lognormal SD95 1.07
  (1,1,1,1,1,3); Swiss Petroleum Association (Erdölvereinigung): Annual Report 2016
- Transport, freight, lorry, fleet average [RER]: 0.001324 tkm; lognormal SD95 2.1
  (4,5,na,na,na,na); Standard distance 100km
- Refinery gas, burned in flare [GLO]: 0.084498 MJ; lognormal SD95 1.16
  (2,4,1,3,1,4); Swiss plant
- Crude oil, production RME, at long distance transport [CH]: 0.044661 kg; lognormal SD95 1.07
  (1,1,1,1,1,3); Swiss Petroleum Association (Erdölvereinigung): Annual Report 2016
- Transport, freight, rail [RER]: 0.0079537 tkm; lognormal SD95 2.1
  (4,5,na,na,na,na); Standard distance 600km
- Chlorine, liquid, production mix, at plant [RER]: 0.00016403 kg; lognormal SD95 1.14
  (2,4,1,3,1,3); Env. reports DE
- Crude oil, production KZ, at long distance transport [CH]: 0.15374 kg; lognormal SD95 1.07
  (1,1,1,1,1,3); Swiss Petroleum Association (Erdölvereinigung): Annual Report 2016
- Ammonia, liquid, at regional storehouse [RER]: 1.9778e-6 kg; lognormal SD95 1.34
  (3,4,4,3,3,na); Literature

## Inputs from nature
- Water, cooling, unspecified natural origin/m3 [resources, in water]: 0.0039818 m3; lognormal SD95 1.12
  (3,3,1,1,1,na); Average of plant data
- Rhenium [resources, in ground]: 3.2343e-9 kg; lognormal SD95 1.12
  Range for RER refineries, Reformer Catalyst
- Water, river [resources, in water]: 0.00055923 m3; lognormal SD95 1.16
  (3,3,1,3,1,4); Average of plant data

## Emissions to nature
- Lead [emissions to water, river]: 1.7563e-7 kg; lognormal SD95 5.02
  (2,3,1,1,1,4); Range for RER refineries
- Aluminium [emissions to water, river]: 2.7961e-8 kg; lognormal SD95 5.13
  (3,5,4,3,1,4); Literature
- Hydrocarbons, unspecified [emissions to water, river]: 2.2601e-7 kg; lognormal SD95 5.48
  Range for RER refineries
- Sulfate [emissions to water, river]: 0.00011387 kg; lognormal SD95 1.65
  (3,5,4,3,1,4); Literature
- Chromium [emissions to water, river]: 1.2461e-7 kg; lognormal SD95 2.24
  Range for RER refineries
- BOD5, Biological Oxygen Demand [emissions to water, river]: 4.0114e-6 kg; lognormal SD95 3.16
  Range for RER refineries
- Potassium [emissions to water, river]: 5.5923e-6 kg; lognormal SD95 1.65
  (3,5,4,3,1,4); Literature
- Copper [emissions to water, river]: 5.5536e-9 kg; lognormal SD95 5.13
  (3,5,4,3,1,4); Literature
- Butane [emissions to air, high. pop.]: 5.8246e-5 kg; lognormal SD95 1.65
  (3,5,4,3,1,4); Literature
- Heptane [emissions to air, high. pop.]: 1.4537e-5 kg; lognormal SD95 1.65
  (3,5,4,3,1,4); Literature
- Hydrocarbons, aliphatic, alkanes, unspecified [emissions to air, high. pop.]: 4.4302e-11 kg; lognormal SD95 1.51
  (2,3,1,3,1,3); Average of plant data
- Boron [emissions to water, river]: 2.233e-7 kg; lognormal SD95 1.65
  (3,5,4,3,1,4); Literature
- Cyanide [emissions to water, river]: 9.6827e-8 kg; lognormal SD95 5.77
  Range for RER refineries
- Nitrogen, organic bound [emissions to water, river]: 1.0907e-5 kg; lognormal SD95 2.65
  Range for RER refineries
- Benzene [emissions to air, high. pop.]: 5.8246e-6 kg; lognormal SD95 1.65
  (3,5,4,3,1,4); Literature
- Ethane [emissions to air, high. pop.]: 1.4537e-5 kg; lognormal SD95 1.65
  (3,5,4,3,1,4); Literature
- Pentane [emissions to air, high. pop.]: 7.2782e-5 kg; lognormal SD95 1.65
  (3,5,4,3,1,4); Literature
- Xylene [emissions to air, high. pop.]: 5.8246e-6 kg; lognormal SD95 1.65
  (3,5,4,3,1,4); Literature
- Silver [emissions to water, river]: 2.7961e-8 kg; lognormal SD95 5.13
  (3,5,4,3,1,4); Literature
- Methane, fossil [emissions to air, high. pop.]: 1.6317e-5 kg; lognormal SD95 1.23
  (3,na,na,na,1,na); Average of plant data
- Nickel [emissions to water, river]: 7.3295e-9 kg; lognormal SD95 5.02
  (2,4,1,2,1,3); Average of CH plant
- Mercury [emissions to water, river]: 5.5923e-11 kg; lognormal SD95 5.13
  (3,5,4,3,1,4); Literature
- Oils, unspecified [emissions to water, river]: 5.7742e-7 kg; lognormal SD95 14
  Range for RER refineries
- Hydrocarbons, aliphatic, unsaturated [emissions to air, high. pop.]: 2.4327e-12 kg; lognormal SD95 1.51
  (2,3,1,3,1,3); Average of plant data
- Sulfide [emissions to water, river]: 5.5923e-8 kg; lognormal SD95 10
  Range for RER refineries
- Toluene [emissions to air, high. pop.]: 8.7319e-6 kg; lognormal SD95 1.65
  (3,5,4,3,1,4); Literature
- Cadmium [emissions to water, river]: 5.5536e-9 kg; lognormal SD95 5.13
  (3,5,4,3,1,4); Literature
- Iron [emissions to water, river]: 2.7961e-7 kg; lognormal SD95 5.13
  (3,5,4,3,1,4); Literature
- AOX, Adsorbable Organic Halogen as Cl [emissions to water, river]: 9.0188e-9 kg; lognormal SD95 3.16
  Range for RER refineries
- Sulfur dioxide [emissions to air, high. pop.]: 3.1848e-5 kg; lognormal SD95 1.51
  (2,1,1,1,1,3); Swiss plants
- Strontium [emissions to water, river]: 3.8855e-7 kg; lognormal SD95 5.13
  (3,5,4,3,1,4); Literature
- Sodium [emissions to water, river]: 0.00016797 kg; lognormal SD95 1.65
  (3,5,4,3,1,4); Literature
- Chloride [emissions to water, river]: 4.4462e-5 kg; lognormal SD95 5.02
  (2,4,1,2,1,3); Average of CH plant, basic uncertainity = 5 estimated based on range
- Ammonium, ion [emissions to water, river]: 3.7884e-6 kg; lognormal SD95 6.32
  Range for RER refineries
- Magnesium [emissions to water, river]: 1.3931e-5 kg; lognormal SD95 5.13
  (3,5,4,3,1,4); Literature
- Hydrocarbons, aromatic [emissions to water, river]: 4.0213e-7 kg; lognormal SD95 3.01
  (2,3,1,1,1,3); Average of plant data
- Zinc [emissions to water, river]: 9.5667e-8 kg; lognormal SD95 5.02
  (2,4,1,2,1,3); Average of CH plant
- Barium [emissions to water, river]: 5.5923e-8 kg; lognormal SD95 5.13
  (3,5,4,3,1,4); Literature
- DOC, Dissolved Organic Carbon [emissions to water, river]: 3.9106e-8 kg; lognormal SD95 1.53
  (2,4,1,2,1,3); Average of CH plant
- t-Butyl methyl ether [emissions to water, river]: 7.6496e-7 kg; lognormal SD95 3.16
  Range for RER refineries
- Phenol [emissions to water, river]: 9.9482e-8 kg; lognormal SD95 5.77
  Range for RER refineries
- Hexane [emissions to air, high. pop.]: 2.9073e-5 kg; lognormal SD95 1.65
  (3,5,4,3,1,4); Literature
- Ammonia [emissions to air, high. pop.]: 7.2621e-8 kg; lognormal SD95 1.54
  (3,4,1,3,1,3); Plant data
- Dinitrogen monoxide [emissions to air, high. pop.]: 1.5058e-6 kg; lognormal SD95 1.52
  (3,na,na,na,1,na); Average of plant data
- Fluoride [emissions to water, river]: 2.4997e-6 kg; lognormal SD95 4.47
  Range for RER refineries
- Ethene [emissions to air, high. pop.]: 2.9073e-6 kg; lognormal SD95 1.65
  (3,5,4,3,1,4); Literature
- Hydrocarbons, aromatic [emissions to air, high. pop.]: 6.6453e-13 kg; lognormal SD95 1.51
  (2,3,1,3,1,3); Average of plant data
- PAH, polycyclic aromatic hydrocarbons [emissions to water, river]: 9.0188e-9 kg; lognormal SD95 3.16
  Range for RER refineries
- Molybdenum [emissions to water, river]: 5.5923e-9 kg; lognormal SD95 5.13
  (3,5,4,3,1,4); Literature
- Benzene [emissions to water, river]: 1.2798e-8 kg; lognormal SD95 44.7
  Range for RER refineries
- Phosphorus [emissions to water, river]: 2.1638e-7 kg; lognormal SD95 3.87
  Range for RER refineries
- Propane [emissions to air, high. pop.]: 5.8246e-5 kg; lognormal SD95 1.65
  (3,5,4,3,1,4); Literature
- Suspended solids, unspecified [emissions to water, river]: 5.5923e-6 kg; lognormal SD95 5
  Range for RER refineries
- Propene [emissions to air, high. pop.]: 2.9073e-6 kg; lognormal SD95 1.65
  (3,5,4,3,1,4); Literature
- Selenium [emissions to water, river]: 8.3884e-9 kg; lognormal SD95 5.13
  (3,5,4,3,1,4); Literature
- Nitrogen oxides [emissions to air, high. pop.]: 2.8598e-5 kg; lognormal SD95 1.51
  (2,1,1,1,1,3); Swiss plants
- Xylene [emissions to water, river]: 5.5923e-8 kg; lognormal SD95 3.12
  (3,5,4,3,1,4); Literature
- Butene [emissions to air, high. pop.]: 1.4537e-6 kg; lognormal SD95 1.65
  (3,5,4,3,1,4); Literature
- Toluene [emissions to water, river]: 5.5923e-7 kg; lognormal SD95 3.12
  (3,5,4,3,1,4); Literature
- TOC, Total Organic Carbon [emissions to water, river]: 1.5799e-5 kg; lognormal SD95 1.65
  (3,5,4,3,1,4); Estimation
- Arsenic [emissions to water, river]: 5.5536e-9 kg; lognormal SD95 5.13
  (3,5,4,3,1,4); Literature
- Calcium [emissions to water, river]: 2.7961e-5 kg; lognormal SD95 1.65
  (3,5,4,3,1,4); Literature
- Nitrate [emissions to water, river]: 4.5944e-6 kg; lognormal SD95 1.65
  (3,5,4,3,1,4); Literature
- COD, Chemical Oxygen Demand [emissions to water, river]: 4.0973e-5 kg; lognormal SD95 2.04
  Range for RER refineries
- Manganese [emissions to water, river]: 1.1165e-7 kg; lognormal SD95 5.13
  (3,5,4,3,1,4); Literature
- Vanadium [emissions to water, river]: 1.668e-8 kg; lognormal SD95 5.13
  (3,5,4,3,1,4); Literature
- Benzene, ethyl- [emissions to air, high. pop.]: 1.4537e-6 kg; lognormal SD95 1.65
  (3,5,4,3,1,4); Literature
- Particulates, > 10 um [emissions to air, high. pop.]: 9.8889e-6 kg; lognormal SD95 2.12
  (3,5,4,3,1,4); Literature
- Benzene, ethyl- [emissions to water, river]: 1.1059e-10 kg; lognormal SD95 3.12
  (3,5,4,3,1,4); Literature
- Heat, waste [emissions to air, high. pop.]: 0.027171 MJ; lognormal SD95 1.1
  (2,3,1,3,1,3); Average of plant data
- Water [emissions to water, unspecified]: 3.78271, 0.531269 kg (2 entries); lognormal SD95 2.5196
  (5,5,5,5,5,BU:1.05); All uncertainty-values set to 5.0 by default. Balance of input water

## Sampling procedure
Questionnaires and literature.

## Sources
- Stolz P., Frischknecht R., 2017, 2017 - Energy label for passenger cars - Stolz, -, 611, treeze Ltd., Bern, CH
Stolz P., Frischknecht R. (2017) Energieetikette für Personenwagen: Umweltkennwerte 2017 der Strom- und Treibstoffbereitstellung. Volume: 611. treeze Ltd.. Uster, CH.
Type: Measurement on site
First author: Stolz P.
Other authors: Frischknecht R.
Year: 2017
Place of publication: Uster, CH
Publisher: treeze Ltd.
Volume No: 611
Original title: Energieetikette für Personenwagen: Umweltkennwerte 2017 der Strom- und Treibstoffbereitstellung
