# Biogas purification, to methane, 99 vol-%, amino washing process

Dataset: EcoSpold 1, unit process
Functional unit: 1 m3
Category: biomass / fuels
Geography: CH
Time period: 2008-01 to 2008-12
Generated by: Thomas Kaegi
accessRestrictedTo: 0
copyright: true

## General comment
Inventory refers to 1 m3 of methane. Electricity consumption and emissions represent the raw gas compression, H2S removal, gas conditioning and methane enrichment of biogas. Infrastructure expenditures are included employing generic data for facilities of a chemical plant as approximation.;

## Included processes
Emissions due to leakage and purification of biogas. Input of energy and auxiliary materials. Biogas input excluded from the dataset.

## Geography
Data apply to the supply in Switzerland. Production occurs at Viessmann in Berlin (DE).

## Technology
Industry data.

## Reference product
- Biogas purification, to methane, 99 vol-%, amino washing process [CH]: 1 m3
  SWITZERLAND

## Inputs from technosphere
- Electricity, low voltage, at grid [CH]: 0.116 kWh; lognormal SD95 1.2264
  (2,3,2,3,1,5,BU:1.05); ;
- Light fuel oil, at regional storage [CH]: 2.79e-6 kg; lognormal SD95 1.6115
  (3,4,3,3,4,5,BU:1.05); ;
- Transport, freight, lorry, 16t-32t gross weight, fleet average [CH]: 0.000195 tkm; lognormal SD95 2.1547
  (4,5,1,5,1,5,BU:2); ;
- Tap water, at user [CH]: 7.58e-5 kg; lognormal SD95 1.6115
  (3,4,3,3,4,5,BU:1.05); ;
- Chemicals organic, at plant [GLO]: 2.64e-5 kg; lognormal SD95 1.6115
  (3,4,3,3,4,5,BU:1.05); ;
- Treatment, sewage, unpolluted, to wastewater treatment, class 3 [CH]: 2.0833e-6 m3; lognormal SD95 1.2366
  (1,4,1,3,1,5,BU:1.05); ;
- Natural gas, burned in boiler condensing modulating 300kW [CH]: 3.852 MJ; lognormal SD95 1.2634
  (3,4,2,1,1,5,BU:1.05); ;
- Charcoal, at plant [GLO]: 0.000697 kg; lognormal SD95 1.323
  (1,4,1,3,3,5,BU:1.05); ;
- Silicone product, at plant [RER]: 0.000364 kg; lognormal SD95 1.6115
  (3,4,3,3,4,5,BU:1.05); ;
- Disposal, hazardous waste, 25% water, to hazardous waste incineration [CH]: 0.00208 kg; lognormal SD95 1.302
  (4,2,1,3,1,5,BU:1.05); ;
- Chemical plant, organics [RER]: 5.53e-11 p; lognormal SD95 3.3094
  (3,4,3,3,4,5,BU:3); ;
- Transport, freight, lorry, 7.5t-16t gross weight, fleet average [CH]: 9.76e-6 tkm; lognormal SD95 2.1547
  (4,5,1,5,1,5,BU:2); ;
- Sodium chloride, powder, at plant [RER]: 9.25e-5 kg; lognormal SD95 1.6115
  (3,4,3,3,4,5,BU:1.05); ;
- Monoethanolamine, at plant [RER]: 0.000123 kg; lognormal SD95 1.6115
  (3,4,3,3,4,5,BU:1.05); ;

## Emissions to nature
- Sulfur dioxide [emissions to air, high. pop.]: 0.000552 kg; lognormal SD95 1.2355
  (1,4,1,1,1,5,BU:1.05); ;
- Hydrogen sulfide [emissions to air, high. pop.]: 3.49e-6 kg; lognormal SD95 1.6209
  (4,3,1,1,1,5,BU:1.5); ;
- Methane, biogenic [emissions to air, high. pop.]: 0.000432 kg; lognormal SD95 1.5598
  (1,1,1,1,1,5,BU:1.5); ;
- Carbon dioxide, biogenic [emissions to air, high. pop.]: 0.49866 kg; lognormal SD95 1.3059
  (4,3,1,1,1,5,BU:1.05); ;
- Heat, waste [emissions to air, high. pop.]: 4.15 MJ; lognormal SD95 1.1414
  (2,3,2,3,1,4,BU:1.05); ;

## Sampling procedure
Data provided by factories

## Sources
- Kaegi T., Zschokke M., Dinkel F., 2022, 2022 - LCI biogas and biomethane processes - Kaegi, -, Carbotech AG, Zuerich, CH
Kägi T, Zschokke M, Dinkel F (2021) Life Cycle Inventories of Biogas and Biomethane Processes. On behaltf of FOEN, 2021\n

## Validation
Proof reading validation: 12.04.2021; Other validation: Z:\Schreibtisch\WinShare\BAFU Heizsysteme\A_zum konvertieren\[EcoSpold_biogas_aufbereitung.xlsx]X-Process;
