# Disposal, glass fibre-reinforced polymer panel, polyester resin, as building waste

Dataset: EcoSpold 1, unit process
Functional unit: 1 m2
Category: waste management / building demolition
Geography: CH
Time period: 2019-01 to 2021-12
Generated by: Daniel Savi
accessRestrictedTo: 0
copyright: true

## General comment
Entsorgung GFK-Fassadenplatte
Version: 0.0

Local category: Entsorgungssysteme
Local subcategory: Gebäudeentsorgung

## Reference product
- Disposal, glass fibre-reinforced polymer panel, polyester resin, as building waste [CH]: 1 m2
  SWITZERLAND

## Inputs from technosphere
- Mixed construction and demolition waste to sorting [CH]: 0.9 kg
- Deconstruction, average [CH]: 2.7 kg
- Disposal, plastics as construction waste, to final disposal type E [CH]: 0.1215 kg
- Disposal, glass fibre-reinforced polymer panel, polyester resin, to municipal incineration [CH]: 2.5785 kg

## Sources
- Klingler M., Savi D., Doka G., 2019, 2019 - LCA disposal of building materials - Klingler, -, Buero fuer Umweltchemie, Zuerich, CH
M. Klingler (2019) Harmonisierte O¨kobilanzen der Entsorgung von Baustoffen - Fu¨r die Liste der O¨kobilanzdaten im Baubereich. Zürich.

Source: M. Klingler, D. Savi (2019) Harmonisierte O¨kobilanzen der Entsorgung von Baustoffen - Fu¨r die Liste der O¨kobilanzdaten im Baubereich, Büro für Umweltchemie, Zürich
First author: M. Klingler
Year: 2019
Place of publication: Zürich
Original title: Harmonisierte O¨kobilanzen der Entsorgung von Baustoffen - Fu¨r die Liste der O¨kobilanzdaten im Baubereich
