# Disposal, plastic, consumer electronics, 15.3% water, to municipal incineration

Dataset: EcoSpold 1, unit process
Functional unit: 1 kg
Category: waste management / municipal incineration
Geography: CH
Time period: 2000-01 to 2000-12
Generated by: Gabor Doka
accessRestrictedTo: 0
copyright: true

## General comment
This dataset represents the activity of waste disposal of waste plastic, consumer electronics in a municipal solid waste incinerator (MSWI) Recommended use of this dataset: For plastic parts from consumer electronics, which go to disposal as part of communal waste mixture, either after a separation procedure, or in small amounts as illegal disposal of a larger item of waste electronics (WEEE). Waste composition (wet, in ppm): upper heating value 36.29 MJ/kg; lower heating value 34.78 MJ/kg; H2O 11129; O 41000; H 75000; C 821000; S 300; N 13100; P 600; B n.a.; Cl 6300; Br 6800; F 130; I n.a.; Ag n.a.; As 10; Ba 137; Cd 115; Co 29.478; Cr 34; Cu 3194.1; Hg 1.4; Mn 4; Mo 2; Ni 703; Pb 127; Sb 4795.2; Se 1.9596; Sn 267; V 0.5; Zn 361; Be 0.46656; Sc n.a.; Sr 82.582; Ti 4187; Tl 0.37325; W n.a.; Si 3547; Fe 1483; Ca 3177; Al 2020; K 233; Mg n.a.; Na 128; Share of carbon in waste that is biogenic 0%. Share of metals in waste not oxidised and bulk-recyclable (exclude very small or thin parts) Iron: 0%; Alu: 0%; Copper: 0%. One kg of this waste produces 0.04792 kg of slag and 0.02259 kg of residues, which are landfilled. Additional solidification with 0.009035 kg of cement. Net energy production: 4.47MJ/kg electric energy and 8.66MJ/kg thermal energy. Recovery of metal scrap to recycling: 0g iron scrap, 0g aluminium scrap, 0g copper scrap.;;

## Included processes
Waste incineration from waste reception gate further downstream (excluding transport to the MSWI plant). Waste-specific air and water emisions from incineration, auxiliary material consumption for flue gas cleaning. Short-term emissions to river water and long-term emisisons to ground water from slag compartment (from bottom ash) and residual material landfill (from solidified fly ashes and scrubber slugde). Waste-specific process energy demands for MSWI and net energy generation.

## Geography
Specific to the technology mix encountered in Switzerland in 2010. Well applicable to modern incineration practices in Europe, North America or Japan.

## Technology
average Swiss MSWI plants in 2010 (grate incinerators) with electrostatic precipitator for fly ash (ESP), wet flue gas scrubber and 25% SNCR , 42.77% SCR-high dust , 32.68% SCR-low dust -DeNOx facilities and 0% without Denox (weighted according to mass of burnt waste, representing Swiss average). Efficiency of iron scrap separation from slag : 58%. Efficiency of non-ferrous scrap separation from slag : 31%. Gross electric efficiency technology mix 15.84% and Gross thermal efficiency technology mix 28.51%

## Time period
Waste composition as given in literature reference, theoretical data or other source. Transfer coefficients for modern MSWI.

## Reference product
- Disposal, plastic, consumer electronics, 15.3% water, to municipal incineration [CH]: 1 kg
  SWITZERLAND

## Inputs from technosphere
- Sodium hydroxide, 50% in H2O, production mix, at plant [RER]: 0.00090167 kg; lognormal SD95 2.7319
  auxilliary inputs for the flue gas treatment stage of the incinerator plant. uncertainty calculated from uncertainty in average NaOH input, of transfer coefficients in the incinerator, and the uncertainty of the waste composition of this waste
- Hydrochloric acid, 30% in H2O, at plant [RER]: 8.6009e-5 kg; lognormal SD95 2.4469
  auxilliary inputs for the wastewater treatment stage of the incinerator plant. uncertainty calculated from uncertainty in average HCl input, of transfer coefficients in the incinerator, and the uncertainty of the waste composition of this waste
- Water, decarbonised, at plant [RER]: 2.0864 kg; lognormal SD95 2.8303
  Incinerator process water used in flue gas scrubber stage. uncertainty calculated from uncertainty in average water input, and the uncertainty of the waste composition of this waste
- Municipal waste incineration plant [CH]: 2.5e-10 p; lognormal SD95 1
  demands per kilogram waste. uncertainty is heeded in the module
- Iron (III) chloride, 40% in H2O, at plant [CH]: 0.00012302 kg; lognormal SD95 2.8303
  auxilliary inputs for the wastewater treatment stage of the incinerator plant. uncertainty calculated from uncertainty in average FeCl3 input, of transfer coefficients in the incinerator, and the uncertainty of the waste composition of this waste
- Chemicals organic, at plant [GLO]: 5.3443e-5 kg; lognormal SD95 6.2176
  auxilliary inputs for the wastewater treatment stage of the incinerator plant. Proxy for (pure) Trisodium-trimercapto-s-triazine (CAS 17766-26-6), used as 15% diluted solution, aka TMT15. uncertainty calculated from uncertainty in average TMT15 input, of transfer coefficients in the incinerator, and the uncertainty of the waste composition of this waste
- Transport, freight, lorry, 16t-32t gross weight, fleet average [CH]: 0.012729 tkm; lognormal SD95 1.2098
  Transport services to transport incineration residues to landfills and to transport auxilliary inputs of the incinerator plant. uncertainty calculated from uncertainty in average auxiliary material input, the uncertainty of the waste composition of this waste and the uncertainty in generic transportation distances
- Quicklime, milled, packed, at plant [CH]: 0.0041747 kg; lognormal SD95 3.0242
  auxilliary inputs for the flue gas treatment stage of the incinerator plant. uncertainty calculated from uncertainty in average CaO input, of transfer coefficients in the incinerator, and the uncertainty of the waste composition of this waste
- Natural gas, burned in industrial furnace 1MW [CH]: 0.4366 MJ; lognormal SD95 5.0937
  Input to DeNOx stage, to heat up flue gas in low-dust SCR. uncertainty calculated from uncertainty in average DeNOx input, uncertainty in the share of thermal NOx, uncertainty of nitrogen content in average municipal waste and the uncertainty in nitrogen content in *this* waste.
- Slag compartment [CH]: 8.2256e-11 p; lognormal SD95 1.5655
  landfill infrastructure required for landfilling of bottom ash. uncertainty is calculated from uncertainties in waste composition and transfer coefficients in incinerator
- Disposal, cement, hydrated, 0% water, to residual material landfill [CH]: 0.022586 kg; lognormal SD95 1.6706
  Hydrated cement output for solidification of landfilled residual material. Uncertainty calculated from uncertainty of the waste composition of this waste and transfer coefficients in the incinerator and of the solidification recipe.
- Chemicals inorganic, at plant [GLO]: 0.00032723 kg; lognormal SD95 2.4469
  auxilliary inputs for the wastewater treatment stage of the incinerator plant. Proxy for Polyelectrolyte. uncertainty calculated from uncertainty in average Polyelectrolyte input, of transfer coefficients in the incinerator, and the uncertainty of the waste composition of this waste
- Process-specific burdens, slag compartment [CH]: 0.046269 kg; lognormal SD95 1.5655
  mass-specific expenditures required for landfilling of bottom ash. uncertainty is calculated from uncertainties in waste composition and transfer coefficients in incinerator
- Transport, freight, rail [RER]: 0.011619 tkm; lognormal SD95 1.2444
  (same comment as for Transport, freight, lorry, 16t-32t gross weight, fleet average)
- Ammonia, liquid, at regional storehouse [CH]: 0.0023347 kg; lognormal SD95 5.0937
  Input to DeNOx stage (100% NH3). uncertainty calculated from uncertainty in average DeNOx input, uncertainty in the share of thermal NOx, uncertainty of nitrogen content in average municipal waste and the uncertainty in nitrogen content in *this* waste.
- Process-specific burdens, residual material landfill [CH]: 0.022586 kg; lognormal SD95 1.6104
  mass-specific expenditures required for landfilling of incineration residues. uncertainty is calculated from uncertainties in waste composition and transfer coefficients in incinerator
- Chromium oxide, flakes, at plant [RER]: 2.9853e-6 kg; lognormal SD95 7.5325
  Input to DeNOx stage. uncertainty calculated from uncertainty in average DeNOx input, uncertainty in the share of thermal NOx, uncertainty of nitrogen content in average municipal waste and the uncertainty in nitrogen content in *this* waste.
- Residual material landfill facility [CH]: 4.7055e-11 p; lognormal SD95 1.6104
  landfill infrastructure required for landfilling of incineration residues. uncertainty is calculated from uncertainties in waste composition and transfer coefficients in incinerator
- Titanium dioxide, production mix, at plant [RER]: 0.00014628 kg; lognormal SD95 7.5325
  Input to DeNOx stage (TiO2 catalyst carrier) uncertainty calculated from uncertainty in average DeNOx input, uncertainty in the share of thermal NOx, uncertainty of nitrogen content in average municipal waste and the uncertainty in nitrogen content in *this* waste.
- Cement, unspecified, at plant [CH]: 0.0090346 kg; lognormal SD95 1.6706
  Cement required for solidification of landfilled residual material. Uncertainty calculated from uncertainty of the waste composition of this waste, of transfer coefficients in the incinerator and of the solidification recipe.

## Emissions to nature
- Benzene [emissions to air, high. pop.]: 1.1617e-8 kg; lognormal SD95 1.6608
  Incomplete combustion product emitted to air. uncertainty calculated from uncertainty in average operation emissions, and the uncertainty of the flue gas volume from this waste.
- Sodium [emissions to water, groundwater, long-term]: 9.2171e-5 kg; lognormal SD95 4.1131
  Long-term emissions from landfilling of incineration residues. uncertainty is calculated from uncertainties in waste composition and transfer coefficients in incinerator and landfills.
- Cyanide [emissions to air, high. pop.]: 4.1976e-5 kg; lognormal SD95 8.22
  Nitrogen species emitted to air after DeNOx stage. uncertainty calculated from uncertainty in average N-emissions and uncertainty in the share of thermal NOx and the uncertainty in nitrogen content in *this* waste.
- Hydrogen fluoride [emissions to air, high. pop.]: 8.7707e-7 kg; lognormal SD95 6.9395
  Emission to air from waste composition and transfer coefficients. uncertainty is calculated from uncertainties in waste composition and transfer coefficients in incinerator
- TOC, Total Organic Carbon [emissions to water, river]: 0.00041941 kg; lognormal SD95 1.3654
  Emissions to water from waste composition and transfer coefficients in incinerator and landfills. uncertainty is calculated from uncertainties in waste composition and transfer coefficients in incinerator and landfills
- Nitrate [emissions to water, groundwater, long-term]: 0.00047117 kg; lognormal SD95 3.2274
  (same comment as for Sodium)
- Potassium [emissions to water, groundwater, long-term]: 0.00018113 kg; lognormal SD95 3.8714
  (same comment as for Sodium)
- Fluoride [emissions to water, river]: 9.9402e-6 kg; lognormal SD95 4.5479
  (same comment as for TOC, Total Organic Carbon)
- Lead [emissions to water, river]: 1.2148e-8 kg; lognormal SD95 5.8512
  (same comment as for TOC, Total Organic Carbon)
- Arsenic [emissions to water, groundwater, long-term]: 2.9946e-6 kg; lognormal SD95 9.5127
  (same comment as for Sodium)
- Arsenic [emissions to water, river]: 6.9271e-6 kg; lognormal SD95 8.6426
  (same comment as for TOC, Total Organic Carbon)
- Titanium [emissions to air, high. pop.]: 3.4737e-6 kg; lognormal SD95 4.0804
  (same comment as for Hydrogen fluoride)
- Copper [emissions to water, river]: 4.1389e-7 kg; lognormal SD95 4.3638
  (same comment as for TOC, Total Organic Carbon)
- TOC, Total Organic Carbon [emissions to water, groundwater, long-term]: 0.0024397 kg; lognormal SD95 1.2581
  (same comment as for Sodium)
- Aluminium [emissions to air, high. pop.]: 1.6469e-9 kg; lognormal SD95 4.9284
  (same comment as for Hydrogen fluoride)
- DOC, Dissolved Organic Carbon [emissions to water, river]: 0.00041941 kg; lognormal SD95 1.3654
  (same comment as for TOC, Total Organic Carbon)
- Nickel [emissions to water, river]: 4.7234e-7 kg; lognormal SD95 9.5083
  (same comment as for TOC, Total Organic Carbon)
- Manganese [emissions to water, groundwater, long-term]: 2.4677e-6 kg; lognormal SD95 21.296
  (same comment as for Sodium)
- Copper [emissions to air, high. pop.]: 2.9255e-7 kg; lognormal SD95 4.3681
  (same comment as for Hydrogen fluoride)
- Beryllium [emissions to water, groundwater, long-term]: 4.2641e-7 kg; lognormal SD95 12.425
  (same comment as for Sodium)
- Silicon [emissions to water, river]: 8.6964e-7 kg; lognormal SD95 5.3637
  (same comment as for TOC, Total Organic Carbon)
- Toluene [emissions to air, high. pop.]: 2.3234e-8 kg; lognormal SD95 1.6608
  (same comment as for Benzene)
- Aluminium [emissions to water, groundwater, long-term]: 0.0014608 kg; lognormal SD95 4.1785
  (same comment as for Sodium)
- Strontium [emissions to water, river]: 5.1996e-8 kg; lognormal SD95 13.558
  (same comment as for TOC, Total Organic Carbon)
- Mercury [emissions to air, high. pop.]: 3.9695e-8 kg; lognormal SD95 11.902
  (same comment as for Hydrogen fluoride)
- Bromine [emissions to water, river]: 0.0061412 kg; lognormal SD95 2.2683
  (same comment as for TOC, Total Organic Carbon)
- Chromium [emissions to air, high. pop.]: 2.9689e-8 kg; lognormal SD95 8.3521
  (same comment as for Hydrogen fluoride)
- Silicon [emissions to water, groundwater, long-term]: 0.00035824 kg; lognormal SD95 94.441
  (same comment as for Sodium)
- Vanadium [emissions to water, groundwater, long-term]: 2.3308e-7 kg; lognormal SD95 9.6165
  (same comment as for Sodium)
- Chromium VI [emissions to water, river]: 9.5024e-7 kg; lognormal SD95 8.811
  (same comment as for TOC, Total Organic Carbon)
- NMVOC, non-methane volatile organic compounds, unspecified origin [emissions to air, high. pop.]: 5.2868e-7 kg; lognormal SD95 1.6608
  (same comment as for Benzene)
- Mercury [emissions to water, river]: 1.5204e-9 kg; lognormal SD95 7.9029
  (same comment as for TOC, Total Organic Carbon)
- Bromine [emissions to water, groundwater, long-term]: 0.00065541 kg; lognormal SD95 3.6756
  (same comment as for Sodium)
- Aluminium [emissions to water, river]: 2.1861e-7 kg; lognormal SD95 6.6958
  (same comment as for TOC, Total Organic Carbon)
- Phosphate [emissions to water, groundwater, long-term]: 8.0396e-5 kg; lognormal SD95 81.515
  (same comment as for Sodium)
- Barium [emissions to water, groundwater, long-term]: 6.8996e-5 kg; lognormal SD95 20.352
  (same comment as for Sodium)
- Heat, waste [emissions to water, river]: 6.1538 MJ; lognormal SD95 1.2722
  Waste heat generated from heating value of this waste plus any electricity required to process it. uncertainty is calculated from uncertainties in waste composition and uncertainties in energy efficiency and the uncertainty in internal energy demand
- Vanadium [emissions to water, river]: 7.983e-10 kg; lognormal SD95 12.685
  (same comment as for TOC, Total Organic Carbon)
- Carbon dioxide, fossil [emissions to air, high. pop.]: 2.9922 kg; lognormal SD95 1.0727
  (same comment as for Hydrogen fluoride)
- Cadmium [emissions to water, river]: 1.1022e-8 kg; lognormal SD95 6.0587
  (same comment as for TOC, Total Organic Carbon)
- Molybdenum [emissions to water, groundwater, long-term]: 1.4511e-6 kg; lognormal SD95 11.37
  (same comment as for Sodium)
- COD, Chemical Oxygen Demand [emissions to water, river]: 0.0009604 kg; lognormal SD95 1.3648
  (same comment as for TOC, Total Organic Carbon)
- Antimony [emissions to water, groundwater, long-term]: 0.0030494 kg; lognormal SD95 3.7743
  (same comment as for Sodium)
- Barium [emissions to water, river]: 1.8439e-8 kg; lognormal SD95 9.0661
  (same comment as for TOC, Total Organic Carbon)
- Hydrogen chloride [emissions to air, high. pop.]: 3.5951e-6 kg; lognormal SD95 3.8068
  (same comment as for Hydrogen fluoride)
- Sulfur dioxide [emissions to air, high. pop.]: 3.1903e-6 kg; lognormal SD95 6.1708
  (same comment as for Hydrogen fluoride)
- Mercury [emissions to water, groundwater, long-term]: 8.9167e-8 kg; lognormal SD95 33.757
  (same comment as for Sodium)
- Potassium [emissions to water, river]: 5.072e-5 kg; lognormal SD95 4.1895
  (same comment as for TOC, Total Organic Carbon)
- Chloride [emissions to water, river]: 0.0048366 kg; lognormal SD95 3.2052
  (same comment as for TOC, Total Organic Carbon)
- Benzene, hexachloro- [emissions to air, high. pop.]: 2.429e-11 kg; lognormal SD95 1.6608
  (same comment as for Benzene)
- Chloride [emissions to water, groundwater, long-term]: 0.0014599 kg; lognormal SD95 3.668
  (same comment as for Sodium)
- Tin [emissions to air, high. pop.]: 1.7441e-10 kg; lognormal SD95 6.7081
  (same comment as for Hydrogen fluoride)
- Zinc [emissions to water, river]: 3.257e-8 kg; lognormal SD95 5.1186
  (same comment as for TOC, Total Organic Carbon)
- Sulfate [emissions to water, river]: 0.00015219 kg; lognormal SD95 3.5148
  (same comment as for TOC, Total Organic Carbon)
- Carbon monoxide, fossil [emissions to air, high. pop.]: 1.9747e-5 kg; lognormal SD95 5.5361
  (same comment as for Benzene)
- Iron [emissions to water, river]: 3.8986e-8 kg; lognormal SD95 6.5094
  (same comment as for TOC, Total Organic Carbon)
- Zinc [emissions to air, high. pop.]: 2.4197e-7 kg; lognormal SD95 6.0516
  (same comment as for Hydrogen fluoride)
- Phosphate [emissions to water, river]: 3.3732e-7 kg; lognormal SD95 4.3607
  (same comment as for TOC, Total Organic Carbon)
- BOD5, Biological Oxygen Demand [emissions to water, groundwater, long-term]: 0.0020167 kg; lognormal SD95 1.2581
  (same comment as for Sodium)
- Nitrate [emissions to water, river]: 0.00016699 kg; lognormal SD95 2.663
  (same comment as for TOC, Total Organic Carbon)
- Cadmium [emissions to water, groundwater, long-term]: 8.3916e-6 kg; lognormal SD95 157.52
  (same comment as for Sodium)
- Strontium [emissions to air, high. pop.]: 8.2582e-9 kg; lognormal SD95 7.5625
  (same comment as for Hydrogen fluoride)
- Potassium [emissions to air, high. pop.]: 1.1511e-6 kg; lognormal SD95 6.4009
  (same comment as for Hydrogen fluoride)
- Calcium [emissions to water, river]: 3.5171e-5 kg; lognormal SD95 3.5044
  (same comment as for TOC, Total Organic Carbon)
- Bromine [emissions to air, high. pop.]: 3.3966e-6 kg; lognormal SD95 3.7636
  (same comment as for Hydrogen fluoride)
- Dioxin, 2,3,7,8 Tetrachlorodibenzo-p- [emissions to air, high. pop.]: 2.3232e-14 kg; lognormal SD95 3.3217
  (same comment as for Benzene)
- Tin [emissions to water, groundwater, long-term]: 0.00010219 kg; lognormal SD95 13.742
  (same comment as for Sodium)
- Benzene, pentachloro- [emissions to air, high. pop.]: 6.1376e-11 kg; lognormal SD95 1.6608
  (same comment as for Benzene)
- Antimony [emissions to water, river]: 0.0016528 kg; lognormal SD95 3.9454
  (same comment as for TOC, Total Organic Carbon)
- Strontium [emissions to water, groundwater, long-term]: 8.2474e-5 kg; lognormal SD95 7.2936
  (same comment as for Sodium)
- Calcium [emissions to air, high. pop.]: 2.5003e-5 kg; lognormal SD95 4.2436
  (same comment as for Hydrogen fluoride)
- Sulfate [emissions to water, groundwater, long-term]: 0.00074302 kg; lognormal SD95 4.0165
  (same comment as for Sodium)
- Lead [emissions to air, high. pop.]: 1.0463e-8 kg; lognormal SD95 7.1289
  (same comment as for Hydrogen fluoride)
- Thallium [emissions to water, river]: 2.2866e-10 kg; lognormal SD95 15.411
  (same comment as for TOC, Total Organic Carbon)
- Heat, waste [emissions to air, high. pop.]: 26.701 MJ; lognormal SD95 1.2722
  (same comment as for Heat, waste)
- Titanium [emissions to water, groundwater, long-term]: 0.0012517 kg; lognormal SD95 4.8921
  (same comment as for Sodium)
- Nitrogen oxides [emissions to air, high. pop.]: 0.00086927 kg; lognormal SD95 5.443
  sum of fuel-Nox and thermal-NOx emitted to air after DeNOx stage. uncertainty calculated from uncertainty in average N-emissions and uncertainty in the share of thermal NOx and the uncertainty in nitrogen content in *this* waste.
- Ammonia [emissions to air, high. pop.]: 2.7451e-6 kg; lognormal SD95 5.443
  (same comment as for Cyanide)
- Particulates, < 2.5 um [emissions to air, high. pop.]: 1.387e-6 kg; lognormal SD95 3.3217
  (same comment as for Benzene)
- Iron [emissions to air, high. pop.]: 2.6578e-9 kg; lognormal SD95 5.1529
  (same comment as for Hydrogen fluoride)
- Thallium [emissions to air, high. pop.]: 3.7325e-10 kg; lognormal SD95 13.764
  (same comment as for Hydrogen fluoride)
- Thallium [emissions to water, groundwater, long-term]: 2.178e-7 kg; lognormal SD95 9.5374
  (same comment as for Sodium)
- Manganese [emissions to water, river]: 6.2264e-10 kg; lognormal SD95 8.8187
  (same comment as for TOC, Total Organic Carbon)
- Dinitrogen monoxide [emissions to air, high. pop.]: 0.00019538 kg; lognormal SD95 8.22
  (same comment as for Cyanide)
- Cobalt [emissions to water, river]: 5.3406e-9 kg; lognormal SD95 11.02
  (same comment as for TOC, Total Organic Carbon)
- Arsenic [emissions to air, high. pop.]: 7.8333e-8 kg; lognormal SD95 9.61
  (same comment as for Hydrogen fluoride)
- Tin [emissions to water, river]: 7.0637e-9 kg; lognormal SD95 11.643
  (same comment as for TOC, Total Organic Carbon)
- Molybdenum [emissions to air, high. pop.]: 2.6316e-9 kg; lognormal SD95 11.56
  (same comment as for Hydrogen fluoride)
- Vanadium [emissions to air, high. pop.]: 1.0604e-8 kg; lognormal SD95 13.177
  (same comment as for Hydrogen fluoride)
- Selenium [emissions to water, river]: 6.6198e-7 kg; lognormal SD95 8.7658
  (same comment as for TOC, Total Organic Carbon)
- Chromium [emissions to water, river]: 2.64e-9 kg; lognormal SD95 8.4715
  (same comment as for TOC, Total Organic Carbon)
- Molybdenum [emissions to water, river]: 5.4624e-7 kg; lognormal SD95 7.6516
  (same comment as for TOC, Total Organic Carbon)
- Sodium [emissions to water, river]: 3.4778e-5 kg; lognormal SD95 4.0872
  (same comment as for TOC, Total Organic Carbon)
- Chromium VI [emissions to water, groundwater, long-term]: 3.1189e-6 kg; lognormal SD95 12.288
  (same comment as for Sodium)
- Particulates, > 2.5 um, and < 10um [emissions to air, high. pop.]: 6.9697e-9 kg; lognormal SD95 2.2144
  (same comment as for Benzene)
- Sodium [emissions to air, high. pop.]: 1.0509e-6 kg; lognormal SD95 6.9696
  (same comment as for Hydrogen fluoride)
- Copper [emissions to water, groundwater, long-term]: 0.0028531 kg; lognormal SD95 4.104
  (same comment as for Sodium)
- Titanium [emissions to water, river]: 1.5611e-6 kg; lognormal SD95 3.5105
  (same comment as for TOC, Total Organic Carbon)
- Benzo(a)pyrene [emissions to air, high. pop.]: 2.5851e-13 kg; lognormal SD95 3.3217
  (same comment as for Benzene)
- Beryllium [emissions to water, river]: 2.9222e-10 kg; lognormal SD95 19.184
  (same comment as for TOC, Total Organic Carbon)
- Nickel [emissions to water, groundwater, long-term]: 0.0006748 kg; lognormal SD95 5.2106
  (same comment as for Sodium)
- Silicon [emissions to air, high. pop.]: 5.5245e-9 kg; lognormal SD95 4.4944
  (same comment as for Hydrogen fluoride)
- DOC, Dissolved Organic Carbon [emissions to water, groundwater, long-term]: 0.0024397 kg; lognormal SD95 1.2581
  (same comment as for Sodium)
- Methane, fossil [emissions to air, high. pop.]: 1.7425e-7 kg; lognormal SD95 1.6608
  (same comment as for Benzene)
- Phosphorus [emissions to air, high. pop.]: 6.0975e-7 kg; lognormal SD95 5.6169
  (same comment as for Hydrogen fluoride)
- Selenium [emissions to air, high. pop.]: 2.3377e-8 kg; lognormal SD95 11.492
  (same comment as for Hydrogen fluoride)
- Selenium [emissions to water, groundwater, long-term]: 1.2727e-6 kg; lognormal SD95 8.0279
  (same comment as for Sodium)
- Cadmium [emissions to air, high. pop.]: 5.8616e-8 kg; lognormal SD95 7.1289
  (same comment as for Hydrogen fluoride)
- Calcium [emissions to water, groundwater, long-term]: 0.0023664 kg; lognormal SD95 3.9593
  (same comment as for Sodium)
- Barium [emissions to air, high. pop.]: 5.3773e-7 kg; lognormal SD95 6.9169
  (same comment as for Hydrogen fluoride)
- Cobalt [emissions to water, groundwater, long-term]: 2.4012e-5 kg; lognormal SD95 7.7618
  (same comment as for Sodium)
- Fluoride [emissions to water, groundwater, long-term]: 0.00011655 kg; lognormal SD95 4.2479
  (same comment as for Sodium)
- Cobalt [emissions to air, high. pop.]: 5.361e-8 kg; lognormal SD95 8.4681
  (same comment as for Hydrogen fluoride)
- Lead [emissions to water, groundwater, long-term]: 6.1403e-5 kg; lognormal SD95 56.672
  (same comment as for Sodium)
- Zinc [emissions to water, groundwater, long-term]: 0.00010978 kg; lognormal SD95 30.428
  (same comment as for Sodium)
- Phenol, pentachloro- [emissions to air, high. pop.]: 5.059e-12 kg; lognormal SD95 1.6608
  (same comment as for Benzene)
- COD, Chemical Oxygen Demand [emissions to water, groundwater, long-term]: 0.0061654 kg; lognormal SD95 1.2581
  (same comment as for Sodium)
- Manganese [emissions to air, high. pop.]: 7.6391e-10 kg; lognormal SD95 10.824
  (same comment as for Hydrogen fluoride)
- Nickel [emissions to air, high. pop.]: 8.8313e-7 kg; lognormal SD95 5.4756
  (same comment as for Hydrogen fluoride)
- Iron [emissions to water, groundwater, long-term]: 0.00074816 kg; lognormal SD95 5.868
  (same comment as for Sodium)
- Antimony [emissions to air, high. pop.]: 3.8413e-9 kg; lognormal SD95 4.2849
  (same comment as for Hydrogen fluoride)
- BOD5, Biological Oxygen Demand [emissions to water, river]: 0.00094806 kg; lognormal SD95 1.3697
  (same comment as for TOC, Total Organic Carbon)

## Sampling procedure
fully waste-specific calculation based on literature data for average MSWI operation performance

## Extrapolations
Typical elemental transfer coefficients from current studies for modern MSWI, completed with data from coal power plants and estimates, adapted for inert/burnable waste.

## Uncertainty adjustments
uncertainty of waste input composition data derived from generic formula GSD(c) = N*ln(c)+1

## Sources
- Doka G., 2013, 2013 - Updates LCI waste treatment services - Doka, -, Doka LCA, Zuerich, CH
Doka G. (2013) Updates to Life Cycle Inventories of Waste Treatment Services - part II: waste incineration. Doka LCA. Zurich.
Type: Separate publication
Source: Report to document the 2013 changes to the MSWI incinerator model and datasets (URL: http://www.doka.ch/ecoinventMSWIupdateLCI2013.pdf). To be read with the ecoinvent Nr 13 report (Doka 2009, Life Cycle Inventories of Waste Treatment Services) for ecoinvent v2.2.
First author: Doka G.
Year: 2013
Place of publication: Zurich
Publisher: Doka LCA
Original title: Updates to Life Cycle Inventories of Waste Treatment Services - part II: waste incineration

## Validation
Proof reading validation: Passed.; Other validation: none;
