# Wind turbine 2.3MW, onshore, tower, steel

Dataset: EcoSpold 1, unit process, infrastructure
Functional unit: 1 unit
Category: wind power / production of components
Geography: RER
Time period: 2024 to 2024
Synonyms: 0
Share of production covered: 100 %
Generated by: Alena Frehner
accessRestrictedTo: 0
copyright: true

## Included processes
Wind turbine tower, at site including manufacturing, transports, installation, replacements, decommission and waste treatement. Calculated for FU of 1p.
Data are based on the Vestas V90-2.0MW onshore wind turbine (Garrett & Rønde, 2011).
Assumed lifetime is 25 years.

## Reference product
- Wind turbine 2.3MW, onshore, tower, steel [RER]: 1 unit

## Inputs from technosphere
- Aluminium, production mix, at plant [RER]: 2871 kg; lognormal SD95 1.3277
  (2,4,4,1,1,5,BU:1.05); Input based on Garrett & Rønde (2011)
- Copper, at regional storage [RER]: 1436 kg; lognormal SD95 1.3277
  (2,4,4,1,1,5,BU:1.05); Input based on Garrett & Rønde (2011)
- Polyethylene, HDPE, granulate, at plant [RER]: 2209 kg; lognormal SD95 1.05
  (1,1,1,1,1,1,BU:1.05);
- Steel, low-alloyed, at plant [RER]: 139260 kg; lognormal SD95 1.3277
  (2,4,4,1,1,5,BU:1.05); Input based on Garrett & Rønde (2011)
- Aluminium product manufacturing, average metal working [RER]: 2871 kg; lognormal SD95 1.3277
  (2,4,4,1,1,5,BU:1.05); Input based on Garrett & Rønde (2011)
- Copper product manufacturing, average metal working [RER]: 1436 kg; lognormal SD95 1.3277
  (2,4,4,1,1,5,BU:1.05); Input based on Garrett & Rønde (2011)
- Sheet rolling, steel [RER]: 139260 kg; lognormal SD95 1.3277
  (2,4,4,1,1,5,BU:1.05); Input based on Garrett & Rønde (2011)
- Welding, arc, steel [RER]: 361 m; lognormal SD95 1.3277
  (2,4,4,1,1,5,BU:1.05); Input based on Garrett & Rønde (2011)
- Transport, freight, lorry, fleet average [RER]: 61956 tkm; lognormal SD95 2.1112
  (2,4,4,1,1,5,BU:2); Includes the tranportation of components to wind farm site.
- Transport, freight, lorry, diesel, 26t gross weight, 2010, EURO-V, regional delivery [RER]: 14953 tkm; lognormal SD95 2.1112
  (2,4,4,1,1,5,BU:2); Includes the tranportation of materials to component manufacturing site and components to waste treatement site.
- Operation, freight train, diesel [RER]: 29156 tkm; lognormal SD95 2.1112
  (2,4,4,1,1,5,BU:2); Includes the tranportation of materials to component manufacturing site.
- Diesel, burned in building machine, average [CH]: 135.86 MJ; lognormal SD95 2.2944
  (2,4,5,2,1,5,BU:2); Diesel consumption for the erection of the wind turbine, based on the potential energy.
- Recycling steel and iron [RER]: 133660 kg; lognormal SD95 1.3277
  (2,4,4,1,1,5,BU:1.05); Own calculation; recycling of steel and iron; assumed recycling rate: 95%
- Disposal, steel, 0% water, to construction waste landfill [CH]: 7035 kg; lognormal SD95 1.3277
  (2,4,4,1,1,5,BU:1.05); Own calculation; landfill of steel and iron; assumed landfill rate: 5%
- Disposal, aluminium, 0% water, to sanitary landfill [CH]: 143.55 kg; lognormal SD95 1.3277
  (2,4,4,1,1,5,BU:1.05); Own calculation; landfill of aluminum; assumed landfill rate: 5%
- Disposal, plastics, mixture, 15.3% water, to municipal incineration [CH]: 1104.5 kg; lognormal SD95 1.3277
  (2,4,4,1,1,5,BU:1.05); Own calculation; incineration of plastic materials; assumed incineration rate: 50%
- Disposal, plastics, mixture, 15.3% water, to sanitary landfill [CH]: 1104.5 kg; lognormal SD95 1.3277
  (2,4,4,1,1,5,BU:1.05); Own calculation; landfill of plastic materials; assumed landfill rate: 50%

## Sources
- Kroehnert H., Frehner A., Stucki M., 2025, 2025 - LCI wind Energy - Kroehnert, Project report, 0, ZHAW, Waedenswil, CH

## Validation
22.07.2025
"S:\pools\n\N-IUNR-FG-LCA\Projekte\Wind LCA\LCI-Update\Sachbilanz"
