# Carbon dioxide, captured at cement production plant, with heat recovery, for subsequent reuse

Dataset: EcoSpold 1, unit process
Functional unit: 1 kg
Category: chemicals / gases\transformation
Geography: CH
Time period: 2024-01 to 2024-01
Generated by: Romain Sacchi
accessRestrictedTo: 0
copyright: true

## General comment
Capture of CO2 from a cement plant for subsequent reuse. It is a facility integrated in a synthetic fuel production chain, so a certain amount of the needed steam heat (used to regenerate the sorbent) can come from excess heat generated by the synfuel conversion process, the rest being complemented by a dedicated source. In Meunier et al. 2020, 26% comes from excess heat generated by the methanol production process. To be changed according to needs. Also, there is no need for water, as it is provided by the methanol production process as well. CO2 chemical absorption-regeneration process using amines as scrubbing solvent. The amine solution used for this absorption was an aqueous solution of monoethanolamine (MEA) in a mass concentration of 30 wt.%, widely studied and considered as a benchmark for industrial CO2 capture applications. The CO2 is pre-compressed at 2 bar before storage. 11% of the CO2 is released back into the atmosphere (because the CO2 absoprtion rate is only 90%). The MEA makeup has been considered to 1 kg MEA per ton captured CO2 to compensate the losses due to the thermal degradation of the amine only, as the evaporation of the amine in the absorber is prevented by a flash tank. The rate of fossil vs. biogenic CO2 received from the cement plant need to be reflected in this dataset in two places: at the leakage level, but also at the storage level. At the storage level, we only indicate biogenic CO2. By default, we asusme 6% of the CO2 emissions are biogenic. Here, heat recovery from the cement plant's flue. gases is considered to the extent of 30% of the heat requirement by the capture plant (2.5 GJ/t CO2 captured, instead of 3.66). Source: Alternative production of methanol from industrial CO2. Meunier et al. 2020. Renewable Energy 146, pp. 1192-1203

## Reference product
- Carbon dioxide, captured at cement production plant, with heat recovery, for subsequent reuse [CH]: 1 kg
  not defined

## Inputs from technosphere
- Electricity, low voltage, at grid [CH]: 0.069 kWh; lognormal SD95 1.396
  {3;5;1;2;3;5;1.05;}
- Steam, for chemical processes, at plant [RER]: 0.9 kg; lognormal SD95 1.396
  {3;5;1;2;3;5;1.05;}
- Tap water, at user [RER]: 0.00966 kg; lognormal SD95 1.396
  {3;5;1;2;3;5;1.05;}
- Amine-based silica production, for sorbent-based direct air capture system [RER]: 0.004 kg; lognormal SD95 1.396
  64% silica gel {3;5;1;2;3;5;1.05;}
- Sodium hydroxide, 50% in H2O, production mix, at plant [RER]: 0.0001 kg; lognormal SD95 1.396
  {3;5;1;2;3;5;1.05;}
- Transport, freight, rail, electricity with shunting [CH]: 0.00246 tkm; lognormal SD95 2.208
  Generic transport distances calculated based on Table 4.2 of the ecoinvent v.2 Methodology report. Distribution: 0.0 kg over 1200.0 km.
- Transport, freight, lorry, 16t-32t gross weight, fleet average [CH]: 0.000205 tkm; lognormal SD95 2.208
  Generic transport distances calculated based on Table 4.2 of the ecoinvent v.2 Methodology report. Distribution: 0.0 kg over 100.0 km.

## Emissions to nature
- Carbon dioxide, fossil [emissions to air, unspecified]: 0.11 kg; lognormal SD95 1.396
  CO2 leakage. {3;5;1;2;3;5;1.05;}

## Sampling procedure
Sampling procedure: Literature data

## Sources
- Sacchi R., Bauer C., 2024, 2024 - LCA power-to-X in residential sector - Sacchi, Project report, PSI, Villigen, CH

## Validation
Proof reading validation: Passed, Other validation: none, Validator: Rolf Frischknecht, Telephone: 0041 44 940 61 91, E-mail: frischknecht@treeze.ch, Company: treeze, Country: CH
