# Uranium, enriched 4.75%, at USEC enrichment plant

Dataset: EcoSpold 1, unit process
Functional unit: 1 kg
Category: fuels / uranium\enriched
Geography: US
Time period: 2011-01 to 2011-12
Generated by: Roberto Dones
accessRestrictedTo: 0
copyright: true

## General comment
PSI data (BFE project 407, Christian Bauer, April 2012).;

## Included processes
The module includes: input of UF6; electricity and light fuel oil used for operation; water use, lubricant oil, and wastewater treatment; transport requirements of operation materials, industrial wastes, and contaminated waste from decommissioning (25% of the reinforced concrete and the great part of metals according to the reference). Radioactive and non-radioactive emissions to air and to water from the operation are also included. The infrastructure requirements are accounted for, though construction and operation data partially refer to different plants rather than to one single unit.

## Technology
US uranium enrichment facilities with diffusion process were installed in mid 1950s.

## Reference product
- Uranium, enriched 4.75%, at USEC enrichment plant [US]: 1 kg
  UNITED STATES

## Inputs from technosphere
- Uranium natural, in uranium hexafluoride, at conversion plant [GLO]: 1.36 kg; lognormal SD95 1
  U demand adjusted according to enrichment grade
- Water, decarbonised, at plant [RER]: 3900 kg; lognormal SD95 1.2
  own estimation
- Electricity, hard coal, at power plant [SERC]: 1780 kWh; lognormal SD95 1.15
  data Paducah 2006
- Electricity, nuclear, at power plant [US]: 679 kWh; lognormal SD95 1.15
  data Paducah 2007
- Uranium enrichment diffusion plant [US]: 3.81e-9 p; lognormal SD95 1.8
  own estimation
- Electricity, hydropower, at reservoir power plant, non alpine regions [RER]: 140 kWh; lognormal SD95 1.15
  data Paducah 2008
- Light fuel oil, burned in industrial furnace 1MW, non-modulating [CH]: 358 MJ; lognormal SD95 1.3
  old reference
- Transport, freight, lorry, fleet average [RER]: 1.2 tkm; lognormal SD95 2.1
  standard
- Low active radioactive waste [CH]: 0.00054 m3; lognormal SD95 2
  own estimation

## Emissions to nature
- Chromium [emissions to water, river]: 2.7e-5 kg; lognormal SD95 2
  old reference
- Hydrocarbons, unspecified [emissions to water, river]: 2.28e-5 kg; lognormal SD95 2
  old reference
- Chlorine [emissions to water, river]: 0.00015 kg; lognormal SD95 2
  old reference
- Phosphate [emissions to water, river]: 0.0004 kg; lognormal SD95 2
  old reference
- Zinc [emissions to water, river]: 0.00027 kg; lognormal SD95 2
  old reference
- Hydrogen fluoride [emissions to air, low. pop.]: 0.0045 kg; lognormal SD95 2
  old reference
- Uranium alpha [emissions to water, river]: 0.5 kBq; lognormal SD95 10
  old reference and range of data
- Uranium alpha [emissions to air, low. pop.]: 0.4 kBq; lognormal SD95 2
  old reference and range of data
- Nitrate [emissions to water, river]: 0.00327 kg; lognormal SD95 2
  old reference
- Heat, waste [emissions to air, low. pop.]: 9360 MJ; lognormal SD95 1.05
  same as electricity
- Fluoride [emissions to water, river]: 4e-5 kg; lognormal SD95 2
  old reference
- Ethane, 1,2-dichloro-1,1,2,2-tetrafluoro-, CFC-114 [emissions to air, low. pop.]: 0.036 kg; lognormal SD95 1.25
  range of data
- Aluminium [emissions to water, river]: 2.5e-5 kg; lognormal SD95 2
  old reference

## Sampling procedure
Literature

## Sources
- Bauer C., Frischknecht R., Eckle P., Flury K., Neal T., Papp K., Schori S., Simons A., Stucki M., Treyer K., 2012, 2012 - LCA electricity generation in Switzerland - Uster, -, 407, Swiss Centre for LCI, ESU-services Ltd., PSI, Uster and Villigen, CH
Ch. Bauer, Frischknecht (2012) Umweltauswirkungen Strom. Volume: 407. PSI. Uster und Villigen, CH.
Type: Separate publication
Source: CD-ROM
First author: Ch. Bauer
Other authors: Frischknecht
Year: 2012
Place of publication: Uster und Villigen, CH
Publisher: PSI
Volume No: 407
