# Transport, freight, rail

Dataset: EcoSpold 1, unit process
Functional unit: 1 tkm
Category: transport systems / train
Geography: RER
Time period: 2000-01 to 2000-12
Production volume: 170127,193775 Mio tkm
Share of production covered: 100 %
Generated by: Luana Krebs
accessRestrictedTo: 0
copyright: true

## General comment
Inventory refers to the entire transport life cycle. For rail infrastructure, expenditures and environmental interventions due to construction, renewal and disposal of rail tracks have been allocated based on the Gross tonne kilometre performance (342426 Mio. Gtkm). Expenditures due to operation of the rail infrastructure, as well as land use have been allocated based on the yearly train kilometre performance (161389 Mio. tkm). For the operation of goods transportation average data by rail in DE, AT, IT and FR were used. The data has been determined top down, by combining the total yearly energy consumption and the yearly performance of goods transportation.;

## Included processes
The inventory includes the actual energy consumption for an average goods train in Europe using electric and diesel energy. In addition the diesel consumption and emissions of shunting processes are accounted for as well as the production and maintenance of vehicles and railyway tracks.

## Technology
Average technology

## Time period
Time of publications

## Reference product
- Transport, freight, rail [RER]: 1 tkm
  Europe

## Inputs from technosphere
- Goods wagon [RER]: 4.1217e-9 p; lognormal SD95 3.3302
  (4,4,1,3,4,5,BU:3); average of the freight transport in AT (10%), IT (7%), FR (15%), DE (62%) and CH (5%); SBB Zahlen und Fakten 2014, UIC Statistic 2012
- Locomotive [RER]: 4.81e-10 p; lognormal SD95 3.3302
  (same comment as for Goods wagon)
- Diesel, at regional storage [RER]: 0.00075197 kg; lognormal SD95 1.6367
  (4,4,1,3,4,5,BU:1.05); diesel consumption in AT, DE, IT, FR, CH for freight transport; UIC Statistik 2016 & 2018, SBB pers. Correspondence, Okt. 2020
- Electricity, medium voltage, production ENTSO-E, at grid: 0.034067 kWh; lognormal SD95 1.6367
  (4,4,1,3,4,5,BU:1.05); electricity consumption in AT, DE, IT, FR, CH for freight transport, assumed losses 4,39%; UIC Statistik 2016 & 2018, SBB pers. Correspondence, Okt. 2020
- Maintenance, goods wagon [RER]: 4.1217e-9 p; lognormal SD95 3.3302
  (4,4,1,3,4,5,BU:3); same demand as for goods wagon; SBB Zahlen und Fakten 2014, UIC Statistic 2012
- Railway track [CH]: 7.0345e-5 my; lognormal SD95 3.3302
  (4,4,1,3,4,5,BU:3); estimation based on track demand per Gtkm for CH (3,31E-8km/Gtkm) and the specific gross transport performance per tkm (Gtkm/tkm)); SBB Zahlen und Fakten 2014, UIC Statistic 2012
- Disposal, railway track [CH]: 7.0345e-5 my; lognormal SD95 3.3302
  (4,4,1,3,4,5,BU:3); same demand as for rail track; SBB Zahlen und Fakten 2014, UIC Statistic 2012
- Operation, maintenance, railway track [CH]: 7.0345e-5 my; lognormal SD95 3.3302
  (same comment as for Disposal, railway track)
- Disposal, locomotive [RER]: 4.81e-10 p; lognormal SD95 3.3302
  (4,4,1,3,4,5,BU:3); same demand as for locomotive; SBB Zahlen und Fakten 2014, UIC Statistic 2012
- Maintenance, locomotive [RER]: 4.81e-10 p; lognormal SD95 3.3302
  (same comment as for Disposal, locomotive)

## Emissions to nature
- Cadmium [emissions to air, unspecified]: 7.5197e-12 kg; lognormal SD95 5.8985
  (4,3,2,5,5,5,BU:5); emission factor of diesel: 1,00E-5 g/kg diesel, assuming no use of particle filters; EMEP/EEA guidebook 2013, 1.A.2.f.ii, Tab. 3-1
- Acrolein [emissions to air, unspecified]: 7.0045e-8 kg; lognormal SD95 2.3413
  (4,3,2,5,5,5,BU:1.5); emission factor of diesel: 9,31E-2 g/kg diesel, assuming no use of particle filters; BAFU 2015: Non-road database; EMEP/EEA guidebook 2013, Tab. 3-124
- Heptane [emissions to air, unspecified]: 1.1872e-8 kg; lognormal SD95 2.3413
  (4,3,2,5,5,5,BU:1.5); emission factor of diesel: 1,58E-2 g/kg diesel, assuming no use of particle filters; BAFU 2015: Non-road database; EMEP/EEA guidebook 2013, Tab. 3-116
- Lead [emissions to air, unspecified]: 3.9102e-11 kg; lognormal SD95 5.8985
  (4,3,2,5,5,5,BU:5); emission factor of diesel: 5,20E-5 g/kg diesel, assuming no use of particle filters; EMEP/EEA guidebook 2013, 1.A.2.f.ii, Tab. 3-12
- Heat, waste [emissions to air, unspecified]: 0.032184, 0.12264 MJ (2 entries); lognormal SD95 2.1158
  (4,3,2,5,5,5,BU:1.05); default value;
- Dinitrogen monoxide [emissions to air, unspecified]: 1.1709e-7 kg; lognormal SD95 2.3413
  (4,3,2,5,5,5,BU:1.5); emission factor of diesel: 1,56E-1 g/kg diesel, assuming no use of particle filters; BAFU 2015: non road emission factor database
- Benzene [emissions to air, unspecified]: 5.3224e-9 kg; lognormal SD95 3.7772
  (4,3,2,5,5,5,BU:3); emission factor of diesel: 7,08E-3 g/kg diesel, assuming no use of particle filters; BAFU 2015: non road emission factor database
- Copper [emissions to air, unspecified]: 1.2783e-9 kg; lognormal SD95 5.8985
  (4,3,2,5,5,5,BU:5); emission factor of diesel: 1,70E-3 g/kg diesel, assuming no use of particle filters; EMEP/EEA guidebook 2013, 1.A.2.f.ii, Tab. 3-1
- Iron [emissions to air, unspecified]: 2.6432e-8 kg; lognormal SD95 5.3787
  (4,4,1,3,4,5,BU:5); estimation based on the emission factors per Gkm of freight transport in Switzerland and specific gross ton kilometric performance per tkm (Gtkm/tkm); Data from ANABEL; Personal correspondence Gunter Adolf, SBB, June 2016; UIC Statistic 2012
- PAH, polycyclic aromatic hydrocarbons [emissions to air, unspecified]: 2.474e-9 kg; lognormal SD95 3.7772
  (4,3,2,5,5,5,BU:3); emission factor of diesel: 3,29E-3 g/kg diesel, assuming no use of particle filters; EMEP/EEA guidebook 2013, 1.A.2.f.ii, Tab. 3-1
- Iron [emissions to soil, industrial]: 9.3821e-9 kg; lognormal SD95 1.8893
  (4,4,1,3,4,5,BU:1.5); estimation based on the emission per Gkm from CH (4,41E-9unit/vkm)) and the average load; Data from ANABEL; Personal correspondence Gunter Adolf, SBB, June 2016; UIC Statistic 2012
- Acetaldehyde [emissions to air, unspecified]: 1.8085e-7 kg; lognormal SD95 2.3413
  (4,3,2,5,5,5,BU:1.5); emission factor of diesel: 2,41E-1 g/kg diesel, assuming no use of particle filters; BAFU 2015: Non-road database; EMEP/EEA guidebook 2013, Tab. 3-122
- Lead [emissions to air, unspecified]: 4.8545e-12 kg; lognormal SD95 5.3787
  (4,4,1,3,4,5,BU:5); estimation based on the emission per Gkm from CH (kg/pkmunit/vkm)) and the average load; Data from ANABEL; Personal correspondence Gunter Adolf, SBB, June 2016; UIC Statistic 2012
- Chromium VI [emissions to air, unspecified]: 7.5197e-14 kg; lognormal SD95 5.8985
  (4,3,2,5,5,5,BU:5); emission factor of diesel: 1,00E-7 g/kg diesel, assuming no use of particle filters; EMEP/EEA guidebook 2013, 1.A.2.f.ii, Tab. 3-1
- Particulates, > 10 um [emissions to air, unspecified]: 5.5111e-8 kg; lognormal SD95 2.3413
  (4,3,2,5,5,5,BU:1.5); emission factor of diesel: 7,33E-2 g/kg diesel, assuming no use of particle filters; BAFU 2015: non road emission factor database
- Chromium [emissions to air, unspecified]: 3.7598e-11 kg; lognormal SD95 5.8985
  (4,3,2,5,5,5,BU:5); emission factor of diesel: 5,00E-5 g/kg diesel, assuming no use of particle filters; EMEP/EEA guidebook 2013, 1.A.2.f.ii, Tab. 3-1
- Butane [emissions to air, unspecified]: 5.936e-9 kg; lognormal SD95 2.3413
  (4,3,2,5,5,5,BU:1.5); emission factor of diesel: 7,89E-3 g/kg diesel, assuming no use of particle filters; BAFU 2015: Non-road database; EMEP/EEA guidebook 2013, Tab. 3-114
- Mercury [emissions to air, unspecified]: 3.9854e-12 kg; lognormal SD95 5.8985
  (4,3,2,5,5,5,BU:5); emission factor of diesel: 5,30E-6 g/kg diesel, assuming no use of particle filters; EMEP/EEA guidebook 2013, 1.A.2.f.ii, Tab. 3-1
- Propane [emissions to air, unspecified]: 3.9573e-9 kg; lognormal SD95 2.3413
  (4,3,2,5,5,5,BU:1.5); emission factor of diesel: 5,26E-3 g/kg diesel, assuming no use of particle filters; BAFU 2015: Non-road database; EMEP/EEA guidebook 2013, Tab. 3-113
- Nickel [emissions to air, unspecified]: 5.2638e-11 kg; lognormal SD95 5.8985
  (4,3,2,5,5,5,BU:5); emission factor of diesel: 7,00E-5 g/kg diesel, assuming no use of particle filters; EMEP/EEA guidebook 2013, 1.A.2.f.ii, Tab. 3-1
- o-Xylene [emissions to air, unspecified]: 1.5829e-8 kg; lognormal SD95 2.3413
  (4,3,2,5,5,5,BU:1.5); emission factor of diesel: 2,11E-2 g/kg diesel, assuming no use of particle filters; BAFU 2015: Non-road database; EMEP/EEA guidebook 2013, Tab. 3-120
- Particulates, > 2.5 um, and < 10um [emissions to air, unspecified]: 5.3698e-8 kg; lognormal SD95 2.7723
  (4,3,2,5,5,5,BU:2); emission factor of diesel: 7,14E-2 g/kg diesel, assuming no use of particle filters; BAFU 2015: non road emission factor database
- Ethane [emissions to air, unspecified]: 1.1872e-9 kg; lognormal SD95 2.3413
  (4,3,2,5,5,5,BU:1.5); emission factor of diesel: 1,58E-3 g/kg diesel, assuming no use of particle filters; BAFU 2015: Non-road database; EMEP/EEA guidebook 2013, Tab. 3-112
- NMVOC, non-methane volatile organic compounds, unspecified origin [emissions to air, unspecified]: 3.2146e-6 kg; lognormal SD95 2.3413
  (4,3,2,5,5,5,BU:1.5); emission factor of diesel: 4,27E+0 g/kg diesel, assuming no use of particle filters; non road emission factor
- Carbon monoxide, fossil [emissions to air, unspecified]: 1.9312e-5 kg; lognormal SD95 5.8985
  (4,3,2,5,5,5,BU:5); emission factor of diesel: 2,57E+1 g/kg diesel, assuming no use of particle filters; BAFU 2015: non road emission factor database
- Chromium [emissions to soil, industrial]: 1.6413e-11 kg; lognormal SD95 1.8893
  (4,4,1,3,4,5,BU:1.5); estimation based on the emission per Gkm from CH (kg/pkmunit/vkm)) and the average load; Data from ANABEL; Personal correspondence Gunter Adolf, SBB, June 2016; UIC Statistic 2012
- Zinc [emissions to soil, industrial]: 1.0186e-11 kg; lognormal SD95 1.8893
  (4,4,1,3,4,5,BU:1.5); estimation based on the emission per Gkm from CH (0,00E+0unit/vkm)) and the average load; Data from ANABEL; Personal correspondence Gunter Adolf, SBB, June 2016; UIC Statistic 2012
- Manganese [emissions to soil, industrial]: 4.0364e-11 kg; lognormal SD95 1.8893
  (same comment as for Chromium)
- Toluene [emissions to air, unspecified]: 3.9573e-10 kg; lognormal SD95 2.3413
  (4,3,2,5,5,5,BU:1.5); emission factor of diesel: 5,26E-4 g/kg diesel, assuming no use of particle filters; BAFU 2015: Non-road database; EMEP/EEA guidebook 2013, Tab. 3-118
- Zinc [emissions to water, unspecified]: 2.7881e-10 kg; lognormal SD95 5.3787
  (4,4,1,3,4,5,BU:5); estimation based on the emission per Gkm from CH (0,00E+0unit/vkm)) and the average load; Data from ANABEL; Personal correspondence Gunter Adolf, SBB, June 2016; UIC Statistic 2012
- Nitrogen oxides [emissions to air, unspecified]: 3.4915e-5 kg; lognormal SD95 2.3413
  (4,3,2,5,5,5,BU:1.5); emission factor of diesel: 4,64E+1 g/kg diesel, assuming no use of particle filters; BAFU 2015: non road emission factor database
- Antimony [emissions to air, unspecified]: 1.4553e-11 kg; lognormal SD95 5.3787
  (same comment as for Lead)
- Arsenic [emissions to air, unspecified]: 7.5197e-14 kg; lognormal SD95 5.8985
  (same comment as for Chromium VI)
- Formaldehyde [emissions to air, unspecified]: 3.3242e-7 kg; lognormal SD95 2.3413
  (4,3,2,5,5,5,BU:1.5); emission factor of diesel: 4,42E-1 g/kg diesel, assuming no use of particle filters; BAFU 2015: Non-road database; EMEP/EEA guidebook 2013, Tab. 3-121
- m-Xylene [emissions to air, unspecified]: 3.8782e-8 kg; lognormal SD95 2.3413
  (4,3,2,5,5,5,BU:1.5); emission factor of diesel: 5,16E-2 g/kg diesel, assuming no use of particle filters; BAFU 2015: Non-road database; EMEP/EEA guidebook 2013, Tab. 3-119
- Sulfur dioxide [emissions to air, unspecified]: 1.5039e-8 kg; lognormal SD95 2.1158
  (4,3,2,5,5,5,BU:1.05); emission factor of diesel: 2,00E-2 g/kg diesel, assuming no use of particle filters; HBEFA 3.1., CH
- Particulates, < 2.5 um [emissions to air, unspecified]: 1.3043e-6 kg; lognormal SD95 3.7772
  (4,3,2,5,5,5,BU:3); emission factor of diesel: 1,73E+0 g/kg diesel, assuming no use of particle filters; BAFU 2015: non road emission factor database
- Zinc [emissions to air, unspecified]: 7.5197e-10 kg; lognormal SD95 5.8985
  (4,3,2,5,5,5,BU:5); emission factor of diesel: 1,00E-3 g/kg diesel, assuming no use of particle filters; EMEP/EEA guidebook 2013, 1.A.2.f.ii, Tab. 3-1
- Carbon dioxide, fossil [emissions to air, unspecified]: 0.0023688 kg; lognormal SD95 2.1158
  (4,3,2,5,5,5,BU:1.05); emission factor of diesel: 3,15E+3 g/kg diesel, assuming no use of particle filters; BAFU 2015: non road emission factor database
- Selenium [emissions to air, unspecified]: 7.5197e-12 kg; lognormal SD95 5.8985
  (same comment as for Cadmium)
- Oils, unspecified [emissions to soil, industrial]: 3.0741e-9 kg; lognormal SD95 1.8893
  (4,4,1,3,4,5,BU:1.5); hydro carbon emissions assumed as oil emission; Data from ANABEL; Personal correspondence Gunter Adolf, SBB, June 2016; UIC Statistic 2012
- Lead [emissions to soil, industrial]: 1.7231e-12 kg; lognormal SD95 1.8893
  (same comment as for Chromium)
- Benzo(a)pyrene [emissions to air, unspecified]: 2.2559e-11 kg; lognormal SD95 3.7772
  (4,3,2,5,5,5,BU:3); emission factor of diesel: 3,00E-5 g/kg diesel, assuming no use of particle filters; EMEP/EEA guidebook 2013, 1.A.2.f.ii, Tab. 3-1
- Pentane [emissions to air, unspecified]: 2.3744e-9 kg; lognormal SD95 2.3413
  (4,3,2,5,5,5,BU:1.5); emission factor of diesel: 3,16E-3 g/kg diesel, assuming no use of particle filters; BAFU 2015: Non-road database; EMEP/EEA guidebook 2013, Tab. 3-115
- Benzaldehyde [emissions to air, unspecified]: 5.4216e-8 kg; lognormal SD95 2.3413
  (4,3,2,5,5,5,BU:1.5); emission factor of diesel: 7,21E-2 g/kg diesel, assuming no use of particle filters; BAFU 2015: Non-road database; EMEP/EEA guidebook 2013, Tab. 3-123
- Copper [emissions to water, unspecified]: 2.9223e-11 kg; lognormal SD95 3.3302
  (4,4,1,3,4,5,BU:3); estimation based on the emission per Gkm from CH (0,00E+0unit/vkm)) and the average load; Data from ANABEL; Personal correspondence Gunter Adolf, SBB, June 2016; UIC Statistic 2012
- Manganese [emissions to air, unspecified]: 1.1372e-10 kg; lognormal SD95 5.3787
  (same comment as for Lead)
- Antimony [emissions to soil, industrial]: 5.1655e-12 kg; lognormal SD95 1.8893
  (same comment as for Chromium)
- Methane, fossil [emissions to air, unspecified]: 4.258e-8 kg; lognormal SD95 2.3413
  (4,3,2,5,5,5,BU:1.5); emission factor of diesel: 5,66E-2 g/kg diesel, assuming no use of particle filters; BAFU 2015: non road emission factor database
- Noise, rail, freight train [non material emissions, unspecified]: 1 tkm; lognormal SD95 2.3193
  (3,3,3,5,5,5,BU:1.5); ; Ecological Scarcity method 2013; Frischknecht & Büsser Knöpfel 2013
- Ammonia [emissions to air, unspecified]: 7.5197e-9 kg; lognormal SD95 2.1592
  (4,3,2,5,5,5,BU:1.2); emission factor of diesel: 1,00E-2 g/kg diesel, assuming no use of particle filters; EMEP/EEA guidebook 2013, 1.A.3.c, Tab. 3-3
- Chromium [emissions to air, unspecified]: 4.624e-11 kg; lognormal SD95 5.3787
  (same comment as for Lead)
- Copper [emissions to air, unspecified]: 2.9119e-10 kg; lognormal SD95 5.3787
  (same comment as for Zinc)
- Styrene [emissions to air, unspecified]: 2.2161e-8 kg; lognormal SD95 2.3413
  (4,3,2,5,5,5,BU:1.5); emission factor of diesel: 2,95E-2 g/kg diesel, assuming no use of particle filters; BAFU 2015: Non-road database; EMEP/EEA guidebook 2013, Tab. 3-125
- Copper [emissions to soil, industrial]: 1.0336e-10 kg; lognormal SD95 1.8893
  (same comment as for Zinc)
- Zinc [emissions to air, unspecified]: 2.8696e-11 kg; lognormal SD95 5.3787
  (same comment as for Zinc)

## Sampling procedure
Statistics

## Extrapolations
For the determination of the train and rail track demand per tkm date of Switzerland was used and extrapolated with the sum of tkm of DE, AT, TI, FR and CH

## Sources
- Krebs L., Frischknecht R., 2020, 2020 - Update Mobitool 2020 - Krebs, Project report, 713, treeze Ltd., Uster, CH
L. Krebs, R. Frischknecht (2020) Aktualisierung Ökobilanzdaten mobitool 2020, Teil 1. Project report. Volume: 713. treeze Ltd.. Uster, CH.
Type: Separate publication
Source: Report
First author: L. Krebs
Other authors: R. Frischknecht
Year: 2020
Title of anthology: Project report
Place of publication: Uster, CH
Publisher: treeze Ltd.
Volume No: 713

## Validation
Proof reading validation: 10.11.2020; Other validation: G:\Projekte laufend\713 Aktualisierung mobitool 2020\EcoSpold\[713-Transport-Train-freight-average_RER_EIV2_v0.1.xlsx]X-Process;
