# Heat, biomethane, at diffusion absorption heat pump 15kW

Dataset: EcoSpold 1, unit process
Functional unit: 1 MJ
Category: heat / heat pumps\heating systems
Geography: CH
Time period: 2007-01 to 2020-12
Generated by: Livia Waldburger
accessRestrictedTo: 0
copyright: true

## General comment
Heat from diffusion absorption heat pump 15kW with heat source from borehole and energy input from biogas. The process is based on a 4kW diffusion absorption heat pump, assuming there is no significant difference of the input material for the heat output at 15kW per MJ. The captured uncertainties covers the possible difference.;

## Included processes
Included are the share of the production of the diffusion absorption heat pump with a lifetime of 20years scaled for 1MJ. Also the share of the borehole for 1MJ is part of this process.

## Geography
Data apply to the supply in Switzerland.

## Time period
Time of publications.

## Reference product
- Heat, biomethane, at diffusion absorption heat pump 15kW [CH]: 1 MJ
  SWITZERLAND

## Inputs from technosphere
- Methane, 96 vol-%, from biogas, low pressure, at consumer [CH]: 0.75758 MJ; lognormal SD95 1.2451
  (2,4,2,2,1,5,BU:1.05); ;
- Diffusion absorption heat pump 4kW, future [CH]: 6.01e-7 p; lognormal SD95 3.1047
  (4,4,2,2,1,5,BU:3); ;
- Borehole heat exchanger, 300m [CH]: 1.7637e-7 p; lognormal SD95 3.1047
  (4,4,2,2,1,5,BU:3); ;
- Electricity, low voltage, at grid [CH]: 0.0055556 kWh; lognormal SD95 1.6773
  (4,5,2,2,4,5,BU:1.05); ;

## Inputs from nature
- Energy, geothermal, converted [resources, in ground]: 0.24242 MJ; lognormal SD95 1.2637
  (3,4,2,2,1,5,BU:1.05); ;

## Emissions to nature
- Sulfur dioxide [emissions to air, high. pop.]: 3.79e-7 kg; lognormal SD95 1.6265
  (4,3,2,2,4,5,BU:1.05); ;
- Benzene [emissions to air, high. pop.]: 3.03e-7 kg; lognormal SD95 3.3218
  (4,3,2,2,4,5,BU:3); ;
- Heat, waste [emissions to air, high. pop.]: 0.818 MJ; lognormal SD95 1.2637
  (3,4,2,2,1,5,BU:1.05); ;
- Sulfite [emissions to water, river]: 3.79e-8 kg; lognormal SD95 1.8802
  (4,3,2,2,4,5,BU:1.5); ;
- Dioxin, 2,3,7,8 Tetrachlorodibenzo-p- [emissions to air, high. pop.]: 2.27e-17 kg; lognormal SD95 3.3218
  (4,3,2,2,4,5,BU:3); ;
- Carbon monoxide, biogenic [emissions to air, high. pop.]: 0.0424 kg; lognormal SD95 5.369
  (4,3,2,2,4,5,BU:5); ;
- Particulates, < 2.5 um [emissions to air, high. pop.]: 7.58e-8 kg; lognormal SD95 3.3218
  (4,3,2,2,4,5,BU:3); ;
- Nitrite [emissions to water, river]: 2.27e-9 kg; lognormal SD95 1.8802
  (4,3,2,2,4,5,BU:1.5); ;
- Lead [emissions to air, high. pop.]: 1.14e-12 kg; lognormal SD95 5.369
  (4,3,2,2,4,5,BU:5); ;
- PAH, polycyclic aromatic hydrocarbons [emissions to air, high. pop.]: 7.58e-9 kg; lognormal SD95 3.3218
  (4,3,2,2,4,5,BU:3); ;
- Nitrogen oxides [emissions to air, high. pop.]: 3.79e-6 kg; lognormal SD95 1.8802
  (4,3,2,2,4,5,BU:1.5); ;
- Toluene [emissions to air, high. pop.]: 1.52e-7 kg; lognormal SD95 1.8802
  (4,3,2,2,4,5,BU:1.5); ;
- Nitrate [emissions to water, river]: 9.85e-8 kg; lognormal SD95 1.8802
  (4,3,2,2,4,5,BU:1.5); ;
- Methane, fossil [emissions to air, high. pop.]: 4.55e-6 kg; lognormal SD95 1.8802
  (4,3,2,2,4,5,BU:1.5); ;
- Cadmium [emissions to air, high. pop.]: 1.89e-13 kg; lognormal SD95 5.369
  (4,3,2,2,4,5,BU:5); ;
- Dinitrogen monoxide [emissions to air, high. pop.]: 2.9e-8 kg; lognormal SD95 1.8802
  (4,3,2,2,4,5,BU:1.5); ;
- Sulfate [emissions to water, river]: 3.79e-8 kg; lognormal SD95 1.8802
  (4,3,2,2,4,5,BU:1.5); ;
- Acetic acid [emissions to air, high. pop.]: 1.14e-7 kg; lognormal SD95 1.8802
  (4,3,2,2,4,5,BU:1.5); ;
- Benzo(a)pyrene [emissions to air, high. pop.]: 4.24e-13 kg; lognormal SD95 3.3218
  (4,3,2,2,4,5,BU:3); ;
- Mercury [emissions to air, high. pop.]: 7.58e-11 kg; lognormal SD95 5.369
  (4,3,2,2,4,5,BU:5); ;
- Pentane [emissions to air, high. pop.]: 9.09e-7 kg; lognormal SD95 1.8802
  (4,3,2,2,4,5,BU:1.5); ;
- Propionic acid [emissions to air, high. pop.]: 1.52e-8 kg; lognormal SD95 1.8802
  (4,3,2,2,4,5,BU:1.5); ;
- Carbon dioxide, biogenic [emissions to air, high. pop.]: 1.06e-5 kg; lognormal SD95 1.6265
  (4,3,2,2,4,5,BU:1.05); ;
- Formaldehyde [emissions to air, high. pop.]: 7.58e-8 kg; lognormal SD95 1.8802
  (4,3,2,2,4,5,BU:1.5); ;
- Propane [emissions to air, high. pop.]: 1.52e-7 kg; lognormal SD95 1.8802
  (4,3,2,2,4,5,BU:1.5); ;
- Ammonia [emissions to air, high. pop.]: 7.58e-10 kg; lognormal SD95 1.6773
  (4,3,2,2,4,5,BU:1.2); ;
- Butane [emissions to air, high. pop.]: 5.3e-7 kg; lognormal SD95 1.8802
  (4,3,2,2,4,5,BU:1.5); ;
- Acetaldehyde [emissions to air, high. pop.]: 7.58e-10 kg; lognormal SD95 1.8802
  (4,3,2,2,4,5,BU:1.5); ;

## Sampling procedure
heat efficieny based on literature

## Sources
- Kaegi T., Waldburger L., Kern C., Roberts G., Zschokke M., Conte F., Weber L., 2021, 2021 - LCI heating systems - Kaegi, Carbotech im Auftrag des BAFU, Carbotech AG, Zuerich, CH
Kägi Thomas, Livia Waldburger, Cyril Kern, Gavin Roberts, Mischa Zschokke, Flora Conte, Lea Weber (2020) LCI of heating systems. Carbotech im Auftrag des BAFU. Carbotech AG. Zürich. CH.
Type: Separate publication
Source: Report
First author: Kägi Thomas
Other authors: Livia Waldburger, Cyril Kern, Gavin Roberts, Mischa Zschokke, Flora Conte, Lea Weber
Year: 2020
Title of anthology: Carbotech im Auftrag des BAFU
Place of publication: Zürich. CH
Publisher: Carbotech AG

## Validation
Proof reading validation: 19.02.2021; Other validation: Z:\Schreibtisch\WinShare\BAFU Heizsysteme\A_zum konvertieren\WP\[EcoSpold_heat biogas at diffusion absorption heat pump_15kW_v0.1_lwa.xlsx]X-Process;
