# Battery cell, Li-ion, NMC111

Dataset: EcoSpold 1, unit process
Functional unit: 1 kg
Category: electronics / batteries
Geography: GLO
Time period: 2023-01 to 2029-12
Synonyms: Batteriezelle; Li-ion; NMC111
Generated by: Lugas Raka Adrianto, Maulana Permana Ajie, Didier Beloin-Saint-Pierre
accessRestrictedTo: 0
copyright: true

## General comment
The activity starts with the battery cells, module packaging and the materials for additional components (esternal case, tabs, etc.) entering the factory gate. The activity ends with the production of Li-ion battery pack.;

## Included processes
This dataset represents the production of 1 kg of Li-ion battery pack used e.g. for mechanical drive of an electric vehicle or portable consumer electronics. The inventory is modelled according to the publication of Dai et al. (2019), in which a battery pack with gross pack energy of 23.5 kWh made of 140 3.6 V- 46Ah prismatic cells is presented. Cells are made of nickel-manganese-cobalt (NMC111) cathode and a graphite-based anode, liquid electrolyte and a porous plastic separator. Infrastructure is included as well in this dataset as "electronic component factory". This dataset is a copy of the corresponding regional dataset. Production volume was adjusted.
None;

## Geography
Data for global average battery cells.

## Technology
Battery cells, lithium ion battery, NMC 111

## Reference product
- Battery cell, Li-ion, NMC111 [GLO]: 1 kg

## Inputs from technosphere
- Aluminium collector foil production, for Li-ion battery [GLO]: 0.03 kg; lognormal SD95 1.23
  (2,2,1,4,2,5,BU:1.05); Literature. Crenna, 2021 and SI.
- Aluminium, production mix, wrought alloy, at plant [RER]: 0.0283 kg; lognormal SD95 1.23
  (2,2,1,4,2,5,BU:1.05); Literature. Crenna, 2021 and SI.
- Anode, graphite, for Li-ion battery [GLO]: 0.2 kg; lognormal SD95 1.26
  (2,2,3,4,2,5,BU:1.05); Ellingsen, 2014 supporting information and Crenna, 2021
- Separator, lithium-ion battery, at plant [RAS]: 0.02 kg; lognormal SD95 1.26
  (2,2,3,4,2,5,BU:1.05); Ellingsen, 2014 supporting information and Crenna, 2021
- Cathode, lithium-ion battery, NMC111 [GLO]: 0.41 kg; lognormal SD95 1.26
  (2,2,3,4,2,5,BU:1.05); Ellingsen, 2014 supporting information and Crenna, 2021
- Chemical plant, organics [RER]: 4e-10 p; lognormal SD95 3.06
  (2,2,1,4,2,5,BU:3.00); Literature. Crenna, 2021 and SI.
- Copper collector foil production, for Li-ion battery [GLO]: 0.12 kg; lognormal SD95 1.23
  (2,2,1,4,2,5,BU:1.05); Literature. Crenna, 2021 and SI.
- Copper, primary, at refinery [GLO]: 0.0335 kg; lognormal SD95 1.23
  (2,2,1,4,2,5,BU:1.05); Literature. Crenna, 2021 and SI.
- District heat, at consumer, natural gas in industrial furnace 1MW [CH]: 12.51 MJ; lognormal SD95 1.23
  (2,2,1,4,2,5,BU:1.05); Literature. Crenna, 2021 and SI.
- Electrolyte, LiPF6, at plant [RAS]: 0.146 kg; lognormal SD95 1.26
  (2,2,3,4,2,5,BU:1.05); Ellingsen, 2014 supporting information
- Electricity, medium voltage, production RAS, at grid [RAS]: 1.1875 kWh; lognormal SD95 1.23
  (2,2,1,4,2,5,BU:1.05); Literature. Crenna, 2021 and SI.
- Extrusion, plastic film [RER]: 0.0041 kg; lognormal SD95 1.23
  (2,2,1,4,2,5,BU:1.05); Literature. Crenna, 2021 and SI.
- Polyethylene terephthalate, granulate, amorphous, at plant [RER]: 0.00283 kg; lognormal SD95 1.23
  (2,2,1,4,2,5,BU:1.05); Literature. Crenna, 2021 and SI.
- Polypropylene, granulate, at plant [RER]: 0.0013 kg; lognormal SD95 1.23
  (2,2,1,4,2,5,BU:1.05); Literature. Crenna, 2021 and SI.
- Sheet rolling, aluminium [RER]: 0.0283 kg; lognormal SD95 1.23
  (2,2,1,4,2,5,BU:1.05); Literature. Crenna, 2021 and SI.
- Sheet rolling, copper [RER]: 0.0335 kg; lognormal SD95 1.23
  (2,2,1,4,2,5,BU:1.05); Literature. Crenna, 2021 and SI.
- Transport, freight, rail [RER]: 0.0153 tkm; lognormal SD95 2.06
  (2,2,1,4,2,5,BU:2.00); Literature. Crenna, 2021 and SI
- Transport, freight, lorry, 3.5t gross weight, fleet average [RER]: 0.0096 tkm; lognormal SD95 2.06
  (2,2,1,4,2,5,BU:2.00); Literature. Crenna, 2021 and SI
- Transport, freight, lorry, fleet average [RER]: 0.31 tkm; lognormal SD95 2.06
  (2,2,1,4,2,5,BU:2.00); Literature. Crenna, 2021 and SI
- Transport, transoceanic container ship [OCE]: 0.7368 tkm; lognormal SD95 2.06
  (2,2,1,4,2,5,BU:2.00); Literature. Crenna, 2021 and SI

## Emissions to nature
- Heat, waste [emissions to air, high. pop.]: 100 MJ; lognormal SD95 1.26
  (2,2,3,4,2,5,BU:1.05); Ellingsen, 2014 supporting information

## Sampling procedure
Literature & own estimations

## Sources
- Raka Adrianto L., Permana Ajie M., Beloin-Saint-Pierre D., 2024, 2024 - LCI ICT sector - Raka Adrianto, Empa, St. Gallen, CH

## Validation
Proof reading validation: Passed, Other validation: none, Validator: Mischa Zschokke, Company: Carbotech, Country: CH
