# Diode, unspecified, at plant

Dataset: EcoSpold 1, unit process
Functional unit: 1 kg
Category: electronics / component
Geography: GLO
Time period: 2023-01 to 2029-12
Generated by: Lugas Raka Adrianto, Maulana Permana Ajie, Didier Beloin-Saint-Pierre
accessRestrictedTo: 0
copyright: false

## General comment
This module represents an unweighted average of all specific diode (and LED) datasets represented in the ecoinvent database. No specific updates were made in 2023, as there is no detailed market share data.;

## Included processes
This dataset covers raw material input and production efforts for the production of current diodes.

## Geography
Data represent global valuable composition data for diodes.

## Technology
average diode production technology, comprising the diode wafer production (cleaing, masking, etching, doping, oxidising, metal deposition) and the final assembly of the diode (wafer sawing, die bonding, moulding, trimming and forming)

## Reference product
- Diode, unspecified, at plant [GLO]: 1 kg
  Global

## Inputs from technosphere
- Diode, glass-, SMD type, surface mounting, at plant [GLO]: 0.33333 kg; lognormal SD95 1.89
  (5,4,4,1,4,5,BU:1.03); assumption, based on specific data
- Diode, glass-, through-hole mounting, at plant [GLO]: 0.33333 kg; lognormal SD95 1.89
  (5,4,4,1,4,5,BU:1.03); assumption, based on specific data
- Light emitting diode, LED, at plant [GLO]: 0.33333 kg; lognormal SD95 1.89
  (5,4,4,1,4,5,BU:1.03); assumption, based on specific data

## Sampling procedure
Literature & own estimations

## Extrapolations
see Geography and General Comments

## Sources
- Raka Adrianto L., Permana Ajie M., Beloin-Saint-Pierre D., 2024, 2024 - LCI ICT sector - Raka Adrianto, Empa, St. Gallen, CH

## Validation
Proof reading validation: Passed, Other validation: none, Validator: Mischa Zschokke, Company: Carbotech, Country: CH
