# Motorbike, gasoline, 11-35kW, EURO-3, 2006

Dataset: EcoSpold 1, unit process
Functional unit: 1 p
Category: transport systems / road\Transformation\Infrastructure
Geography: CH
Time period: 2006-01 to 2006-12
Generated by: Romain Sacchi
accessRestrictedTo: 0
copyright: False

## General comment
Power: 20 kW. Lifetime: 38500 km. Annual kilometers: 2405 km. Number of passengers: 1.1. Curb mass: 160 kg. Lightweighting of glider: -5%. Emission standard: EURO-3. Service visits throughout lifetime: 1.5. Range: 322 km. Fuel tank capacity: 133.1 kWh. Fuel mass: 11.3 kg. Origin of manufacture: China. Shipping distance: 15900 km. Lorry distribution distance: 1000 km. Source: Sacchi R., Bauer C. Life cycle inventories for on-road vehicles. Paul Scherrer Institut, 2023. DOI: 10.5281/zenodo.5156043.

## Time period
EURO-3 emissions standards apply to two and three wheel vehicle registrations from 2006-01 until 2015-12. Vehicle lightweighting factors match manufacture year of 2006

## Reference product
- Motorbike, gasoline, 11-35kW, EURO-3, 2006 [CH]: 1 p

## Inputs from technosphere
All rows: lognormal SD95 1.09366
- Scooter, ICE, at regional storage [RER]: 0.9, 0.689 p (2 entries)
  Uncertainty from pedigree matrix: (2, 3, 2, 1, 1, 3)
- Polyethylene, HDPE, granulate, at plant [RER]: 1.69 kg
  Uncertainty from pedigree matrix: (2, 3, 2, 1, 1, 3)
- Injection moulding [RER]: 1.7 kg
  Uncertainty from pedigree matrix: (2, 3, 2, 1, 1, 3)
- Transport, freight, lorry, 16t-32t gross weight, fleet average [RER]: 160 tkm
  Uncertainty from pedigree matrix: (2, 3, 2, 1, 1, 3)
- Transport, transoceanic container ship [OCE]: 2540 tkm
  Uncertainty from pedigree matrix: (2, 3, 2, 1, 1, 3)
- Disposal, scooter [CH]: 1.6 p
  Uncertainty from pedigree matrix: (2, 3, 2, 1, 1, 3)

## Sources
- Sacchi R., Bauer C., 2023, 2023 - LCI on-road vehicles - Sacchi, PSI, Villigen, CH
doi: 10.5281/ZENODO.5156043
