# Door frame, inner, steel, at plant

Dataset: EcoSpold 1, unit process
Functional unit: 1 m2
Category: building components / doors
Geography: CH
Time period: 2018-01 to 2019-12
Generated by: Livia Ramseier
accessRestrictedTo: 0
copyright: true

## General comment
Data are based on a door leaf of 0.9m x 2m and scaled to 1m2 door. 1m2 of steel door frame weighs 12kg. The bill of materials is based on data from door manufactures and Werner et al. 1997.;

## Included processes
Included are the materials used in an inner steel door frame (without surface treatment). Production losses and the transport of the materials are also included.

## Geography
Data apply to the supply in Switzerland.

## Technology
Industry data.

## Time period
Time of publications.

## Reference product
- Door frame, inner, steel, at plant [CH]: 1 m2
  SWITZERLAND

## Inputs from technosphere
- Transport, freight, rail, electricity with shunting [CH]: 7.2389 tkm; lognormal SD95 2.0296
  (3,3,1,1,1,4,BU:2); Transportation to production site; Average of data from manufacturers or Frischknecht et al. 2007
- Transport, freight, lorry, fleet average [CH]: 0.60324 tkm; lognormal SD95 2.0296
  (same comment as for Transport, freight, rail, electricity with shunting)
- Steel product manufacturing, average metal working [RER]: 12.065 kg; lognormal SD95 1.1635
  (3,3,1,1,1,4,BU:1.05); Processing of steel frame; Average of data from manufacturers and Werner et al. 1997
- Steel sheet, uncoated, recycling share 2000 (37% Rec.) [CH]: 12.065 kg; lognormal SD95 1.1635
  (3,3,1,1,1,4,BU:1.05); Steel frame; Average of data from manufacturers and Werner et al. 1997

## Sampling procedure
Data survey at 2 door producers in Switzerland. In addition the data from Werner et al. 1997 were used.

## Extrapolations
Some generic datasets from ecoinvent have been used.

## Sources
- Ramseier L., Stolz P., Frischknecht R., 2020, 2020 - LCA wooden windows and doors - Ramseier, Project report, 634, treeze Ltd., Uster, CH
Ramseier L., Stolz P., Frischknecht R. (2020) Ökobilanz von Holzfenstern und Holztüren. Project report. Volume: 634. treeze Ltd.. Uster, CH.
Type: Separate publication
Source: Report
First author: Ramseier L.
Other authors: Stolz P., Frischknecht R.
Year: 2020
Title of anthology: Project report
Place of publication: Uster, CH
Publisher: treeze Ltd.
Volume No: 634

## Validation
Proof reading validation: 16.06.2021; Other validation: G:\Projekte laufend\634 Holzfenster u.-türen, energieSchweiz\EcoSpold\UVEK2021\[634_EcoSpold_Türen_v1.5_UVEK2021_v0.1.xlsx]X-Process;
