# Sodium dichromate, at plant

Dataset: EcoSpold 1, unit process
Functional unit: 1 kg
Category: chemicals / inorganic
Geography: RER
Time period: 2000-01 to 2000-12
Generated by: Mike Chudacoff
accessRestrictedTo: 0
copyright: true

## General comment
Sodium dichromate, produced by the sulfuric acid process. The electrolysis production process is not included here, therefore the data quality is considered poor.;
CAS number: 010588-01-9;
Formula: Na2Cr2O7;

## Included processes
Included are the raw material, as well as the energy and auxillaries input are taken into account togehter with air emissions and waste. Transports and infrastructure are estimated. No water emissions are taken into account.

## Technology
based on literature data on the acidification process, taken from plant data in Europe and North America

## Reference product
- Sodium dichromate, at plant [RER]: 1 kg
  Europe

## Inputs from technosphere
- Chemical plant, organics [RER]: 4e-10 p; lognormal SD95 1.3
  (4,5,1,1,1,4); infrastructure
- Heat, unspecific, in chemical plant [RER]: 12.8 MJ; lognormal SD95 1.2
  (4,3,1,1,1,4); steam production
- Sulphuric acid, liquid, at plant [RER]: 0.41 kg; lognormal SD95 1.1
  (1,3,1,1,1,4); ancillary material
- Transport, freight, lorry, fleet average [RER]: 0.387 tkm; lognormal SD95 1.2
  (4,3,1,1,1,4); transport
- Disposal, residues Na-dichromate prod., 0% water, to residual material landfill [CH]: 1.2 kg; lognormal SD95 1.1
  (1,3,1,1,1,4); residues
- Electricity, medium voltage, production ENTSO-E, at grid: 0.18 kWh; lognormal SD95 1.1
  (1,3,1,1,1,4); power
- Transport, freight, rail [RER]: 3.19 tkm; lognormal SD95 1.2
  (4,3,1,1,1,4); transport
- Transport, transoceanic freight ship [OCE]: 20.7 tkm; lognormal SD95 1.2
  (4,3,1,1,1,4); transport
- Limestone, milled, loose, at plant [CH]: 1.21 kg; lognormal SD95 1.1
  (1,3,1,1,1,4); ancillary material
- Heat, natural gas, at industrial furnace 1MW [CH]: 11.2 MJ; lognormal SD95 1.1
  (1,3,1,1,1,4); fuel
- Soda, powder, at plant [RER]: 1 kg; lognormal SD95 1.1
  (1,3,1,1,1,4); soda
- Chromite, ore concentrate, at beneficiation [GLO]: 1.64 kg; lognormal SD95 1.1
  (1,3,1,1,1,4); chromite ore

## Emissions to nature
All rows: lognormal SD95 1.1
- Heat, waste [emissions to air, high. pop.]: 0.65 MJ
  (1,3,1,1,1,4); waste heat
- Carbon dioxide, fossil [emissions to air, high. pop.]: 1.25 kg
  (1,3,1,1,1,4); emission
- Chromium VI [emissions to water, river]: 4.7e-7 kg
  (1,3,1,1,1,4); wastewater emission
- Chromium [emissions to water, river]: 4e-6 kg
  (1,3,1,1,1,4); wastewater emission
- Particulates, > 2.5 um, and < 10um [emissions to air, high. pop.]: 0.003 kg
  (1,3,1,1,1,4); emission

## Sampling procedure
see technology

## Sources
- Althaus H.-J., Chudacoff M., Hellweg S., Hischier R., Jungbluth N., Osses M., Primas A., 2007, 2007 - LCI chemicals - Althaus, Final report ecoinvent data v2.0, 8, Swiss Centre for LCI, Empa - TSL, ETH, ESU-services Ltd., Chudacoff Oekoscience, Duebendorf, CH
Althaus H.-J., Chudacoff M., Hischier R., Jungbluth N., Osses M., Primas A. (2007) Life Cycle Inventories of Chemicals. Final report ecoinvent data v2.0. Volume: 8. Swiss Centre for LCI, Empa - TSL. Dübendorf, CH.
Type: Measurement on site
Source: CD-ROM
First author: Althaus H.-J.
Other authors: Chudacoff M., Hischier R., Jungbluth N., Osses M., Primas A.
Year: 2007
Title of anthology: Final report ecoinvent data v2.0
Place of publication: Dübendorf, CH
Publisher: Swiss Centre for LCI, Empa - TSL
Volume No: 8

## Validation
Proof reading validation: Passed.; Other validation: none;
