# Drawing of pipes, steel

Dataset: EcoSpold 1, unit process
Functional unit: 1 kg
Category: metals / chipless shaping
Geography: RER
Time period: 2000-01 to 2000-12
Production volume: 3.3 million tonnes in 1996
Share of production covered: 0 %
Generated by: Silvio Blaser
accessRestrictedTo: 0
copyright: true

## General comment
Seamless tube production consists basically of the following manufacturing steps: Heating of the input, Piercing (press-piercing or oblique rolling), Elongation/Stretching, Final Rolling and Heat Treatment.;
Synonyms: drawing of tubes;

## Included processes
The module describes the manufacturing of seamless tubes. It is not representive for welded tubes. It includes 110% of the wire drawing process. Does not include the material being rolled

## Geography
Data-set is representative for European Union

## Technology
Average technique for EU. Because of the lack of data about the production process, it was approximated with the production process of steel wire drawing.

## Reference product
- Drawing of pipes, steel [RER]: 1 kg
  Europe

## Inputs from technosphere
- Wire drawing, steel [RER]: 1.1 kg; lognormal SD95 1.4
  (4,5,1,1,3,3);

## Sampling procedure
Literature and estimation

## Extrapolations
see technology

## Uncertainty adjustments
The extrapolatin made for the description of the technology process and the fact that no data were available about the percentage of companies represented by the study citated are considered in the uncertainties.

## Sources
- Werner F., Althaus H.-J., Kuenniger T., Richter K., Jungbluth N., 2007, 2007 - LCI wood as fuel and const. mat. - Werner, Final report ecoinvent data v2.0, 9, Swiss Centre for LCI, Empa - TSL, ESU-services Ltd., Duebendorf, CH
Werner F., Althaus H.-J., Künniger T., Richter K., Jungbluth N. (2007) 1Life Cycle Inventories of Wood as Fuel and Construction Material. Final report ecoinvent data v2.0. Volume: 9. Issue: 0. Swiss Centre for LCI, Empa - TSL. Dübendorf, CH.
Type: Measurement on site
Source: CD-ROM
First author: Werner F.
Other authors: Althaus H.-J., Künniger T., Richter K., Jungbluth N.
Year: 2007
Title of anthology: Final report ecoinvent data v2.0
Place of publication: Dübendorf, CH
Publisher: Swiss Centre for LCI, Empa - TSL
Volume No: 9
Issue No: 0

## Validation
Proof reading validation: Passed.; Other validation: none;
