# Geopolymer concrete pipe, precast concrete, at plant

Dataset: EcoSpold 1, unit process, infrastructure
Functional unit: 1 m3
Category: building components / other materials
Geography: DE
Time period: 2025 to 2030
Synonyms: 0
Generated by: Thomas Pohl
accessRestrictedTo: 0
copyright: true

## General comment
Modern Swiss und European technologies are applied to building machines, material production and building processes.

## Included processes
This dataset represents the production of 1 m³ of precast geopolymer concrete pipe in Germany.
The dataset includes all waste treatment processes arising from the production phase at the precast plant.
The end-of-life treatment of the pipe itself (e.g., demolition, recycling, disposal) is not included and must be accounted for in downstream processes that use this dataset as an input.

## Geography
Europe

## Technology
Production of precast geopolymer concrete pipe, using industrial machinery. Based on information provided by Röser GmbH, Steißlingen, Germany

## Time period
Review of data currency scheduled after 5 years.

## Reference product
- Geopolymer concrete pipe, precast concrete, at plant [DE]: 1 m3

## Inputs from technosphere
- Electricity, medium voltage, at grid [CH]: 29.2 kWh; lognormal SD95 1.3059
  (2,1,1,1,3,5,BU:1.05); Based on information provided by Röser GmbH, Steißlingen, Germany; Leitfaden Werkstoffauswahl für Entwässerungsleitungen- VSA Verband Schweizer Abwasser- und Gewässerschutzfachleute
- Diesel, burned in building machine, average [CH]: 75.2 MJ; lognormal SD95 2.0984
  (2,1,1,1,3,5,BU:2); Based on information provided by Röser GmbH, Steißlingen, Germany. Based on annual diesel demand and annual production volume; Leitfaden Werkstoffauswahl für Entwässerungsleitungen- VSA Verband Schweizer Abwasser- und Gewässerschutzfachleute
- Tap water, at user [CH]: 122 kg; lognormal SD95 1.3059
  (same comment as for Electricity, medium voltage, at grid)
- Light fuel oil, burned in boiler 10kW, non-modulating [CH]: 15.4 MJ; lognormal SD95 1.3059
  (same comment as for Electricity, medium voltage, at grid)
- Gravel, round, at mine [CH]: 311 kg; lognormal SD95 1.3059
  (same comment as for Electricity, medium voltage, at grid)
- Gravel, crushed, at mine [CH]: 621 kg; lognormal SD95 1.3059
  (same comment as for Electricity, medium voltage, at grid)
- Sand, at mine [CH]: 764 kg; lognormal SD95 1.3059
  (same comment as for Electricity, medium voltage, at grid)
- Reinforcing steel, at regional storage [CH]: 80 kg; lognormal SD95 1.3059
  (same comment as for Electricity, medium voltage, at grid)
- Transport, freight, lorry, 32t-40t gross weight, fleet average [CH]: 61 tkm; lognormal SD95 2.0984
  (2,1,1,1,3,5,BU:2); Based on information provided by Röser GmbH, Steißlingen, Germany; Leitfaden Werkstoffauswahl für Entwässerungsleitungen- VSA Verband Schweizer Abwasser- und Gewässerschutzfachleute
- Transport, freight, rail, electricity with shunting [CH]: 15 tkm; lognormal SD95 2.0984
  (same comment as for Transport, freight, lorry, 32t-40t gross weight, fleet average)
- Lubricating oil, at plant [RER]: 0.22 kg; lognormal SD95 1.3059
  (same comment as for Electricity, medium voltage, at grid)
- Glued laminated timber, average glue mix, at plant [RER]: 0.034112 m3; lognormal SD95 1.0882
  (2,1,1,1,1,3,BU:1.05); Average based on data from manufacturers in Switzerland; Leitfaden Werkstoffauswahl für Entwässerungsleitungen- VSA Verband Schweizer Abwasser- und Gewässerschutzfachleute
- Sawnwood, production mix, softwood, raw, dried (u=20%), at sawmill [RER]: 0.0013514 m3; lognormal SD95 1.0882
  (same comment as for Glued laminated timber, average glue mix, at plant)
- Polycarboxylates, 40% active substance, at plant [RER]: 6.3 kg; lognormal SD95 1.3059
  (same comment as for Electricity, medium voltage, at grid)
- Chemicals organic, at plant [GLO]: 0.26179 kg; lognormal SD95 1.0882
  (same comment as for Glued laminated timber, average glue mix, at plant)
- Concrete mixing plant [CH]: 4.8e-7 p; lognormal SD95 3.0065
  (2,1,1,1,1,3,BU:3); Average based on data from manufacturers in Switzerland; Leitfaden Werkstoffauswahl für Entwässerungsleitungen- VSA Verband Schweizer Abwasser- und Gewässerschutzfachleute
- Solvents, organic, unspecified, at plant [GLO]: 0.0081081 kg; lognormal SD95 1.0882
  (same comment as for Glued laminated timber, average glue mix, at plant)
- Blast furnace slag, at plant [RER]: 315 kg; lognormal SD95 1.3059
  (same comment as for Electricity, medium voltage, at grid)
- Fly ash from lignite, only transport to disposal [DE]: 315 kg; lognormal SD95 1.3059
  (2,1,1,1,3,5,BU:1.05); Only Transport for disposal; Leitfaden Werkstoffauswahl für Entwässerungsleitungen- VSA Verband Schweizer Abwasser- und Gewässerschutzfachleute
- Sodium silicate, hydrothermal liquor, 48% in H2O, at plant [RER]: 42 kg; lognormal SD95 1.3059
  (2,1,1,1,3,5,BU:1.05); Average based on data from manufacturers in Switzerland; Leitfaden Werkstoffauswahl für Entwässerungsleitungen- VSA Verband Schweizer Abwasser- und Gewässerschutzfachleute
- Treatment, sewage, to wastewater treatment, class 3 [CH]: 0.069 m3; lognormal SD95 1.3059
  (same comment as for Electricity, medium voltage, at grid)
- Disposal, glued laminated timbre, 2.5% binder, as building waste [CH]: 0.035463 kg; lognormal SD95 1.0882
  (same comment as for Glued laminated timber, average glue mix, at plant)
- Disposal, concrete, 5% water, to construction waste landfill [CH]: 23.88 kg; lognormal SD95 1.3059
  (same comment as for Electricity, medium voltage, at grid)
- Disposal, municipal solid waste, 22.9% water, to municipal incineration [CH]: 18.113 kg; lognormal SD95 1.0882
  (same comment as for Glued laminated timber, average glue mix, at plant)

## Inputs from nature
- Gravel, resource correction [resources, in ground]: -626 kg; lognormal SD95 1.0744
  (2,1,1,1,1,2,BU:1.05); Ressource correction;
- Sand, resource correction [resources, in ground]: -513 kg; lognormal SD95 1.0744
  (2,1,1,1,1,2,BU:1.05); Ressource correction;
- Occupation, industrial area [resources, land]: 331 m2a; lognormal SD95 1.5051
  (2,1,1,1,1,2,BU:1.5); Calculation based on site area, service life, and annual production;

## Sources
- Pohl T., Stamm R., 2025, 2025 - Datasets construction machinery and infra. - Pohl, Hintergrundbericht, Umtec Technologie AG, Bern, CH
