# xx Monoammonium phosphate, as P2O5, at regional storehouse

Dataset: EcoSpold 1, unit process
Functional unit: 1 kg
Category: material, obsolete / chemicals, obsolete\fertilisers (inorganic), obsolete
Geography: RER
Time period: 1999-01 to 1999-12
Generated by: Angelika Heil
accessRestrictedTo: 0
copyright: true

## General comment
Refers to 1 kg N, resp. 1 kg P2O5 in monoammonium phosphate with a N-content of 11.0% and a P2O5-content of 52.0%. The multioutput-process 'monoammonium phosphate, at regional storehouse' delivers the co-products 'monoammonium phosphate, as N, at regional storehouse' and 'monoammonium phosphate, as P2O5, at regional storehouse'. Allocation factors are based on the energy requirements of the respective nutrients for the production processes: 45% for 'monoammonium phosphate, as N, at regional storehouse' and 55% for 'monoammonium phosphate, as P2O5, at regional storehouse'' (exceptions see report). The allocated inventories must always be used simultaneously.;
CAS number: 007722-76-1;
Formula: NH4H2PO4;

## Included processes
The unit process inventory takes into account the production of monoammonium phosphate from ammonia and phosphoric acid. Transports of raw materials and intermediate products to the fertiliser plant as well as the transport of the fertiliser product from the factory to the regional department store were included. Production and waste treatment of catalysts, coating and packaging of the final fertiliser products were not included. Infrastructure was included by means of a proxy module.

## Geography
According to the reference of this inventory, the European average is derived from mean values of several fertiliser plants within Europe. The production of raw materials and/or intermediates outside Europe was taken into account by considering the production technology in the respective country and the relative import shares.

## Technology
Production inventory was derived from detailed literature studies and specifications from the manufacturer, relevant for the European production. Transport specifications of the fertiliser product to the regional department store, which were not included in the reference used for this inventory, were complemented by data given in Patyk & Reinhardt (1997).

## Time period
Year when the principal reference used for this inventory was published.

## Reference product
- xx Monoammonium phosphate, as P2O5, at regional storehouse [RER]: 1 kg
  Europe

## Inputs from technosphere
- Chemical plant, organics [RER]: 4.2587e-10 p; lognormal SD95 3.01
  (2,1,1,2,1,3)
- Transport, freight, rail [RER]: 0.95238 tkm; lognormal SD95 2.09
  (4,5,na,na,na,na)
- Transport, freight, lorry, fleet average [RER]: 0.77937 tkm; lognormal SD95 2.09
  (4,5,na,na,na,na)
- Phosphoric acid, fertiliser grade, 70% in H2O, at plant [MA]: 1.37692 kg; lognormal SD95 1.09
  (2,1,1,2,1,3)
- Electricity, medium voltage, production ENTSO-E, at grid: 0.041416 kWh; lognormal SD95 1.09
  (2,1,1,2,1,3)
- Transport, transoceanic freight ship [OCE]: 4.06351 tkm; lognormal SD95 2.09
  (4,5,na,na,na,na)
- Heat, natural gas, at industrial furnace 1MW [CH]: 0.35134 MJ; lognormal SD95 1.09
  (2,1,1,2,1,3)

## Emissions to nature
- Mercury [emissions to water, river]: 4.1923e-6 kg; lognormal SD95 5.11
  (2,3,2,3,3,5)
- Particulates, > 2.5 um, and < 10um [emissions to air, high. pop.]: 7.6923e-5 kg; lognormal SD95 2.1
  (2,3,2,3,3,5)
- Arsenic [emissions to water, river]: 4.4038e-6 kg; lognormal SD95 5.11
  (2,3,2,3,3,5)
- Heat, waste [emissions to air, high. pop.]: 0.14905 MJ; lognormal SD95 1.31
  (2,3,2,3,3,5)
- Phosphate [emissions to water, river]: 5.3077e-5 kg; lognormal SD95 1.63
  (2,3,2,3,3,5)
- Particulates, > 10 um [emissions to air, high. pop.]: 0.00023077 kg; lognormal SD95 1.63
  (2,3,2,3,3,5)
- Nickel [emissions to water, river]: 1.7e-5 kg; lognormal SD95 5.11
  (2,3,2,3,3,5)
- Zinc [emissions to water, river]: 2.5962e-5 kg; lognormal SD95 5.11
  (2,3,2,3,3,5)
- Cadmium [emissions to water, river]: 4.4038e-6 kg; lognormal SD95 5.11
  (2,3,2,3,3,5)
- Lead [emissions to water, river]: 1.9e-5 kg; lognormal SD95 5.11
  (2,3,2,3,3,5)
- Chromium [emissions to water, river]: 2.1923e-5 kg; lognormal SD95 5.11
  (2,3,2,3,3,5)
- Copper [emissions to water, river]: 2.1923e-5 kg; lognormal SD95 5.11
  (2,3,2,3,3,5)

## Sampling procedure
Values given in the reference originate from manufacturers and/or other data sources which in turn refer to the real situation and hence are largely secured. However, the emissions of N and P into the water may be somewhat uncertain. When no information on the speciation of N- and P-emissions was given in the reference, the most likely speciation based on expert's opinion is presented.

## Sources
- Nemecek T., Kaegi T., 2007, 2007 - LCI agricultural prod. systems - Nemecek, Ecoinvent report version 2.0, 15, Swiss Centre for LCI, ART, Duebendorf and Zuerich, CH
Nemecek, T., Kägi, T., Blaser, S. (2007) Life Cycle Inventories of Agricultural Production Systems. Ecoinvent report version 2.0. Editors: 0. Volume: 15. Swiss Centre for LCI, ART. Duebendorf and Zurich, CH.
Type: Measurement on site
Source: CD-ROM
First author: Nemecek, T.
Other authors: Kägi, T., Blaser, S.
Year: 2007
Name of editors: 0
Title of anthology: Ecoinvent report version 2.0
Place of publication: Duebendorf and Zurich, CH
Publisher: Swiss Centre for LCI, ART
Volume No: 15

## Validation
Proof reading validation: Passed.; Other validation: none;
