# Powertrain, for electric scooter

Dataset: EcoSpold 1, unit process, infrastructure
Functional unit: 1 kg
Category: transport systems / road
Geography: RER
Time period: 2014-01 to 2014-12
Production volume: 7800000 kg
Generated by: Frank Werner
accessRestrictedTo: 0
copyright: true

## General comment
This dataset describes the production of an electric drivetrain suitable for an electric scooter. It comprises the controller (1.27), the electric motor and the charger (3.025kg). The entries are given on a function of kg of device. The dataset is based on direct inspection of existing commercial devices of current technology.;

## Included processes
The dataset brings together all the devices required for the electric drivetrain. The dataset returns the electric drivetrain and includes the treatment of the used component.

## Reference product
- Powertrain, for electric scooter [RER]: 1 kg
  Europe

## Inputs from technosphere
- Charger, for electric scooter [RER]: 0.29921 kg; lognormal SD95 1.2648
  (2,4,3,4,3,na)
  Based on current available technology.
- Electric motor, for electric scooter [RER]: 0.57369 kg; lognormal SD95 1.2648
  (2,4,3,4,3,na)
  Based on current available technology.
- Disposal, powertrain, for electric scooter [RER]: 0.99901 kg
  Production Volume Amount: 7792284.86646884
- Controller, for electric scooter [RER]: 0.12562 kg; lognormal SD95 1.2648
  (2,4,3,4,3,na)
  Based on current available technology.

## Sampling procedure
Direct inspection of a typical devices of common technology.

## Sources
- Frischknecht R., Messmer A., Stolz P., 2016, 2016 - Mobitool - Frischknecht, Project Report, 0, treeze Ltd., Bern, CH
