# Pipeline, natural gas, long distance, high capacity, onshore

Dataset: EcoSpold 1, unit process, infrastructure
Functional unit: 1 km
Category: pipeline / infrastructure
Geography: GLO
Time period: 2000-01 to 2000-12
Generated by: Mireille Faist Emmenegger
accessRestrictedTo: 0
copyright: true

## General comment
It is assumed that half of the pipelines are disposed in a discharge at the end of life, the other half stays in the soil. The life time of the pipeline is 40 years.;

## Included processes
This dataset describes the infrastructure needed for a long-distance pipeline onshore with a capacity from average 1.1e6 Sm3/h gas including material requirements, construction and disposal. Helicopter flights for inspection are included.

## Technology
The steel quantities are calculated on the basis of the geometry of the pipeline (diameter 1219mm, thickness 12.3 mm). Coating is assumed to be the same as in the low capacity onshore pipeline.

## Reference product
- Pipeline, natural gas, long distance, high capacity, onshore [GLO]: 1 km
  Global

## Inputs from technosphere
- Disposal, municipal solid waste, 22.9% water, to municipal incineration [CH]: 4840 kg; lognormal SD95 1.1
  (2,3,1,1,1,3); environmental report
- Disposal, bitumen, 1.4% water, to sanitary landfill [CH]: 1160 kg; lognormal SD95 1.41
  (3,5,3,1,3,5); estimates
- Transport, helicopter, single-engine, LTO cycle [CH]: 10.4 p; lognormal SD95 2.1
  (2,3,1,1,3,5); estimates based on published data
- Transport, passenger, helicopter, single-engine, without LTO [CH]: 26 hr; lognormal SD95 2.1
  (2,3,1,1,3,5); estimates based on published data
- Polyethylene, LDPE, granulate, at plant [RER]: 4640 kg; lognormal SD95 1.31
  (2,1,4,1,1,5); estimates based on published data
- Sand, at mine [CH]: 2.28e6 kg; lognormal SD95 1.31
  (2,1,4,1,1,5); estimates based on published data
- Transport, freight, lorry, fleet average [RER]: 219000 tkm; lognormal SD95 2.09
  (4,5,na,na,na,na); standard distance
- Reinforcing steel, at plant [RER]: 376000 kg; lognormal SD95 1.22
  (2,1,1,1,1,5); estimates based on published data
- Transport, freight, rail [RER]: 77500 tkm; lognormal SD95 2.09
  (4,5,na,na,na,na); standard distance
- Bitumen, at refinery [RER]: 2320 kg; lognormal SD95 1.31
  (2,1,4,1,1,5); estimates based on published data
- Disposal, natural gas pipeline, 0% water, to construction waste landfill [CH]: 1.33e6 kg; lognormal SD95 1.41
  (3,5,3,1,3,5); estimates
- Diesel, burned in building machine, average [CH]: 3.31e6 MJ; lognormal SD95 1.1
  (2,3,1,1,1,3); environmental report
- Disposal, hazardous waste, 25% water, to hazardous waste incineration [CH]: 3530 kg; lognormal SD95 1.1
  (2,3,1,1,1,3); environmental report
- Disposal, plastics, mixture, 15.3% water, to municipal incineration [CH]: 2320 kg; lognormal SD95 1.41
  (3,5,3,1,3,5); estimates
- Drawing of pipes, steel [RER]: 376000 kg; lognormal SD95 1.22
  (2,1,1,1,1,5); estimates based on published data

## Inputs from nature
- Transformation, from forest, unspecified [resources, land]: 2000 m2; lognormal SD95 2.11
  (4,3,3,1,1,5); qualified estimates
- Transformation, to heterogeneous, agricultural [resources, land]: 2000 m2; lognormal SD95 2.11
  (4,3,3,1,1,5); qualified estimates
- Occupation, construction site [resources, land]: 3330 m2a; lognormal SD95 1.64
  (4,3,3,1,1,5); qualified estimates
- Water, unspecified natural origin/m3 [resources, in water]: 187 m3; lognormal SD95 1.1
  (2,3,1,1,1,3); environmental report

## Emissions to nature
- Water [emissions to water, unspecified]: 177650 kg; lognormal SD95 2.5196
  (5,5,5,5,5,BU:1.05); All uncertainty-values set to 5.0 by default. Balance of input water

## Sampling procedure
environmental report

## Sources
- Faist Emmenegger M., Heck T., Jungbluth N., Tuchschmid M., 2007, 2007 - Natural gas - Faist-Emmeneger, Sachbilanzen von Energiesystemen. Final report No. 6 ecoinvent data v2.0, 6, Swiss Centre for LCI, PSI, ESU-services Ltd., Duebendorf and Villigen, CH
Faist Emmenegger, M., Heck, T., Jungbluth, N. (2007) Erdgas. Sachbilanzen von Energiesystemen. Final report No. 6 ecoinvent data v2.0. Editors: Dones R.. Volume: 6. Swiss Centre for LCI, PSI. Dübendorf and Villigen, CH.
Type: Measurement on site
Source: CD-ROM
First author: Faist Emmenegger, M.
Other authors: Heck, T., Jungbluth, N.
Year: 2007
Name of editors: Dones R.
Title of anthology: Sachbilanzen von Energiesystemen. Final report No. 6 ecoinvent data v2.0
Place of publication: Dübendorf and Villigen, CH
Publisher: Swiss Centre for LCI, PSI
Volume No: 6

## Validation
Proof reading validation: Passed.; Other validation: none;
