# Bitumen adhesive compound, cold, at plant

Dataset: EcoSpold 1, unit process
Functional unit: 1 kg
Category: construction / sealing
Geography: RER
Time period: 1994-01 to 2000-12
Generated by: Martin Lehmann
accessRestrictedTo: 0
copyright: true

## General comment
The dataset is applicable in the construction building sector. Bitumen adhesive compound is used to protect roads and roofs against water intrusion.;
Synonyms: cold bonding compound, Kaltkleber;

## Included processes
The dataset describes the production of cold bitumen adhesive compound. Included sub-processes are the mixing of bitumen and solvent, the infrastructure, the transport by road and rail as well as the disposal of the compound cuttings in a hazardous waste municipal incineration.

## Geography
The data of this dataset is extracted from literature and producer information. Some own calculations (e.g. energy input, waste heat) were made.

## Technology
The technology involved is mixing of bitumen and solvent in a cold process.

## Reference product
- Bitumen adhesive compound, cold, at plant [RER]: 1 kg
  Europe

## Inputs from technosphere
- Transport, freight, rail [RER]: 0.127 tkm; lognormal SD95 2.1
  (4,3,1,3,1,5,5)
- Electricity, medium voltage, production ENTSO-E, at grid: 0.08 kWh; lognormal SD95 1.22
  (2,3,1,3,1,5,2)
- Bitumen, at refinery [RER]: 0.394 kg; lognormal SD95 1.24
  (2,4,1,3,1,5,3)
- Chemical plant, organics [RER]: 4e-11 p; lognormal SD95 3.06
  (2,4,1,3,1,5,9)
- Transport, freight, lorry, fleet average [RER]: 0.0475 tkm; lognormal SD95 2.1
  (4,3,1,3,1,5,5)
- Disposal, hazardous waste, 25% water, to hazardous waste incineration [CH]: 0.0098 kg; lognormal SD95 1.35
  (2,4,3,3,3,5,6)
- Chemicals organic, at plant [GLO]: 0.0808 kg; lognormal SD95 1.24
  (2,4,1,3,1,5,4)
- Water, deionised, at plant [CH]: 0.505 kg; lognormal SD95 1.24
  (2,4,1,3,1,5,4)

## Emissions to nature
- Heat, waste [emissions to air, unspecified]: 0.288 MJ; lognormal SD95 1.24
  (2,4,1,3,1,5,13)
- NMVOC, non-methane volatile organic compounds, unspecified origin [emissions to air, unspecified]: 0.04 kg; lognormal SD95 2.16
  (4,4,1,3,3,5,23)

## Sampling procedure
Literature, database

## Extrapolations
see Geography

## Uncertainty adjustments
The used data is mainly valid for Central Europe, the dataset is applicable for the whole European region.

## Sources
- Kellenberger D., Althaus H.-J., Jungbluth N., Kuenniger T., Lehmann M., Thalmann P., 2007, 2007 - LCI building products - Kellenberger, Final report ecoinvent data v2.0, 7, Swiss Centre for LCI, Empa - TSL, ESU-services Ltd., Bau- und Umweltchimie, Duebendorf, CH
Kellenberger D., Althaus H.-J., Jungbluth N., Künniger T. (2007) Life Cycle Inventories of Building Products. Final report ecoinvent data v2.0. Volume: 7. Swiss Centre for LCI, Empa - TSL. Dübendorf, CH.
Type: Measurement on site
Source: CD-ROM
First author: Kellenberger D.
Other authors: Althaus H.-J., Jungbluth N., Künniger T.
Year: 2007
Title of anthology: Final report ecoinvent data v2.0
Place of publication: Dübendorf, CH
Publisher: Swiss Centre for LCI, Empa - TSL
Volume No: 7

## Validation
Proof reading validation: passed; Other validation: none;
