# Mercury, liquid, at plant

Dataset: EcoSpold 1, unit process
Functional unit: 1 kg
Category: metals / non ferro
Geography: GLO
Time period: 2000-01 to 2000-12
Generated by: Roland Hischier
accessRestrictedTo: 0
copyright: true

## General comment
The functional unit represent 1 kg of liquid mercury. Large uncertainty of the process data due to weak data on the production process.;
CAS number: 007439-97-6;
Formula: Hg;

## Included processes
Raw materials, machineries and energy consumption for production, estimated emissions to air from production and infrastructure of the site (approximation). No water emissions.

## Geography
Data used has no specific geographical origin (stoechiometry). Average europenan processes for raw materials, transport requirements and electricity mix used.

## Technology
Data approximated with data from lime mining, crushing and milling plus estimation of the additional furnace operation step, based on information in literature and own assumptions.

## Time period
date of published literature

## Reference product
- Mercury, liquid, at plant [GLO]: 1 kg
  Global

## Inputs from technosphere
- Heat, heavy fuel oil, at industrial furnace 1MW [RER]: 124 MJ; lognormal SD95 1.5
  (4,5,1,5,3,5); according to quantitative information in Ullmann's
- Light fuel oil, burned in boiler 100kW, non-modulating [CH]: 0.00462 MJ; lognormal SD95 1.4
  (4,3,1,3,3,5); approximation with data from lime production
- Transport, freight, rail [RER]: 0.177 tkm; lognormal SD95 2.1
  (4,5,na,na,na,na); standard distances
- Industrial machine, heavy, unspecified, at plant [RER]: 0.000232 kg; lognormal SD95 3.1
  (4,3,1,3,3,5); approximation with data from lime production
- Heat, light fuel oil, at industrial furnace 1MW [RER]: 0.0898 MJ; lognormal SD95 1.4
  (4,3,1,3,3,5); approximation with data from lime production
- Quicklime, milled, loose, at plant [CH]: 0.294 kg; lognormal SD95 1.4
  (4,3,1,3,3,5); estimation based on an assumed yield of 100% for furnace
- Glass production site [RER]: 1.25e-10 p; lognormal SD95 3.8
  (4,5,1,3,5,4); estimation
- Transport, freight, lorry, fleet average [RER]: 0.294 tkm; lognormal SD95 2.1
  (4,5,na,na,na,na); standard distances
- Mine, limestone [CH]: 6.09e-11 p; lognormal SD95 3.1
  (4,3,1,3,3,5); approximation with data from lime production
- Diesel, burned in building machine, average [CH]: 0.0209 MJ; lognormal SD95 1.4
  (4,3,1,3,3,5); approximation with data from lime production
- Electricity, medium voltage, production ENTSO-E, at grid: 0.0326 kWh; lognormal SD95 1.4
  (4,3,1,3,3,5); approximation with data from lime production
- Conveyor belt, at plant [RER]: 3.22e-8 m; lognormal SD95 3.1
  (4,3,1,3,3,5); approximation with data from lime production
- Blasting [RER]: 8.97e-5 kg; lognormal SD95 1.4
  (4,3,1,3,3,5); approximation with data from lime production
- Recultivation, limestone mine [CH]: 7.56e-6 m2; lognormal SD95 3.1
  (4,3,1,3,3,5); approximation with data from lime production

## Inputs from nature
- Water, cooling, unspecified natural origin/m3 [resources, in water]: 0.024 m3; lognormal SD95 1.9
  (5,5,1,1,4,5); estimated with data from a large chem. plant
- Transformation, from forest, unspecified [resources, land]: 7.56e-6 m2; lognormal SD95 2.2
  (4,3,1,3,3,5); approximation with data from lime production
- Water, well [resources, in water]: 3.4e-5 m3; lognormal SD95 1.4
  (4,3,1,3,3,5); approximation with data from lime production
- Occupation, mineral extraction site [resources, land]: 9.83e-5 m2a; lognormal SD95 1.7
  (4,3,1,3,3,5); approximation with data from lime production
- Cinnabar [resources, in ground]: 1.29 kg; lognormal SD95 1.4
  (4,3,1,3,3,5); based on assumed overall yield of 90%
- Transformation, to mineral extraction site [resources, land]: 7.56e-6 m2; lognormal SD95 2.2
  (4,3,1,3,3,5); approximation with data from lime production

## Emissions to nature
- Particulates, > 2.5 um, and < 10um [emissions to air, high. pop.]: 5.55e-5 kg; lognormal SD95 2.2
  (4,3,1,3,3,5); approximation with data from lime production
- Particulates, < 2.5 um [emissions to air, high. pop.]: 1.03e-5 kg; lognormal SD95 3.1
  (4,3,1,3,3,5); approximation with data from lime production
- Particulates, > 10 um [emissions to air, high. pop.]: 0.00014 kg; lognormal SD95 1.7
  (4,3,1,3,3,5); approximation with data from lime production
- Mercury [emissions to air, high. pop.]: 0.161 kg; lognormal SD95 5.2
  (4,5,1,5,3,5); according to quantitative information in literature
- Heat, waste [emissions to air, high. pop.]: 0.117 MJ; lognormal SD95 1.4
  (4,3,1,3,3,5); calculated from electricity input
- Water [emissions to water, unspecified]: 22.8, 0.0306 kg (2 entries); lognormal SD95 2.5196
  (5,5,5,5,5,BU:1.05); All uncertainty-values set to 5.0 by default. Balance of input water

## Sources
- Althaus H.-J., Chudacoff M., Hellweg S., Hischier R., Jungbluth N., Osses M., Primas A., 2007, 2007 - LCI chemicals - Althaus, Final report ecoinvent data v2.0, 8, Swiss Centre for LCI, Empa - TSL, ETH, ESU-services Ltd., Chudacoff Oekoscience, Duebendorf, CH
Althaus H.-J., Chudacoff M., Hischier R., Jungbluth N., Osses M., Primas A. (2007) Life Cycle Inventories of Chemicals. Final report ecoinvent data v2.0. Volume: 8. Swiss Centre for LCI, Empa - TSL. Dübendorf, CH.
Type: Measurement on site
Source: CD-ROM
First author: Althaus H.-J.
Other authors: Chudacoff M., Hischier R., Jungbluth N., Osses M., Primas A.
Year: 2007
Title of anthology: Final report ecoinvent data v2.0
Place of publication: Dübendorf, CH
Publisher: Swiss Centre for LCI, Empa - TSL
Volume No: 8

## Validation
Proof reading validation: Passed.; Other validation: none;
