# Heat, residential, by combustion of synthetic natural gas from biological methanation using boiler, distributed by pipeline, produced by Electrolysis, PEM using electricity from grid and carbon sourced from Cement plant (100:0 alloc.)

Dataset: EcoSpold 1, unit process
Functional unit: 1 MJ
Category: heat / synthetic\transformation
Geography: CH
Time period: 2024-01 to 2024-01
Generated by: Romain Sacchi
accessRestrictedTo: 0
copyright: true

## General comment
This dataset represents the supply of 1 megajoule of heat in a residence, by synthetic natural gas from biological methanation combustion in a boiler. The synthetic natural gas from biological methanation is produced by Electrolysis, PEM, with electricity from grid as feedstock. The carbon is sourced from Cement plant. Heat conversion efficiency [% LHV input]: 109.5%. LHV [MJ/kg]: 48. Market price [Euro/MJ]: 0.03. Distribution loss [% output]: 0.02%. Storage loss [% output]: 0%. CO2 biogenic share [%]: 5.88%. Power [kW]: 16.4. Lifetime [years]: 20. Annual operation [hours]: 2100. : . For more information, refer to: Sacchi, R. and Bauer, C. LCA of Power-to-X processes and applications in the residential sector. Paul Scherrer Institut, 2023. Source: Sacchi, R. and Bauer, C. LCA of Power-to-X processes and applications in the residential sector. Paul Scherrer Institut, 2023.

## Reference product
- Heat, residential, by combustion of synthetic natural gas from biological methanation using boiler, distributed by pipeline, produced by Electrolysis, PEM using electricity from grid and carbon sourced from Cement plant (100:0 alloc.) [CH]: 1 MJ
  not defined

## Inputs from technosphere
- Electricity, low voltage, at grid [CH]: 0.000734 kWh; lognormal SD95 1.382
  To operate the boiler. {2;5;1;2;3;5;1.05;}
- Synthetic natural gas from biological methanation, distributed by pipeline, produced by Electrolysis, PEM using electricity from grid, and carbon from Cement plant (100:0 alloc.) [CH]: 0.01903 kg; lognormal SD95 1.382
  Methane input. 1 [MJ SNG]/ 47.5 [MJ/kg SNG]/ eff.(th) {2;5;1;2;3;5;1.05;}
- Gas boiler 15kW [RER]: 4.033e-7 p; lognormal SD95 3.14
  1/(Cap. [kW] * lifetime [y] * annual operation [h] * 3.6 [MJ/kWh]) {2;5;1;2;3;5;3;}
- Chimney [CH]: 8.82e-7 m; lognormal SD95 3.14
  To evacuate the flue gases. {2;5;1;2;3;5;3;}

## Emissions to nature
- Benzene [emissions to air, high. pop.]: 3.92e-7 kg; lognormal SD95 2.785
  Adapted from "heat production, biomethane, at boiler condensing modulating <100kW" {5;5;5;5;5;5;1.5;}
- Nitrogen oxides [emissions to air, high. pop.]: 9.702e-6 kg; lognormal SD95 2.785
  (same comment as for Benzene)
- Acetic acid [emissions to air, high. pop.]: 1.47e-7 kg; lognormal SD95 2.785
  (same comment as for Benzene)
- Sulfite [emissions to water, unspecified]: 4.9e-8 kg; lognormal SD95 2.785
  (same comment as for Benzene)
- Particulates, < 2.5 um [emissions to air, high. pop.]: 9.8e-8 kg; lognormal SD95 4.247
  Adapted from "heat production, biomethane, at boiler condensing modulating <100kW" {5;5;5;5;5;5;3;}
- Dioxin, 2,3,7,8 Tetrachlorodibenzo-p- [emissions to air, high. pop.]: 2.94e-17 kg; lognormal SD95 2.785
  (same comment as for Benzene)
- Carbon monoxide, biogenic [emissions to air, high. pop.]: 5.782e-6 kg; lognormal SD95 6.451
  Adapted from "heat production, biomethane, at boiler condensing modulating <100kW" {5;5;5;5;5;5;5;}
- Nitrite [emissions to water, unspecified]: 2.94e-9 kg; lognormal SD95 2.785
  (same comment as for Benzene)
- Dinitrogen monoxide [emissions to air, high. pop.]: 4.9e-7 kg; lognormal SD95 2.785
  (same comment as for Benzene)
- Benzo(a)pyrene [emissions to air, high. pop.]: 9.8e-12 kg; lognormal SD95 2.785
  (same comment as for Benzene)
- PAH, polycyclic aromatic hydrocarbons [emissions to air, high. pop.]: 9.8e-9 kg; lognormal SD95 4.247
  (same comment as for Particulates, < 2.5 um)
- Methane, fossil [emissions to air, high. pop.]: 1.845e-6 kg; lognormal SD95 7.389
  Adapted from "heat production, biomethane, at boiler condensing modulating <100kW"
- Sulfate [emissions to water, unspecified]: 4.9e-8 kg; lognormal SD95 2.785
  (same comment as for Benzene)
- Propionic acid [emissions to air, high. pop.]: 1.96e-8 kg; lognormal SD95 2.785
  (same comment as for Benzene)
- Formaldehyde [emissions to air, high. pop.]: 9.8e-8 kg; lognormal SD95 2.785
  (same comment as for Benzene)
- Nitrate [emissions to water, unspecified]: 1.274e-7 kg; lognormal SD95 2.785
  (same comment as for Benzene)
- Mercury [emissions to air, high. pop.]: 2.94e-11 kg; lognormal SD95 6.451
  (same comment as for Carbon monoxide, biogenic)
- Pentane [emissions to air, high. pop.]: 1.176e-6 kg; lognormal SD95 2.785
  (same comment as for Benzene)
- Toluene [emissions to air, high. pop.]: 1.96e-7 kg; lognormal SD95 2.785
  (same comment as for Benzene)
- Sulfur dioxide [emissions to air, high. pop.]: 4.9e-7 kg; lognormal SD95 2.785
  (same comment as for Benzene)
- Acetaldehyde [emissions to air, high. pop.]: 9.8e-10 kg; lognormal SD95 2.785
  (same comment as for Benzene)
- Methane, biogenic [emissions to air, high. pop.]: 1.152e-7 kg; lognormal SD95 2.785
  (same comment as for Benzene)

## Sampling procedure
Sampling procedure: Literature data

## Sources
- Sacchi R., Bauer C., 2024, 2024 - LCA power-to-X in residential sector - Sacchi, Project report, PSI, Villigen, CH

## Validation
Proof reading validation: Passed, Other validation: none, Validator: Rolf Frischknecht, Telephone: 0041 44 940 61 91, E-mail: frischknecht@treeze.ch, Company: treeze, Country: CH
