# Mouse device, optical, wireless, at plant

Dataset: EcoSpold 1, unit process
Functional unit: 1 p
Category: electronics / devices
Geography: GLO
Time period: 2023-01 to 2029-12
Synonyms: Maus; optisch; Kabellose; ab Werk
Generated by: Lugas Raka Adrianto, Maulana Permana Ajie, Didier Beloin-Saint-Pierre
accessRestrictedTo: 0
copyright: false

## General comment
The dataset is made from the existing average mice;

## Included processes
The wireless mouse is modeled using the existing wired mouse dataset. The modifications to the existing mice include the addition of a single NiMh battery (25 grams), the removal of wired cable, and lastly the increased mass of PCB components (Babbitt et al., 2020). The rest of other inventory flows are assumed to be the same as optimized wired mice - see the mentioned dataset.

## Geography
Data for global average wireless mice

## Technology
The production of an optical mouse includes the sheet rolling of the steel plate plus the injection moulding of the plastic and rubber parts (cover, base and wheel).

## Reference product
- Mouse device, optical, wireless, at plant [GLO]: 1 p
  Global

## Inputs from technosphere
- Acrylonitrile-butadiene-styrene copolymer, ABS, at plant [RER]: 0.0408 kg; lognormal SD95 1.25
  (2,4,1,3,1,5,BU:1.07)
- Battery, NiMH, rechargeable, prismatic, at plant [GLO]: 0.025 kg; lognormal SD95 1.25
  (2,4,1,3,1,5,BU:1.07); A single AA battery.
- Electricity, medium voltage, production GLO, at grid [GLO]: 1.111 kWh; lognormal SD95 1.25
  (2,4,1,3,1,5,BU:1.07)
- Extrusion, plastic pipes [RER]: 0.00245 kg; lognormal SD95 1.25
  (2,4,1,3,1,5,BU:1.07)
- Hot rolling, steel [RER]: 0.0022 kg; lognormal SD95 1.25
  (2,4,1,3,1,5,BU:1.07)
- Injection moulding [RER]: 0.0513 kg; lognormal SD95 1.25
  (2,4,1,3,1,5,BU:1.07)
- Plugs, inlet and outlet, for network cable, at plant [GLO]: 1 p; lognormal SD95 1.25
  (2,4,1,3,1,5,BU:1.07)
- Printed wiring board mounting plant [GLO]: 2.496e-8 p; lognormal SD95 1.25
  (2,4,1,3,1,5,BU:1.07)
- Printed wiring board, surface mounted, unspec., solder mix, at plant [GLO]: 0.014 kg; lognormal SD95 1.25
  (2,4,1,3,1,5,BU:1.07); Assumed to be 2x PCB of standard mouse. Literature: Babbit et al 2020.
- Sheet rolling, steel [RER]: 0.01085 kg; lognormal SD95 1.25
  (2,4,1,3,1,5,BU:1.07)
- Steel, low-alloyed, at plant [RER]: 0.01085 kg; lognormal SD95 1.25
  (2,4,1,3,1,5,BU:1.07)
- Transport, freight, lorry, fleet average [RER]: 0.009755 tkm; lognormal SD95 2.06
  (2,4,1,3,1,5,BU:2.00)
- Transport, freight, rail [RER]: 0.01951 tkm; lognormal SD95 2.06
  (2,4,1,3,1,5,BU:2.00)
- Transport, transoceanic freight ship [OCE]: 2.0778 tkm; lognormal SD95 2.06
  (2,4,1,3,1,5,BU:2.00)
- Disposal, mouse device, optical, with cable, to WEEE treatment [CH]: 1 p; lognormal SD95 1.34
  (1,4,3,3,3,5,BU:1.03)

## Sampling procedure
Literature data and own assumptions for processing calculations.

## Extrapolations
see Geography and Technology

## Sources
- Raka Adrianto L., Permana Ajie M., Beloin-Saint-Pierre D., 2024, 2024 - LCI ICT sector - Raka Adrianto, Empa, St. Gallen, CH

## Validation
Proof reading validation: Passed, Other validation: none, Validator: Mischa Zschokke, Company: Carbotech, Country: CH
