# Crude oil, market mix, at long distance transport

Dataset: EcoSpold 1, unit process
Functional unit: 1 kg
Category: oil / transport
Geography: JP
Time period: 2023 to 2025
Production volume: 129.7 million tons of directly imported crude oil to JP region in 2023.
Generated by: Maresa Bussa
accessRestrictedTo: 0
copyright: true

## General comment
Calculation for transport distances assuming transport by pipeline offshore and onshore as well as sea transport in tanker. Sites and modes of transportation based on the supply situation in 2023.

## Included processes
Transportation of crude oil from exploration sites to refineries in JP-region. Includes transport service requirements and emissions from oil handling and evaporation.

## Geography
Calculations include production and transport of crude oil from 18 countries.

## Technology
Operation of crude oil pipelines by electricity.

## Time period
Transport modes investigated for 2023.

## Reference product
- Crude oil, market mix, at long distance transport [JP]: 1 kg

## Inputs from technosphere
- Crude oil, at production [AE]: 0.37476 kg; lognormal SD95 1.209
  (1,1,1,3,3,BU:1.05); In 2023, 48.593 megatons of crude oil are imported from United Arab Emirates to Japan, assuming 44% offshore production. Assumed transport distances: Offshore, at origin: 100km by pipeline. Onshore, at origin: 100km by pipeline. For transport to destination: 14425km by ship plus additional 100km by onshore pipeline at destination. Port of origin for shipping is assumed to be Dubai or Abu Dhabi .
- Crude oil, at production [AR]: 0.001949 kg; lognormal SD95 1.209
  (1,1,1,3,3,BU:1.05); In 2023, 0.253 megatons of crude oil are imported from Argentina to Japan, assuming 30% offshore production. Assumed transport distances: Offshore, at origin: 100km by pipeline. Onshore, at origin: 500km by pipeline. For transport to destination: 19753km by ship plus additional 100km by onshore pipeline at destination. Port of origin for shipping is assumed to be Buenos Aires.
- Crude oil, at production [AU]: 0.004115 kg; lognormal SD95 1.209
  (1,1,1,3,3,BU:1.05); In 2023, 0.534 megatons of crude oil are imported from Australia to Japan, assuming 75% offshore production. Assumed transport distances: Offshore, at origin: 268km by pipeline. Onshore, at origin: 800km by pipeline. For transport to destination: 8334km by ship plus additional 100km by onshore pipeline at destination. Port of origin for shipping is assumed to be Perth.
- Crude oil, at production [BR]: 0.0069862 kg; lognormal SD95 1.209
  (1,1,1,3,3,BU:1.05); In 2023, 0.906 megatons of crude oil are imported from Brazil to Japan, assuming 96.7% offshore production. Assumed transport distances: Offshore, at origin: 140km by pipeline. Onshore, at origin: 800km by pipeline. For transport to destination: 21028km by ship plus additional 100km by onshore pipeline at destination. Port of origin for shipping is assumed to be Santos.
- Crude oil, at production [CO]: 0.0015569 kg; lognormal SD95 1.209
  (1,1,1,3,3,BU:1.05); In 2023, 0.202 megatons of crude oil are imported from Colombia to Japan, assuming 12.5% offshore production. Assumed transport distances: Offshore, at origin: 100km by pipeline. Onshore, at origin: 800km by pipeline. For transport to destination: 14472km by ship plus additional 100km by onshore pipeline at destination. Port of origin for shipping is assumed to be Tumaco.
- Crude oil, at production [EC]: 0.00096881 kg; lognormal SD95 1.209
  (1,1,1,3,3,BU:1.05); In 2023, 0.126 megatons of crude oil are imported from Ecuador to Japan, assuming 2.4% offshore production. Assumed transport distances: Offshore, at origin: 100km by pipeline. Onshore, at origin: 300km by pipeline. For transport to destination: 14459km by ship plus additional 100km by onshore pipeline at destination. Port of origin for shipping is assumed to be Guayaquil.
- Crude oil, at production [ID]: 0.0028864 kg; lognormal SD95 1.209
  (1,1,1,3,3,BU:1.05); In 2023, 0.374 megatons of crude oil are imported from Indonesia to Japan, assuming 36% offshore production. Assumed transport distances: Offshore, at origin: 100km by pipeline. Onshore, at origin: 100km by pipeline. For transport to destination: 5989km by ship plus additional 100km by onshore pipeline at destination. Port of origin for shipping is assumed to be Tanjung Priok.
- Crude oil, at production [IR]: 0.038314 kg; lognormal SD95 1.209
  (1,1,1,3,3,BU:1.05); In 2023, 4.968 megatons of crude oil are imported from Iran to Japan, assuming 15.8% offshore production. Assumed transport distances: Offshore, at origin: 100km by pipeline. Onshore, at origin: 400km by pipeline. For transport to destination: 12390km by ship plus additional 100km by onshore pipeline at destination. Port of origin for shipping is assumed to be Bahregan Sar Oilfield.
- Crude oil, at production [JP]: 0.036657 kg; lognormal SD95 1.209
  (1,1,1,3,3,BU:1.05); In 2023, 0 megatons of crude oil are imported from Japan to Japan, and 4.753 megatons are consumed or refined locally, assuming 30% offshore production. Assumed transport distances: Offshore, at origin: 100km by pipeline. Onshore, at origin: 100km by pipeline. For transport to destination: 0km by ship plus additional 0km by onshore pipeline at destination. Port of origin for shipping is assumed to be Tokyo.
- Crude oil, at production [KR]: 0.001551 kg; lognormal SD95 1.209
  (1,1,1,3,3,BU:1.05); In 2023, 0.201 megatons of crude oil are imported from South Korea to Japan, assuming 30% offshore production. Assumed transport distances: Offshore, at origin: 100km by pipeline. Onshore, at origin: 100km by pipeline. For transport to destination: 1882km by ship plus additional 100km by onshore pipeline at destination. Port of origin for shipping is assumed to be Inchon.
- Crude oil, at production [KW]: 0.088579 kg; lognormal SD95 1.209
  (1,1,1,3,3,BU:1.05); In 2023, 11.486 megatons of crude oil are imported from Kuwait to Japan, assuming 1% offshore production. Assumed transport distances: Offshore, at origin: 100km by pipeline. Onshore, at origin: 20km by pipeline. For transport to destination: 12462km by ship plus additional 100km by onshore pipeline at destination. Port of origin for shipping is assumed to be Shuaiba.
- Crude oil, at production [MY]: 0.0023633 kg; lognormal SD95 1.209
  (1,1,1,3,3,BU:1.05); In 2023, 0.306 megatons of crude oil are imported from Malaysia to Japan, assuming 99% offshore production. Assumed transport distances: Offshore, at origin: 100km by pipeline. Onshore, at origin: 100km by pipeline. For transport to destination: 7347km by ship plus additional 100km by onshore pipeline at destination. Port of origin for shipping is assumed to be Sungai UdangPort.
- Crude oil, at production [OM]: 0.0090423 kg; lognormal SD95 1.2077
  (1,1,1,1,3,BU:1.05); In 2023, 1.172 megatons of crude oil are imported from Oman to Japan, assuming 0% offshore production. Assumed transport distances: Offshore, at origin: 100km by pipeline. Onshore, at origin: 100km by pipeline. For transport to destination: 11197km by ship plus additional 100km by onshore pipeline at destination. Port of origin for shipping is assumed to be Muscat.
- Crude oil, at production [QA]: 0.013251 kg; lognormal SD95 1.209
  (1,1,1,3,3,BU:1.05); In 2023, 1.718 megatons of crude oil are imported from Qatar to Japan, assuming 69.3% offshore production. Assumed transport distances: Offshore, at origin: 50km by pipeline. Onshore, at origin: 100km by pipeline. For transport to destination: 11966km by ship plus additional 100km by onshore pipeline at destination. Port of origin for shipping is assumed to be Halul Island.
- Crude oil, at production [SA]: 0.39631 kg; lognormal SD95 1.2077
  (1,1,1,1,3,BU:1.05); In 2023, 51.388 megatons of crude oil are imported from Saudi Arabia to Japan, assuming 34.6% offshore production. Assumed transport distances: Offshore, at origin: 100km by pipeline. Onshore, at origin: 1300km by pipeline. For transport to destination: 12400km by ship plus additional 100km by onshore pipeline at destination. Port of origin for shipping is assumed to be Ju' aimah.
- Crude oil, at production [TH]: 0.0010374 kg; lognormal SD95 1.2077
  (1,1,1,1,3,BU:1.05); In 2023, 0.135 megatons of crude oil are imported from Thailand to Japan, assuming 80% offshore production. Assumed transport distances: Offshore, at origin: 100km by pipeline. Onshore, at origin: 100km by pipeline. For transport to destination: 5452km by ship plus additional 100km by onshore pipeline at destination. Port of origin for shipping is assumed to be Sriracha Oil terminals.
- Crude oil, at production [US]: 0.018346 kg; lognormal SD95 1.2077
  (1,1,1,1,3,BU:1.05); In 2023, 2.379 megatons of crude oil are imported from United States to Japan, assuming 14.6% offshore production. Assumed transport distances: Offshore, at origin: 286km by pipeline. Onshore, at origin: 1100km by pipeline. For transport to destination: 17300km by ship plus additional 100km by onshore pipeline at destination. Port of origin for shipping is assumed to be Houston.
- Crude oil, at production [VE]: 0.001663 kg; lognormal SD95 1.209
  (1,1,1,3,3,BU:1.05); In 2023, 0.216 megatons of crude oil are imported from Venezuela to Japan, assuming 30% offshore production. Assumed transport distances: Offshore, at origin: 100km by pipeline. Onshore, at origin: 100km by pipeline. For transport to destination: 16259km by ship plus additional 100km by onshore pipeline at destination. Port of origin for shipping is assumed to be Puerto La Cruz / Jose Petroterminal.
- Transport, transoceanic tanker [OCE]: 12.807 tkm; lognormal SD95 2.0618
  (3,2,1,3,3,BU:2); Calculation based on estimated shipping route and pipelines according to searates.com and export data for 2023.
- Transport, crude oil pipeline, offshore [OCE]: 0.035534 tkm; lognormal SD95 1.2377
  (3,2,1,3,3,BU:1.05); Calculation based on estimated shipping route and pipelines according to searates.com and export data for 2023.
- Transport, crude oil pipeline, onshore [RER]: 0.4616 tkm; lognormal SD95 1.2377
  (same comment as for Transport, crude oil pipeline, offshore)

## Emissions to nature
- Hydrocarbons, aliphatic, alkanes, unspecified [emissions to air, low. pop.]: 1.35e-6 kg; lognormal SD95 1.5913
  (3,4,4,1,1,BU:1.5); Evaporation losses for storage and handling
- Benzene [emissions to air, low. pop.]: 4.5e-7 kg; lognormal SD95 3.0703
  (3,4,4,1,1,BU:3); Evaporation losses for storage and handling
- Butane [emissions to air, low. pop.]: 0.00012642 kg; lognormal SD95 1.5913
  (3,4,4,1,1,BU:1.5); Evaporation losses for storage and handling
- Methane, fossil [emissions to air, low. pop.]: 1.498e-6 kg; lognormal SD95 1.5913
  (3,4,4,1,1,BU:1.5); Evaporation losses for storage and handling
- Ethane [emissions to air, low. pop.]: 1.601e-6 kg; lognormal SD95 1.5913
  (3,4,4,1,1,BU:1.5); Evaporation losses for storage and handling
- Hexane [emissions to air, low. pop.]: 5.3876e-5 kg; lognormal SD95 1.5913
  (3,4,4,1,1,BU:1.5); Evaporation losses for storage and handling
- Pentane [emissions to air, low. pop.]: 9.558e-5 kg; lognormal SD95 1.5913
  (3,4,4,1,1,BU:1.5); Evaporation losses for storage and handling
- Propane [emissions to air, low. pop.]: 6.1296e-5 kg; lognormal SD95 1.5913
  (3,4,4,1,1,BU:1.5); Evaporation losses for storage and handling
- Toluene [emissions to air, low. pop.]: 2.7e-7 kg; lognormal SD95 1.5913
  (3,4,4,1,1,BU:1.5); Evaporation losses for storage and handling

## Sampling procedure
Literature. Online calculators for distances. The consumption mix is calculated based on international trade statistics for 2023.

## Sources
- Meili C., Jungbluth N., Bussa M., Stefanel A., 2025, 2025 - LCI long-distance transport crude oil - Meili, Project report, 565, ESU-services Ltd., Schaffhausen, CH

## Validation
Passed.
https://esuservices-my.sharepoint.com/personal/jungbluth_esu-services_ch/Documents/ESU-intern/565 Beratung BAFU/EcoSpoldDataXML/[EcoSpold-oil-transport-2025-v1.0.xlsb]X-Process
