# Electricity, at cogen with biogas engine, allocation exergy

Dataset: EcoSpold 1, unit process
Functional unit: 1 kWh
Category: electricity by fuel / biomass\cogeneration
Geography: CH
Time period: 2000-01 to 2004-12
Production volume: In 2002 the production of electricity from biogas was 9.8 GWh/a.
Share of production covered: 100 %
Generated by: Michael Spielmann
accessRestrictedTo: 0
copyright: true

## General comment
The multioutput process "biogas gas burned in cogen with gas engine" delivers the co-products: heat and electricity. The allocation is based on the exergy values of heat and electricity. The exergy value of electricity is 1, and the exergy value of heat is 0.17. The degrees of efficiency are as follows: electricity: 0.32 and heat: 0.55.;

## Included processes
Use of biogas in a cogeneration unit. Included are emissions to air, biogas consumption, use and disposal of operational supplements as well as infrastructure expenditures.

## Geography
Conditions of cogeneration in Switzerland.

## Technology
Lambda 1-engine" with a catalytic converter

## Time period
Time of publications.

## Reference product
- Electricity, at cogen with biogas engine, allocation exergy [CH]: 1 kWh
  SWITZERLAND

## Inputs from technosphere
- Biogas, production mix, at storage [CH]: 0.38298 m3; lognormal SD95 1.2634
  (1,4,2,1,3,4); own calculations based onlower heating value of biogas
- Disposal, used mineral oil, 10% water, to hazardous waste incineration [CH]: 0.00026118 kg; lognormal SD95 1.2634
  (1,4,2,1,3,4); value for cogeneration of natural gas used as approximination
- Cogen unit 160kWe, components for electricity only [RER]: 5.625e-8 p; lognormal SD95 3.0715
  (1,4,2,1,3,4); ecoinvent V1.1. cogeneration of natural gas.
- Lubricating oil, at plant [RER]: 0.00026118 kg; lognormal SD95 1.2634
  (1,4,2,1,3,4); value of cogeneration of natural gas used as approximination
- Cogen unit 160kWe, common components for heat+electricity [RER]: 4.3531e-8 p; lognormal SD95 3.0715
  (1,4,2,1,3,4); ecoinvent V1.1. cogeneration of natural gas.

## Emissions to nature
- Nitrogen oxides [emissions to air, low. pop.]: 0.00013059 kg; lognormal SD95 2.0748
  (1,4,2,1,3,4); value for cogeneration of natural gas used as approximination
- Dinitrogen monoxide [emissions to air, low. pop.]: 2.1765e-5 kg; lognormal SD95 3.0715
  (1,4,2,1,3,4); value for cogeneration of natural gas used as approximination
- Methane, biogenic [emissions to air, low. pop.]: 0.00020024 kg; lognormal SD95 3.0703
  (1,4,1,1,3,4); value for cogeneration of natural gas used as approximination
- Carbon dioxide, biogenic [emissions to air, low. pop.]: 0.72698 kg; lognormal SD95 1.2634
  (1,4,2,1,3,4); own calculations based on carbon content in biogas
- Platinum [emissions to air, low. pop.]: 6.0943e-11 kg; lognormal SD95 5.0815
  (1,4,2,1,3,4); value for cogeneration of natural gas used as approximination
- NMVOC, non-methane volatile organic compounds, unspecified origin [emissions to air, low. pop.]: 1.7412e-5 kg; lognormal SD95 3.0715
  (1,4,2,1,3,4); value for cogeneration of natural gas used as approximination
- Carbon monoxide, biogenic [emissions to air, low. pop.]: 0.00041789 kg; lognormal SD95 2.0748
  (1,4,2,1,3,4); value for cogeneration of natural gas used as approximination
- Sulfur dioxide [emissions to air, low. pop.]: 0.00018286 kg; lognormal SD95 1.2634
  (1,4,2,1,3,4); own calculations based on sulphur content in biogas
- Heat, waste [emissions to air, unspecified]: 1.25444 MJ; lognormal SD95 1.2634
  (1,4,2,1,3,4); own calculations

## Sampling procedure
Literature data

## Sources
- Jungbluth N., Chudacoff M., Dauriat A., Dinkel F., Doka G., Faist Emmenegger M., Gnansounou E., Kljun N., Spielmann M., Stettler C., Sutter J., 2007, 2007 - LCI bioenergy - Jungbluth, Final report ecoinvent data v2.0, 17, Swiss Centre for LCI, ESU-services Ltd., Duebendorf and Uster, CH
Jungbluth N., Chudacoff M., Dauriat A., Dinkel F., Doka G., Faist Emmenegger M., Gnansounou E., Kljun N., Spielmann M., Stettler C., Sutter J. (2007) Life Cycle Inventories of Bioenergy. Final report ecoinvent data v2.0. Volume: 17. Swiss Centre for LCI, ESU. Duebendorf and Uster, CH.
Type: Measurement on site
Source: CD-ROM
First author: Jungbluth N.
Other authors: Chudacoff M., Dauriat A., Dinkel F., Doka G., Faist Emmenegger M., Gnansounou E., Kljun N., Spielmann M., Stettler C., Sutter J.
Year: 2007
Title of anthology: Final report ecoinvent data v2.0
Place of publication: Duebendorf and Uster, CH
Publisher: Swiss Centre for LCI, ESU
Volume No: 17

## Validation
Proof reading validation: Passed.; Other validation: none;
