# xx Biogas, from grass, digestion, at storage

Dataset: EcoSpold 1, unit process
Functional unit: 1 m3
Category: material, obsolete / fuels, obsolete\biofuels, obsolete\biogas
Geography: CH
Time period: 2000-01 to 2004-12
Production volume: max: 0.8t grass(DM)/d
Share of production covered: 100 %
Generated by: Michael Spielmann
accessRestrictedTo: 0
copyright: true

## General comment
The multioutput process "grass to digestion" describes a bio-refinery (grass-refinery) that delivers three co-products: biogas, proteins and fibres. Allocation for operation expenditures and emissions caused by the processing of grass has been performed by taking into account the revenues of the products. The above exchanges are allocated as follows: biogas: 16;

## Included processes
Data represents the environmental exchanges due to grass processing in a grass-refinery. Grass-digestion as well as production of fibres and proteins are included. Gas purification and the use of the gas for co-generation are not included. The required process energy (heat for grass-pre-treatment and drying of fibres and proteins and electricity for fibre presses, fans, blowers reception bells etc.) is obtained from conventional energy carriers and not from the use of biogas. Transport of grass to the plant is accounted for (10km). For infrastructure expenditures, the same infrastructure as for bio-ethanol production from grass is used as a first approximation.

## Geography
Conditions of plants in Schaffhausen (CH)

## Technology
Grass-refinery Up-flow anaerobic sludge bed (UASB) reactor design for biogas production

## Reference product
- xx Biogas, from grass, digestion, at storage [CH]: 1 m3
  SWITZERLAND

## Inputs from technosphere
- Grass from meadow intensive IP, at field [CH]: 0.49371 kg; lognormal SD95 1.1153
  (2,3,1,1,1,3); literature studies
- Grass from natural meadow extensive IP, at field [CH]: 0.092952 kg; lognormal SD95 1.1153
  (2,3,1,1,1,3); literature studies
- Electricity, low voltage, at grid [CH]: 0.083874 kWh; lognormal SD95 1.2335
  (2,3,2,3,1,5); literature studies and own consumptions
- Grass from natural meadow intensive IP, at field [CH]: 0.93714 kg; lognormal SD95 1.1153
  (2,3,1,1,1,3); oral communication
- Treatment, sewage grass refinery, to wastewater treatment, class 3 [CH]: 0.0060949 m3; lognormal SD95 1.5
  (3,3,2,3,1,5); own estimates based on literature studies
- Ethanol fermentation plant [CH]: 2.0253e-11 p; lognormal SD95 3.0661
  (3,3,2,3,1,5); own estimate
- Heat, natural gas, at boiler condensing modulating >100kW [RER]: 0.39353 MJ; lognormal SD95 1.2335
  (2,3,2,3,1,5); literature studies and own consumptions
- Transport, freight, lorry, 7.5t-16t gross weight, fleet average [CH]: 0.027276 tkm; lognormal SD95 2.0984
  (4,5,na,na,na,na); oral communication

## Inputs from nature
- Water, river [resources, in water]: 0.0019876 m3; lognormal SD95 3.0661
  (3,3,2,3,1,5); own calculation

## Emissions to nature
- Heat, waste [emissions to air, unspecified]: 0.30195 MJ; lognormal SD95 3.0569
  (2,3,2,3,1,5); own calculation
- Water [emissions to water, unspecified]: 1.88822 kg; lognormal SD95 2.5196
  (5,5,5,5,5,BU:1.05); All uncertainty-values set to 5.0 by default. Balance of input water

## Sampling procedure
Literature data

## Sources
- Jungbluth N., Chudacoff M., Dauriat A., Dinkel F., Doka G., Faist Emmenegger M., Gnansounou E., Kljun N., Spielmann M., Stettler C., Sutter J., 2007, 2007 - LCI bioenergy - Jungbluth, Final report ecoinvent data v2.0, 17, Swiss Centre for LCI, ESU-services Ltd., Duebendorf and Uster, CH
Jungbluth N., Chudacoff M., Dauriat A., Dinkel F., Doka G., Faist Emmenegger M., Gnansounou E., Kljun N., Spielmann M., Stettler C., Sutter J. (2007) Life Cycle Inventories of Bioenergy. Final report ecoinvent data v2.0. Volume: 17. Swiss Centre for LCI, ESU. Duebendorf and Uster, CH.
Type: Measurement on site
Source: CD-ROM
First author: Jungbluth N.
Other authors: Chudacoff M., Dauriat A., Dinkel F., Doka G., Faist Emmenegger M., Gnansounou E., Kljun N., Spielmann M., Stettler C., Sutter J.
Year: 2007
Title of anthology: Final report ecoinvent data v2.0
Place of publication: Duebendorf and Uster, CH
Publisher: Swiss Centre for LCI, ESU
Volume No: 17

## Validation
Proof reading validation: Passed.; Other validation: none;
