# Disposal, plastic, industr. electronics, 15.3% water, to municipal incineration

Dataset: EcoSpold 1, unit process
Functional unit: 1 kg
Category: waste management / municipal incineration
Geography: CH
Time period: 2000-01 to 2000-12
Generated by: Gabor Doka
accessRestrictedTo: 0
copyright: true

## General comment
This dataset represents the activity of waste disposal of waste plastic, industrial electronics in a municipal solid waste incinerator (MSWI) Recommended use of this dataset: For plastic parts from industrial electronics, which go to disposal as part of communal waste mixture, either after a separation procedure, or in small amounts as illegal disposal of a larger item of waste electronics (WEEE). Waste composition (wet, in ppm): upper heating value 36.24 MJ/kg; lower heating value 34.78 MJ/kg; H2O 7213.7; O 62000; H 73000; C 808000; S 400; N 13500; P 400; B n.a.; Cl 6400; Br 4200; F 370; I n.a.; Ag n.a.; As 5; Ba 217; Cd 186; Co 29.478; Cr 71; Cu 3194.1; Hg 0.3; Mn 9.8; Mo 4; Ni 299; Pb 165; Sb 4795.2; Se 1.9596; Sn 139; V 1; Zn 520; Be 0.46656; Sc n.a.; Sr 82.582; Ti 4767; Tl 0.37325; W n.a.; Si 2383; Fe 1673; Ca 3047; Al 2773; K 1; Mg n.a.; Na 151; Share of carbon in waste that is biogenic 0%. Share of metals in waste not oxidised and bulk-recyclable (exclude very small or thin parts) Iron: 0%; Alu: 0%; Copper: 0%. One kg of this waste produces 0.04613 kg of slag and 0.02153 kg of residues, which are landfilled. Additional solidification with 0.00861 kg of cement. Net energy production: 4.49MJ/kg electric energy and 8.69MJ/kg thermal energy. Recovery of metal scrap to recycling: 0g iron scrap, 0g aluminium scrap, 0g copper scrap.;;

## Included processes
Waste incineration from waste reception gate further downstream (excluding transport to the MSWI plant). Waste-specific air and water emisions from incineration, auxiliary material consumption for flue gas cleaning. Short-term emissions to river water and long-term emisisons to ground water from slag compartment (from bottom ash) and residual material landfill (from solidified fly ashes and scrubber slugde). Waste-specific process energy demands for MSWI and net energy generation.

## Geography
Specific to the technology mix encountered in Switzerland in 2010. Well applicable to modern incineration practices in Europe, North America or Japan.

## Technology
average Swiss MSWI plants in 2010 (grate incinerators) with electrostatic precipitator for fly ash (ESP), wet flue gas scrubber and 25% SNCR , 42.77% SCR-high dust , 32.68% SCR-low dust -DeNOx facilities and 0% without Denox (weighted according to mass of burnt waste, representing Swiss average). Efficiency of iron scrap separation from slag : 58%. Efficiency of non-ferrous scrap separation from slag : 31%. Gross electric efficiency technology mix 15.84% and Gross thermal efficiency technology mix 28.51%

## Time period
Waste composition as given in literature reference, theoretical data or other source. Transfer coefficients for modern MSWI.

## Reference product
- Disposal, plastic, industr. electronics, 15.3% water, to municipal incineration [CH]: 1 kg
  SWITZERLAND

## Inputs from technosphere
- Sodium hydroxide, 50% in H2O, production mix, at plant [RER]: 0.00089664 kg; lognormal SD95 2.7623
  auxilliary inputs for the flue gas treatment stage of the incinerator plant. uncertainty calculated from uncertainty in average NaOH input, of transfer coefficients in the incinerator, and the uncertainty of the waste composition of this waste
- Cement, unspecified, at plant [CH]: 0.0086105 kg; lognormal SD95 1.6478
  Cement required for solidification of landfilled residual material. Uncertainty calculated from uncertainty of the waste composition of this waste, of transfer coefficients in the incinerator and of the solidification recipe.
- Quicklime, milled, packed, at plant [CH]: 0.0039676 kg; lognormal SD95 3.1644
  auxilliary inputs for the flue gas treatment stage of the incinerator plant. uncertainty calculated from uncertainty in average CaO input, of transfer coefficients in the incinerator, and the uncertainty of the waste composition of this waste
- Hydrochloric acid, 30% in H2O, at plant [RER]: 7.7451e-5 kg; lognormal SD95 2.55
  auxilliary inputs for the wastewater treatment stage of the incinerator plant. uncertainty calculated from uncertainty in average HCl input, of transfer coefficients in the incinerator, and the uncertainty of the waste composition of this waste
- Iron (III) chloride, 40% in H2O, at plant [CH]: 0.00014468 kg; lognormal SD95 2.75
  auxilliary inputs for the wastewater treatment stage of the incinerator plant. uncertainty calculated from uncertainty in average FeCl3 input, of transfer coefficients in the incinerator, and the uncertainty of the waste composition of this waste
- Slag compartment [CH]: 7.9129e-11 p; lognormal SD95 1.5203
  landfill infrastructure required for landfilling of bottom ash. uncertainty is calculated from uncertainties in waste composition and transfer coefficients in incinerator
- Ammonia, liquid, at regional storehouse [CH]: 0.0023552 kg; lognormal SD95 5.1652
  Input to DeNOx stage (100% NH3). uncertainty calculated from uncertainty in average DeNOx input, uncertainty in the share of thermal NOx, uncertainty of nitrogen content in average municipal waste and the uncertainty in nitrogen content in *this* waste.
- Residual material landfill facility [CH]: 4.4846e-11 p; lognormal SD95 1.5867
  landfill infrastructure required for landfilling of incineration residues. uncertainty is calculated from uncertainties in waste composition and transfer coefficients in incinerator
- Chromium oxide, flakes, at plant [RER]: 3.0114e-6 kg; lognormal SD95 7.6363
  Input to DeNOx stage. uncertainty calculated from uncertainty in average DeNOx input, uncertainty in the share of thermal NOx, uncertainty of nitrogen content in average municipal waste and the uncertainty in nitrogen content in *this* waste.
- Disposal, cement, hydrated, 0% water, to residual material landfill [CH]: 0.021526 kg; lognormal SD95 1.6478
  Hydrated cement output for solidification of landfilled residual material. Uncertainty calculated from uncertainty of the waste composition of this waste and transfer coefficients in the incinerator and of the solidification recipe.
- Water, decarbonised, at plant [RER]: 1.8788 kg; lognormal SD95 2.75
  Incinerator process water used in flue gas scrubber stage. uncertainty calculated from uncertainty in average water input, and the uncertainty of the waste composition of this waste
- Transport, freight, rail [RER]: 0.011547 tkm; lognormal SD95 1.2532
  Transport services to transport incineration residues to landfills and to transport auxilliary inputs of the incinerator plant. uncertainty calculated from uncertainty in average auxiliary material input, the uncertainty of the waste composition of this waste and the uncertainty in generic transportation distances
- Process-specific burdens, slag compartment [CH]: 0.04451 kg; lognormal SD95 1.5203
  mass-specific expenditures required for landfilling of bottom ash. uncertainty is calculated from uncertainties in waste composition and transfer coefficients in incinerator
- Titanium dioxide, production mix, at plant [RER]: 0.00014756 kg; lognormal SD95 7.6363
  Input to DeNOx stage (TiO2 catalyst carrier) uncertainty calculated from uncertainty in average DeNOx input, uncertainty in the share of thermal NOx, uncertainty of nitrogen content in average municipal waste and the uncertainty in nitrogen content in *this* waste.
- Process-specific burdens, residual material landfill [CH]: 0.021526 kg; lognormal SD95 1.5867
  mass-specific expenditures required for landfilling of incineration residues. uncertainty is calculated from uncertainties in waste composition and transfer coefficients in incinerator
- Transport, freight, lorry, 16t-32t gross weight, fleet average [CH]: 0.01237 tkm; lognormal SD95 1.2145
  (same comment as for Transport, freight, rail)
- Natural gas, burned in industrial furnace 1MW [CH]: 0.44042 MJ; lognormal SD95 5.1652
  Input to DeNOx stage, to heat up flue gas in low-dust SCR. uncertainty calculated from uncertainty in average DeNOx input, uncertainty in the share of thermal NOx, uncertainty of nitrogen content in average municipal waste and the uncertainty in nitrogen content in *this* waste.
- Chemicals inorganic, at plant [GLO]: 0.00029467 kg; lognormal SD95 2.55
  auxilliary inputs for the wastewater treatment stage of the incinerator plant. Proxy for Polyelectrolyte. uncertainty calculated from uncertainty in average Polyelectrolyte input, of transfer coefficients in the incinerator, and the uncertainty of the waste composition of this waste
- Municipal waste incineration plant [CH]: 2.5e-10 p; lognormal SD95 1
  demands per kilogram waste. uncertainty is heeded in the module
- Chemicals organic, at plant [GLO]: 5.3924e-5 kg; lognormal SD95 5.7309
  auxilliary inputs for the wastewater treatment stage of the incinerator plant. Proxy for (pure) Trisodium-trimercapto-s-triazine (CAS 17766-26-6), used as 15% diluted solution, aka TMT15. uncertainty calculated from uncertainty in average TMT15 input, of transfer coefficients in the incinerator, and the uncertainty of the waste composition of this waste

## Emissions to nature
- Sulfate [emissions to water, groundwater, long-term]: 0.0009907 kg; lognormal SD95 3.8654
  Long-term emissions from landfilling of incineration residues. uncertainty is calculated from uncertainties in waste composition and transfer coefficients in incinerator and landfills.
- Chloride [emissions to water, river]: 0.0049134 kg; lognormal SD95 3.1963
  Emissions to water from waste composition and transfer coefficients in incinerator and landfills. uncertainty is calculated from uncertainties in waste composition and transfer coefficients in incinerator and landfills
- Phosphate [emissions to water, groundwater, long-term]: 5.3597e-5 kg; lognormal SD95 83.619
  (same comment as for Sulfate)
- Dioxin, 2,3,7,8 Tetrachlorodibenzo-p- [emissions to air, high. pop.]: 2.5151e-14 kg; lognormal SD95 3.3445
  Incomplete combustion product emitted to air. uncertainty calculated from uncertainty in average operation emissions, and the uncertainty of the flue gas volume from this waste.
- Nickel [emissions to water, groundwater, long-term]: 0.00028701 kg; lognormal SD95 5.9289
  (same comment as for Sulfate)
- Heat, waste [emissions to water, river]: 6.1242 MJ; lognormal SD95 1.276
  Waste heat generated from heating value of this waste plus any electricity required to process it. uncertainty is calculated from uncertainties in waste composition and uncertainties in energy efficiency and the uncertainty in internal energy demand
- Benzene [emissions to air, high. pop.]: 1.2576e-8 kg; lognormal SD95 1.6722
  (same comment as for Dioxin, 2,3,7,8 Tetrachlorodibenzo-p-)
- Cobalt [emissions to water, groundwater, long-term]: 2.4012e-5 kg; lognormal SD95 7.7618
  (same comment as for Sulfate)
- Particulates, < 2.5 um [emissions to air, high. pop.]: 1.5015e-6 kg; lognormal SD95 3.3445
  (same comment as for Dioxin, 2,3,7,8 Tetrachlorodibenzo-p-)
- NMVOC, non-methane volatile organic compounds, unspecified origin [emissions to air, high. pop.]: 5.7234e-7 kg; lognormal SD95 1.6722
  (same comment as for Dioxin, 2,3,7,8 Tetrachlorodibenzo-p-)
- Calcium [emissions to water, river]: 3.3732e-5 kg; lognormal SD95 3.525
  (same comment as for Chloride)
- Particulates, > 2.5 um, and < 10um [emissions to air, high. pop.]: 7.5452e-9 kg; lognormal SD95 2.2297
  (same comment as for Dioxin, 2,3,7,8 Tetrachlorodibenzo-p-)
- Titanium [emissions to water, groundwater, long-term]: 0.0014251 kg; lognormal SD95 4.8087
  (same comment as for Sulfate)
- Mercury [emissions to air, high. pop.]: 8.5061e-9 kg; lognormal SD95 13.913
  Emission to air from waste composition and transfer coefficients. uncertainty is calculated from uncertainties in waste composition and transfer coefficients in incinerator
- Manganese [emissions to water, groundwater, long-term]: 6.0458e-6 kg; lognormal SD95 19.823
  (same comment as for Sulfate)
- Toluene [emissions to air, high. pop.]: 2.5152e-8 kg; lognormal SD95 1.6722
  (same comment as for Dioxin, 2,3,7,8 Tetrachlorodibenzo-p-)
- Cadmium [emissions to air, high. pop.]: 9.4806e-8 kg; lognormal SD95 6.7081
  (same comment as for Mercury)
- Potassium [emissions to air, high. pop.]: 4.9405e-9 kg; lognormal SD95 12.39
  (same comment as for Mercury)
- Zinc [emissions to water, river]: 4.6916e-8 kg; lognormal SD95 4.9034
  (same comment as for Chloride)
- Sulfur dioxide [emissions to air, high. pop.]: 4.2538e-6 kg; lognormal SD95 5.915
  (same comment as for Mercury)
- Vanadium [emissions to water, river]: 1.5966e-9 kg; lognormal SD95 11.939
  (same comment as for Chloride)
- Sodium [emissions to water, groundwater, long-term]: 0.00010873 kg; lognormal SD95 4.0293
  (same comment as for Sulfate)
- COD, Chemical Oxygen Demand [emissions to water, groundwater, long-term]: 0.0060678 kg; lognormal SD95 1.2593
  (same comment as for Sulfate)
- Fluoride [emissions to water, groundwater, long-term]: 0.00033173 kg; lognormal SD95 3.7212
  (same comment as for Sulfate)
- Molybdenum [emissions to water, river]: 1.0925e-6 kg; lognormal SD95 7.1022
  (same comment as for Chloride)
- Aluminium [emissions to air, high. pop.]: 2.2609e-9 kg; lognormal SD95 4.7089
  (same comment as for Mercury)
- Vanadium [emissions to water, groundwater, long-term]: 4.6615e-7 kg; lognormal SD95 8.9797
  (same comment as for Sulfate)
- Dinitrogen monoxide [emissions to air, high. pop.]: 0.00020135 kg; lognormal SD95 8.1925
  Nitrogen species emitted to air after DeNOx stage. uncertainty calculated from uncertainty in average N-emissions and uncertainty in the share of thermal NOx and the uncertainty in nitrogen content in *this* waste.
- Nitrate [emissions to water, river]: 0.00017209 kg; lognormal SD95 2.6506
  (same comment as for Chloride)
- Antimony [emissions to water, river]: 0.0016528 kg; lognormal SD95 3.9454
  (same comment as for Chloride)
- Barium [emissions to water, groundwater, long-term]: 0.00010929 kg; lognormal SD95 19.814
  (same comment as for Sulfate)
- Silicon [emissions to water, groundwater, long-term]: 0.00024068 kg; lognormal SD95 96.81
  (same comment as for Sulfate)
- Benzene, hexachloro- [emissions to air, high. pop.]: 2.6296e-11 kg; lognormal SD95 1.6722
  (same comment as for Dioxin, 2,3,7,8 Tetrachlorodibenzo-p-)
- Chromium [emissions to water, river]: 5.513e-9 kg; lognormal SD95 7.7132
  (same comment as for Chloride)
- Phosphate [emissions to water, river]: 2.2488e-7 kg; lognormal SD95 4.5513
  (same comment as for Chloride)
- Zinc [emissions to air, high. pop.]: 3.4854e-7 kg; lognormal SD95 5.76
  (same comment as for Mercury)
- Iron [emissions to water, river]: 4.3981e-8 kg; lognormal SD95 6.4245
  (same comment as for Chloride)
- Beryllium [emissions to water, river]: 2.9222e-10 kg; lognormal SD95 19.184
  (same comment as for Chloride)
- Chloride [emissions to water, groundwater, long-term]: 0.0014831 kg; lognormal SD95 3.6572
  (same comment as for Sulfate)
- Arsenic [emissions to water, river]: 3.4636e-6 kg; lognormal SD95 9.3601
  (same comment as for Chloride)
- Nitrate [emissions to water, groundwater, long-term]: 0.00048555 kg; lognormal SD95 3.2081
  (same comment as for Sulfate)
- Bromine [emissions to water, groundwater, long-term]: 0.00040481 kg; lognormal SD95 4.0109
  (same comment as for Sulfate)
- Potassium [emissions to water, groundwater, long-term]: 7.7738e-7 kg; lognormal SD95 7.218
  (same comment as for Sulfate)
- Thallium [emissions to water, river]: 2.2866e-10 kg; lognormal SD95 15.411
  (same comment as for Chloride)
- Aluminium [emissions to water, groundwater, long-term]: 0.0020053 kg; lognormal SD95 3.9639
  (same comment as for Sulfate)
- Calcium [emissions to water, groundwater, long-term]: 0.0022696 kg; lognormal SD95 3.9877
  (same comment as for Sulfate)
- Titanium [emissions to water, river]: 1.7774e-6 kg; lognormal SD95 3.4563
  (same comment as for Chloride)
- Benzo(a)pyrene [emissions to air, high. pop.]: 2.7986e-13 kg; lognormal SD95 3.3445
  (same comment as for Dioxin, 2,3,7,8 Tetrachlorodibenzo-p-)
- Tin [emissions to water, groundwater, long-term]: 5.3198e-5 kg; lognormal SD95 14.582
  (same comment as for Sulfate)
- Benzene, pentachloro- [emissions to air, high. pop.]: 6.6444e-11 kg; lognormal SD95 1.6722
  (same comment as for Dioxin, 2,3,7,8 Tetrachlorodibenzo-p-)
- Strontium [emissions to water, groundwater, long-term]: 8.2474e-5 kg; lognormal SD95 7.2936
  (same comment as for Sulfate)
- Thallium [emissions to water, groundwater, long-term]: 2.178e-7 kg; lognormal SD95 9.5374
  (same comment as for Sulfate)
- Chromium [emissions to air, high. pop.]: 6.1998e-8 kg; lognormal SD95 7.6176
  (same comment as for Mercury)
- Cadmium [emissions to water, river]: 1.7827e-8 kg; lognormal SD95 5.754
  (same comment as for Chloride)
- TOC, Total Organic Carbon [emissions to water, groundwater, long-term]: 0.002401 kg; lognormal SD95 1.2593
  (same comment as for Sulfate)
- Sulfate [emissions to water, river]: 0.00020292 kg; lognormal SD95 3.3959
  (same comment as for Chloride)
- Phenol, pentachloro- [emissions to air, high. pop.]: 5.4768e-12 kg; lognormal SD95 1.6722
  (same comment as for Dioxin, 2,3,7,8 Tetrachlorodibenzo-p-)
- Iron [emissions to water, groundwater, long-term]: 0.00084401 kg; lognormal SD95 5.7669
  (same comment as for Sulfate)
- Arsenic [emissions to water, groundwater, long-term]: 1.4973e-6 kg; lognormal SD95 10.302
  (same comment as for Sulfate)
- Chromium VI [emissions to water, groundwater, long-term]: 6.513e-6 kg; lognormal SD95 11.408
  (same comment as for Sulfate)
- Ammonia [emissions to air, high. pop.]: 2.7691e-6 kg; lognormal SD95 5.5194
  (same comment as for Dinitrogen monoxide)
- Aluminium [emissions to water, river]: 3.001e-7 kg; lognormal SD95 6.5164
  (same comment as for Chloride)
- Lead [emissions to water, groundwater, long-term]: 7.9776e-5 kg; lognormal SD95 55.727
  (same comment as for Sulfate)
- Copper [emissions to air, high. pop.]: 2.9255e-7 kg; lognormal SD95 4.3681
  (same comment as for Mercury)
- Copper [emissions to water, river]: 4.1389e-7 kg; lognormal SD95 4.3638
  (same comment as for Chloride)
- Nitrogen oxides [emissions to air, high. pop.]: 0.00087688 kg; lognormal SD95 5.5194
  sum of fuel-Nox and thermal-NOx emitted to air after DeNOx stage. uncertainty calculated from uncertainty in average N-emissions and uncertainty in the share of thermal NOx and the uncertainty in nitrogen content in *this* waste.
- Mercury [emissions to water, groundwater, long-term]: 1.9107e-8 kg; lognormal SD95 36.979
  (same comment as for Sulfate)
- Cobalt [emissions to air, high. pop.]: 5.361e-8 kg; lognormal SD95 8.4681
  (same comment as for Mercury)
- Cyanide [emissions to air, high. pop.]: 4.3258e-5 kg; lognormal SD95 8.1925
  (same comment as for Dinitrogen monoxide)
- Bromine [emissions to air, high. pop.]: 2.0979e-6 kg; lognormal SD95 4.0804
  (same comment as for Mercury)
- Selenium [emissions to air, high. pop.]: 2.3377e-8 kg; lognormal SD95 11.492
  (same comment as for Mercury)
- Molybdenum [emissions to air, high. pop.]: 5.2632e-9 kg; lognormal SD95 10.693
  (same comment as for Mercury)
- Titanium [emissions to air, high. pop.]: 3.9549e-6 kg; lognormal SD95 4
  (same comment as for Mercury)
- Zinc [emissions to water, groundwater, long-term]: 0.00015813 kg; lognormal SD95 29.607
  (same comment as for Sulfate)
- Molybdenum [emissions to water, groundwater, long-term]: 2.9022e-6 kg; lognormal SD95 10.541
  (same comment as for Sulfate)
- Fluoride [emissions to water, river]: 2.8291e-5 kg; lognormal SD95 3.9922
  (same comment as for Chloride)
- Thallium [emissions to air, high. pop.]: 3.7325e-10 kg; lognormal SD95 13.764
  (same comment as for Mercury)
- Lead [emissions to water, river]: 1.5783e-8 kg; lognormal SD95 5.6618
  (same comment as for Chloride)
- DOC, Dissolved Organic Carbon [emissions to water, river]: 0.00041277 kg; lognormal SD95 1.3671
  (same comment as for Chloride)
- Copper [emissions to water, groundwater, long-term]: 0.0028531 kg; lognormal SD95 4.104
  (same comment as for Sulfate)
- Arsenic [emissions to air, high. pop.]: 3.9166e-8 kg; lognormal SD95 10.368
  (same comment as for Mercury)
- Barium [emissions to water, river]: 2.9207e-8 kg; lognormal SD95 8.64
  (same comment as for Chloride)
- Mercury [emissions to water, river]: 3.2581e-10 kg; lognormal SD95 9.2044
  (same comment as for Chloride)
- Cadmium [emissions to water, groundwater, long-term]: 1.3573e-5 kg; lognormal SD95 153.61
  (same comment as for Sulfate)
- Cobalt [emissions to water, river]: 5.3406e-9 kg; lognormal SD95 11.02
  (same comment as for Chloride)
- Manganese [emissions to air, high. pop.]: 1.8716e-9 kg; lognormal SD95 9.7969
  (same comment as for Mercury)
- Sodium [emissions to air, high. pop.]: 1.2397e-6 kg; lognormal SD95 6.8121
  (same comment as for Mercury)
- Carbon monoxide, fossil [emissions to air, high. pop.]: 2.1378e-5 kg; lognormal SD95 5.5742
  (same comment as for Dioxin, 2,3,7,8 Tetrachlorodibenzo-p-)
- DOC, Dissolved Organic Carbon [emissions to water, groundwater, long-term]: 0.002401 kg; lognormal SD95 1.2593
  (same comment as for Sulfate)
- Calcium [emissions to air, high. pop.]: 2.398e-5 kg; lognormal SD95 4.2436
  (same comment as for Mercury)
- Potassium [emissions to water, river]: 2.1768e-7 kg; lognormal SD95 7.7013
  (same comment as for Chloride)
- Beryllium [emissions to water, groundwater, long-term]: 4.2641e-7 kg; lognormal SD95 12.425
  (same comment as for Sulfate)
- Hydrogen fluoride [emissions to air, high. pop.]: 2.4963e-6 kg; lognormal SD95 5.9785
  (same comment as for Mercury)
- Vanadium [emissions to air, high. pop.]: 2.1209e-8 kg; lognormal SD95 12.32
  (same comment as for Mercury)
- Methane, fossil [emissions to air, high. pop.]: 1.8864e-7 kg; lognormal SD95 1.6722
  (same comment as for Dioxin, 2,3,7,8 Tetrachlorodibenzo-p-)
- TOC, Total Organic Carbon [emissions to water, river]: 0.00041277 kg; lognormal SD95 1.3671
  (same comment as for Chloride)
- Antimony [emissions to air, high. pop.]: 3.8413e-9 kg; lognormal SD95 4.2849
  (same comment as for Mercury)
- Antimony [emissions to water, groundwater, long-term]: 0.0030494 kg; lognormal SD95 3.7743
  (same comment as for Sulfate)
- Phosphorus [emissions to air, high. pop.]: 4.065e-7 kg; lognormal SD95 5.9536
  (same comment as for Mercury)
- Tin [emissions to air, high. pop.]: 9.0796e-11 kg; lognormal SD95 7.3441
  (same comment as for Mercury)
- Nickel [emissions to air, high. pop.]: 3.7561e-7 kg; lognormal SD95 6.2001
  (same comment as for Mercury)
- Heat, waste [emissions to air, high. pop.]: 26.647 MJ; lognormal SD95 1.276
  (same comment as for Heat, waste)
- Chromium VI [emissions to water, river]: 1.9843e-6 kg; lognormal SD95 8.0733
  (same comment as for Chloride)
- Bromine [emissions to water, river]: 0.0037931 kg; lognormal SD95 2.4198
  (same comment as for Chloride)
- Carbon dioxide, fossil [emissions to air, high. pop.]: 2.9448 kg; lognormal SD95 1.0786
  (same comment as for Mercury)
- Strontium [emissions to air, high. pop.]: 8.2582e-9 kg; lognormal SD95 7.5625
  (same comment as for Mercury)
- Barium [emissions to air, high. pop.]: 8.5174e-7 kg; lognormal SD95 6.4516
  (same comment as for Mercury)
- Silicon [emissions to water, river]: 5.8426e-7 kg; lognormal SD95 5.5577
  (same comment as for Chloride)
- Manganese [emissions to water, river]: 1.5255e-9 kg; lognormal SD95 8.0281
  (same comment as for Chloride)
- Sodium [emissions to water, river]: 4.1027e-5 kg; lognormal SD95 4.0091
  (same comment as for Chloride)
- Nickel [emissions to water, river]: 2.009e-7 kg; lognormal SD95 10.448
  (same comment as for Chloride)
- COD, Chemical Oxygen Demand [emissions to water, river]: 0.00094519 kg; lognormal SD95 1.3665
  (same comment as for Chloride)
- BOD5, Biological Oxygen Demand [emissions to water, river]: 0.00093304 kg; lognormal SD95 1.3714
  (same comment as for Chloride)
- Tin [emissions to water, river]: 3.6773e-9 kg; lognormal SD95 12.384
  (same comment as for Chloride)
- Selenium [emissions to water, groundwater, long-term]: 1.2727e-6 kg; lognormal SD95 8.0279
  (same comment as for Sulfate)
- Silicon [emissions to air, high. pop.]: 3.7116e-9 kg; lognormal SD95 4.7961
  (same comment as for Mercury)
- Strontium [emissions to water, river]: 5.1996e-8 kg; lognormal SD95 13.558
  (same comment as for Chloride)
- Hydrogen chloride [emissions to air, high. pop.]: 3.6522e-6 kg; lognormal SD95 3.7958
  (same comment as for Mercury)
- Selenium [emissions to water, river]: 6.6198e-7 kg; lognormal SD95 8.7658
  (same comment as for Chloride)
- Lead [emissions to air, high. pop.]: 1.3594e-8 kg; lognormal SD95 6.8644
  (same comment as for Mercury)
- Iron [emissions to air, high. pop.]: 2.9983e-9 kg; lognormal SD95 5.0625
  (same comment as for Mercury)
- BOD5, Biological Oxygen Demand [emissions to water, groundwater, long-term]: 0.0019848 kg; lognormal SD95 1.2593
  (same comment as for Sulfate)

## Sampling procedure
fully waste-specific calculation based on literature data for average MSWI operation performance

## Extrapolations
Typical elemental transfer coefficients from current studies for modern MSWI, completed with data from coal power plants and estimates, adapted for inert/burnable waste.

## Uncertainty adjustments
uncertainty of waste input composition data derived from generic formula GSD(c) = N*ln(c)+1

## Sources
- Doka G., 2013, 2013 - Updates LCI waste treatment services - Doka, -, Doka LCA, Zuerich, CH
Doka G. (2013) Updates to Life Cycle Inventories of Waste Treatment Services - part II: waste incineration. Doka LCA. Zurich.
Type: Separate publication
Source: Report to document the 2013 changes to the MSWI incinerator model and datasets (URL: http://www.doka.ch/ecoinventMSWIupdateLCI2013.pdf). To be read with the ecoinvent Nr 13 report (Doka 2009, Life Cycle Inventories of Waste Treatment Services) for ecoinvent v2.2.
First author: Doka G.
Year: 2013
Place of publication: Zurich
Publisher: Doka LCA
Original title: Updates to Life Cycle Inventories of Waste Treatment Services - part II: waste incineration

## Validation
Proof reading validation: Passed.; Other validation: none;
