# Treatment, sewage, from residence, to wastewater treatment, class 2

Dataset: EcoSpold 1, unit process
Functional unit: 1 m3
Category: wastewater treatment / unspecified
Geography: CH
Time period: 2000-01 to 2000-12
Generated by: Gabor Doka
accessRestrictedTo: 0
copyright: true

## General comment
Wastewater purified in a moderatly large municipal wastewater treatment plant (capacity class 2), with an average capacity size of 71100 per-captia-equivalents PCE. \nWastewater contains (in kg/m3): COD: 0.1556 (GSD=122.5%);

## Included processes
Infrastructure materials for municipal wastewater treatment plant, transports, dismantling. Land use burdens.

## Technology
Three stage wastewater treatment (mechanical, biological, chemical) including sludge digestion (fermentation) according to the average technology in Switzerland

## Reference product
- Treatment, sewage, from residence, to wastewater treatment, class 2 [CH]: 1 m3
  SWITZERLAND

## Inputs from technosphere
- Process-specific burdens, slag compartment [CH]: 0.023613 kg; lognormal SD95 1.4438
  burden from sludge incineration. Uncertainty calculated from wastewater composition and treatment model
- Ammonia, liquid, at regional storehouse [CH]: 7.2058e-5 kg; lognormal SD95 2.3097
  (same comment as for Process-specific burdens, slag compartment)
- Natural gas, burned in industrial furnace 1MW [CH]: 0.0070272 MJ; lognormal SD95 2.3097
  (same comment as for Process-specific burdens, slag compartment)
- Electricity, low voltage, at grid [CH]: 0.20571 kWh; lognormal SD95 1.2895
  direct wastewater treatment plant burden. Uncertainty calculated from wastewater composition and treatment model
- Chromium oxide, flakes, at plant [RER]: 4.2095e-8 kg; lognormal SD95 4.1037
  (same comment as for Process-specific burdens, slag compartment)
- Chemicals organic, at plant [GLO]: 5.2547e-7 kg; lognormal SD95 3.4892
  (same comment as for Process-specific burdens, slag compartment)
- Residential sewer grid [CH]: 2.8713e-7 km; lognormal SD95 1
  uncertainty heeded in exchanges of the module
- Cement, unspecified, at plant [CH]: 0.0014809 kg; lognormal SD95 1.5179
  (same comment as for Process-specific burdens, slag compartment)
- Residual material landfill facility [CH]: 7.7129e-12 p; lognormal SD95 1.4495
  (same comment as for Process-specific burdens, slag compartment)
- Titanium dioxide, production mix, at plant [RER]: 2.0626e-6 kg; lognormal SD95 4.1037
  (same comment as for Process-specific burdens, slag compartment)
- Transport, freight, rail [RER]: 0.019488 tkm; lognormal SD95 1.3489
  direct wastewater treatment plant burden plus burden from sludge incineration. Uncertainty calculated from wastewater composition and treatment model
- Wastewater treatment plant, class 2 [CH]: 1.9883e-9 p; lognormal SD95 1
  uncertainty heeded in exchanges of the module
- Transport, freight, lorry, 16t-32t gross weight, fleet average [CH]: 0.011756 tkm; lognormal SD95 1.0778
  (same comment as for Transport, freight, rail)
- Sewer grid, class 2 [CH]: 1.6832e-7 km; lognormal SD95 1
  uncertainty heeded in exchanges of the module
- Aluminium sulphate, powder, at plant [RER]: 0.0031512 kg; lognormal SD95 1.6175
  (same comment as for Electricity, low voltage, at grid)
- Municipal waste incineration plant [CH]: 3.2417e-11 p; lognormal SD95 1.1466
  (same comment as for Process-specific burdens, slag compartment)
- Electricity from waste, at municipal waste incineration plant [CH]: 0.018642 kWh; lognormal SD95 3.8066
  (same comment as for Process-specific burdens, slag compartment)
- Hydrochloric acid, 30% in H2O, at plant [RER]: 3.9503e-7 kg; lognormal SD95 1.4902
  (same comment as for Process-specific burdens, slag compartment)
- Slurry spreading, by vacuum tanker [CH]: 0.00032716 m3; lognormal SD95 1.0937
  burden from sludge spreading. Uncertainty calculated from wastewater composition and treatment model
- Iron sulphate, at plant [RER]: 0.01166 kg; lognormal SD95 1.6175
  (same comment as for Electricity, low voltage, at grid)
- Heat from waste, at municipal waste incineration plant [CH]: 0.10875 MJ; lognormal SD95 1.1564
  (same comment as for Process-specific burdens, slag compartment)
- Chemicals inorganic, at plant [GLO]: 6.5839e-7 kg; lognormal SD95 1.4902
  (same comment as for Process-specific burdens, slag compartment)
- Sodium hydroxide, 50% in H2O, production mix, at plant [RER]: 0.00035213 kg; lognormal SD95 1.5305
  (same comment as for Process-specific burdens, slag compartment)
- Process-specific burdens, residual material landfill [CH]: 0.0037022 kg; lognormal SD95 1.4495
  (same comment as for Process-specific burdens, slag compartment)
- Disposal, paper, 11.2% water, to municipal incineration [CH]: 0.0155 kg; lognormal SD95 1.07
  (same comment as for Electricity, low voltage, at grid)
- Quicklime, milled, packed, at plant [CH]: 1.2537e-6 kg; lognormal SD95 1.514
  (same comment as for Process-specific burdens, slag compartment)
- Disposal, cement, hydrated, 0% water, to residual material landfill [CH]: 0.0037022 kg; lognormal SD95 1.5179
  (same comment as for Process-specific burdens, slag compartment)
- Process-specific burdens, municipal waste incineration [CH]: 0.12967 kg; lognormal SD95 1.1466
  (same comment as for Process-specific burdens, slag compartment)
- Disposal, plastics, mixture, 15.3% water, to municipal incineration [CH]: 0.0155 kg; lognormal SD95 1.07
  (same comment as for Electricity, low voltage, at grid)
- Slag compartment [CH]: 4.1979e-11 p; lognormal SD95 1.4438
  (same comment as for Process-specific burdens, slag compartment)
- Iron (III) chloride, 40% in H2O, at plant [CH]: 0.015947 kg; lognormal SD95 1.6172
  (same comment as for Transport, freight, rail)

## Emissions to nature
- Phosphate [emissions to water, river]: 0.0027041 kg; lognormal SD95 1.4867
  sewer overload discharge plus direct wastewater treatment plant emission plus emission from sludge incineration plus emission from sludge spreading. Uncertainty calculated from wastewater composition and treatment model
- Chromium [emissions to water, river]: 1.1775e-8 kg; lognormal SD95 5.221
  emission from sludge incineration. Uncertainty calculated from wastewater composition and treatment model
- Chromium [emissions to soil, agricultural]: 2.3299e-6 kg; lognormal SD95 5.1415
  emission from sludge spreading. Uncertainty calculated from wastewater composition and treatment model
- Ammonium, ion [emissions to water, river]: 0.011027 kg; lognormal SD95 1.342
  direct wastewater treatment plant emission. Uncertainty calculated from wastewater composition and treatment model
- Cobalt [emissions to soil, agricultural]: 3.0813e-7 kg; lognormal SD95 5.1415
  (same comment as for Chromium)
- Lead [emissions to soil, agricultural]: 2.9713e-6 kg; lognormal SD95 5.1563
  (same comment as for Chromium)
- Zinc [emissions to soil, agricultural]: 2.9219e-5 kg; lognormal SD95 5.1488
  (same comment as for Chromium)
- Tin [emissions to air, high. pop.]: 1.6092e-9 kg; lognormal SD95 5.267
  direct digester gas emission plus emission from sludge incineration. Uncertainty calculated from wastewater composition and treatment model
- Aluminium [emissions to soil, agricultural]: 0.00056973 kg; lognormal SD95 3.6285
  (same comment as for Chromium)
- Iron [emissions to water, groundwater, long-term]: 0.003812 kg; lognormal SD95 7.0606
  (same comment as for Chromium)
- Dinitrogen monoxide [emissions to air, high. pop.]: 0.00010363 kg; lognormal SD95 1.4291
  direct wastewater treatment plant emission plus direct digester gas emission plus emission from sludge incineration plus emission from sludge spreading. Uncertainty calculated from wastewater composition and treatment model
- Arsenic [emissions to soil, agricultural]: 7.5114e-8 kg; lognormal SD95 5.1417
  (same comment as for Chromium)
- Chromium VI [emissions to water, river]: 6.3282e-6 kg; lognormal SD95 4.7244
  sewer overload discharge plus direct wastewater treatment plant emission plus emission from sludge incineration. Uncertainty calculated from wastewater composition and treatment model
- Calcium [emissions to water, river]: 0.045858 kg; lognormal SD95 4.8941
  (same comment as for Chromium VI)
- Molybdenum [emissions to water, river]: 5.3529e-7 kg; lognormal SD95 4.3594
  (same comment as for Chromium VI)
- Arsenic [emissions to air, high. pop.]: 2.5337e-10 kg; lognormal SD95 5.2875
  (same comment as for Tin)
- Copper [emissions to soil, agricultural]: 1.0725e-5 kg; lognormal SD95 5.1507
  (same comment as for Chromium)
- Molybdenum [emissions to soil, agricultural]: 1.8236e-7 kg; lognormal SD95 5.1415
  (same comment as for Chromium)
- Calcium [emissions to air, high. pop.]: 5.0981e-6 kg; lognormal SD95 5.2359
  (same comment as for Tin)
- COD, Chemical Oxygen Demand [emissions to water, river]: 0.030152 kg; lognormal SD95 1.4737
  (same comment as for Chromium VI)
- Iron [emissions to water, river]: 0.0036024 kg; lognormal SD95 4.8563
  (same comment as for Chromium VI)
- Cadmium [emissions to water, groundwater, long-term]: 8.5046e-10 kg; lognormal SD95 188.16
  (same comment as for Chromium)
- Nickel [emissions to soil, agricultural]: 1.003e-6 kg; lognormal SD95 5.1379
  (same comment as for Chromium)
- Sulfur [emissions to soil, agricultural]: 0.00059517 kg; lognormal SD95 1.6664
  (same comment as for Chromium)
- Cobalt [emissions to water, river]: 8.2109e-7 kg; lognormal SD95 4.8396
  (same comment as for Chromium VI)
- Iron [emissions to soil, agricultural]: 0.0051323 kg; lognormal SD95 2.0181
  (same comment as for Chromium)
- Chromium VI [emissions to water, groundwater, long-term]: 3.911e-7 kg; lognormal SD95 7.7721
  (same comment as for Chromium)
- Zinc [emissions to water, groundwater, long-term]: 7.1834e-7 kg; lognormal SD95 107.35
  (same comment as for Chromium)
- Cyanide [emissions to air, high. pop.]: 1.2855e-6 kg; lognormal SD95 2.4331
  (same comment as for Chromium)
- Molybdenum [emissions to air, high. pop.]: 5.7835e-10 kg; lognormal SD95 5.2398
  (same comment as for Tin)
- Silicon [emissions to water, groundwater, long-term]: 0.0001565 kg; lognormal SD95 105.04
  (same comment as for Chromium)
- Cadmium [emissions to air, high. pop.]: 4.7295e-12 kg; lognormal SD95 5.2987
  (same comment as for Tin)
- Nickel [emissions to water, river]: 3.9966e-6 kg; lognormal SD95 4.8551
  (same comment as for Chromium VI)
- Carbon dioxide, biogenic [emissions to air, high. pop.]: 0.19253 kg; lognormal SD95 1.3449
  direct wastewater treatment plant emission plus direct digester gas emission plus emission from sludge incineration. Uncertainty calculated from wastewater composition and treatment model
- Silicon [emissions to water, river]: 0.00018788 kg; lognormal SD95 4.2869
  (same comment as for Chromium VI)
- Ammonia [emissions to air, high. pop.]: 0.00035613 kg; lognormal SD95 2.639
  direct digester gas emission plus emission from sludge incineration plus emission from sludge spreading. Uncertainty calculated from wastewater composition and treatment model
- Phosphorus [emissions to air, high. pop.]: 1.3301e-6 kg; lognormal SD95 1.5989
  (same comment as for Tin)
- Cadmium [emissions to water, river]: 1.4246e-7 kg; lognormal SD95 4.8388
  (same comment as for Chromium VI)
- Lead [emissions to water, river]: 9.4873e-7 kg; lognormal SD95 4.4903
  (same comment as for Chromium VI)
- Sodium [emissions to water, river]: 0.002186 kg; lognormal SD95 4.9019
  (same comment as for Chromium VI)
- Mercury [emissions to soil, agricultural]: 5.3452e-8 kg; lognormal SD95 5.1488
  (same comment as for Chromium)
- Arsenic [emissions to water, river]: 7.5922e-7 kg; lognormal SD95 4.5002
  (same comment as for Chromium VI)
- Magnesium [emissions to air, high. pop.]: 4.7278e-7 kg; lognormal SD95 5.2359
  (same comment as for Tin)
- Zinc [emissions to air, high. pop.]: 7.5692e-10 kg; lognormal SD95 5.4328
  (same comment as for Tin)
- Chloride [emissions to water, river]: 0.040484 kg; lognormal SD95 3.7877
  (same comment as for Chromium VI)
- Magnesium [emissions to soil, agricultural]: 0.00021652 kg; lognormal SD95 5.1376
  (same comment as for Chromium)
- Phosphate [emissions to water, groundwater]: 1.4652e-5 kg; lognormal SD95 1.801
  (same comment as for Chromium)
- Tin [emissions to soil, agricultural]: 7.6487e-7 kg; lognormal SD95 5.1549
  (same comment as for Chromium)
- Copper [emissions to air, high. pop.]: 1.2554e-10 kg; lognormal SD95 5.4806
  (same comment as for Tin)
- Sulfur dioxide [emissions to air, high. pop.]: 0.00088615 kg; lognormal SD95 1.6648
  (same comment as for Tin)
- Aluminium [emissions to water, groundwater, long-term]: 0.00066857 kg; lognormal SD95 3.6817
  (same comment as for Chromium)
- Manganese [emissions to water, groundwater, long-term]: 1.3784e-5 kg; lognormal SD95 6.1702
  (same comment as for Chromium)
- Mercury [emissions to air, high. pop.]: 3.3683e-13 kg; lognormal SD95 5.3142
  (same comment as for Tin)
- Carbon monoxide, biogenic [emissions to air, high. pop.]: 0.00017096 kg; lognormal SD95 1.9653
  (same comment as for Tin)
- Lead [emissions to air, high. pop.]: 1.7517e-10 kg; lognormal SD95 5.3867
  (same comment as for Tin)
- Nickel [emissions to water, groundwater, long-term]: 1.4891e-6 kg; lognormal SD95 5.1316
  (same comment as for Chromium)
- Nitrogen [emissions to water, river]: 0.00049 kg; lognormal SD95 1.5053
  (same comment as for Ammonium, ion)
- Mercury [emissions to water, river]: 6.274e-8 kg; lognormal SD95 4.6953
  (same comment as for Chromium VI)
- Calcium [emissions to water, groundwater, long-term]: 0.0026613 kg; lognormal SD95 5.1447
  (same comment as for Chromium)
- COD, Chemical Oxygen Demand [emissions to water, groundwater, long-term]: 0.00026168 kg; lognormal SD95 1.7125
  (same comment as for Chromium)
- Potassium [emissions to water, river]: 0.0003989 kg; lognormal SD95 4.9019
  (same comment as for Chromium VI)
- BOD5, Biological Oxygen Demand [emissions to water, groundwater, long-term]: 8.5596e-5 kg; lognormal SD95 1.7125
  (same comment as for Chromium)
- Silicon [emissions to air, high. pop.]: 4.1957e-6 kg; lognormal SD95 5.2527
  (same comment as for Tin)
- Iron [emissions to air, high. pop.]: 2.7169e-7 kg; lognormal SD95 2.2508
  (same comment as for Tin)
- BOD5, Biological Oxygen Demand [emissions to water, river]: 0.0098229 kg; lognormal SD95 1.4543
  (same comment as for Chromium VI)
- Manganese [emissions to water, river]: 2.6898e-5 kg; lognormal SD95 4.8496
  (same comment as for Chromium VI)
- DOC, Dissolved Organic Carbon [emissions to water, river]: 0.0075378 kg; lognormal SD95 1.458
  (same comment as for Chromium VI)
- Aluminium [emissions to air, high. pop.]: 1.4113e-6 kg; lognormal SD95 3.7166
  (same comment as for Tin)
- Calcium [emissions to soil, agricultural]: 0.0019286 kg; lognormal SD95 5.1376
  (same comment as for Chromium)
- TOC, Total Organic Carbon [emissions to water, groundwater, long-term]: 0.00010355 kg; lognormal SD95 1.7125
  (same comment as for Chromium)
- Sulfate [emissions to water, groundwater, long-term]: 0.002367 kg; lognormal SD95 1.6594
  (same comment as for Chromium)
- Nitrate [emissions to water, groundwater, long-term]: 5.1309e-5 kg; lognormal SD95 1.5118
  (same comment as for Chromium)
- Tin [emissions to water, groundwater, long-term]: 6.0968e-7 kg; lognormal SD95 9.1263
  (same comment as for Chromium)
- Zinc [emissions to water, river]: 3.381e-5 kg; lognormal SD95 4.7746
  (same comment as for Chromium VI)
- Chromium [emissions to air, high. pop.]: 2.7317e-13 kg; lognormal SD95 5.7387
  (same comment as for Tin)
- Arsenic [emissions to water, groundwater, long-term]: 6.5411e-8 kg; lognormal SD95 5.1329
  (same comment as for Chromium)
- Fluoride [emissions to water, river]: 3.2769e-5 kg; lognormal SD95 4.9019
  (same comment as for Chromium VI)
- Mercury [emissions to water, groundwater, long-term]: 4.4099e-9 kg; lognormal SD95 30.745
  (same comment as for Chromium)
- Cobalt [emissions to water, groundwater, long-term]: 4.2779e-7 kg; lognormal SD95 5.1453
  (same comment as for Chromium)
- Magnesium [emissions to water, groundwater, long-term]: 0.00031695 kg; lognormal SD95 5.1323
  (same comment as for Chromium)
- TOC, Total Organic Carbon [emissions to water, river]: 0.0072994 kg; lognormal SD95 1.4594
  (same comment as for Chromium VI)
- DOC, Dissolved Organic Carbon [emissions to water, groundwater, long-term]: 0.00010355 kg; lognormal SD95 1.7125
  (same comment as for Chromium)
- Manganese [emissions to soil, agricultural]: 1.0095e-5 kg; lognormal SD95 5.1516
  (same comment as for Chromium)
- Sulfate [emissions to water, river]: 0.1449 kg; lognormal SD95 1.4557
  (same comment as for Chromium VI)
- Nitrogen oxides [emissions to air, high. pop.]: 0.00069993 kg; lognormal SD95 1.5125
  (same comment as for Tin)
- Methane, biogenic [emissions to air, high. pop.]: 0.0005024 kg; lognormal SD95 1.8727
  (same comment as for Tin)
- Cadmium [emissions to soil, agricultural]: 5.3452e-8 kg; lognormal SD95 5.1415
  (same comment as for Chromium)
- Copper [emissions to water, river]: 9.7125e-6 kg; lognormal SD95 4.7444
  (same comment as for Chromium VI)
- Phosphate [emissions to water, groundwater, long-term]: 0.00015578 kg; lognormal SD95 60.612
  (same comment as for Chromium)
- Nitrate [emissions to water, river]: 0.048305 kg; lognormal SD95 1.3168
  (same comment as for Chromium VI)
- Aluminium [emissions to water, river]: 6.232e-5 kg; lognormal SD95 4.1644
  (same comment as for Chromium VI)
- Cobalt [emissions to air, high. pop.]: 1.5513e-14 kg; lognormal SD95 5.7992
  (same comment as for Tin)
- Magnesium [emissions to water, river]: 0.0051484 kg; lognormal SD95 4.8942
  (same comment as for Chromium VI)
- Heat, waste [emissions to water, river]: 1.189 MJ; lognormal SD95 1.3796
  direct wastewater treatment plant emission plus emission from sludge incineration. Uncertainty calculated from wastewater composition and treatment model
- Silicon [emissions to soil, agricultural]: 0.0011366 kg; lognormal SD95 5.1684
  (same comment as for Chromium)
- Lead [emissions to water, groundwater, long-term]: 3.3568e-7 kg; lognormal SD95 189.49
  (same comment as for Chromium)
- Molybdenum [emissions to water, groundwater, long-term]: 2.392e-7 kg; lognormal SD95 5.133
  (same comment as for Chromium)
- Tin [emissions to water, river]: 1.4223e-6 kg; lognormal SD95 4.8281
  (same comment as for Chromium VI)
- Copper [emissions to water, groundwater, long-term]: 1.3747e-5 kg; lognormal SD95 5.2413
  (same comment as for Chromium)
- Manganese [emissions to air, high. pop.]: 8.7161e-14 kg; lognormal SD95 5.9374
  (same comment as for Tin)
- Heat, waste [emissions to air, high. pop.]: 1.2982 MJ; lognormal SD95 1.2928
  (same comment as for Heat, waste)
- NMVOC, non-methane volatile organic compounds, unspecified origin [emissions to air, high. pop.]: 2.2813e-6 kg; lognormal SD95 2.5254
  direct digester gas emission. Uncertainty calculated from wastewater composition and treatment model
- Carbon [emissions to soil, agricultural]: 0.0066874 kg; lognormal SD95 1.661
  (same comment as for Chromium)
- Nickel [emissions to air, high. pop.]: 6.8642e-14 kg; lognormal SD95 5.7649
  (same comment as for Tin)
- Nitrite [emissions to water, river]: 0.000644 kg; lognormal SD95 1.5041
  (same comment as for Ammonium, ion)

## Sources
- Doka G., 2009, 2009 - LCI waste treatment services - Doka, Final report ecoinvent data v2.1, 13, Swiss Centre for LCI, Doka LCA, Duebendorf and St. Gallen, CH
Doka G. (2008) Life Cycle Inventories of Waste Treatment Services. Final report ecoinvent data v2.1. Volume: 13. Issue: 0. Swiss Centre for LCI, Empa - TSL. Dübendorf, CH.
Type: Measurement on site
Source: CD-ROM
First author: Doka G.
Year: 2008
Title of anthology: Final report ecoinvent data v2.1
Place of publication: Dübendorf, CH
Publisher: Swiss Centre for LCI, Empa - TSL
Volume No: 13
Issue No: 0

## Validation
Proof reading validation: passed.; Other validation: none;
