# Fuel in transport, aircraft, passenger

Dataset: EcoSpold 1, unit process
Functional unit: 1 MJ
Category: transport systems / airplane
Geography: RER
Time period: 2009-01 to 2015-12
Production volume: 243'982'000'000pkm
Share of production covered: 100 %
Generated by: Rolf Frischknecht
accessRestrictedTo: 0
copyright: true

## General comment
Inventory refers to the entire transport life cycle. The avereage aircraft transport operated by Lufthansa Group includes 23.2% short-haul, 13.5% medium-haul and 63.3% long-haul flights. The mix of short-, medium- and long-haul flights is based on information from Lufthansa Group.;

## Included processes
The dataset describes the operation of aircrafts including taxying, take-off and landing covering fuel consumption and operation emissions. Aircraft manufacture and maintenance, airport construction, operation and dismantling are inputs to this dataset

## Geography
Data refers to average transport conditions of aircrafts operated by Lufthansa Group

## Technology
Aircraft operation modelled based on passenger aircrafts operated by Lufthansa Group in 2019. The emission profiles distinguish between LTO and cruise.

## Time period
Start date refers to emission factor data. End date refers to year of reporting fuel consumption and transport activities

## Reference product
- Fuel in transport, aircraft, passenger [RER]: 1 MJ
  Europe

## Inputs from technosphere
- Transport, aircraft, passenger, Betrieb [RER]: 0.664118 personkm

## Sampling procedure
fuel consumption is based on corporate data, emission profiles are based on FOEN statistics

## Extrapolations
Allocation between passengers and freight based on weight (average passenger weight between 158kg and 163kg); allocation between booking classes based on seat area.

## Sources
- Messmer A., Frischknecht R., 2016, 2016 - LCI air transport services - Messmer, Project report, 544, treeze Ltd., Uster, CH
Messmer A., Frischknecht R. (2015) Life cycle inventories of air transport services. Project report. Volume: 544. treeze Ltd.. Uster, CH.
Type: Separate publication
Source: Report
First author: Messmer A.
Other authors: Frischknecht R.
Year: 2015
Title of anthology: Project report
Place of publication: Uster, CH
Publisher: treeze Ltd.
Volume No: 544

## Validation
Proof reading validation: 09.03.2021; Other validation: G:\Projekte laufend\735 Aktualisierung Flugtransporte\EcoSpold\[735_aircraftTransport_2021_v0.10.xlsx]X-Process;
