# Sawmill

Dataset: EcoSpold 1, unit process
Functional unit: 1 p
Category: wood / wooden materials\new processes\other material
Geography: CH
Time period: 2000-01 to 2016-12
Generated by: default
accessRestrictedTo: 0
copyright: true

## Reference product
- Sawmill [CH]: 1 p

## Inputs from technosphere
- Transport, freight, rail [RER]: 251000 tkm; lognormal SD95 1.5103
  Pedigree: (1,1,4,5,4).
- Sheet rolling, steel [RER]: 470000 kg; lognormal SD95 1.80414
  Pedigree: (3,5,2,1,3).
- Transport, freight, lorry, fleet average [RER]: 335000 tkm; lognormal SD95 1.5103
  Pedigree: (1,1,4,5,4).
- Conveyor belt, at plant [RER]: 1230 m; lognormal SD95 1.80414
  Pedigree: (3,5,2,1,3).
- Disposal, concrete, 5% water, to construction waste landfill [CH]: 878000 kg
- Cast iron, at plant [RER]: 449000 kg; lognormal SD95 1.80414
  Pedigree: (3,5,2,1,3).
- Reinforcing steel, at plant [RER]: 33400 kg; lognormal SD95 1.12936
  Pedigree: (4,3,2,1,1).
- Steel, low-alloyed, at plant [RER]: 470000 kg; lognormal SD95 1.80414
  Pedigree: (3,5,2,1,3).
- Building, hall [CH]: 4280 m2; lognormal SD95 1.80414
  Pedigree: (3,5,2,1,3).
- Concrete, sole plate and foundation, at plant [CH]: 418 m3; lognormal SD95 1.80414
  Pedigree: (3,5,2,1,3).

## Inputs from nature
- Transformation, to industrial area [resources, land]: 19700 m2; lognormal SD95 1.507
  Pedigree: (3,5,2,1,3).
- Occupation, industrial area [resources, land]: 985000 m2a; lognormal SD95 1.32266
  Pedigree: (3,5,2,1,3).
- Transformation, from unknown [resources, land]: 19700 m2; lognormal SD95 1.507
  Pedigree: (3,5,2,1,3).

## Sources
- Werner F., 2017, 2017 - LCI wood and wood based products - Werner, Project Report, 0, Environment & Development, Zuerich, CH
