# Electric cargo bicycle production, without battery and motor

Dataset: EcoSpold 1, unit process
Functional unit: 1 p
Category: transport systems / road\Vehicle components\Energy storage\Lithium-ion battery
Geography: RER
Time period: 2020-01 to 2020-12
Generated by: Romain Sacchi
accessRestrictedTo: 0
copyright: False

## General comment
This is a copy of the ecoinvent dataset "electric bicycle production" where the battery and the electric motor have been removed.
Also, the additional weight comes from an increase in steel (20%) and wood (80%), to amount to a vehicle mas sof 50kg in total.
We assume teh cargo box is made of glue laminated spruce timber, with a density of 450 kg/m3..

## Time period
Base technology year of 2020

## Reference product
- Electric cargo bicycle production, without battery and motor [RER]: 1 p

## Inputs from technosphere
All rows: lognormal SD95 1.09366
- Metal working factory [RER]: 4.6e-10 p
  Uncertainty from pedigree matrix: (2, 3, 2, 1, 1, 3)
- Steel product manufacturing, average metal working [RER]: 1 kg
  Uncertainty from pedigree matrix: (2, 3, 2, 1, 1, 3)
- Steel, low-alloyed, at plant [RER]: 1, 12.5 kg (2 entries)
  Uncertainty from pedigree matrix: (2, 3, 2, 1, 1, 3)
- Polyethylene, HDPE, granulate, at plant [RER]: 1.96 kg
  Uncertainty from pedigree matrix: (2, 3, 2, 1, 1, 3)
- Injection moulding [RER]: 1.96 kg
  Uncertainty from pedigree matrix: (2, 3, 2, 1, 1, 3)
- Road vehicle plant [RER]: 1.32e-9 p
  Uncertainty from pedigree matrix: (2, 3, 2, 1, 1, 3)
- Heat, natural gas, at industrial furnace 1MW [CH]: 13.6 MJ
  Uncertainty from pedigree matrix: (2, 3, 2, 1, 1, 3)
- Aluminium, production mix, wrought alloy, at plant [RER]: 5.12 kg
  Uncertainty from pedigree matrix: (2, 3, 2, 1, 1, 3)
- Wire drawing, steel [RER]: 0.338 kg
  Uncertainty from pedigree matrix: (2, 3, 2, 1, 1, 3)
- Electricity, medium voltage, production ENTSO-E, at grid [ENTSO-E]: 6.89 kWh
  Uncertainty from pedigree matrix: (2, 3, 2, 1, 1, 3)
- Section bar extrusion, aluminium [RER]: 3.77 kg
  Uncertainty from pedigree matrix: (2, 3, 2, 1, 1, 3)
- Heat, heavy fuel oil, at industrial furnace 1MW [RER]: 0.193 MJ
  Uncertainty from pedigree matrix: (2, 3, 2, 1, 1, 3)
- Tap water, at user [RER]: 0.744 kg
  Uncertainty from pedigree matrix: (2, 3, 2, 1, 1, 3)
- Aluminium, production mix, cast alloy, at plant [RER]: 2.41 kg
  Uncertainty from pedigree matrix: (2, 3, 2, 1, 1, 3)
- Polyurethane, flexible foam, at plant [RER]: 0.03 kg
  Uncertainty from pedigree matrix: (2, 3, 2, 1, 1, 3)
- Synthetic rubber, at plant [RER]: 0.563 kg
  Uncertainty from pedigree matrix: (2, 3, 2, 1, 1, 3)
- Sheet rolling, chromium steel [RER]: 1.59 kg
  Uncertainty from pedigree matrix: (2, 3, 2, 1, 1, 3)
- Powder coating, aluminium sheet [RER]: 0.35 m2
  Uncertainty from pedigree matrix: (2, 3, 2, 1, 1, 3)
- Turning, chromium steel, conventional, average [RER]: 0.159 kg
  Uncertainty from pedigree matrix: (2, 3, 2, 1, 1, 3)
- Welding, arc, aluminium [RER]: 0.75 m
  Uncertainty from pedigree matrix: (2, 3, 2, 1, 1, 3)
- Three- and five-layered board, at plant [RER]: 0.05 m3
  Uncertainty from pedigree matrix: (2, 3, 2, 1, 1, 3)
- Disposal, municipal solid waste, 22.9% water, to municipal incineration [CH]: 4.5 kg
  Uncertainty from pedigree matrix: (2, 3, 2, 1, 1, 3)
- Treatment, sewage, to wastewater treatment, class 1 [CH]: 0.000671, 7.26e-5 m3 (2 entries)
  Uncertainty from pedigree matrix: (2, 3, 2, 1, 1, 3)

## Emissions to nature
- Water [emissions to air, unspecified]: 1.12e-10 kg; lognormal SD95 1.09366
  Uncertainty from pedigree matrix: (2, 3, 2, 1, 1, 3)

## Sources
- Sacchi R., Bauer C., 2023, 2023 - LCI on-road vehicles - Sacchi, PSI, Villigen, CH
doi: 10.5281/ZENODO.5156043
