# Transport, natural gas, pipeline, long distance

Dataset: EcoSpold 1, unit process
Functional unit: 1 tkm
Category: pipeline / unspecified
Geography: QA
Time period: 2000-01 to 2010-12
Share of production covered: 100 %
Generated by: Salome Schori
accessRestrictedTo: 0
copyright: true

## General comment
Transport of natural gas in European pipeline after LNG evaporation.;

## Included processes
This dataset describes the energy consumption and the emissions linked to the transport of 1 tkm natural gas from the Middle East in an onshore pipeline.

## Technology
Long-distance gas transport onshore with average compressor station.

## Time period
The data for emissions is from 1994, the data for energy requirements from 2001.

## Reference product
- Transport, natural gas, pipeline, long distance [QA]: 1 tkm
  Middle East

## Inputs from technosphere
- Disposal, used mineral oil, 10% water, to hazardous waste incineration [CH]: 1.16e-6 kg; lognormal SD95 1.0541
  (1,2,1,1,1,1,BU:1.05); mercury in condensate, based on dutch data; Dutch gas distribution company 2002
- Transport, freight, lorry, fleet average [RER]: 1.16e-7 tkm; lognormal SD95 2
  (1,1,1,1,1,1,BU:2); estimates for waste transport;
- Natural gas, burned in gas turbine, for compressor station [RU]: 0.72241 MJ; lognormal SD95 1.0714
  (2,1,1,1,1,1,BU:1.05); qualified estimates;
- Natural gas, at production [QA]: 0.00031514 m3; lognormal SD95 1.05
  (1,1,1,1,1,1,BU:1.05); published data ;
- Pipeline, natural gas, long distance, low capacity, onshore [GLO]: 3.5612e-9 km; lognormal SD95 3
  (1,1,1,1,1,1,BU:3); based on estimated standard capacity;

## Emissions to nature
- Butane [emissions to air, low. pop.]: 1.0452e-5 kg; lognormal SD95 1.5798
  (2,4,1,1,1,5,BU:1.5); calculated based on leakage and gas composition;
- Mercury [emissions to air, low. pop.]: 2.5721e-12 kg; lognormal SD95 5.0696
  (2,4,1,1,1,5,BU:5); calculated based on leakage and gas composition;
- Propane [emissions to air, low. pop.]: 1.1374e-5 kg; lognormal SD95 1.5798
  (2,4,1,1,1,5,BU:1.5); calculated based on leakage and gas composition;
- Methane, bromochlorodifluoro-, Halon 1211 [emissions to air, low. pop.]: 2.24e-8 kg; lognormal SD95 1.6249
  (2,3,1,1,3,5,BU:1.5); For cooling of compressor stations and fire protection. Based on dutch environmental report.; Gasunie 1998, Gasunie 2001
- Ethane [emissions to air, low. pop.]: 2.0913e-5 kg; lognormal SD95 1.6249
  (2,3,1,1,3,5,BU:1.5); calculated based on leakage and gas composition;
- Methane, chlorodifluoro-, HCFC-22 [emissions to air, low. pop.]: 6.93e-8 kg; lognormal SD95 1.6249
  (same comment as for Methane, bromochlorodifluoro-, Halon 1211)
- Methane, fossil [emissions to air, low. pop.]: 0.00016591 kg; lognormal SD95 1.5798
  (2,4,1,1,1,5,BU:1.5); calculated based on leakage and gas composition;

## Sampling procedure
statistics

## Sources
- Frischknecht R., Stucki M., Flury K., Itten R., Tuchschmid M., 2012, 2012 - Prim. energy fact. of energy systems - Frischknecht, Project report, 407, ESU-services Ltd., Uster, CH
Schori S., Frischknecht R. (2011) Life Cycle Inventories of energy systems. Project report. Volume: 407. ESU-services Ltd.. Uster, CH.
Type: Separate publication
Source: Report
First author: Schori S.
Other authors: Frischknecht R.
Year: 2011
Title of anthology: Project report
Place of publication: Uster, CH
Publisher: ESU-services Ltd.
Volume No: 407

## Validation
Proof reading validation: 24.09.2012; Other validation: \\server\e\ESU-Docs\Projekte laufend\407 Update LCI Energiesysteme\EcoSpold\Erdgas EcoSpold\[407_NG transport v0.4.xlsx]X-Process;
