# Surface treatment, outer door, opaquely painted, at plant

Dataset: EcoSpold 1, unit process
Functional unit: 1 m2
Category: building components / doors
Geography: CH
Time period: 2018-01 to 2019-12
Generated by: Livia Ramseier
accessRestrictedTo: 0
copyright: true

## General comment
The measures of the visible door leaf are 1m x 2m. The door and corresponding frame are painted. The bill of materials is based on data from door manufactures.;

## Included processes
Included are the materials used for the surface treatment (opaquely painted) of the outer door leaf and the door frame. Production losses and transport of the materials are included.

## Technology
Industry data.

## Time period
Time of publications.

## Reference product
- Surface treatment, outer door, opaquely painted, at plant [CH]: 1 m2
  SWITZERLAND

## Inputs from technosphere
- Alkyd paint, white, 60% in H2O, at plant [RER]: 0.86132 kg; lognormal SD95 1.1635
  (3,3,1,1,1,4,BU:1.05); Primer / impregnation; Average of data from manufacturers
- Acrylic varnish, 87.5% in H2O, at plant [RER]: 0.89314 kg; lognormal SD95 1.1635
  (3,3,1,1,1,4,BU:1.05); opaquely painted; Average of data from manufacturers
- Transport, freight, rail, electricity with shunting [CH]: 1.0527 tkm; lognormal SD95 2.0296
  (3,3,1,1,1,4,BU:2); Transportation to production site; Frischknecht et al. 2007
- Disposal, building, paint on wood, to final disposal [CH]: 0.4271 kg; lognormal SD95 1.1635
  (3,3,1,1,1,4,BU:1.05); Disposal production waste paint; Average of data from manufacturers
- Transport, freight, lorry, fleet average [CH]: 0.087723 tkm; lognormal SD95 2.0296
  (3,3,1,1,1,4,BU:2); Transportation to production site; Frischknecht et al. 2007
- Transport, municipal waste collection, lorry 21t [CH]: 0.004271 tkm; lognormal SD95 1.1635
  (3,3,1,1,1,4,BU:1.05); Transportation production waste to municipal incineration; Frischknecht et al. 2007

## Sampling procedure
Data survey at 4 door manufactures in Switzerland.

## Extrapolations
Some generic datasets from ecoinvent have been used.

## Sources
- Ramseier L., Stolz P., Frischknecht R., 2020, 2020 - LCA wooden windows and doors - Ramseier, Project report, 634, treeze Ltd., Uster, CH
Ramseier L., Stolz P., Frischknecht R. (2020) Ökobilanz von Holzfenstern und Holztüren. Project report. Volume: 634. treeze Ltd.. Uster, CH.
Type: Separate publication
Source: Report
First author: Ramseier L.
Other authors: Stolz P., Frischknecht R.
Year: 2020
Title of anthology: Project report
Place of publication: Uster, CH
Publisher: treeze Ltd.
Volume No: 634

## Validation
Proof reading validation: 16.06.2021; Other validation: G:\Projekte laufend\634 Holzfenster u.-türen, energieSchweiz\EcoSpold\UVEK2021\[634_EcoSpold_Türen_v1.5_UVEK2021_v0.1.xlsx]X-Process;
