# Trimethyl borate, at plant

Dataset: EcoSpold 1, unit process
Functional unit: 1 kg
Category: chemicals / organic
Geography: GLO
Time period: 2000-01 to 2006-12
Share of production covered: 100 %
Generated by: Juergen Sutter
accessRestrictedTo: 0
copyright: true

## General comment
The process "trimethylborate, at plant, GLO" is modelled for the production of trimethylborate from boric acid in the world. Raw materials are modelled with a stoechiometric calculation. Energy consumptions and emissions are estimated. Infrastructure and transports are calculated with standard values.;
CAS number: 000121-43-7;
Formula: (CH3O)3B;
Synonyms: methyl borate, boric acid trimethyl ester, boron methoxide;

## Included processes
Production of trimethylborate including materials, energy uses, infrastructure and emissions.

## Technology
Methylation of boric acid

## Time period
Time of publications

## Reference product
- Trimethyl borate, at plant [GLO]: 1 kg
  Global

## Inputs from technosphere
- Electricity, medium voltage, production ENTSO-E, at grid: 0.00725 kWh; lognormal SD95 1.3485
  (3,3,3,1,3,5); Estimation
- Boric acid, anhydrous, powder, at plant [RER]: 0.62753 kg; lognormal SD95 1.3765
  (4,5,1,1,1,5); Stoechiometric calculation
- Transport, freight, rail [RER]: 0.95951 tkm; lognormal SD95 2.095
  (4,5,na,na,na,na); Standard distances
- Methanol, at plant [GLO]: 0.97166 kg; lognormal SD95 1.3765
  (4,5,1,1,1,5); Stoechiometric calculation
- Chemical plant, organics [RER]: 4e-10 p; lognormal SD95 3.0909
  (4,5,na,na,na,na); Estimation
- Heat, natural gas, at industrial furnace 1MW [CH]: 8.84 MJ; lognormal SD95 1.3001
  (4,5,na,na,na,na); Estimation
- Transport, freight, lorry, fleet average [RER]: 0.15992 tkm; lognormal SD95 2.095
  (4,5,na,na,na,na); Standard distances

## Inputs from nature
- Water, cooling, unspecified natural origin/m3 [resources, in water]: 0.024 m3; lognormal SD95 1.3001
  (4,5,na,na,na,na); Estimation

## Emissions to nature
- Heat, waste [emissions to air, high. pop.]: 0.0261 MJ; lognormal SD95 1.3485
  (3,3,3,1,3,5); Calculated from the electricity input
- DOC, Dissolved Organic Carbon [emissions to water, river]: 0.00175 kg; lognormal SD95 1.6169
  (4,5,na,na,na,na); Calculated from the water emissions
- Boron [emissions to water, river]: 0.0053441 kg; lognormal SD95 5.1037
  (4,5,na,na,na,na); Estimation
- BOD5, Biological Oxygen Demand [emissions to water, river]: 0.00671 kg; lognormal SD95 1.6169
  (4,5,na,na,na,na); Calculated from the water emissions
- Boron [emissions to air, high. pop.]: 0.00022267 kg; lognormal SD95 5.1037
  (4,5,na,na,na,na); Estimation
- Carbon dioxide, fossil [emissions to air, high. pop.]: 0.057717 kg; lognormal SD95 1.3001
  (4,5,na,na,na,na); Estimation
- TOC, Total Organic Carbon [emissions to water, river]: 0.00175 kg; lognormal SD95 1.6169
  (4,5,na,na,na,na); Calculated from the water emissions
- COD, Chemical Oxygen Demand [emissions to water, river]: 0.00671 kg; lognormal SD95 1.6169
  (4,5,na,na,na,na); Calculated from the water emissions
- Methanol [emissions to air, high. pop.]: 0.0019433 kg; lognormal SD95 1.6169
  (4,5,na,na,na,na); Estimation
- Methanol [emissions to water, river]: 0.004664 kg; lognormal SD95 3.0909
  (4,5,na,na,na,na); Estimation
- Water [emissions to water, unspecified]: 22.8 kg; lognormal SD95 2.5196
  (5,5,5,5,5,BU:1.05); All uncertainty-values set to 5.0 by default. Balance of input water

## Sampling procedure
Standard values

## Sources
- Sutter J., 2007, 2007 - LCI highly pure chemicals - Sutter, Final report ecoinvent Data v2.0, 19, Swiss Centre for LCI, ETH, Duebendorf and Uster, CH
Sutter, J., 0 (2007) Life Cycle Inventories of Highly Pure Chemicals. Final report ecoinvent Data v2.0. Editors: 0. Volume: 19. Swiss Centre for LCI, ETHZ. Duebendorf and St. Gallen, CH.
Type: Measurement on site
Source: CD-ROM
First author: Sutter, J.
Other authors: 0
Year: 2007
Name of editors: 0
Title of anthology: Final report ecoinvent Data v2.0
Place of publication: Duebendorf and St. Gallen, CH
Publisher: Swiss Centre for LCI, ETHZ
Volume No: 19

## Validation
Proof reading validation: passed; Other validation: none;
