# Power sawing, without catalytic converter, holzpur

Dataset: EcoSpold 1, unit process
Functional unit: 1 hr
Category: construction processes / machinery
Geography: CH
Time period: 2000-01 to 2015-12
Generated by: Philippe Stolz
accessRestrictedTo: 0
copyright: true

## General comment
All measured emissions are taken from an old (1993) EMPA report. The type of power saw probably does not correspond to the type described in the infrastructure, but this discrepancy can be accepted. Data on the use of fuel and lubricating oil are specific for the Korporation Giswil, which delivers the wood to Walter Küng AG for the production of holzpur elements. Lubricating oil is modelled by soya oil. Correcting modules for the transport of soya oil are applied. Air and oil emissions are scaled to the use of fuel and lubricating oil.;

## Included processes
Includes the power saw (infrastructure), fuel use, lubricating oil and some measured air emissions (including emissions from combustion of the fuel).

## Technology
Industry data.

## Time period
Time of publications.

## Reference product
- Power sawing, without catalytic converter, holzpur [CH]: 1 hr
  SWITZERLAND

## Inputs from technosphere
- Chromium steel 18/8, at plant [RER]: 0.0122 kg; lognormal SD95 1.323
  (1,5,3,3,1,5,BU:1.05); ; ecoinvent report 7
- Petrol, two-stroke blend, at regional storage [CH]: 0.5 kg; lognormal SD95 1.323
  (1,5,3,3,1,5,BU:1.05); ; André Halter, personal communication 16.12.2014
- Soya oil, at plant [RER]: 0.31 kg; lognormal SD95 1.691
  (5,5,3,3,3,5,BU:1.05); Lubricating oil; André Halter, personal communication 16.12.2014
- Power saw, without catalytic converter [RER]: 0.0004 p; lognormal SD95 3.1039
  (1,5,3,3,1,5,BU:3); ; ecoinvent report 7
- Transport, freight, lorry, 16t-32t gross weight, fleet average [CH]: 0.0155 tkm; lognormal SD95 2.095
  (4,5,na,na,na,na,BU:2); Transport of soya oil to end-user, standard distance 50km; ecoinvent report 7
- Transport, freight, lorry, fleet average [RER]: -0.3906 tkm; lognormal SD95 2.095
  (4,5,na,na,na,na,BU:2); Reduction of transport of soya oil (1.46tkm/kg), addition of european transport, standard distance 200km; ecoinvent report 7
- Transport, transoceanic freight ship [OCE]: -3.751 tkm; lognormal SD95 2.095
  (4,5,na,na,na,na,BU:2); Reduction of transport of soya oil (12.1tkm/kg); ecoinvent report 7
- Transport, freight, rail [RER]: -0.04681 tkm; lognormal SD95 2.095
  (4,5,na,na,na,na,BU:2); Reduction of transport of soya oil (0.351tkm/kg), addition of european transport, standard distance 200km; ecoinvent report 7
- Transport, barge [RER]: -0.24986 tkm; lognormal SD95 2.095
  (4,5,na,na,na,na,BU:2); Reduction of transport of soya oil (0.806tkm/kg); ecoinvent report 7

## Emissions to nature
- NMVOC, non-methane volatile organic compounds, unspecified origin [emissions to air, low. pop.]: 0.12887 kg; lognormal SD95 1.6327
  (1,5,3,3,1,5,BU:1.5); Scaled to petrol use; ecoinvent report 7
- Methane, fossil [emissions to air, low. pop.]: 0.0026291 kg; lognormal SD95 1.6327
  (1,5,3,3,1,5,BU:1.5); Scaled to petrol use; ecoinvent report 7
- Carbon dioxide, fossil [emissions to air, low. pop.]: 0.65728 kg; lognormal SD95 1.323
  (1,5,3,3,1,5,BU:1.05); Scaled to petrol use; ecoinvent report 7
- Sulfur dioxide [emissions to air, low. pop.]: 0.0003216 kg; lognormal SD95 1.323
  (1,5,3,3,1,5,BU:1.05); Scaled to petrol use; ecoinvent report 7
- Carbon monoxide, fossil [emissions to air, low. pop.]: 0.31221 kg; lognormal SD95 5.1185
  (1,5,3,3,1,5,BU:5); Scaled to petrol use; ecoinvent report 7
- Oils, biogenic [emissions to soil, forestry]: 0.031 kg; lognormal SD95 1.6327
  (1,5,3,3,1,5,BU:1.5); Assumption: 10% of lubricating oil use; ecoinvent report 7
- Lead [emissions to air, low. pop.]: 3.4742e-5 kg; lognormal SD95 5.1185
  (1,5,3,3,1,5,BU:5); Scaled to petrol use; ecoinvent report 7
- Nitrogen oxides [emissions to air, low. pop.]: 0.00070423 kg; lognormal SD95 1.6327
  (1,5,3,3,1,5,BU:1.5); Scaled to petrol use; ecoinvent report 7

## Sampling procedure
Data survey at the Korporation Giswil in Switzerland.

## Extrapolations
Some generic datasets from ecoinvent have been used.

## Sources
- Stolz P., Frischknecht R., 2015, 2015 - LCA solid wood system holzpur - Stolz, Project report, 527, treeze Ltd., Uster, CH
Stolz P., Frischknecht R. (2015) Ökobilanz Vollholzsystem holzpur. Project report. Volume: 527. treeze Ltd.. Uster, CH.
Type: Separate publication
Source: Report
First author: Stolz P.
Other authors: Frischknecht R.
Year: 2015
Title of anthology: Project report
Place of publication: Uster, CH
Publisher: treeze Ltd.
Volume No: 527

## Validation
Proof reading validation: 08.05.2015; Other validation: \\SRV01\ESU-Docs\Projekte laufend\527 Bilanz Holzpur\EcoSpold\[527-Ökobilanz-holzpur-v0.16.xlsx]X-Process;
