# Wood pellet manufacturing, infrastructure

Dataset: EcoSpold 1, unit process, infrastructure
Functional unit: 1 p
Category: wood / products\infrastructure
Geography: RER
Time period: 2000-01 to 2000-12
Generated by: Hans-Joerg Althaus
accessRestrictedTo: 0
copyright: true

## General comment
The capacity of the pellet extruder (output = 1250 kg/h) fits the need better than edge mills which would have higher output per machine weight. The life time of the infrastructure is assumed as 50 years (machines are replaced once in this time). The life time output is 1E8 m3 pellets. This data must only be used to consider the infrastructure needed for pelletising wood if this is not relevant.;
Synonyms: Pelletierpresse, Kolbenstrangpresse, extruder;

## Included processes
The material (production and disposal) and their transports needed for a wood pellet manufacturing machine in a sawmill. Land used is only included for the hall in which the process is run and the pellets are stored as the rest is already included in the sawmill.

## Technology
Pellet extruder

## Reference product
- Wood pellet manufacturing, infrastructure [RER]: 1 p
  Europe

## Inputs from technosphere
- Building, hall [CH]: 200 m2; lognormal SD95 3.2
  (3,5,1,3,3,5);
- Transport, freight, lorry, fleet average [RER]: 400 tkm; lognormal SD95 2.1
  (4,5,nA,nA,nA,nA);
- Transport, freight, rail [RER]: 250 tkm; lognormal SD95 2.1
  (4,5,nA,nA,nA,nA);
- Steel, low-alloyed, at plant [RER]: 2000 kg; lognormal SD95 3.2
  (3,5,1,3,3,5);
- Concrete, sole plate and foundation, at plant [CH]: 0.455 m3; lognormal SD95 3.2
  (3,5,1,3,3,5);
- Disposal, building, reinforced concrete, to final disposal [CH]: 1000 kg; lognormal SD95 3.2
  (3,5,1,3,3,5);
- Sheet rolling, steel [RER]: 2000 kg; lognormal SD95 3.2
  (3,5,1,3,3,5);

## Inputs from nature
- Transformation, to industrial area, built up [resources, land]: 200 m2; lognormal SD95 2.2
  (3,5,1,3,3,5);
- Transformation, from unknown [resources, land]: 200 m2; lognormal SD95 2.2
  (3,5,1,3,3,5);
- Occupation, industrial area, built up [resources, land]: 200 m2a; lognormal SD95 1.7
  (3,5,1,3,3,5);

## Sampling procedure
estimation

## Sources
- Werner F., Althaus H.-J., Kuenniger T., Richter K., Jungbluth N., 2007, 2007 - LCI wood as fuel and const. mat. - Werner, Final report ecoinvent data v2.0, 9, Swiss Centre for LCI, Empa - TSL, ESU-services Ltd., Duebendorf, CH
Werner F., Althaus H.-J., Künniger T., Richter K., Jungbluth N. (2007) 1Life Cycle Inventories of Wood as Fuel and Construction Material. Final report ecoinvent data v2.0. Volume: 9. Issue: 0. Swiss Centre for LCI, Empa - TSL. Dübendorf, CH.
Type: Measurement on site
Source: CD-ROM
First author: Werner F.
Other authors: Althaus H.-J., Künniger T., Richter K., Jungbluth N.
Year: 2007
Title of anthology: Final report ecoinvent data v2.0
Place of publication: Dübendorf, CH
Publisher: Swiss Centre for LCI, Empa - TSL
Volume No: 9
Issue No: 0

## Validation
Proof reading validation: passed; Other validation: none;
