# xx 3-methyl-1-butyl acetate, at plant

Dataset: EcoSpold 1, unit process
Functional unit: 1 kg
Category: material, obsolete / chemicals, obsolete\organic, obsolete
Geography: RER
Time period: 2000-01 to 2005-12
Share of production covered: 100 %
Generated by: Juergen Sutter
accessRestrictedTo: 0
copyright: true

## General comment
The process "3-methyl-1-butyl acetate, at plant, RER" is modelled for the production of 3-methyl-1-butyl acetate from 3-methyl-1-butanol in Europe. Raw materials are modelled with a stoechiometric calculation. Energy consumptions are modelled with data from a similar process. The emissions are estimated. Infrastructure and transports are calculated with standard values.;
CAS number: 000123-92-2;
Formula: C7H14O2;
Synonyms: isopentyl acetate;

## Included processes
Production of 3-methyl-1-butyl acetate including materials, energy uses, infrastructure and emissions.

## Geography
The inventory is modelled for Europe.

## Technology
Esterification of 3-methyl-1-butanol

## Time period
Time of publications

## Reference product
- xx 3-methyl-1-butyl acetate, at plant [RER]: 1 kg
  Europe

## Inputs from technosphere
- Heat, unspecific, in chemical plant [RER]: 8.84 MJ; lognormal SD95 1.4501
  (4,5,4,3,3,3); Estimation
- Acetic acid, 98% in H2O, at plant [RER]: 0.48583 kg; lognormal SD95 1.3765
  (4,5,1,1,1,5); Stoechiometric calculation
- Sulphuric acid, liquid, at plant [RER]: 0.0131 kg; lognormal SD95 1.4501
  (4,5,4,3,3,3); Estimation
- Chemical plant, organics [RER]: 4e-10 p; lognormal SD95 3.0909
  (4,5,na,na,na,na); Estimation
- Transport, freight, rail [RER]: 0.72689 tkm; lognormal SD95 2.095
  (4,5,na,na,na,na); Standard distances
- Electricity, medium voltage, production ENTSO-E, at grid: 0.00725 kWh; lognormal SD95 1.4501
  (4,5,4,3,3,3); Estimation
- 3-methyl-1-butanol, at plant [RER]: 0.71255 kg; lognormal SD95 1.3765
  (4,5,1,1,1,5); Stoechiometric calculation
- Transport, freight, lorry, fleet average [RER]: 0.12115 tkm; lognormal SD95 2.095
  (4,5,na,na,na,na); Standard distances

## Inputs from nature
- Water, cooling, unspecified natural origin/m3 [resources, in water]: 0.024 m3; lognormal SD95 1.3001
  (4,5,na,na,na,na); Estimation

## Emissions to nature
- Acetic acid [emissions to water, river]: 0.002332 kg; lognormal SD95 3.0909
  (4,5,na,na,na,na); Estimation
- Acetic acid [emissions to air, high. pop.]: 0.00097166 kg; lognormal SD95 1.6169
  (4,5,na,na,na,na); Estimation
- Carbon dioxide, fossil [emissions to air, high. pop.]: 0.076955 kg; lognormal SD95 1.3001
  (4,5,na,na,na,na); Calculated from the water treatment
- Sulfate [emissions to water, river]: 0.012833 kg; lognormal SD95 1.6169
  (4,5,na,na,na,na); Estimation
- TOC, Total Organic Carbon [emissions to water, river]: 0.00326 kg; lognormal SD95 1.6169
  (4,5,na,na,na,na); Calculated from the water emissions
- Heat, waste [emissions to air, high. pop.]: 0.0261 MJ; lognormal SD95 1.4501
  (4,5,4,3,3,3); Calculated from the electricity input
- DOC, Dissolved Organic Carbon [emissions to water, river]: 0.00326 kg; lognormal SD95 1.6169
  (4,5,na,na,na,na); Calculated from the water emissions
- 3-Methyl-1-butanol [emissions to water, river]: 0.0034202 kg; lognormal SD95 1.3001
  (4,5,na,na,na,na); Estimation
- 3-Methyl-1-butanol [emissions to air, high. pop.]: 0.0014251 kg; lognormal SD95 1.3001
  (4,5,na,na,na,na); Estimation
- COD, Chemical Oxygen Demand [emissions to water, river]: 0.0113 kg; lognormal SD95 1.6169
  (4,5,na,na,na,na); Calculated from the water emissions
- BOD5, Biological Oxygen Demand [emissions to water, river]: 0.0113 kg; lognormal SD95 1.6169
  (4,5,na,na,na,na); Calculated from the water emissions
- Water [emissions to water, unspecified]: 22.8 kg; lognormal SD95 2.5196
  (5,5,5,5,5,BU:1.05); All uncertainty-values set to 5.0 by default. Balance of input water

## Sampling procedure
Literature data

## Extrapolations
Transports and emissions are modelled with standard methods.

## Sources
- Sutter J., 2007, 2007 - LCI petrochemical solvents - Sutter, Final report ecoinvent Data v2.0, 22, Swiss Centre for LCI, ETH, Duebendorf and Uster, CH
Sutter, J., 0 (2007) Life Cycle Inventories of Petrochemical Solvents. Final report ecoinvent Data v2.0. Editors: 0. 0. Volume: 22. Issue: 0. Swiss Centre for LCI, ETHZ. Duebendorf and St. Gallen, CH.
Type: Measurement on site
Source: CD-ROM
First author: Sutter, J.
Other authors: 0
Year: 2007
Name of editors: 0
Title of anthology: Final report ecoinvent Data v2.0
Place of publication: Duebendorf and St. Gallen, CH
Publisher: Swiss Centre for LCI, ETHZ
Journal: 0
Volume No: 22
Issue No: 0

## Validation
Proof reading validation: passed.; Other validation: none;
