# Essential BoP

Dataset: EcoSpold 1, unit process
Functional unit: 1 kg
Category: transport systems / road\Vehicle components\Powertrain\Fuel cell
Geography: GLO
Time period: 2020-01 to 2020-12
Generated by: Romain Sacchi
accessRestrictedTo: 0
copyright: False

## General comment
Data for an 80kW automotive PEM fuel cell. Based on qualified estimates of the first commercially available technolgies. Original source: Miotti, M., Hofer, J. & Bauer, C. Integrated environmental and economic assessment of current and future fuel cell vehicles. Int J Life Cycle Assess 22, 94ï¿½110 (2017). https://doi.org/10.1007/s11367-015-0986-4.

## Time period
Base technology year of 2020

## Reference product
- Essential BoP [GLO]: 1 kg

## Inputs from technosphere
All rows: lognormal SD95 1.64732
- Chromium steel product manufacturing, average metal working [RER]: 0.477 kg
  Uncertainty from pedigree matrix: (3, 5, 4, 2, 4, 4)
- Polyphenylene sulfide, at plant [GLO]: 0.252 kg
  Uncertainty from pedigree matrix: (3, 5, 4, 2, 4, 4)
- Polyethylene, HDPE, granulate, at plant [RER]: 0.0531 kg
  Uncertainty from pedigree matrix: (3, 5, 4, 2, 4, 4)
- Reinforcing steel, at plant [RER]: 0.338 kg
  Uncertainty from pedigree matrix: (3, 5, 4, 2, 4, 4)
- Synthetic rubber, at plant [RER]: 0.0483 kg
  Uncertainty from pedigree matrix: (3, 5, 4, 2, 4, 4)
- Ethylene glycol, at plant [RER]: 0.169 kg
  Uncertainty from pedigree matrix: (3, 5, 4, 2, 4, 4)
- Aluminium, production mix, wrought alloy, at plant [RER]: 0.0906 kg
  Uncertainty from pedigree matrix: (3, 5, 4, 2, 4, 4)
- Sheet rolling, chromium steel [RER]: 0.0483 kg
  Uncertainty from pedigree matrix: (3, 5, 4, 2, 4, 4)
- Transport, freight, rail [RER]: 0.268 tkm
  Uncertainty from pedigree matrix: (3, 5, 4, 2, 4, 4)
- Transport, freight, lorry, 16t-32t gross weight, fleet average [RER]: 0.1 tkm
  Uncertainty from pedigree matrix: (3, 5, 4, 2, 4, 4)

## Sources
- Sacchi R., Bauer C., 2023, 2023 - LCI on-road vehicles - Sacchi, PSI, Villigen, CH
doi: 10.5281/ZENODO.5156043
