# Photovoltaic laminate, single-Si, at regional storage

Dataset: EcoSpold 1, unit process, infrastructure
Functional unit: 1 m2
Category: photovoltaic / production of components
Geography: US
Time period: 2018-01 to 2021-12
Generated by: Philippe Stolz
accessRestrictedTo: 0
copyright: true

## General comment
Shares of production in US (29%) and imports from China (67%) and Asia and Pacific (4%).;
Synonyms: Solarmodul, PV-module, cadmium telluride, thin film;

## Included processes
Domestic production and imports of single-crystalline silicon laminates installed in the US and other American countries. Transport from different world regions to regional storage.

## Time period
Data refer to 2018

## Reference product
- Photovoltaic laminate, single-Si, at regional storage [US]: 1 m2
  UNITED STATES

## Inputs from technosphere
- Photovoltaic laminate, single-Si, at plant [US]: 0.25257 m2; lognormal SD95 3.2712
  (5,1,1,1,1,5); Market share US modules
- Transport, freight, rail [RER]: 2.2284 tkm; lognormal SD95 2.095
  (4,5,na,na,na,na); Standard distance 200km
- Transport, transoceanic freight ship [OCE]: 172.85 tkm; lognormal SD95 2.095
  (4,5,na,na,na,na); Transport distance CN-US: 20755 km, APAC-US: 18411 km
- Photovoltaic laminate, single-Si, at plant [CN]: 0.74743 m2; lognormal SD95 3.2712
  (5,1,1,1,1,5); Market share Chinese modules
- Transport, freight, lorry, fleet average [RER]: 0.55711 tkm; lognormal SD95 2.095
  (4,5,na,na,na,na); Standard distance 50km

## Sampling procedure
Survey among market intelligence companies

## Sources
- Frischknecht R., Itten R., Sinha P., de Wild-Scholten M., Zhank J., 2020, 2015 - LCI and LCA photovoltaic systems - Frischknecht, Project report, 174, IEA PVPS Task 12, Petten, NL
Frischknecht R.,, Stolz P., Sinha P., de Wild-Scholten M. (2020) Life Cycle Inventories and Life Cycle Assessments of Photovoltaic Systems. Project report. Volume: 174. IEA PVPS Task 12.
Type: Separate publication
Source: Report
First author: Frischknecht R.,
Other authors: Stolz P., Sinha P., de Wild-Scholten M.
Year: 2020
Title of anthology: Project report
Publisher: IEA PVPS Task 12
Volume No: 174
Original title: Life Cycle Inventories and Life Cycle Assessments of Photovoltaic Systems

## Validation
Proof reading validation: 30.09.2020; Other validation: G:\Projekte laufend\174 Photovoltaic, IEA Task 12\2017 Global supply chain\EcoSpold\[174-photovoltaics-global-supply-chain-v2.5.xlsx]X-Process;
