# Transport, passenger car, fleet average

Dataset: EcoSpold 1, unit process
Functional unit: 1 km
Category: transport systems / road\Transformation
Geography: RER
Time period: 2020-01 to 2020-12
Generated by: Romain Sacchi
accessRestrictedTo: 0
copyright: False

## General comment
Fleet average vehicle, based on HBEFA 4.1 fleet composition for 2020..

## Time period
Base technology year of 2020

## Reference product
- Transport, passenger car, fleet average [RER]: 1 km

## Inputs from technosphere
All rows: lognormal SD95 1.02
- Transport, passenger car, gasoline, Compact, 2003, EURO-3 [RER]: 0.0046 km
  Uncertainty from pedigree matrix: (1, 2, 1, 1, 1, 1)
- Transport, passenger car, gasoline, Compact, 2008, EURO-4 [RER]: 0.0138 km
  Uncertainty from pedigree matrix: (1, 2, 1, 1, 1, 1)
- Transport, passenger car, gasoline, Compact, 2013, EURO-5 [RER]: 0.0384 km
  Uncertainty from pedigree matrix: (1, 2, 1, 1, 1, 1)
- Transport, passenger car, gasoline, Compact, 2016, EURO-6ab [RER]: 0.0193 km
  Uncertainty from pedigree matrix: (1, 2, 1, 1, 1, 1)
- Transport, passenger car, gasoline, Compact, 2018, EURO-6c [RER]: 0.0132 km
  Uncertainty from pedigree matrix: (1, 2, 1, 1, 1, 1)
- Transport, passenger car, gasoline, Compact, 2019, EURO-6d-TEMP [RER]: 0.0064 km
  Uncertainty from pedigree matrix: (1, 2, 1, 1, 1, 1)
- Transport, passenger car, gasoline, Compact, 2021, EURO-6d [RER]: 0.0054 km
  Uncertainty from pedigree matrix: (1, 2, 1, 1, 1, 1)
- Transport, passenger car, diesel, Compact, 2003, EURO-3 [RER]: 0.0097 km
  Uncertainty from pedigree matrix: (1, 2, 1, 1, 1, 1)
- Transport, passenger car, diesel, Compact, 2008, EURO-4 [RER]: 0.0292 km
  Uncertainty from pedigree matrix: (1, 2, 1, 1, 1, 1)
- Transport, passenger car, diesel, Compact, 2013, EURO-5 [RER]: 0.0907 km
  Uncertainty from pedigree matrix: (1, 2, 1, 1, 1, 1)
- Transport, passenger car, diesel, Compact, 2016, EURO-6ab [RER]: 0.0407 km
  Uncertainty from pedigree matrix: (1, 2, 1, 1, 1, 1)
- Transport, passenger car, diesel, Compact, 2018, EURO-6c [RER]: 0.0375 km
  Uncertainty from pedigree matrix: (1, 2, 1, 1, 1, 1)
- Transport, passenger car, diesel, Compact, 2019, EURO-6d-TEMP [RER]: 0.0182 km
  Uncertainty from pedigree matrix: (1, 2, 1, 1, 1, 1)
- Transport, passenger car, diesel, Compact, 2021, EURO-6d [RER]: 0.0132 km
  Uncertainty from pedigree matrix: (1, 2, 1, 1, 1, 1)
- Transport, passenger car, compressed gas, Compact, 2013, EURO-5 [RER]: 0.0002 km
  Uncertainty from pedigree matrix: (1, 2, 1, 1, 1, 1)
- Transport, passenger car, compressed gas, Compact, 2016, EURO-6ab [RER]: 0.0001 km
  Uncertainty from pedigree matrix: (1, 2, 1, 1, 1, 1)
- Transport, passenger car, compressed gas, Compact, 2018, EURO-6c [RER]: 0.0001 km
  Uncertainty from pedigree matrix: (1, 2, 1, 1, 1, 1)
- Transport, passenger car, gasoline hybrid, Compact, 2013, EURO-5 [RER]: 0.0007 km
  Uncertainty from pedigree matrix: (1, 2, 1, 1, 1, 1)
- Transport, passenger car, gasoline hybrid, Compact, 2016, EURO-6ab [RER]: 0.0005 km
  Uncertainty from pedigree matrix: (1, 2, 1, 1, 1, 1)
- Transport, passenger car, gasoline hybrid, Compact, 2018, EURO-6c [RER]: 0.0009 km
  Uncertainty from pedigree matrix: (1, 2, 1, 1, 1, 1)
- Transport, passenger car, gasoline hybrid, Compact, 2019, EURO-6d-TEMP [RER]: 0.0006 km
  Uncertainty from pedigree matrix: (1, 2, 1, 1, 1, 1)
- Transport, passenger car, gasoline hybrid, Compact, 2021, EURO-6d [RER]: 0.0007 km
  Uncertainty from pedigree matrix: (1, 2, 1, 1, 1, 1)
- Transport, passenger car, diesel hybrid, Compact, 2013, EURO-5 [RER]: 0.0019 km
  Uncertainty from pedigree matrix: (1, 2, 1, 1, 1, 1)
- Transport, passenger car, diesel hybrid, Compact, 2016, EURO-6ab [RER]: 0.0013 km
  Uncertainty from pedigree matrix: (1, 2, 1, 1, 1, 1)
- Transport, passenger car, diesel hybrid, Compact, 2018, EURO-6c [RER]: 0.0024 km
  Uncertainty from pedigree matrix: (1, 2, 1, 1, 1, 1)
- Transport, passenger car, diesel hybrid, Compact, 2019, EURO-6d-TEMP [RER]: 0.0016 km
  Uncertainty from pedigree matrix: (1, 2, 1, 1, 1, 1)
- Transport, passenger car, diesel hybrid, Compact, 2021, EURO-6d [RER]: 0.0018 km
  Uncertainty from pedigree matrix: (1, 2, 1, 1, 1, 1)
- Transport, passenger car, plugin gasoline hybrid, Compact, 2013, EURO-5 [RER]: 0.0005 km
  Uncertainty from pedigree matrix: (1, 2, 1, 1, 1, 1)
- Transport, passenger car, plugin gasoline hybrid, Compact, 2016, EURO-6ab [RER]: 0.0002 km
  Uncertainty from pedigree matrix: (1, 2, 1, 1, 1, 1)
- Transport, passenger car, plugin gasoline hybrid, Compact, 2018, EURO-6c [RER]: 0.0002 km
  Uncertainty from pedigree matrix: (1, 2, 1, 1, 1, 1)
- Transport, passenger car, plugin gasoline hybrid, Compact, 2019, EURO-6d-TEMP [RER]: 0.0001 km
  Uncertainty from pedigree matrix: (1, 2, 1, 1, 1, 1)
- Transport, passenger car, plugin gasoline hybrid, Compact, 2021, EURO-6d [RER]: 0.0001 km
  Uncertainty from pedigree matrix: (1, 2, 1, 1, 1, 1)
- Transport, passenger car, plugin diesel hybrid, Compact, 2013, EURO-5 [RER]: 0.0014 km
  Uncertainty from pedigree matrix: (1, 2, 1, 1, 1, 1)
- Transport, passenger car, plugin diesel hybrid, Compact, 2016, EURO-6ab [RER]: 0.0005 km
  Uncertainty from pedigree matrix: (1, 2, 1, 1, 1, 1)
- Transport, passenger car, plugin diesel hybrid, Compact, 2018, EURO-6c [RER]: 0.0006 km
  Uncertainty from pedigree matrix: (1, 2, 1, 1, 1, 1)
- Transport, passenger car, plugin diesel hybrid, Compact, 2019, EURO-6d-TEMP [RER]: 0.0003 km
  Uncertainty from pedigree matrix: (1, 2, 1, 1, 1, 1)
- Transport, passenger car, plugin diesel hybrid, Compact, 2021, EURO-6d [RER]: 0.0003 km
  Uncertainty from pedigree matrix: (1, 2, 1, 1, 1, 1)
- Transport, passenger car, gasoline, Medium, 2003, EURO-3 [RER]: 0.0057 km
  Uncertainty from pedigree matrix: (1, 2, 1, 1, 1, 1)
- Transport, passenger car, gasoline, Medium, 2008, EURO-4 [RER]: 0.0171 km
  Uncertainty from pedigree matrix: (1, 2, 1, 1, 1, 1)
- Transport, passenger car, gasoline, Medium, 2013, EURO-5 [RER]: 0.0515 km
  Uncertainty from pedigree matrix: (1, 2, 1, 1, 1, 1)
- Transport, passenger car, gasoline, Medium, 2016, EURO-6ab [RER]: 0.0188 km
  Uncertainty from pedigree matrix: (1, 2, 1, 1, 1, 1)
- Transport, passenger car, gasoline, Medium, 2018, EURO-6c [RER]: 0.0164 km
  Uncertainty from pedigree matrix: (1, 2, 1, 1, 1, 1)
- Transport, passenger car, gasoline, Medium, 2019, EURO-6d-TEMP [RER]: 0.008 km
  Uncertainty from pedigree matrix: (1, 2, 1, 1, 1, 1)
- Transport, passenger car, gasoline, Medium, 2021, EURO-6d [RER]: 0.009 km
  Uncertainty from pedigree matrix: (1, 2, 1, 1, 1, 1)
- Transport, passenger car, diesel, Medium, 2003, EURO-3 [RER]: 0.0121 km
  Uncertainty from pedigree matrix: (1, 2, 1, 1, 1, 1)
- Transport, passenger car, diesel, Medium, 2008, EURO-4 [RER]: 0.0362 km
  Uncertainty from pedigree matrix: (1, 2, 1, 1, 1, 1)
- Transport, passenger car, diesel, Medium, 2013, EURO-5 [RER]: 0.113 km
  Uncertainty from pedigree matrix: (1, 2, 1, 1, 1, 1)
- Transport, passenger car, diesel, Medium, 2016, EURO-6ab [RER]: 0.0509 km
  Uncertainty from pedigree matrix: (1, 2, 1, 1, 1, 1)
- Transport, passenger car, diesel, Medium, 2018, EURO-6c [RER]: 0.0468 km
  Uncertainty from pedigree matrix: (1, 2, 1, 1, 1, 1)
- Transport, passenger car, diesel, Medium, 2019, EURO-6d-TEMP [RER]: 0.0227 km
  Uncertainty from pedigree matrix: (1, 2, 1, 1, 1, 1)
- Transport, passenger car, diesel, Medium, 2021, EURO-6d [RER]: 0.022 km
  Uncertainty from pedigree matrix: (1, 2, 1, 1, 1, 1)
- Transport, passenger car, compressed gas, Medium, 2013, EURO-5 [RER]: 0.0002 km
  Uncertainty from pedigree matrix: (1, 2, 1, 1, 1, 1)
- Transport, passenger car, compressed gas, Medium, 2016, EURO-6ab [RER]: 0.0001 km
  Uncertainty from pedigree matrix: (1, 2, 1, 1, 1, 1)
- Transport, passenger car, compressed gas, Medium, 2018, EURO-6c [RER]: 0.0001 km
  Uncertainty from pedigree matrix: (1, 2, 1, 1, 1, 1)
- Transport, passenger car, gasoline hybrid, Medium, 2013, EURO-5 [RER]: 0.0012 km
  Uncertainty from pedigree matrix: (1, 2, 1, 1, 1, 1)
- Transport, passenger car, gasoline hybrid, Medium, 2016, EURO-6ab [RER]: 0.0008 km
  Uncertainty from pedigree matrix: (1, 2, 1, 1, 1, 1)
- Transport, passenger car, gasoline hybrid, Medium, 2018, EURO-6c [RER]: 0.0013 km
  Uncertainty from pedigree matrix: (1, 2, 1, 1, 1, 1)
- Transport, passenger car, gasoline hybrid, Medium, 2019, EURO-6d-TEMP [RER]: 0.0008 km
  Uncertainty from pedigree matrix: (1, 2, 1, 1, 1, 1)
- Transport, passenger car, gasoline hybrid, Medium, 2021, EURO-6d [RER]: 0.001 km
  Uncertainty from pedigree matrix: (1, 2, 1, 1, 1, 1)
- Transport, passenger car, diesel hybrid, Medium, 2013, EURO-5 [RER]: 0.003 km
  Uncertainty from pedigree matrix: (1, 2, 1, 1, 1, 1)
- Transport, passenger car, diesel hybrid, Medium, 2016, EURO-6ab [RER]: 0.002 km
  Uncertainty from pedigree matrix: (1, 2, 1, 1, 1, 1)
- Transport, passenger car, diesel hybrid, Medium, 2018, EURO-6c [RER]: 0.0035 km
  Uncertainty from pedigree matrix: (1, 2, 1, 1, 1, 1)
- Transport, passenger car, diesel hybrid, Medium, 2019, EURO-6d-TEMP [RER]: 0.0024 km
  Uncertainty from pedigree matrix: (1, 2, 1, 1, 1, 1)
- Transport, passenger car, diesel hybrid, Medium, 2021, EURO-6d [RER]: 0.0027 km
  Uncertainty from pedigree matrix: (1, 2, 1, 1, 1, 1)
- Transport, passenger car, plugin gasoline hybrid, Medium, 2013, EURO-5 [RER]: 0.0008 km
  Uncertainty from pedigree matrix: (1, 2, 1, 1, 1, 1)
- Transport, passenger car, plugin gasoline hybrid, Medium, 2016, EURO-6ab [RER]: 0.0003 km
  Uncertainty from pedigree matrix: (1, 2, 1, 1, 1, 1)
- Transport, passenger car, plugin gasoline hybrid, Medium, 2018, EURO-6c [RER]: 0.0003 km
  Uncertainty from pedigree matrix: (1, 2, 1, 1, 1, 1)
- Transport, passenger car, plugin gasoline hybrid, Medium, 2019, EURO-6d-TEMP [RER]: 0.0002 km
  Uncertainty from pedigree matrix: (1, 2, 1, 1, 1, 1)
- Transport, passenger car, plugin gasoline hybrid, Medium, 2021, EURO-6d [RER]: 0.0002 km
  Uncertainty from pedigree matrix: (1, 2, 1, 1, 1, 1)
- Transport, passenger car, plugin diesel hybrid, Medium, 2013, EURO-5 [RER]: 0.0021 km
  Uncertainty from pedigree matrix: (1, 2, 1, 1, 1, 1)
- Transport, passenger car, plugin diesel hybrid, Medium, 2016, EURO-6ab [RER]: 0.0008 km
  Uncertainty from pedigree matrix: (1, 2, 1, 1, 1, 1)
- Transport, passenger car, plugin diesel hybrid, Medium, 2018, EURO-6c [RER]: 0.0008 km
  Uncertainty from pedigree matrix: (1, 2, 1, 1, 1, 1)
- Transport, passenger car, plugin diesel hybrid, Medium, 2019, EURO-6d-TEMP [RER]: 0.0005 km
  Uncertainty from pedigree matrix: (1, 2, 1, 1, 1, 1)
- Transport, passenger car, plugin diesel hybrid, Medium, 2021, EURO-6d [RER]: 0.0005 km
  Uncertainty from pedigree matrix: (1, 2, 1, 1, 1, 1)
- Transport, passenger car, gasoline, Large, 2003, EURO-3 [RER]: 0.0023 km
  Uncertainty from pedigree matrix: (1, 2, 1, 1, 1, 1)
- Transport, passenger car, gasoline, Large, 2008, EURO-4 [RER]: 0.0068 km
  Uncertainty from pedigree matrix: (1, 2, 1, 1, 1, 1)
- Transport, passenger car, gasoline, Large, 2013, EURO-5 [RER]: 0.0193 km
  Uncertainty from pedigree matrix: (1, 2, 1, 1, 1, 1)
- Transport, passenger car, gasoline, Large, 2016, EURO-6ab [RER]: 0.0076 km
  Uncertainty from pedigree matrix: (1, 2, 1, 1, 1, 1)
- Transport, passenger car, gasoline, Large, 2018, EURO-6c [RER]: 0.0066 km
  Uncertainty from pedigree matrix: (1, 2, 1, 1, 1, 1)
- Transport, passenger car, gasoline, Large, 2019, EURO-6d-TEMP [RER]: 0.0032 km
  Uncertainty from pedigree matrix: (1, 2, 1, 1, 1, 1)
- Transport, passenger car, gasoline, Large, 2021, EURO-6d [RER]: 0.0048 km
  Uncertainty from pedigree matrix: (1, 2, 1, 1, 1, 1)
- Transport, passenger car, diesel, Large, 2003, EURO-3 [RER]: 0.0048 km
  Uncertainty from pedigree matrix: (1, 2, 1, 1, 1, 1)
- Transport, passenger car, diesel, Large, 2008, EURO-4 [RER]: 0.0145 km
  Uncertainty from pedigree matrix: (1, 2, 1, 1, 1, 1)
- Transport, passenger car, diesel, Large, 2013, EURO-5 [RER]: 0.0455 km
  Uncertainty from pedigree matrix: (1, 2, 1, 1, 1, 1)
- Transport, passenger car, diesel, Large, 2016, EURO-6ab [RER]: 0.0204 km
  Uncertainty from pedigree matrix: (1, 2, 1, 1, 1, 1)
- Transport, passenger car, diesel, Large, 2018, EURO-6c [RER]: 0.0187 km
  Uncertainty from pedigree matrix: (1, 2, 1, 1, 1, 1)
- Transport, passenger car, diesel, Large, 2019, EURO-6d-TEMP [RER]: 0.0091 km
  Uncertainty from pedigree matrix: (1, 2, 1, 1, 1, 1)
- Transport, passenger car, diesel, Large, 2021, EURO-6d [RER]: 0.0119 km
  Uncertainty from pedigree matrix: (1, 2, 1, 1, 1, 1)
- Transport, passenger car, compressed gas, Large, 2013, EURO-5 [RER]: 0.0001 km
  Uncertainty from pedigree matrix: (1, 2, 1, 1, 1, 1)
- Transport, passenger car, gasoline hybrid, Large, 2013, EURO-5 [RER]: 0.0005 km
  Uncertainty from pedigree matrix: (1, 2, 1, 1, 1, 1)
- Transport, passenger car, gasoline hybrid, Large, 2016, EURO-6ab [RER]: 0.0003 km
  Uncertainty from pedigree matrix: (1, 2, 1, 1, 1, 1)
- Transport, passenger car, gasoline hybrid, Large, 2018, EURO-6c [RER]: 0.0005 km
  Uncertainty from pedigree matrix: (1, 2, 1, 1, 1, 1)
- Transport, passenger car, gasoline hybrid, Large, 2019, EURO-6d-TEMP [RER]: 0.0003 km
  Uncertainty from pedigree matrix: (1, 2, 1, 1, 1, 1)
- Transport, passenger car, gasoline hybrid, Large, 2021, EURO-6d [RER]: 0.0005 km
  Uncertainty from pedigree matrix: (1, 2, 1, 1, 1, 1)
- Transport, passenger car, diesel hybrid, Large, 2013, EURO-5 [RER]: 0.0013 km
  Uncertainty from pedigree matrix: (1, 2, 1, 1, 1, 1)
- Transport, passenger car, diesel hybrid, Large, 2016, EURO-6ab [RER]: 0.0008 km
  Uncertainty from pedigree matrix: (1, 2, 1, 1, 1, 1)
- Transport, passenger car, diesel hybrid, Large, 2018, EURO-6c [RER]: 0.0015 km
  Uncertainty from pedigree matrix: (1, 2, 1, 1, 1, 1)
- Transport, passenger car, diesel hybrid, Large, 2019, EURO-6d-TEMP [RER]: 0.001 km
  Uncertainty from pedigree matrix: (1, 2, 1, 1, 1, 1)
- Transport, passenger car, diesel hybrid, Large, 2021, EURO-6d [RER]: 0.0013 km
  Uncertainty from pedigree matrix: (1, 2, 1, 1, 1, 1)
- Transport, passenger car, plugin gasoline hybrid, Large, 2013, EURO-5 [RER]: 0.0004 km
  Uncertainty from pedigree matrix: (1, 2, 1, 1, 1, 1)
- Transport, passenger car, plugin gasoline hybrid, Large, 2016, EURO-6ab [RER]: 0.0001 km
  Uncertainty from pedigree matrix: (1, 2, 1, 1, 1, 1)
- Transport, passenger car, plugin gasoline hybrid, Large, 2018, EURO-6c [RER]: 0.0001 km
  Uncertainty from pedigree matrix: (1, 2, 1, 1, 1, 1)
- Transport, passenger car, plugin gasoline hybrid, Large, 2019, EURO-6d-TEMP [RER]: 0.0001 km
  Uncertainty from pedigree matrix: (1, 2, 1, 1, 1, 1)
- Transport, passenger car, plugin gasoline hybrid, Large, 2021, EURO-6d [RER]: 0.0001 km
  Uncertainty from pedigree matrix: (1, 2, 1, 1, 1, 1)
- Transport, passenger car, plugin diesel hybrid, Large, 2013, EURO-5 [RER]: 0.0009 km
  Uncertainty from pedigree matrix: (1, 2, 1, 1, 1, 1)
- Transport, passenger car, plugin diesel hybrid, Large, 2016, EURO-6ab [RER]: 0.0003 km
  Uncertainty from pedigree matrix: (1, 2, 1, 1, 1, 1)
- Transport, passenger car, plugin diesel hybrid, Large, 2018, EURO-6c [RER]: 0.0004 km
  Uncertainty from pedigree matrix: (1, 2, 1, 1, 1, 1)
- Transport, passenger car, plugin diesel hybrid, Large, 2019, EURO-6d-TEMP [RER]: 0.0002 km
  Uncertainty from pedigree matrix: (1, 2, 1, 1, 1, 1)
- Transport, passenger car, plugin diesel hybrid, Large, 2021, EURO-6d [RER]: 0.0003 km
  Uncertainty from pedigree matrix: (1, 2, 1, 1, 1, 1)

## Extrapolations
Extrapolated from value for Switzerland

## Sources
- Sacchi R., Bauer C., 2023, 2023 - LCI on-road vehicles - Sacchi, PSI, Villigen, CH
doi: 10.5281/ZENODO.5156043
