# Sputtering, ITO, for LCD

Dataset: EcoSpold 1, unit process
Functional unit: 1 m3
Category: electronics / unspecified
Geography: RER
Time period: 2005-01 to 2005-12
Generated by: Mischa Classen
accessRestrictedTo: 0
copyright: true

## General comment
This dataset is established for the manufacturing of LCD screens. Due to a lack of structured data the inventory bases on assumptions and lab-scale technology. Direct process emissions are not known and disregarded. The dataset therefore must not be used for the direct comparison of different film deposition technologies. The functional unit of this dataset is cubic meter resulting from the sputtered area times the film thickness. Film thickness depends on display technology: STN LCD: 150nm top;
Synonyms: Indium Tin Oxide, Indium Zinn Oxid, TFT, Transparent and conductive Oxide Layer, TCO, physical vapour deposition, PVD;

## Included processes
Sputtering process and infrastructure, as well as the transportation of the targets. No pre and post treatment of the surfaces are considered.

## Technology
Relates to RF magentron sputtering techniquewith commercially available sputtering targets. Pre-sputtering phase and subsequent main sputtering.

## Reference product
- Sputtering, ITO, for LCD [RER]: 1 m3
  Europe

## Inputs from technosphere
- ITO, sintered target, at plant [RER]: 47733 kg; lognormal SD95 2.1118
  (4,4,1,3,5,5,3)
- Transport, aircraft, freight [RER]: 35800 tkm; lognormal SD95 2.7684
  (4,4,1,3,5,5,5)
- Transport, freight, lorry, fleet average [RER]: 716 tkm; lognormal SD95 2.7684
  (4,4,1,3,5,5,5)
- Electricity, medium voltage, production ENTSO-E, at grid: 2.9276e7 kWh; lognormal SD95 2.1118
  (4,4,1,3,5,5,2)
- Facilities, chemical production [RER]: 588.24 kg; lognormal SD95 3.7732
  (4,4,1,3,5,5,9)
- Building, multi-storey [RER]: 147.06 m3; lognormal SD95 3.7732
  (4,4,1,3,5,5,9)

## Emissions to nature
- Heat, waste [emissions to air, high. pop.]: 1.0539e8 MJ; lognormal SD95 2.1118
  from electricity consumption

## Sampling procedure
Literature

## Extrapolations
see General Comments

## Sources
- Hischier R., Classen M., Lehmann M., Scharnhorst W., 2007, 2007 - LCI electric and electronic equipment - Hischier, Final report ecoinvent Data v2.0, 18, Swiss Centre for LCI, Empa - TSL, Duebendorf and St. Gallen, CH
Hischier R., Classen M., Lehmann M., Scharnhorst W. (2007) Life Cycle Inventories of Electric and Electronic Equipment - Production, Use & Disposal. Final report ecoinvent Data v2.0. Volume: 18. Swiss Centre for LCI, Empa - TSL. Duebendorf and St. Gallen, CH.
Type: Measurement on site
Source: CD-ROM
First author: Hischier R.
Other authors: Classen M., Lehmann M., Scharnhorst W.
Year: 2007
Title of anthology: Final report ecoinvent Data v2.0
Place of publication: Duebendorf and St. Gallen, CH
Publisher: Swiss Centre for LCI, Empa - TSL
Volume No: 18
Original title: Life Cycle Inventories of Electric and Electronic Equipment - Production, Use & Disposal

## Validation
Proof reading validation: Passed; Other validation: none;
