# Smartphone, mid-tier, average phone, at plant

Dataset: EcoSpold 1, unit process
Functional unit: 1 p
Category: electronics / devices
Geography: GLO
Time period: 2023-01 to 2029-12
Synonyms: Smartphone; Mittelklasse-Smartphone
Generated by: Lugas Raka Adrianto, Maulana Permana Ajie, Didier Beloin-Saint-Pierre
accessRestrictedTo: 0
copyright: false

## General comment
The data set represents the production of smartphone with defined technical specifications;

## Included processes
This dataset focuses on the average hi-tech smartphones with 4 - 6.5 inch screen size. The weight of the smartphone is defined to be about 160 grams. The data for average smartphones are mainly taken from the JRC technical report and other published articles. The modeled smartphone has a flash storage capacity of 32 GB and RAM capacity of 2 GB. According to the industry technology for IC smartphones, up to 6 stacked dies can be integrated in a single package to optimize density and performance. In the modeling, the area of wafer/die is assumed to be ~5.5 cm2 to represent total wafer logic area according to the literature.

## Geography
Data for global average for smartphone

## Technology
The smartphone has a processing unit, flash storage, RAM, and other connectivity features for standard smartphones.

## Reference product
- Smartphone, mid-tier, average phone, at plant [GLO]: 1 p

## Inputs from technosphere
- Aluminium, production mix, wrought alloy, at plant [RER]: 0.022 kg; lognormal SD95 1.31
  (2,2,1,3,3,5,BU:1.05); Housing. Literature: Cordella et al. 2020, JRC report
- Battery, Li-ion, NMC111, rechargeable, prismatic [GLO]: 0.039 kg; lognormal SD95 1.31
  (2,2,1,3,3,5,BU:1.05); Battery. Literature: Cordella et al. 2020, JRC report
- Capacitor, SMD type, surface-mounting, at plant [GLO]: 0.0007 kg; lognormal SD95 1.31
  (2,2,1,3,3,5,BU:1.05); Electronics. Literature: Cordella et al. 2020, JRC report
- xx Cold impact extrusion, aluminium, 2 strokes [RER]: 0.022 kg; lognormal SD95 1.31
  (2,2,1,3,3,5,BU:1.05); Housing. Literature: Cordella et al. 2020, JRC report
- xx Cold impact extrusion, steel, 2 strokes [RER]: 0.0065 kg; lognormal SD95 1.31
  (2,2,1,3,3,5,BU:1.05); Housing. Literature: Cordella et al. 2020, JRC report
- Connector, computer, peripherical type, at plant [GLO]: 0.00025 kg; lognormal SD95 1.31
  (2,2,1,3,3,5,BU:1.05); Others (camera, speakers, buttons). Literature: Cordella et al. 2020, JRC report
- Connector, computer, peripherical type, at plant [GLO]: 0.00025 kg; lognormal SD95 1.31
  (2,2,1,3,3,5,BU:1.05); Electronics. Literature: Cordella et al. 2020, JRC report
- Electricity, medium voltage, production RAS, at grid [RAS]: 4.698 kWh; lognormal SD95 1.31
  (2,2,1,3,3,5,BU:1.05); Manufacturing and assembly. Literature: Cordella et al. 2020, JRC report
- Electronic component, active, unspecified, at plant [GLO]: 0.0019 kg; lognormal SD95 1.31
  (same comment as for Connector, computer, peripherical type, at plant)
- Electronic component, passive, unspecified, at plant [GLO]: 0.0009 kg; lognormal SD95 1.31
  (2,2,1,3,3,5,BU:1.05); Electronics. Literature: Cordella et al. 2020, JRC report
- Electronic component, passive, unspecified, at plant [GLO]: 0.016 kg; lognormal SD95 1.31
  (same comment as for Connector, computer, peripherical type, at plant)
- Extrusion, plastic film [RER]: 0.02 kg; lognormal SD95 1.31
  (2,2,1,3,3,5,BU:1.05); Packaging and documentation. Literature: Cordella et al. 2020, JRC report
- Folding boxboard, FBB, at plant [RER]: 0.11 kg; lognormal SD95 1.31
  (same comment as for Extrusion, plastic film)
- Inductor, ring core choke type, at plant [GLO]: 0.0002 kg; lognormal SD95 1.31
  (2,2,1,3,3,5,BU:1.05); Electronics. Literature: Cordella et al. 2020, JRC report
- Injection moulding [RER]: 0.0095 kg; lognormal SD95 1.31
  (2,2,1,3,3,5,BU:1.05); Housing. Literature: Cordella et al. 2020, JRC report
- Integrated circuit, IC, logic type, at plant [GLO]: 0.002 kg; lognormal SD95 1.31
  (2,2,1,3,3,5,BU:1.05); Electronics. Literature: Cordella et al. 2020, JRC report
- LED module, at plant [GLO]: 0.03 kg; lognormal SD95 1.31
  (2,2,1,3,3,5,BU:1.05); Screen/Display. Literature: Cordella et al. 2020, JRC report
- Paper, newsprint, at plant [CH]: 0.05 kg; lognormal SD95 1.31
  (same comment as for Extrusion, plastic film)
- Permanent magnet, for electric motor [RER]: 0.001 kg; lognormal SD95 1.31
  (same comment as for Connector, computer, peripherical type, at plant)
- Polycarbonate, at plant [RER]: 0.0095 kg; lognormal SD95 1.31
  (2,2,1,3,3,5,BU:1.05); Housing. Literature: Cordella et al. 2020, JRC report
- Polyethylene, LDPE, granulate, at plant [RER]: 0.02 kg; lognormal SD95 1.31
  (same comment as for Extrusion, plastic film)
- Printed wiring board, surface mounted, unspec., Pb free, at plant [GLO]: 0.028 kg; lognormal SD95 1.31
  (2,2,1,3,3,5,BU:1.05); Electronics. Literature: Cordella et al. 2020, JRC report
- Resistor, SMD type, surface mounting, at plant [GLO]: 0.002 kg; lognormal SD95 1.31
  (2,2,1,3,3,5,BU:1.05); Electronics. Literature: Cordella et al. 2020, JRC report
- Charger, for smartphone, at plant [GLO]: 1 p; lognormal SD95 1.31
  (2,2,1,3,3,5,BU:1.05); Literature: Hischier et al 2014.
- Steel, low-alloyed, at plant [RER]: 0.0065 kg; lognormal SD95 1.31
  (2,2,1,3,3,5,BU:1.05); Housing. Literature: Cordella et al. 2020, JRC report
- Transistor, SMD type, surface mounting, at plant [GLO]: 0.0001 kg; lognormal SD95 1.31
  (2,2,1,3,3,5,BU:1.05); Electronics. Literature: Cordella et al. 2020, JRC report
- Transport, freight, lorry, fleet average [RER]: 0.0162 tkm; lognormal SD95 2.1
  (2,2,1,3,3,5,BU:2.00); According to smartphone mass.
- Transport, freight, rail [RER]: 0.0323 tkm; lognormal SD95 2.1
  (2,2,1,3,3,5,BU:2.00); According to smartphone mass.
- Transport, transoceanic container ship [OCE]: 3.4 tkm; lognormal SD95 2.1
  (2,2,1,3,3,5,BU:2.00); According to smartphone mass.
- Wafer, fabricated, for integrated circuit, logic type, at plant [GLO]: 0.0005 m2; lognormal SD95 1.31
  (2,2,1,3,3,5,BU:1.05); Total die area = 5.cm2 wafer logic. Literature: Codella et al. 2020, JRC report
- Wafer, fabricated, for integrated circuit, memory type, at plant [GLO]: 0.000235 m2; lognormal SD95 1.31
  (2,2,1,3,3,5,BU:1.05); For memory of 32 GB, flash type + 2 GB RAM. Literature: UBA report, 2021
- Disposal, laptop computer, to WEEE treatment [CH]: 0.06 p; lognormal SD95 1.36
  (3,4,3,3,3,5,BU:1.05); Proxy, adjusted using weight

## Sampling procedure
Literature & own estimations

## Extrapolations
Average technology

## Sources
- Raka Adrianto L., Permana Ajie M., Beloin-Saint-Pierre D., 2024, 2024 - LCI ICT sector - Raka Adrianto, Empa, St. Gallen, CH

## Validation
Proof reading validation: Passed, Other validation: none, Validator: Mischa Zschokke, Company: Carbotech, Country: CH
