# CZ single crystalline silicon, electronics, at plant

Dataset: EcoSpold 1, unit process
Functional unit: 1 kg
Category: electronics / photovoltaic
Geography: RER
Time period: 1992-01 to 1998-12
Production volume: 16000 tonnes in 2005.
Generated by: Niels Jungbluth
accessRestrictedTo: 0
copyright: true

## General comment
Production of a monocrystalline block with a diameter of 130mm and a length of 150cm. The losses due to block cutting are not considered as the material can be remelted and reused .;
CAS number: 7440-21-3;
Formula: Si;
Synonyms: Czochralski process;

## Included processes
Gate to gate inventory for the Czochralski process. Crushing of Si, etching with HNO3, HF and acetic acid. Melting in a silica pot and crystallisation to produce a monocrystalline material. Water emissions roughly estimated. Process emissions to air are not known.

## Geography
Data of a plant in DE and estimation for RER.

## Technology
Czochralski process for production of monocrystalline silicon blocks. Than edges are sliced and blocks are sawn.

## Time period
Most data are published in 2006. Some older data published in 1992.

## Reference product
- CZ single crystalline silicon, electronics, at plant [RER]: 1 kg
  Europe

## Inputs from technosphere
- Tap water, at user [RER]: 94.073 kg; lognormal SD95 1.2357
  (1,4,1,2,1,5); Environmental report Wacker 2006
- Ceramic tiles, at regional storage [CH]: 0.33645 kg; lognormal SD95 1.2357
  (1,4,1,2,1,5); de Wild 2007, quartz crucible for melting the silicon
- Disposal, waste, Si waferprod., inorg, 9.4% water, to residual material landfill [CH]: 3.6364 kg; lognormal SD95 1.2357
  (1,4,1,2,1,5); Environmental report Wacker
- Acetone, liquid, at plant [RER]: 0.049003 kg; lognormal SD95 1.3643
  (3,4,3,3,3,5); For etching, Hagedorn 1992
- Transport, freight, lorry, fleet average [RER]: 2.0951 tkm; lognormal SD95 2.095
  (4,5,na,na,na,na); Standard distance 100km, sand 50km, silicon 1000km
- Transport, freight, rail [RER]: 3.9994 tkm; lognormal SD95 2.095
  (4,5,na,na,na,na); Standard distance 600km
- Hydrogen fluoride, at plant [GLO]: 0.050664 kg; lognormal SD95 1.3643
  (3,4,3,3,3,5); For etching, Hagedorn 1992
- Lime, hydrated, packed, at plant [CH]: 0.19103 kg; lognormal SD95 1.3643
  (3,4,3,3,3,5); waste water treatment, Hagedorn 1992
- Electricity, medium voltage, production ENTSO-E, at grid: 200 kWh; lognormal SD95 1.2357
  (1,4,1,2,1,5); Environmental report Wacker 2006
- Silicone plant [RER]: 1e-11 p; lognormal SD95 3.0492
  (1,2,1,1,3,3); Estimation
- Acetic acid, 98% in H2O, at plant [RER]: 0.10797 kg; lognormal SD95 1.3643
  (3,4,3,3,3,5); For etching, Hagedorn 1992
- Silicon, electronic grade, at plant [DE]: 1.4286 kg; lognormal SD95 1.2357
  (1,4,1,2,1,5); Environmental report Wacker 2006
- Argon, liquid, at plant [RER]: 5.7944 kg; lognormal SD95 1.2357
  (1,4,1,2,1,5); de Wild 2007, protection gas for crystal growing
- Sodium hydroxide, 50% in H2O, production mix, at plant [RER]: 0.041528 kg; lognormal SD95 1.3643
  (3,4,3,3,3,5); waste gas neutralization, Hagedorn 1992
- Nitric acid, 50% in H2O, at plant [RER]: 0.094684 kg; lognormal SD95 1.3643
  (3,4,3,3,3,5); For etching, Hagedorn 1992
- Natural gas, burned in industrial furnace 1MW [CH]: 270 MJ; lognormal SD95 1.2357
  (1,4,1,2,1,5); Environmental report Wacker 2006

## Inputs from nature
- Water, cooling, unspecified natural origin/m3 [resources, in water]: 2.333 m3; lognormal SD95 1.2357
  (1,4,1,2,1,5); Environmental report Wacker 2006
- Water, river [resources, in water]: 2.0508 m3; lognormal SD95 1.2357
  (1,4,1,2,1,5); Environmental report Wacker 2006

## Emissions to nature
- TOC, Total Organic Carbon [emissions to water, river]: 0.040475 kg; lognormal SD95 3.0832
  (5,na,1,1,1,na); Extrapolation for sum parameter
- Hydrocarbons, unspecified [emissions to water, river]: 0.022841 kg; lognormal SD95 3.0832
  (3,4,3,3,1,5); Hagedorn 1992, 50% reduction, basic uncertainty = 3
- COD, Chemical Oxygen Demand [emissions to water, river]: 0.13034 kg; lognormal SD95 3.0832
  (5,na,1,1,1,na); Extrapolation for sum parameter
- Nitrogen [emissions to water, river]: 0.0091039 kg; lognormal SD95 1.6074
  (3,4,3,3,1,5); Environmental report Wacker 2006, 50% of total emissions
- DOC, Dissolved Organic Carbon [emissions to water, river]: 0.040475 kg; lognormal SD95 3.0832
  (5,na,1,1,1,na); Extrapolation for sum parameter
- Fluoride [emissions to water, river]: 0.0023713 kg; lognormal SD95 3.0832
  (3,4,3,3,1,5); Hagedorn 1992, 50% reduction, basic uncertainty = 3
- Hydroxide [emissions to water, river]: 0.0074169 kg; lognormal SD95 3.0832
  (3,4,3,3,1,5); Hagedorn 1992, 50% reduction, basic uncertainty = 3
- Acetic acid [emissions to water, river]: 0.053987 kg; lognormal SD95 3.0832
  (3,4,3,3,1,5); Hagedorn 1992, 50% emission, basic uncertainty = 3
- BOD5, Biological Oxygen Demand [emissions to water, river]: 0.13034 kg; lognormal SD95 3.0832
  (5,na,1,1,1,na); Extrapolation for sum parameter
- Heat, waste [emissions to air, high. pop.]: 720 MJ; lognormal SD95 1.2459
  (3,3,2,3,1,5); Calculation
- Water [emissions to water, unspecified]: 2216.35, 1948.26 kg (2 entries); lognormal SD95 2.5196
  (5,5,5,5,5,BU:1.05); All uncertainty-values set to 5.0 by default. Balance of input water

## Sampling procedure
Publication of plant specific (partly aggregated) data.

## Sources
- Jungbluth N., Stucki M., Flury K., Frischknecht R., Buesser S., 2012, 2012 - LCI photovoltaics - Jungbluth, 0, 407, ESU-services Ltd., Uster, CH
Jungbluth, N., Stucki M., Fluri K., Frischknecht R., Buesser S. (2012) Life Cycle Inventories of Photovoltaics. 0. Editors: Bauer C.. Volume: 407. ESU-services ltd.. Uster, CH.
Type: Separate publication
Source: www.esu-services.ch
First author: Jungbluth, N.
Other authors: Stucki M., Fluri K., Frischknecht R., Buesser S.
Year: 2012
Name of editors: Bauer C.
Title of anthology: 0
Place of publication: Uster, CH
Publisher: ESU-services ltd.
Volume No: 407

## Validation
Proof reading validation: 04.04.2012; Other validation: \\server\e\ESU-Docs\Projekte laufend\407 Update LCI Energiesysteme\EcoSpold\Fotovoltaik\[407_photovoltaics-v1.0.xlsx]X-Process;
