# Round wood, primary forest, clear-cutting, at forest road

Dataset: EcoSpold 1, unit process
Functional unit: 1 m3
Category: wood / extraction
Geography: MY
Time period: 2005-01 to 2005-12
Production volume: 150000 ha/a for palm fruits
Share of production covered: 100 %
Generated by: Niels Jungbluth
accessRestrictedTo: 0
copyright: true

## General comment
Multi-output process providing the products "round wood, primary forest, clear-cutting, at forest road" and "provision, stubbed land". Emissions from wood burning and land transformation are allocated to the provision of stubbed land. The round wood dataset must not be used as a basis for comparison with tropical wood from sustainable forest management. The environmental impacts of tropical wood from clear-cutting must be evaluated in combination with the environmental impacts related to the provision of stubbed land.;

## Included processes
Resources (wood, carbon, land), land transformation, emissions from wood burning, rough estimation for machinery use. Construction of roads and transports of wood not included.

## Technology
Clear-cutting of primary forests with burning of biomass.

## Time period
Publication of data

## Reference product
- Round wood, primary forest, clear-cutting, at forest road [MY]: 1 m3
  MALAYSIA

## Inputs from technosphere
- Diesel, burned in building machine, average [CH]: 72.9966 MJ; lognormal SD95 1.113
  (3,1,1,1,1,1); Rough estimation with European forestry data for harvesting of wood, Werner 2003
- Power sawing, without catalytic converter [RER]: 0.23796 hr; lognormal SD95 1.113
  (same comment as for Diesel, burned in building machine, average)

## Inputs from nature
- Wood, primary forest, standing [resources, biotic]: 0.99999 m3; lognormal SD95 1.2423
  (4,3,1,1,1,4); Wood burned or harvested
- Occupation, construction site [resources, land]: 2.65325 m2a; lognormal SD95 1.5798
  (4,3,1,1,1,4); Rough estimation for 2 weeks necessary for clear-cutting
- Energy, gross calorific value, in biomass, primary forest [resources, biotic]: 10780.1 MJ; lognormal SD95 1.2423
  (4,3,1,1,1,4); Wood burned or harvested

## Sampling procedure
Literature data

## Extrapolations
Rough estimation of machinery use with European forestry data. Emissions profile for tropical forest per kg of dry biomass.

## Sources
- Jungbluth N., Chudacoff M., Dauriat A., Dinkel F., Doka G., Faist Emmenegger M., Gnansounou E., Kljun N., Spielmann M., Stettler C., Sutter J., 2007, 2007 - LCI bioenergy - Jungbluth, Final report ecoinvent data v2.0, 17, Swiss Centre for LCI, ESU-services Ltd., Duebendorf and Uster, CH
Jungbluth N., Chudacoff M., Dauriat A., Dinkel F., Doka G., Faist Emmenegger M., Gnansounou E., Kljun N., Spielmann M., Stettler C., Sutter J. (2007) Life Cycle Inventories of Bioenergy. Final report ecoinvent data v2.0. Volume: 17. Swiss Centre for LCI, ESU. Duebendorf and Uster, CH.
Type: Measurement on site
Source: CD-ROM
First author: Jungbluth N.
Other authors: Chudacoff M., Dauriat A., Dinkel F., Doka G., Faist Emmenegger M., Gnansounou E., Kljun N., Spielmann M., Stettler C., Sutter J.
Year: 2007
Title of anthology: Final report ecoinvent data v2.0
Place of publication: Duebendorf and Uster, CH
Publisher: Swiss Centre for LCI, ESU
Volume No: 17

## Validation
Proof reading validation: passed; Other validation: none;
