# Overflow element, steel, approx. 40 m3/h

Dataset: EcoSpold 1, unit process
Functional unit: 1 p
Category: ventilation / production of components
Geography: RER
Generated by: Alex Primas
accessRestrictedTo: 0
copyright: true

## General comment
Production of a typical component used for a ventilation system in a multi family house. The house considered in the investigation includes 6 flats with 130 m2 floor area each and a ventilation rate of 120 m3/h.;

## Included processes
Materials used for the production. Estimation of electricity use for the different production steps. Energy use for heating of the production building. Transport of raw materials to the plant. Estimation for the Infrastructure of the Production site included.

## Geography
Data for production in Germany used.

## Technology
Design air flow 40 m2/h per element. Element made of galvanised steel insulated with rubber. Installation e.g. above door separating the rooms- Weight per element 1.1 kg

## Time period
Materials investigated in 2003

## Reference product
- Overflow element, steel, approx. 40 m3/h [RER]: 1 p
  Europe

## Inputs from technosphere
- Synthetic rubber, at plant [RER]: 0.263 kg; lognormal SD95 1.24
  (2,4,1,1,1,5); Questionnaire
- Transport, freight, lorry, fleet average [RER]: 0.12 tkm; lognormal SD95 2.09
  (4,5,nA,nA,nA,nA); Standard distance of ecoinvent used
- Powder coating, steel [RER]: 0.03 m2; lognormal SD95 1.26
  (3,4,1,1,1,5); Questionnaire, estimations
- Steel, converter, unalloyed, at plant [RER]: 0.589 kg; lognormal SD95 1.24
  (2,4,1,1,1,5); Questionnaire
- Injection moulding [RER]: 0.263 kg; lognormal SD95 1.24
  (2,4,1,1,1,5); Questionnaire
- Transport, freight, rail [RER]: 0.239 tkm; lognormal SD95 2.09
  (4,5,nA,nA,nA,nA); Standard distance of ecoinvent used
- Disposal, rubber, unspecified, 0% water, to municipal incineration [CH]: 0.0125 kg; lognormal SD95 1.32
  (4,4,1,1,1,5); Estimations on precentage material disposed
- Light fuel oil, burned in industrial furnace 1MW, non-modulating [RER]: 2.31 MJ; lognormal SD95 1.38
  4,5,1,1,1,5; Data estimated from related companies
- Sheet rolling, steel [RER]: 0.935 kg; lognormal SD95 1.26
  (3,4,1,1,1,5); Questionnaire, estimations
- Zinc coating, coils [RER]: 0.22 m2; lognormal SD95 1.26
  (3,4,1,1,1,5); Questionnaire, estimations
- Ventilation components factory [RER]: 4.4e-9 p; lognormal SD95 3.18
  (4,5,1,1,3,5); Calculated with data of a similar company
- Steel, electric, un- and low-alloyed, at plant [RER]: 0.346 kg; lognormal SD95 1.24
  (2,4,1,1,1,5); Questionnaire
- Natural gas, burned in industrial furnace 1MWth [CH]: 2.31 MJ; lognormal SD95 1.38
  (4,5,1,1,1,5); Data estimated from related companies
- Electricity, medium voltage, production ENTSO-E, at grid: 0.427 kWh; lognormal SD95 1.69
  (3,5,5,1,3,5); Data estimated from related processes

## Emissions to nature
- Heat, waste [emissions to air, high. pop.]: 1.54 MJ; lognormal SD95 1.69
  (3,5,5,1,3,5); Calculated from electricity use

## Sampling procedure
Questionnaire and technical information of producer. Data of one common product used.

## Sources
- Haessig W., Primas A., 2007, 2007 - LCI comfort ventilation in dwellings - Haessig, Final report ecoinvent Data v2.0, 25, Swiss Centre for LCI, B+H, Duebendorf and Zuerich, CH
Hässig, W., Primas, A. (2007) Ökologische Aspekte der Komfortlüftungen im Wohnbereich. Final report ecoinvent Data v2.0. Volume: 25. Swiss Centre for LCI, B+H. Dübendorf and Zürich, CH.
Type: Measurement on site
Source: CD-ROM
First author: Hässig, W.
Other authors: Primas, A.
Year: 2007
Title of anthology: Final report ecoinvent Data v2.0
Place of publication: Dübendorf and Zürich, CH
Publisher: Swiss Centre for LCI, B+H
Volume No: 25

## Validation
Proof reading validation: passed; Other validation: none;
