# 93 kWp slanted-roof installation, single-Si, laminated, integrated, on roof

Dataset: EcoSpold 1, unit process, infrastructure
Functional unit: 1 p
Category: electricity by fuel / photovoltaic\infrastructure
Geography: CH
Time period: 2009-01 to 2018-12
Share of production covered: 100 %
Generated by: Philippe Stolz
accessRestrictedTo: 0
copyright: true

## General comment
Photovoltaic installation with a capacity of 93kWp and a life time of 30 years installed in Switzerland. The efficiency of single-Si PV modules is 17.9% (Fraunhofer ISE Photovoltaics Report 2019). The share of rejected or replaced PV modules is estimated at 3%. The inverter is assumed to be replaced once during the service life of the PV system.;
Synonyms: monocrystalline, single crystalline, silicon;

## Included processes
All components (modules, mounting system, electric installation, inverter) for the installation of a 93 kWp photovoltaic plant, energy use for the mounting, transport of materials to the place of installation. Disposal of components after end of life.

## Geography
Installation in CH

## Technology
Current technology for mounting of panels or laminates, electric installations and other components.

## Reference product
- 93 kWp slanted-roof installation, single-Si, laminated, integrated, on roof [CH]: 1 p
  SWITZERLAND

## Inputs from technosphere
- Photovoltaic laminate, single-Si, at regional storage [RER]: 491.23 m2; lognormal SD95 4.466
  (3,4,1,1,1,5); calculation with maximum power output and module efficiency; 2% of modules replaced in the life time, 1% rejects
- Transport, freight, lorry, fleet average [RER]: 792.08 tkm; lognormal SD95 2.9863
  (4,5,na,na,na,na); 100km for transport of modules, substructure, electric installation and inverters to the place of installation
- Treatment, c-Si PV module [RER]: 5416.2 kg; lognormal SD95 2.7657
  (3,4,1,1,1,5); recycling of PV modules at the end of life
- Electric installation, 93 kWp photovoltaic plant, at plant [CH]: 1 p; lognormal SD95 4.466
  (3,4,1,1,1,5);
- Inverter, 500kW, at plant [RER]: 0.14911 p; lognormal SD95 4.466
  (2,4,1,1,1,5); 1 replacement in the life time
- Electricity, low voltage, at grid [CH]: 7.13 kWh; lognormal SD95 2.7695
  (3,4,3,1,1,5); scaled from a 3kWp plant over capacity
- Slanted-roof construction, integrated, on roof [RER]: 476.92 m2; lognormal SD95 4.466
  (3,4,1,1,1,5); calculation with maximum power output and module efficiency

## Emissions to nature
- Heat, waste [emissions to air, high. pop.]: 25.668 MJ; lognormal SD95 2.0585
  (1,na,na,na,na,na); calculated with electricity use

## Sampling procedure
Questionnaire filled in by the operator of the plant (Solarspar AG).

## Sources
- Frischknecht R., Itten R., Sinha P., de Wild-Scholten M., Zhank J., 2020, 2015 - LCI and LCA photovoltaic systems - Frischknecht, Project report, 174, IEA PVPS Task 12, Petten, NL
Frischknecht R.,, Stolz P., Sinha P., de Wild-Scholten M. (2020) Life Cycle Inventories and Life Cycle Assessments of Photovoltaic Systems. Project report. Volume: 174. IEA PVPS Task 12.
Type: Separate publication
Source: Report
First author: Frischknecht R.,
Other authors: Stolz P., Sinha P., de Wild-Scholten M.
Year: 2020
Title of anthology: Project report
Publisher: IEA PVPS Task 12
Volume No: 174
Original title: Life Cycle Inventories and Life Cycle Assessments of Photovoltaic Systems

## Validation
Proof reading validation: 30.09.2020; Other validation: G:\Projekte laufend\174 Photovoltaic, IEA Task 12\2017 Global supply chain\EcoSpold\[174-photovoltaics-global-supply-chain-v2.5.xlsx]X-Process;
