# Disposal, slag from MG silicon prod., 0% water, to construction waste landfill

Dataset: EcoSpold 1, unit process
Functional unit: 1 kg
Category: waste management / construction waste landfill
Geography: CH
Time period: 2020-01 to 2020-12
Generated by: default
accessRestrictedTo: 0
copyright: true

## General comment
This dataset represents the activity of waste disposal of slag from metallurgical grade silicon production in a construction waste landfill. Recommended use of this dataset: For specific waste from MG-Si production, SiO2-rich, low-polluted solid residueInventoried waste consists of fraction: 100% slag from MG silicon production; . Waste composition (wet, in ppm): H2O na; O 509220; H na; C na; S na; N na; P 105.49; B 21.451; Cl na; Br na; F na; I na; Ag 0.081922; As 0.22361; Ba 223.61; Cd na; Co 3.6334; Cr 44.457; Cu 16.56; Hg na; Mn 45.633; Mo 2.2361; Ni 9.0726; Pb 0.34159; Sb 0.031623; Se na; Sn 0.022361; V 15.811; Zn 8.0477; Be 7.0711; Sc na; Sr 100; Ti 359.9; Tl na; W na; Si 426900; Fe 8880.8; Ca 30656; Al 23337; K 0.014413; Mg 35.313; Na 4.0574. Share of carbon in waste that is biogenic 60.4%.;;

## Included processes
Waste-specific short-term emissions via landfill leachate. Waste-specific long-term emissions from landfill. Land transformation and occupation. Waste placement and compaction. Landfill construction materials, sewer pipe for leachate, and access road.

## Technology
This is an inventory for a construction waste landfill (mostly mineral C&D waste, VVEA type B). Ultimate average landfill height is 11 meters. Operation phase duration is 15 years.

## Reference product
- Disposal, slag from MG silicon prod., 0% water, to construction waste landfill [CH]: 1 kg
  SWITZERLAND

## Inputs from technosphere
- Synthetic rubber, at plant [RER]: 7.8944e-9 kg; lognormal SD95 3.1055
  for sewer auxiliary materials. Uncertainty calculated from uncertainty in base parameters.
- Sand, at mine [CH]: 0.021824 kg; lognormal SD95 3.1055
  for landfill base layer and sewer auxiliary materials. Uncertainty calculated from uncertainty in base parameters.
- Polypropylene, granulate, at plant [RER]: 1.9736e-8 kg; lognormal SD95 3.1055
  for sewer auxiliary materials. Uncertainty calculated from uncertainty in base parameters.
- Concrete, sole plate and foundation, at plant [CH]: 1.156e-8 m3; lognormal SD95 3.1055
  for sewer pipe. Uncertainty calculated from uncertainty in base parameters.
- Polyvinylchloride, at regional storage [RER]: 1.9736e-8 kg; lognormal SD95 3.1055
  for sewer auxiliary materials. Uncertainty calculated from uncertainty in base parameters.
- Extrusion, plastic pipes [RER]: 2.5834e-6 kg; lognormal SD95 3.1055
  for base drain system in landfill and sewer auxiliary materials. Uncertainty calculated from uncertainty in base parameters.
- Tap water, at user [RER]: 0.00016406 kg; lognormal SD95 3.1055
  for sewer auxiliary materials. Uncertainty calculated from uncertainty in base parameters.
- Excavation, hydraulic digger, average [CH]: 0.00030229 m3; lognormal SD95 3.1055
  excavation work for landfill construction, sewer construction, waste placement and compaction, and landfill recultivation. Uncertainty calculated from uncertainty in base parameters.
- Diesel, burned in building machine, average [CH]: 1.9748e-6 MJ; lognormal SD95 3.1055
  construction diesel for access street and sewer construction. Uncertainty calculated from uncertainty in base parameters.
- Cast iron, at plant [RER]: 1.3026e-7 kg; lognormal SD95 3.1055
  for sewer auxiliary materials. Uncertainty calculated from uncertainty in base parameters.
- Reinforcing steel, at plant [RER]: 7.6971e-7 kg; lognormal SD95 3.1055
  for sewer auxiliary materials. Uncertainty calculated from uncertainty in base parameters.
- Transport, freight, lorry, 16t-32t gross weight, fleet average [CH]: 0.0036943 tkm; lognormal SD95 1.9032
  transport for landfill infrastructure materials. uncertainty calculated from uncertainty in transported goods
- Excavation, skid-steer loader [RER]: 0.00030229 m3; lognormal SD95 3.1055
  (same comment as for Excavation, hydraulic digger, average)
- Bitumen, at refinery [CH]: 8.1169e-6 kg; lognormal SD95 3.1055
  for access street. Uncertainty calculated from uncertainty in base parameters.
- Polyethylene, HDPE, granulate, at plant [RER]: 2.5439e-6 kg; lognormal SD95 3.1055
  (same comment as for Extrusion, plastic pipes)
- Transport, freight, rail [RER]: 2.8427e-6 tkm; lognormal SD95 2.0832
  (same comment as for Transport, freight, lorry, 16t-32t gross weight, fleet average)
- Chromium steel 18/8, at plant [RER]: 2.6841e-7 kg; lognormal SD95 3.1055
  for sewer auxiliary materials. Uncertainty calculated from uncertainty in base parameters.
- Gravel, round, at mine [CH]: 0.036583 kg; lognormal SD95 3.1055
  for access street, for recultivation layer. Uncertainty calculated from uncertainty in base parameters.

## Inputs from nature
- Waste mass, total, placed in landfill [resources, in ground]: 1 kg; lognormal SD95 1
  waste mass placed in construction waste landfill (for ecoscarcity LCIA only). uncertainty is low as functional unit.
- Occupation, traffic area, road network [resources, land]: 8.658e-6 m2a; lognormal SD95 2.5417
  for access road to landfill during construction, operation, and aftercare phase of 25 years. Uncertainty calculated from uncertainty in base parameters.
- Transformation, to dump site, inert material landfill [resources, land]: 4.5455e-5 m2; lognormal SD95 4.3339
  for establishing the landfill. Uncertainty calculated from uncertainty in base parameters.
- Transformation, from dump site, inert material landfill [resources, land]: 4.5455e-5 m2; lognormal SD95 4.3339
  recultivation of landfill after operation phase. Uncertainty calculated from uncertainty in base parameters.
- Transformation, from pasture, man made [resources, land]: 4.5671e-5 m2; lognormal SD95 4.3339
  for establishing the landfill on open ground. Uncertainty calculated from uncertainty in base parameters.
- Transformation, to pasture, man made [resources, land]: 4.5455e-5 m2; lognormal SD95 4.3339
  (same comment as for Transformation, from dump site, inert material landfill)
- Occupation, dump site [resources, land]: 0.00068182 m2a; lognormal SD95 2.5417
  occupation of landfill during operation phase of 15 years. Uncertainty calculated from uncertainty in base parameters.
- Transformation, to traffic area, road network [resources, land]: 2.1645e-7 m2; lognormal SD95 4.3339
  for access road to landfill. Uncertainty calculated from uncertainty in base parameters.

## Emissions to nature
- Copper [emissions to water, groundwater, long-term]: 6.1353e-6 kg; lognormal SD95 11.093
  Emissions from long-term leachate (>100a) directly from construction waste landfill. Uncertainty calculated depending on waste input and uncertainty of long-term transfer coefficents in landfill.
- Iron [emissions to water, river]: 1.2814e-7 kg; lognormal SD95 12.484
  burden from short-term leachate to groundwater in uncontrolled landfill in moist cimate. Uncertainty calculated from unertainty of the waste composition of this waste and short-term leaching in landfill
- Chromium VI [emissions to water, river]: 1.064e-8 kg; lognormal SD95 15.865
  (same comment as for Iron)
- Calcium [emissions to water, groundwater, long-term]: 0.023618 kg; lognormal SD95 2.7512
  (same comment as for Copper)
- Aluminium [emissions to water, groundwater, long-term]: 0.00057799 kg; lognormal SD95 46.573
  (same comment as for Copper)
- Strontium [emissions to water, groundwater, long-term]: 9.9388e-5 kg; lognormal SD95 7.1111
  (same comment as for Copper)
- Manganese [emissions to water, groundwater, long-term]: 1.177e-5 kg; lognormal SD95 11.825
  (same comment as for Copper)
- Vanadium [emissions to water, groundwater, long-term]: 1.302e-6 kg; lognormal SD95 27.83
  (same comment as for Copper)
- Chromium VI [emissions to water, groundwater, long-term]: 5.9368e-6 kg; lognormal SD95 17.934
  (same comment as for Copper)
- Sodium [emissions to water, river]: 4.1588e-8 kg; lognormal SD95 14.076
  (same comment as for Iron)
- Iron [emissions to water, groundwater, long-term]: 7.6755e-5 kg; lognormal SD95 135.51
  (same comment as for Copper)
- Titanium [emissions to water, groundwater, long-term]: 5.3898e-6 kg; lognormal SD95 95.848
  (same comment as for Copper)
- Vanadium [emissions to water, river]: 2.2686e-9 kg; lognormal SD95 18.332
  (same comment as for Iron)
- Beryllium [emissions to water, groundwater, long-term]: 2.7701e-6 kg; lognormal SD95 11.898
  (same comment as for Copper)
- Lead [emissions to water, river]: 1.3167e-10 kg; lognormal SD95 23.403
  (same comment as for Iron)
- Cobalt [emissions to water, river]: 1.087e-9 kg; lognormal SD95 19.58
  (same comment as for Iron)
- Titanium [emissions to water, river]: 8.9981e-9 kg; lognormal SD95 16.106
  (same comment as for Iron)
- Calcium [emissions to water, river]: 3.9429e-5 kg; lognormal SD95 6.3857
  (same comment as for Iron)
- Potassium [emissions to water, river]: 5.6338e-11 kg; lognormal SD95 22.175
  (same comment as for Iron)
- Nickel [emissions to water, river]: 1.4157e-8 kg; lognormal SD95 15.479
  (same comment as for Iron)
- Manganese [emissions to water, river]: 1.965e-8 kg; lognormal SD95 14.955
  (same comment as for Iron)
- Potassium [emissions to water, groundwater, long-term]: 1.2982e-8 kg; lognormal SD95 16.031
  (same comment as for Copper)
- Tin [emissions to water, river]: 2.3155e-10 kg; lognormal SD95 20.519
  (same comment as for Iron)
- Molybdenum [emissions to water, river]: 9.7169e-9 kg; lognormal SD95 16.102
  (same comment as for Iron)
- Nickel [emissions to water, groundwater, long-term]: 8.48e-6 kg; lognormal SD95 9.6255
  (same comment as for Copper)
- Antimony [emissions to water, groundwater, long-term]: 3.0946e-8 kg; lognormal SD95 16.001
  (same comment as for Copper)
- Zinc [emissions to water, river]: 9.0934e-9 kg; lognormal SD95 16.137
  (same comment as for Iron)
- Boron [emissions to water, river]: 4.0388e-6 kg; lognormal SD95 9.2386
  (same comment as for Iron)
- Silicon [emissions to water, river]: 1.7651e-5 kg; lognormal SD95 8.0926
  (same comment as for Iron)
- Arsenic [emissions to water, river]: 4.2618e-10 kg; lognormal SD95 21.199
  (same comment as for Iron)
- Beryllium [emissions to water, river]: 4.6246e-9 kg; lognormal SD95 17.181
  (same comment as for Iron)
- Silicon [emissions to water, groundwater, long-term]: 0.010573 kg; lognormal SD95 40.826
  (same comment as for Copper)
- Barium [emissions to water, groundwater, long-term]: 0.000223 kg; lognormal SD95 6.3557
  (same comment as for Copper)
- Arsenic [emissions to water, groundwater, long-term]: 1.52e-7 kg; lognormal SD95 14.623
  (same comment as for Copper)
- Silver [emissions to water, river]: 5.0669e-11 kg; lognormal SD95 25.736
  (same comment as for Iron)
- Magnesium [emissions to water, river]: 1.8907e-8 kg; lognormal SD95 15.016
  (same comment as for Iron)
- Molybdenum [emissions to water, groundwater, long-term]: 2.0624e-6 kg; lognormal SD95 11.267
  (same comment as for Copper)
- Lead [emissions to water, groundwater, long-term]: 7.8872e-8 kg; lognormal SD95 20.016
  (same comment as for Copper)
- Strontium [emissions to water, river]: 6.1213e-7 kg; lognormal SD95 10.531
  (same comment as for Iron)
- Phosphate [emissions to water, river]: 2.6724e-8 kg; lognormal SD95 16.16
  (same comment as for Iron)
- Barium [emissions to water, river]: 6.1144e-7 kg; lognormal SD95 10.471
  (same comment as for Iron)
- Copper [emissions to water, river]: 1.0243e-8 kg; lognormal SD95 15.939
  (same comment as for Iron)
- Cobalt [emissions to water, groundwater, long-term]: 6.5113e-7 kg; lognormal SD95 18.649
  (same comment as for Copper)
- Tin [emissions to water, groundwater, long-term]: 2.2129e-8 kg; lognormal SD95 16
  (same comment as for Copper)
- Sodium [emissions to water, groundwater, long-term]: 4.0074e-6 kg; lognormal SD95 10.54
  (same comment as for Copper)
- Aluminium [emissions to water, river]: 9.6493e-7 kg; lognormal SD95 10.141
  (same comment as for Iron)
- Zinc [emissions to water, groundwater, long-term]: 5.447e-6 kg; lognormal SD95 10.08
  (same comment as for Copper)
- Antimony [emissions to water, river]: 6.7679e-10 kg; lognormal SD95 19.402
  (same comment as for Iron)
- Silver [emissions to water, groundwater, long-term]: 3.0351e-8 kg; lognormal SD95 19.011
  (same comment as for Copper)
- Phosphate [emissions to water, groundwater, long-term]: 1.6008e-5 kg; lognormal SD95 36.052
  (same comment as for Copper)
- Magnesium [emissions to water, groundwater, long-term]: 1.1325e-5 kg; lognormal SD95 10.875
  (same comment as for Copper)
- Boron [emissions to water, groundwater, long-term]: 1.7412e-5 kg; lognormal SD95 8.6909
  (same comment as for Copper)

## Sampling procedure
Landfill model based on average mineral building waste composition and observed average leachate concentrations from various literature sources. Extrapolated to 60'000 years heeding chemical characteristics and hydrology. Based on waste composition and climate data the end of carbonate phase of this landfill is estimated to be reached beyond 60'000 years.

## Uncertainty adjustments
uncertainty of waste input composition data derived from generic formula GSD(c) = N*ln(c)+1. *Mean* long-term emissions are the emissions until 60'000 years after waste placement. *Maximal* (upper bound) long-term emissions are the complete emissions of all landfilled material, depicting possible mechanical landfill failures and/or natural erosion not heeded in the mean value. Minimal long-term emissions are derived implicitly from the mean and maximal values assuming a lognormal distribution.

## Sources
- Doka G., 2020, 2020 - LCI exc. mat. constr. and dem. waste landfill - Doka, -, Doka LCA, Zuerich, CH
Doka G. (2020) Two models for waste-specific and climate-specific life cycle inventories of excavation material landfills and construction & demolition waste landfills. Doka LCA. Zürich, CH. http://www.doka.ch/publications.htm.
Type: Separate publication
First author: Doka G.
Year: 2020
Place of publication: Zürich, CH. http://www.doka.ch/publications.htm
Publisher: Doka LCA
Original title: Two models for waste-specific and climate-specific life cycle inventories of excavation material landfills and construction & demolition waste landfills
