# Roundwood, paraná pine (SFM), under bark, u=50%, at forest road

Dataset: EcoSpold 1, unit process
Functional unit: 1 m3
Category: wood / extraction
Geography: BR
Time period: 2000-01 to 2005-12
Generated by: Frank Werner
accessRestrictedTo: 0
copyright: true

## General comment
dataset represents average of two well-documented, large-scale logging companies. both companies own also natural forests where (some) Paraná pine is extracted. Percentage of plantation trees and trees from managed natural forests as well as intensity of management are not known. Data of the two companies differs considerably. emissions from biomass burning according to IPCC 2003\nTechnology: state-of-the art technology;
Synonyms: Araucaria angustifolia;

## Included processes
includes plantation establishment and management, harvesting and hauling operations incl. emissions from burning of branchings; fuel consumption and gravel for forest road construction is unknown; land use of forest roads and gravel are distregarded; branchings are left to rot on the ground

## Technology
state-of-the art technology; forest operations largely based on manual labor, some mechanisation is currently undertaken

## Reference product
- Roundwood, paraná pine (SFM), under bark, u=50%, at forest road [BR]: 1 m3
  BRAZIL

## Inputs from technosphere
- Chemicals organic, at plant [GLO]: 0.11 kg; lognormal SD95 1.596
  (3,4,1,3,4,5)
- Diesel, burned in building machine, average [CH]: 1684 MJ; lognormal SD95 1.2621
  (3,4,1,3,1,5)
- Power sawing, without catalytic converter [RER]: 0.4 hr; lognormal SD95 1.2621
  (3,4,1,3,1,5)
- Paraná pine, standing, under bark, in rain forest [BR]: 2 m3; lognormal SD95 1.2621
  (3,4,1,3,1,5)
- Tap water, at user [RER]: 68.75 kg; lognormal SD95 1.2621
  (3,4,1,3,1,5)
- Chemicals inorganic, at plant [GLO]: 0.0023 kg; lognormal SD95 1.596
  (3,4,1,3,4,5)

## Inputs from nature
- Energy, gross calorific value, in biomass [resources, biotic]: -17168 MJ; lognormal SD95 1.2621
  (3,4,1,3,1,5)
- Wood, soft, standing [resources, biotic]: -1.15 m3; lognormal SD95 1.2621
  (3,4,1,3,1,5)

## Emissions to nature
- Carbon dioxide, biogenic [emissions to air, unspecified]: 1182.5 kg; lognormal SD95 1.2621
  (3,4,1,3,1,5)
- Particulates, < 2.5 um [emissions to air, low. pop.]: 3 kg; lognormal SD95 1.592
  (3,4,1,3,1,5)
- Particulates, > 10 um [emissions to air, low. pop.]: 2 kg; lognormal SD95 1.592
  (3,4,1,3,1,5)
- Dinitrogen monoxide [emissions to air, low. pop.]: 0.0071077 kg; lognormal SD95 1.592
  (3,4,1,3,1,5)
- Particulates, > 2.5 um, and < 10um [emissions to air, low. pop.]: 2.5 kg; lognormal SD95 1.592
  (3,4,1,3,1,5)
- Methane, biogenic [emissions to air, low. pop.]: 1.0338 kg; lognormal SD95 1.592
  (3,4,1,3,1,5)

## Sampling procedure
literature, partly relying on estimates (fuel consumption)

## Sources
- Althaus H.-J., Werner F., Stettler C., Dinkel F., 2007, 2007 - LCI renewable materials - Althaus, Final report ecoinvent Data v2.0, 21, Swiss Centre for LCI, Empa - TSL, Umwelt & Entwicklung, Carbotech AG, Duebendorf, CH
Althaus H.J., Dinkel F., Werner F. (2007) Life Cycle Inventories of Renewable Materials. Final report ecoinvent Data v2.0. Editors: 0. 0. Volume: 21. Issue: 0. Swiss Centre for LCI, Empa - TSL. Duebendorf, CH.
Type: Measurement on site
Source: CD-ROM
First author: Althaus H.J.
Other authors: Dinkel F., Werner F.
Year: 2007
Name of editors: 0
Title of anthology: Final report ecoinvent Data v2.0
Place of publication: Duebendorf, CH
Publisher: Swiss Centre for LCI, Empa - TSL
Journal: 0
Volume No: 21
Issue No: 0

## Validation
Proof reading validation: Passed; Other validation: none;
