# Transport, transoceanic tanker

Dataset: EcoSpold 1, unit process
Functional unit: 1 tkm
Category: transport systems / ship
Geography: OCE
Time period: 2000-01 to 2000-12
Share of production covered: 100 %
Generated by: Annika Messmer
accessRestrictedTo: 0
copyright: true

## General comment
Inventory refers to the entire transport life cycle. Port infrastructure expenditures and environmental interventions are allocated based the yearly throughput (444.7 Mio t). Vessel manufacturing is allocated based on the total kilometric performance (4350000km) and its transport performance (150000dwt/unit). For each transport activity 2 ports are required.;

## Included processes
The module calls the modules addressing: production of vessel; construction and land use of port; operation, maintenance and disposal of port and vessel. In this module included is the energy consumption as well as the emissios.

## Technology
Technology

## Time period
Time of publications

## Reference product
- Transport, transoceanic tanker [OCE]: 1 tkm
  Oceanic

## Inputs from technosphere
- Transoceanic tanker [OCE]: 1.9696e-12 p; lognormal SD95 3.2968
  (3,4,1,3,4,5,BU:3); scaled for the assumed transport capacity 200'000dwt, calculated based on the assumption of a life time of 30 years; CO2 Emission Statistics for the World Commercial Fleet, 2009
- Heavy fuel oil, at regional storage [RER]: 0.0014239 kg; lognormal SD95 1.2435
  (2,4,1,3,1,5,BU:1.05); ; CO2 Emission Statistics for the World Commercial Fleet, 2009
- Wrecking, transocean tanker [IN]: 1.9696e-12 p; lognormal SD95 2.0551
  (2,3,1,3,1,5,BU:2); assumed life time 30 years; CO2 Emission Statistics for the World Commercial Fleet, 2009
- Maintenance, transoceanic freight ship [RER]: 1.9696e-12 p; lognormal SD95 3.0708
  (3,4,1,3,1,5,BU:3); ;
- Operation, maintenance, port [RER]: 5.1103e-13 p; lognormal SD95 3.0616
  (2,4,1,3,1,5,BU:3); port facility multiplied by 100 a (life span of a port);
- Port facilities [RER]: 5.1103e-15 p; lognormal SD95 3.0616
  (2,4,1,3,1,5,BU:3); assumed throughput port Rotterdam in 2014: 444733000t/a; Yearly report of the port Rotterdam 2014
- Disposal, bilge oil, 90% water, to hazardous waste incineration [CH]: 2.8478e-5 kg; lognormal SD95 1.2238
  (2,3,1,3,1,5,BU:1.05); assumption 2% of the fuel; Reederei Laeisz 2014 Umweltbericht

## Emissions to nature
- Arsenic [emissions to air, low. pop.]: 9.6826e-10 kg; lognormal SD95 5.0598
  (2,3,1,3,1,5,BU:5); emission factor of heavy fuel: 6.80E-4 g/kg heavy fuel; EMEP/EEA emission inventory guidebook 2013
- Xylene [emissions to air, low. pop.]: 3.5085e-8 kg; lognormal SD95 1.9035
  (3,5,2,5,4,5,BU:1.5); emission factor of heavy fuel: 2.46E-2 g/kg heavy fuel; ecoivnent 2.2
- Particulates, > 2.5 um, and < 10um [emissions to air, low. pop.]: 8.5434e-7 kg; lognormal SD95 2.0551
  (2,3,1,3,1,5,BU:2); emission factor of heavy fuel: 6.00E-1 g/kg heavy fuel; EMEP/EEA emission inventory guidebook 2013
- NMVOC, non-methane volatile organic compounds, unspecified origin [emissions to air, low. pop.]: 4.2321e-6 kg; lognormal SD95 1.5688
  (2,3,1,3,1,5,BU:1.5); emission factor of heavy fuel: 2.97E+0 g/kg heavy fuel; IMO
- Chromium [emissions to air, low. pop.]: 1.0252e-9 kg; lognormal SD95 5.0598
  (2,3,1,3,1,5,BU:5); emission factor of heavy fuel: 7.20E-4 g/kg heavy fuel; EMEP/EEA emission inventory guidebook 2013
- Nitrogen oxides [emissions to air, low. pop.]: 0.00013242 kg; lognormal SD95 1.5688
  (2,3,1,3,1,5,BU:1.5); emission factor of heavy fuel: 9.30E+1 g/kg heavy fuel; IMO
- Particulates, < 2.5 um [emissions to air, low. pop.]: 7.9739e-6 kg; lognormal SD95 3.0525
  (2,3,1,3,1,5,BU:3); emission factor of heavy fuel: 5.60E+0 g/kg heavy fuel; EMEP/EEA emission inventory guidebook 2013
- Dinitrogen monoxide [emissions to air, low. pop.]: 2.2783e-7 kg; lognormal SD95 1.5688
  (2,3,1,3,1,5,BU:1.5); emission factor of heavy fuel: 1.60E-1 g/kg heavy fuel; IMO
- Ammonia [emissions to air, low. pop.]: 5.7953e-7 kg; lognormal SD95 1.7026
  (3,5,2,5,4,5,BU:1.2); emission factor of heavy fuel: 4.07E-1 g/kg heavy fuel; ecoinvent 2.2, heavy fuel oil burned in industrial furnance
- Cadmium [emissions to air, low. pop.]: 2.8478e-11 kg; lognormal SD95 5.0598
  (2,3,1,3,1,5,BU:5); emission factor of heavy fuel: 2.00E-5 g/kg heavy fuel; EMEP/EEA emission inventory guidebook 2013
- PAH, polycyclic aromatic hydrocarbons [emissions to air, low. pop.]: 3.6879e-11 kg; lognormal SD95 3.0525
  (2,3,1,3,1,5,BU:3); emission factor of heavy fuel: 2.59E-5 g/kg heavy fuel; Cooper & Gustavson 2004
- TOC, Total Organic Carbon [emissions to water, ocean]: 1.4216e-5 kg; lognormal SD95 1.5688
  (2,3,1,3,1,5,BU:1.5); ; own calculation, according to quality guidelines, derived from emissions of oil.
- Carbon monoxide, fossil [emissions to air, low. pop.]: 3.9442e-6 kg; lognormal SD95 5.0598
  (2,3,1,3,1,5,BU:5); emission factor of heavy fuel: 2.77E+0 g/kg heavy fuel; IMO
- Heat, waste [emissions to air, low. pop.]: 0.058665 MJ; lognormal SD95 1.2238
  (2,3,1,3,1,5,BU:1.05); default value;
- DOC, Dissolved Organic Carbon [emissions to water, ocean]: 1.4216e-5 kg; lognormal SD95 1.5688
  (same comment as for TOC, Total Organic Carbon)
- COD, Chemical Oxygen Demand [emissions to water, ocean]: 5.166e-5 kg; lognormal SD95 1.5688
  (same comment as for TOC, Total Organic Carbon)
- Carbon dioxide, fossil [emissions to air, low. pop.]: 0.0044284 kg; lognormal SD95 1.2238
  (2,3,1,3,1,5,BU:1.05); emission factor of heavy fuel: 3.11E+3 g/kg heavy fuel; IMO
- Oils, unspecified [emissions to water, ocean]: 1.6419e-5 kg; lognormal SD95 1.5688
  (2,3,1,3,1,5,BU:1.5); assumed oil spill between 1988-1999: 179'000t; GESAMP, 2007; UNCTAD 1988-1999
- BOD5, Biological Oxygen Demand [emissions to water, ocean]: 5.166e-5 kg; lognormal SD95 1.5688
  (same comment as for TOC, Total Organic Carbon)
- Dioxin, 2,3,7,8 Tetrachlorodibenzo-p- [emissions to air, low. pop.]: 1.4239e-15 kg; lognormal SD95 3.3435
  (3,5,2,5,4,5,BU:3); emission factor of heavy fuel: 4.70E-10 g/kg heavy fuel; EMEP/EEA emission inventory guidebook 2013, ecoinvent
- Copper [emissions to water, ocean]: 9.5263e-8 kg; lognormal SD95 3.0525
  (2,3,1,3,1,5,BU:3); leaching factor 200mg/m2d; Assessment leaching antifouling agent 2014
- Toluene [emissions to air, low. pop.]: 3.5085e-8 kg; lognormal SD95 1.9035
  (3,5,2,5,4,5,BU:1.5); emission factor of heavy fuel: 2.46E-2 g/kg heavy fuel; ecoinvent 2.2
- Sulfur dioxide [emissions to air, low. pop.]: 7.5168e-5 kg; lognormal SD95 1.2238
  (2,3,1,3,1,5,BU:1.05); emission factor of heavy fuel: 5.28E+1 g/kg heavy fuel; IMO
- Copper [emissions to air, low. pop.]: 1.7799e-9 kg; lognormal SD95 5.0598
  (2,3,1,3,1,5,BU:5); emission factor of heavy fuel: 1.25E-3 g/kg heavy fuel; EMEP/EEA emission inventory guidebook 2013
- Zinc [emissions to air, low. pop.]: 1.7087e-9 kg; lognormal SD95 5.0598
  (2,3,1,3,1,5,BU:5); emission factor of heavy fuel: 1.20E-3 g/kg heavy fuel; EMEP/EEA emission inventory guidebook 2013
- Lead [emissions to air, low. pop.]: 2.563e-10 kg; lognormal SD95 5.0598
  (2,3,1,3,1,5,BU:5); emission factor of heavy fuel: 1.80E-4 g/kg heavy fuel; EMEP/EEA emission inventory guidebook 2013
- Benzo(a)pyrene [emissions to air, low. pop.]: 7.2619e-12 kg; lognormal SD95 3.0525
  (2,3,1,3,1,5,BU:3); emission factor of heavy fuel: 5.10E-6 g/kg heavy fuel; Cooper & Gustavson 2004
- Mercury [emissions to air, low. pop.]: 2.8478e-11 kg; lognormal SD95 5.0598
  (same comment as for Cadmium)
- Hydrogen chloride [emissions to air, low. pop.]: 8.2017e-8 kg; lognormal SD95 1.5688
  (2,3,1,3,1,5,BU:1.5); Cl content of heavy fuel, emission factor of heavy fuel: 5.76E-2 g/kg heavy fuel; Cl content of heavy fuel, ecoinvent 2.2
- Hydrogen fluoride [emissions to air, low. pop.]: 8.2017e-9 kg; lognormal SD95 1.5688
  (2,3,1,3,1,5,BU:1.5); Fl content of heavy fuel, emission factor of heavy fuel: 5.76E-3 g/kg heavy fuel; F contant of heavy fuel, ecoinvent 2.2
- Nickel [emissions to air, low. pop.]: 4.5565e-8 kg; lognormal SD95 5.0598
  (2,3,1,3,1,5,BU:5); emission factor of heavy fuel: 3.20E-2 g/kg heavy fuel; EMEP/EEA emission inventory guidebook 2013
- Selenium [emissions to air, low. pop.]: 2.9902e-10 kg; lognormal SD95 5.0598
  (2,3,1,3,1,5,BU:5); emission factor of heavy fuel: 2.10E-4 g/kg heavy fuel; EMEP/EEA emission inventory guidebook 2013
- Benzene [emissions to air, low. pop.]: 8.3327e-8 kg; lognormal SD95 3.3435
  (3,5,2,5,4,5,BU:3); emission factor of heavy fuel: 5.85E-2 g/kg heavy fuel; VOC profile from ecoinvent 2.2
- Methane, fossil [emissions to air, low. pop.]: 8.5434e-8 kg; lognormal SD95 1.5688
  (2,3,1,3,1,5,BU:1.5); emission factor of heavy fuel: 6.00E-2 g/kg heavy fuel; IMO

## Sampling procedure
Sampling Procedure

## Extrapolations
Extrapolations

## Sources
- Messmer A., Frischknecht R., 2016, 2016 - LCI water transport services - Messmer, Project report, 544, treeze Ltd., Uster, CH
Annika Messmer, Rolf Frischknecht (2016) Life cycle inventories of water transport services. Project report. Volume: 544. treeze Ltd.. Uster, CH.
Type: Separate publication
Source: Report
First author: Annika Messmer
Other authors: Rolf Frischknecht
Year: 2016
Title of anthology: Project report
Place of publication: Uster, CH
Publisher: treeze Ltd.
Volume No: 544

## Validation
Proof reading validation: 09.11.2016; Other validation: G:\Projekte laufend\544 Aktualisierung mobitool\Schiff\Frachtschiff\Ecospold\[544_Seeschiffahrt_EIV2_v0.5.xlsx]X-Process;
