# xx Anhydrite floor, at plant

Dataset: EcoSpold 1, unit process
Functional unit: 1 kg
Category: material, obsolete / construction, obsolete
Geography: CH
Time period: 2000-01 to 2000-12
Generated by: Daniel Kellenberger
accessRestrictedTo: 0
copyright: true

## General comment
The raw materials for ready mix product are mixed. After mixing it is internally transported to the packing installation and packed. For the use 0.048 kg water has to be added per kg dry product (not included in this dataset). No direct process emissions are taken into account as they play a subordinate role compared to the emissions of the raw material production (e.g. drying of silica sand) and because no data is available. For inventorying the infrastructure, a yearly production amount of 150'000 tons is assumed. The lifespan of the machines is assumed to be 20 years.;
Synonyms: Anhydritestrich, Caclumsulfat-Fliessestrich;

## Included processes
Includes the whole manufacturing process to produce anhydrite floor (raw material provision, raw material mixing, packing, and storage), transports to plant, and infrastructure. No requirements for administration are included. No additional buildings and land-use are taken into account as it is assumed that the mixing process takes place in an existing building of the sand/cement industry or on the construction site

## Geography
For the infrastructure RER- and for the silica sand DE-modules are used as proxy

## Technology
Assumed average current technology. The raw materials are mixed in an assumed average ratio, transported to the packing installation and packed.

## Reference product
- xx Anhydrite floor, at plant [CH]: 1 kg
  SWITZERLAND

## Inputs from technosphere
- Anhydrite, at plant [CH]: 0.26 kg; lognormal SD95 1.5
  estimation
- Packing, cement [CH]: 1 kg; lognormal SD95 5
  estimation
- Electricity, medium voltage, at grid [CH]: 0.027778 kWh; lognormal SD95 5
  estimation
- Polyethylene, HDPE, granulate, at plant [RER]: 0.0015 kg; lognormal SD95 5
  estimation
- Transport, freight, lorry, 16t-32t gross weight, fleet average [CH]: 0.02 tkm; lognormal SD95 5
  estimation
- Melamine formaldehyde resin, at plant [RER]: 0.0015 kg; lognormal SD95 5
  estimation
- Industrial machine, heavy, unspecified, at plant [RER]: 6.6667e-6 kg; lognormal SD95 5
  estimation
- Potassium chloride, as K2O, at regional storehouse [RER]: 0.0015 kg; lognormal SD95 5
  estimation
- Silica sand, at plant [DE]: 0.732 kg; lognormal SD95 1.5
  estimation
- Conveyor belt, at plant [RER]: 3.3333e-8 m; lognormal SD95 5
  estimation
- Acetic acid, 98% in H2O, at plant [RER]: 0.0015 kg; lognormal SD95 5
  estimation
- Limestone, milled, loose, at plant [CH]: 0.002 kg; lognormal SD95 5
  estimation

## Emissions to nature
- Heat, waste [emissions to air, unspecified]: 0.1 MJ; lognormal SD95 5
  estimation

## Sampling procedure
estimation

## Sources
- Kellenberger D., Althaus H.-J., Jungbluth N., Kuenniger T., Lehmann M., Thalmann P., 2007, 2007 - LCI building products - Kellenberger, Final report ecoinvent data v2.0, 7, Swiss Centre for LCI, Empa - TSL, ESU-services Ltd., Bau- und Umweltchimie, Duebendorf, CH
Kellenberger D., Althaus H.-J., Jungbluth N., Künniger T. (2007) Life Cycle Inventories of Building Products. Final report ecoinvent data v2.0. Volume: 7. Swiss Centre for LCI, Empa - TSL. Dübendorf, CH.
Type: Measurement on site
Source: CD-ROM
First author: Kellenberger D.
Other authors: Althaus H.-J., Jungbluth N., Künniger T.
Year: 2007
Title of anthology: Final report ecoinvent data v2.0
Place of publication: Dübendorf, CH
Publisher: Swiss Centre for LCI, Empa - TSL
Volume No: 7

## Validation
Proof reading validation: passed; Other validation: none;
