# Tetrafluoroethylene, at plant

Dataset: EcoSpold 1, unit process
Functional unit: 1 kg
Category: plastics / thermoplasts
Geography: RER
Time period: 2000-01 to 2000-12
Production volume: The worldwide production capacity in 1987 for fluoroplastics was ca. 45 000t.
Generated by: Matthias Stucki
accessRestrictedTo: 0
copyright: true

## General comment
Inventory for a chemical. Emission data from PRTR-database.;
CAS number: 9002-84-0;
Formula: C2F4;
Synonyms: Fluon, PTFE, Teflon, Ethene, tetrafluoro-, homopolymer, Politef, Tetrafluoroethylene Resin;

## Included processes
Gate to gate inventory for the production, estimation for infrastructure and not including by-products.

## Technology
Chemical processing

## Reference product
- Tetrafluoroethylene, at plant [RER]: 1 kg

## Inputs from technosphere
- Chlorodifluoromethane, at plant [NL]: 1.8105 kg; lognormal SD95 1.2152
  (4,3,na,na,1,na); Stoichiometric calculation, 95% yield
- Chemical plant, organics [RER]: 4e-10 p; lognormal SD95 3.8994
  (5,na,1,1,5,na); Generic estimation
- Disposal, municipal solid waste, 22.9% water, to municipal incineration [CH]: 0.001223 kg; lognormal SD95 1.3286
  (4,3,3,3,1,5); Literature, Ros 1994, manufacturing waste
- Disposal, refinery sludge, 89.5% water, to hazardous waste incineration [CH]: 0.0043885 kg; lognormal SD95 1.3286
  (4,3,3,3,1,5); Literature (Ros 1994) chemical waste and waste with hydrocarbons
- Transport, freight, lorry, fleet average [RER]: 0.00023165 tkm; lognormal SD95 2.095
  (4,5,na,na,na,na); Standard distance 10/50km
- Wood chips, from industry, mixed, burned in furnace 1000kW [CH]: 4.6792 MJ; lognormal SD95 3.8994
  (5,na,1,1,5,na); Estimation based on CO2 emissions 2010 (E-PRTR) and literature (Ros 1994)
- Natural gas, burned in industrial furnace 1MWth [CH]: 37.513 MJ; lognormal SD95 1.5681
  (5,3,na,na,3,na); Estimation based on CO2 emissions 2010 (E-PRTR) and literature (Ros 1994)

## Emissions to nature
All rows: lognormal SD95 2.0511
- Propane, perfluorocyclo- [emissions to air, high. pop.]: 2.25e-5 kg
  (4,3,na,na,1,na); Based on emission data 2010 (E-PRTR) and production figurs from literature (Ros 1994)
- Fluoride [emissions to air, high. pop.]: 0.00046187 kg
  (same comment as for Propane, perfluorocyclo-)
- Methane, dichloro-, HCC-30 [emissions to air, high. pop.]: 0.0001036 kg
  (same comment as for Propane, perfluorocyclo-)
- Butane, perfluorocyclo-, PFC-318 [emissions to air, high. pop.]: 2.25e-5 kg
  (same comment as for Propane, perfluorocyclo-)
- Methane, trichlorofluoro-, CFC-11 [emissions to air, high. pop.]: 1.7585e-6 kg
  (same comment as for Propane, perfluorocyclo-)
- Methane, dichlorodifluoro-, CFC-12 [emissions to air, high. pop.]: 0.00012529 kg
  (same comment as for Propane, perfluorocyclo-)
- Methanol [emissions to air, high. pop.]: 0.02 kg
  (same comment as for Propane, perfluorocyclo-)

## Sampling procedure
Literature, company information, stoichiometric calculations, emission database, assumptions.

## Extrapolations
from one plant

## Sources
- Jungbluth N., Stucki M., Flury K., Frischknecht R., Buesser S., 2012, 2012 - LCI photovoltaics - Jungbluth, 0, 407, ESU-services Ltd., Uster, CH
Jungbluth, N., Stucki M., Fluri K., Frischknecht R., Buesser S. (2012) Life Cycle Inventories of Photovoltaics. 0. Editors: Bauer C.. Volume: 407. ESU-services ltd.. Uster, CH.
Type: Separate publication
Source: www.esu-services.ch
First author: Jungbluth, N.
Other authors: Stucki M., Fluri K., Frischknecht R., Buesser S.
Year: 2012
Name of editors: Bauer C.
Title of anthology: 0
Place of publication: Uster, CH
Publisher: ESU-services ltd.
Volume No: 407

## Validation
Proof reading validation: 05.09.2012; Other validation: \\server\e\ESU-Docs\Projekte laufend\174 Photovoltaic, IEA Task 12\berechnung\Chemicals\PTFE\[neueingabe-PTFE-2.3-SP.xlsx]X-Process;
