# xxx Diesel, at refinery

Dataset: EcoSpold 1, unit process
Functional unit: 1 kg
Category: material, obsolete / oil, obsolete\fuels, obsolete
Geography: CH
Time period: 2000-01 to 2000-12
Production volume: 5.0 mio. tonnes crude oil throughput in 2014.
Share of production covered: 100 %
Generated by: Philippe Stolz
accessRestrictedTo: 0
copyright: true

## General comment
Description of all flows of materials and energy due to the throughput of 1kg crude oil in the refinery. The multioutput-process 'crude oil, in refinery' delivers the co-products petrol, unleaded, bitumen, diesel, light fuel oil, heavy fuel oil, kerosene, naphtha, propane/ butane, refinery gas, secondary sulphur and electricity. The impacts of processing are allocated to the different products. Crude oil mix from different regions updated to the year 2016 based on data reported by the Swiss Petroleum Association (Erdölvereinigung).;

## Included processes
All processes on the refinery site excluding the emissions from combustion facilities, including waste water treatment, process emissions and direct discharges to rivers.

## Technology
Average data for the used technology.

## Time period
The most important data (e.g. production, throughput, energy use, regulated emissions) have been investigated for the 2 Swiss refineries for the year 2000. Other data and indicators have been assessed based on older literature data.

## Reference product
- xxx Diesel, at refinery [CH]: 1 kg
  SWITZERLAND

## Inputs from technosphere
- Crude oil, production RME, at long distance transport [CH]: 0.046947 kg; lognormal SD95 1.07
  (1,1,1,1,1,3); Swiss Petroleum Association (Erdölvereinigung): Annual Report 2016
- Sulphuric acid, liquid, at plant [RER]: 1.1746e-5 kg; lognormal SD95 1.1
  (2,3,1,3,1,3); Average of plant data
- Crude oil, production US, at long distance transport [CH]: 0.17151 kg; lognormal SD95 1.07
  (1,1,1,1,1,3); Swiss Petroleum Association (Erdölvereinigung): Annual Report 2016
- Crude oil, production NG, at long distance transport [CH]: 0.35203 kg; lognormal SD95 1.07
  (1,1,1,1,1,3); Swiss Petroleum Association (Erdölvereinigung): Annual Report 2016
- Chemicals organic, at plant [GLO]: 0.000405 kg; lognormal SD95 1.19
  (3,4,2,1,1,4); IPPC European plant data
- Disposal, catalytic converter NOx reduction, 0% water, to underground deposit [DE]: 3.8889e-7 kg; lognormal SD95 1.1
  (2,3,1,3,1,3); Estimation based on literature data
- Molybdenum, at regional storage [RER]: 1.8788e-8 kg; lognormal SD95 2.83
  Range for RER refineries, Co/Mo Catalyst
- Crude oil, production MX, at long distance transport [CH]: 0.16744 kg; lognormal SD95 1.07
  (1,1,1,1,1,3); Swiss Petroleum Association (Erdölvereinigung): Annual Report 2016
- Lubricating oil, at plant [RER]: 2.4479e-5 kg; lognormal SD95 1.14
  (2,4,1,3,1,3); Env. reports DE
- Crude oil, production RAF, at long distance transport [CH]: 0.021153 kg; lognormal SD95 1.07
  (1,1,1,1,1,3); Swiss Petroleum Association (Erdölvereinigung): Annual Report 2016
- Propylene glycol, liquid, at plant [RER]: 6.3333e-7 kg; lognormal SD95 1.26
  (3,4,1,3,3,na); Literature
- Iron sulphate, at plant [RER]: 4.9352e-5 kg; lognormal SD95 1.34
  (3,4,4,3,3,na); Literature, waste water treatment
- Hydrochloric acid, 30% in H2O, at plant [RER]: 8.7846e-5 kg; lognormal SD95 1.14
  (2,4,1,3,1,3); Env. reports DE
- Heavy fuel oil, burned in refinery furnace [CH]: 0.29688 MJ; lognormal SD95 1.09
  (2,1,1,1,1,3); Swiss statistic
- Crude oil, production RU, at long distance transport [CH]: 0.078382 kg; lognormal SD95 1.07
  (1,1,1,1,1,3); Swiss Petroleum Association (Erdölvereinigung): Annual Report 2016
- Tap water, at user [CH]: 0.015003 kg; lognormal SD95 1.1
  (2,3,1,3,1,3); Average of plant data
- Ammonia, liquid, at regional storehouse [RER]: 1.9759e-6 kg; lognormal SD95 1.34
  (3,4,4,3,3,na); Literature
- Refinery gas, burned in furnace [CH]: 1.2844 MJ; lognormal SD95 1.09
  (2,1,1,1,1,3); Swiss statistic
- Calcium chloride, CaCl2, at plant [RER]: 1.599e-5 kg; lognormal SD95 1.1
  (2,3,1,3,1,3); Average of plant data
- Refinery gas, burned in flare [GLO]: 0.046869 MJ; lognormal SD95 1.16
  (2,4,1,3,1,4); Swiss plant
- Disposal, refinery sludge, 89.5% water, to hazardous waste incineration [CH]: 0.00012042 kg; lognormal SD95 1.09
  (2,2,1,1,1,3); Average of plant data
- Crude oil, production KZ, at long distance transport [CH]: 0.16161 kg; lognormal SD95 1.07
  (1,1,1,1,1,3); Swiss Petroleum Association (Erdölvereinigung): Annual Report 2016
- Zeolite, powder, at plant [RER]: 3.8578e-6 kg; lognormal SD95 1.34
  Range for RER refineries
- Transport, freight, lorry, fleet average [RER]: 0.0013226 tkm; lognormal SD95 2.1
  (4,5,na,na,na,na); Standard distance 100km
- Zinc, primary, at regional storage [RER]: 4.1611e-8 kg; lognormal SD95 1
  Range for RER refineries, Zn Catalyst
- Refinery [RER]: 2.8274e-11 p; lognormal SD95 3.03
  (3,3,1,1,1,4); Estimation
- Lime, hydrated, packed, at plant [CH]: 3.4546e-5 kg; lognormal SD95 1.26
  (3,4,1,3,3,na); Estimation based on literature
- Sodium hypochlorite, 15% in H2O, at plant [RER]: 4.9352e-5 kg; lognormal SD95 1.34
  (3,4,4,3,3,na); Literature, waste water treatment
- Soap, at plant [RER]: 2.6453e-6 kg; lognormal SD95 1.1
  (2,3,1,3,1,3); Average of plant data
- Nitrogen, liquid, at plant [RER]: 0.00081332 kg; lognormal SD95 1.14
  (2,4,1,3,1,3); Env. reports DE
- Transport, freight, rail [RER]: 0.0079456 tkm; lognormal SD95 2.1
  (4,5,na,na,na,na); Standard distance 600km
- Electricity, medium voltage, at grid [CH]: 0.01253 kWh; lognormal SD95 1.1
  (2,3,1,3,1,3); Average of plant data

## Inputs from nature
- Water, cooling, unspecified natural origin/m3 [resources, in water]: 0.0039778 m3; lognormal SD95 1.12
  (3,3,1,1,1,na); Average of plant data
- Water, river [resources, in water]: 0.00055866 m3; lognormal SD95 1.16
  (3,3,1,3,1,4); Average of plant data
- Cobalt [resources, in ground]: 2.7038e-8 kg; lognormal SD95 2
  Range for RER refineries, Co/Mo Catalyst

## Emissions to nature
- Nitrate [emissions to water, river]: 4.5897e-6 kg; lognormal SD95 1.65
  (3,5,4,3,1,4); Literature
- Mercury [emissions to water, river]: 5.5866e-11 kg; lognormal SD95 5.13
  (3,5,4,3,1,4); Literature
- Molybdenum [emissions to water, river]: 5.5866e-9 kg; lognormal SD95 5.13
  (3,5,4,3,1,4); Literature
- Nitrogen oxides [emissions to air, high. pop.]: 1.5862e-5 kg; lognormal SD95 1.51
  (2,1,1,1,1,3); Swiss plants
- Chromium [emissions to water, river]: 1.2453e-7 kg; lognormal SD95 2.24
  Range for RER refineries
- Sulfur dioxide [emissions to air, high. pop.]: 1.7674e-5 kg; lognormal SD95 1.51
  (2,1,1,1,1,3); Swiss plants
- BOD5, Biological Oxygen Demand [emissions to water, river]: 4.0076e-6 kg; lognormal SD95 3.16
  Range for RER refineries
- Methane, fossil [emissions to air, high. pop.]: 1.6301e-5 kg; lognormal SD95 1.23
  (3,na,na,na,1,na); Average of plant data
- Ethane [emissions to air, high. pop.]: 1.4523e-5 kg; lognormal SD95 1.65
  (3,5,4,3,1,4); Literature
- Copper [emissions to water, river]: 5.5499e-9 kg; lognormal SD95 5.13
  (3,5,4,3,1,4); Literature
- Particulates, > 10 um [emissions to air, high. pop.]: 9.8796e-6 kg; lognormal SD95 2.12
  (3,5,4,3,1,4); Literature
- Butane [emissions to air, high. pop.]: 5.8191e-5 kg; lognormal SD95 1.65
  (3,5,4,3,1,4); Literature
- Cadmium [emissions to water, river]: 5.5499e-9 kg; lognormal SD95 5.13
  (3,5,4,3,1,4); Literature
- Ammonium, ion [emissions to water, river]: 3.7824e-6 kg; lognormal SD95 6.32
  Range for RER refineries
- Manganese [emissions to water, river]: 1.1154e-7 kg; lognormal SD95 5.13
  (3,5,4,3,1,4); Literature
- COD, Chemical Oxygen Demand [emissions to water, river]: 4.0911e-5 kg; lognormal SD95 2.04
  Range for RER refineries
- Hydrocarbons, aromatic [emissions to air, high. pop.]: 6.6391e-13 kg; lognormal SD95 1.51
  (2,3,1,3,1,3); Average of plant data
- Sulfide [emissions to water, river]: 5.5866e-8 kg; lognormal SD95 10
  Range for RER refineries
- DOC, Dissolved Organic Carbon [emissions to water, river]: 3.9069e-8 kg; lognormal SD95 1.53
  (2,4,1,2,1,3); Average of CH plant
- Sodium [emissions to water, river]: 0.0001678 kg; lognormal SD95 1.65
  (3,5,4,3,1,4); Literature
- Vanadium [emissions to water, river]: 1.6669e-8 kg; lognormal SD95 5.13
  (3,5,4,3,1,4); Literature
- Aluminium [emissions to water, river]: 2.7933e-8 kg; lognormal SD95 5.13
  (3,5,4,3,1,4); Literature
- Propene [emissions to air, high. pop.]: 2.9046e-6 kg; lognormal SD95 1.65
  (3,5,4,3,1,4); Literature
- Heptane [emissions to air, high. pop.]: 1.4523e-5 kg; lognormal SD95 1.65
  (3,5,4,3,1,4); Literature
- Chloride [emissions to water, river]: 4.4417e-5 kg; lognormal SD95 5.02
  (2,4,1,2,1,3); Average of CH plant, basic uncertainity = 5 estimated based on range
- Benzene, ethyl- [emissions to air, high. pop.]: 1.4523e-6 kg; lognormal SD95 1.65
  (3,5,4,3,1,4); Literature
- Hexane [emissions to air, high. pop.]: 2.9046e-5 kg; lognormal SD95 1.65
  (3,5,4,3,1,4); Literature
- Hydrocarbons, unspecified [emissions to water, river]: 5.6403e-8 kg; lognormal SD95 5.48
  Range for RER refineries
- Zinc [emissions to water, river]: 9.5604e-8 kg; lognormal SD95 5.02
  (2,4,1,2,1,3); Average of CH plant
- Oils, unspecified [emissions to water, river]: 1.441e-7 kg; lognormal SD95 14
  Range for RER refineries
- Arsenic [emissions to water, river]: 5.5499e-9 kg; lognormal SD95 5.13
  (3,5,4,3,1,4); Literature
- Ammonia [emissions to air, high. pop.]: 7.2547e-8 kg; lognormal SD95 1.54
  (3,4,1,3,1,3); Plant data
- Barium [emissions to water, river]: 5.5866e-8 kg; lognormal SD95 5.13
  (3,5,4,3,1,4); Literature
- Propane [emissions to air, high. pop.]: 5.8191e-5 kg; lognormal SD95 1.65
  (3,5,4,3,1,4); Literature
- Benzene, ethyl- [emissions to water, river]: 1.1049e-10 kg; lognormal SD95 3.12
  (3,5,4,3,1,4); Literature
- Magnesium [emissions to water, river]: 1.3917e-5 kg; lognormal SD95 5.13
  (3,5,4,3,1,4); Literature
- Suspended solids, unspecified [emissions to water, river]: 5.5866e-6 kg; lognormal SD95 5
  Range for RER refineries
- Fluoride [emissions to water, river]: 2.4972e-6 kg; lognormal SD95 4.47
  Range for RER refineries
- Xylene [emissions to air, high. pop.]: 5.8191e-6 kg; lognormal SD95 1.65
  (3,5,4,3,1,4); Literature
- Phenol [emissions to water, river]: 9.9433e-8 kg; lognormal SD95 5.77
  Range for RER refineries
- Nickel [emissions to water, river]: 7.3248e-9 kg; lognormal SD95 5.02
  (2,4,1,2,1,3); Average of CH plant
- Hydrocarbons, aromatic [emissions to water, river]: 4.0172e-7 kg; lognormal SD95 3.01
  (2,3,1,1,1,3); Average of plant data
- Strontium [emissions to water, river]: 3.883e-7 kg; lognormal SD95 5.13
  (3,5,4,3,1,4); Literature
- Hydrocarbons, aliphatic, unsaturated [emissions to air, high. pop.]: 2.4304e-12 kg; lognormal SD95 1.51
  (2,3,1,3,1,3); Average of plant data
- Benzene [emissions to water, river]: 1.2782e-8 kg; lognormal SD95 44.7
  Range for RER refineries
- Hydrocarbons, aliphatic, alkanes, unspecified [emissions to air, high. pop.]: 4.4261e-11 kg; lognormal SD95 1.51
  (2,3,1,3,1,3); Average of plant data
- Dinitrogen monoxide [emissions to air, high. pop.]: 8.352e-7 kg; lognormal SD95 1.52
  (3,na,na,na,1,na); Average of plant data
- Ethene [emissions to air, high. pop.]: 2.9046e-6 kg; lognormal SD95 1.65
  (3,5,4,3,1,4); Literature
- Cyanide [emissions to water, river]: 9.673e-8 kg; lognormal SD95 5.77
  Range for RER refineries
- Nitrogen, organic bound [emissions to water, river]: 2.7219e-6 kg; lognormal SD95 2.65
  Range for RER refineries
- Butene [emissions to air, high. pop.]: 1.4523e-6 kg; lognormal SD95 1.65
  (3,5,4,3,1,4); Literature
- Benzene [emissions to air, high. pop.]: 5.8191e-6 kg; lognormal SD95 1.65
  (3,5,4,3,1,4); Literature
- Potassium [emissions to water, river]: 5.5866e-6 kg; lognormal SD95 1.65
  (3,5,4,3,1,4); Literature
- Xylene [emissions to water, river]: 5.5866e-8 kg; lognormal SD95 3.12
  (3,5,4,3,1,4); Literature
- Lead [emissions to water, river]: 1.7552e-7 kg; lognormal SD95 5.02
  (2,3,1,1,1,4); Range for RER refineries
- Boron [emissions to water, river]: 2.2307e-7 kg; lognormal SD95 1.65
  (3,5,4,3,1,4); Literature
- Heat, waste [emissions to air, high. pop.]: 0.015082 MJ; lognormal SD95 1.1
  (2,3,1,3,1,3); Average of plant data
- Phosphorus [emissions to water, river]: 2.1616e-7 kg; lognormal SD95 3.87
  Range for RER refineries
- Iron [emissions to water, river]: 2.7933e-7 kg; lognormal SD95 5.13
  (3,5,4,3,1,4); Literature
- Toluene [emissions to air, high. pop.]: 8.7237e-6 kg; lognormal SD95 1.65
  (3,5,4,3,1,4); Literature
- Toluene [emissions to water, river]: 5.5866e-7 kg; lognormal SD95 3.12
  (3,5,4,3,1,4); Literature
- Silver [emissions to water, river]: 2.7933e-8 kg; lognormal SD95 5.13
  (3,5,4,3,1,4); Literature
- PAH, polycyclic aromatic hydrocarbons [emissions to water, river]: 9.008e-9 kg; lognormal SD95 3.16
  Range for RER refineries
- TOC, Total Organic Carbon [emissions to water, river]: 1.5784e-5 kg; lognormal SD95 1.65
  (3,5,4,3,1,4); Estimation
- Pentane [emissions to air, high. pop.]: 7.2714e-5 kg; lognormal SD95 1.65
  (3,5,4,3,1,4); Literature
- Selenium [emissions to water, river]: 8.3799e-9 kg; lognormal SD95 5.13
  (3,5,4,3,1,4); Literature
- Calcium [emissions to water, river]: 2.7933e-5 kg; lognormal SD95 1.65
  (3,5,4,3,1,4); Literature
- Sulfate [emissions to water, river]: 0.00011373 kg; lognormal SD95 1.65
  (3,5,4,3,1,4); Literature
- AOX, Adsorbable Organic Halogen as Cl [emissions to water, river]: 9.008e-9 kg; lognormal SD95 3.16
  Range for RER refineries
- Water [emissions to water, unspecified]: 3.77891, 0.530727 kg (2 entries); lognormal SD95 2.5196
  (5,5,5,5,5,BU:1.05); All uncertainty-values set to 5.0 by default. Balance of input water

## Sampling procedure
Questionnaires and literature.

## Sources
- Stolz P., Frischknecht R., 2017, 2017 - Energy label for passenger cars - Stolz, -, 611, treeze Ltd., Bern, CH
Stolz P., Frischknecht R. (2017) Energieetikette für Personenwagen: Umweltkennwerte 2017 der Strom- und Treibstoffbereitstellung. Volume: 611. treeze Ltd.. Uster, CH.
Type: Measurement on site
First author: Stolz P.
Other authors: Frischknecht R.
Year: 2017
Place of publication: Uster, CH
Publisher: treeze Ltd.
Volume No: 611
Original title: Energieetikette für Personenwagen: Umweltkennwerte 2017 der Strom- und Treibstoffbereitstellung
