# Melamine formaldehyde resin, at plant

Dataset: EcoSpold 1, unit process
Functional unit: 1 kg
Category: chemicals / organic
Geography: RER
Time period: 2000-01 to 2000-12
Generated by: Maggie Osses
accessRestrictedTo: 0
copyright: true

## General comment
Manufacturing process is considered with consumption of raw materials, energy, infrastructure and land use, as well as the generation of emissions to air.Transportation of raw materials is also included. Auxiliaries, solid wastes and emissions to water are not included due to the lack of information. Transport and storage of the final product are not included. No byproducts or coproducts are considered. Transcient or unstable operations are not considered, but the production during stable operation conditions. Emissions to air are considered as emanating in a high population density area. Inventory refers to 1 kg 100% urea-formaldehyde resin. The literature source used are Diem 2000 and von Däniken et al. 1995.;

## Geography
For raw materials, data are taken from literature and refere to u-f resin. The other values are an approximation based on the manufacturing of alkyl resin. For this alkyl resin, data base on information provided by a European manufacturing company. It is not known how representative are these values for the European melamine-formaldehyde resin industry

## Time period
The literature sources are from 1995 and 2000. The time period to which the data presented in the sources corresponds is not known.

## Reference product
- Melamine formaldehyde resin, at plant [RER]: 1 kg
  Europe

## Inputs from technosphere
- Transport, freight, rail [RER]: 0.648 tkm; lognormal SD95 2.05
  (4,na,na,na,na,na); standard distances
- Heat, heavy fuel oil, at industrial furnace 1MW [RER]: 0.56 MJ; lognormal SD95 1.42
  (3,5,3,3,3,5); data from survey in literature (von Däniken et al. 1995)
- Transport, freight, lorry, fleet average [RER]: 0.108 tkm; lognormal SD95 2.05
  (4,na,na,na,na,na); standard distances
- Hard coal, burned in industrial furnace 1-10MW [RER]: 0.95 MJ; lognormal SD95 1.42
  (3,5,3,3,3,5); data from survey in literature (von Däniken et al. 1995)
- Chemical plant, organics [RER]: 4e-10 p; lognormal SD95 3.96
  (4,1,5,3,5,4); estimation
- Formaldehyde, production mix, at plant [RER]: 0.31 kg; lognormal SD95 1.32
  (3,5,1,2,1,5); data from survey in literature (Diem 2000)
- Heat, light fuel oil, at industrial furnace 1MW [RER]: 0.125 MJ; lognormal SD95 1.42
  (3,5,3,3,3,5); data from survey in literature (von Däniken et al. 1995)
- Electricity, medium voltage, production ENTSO-E, at grid: 0.013 kWh; lognormal SD95 1.42
  (3,5,3,3,3,5); data from survey in literature (von Däniken et al. 1995)
- Melamine, at plant [RER]: 0.77 kg; lognormal SD95 1.32
  (3,5,1,2,1,5); data from survey in literature (Diem 2000)
- Natural gas, burned in industrial furnace 1MWth [CH]: 1.42 MJ; lognormal SD95 1.42
  (3,5,3,3,3,5); data from survey in literature (von Däniken et al. 1995)

## Emissions to nature
- Heat, waste [emissions to air, high. pop.]: 0.0468 MJ; lognormal SD95 1.42
  (3,5,3,3,3,5); calculated from electricity input
- Formaldehyde [emissions to air, high. pop.]: 0.001 kg; lognormal SD95 5.19
  (3,5,3,3,3,5); data from survey in literature (von Däniken et al. 1995)

## Extrapolations
Transports based on standard distances of Ecoinvent. Infrastructure: proxy module used (chemical plant, organics)

## Sources
- Althaus H.-J., Chudacoff M., Hellweg S., Hischier R., Jungbluth N., Osses M., Primas A., 2007, 2007 - LCI chemicals - Althaus, Final report ecoinvent data v2.0, 8, Swiss Centre for LCI, Empa - TSL, ETH, ESU-services Ltd., Chudacoff Oekoscience, Duebendorf, CH
Althaus H.-J., Chudacoff M., Hischier R., Jungbluth N., Osses M., Primas A. (2007) Life Cycle Inventories of Chemicals. Final report ecoinvent data v2.0. Volume: 8. Swiss Centre for LCI, Empa - TSL. Dübendorf, CH.
Type: Measurement on site
Source: CD-ROM
First author: Althaus H.-J.
Other authors: Chudacoff M., Hischier R., Jungbluth N., Osses M., Primas A.
Year: 2007
Title of anthology: Final report ecoinvent data v2.0
Place of publication: Dübendorf, CH
Publisher: Swiss Centre for LCI, Empa - TSL
Volume No: 8

## Validation
Proof reading validation: Passed.; Other validation: none;
