# Electricity, at wind farm

Dataset: EcoSpold 1, unit process
Functional unit: 1 kWh
Category: electricity by fuel / wind
Geography: RER
Time period: 2024 to 2024
Synonyms: 0
Share of production covered: 100 %
Generated by: Hanna Kroehnert
accessRestrictedTo: 0
copyright: true

## Included processes
Electricity mix from wind power in Europe.
The mix consists of 87% from onshore wind farms and 13% from offshore wind farms, reflecting a total electrictiy generation of 420 TWh from onshore wind farms and 61.8 TWh from offshore wind farms in 2024 (source: ENTSO-E).

The considered contributions from different wind turbine sizes to the electrcity generation mix are:
50% from onshore wind turbines with nominal capacities < 3 MW (modelled using 2.3 MW onshore wind turbine)
22% from onshore wind turbines with nominal capacities >= 3 MW and < 4 MW (modelled using 3.4 MW onshore wind turbines)
10% from onshore wind turbines with nominal capacities >= 4 MW and < 5.5 MW (modelled with 4.5 MW onshore wind turbines)
5% from onshore wind turbines with nominal capacities >= 5.5 MW (modelled with 6.4 MW onshore wind turbines)
5% from offshore wind turbines with nominal capacities < 7 MW (modelled with 5 MW offshore wind turbines)
7% from offshore wind turbines with nominal capacities >= 7 MW and < 12 MW (modelled with 10 MW offshore wind turbines)
1% from offshore wind turbines with nominal capacities >= 12 MW (modelled with 15 MW offshore wind turbines)

## Reference product
- Electricity, at wind farm [RER]: 1 kWh

## Inputs from technosphere
All rows: lognormal SD95 1.05
- Electricity, at 100MW wind farm, onshore, 2.3MW turbines [RER]: 0.50072 kWh
  (1,1,1,1,4,5,BU:1.05); Own Calculation; contribution to the electricity mix from wind power generated by onshore wind turbines with nominal capacities < 3 MW
- Electricity, at 200MW wind farm, onshore, 3.4MW turbines [RER]: 0.22327 kWh
  (1,1,1,1,4,5,BU:1.05); Own Calculation; contribution to the electricity mix from wind power generated by onshore wind turbines with nominal capacities >= 3 MW and < 4 MW
- Electricity, at 100MW wind farm, onshore, 4.5 MW turbines [RER]: 0.099801 kWh
  (1,1,1,1,4,5,BU:1.05); Own calculation; contribution the electricity mix from wind power generated by onshore wind turbines with nominal capacities >= 4 MW and < 5.5 MW
- Electricity, at 100MW wind farm, onshore, 6.2MW turbines [RER]: 0.047938 kWh
  (1,1,1,1,4,5,BU:1.05); Own calculation; contribution to the electricity mix from wind power generated by onshore wind turbines with nominal capacities >= 5.5 MW
- Electricity, at 150MW wind farm, offshore, 5MW turbines [RER]: 0.045193 kWh
  (1,1,1,1,4,5,BU:1.05); Own Calculation; contribution to the electricity mix from wind power generated by offshore wind turbines with nominal capacities < 7 MW
- Electricity, at 740MW wind farm, offshore, 10MW turbines [RER]: 0.069473 kWh
  (1,1,1,1,4,5,BU:1.05); Own Calculation; contribution to the electricity mix from wind power generated by offshore wind turbines with nominal capacities >= 7 MW and < 12 MW
- Electricity, at 1005MW wind farm, offshore, 15MW turbines [RER]: 0.013604 kWh
  (1,1,1,1,4,5,BU:1.05); Own Calculation; contribution to the electricity mix from wind power generated by offshore wind turbines with nominal capacities >= 12 MW

## Sources
- Kroehnert H., Frehner A., Stucki M., 2025, 2025 - LCI wind Energy - Kroehnert, Project report, 0, ZHAW, Waedenswil, CH

## Validation
22.07.2025
"S:\pools\n\N-IUNR-FG-LCA\Projekte\Wind LCA\LCI-Update\Sachbilanz"
