# Foaming, expanding

Dataset: EcoSpold 1, unit process
Functional unit: 1 kg
Category: plastics / unspecified
Geography: RER
Time period: 2000-01 to 2000-12
Generated by: Roland Hischier
accessRestrictedTo: 0
copyright: true

## General comment
1 kg of this process equals 1 kg of expanded plastics (usually polystyrene).;

## Included processes
This process contains the auxillaries and energy demand for the mentioned convertion process of plastics. The converted amount of plastics is NOT included into the dataset.

## Geography
Information from one Swiss insulation material production site - used as European average data.

## Technology
production of insulation panels

## Time period
Time of publication

## Reference product
- Foaming, expanding [RER]: 1 kg
  Europe

## Inputs from technosphere
- Light fuel oil, burned in industrial furnace 1MW, non-modulating [CH]: 0.141 MJ; lognormal SD95 1.23
  (2,3,2,3,1,5); average values from one Swiss company
- Heavy fuel oil, burned in industrial furnace 1MW, non-modulating [CH]: 2.72 MJ; lognormal SD95 1.23
  (2,3,2,3,1,5); average values from one Swiss company
- Diesel, burned in building machine, average [CH]: 0.0475 MJ; lognormal SD95 1.23
  (2,3,2,3,1,5); average values from one Swiss company
- Electricity, medium voltage, production ENTSO-E, at grid: 0.788 kWh; lognormal SD95 1.23
  (2,3,2,3,1,5); average values from one Swiss company

## Inputs from nature
- Water, unspecified natural origin/m3 [resources, in water]: 0.000661 m3; lognormal SD95 1.23
  (2,3,2,3,1,5); average values from one Swiss company

## Emissions to nature
- Heat, waste [emissions to air, high. pop.]: 2.84 MJ; lognormal SD95 1.23
  (2,3,2,3,1,5); average values from one Swiss company
- Pentane [emissions to air, high. pop.]: 0.015 kg; lognormal SD95 2.06
  (2,3,2,3,1,5); average values from one Swiss company
- Water [emissions to water, unspecified]: 0.62795 kg; lognormal SD95 2.5196
  (5,5,5,5,5,BU:1.05); All uncertainty-values set to 5.0 by default. Balance of input water

## Sampling procedure
company data

## Sources
- Hischier R., 2007, 2007 - LCI packagings and graphical papers - Hischier, Final report ecoinvent data v2.0, 11, Swiss Centre for LCI, Empa - TSL, Duebendorf and St. Gallen, CH
Hischier R. (2007) Life Cycle Inventories of Packaging and Graphical Paper. Final report ecoinvent data v2.0. Volume: 11. Swiss Centre for LCI, Empa - TSL. Dübendorf, CH.
Type: Measurement on site
Source: CD-ROM
First author: Hischier R.
Year: 2007
Title of anthology: Final report ecoinvent data v2.0
Place of publication: Dübendorf, CH
Publisher: Swiss Centre for LCI, Empa - TSL
Volume No: 11

## Validation
Proof reading validation: passed; Other validation: none;
