# Wood chips, from industry, mixed, burned in furnace 5000kW

Dataset: EcoSpold 1, unit process
Functional unit: 1 MJ
Category: heat / wood\heating systems
Geography: CH
Time period: 2015-01 to 2020-12
Generated by: Gavin Roberts
accessRestrictedTo: 0
copyright: true

## General comment
Heat of combustion of wood chips based on lower heating value. 5000 operating yours per year. Air emission factors are calculated from the weighted average of measurements of automatic chip boilers > 500 kW.;

## Included processes
This module describes the combustion of wood chips. Included are the infrastructure, the wood requirements, the emissions to air, the transport of the fuel, the electricity needed for operation, and the disposal of the ashes.

## Technology
Boiler of average technology available on market

## Time period
Time of publications.

## Reference product
- Wood chips, from industry, mixed, burned in furnace 5000kW [CH]: 1 MJ
  SWITZERLAND

## Inputs from technosphere
- Disposal, wood ash mixture, pure, 0% water, to sanitary landfill [CH]: 0.00028 kg; lognormal SD95 1.3117
  (2,3,1,1,3,5,BU:1.05); ;
- Wood chips, softwood, wet, measured as dry mass, at sawmill [CH]: 0.023617 kg; lognormal SD95 1.3816
  (4,3,1,1,3,5,BU:1.05); ;
- Furnace, wood chips, mixed, 5000kW [CH]: 6.3704e-10 p; lognormal SD95 1.3117
  (2,3,1,1,3,5,BU:1.05); ;
- Disposal, wood ash mixture, pure, 0% water, to municipal incineration [CH]: 0.00028 kg; lognormal SD95 1.3117
  (2,3,1,1,3,5,BU:1.05); ;
- Transport, freight, lorry, fleet average [CH]: 0.0027597 tkm; lognormal SD95 2.1017
  (2,3,1,1,3,5,BU:2); ;
- Wood chips, hardwood, wet, measured as dry mass, at sawmill [CH]: 0.031576 kg; lognormal SD95 1.3816
  (4,3,1,1,3,5,BU:1.05); ;
- Electricity, low voltage, at grid [CH]: 0.0047222 kWh; lognormal SD95 1.3816
  (4,3,1,1,3,5,BU:1.05); ;

## Emissions to nature
- Benzene, ethyl- [emissions to air, high. pop.]: 3e-8 kg; lognormal SD95 3.3297
  (3,5,5,1,1,5,BU:3); ;
- Benzene, hexachloro- [emissions to air, high. pop.]: 2.5e-13 kg; lognormal SD95 3.0466
  (1,1,2,1,1,5,BU:3); ;
- Potassium [emissions to air, high. pop.]: 2.34e-5 kg; lognormal SD95 5.3781
  (3,5,5,1,1,5,BU:5); ;
- Chlorine [emissions to air, high. pop.]: 1.8e-7 kg; lognormal SD95 1.8887
  (3,5,5,1,1,5,BU:1.5); ;
- Manganese [emissions to air, high. pop.]: 1.7e-7 kg; lognormal SD95 5.3781
  (3,5,5,1,1,5,BU:5); ;
- Mercury [emissions to air, high. pop.]: 6e-10 kg; lognormal SD95 5.0531
  (1,1,2,1,1,5,BU:5); ;
- Formaldehyde [emissions to air, high. pop.]: 1.3e-7 kg; lognormal SD95 1.8887
  (3,5,5,1,1,5,BU:1.5); ;
- Copper [emissions to air, high. pop.]: 2.2e-8 kg; lognormal SD95 5.3781
  (3,5,5,1,1,5,BU:5); ;
- Heat, waste [emissions to air, high. pop.]: 1.08 MJ; lognormal SD95 1.6361
  (3,5,5,1,1,5,BU:1.05); ;
- Toluene [emissions to air, high. pop.]: 3e-7 kg; lognormal SD95 1.8887
  (3,5,5,1,1,5,BU:1.5); ;
- NMVOC, non-methane volatile organic compounds, unspecified origin [emissions to air, high. pop.]: 3.8202e-6 kg; lognormal SD95 1.5614
  (1,1,2,1,1,5,BU:1.5); ;
- Benzo(a)pyrene [emissions to air, high. pop.]: 1.2763e-9 kg; lognormal SD95 3.0466
  (1,1,2,1,1,5,BU:3); ;
- Phosphorus [emissions to air, high. pop.]: 3e-7 kg; lognormal SD95 1.8887
  (3,5,5,1,1,5,BU:1.5); ;
- Sulfur dioxide [emissions to air, high. pop.]: 1e-5 kg; lognormal SD95 1.2105
  (1,1,2,1,1,5,BU:1.05); ;
- Benzene [emissions to air, high. pop.]: 9.1e-7 kg; lognormal SD95 3.3297
  (3,5,5,1,1,5,BU:3); ;
- Methane, biogenic [emissions to air, high. pop.]: 3.0702e-6 kg; lognormal SD95 1.5614
  (1,1,2,1,1,5,BU:1.5); ;
- m-Xylene [emissions to air, high. pop.]: 1.2e-7 kg; lognormal SD95 1.8887
  (3,5,5,1,1,5,BU:1.5); ;
- Arsenic [emissions to air, high. pop.]: 1e-9 kg; lognormal SD95 5.3781
  (3,5,5,1,1,5,BU:5); ;
- Carbon monoxide, biogenic [emissions to air, high. pop.]: 0.00020289 kg; lognormal SD95 5.0531
  (1,1,2,1,1,5,BU:5); ;
- Hydrocarbons, aliphatic, alkanes, unspecified [emissions to air, high. pop.]: 9.1e-7 kg; lognormal SD95 1.8887
  (3,5,5,1,1,5,BU:1.5); ;
- Carbon dioxide, biogenic [emissions to air, high. pop.]: 0.092 kg; lognormal SD95 1.2105
  (1,1,2,1,1,5,BU:1.05); ;
- Chromium VI [emissions to air, high. pop.]: 4e-11 kg; lognormal SD95 5.3781
  (3,5,5,1,1,5,BU:5); ;
- Fluorine [emissions to air, high. pop.]: 5e-8 kg; lognormal SD95 1.8887
  (3,5,5,1,1,5,BU:1.5); ;
- Calcium [emissions to air, high. pop.]: 5.85e-6 kg; lognormal SD95 5.3781
  (3,5,5,1,1,5,BU:5); ;
- Hydrocarbons, aliphatic, unsaturated [emissions to air, high. pop.]: 3.1e-6 kg; lognormal SD95 1.8887
  (3,5,5,1,1,5,BU:1.5); ;
- Bromine [emissions to air, high. pop.]: 6e-8 kg; lognormal SD95 5.3781
  (3,5,5,1,1,5,BU:5); ;
- PAH, polycyclic aromatic hydrocarbons [emissions to air, high. pop.]: 1.11e-8 kg; lognormal SD95 3.3297
  (3,5,5,1,1,5,BU:3); ;
- Sodium [emissions to air, high. pop.]: 1.3e-6 kg; lognormal SD95 5.3781
  (3,5,5,1,1,5,BU:5); ;
- Lead [emissions to air, high. pop.]: 2.7e-8 kg; lognormal SD95 5.0531
  (1,1,2,1,1,5,BU:5); ;
- Cadmium [emissions to air, high. pop.]: 1.3e-8 kg; lognormal SD95 5.0531
  (1,1,2,1,1,5,BU:5); ;
- Particulates, > 2.5 um, and < 10um [emissions to air, high. pop.]: 2e-6 kg; lognormal SD95 2.049
  (1,1,2,1,1,5,BU:2); ;
- Chromium [emissions to air, high. pop.]: 3.96e-9 kg; lognormal SD95 5.3781
  (3,5,5,1,1,5,BU:5); ;
- Magnesium [emissions to air, high. pop.]: 3.6e-7 kg; lognormal SD95 5.3781
  (3,5,5,1,1,5,BU:5); ;
- Dioxin, 2,3,7,8 Tetrachlorodibenzo-p- [emissions to air, high. pop.]: 8.7e-14 kg; lognormal SD95 3.0466
  (1,1,2,1,1,5,BU:3); ;
- Zinc [emissions to air, high. pop.]: 3e-7 kg; lognormal SD95 5.3781
  (3,5,5,1,1,5,BU:5); ;
- Ammonia [emissions to air, high. pop.]: 2e-6 kg; lognormal SD95 1.2963
  (1,1,2,1,1,5,BU:1.2); ;
- Nickel [emissions to air, high. pop.]: 6e-9 kg; lognormal SD95 5.3781
  (3,5,5,1,1,5,BU:5); ;
- Phenol, pentachloro- [emissions to air, high. pop.]: 8.1e-12 kg; lognormal SD95 1.8887
  (3,5,5,1,1,5,BU:1.5); ;
- Nitrogen oxides [emissions to air, high. pop.]: 0.000135 kg; lognormal SD95 1.5614
  (1,1,2,1,1,5,BU:1.5); ;
- Particulates, < 2.5 um [emissions to air, high. pop.]: 4.7903e-5 kg; lognormal SD95 3.0466
  (1,1,2,1,1,5,BU:3); ;
- Acetaldehyde [emissions to air, high. pop.]: 6.1e-8 kg; lognormal SD95 1.8887
  (3,5,5,1,1,5,BU:1.5); ;
- Dinitrogen monoxide [emissions to air, high. pop.]: 2.3e-6 kg; lognormal SD95 1.8887
  (3,5,5,1,1,5,BU:1.5); ;

## Sampling procedure
literature

## Sources
- Kaegi T., Waldburger L., Kern C., Roberts G., Zschokke M., Conte F., Weber L., 2021, 2021 - LCI heating systems - Kaegi, Carbotech im Auftrag des BAFU, Carbotech AG, Zuerich, CH
Kägi Thomas, Livia Waldburger, Cyril Kern, Gavin Roberts, Mischa Zschokke, Flora Conte, Lea Weber (2020) LCI of heating systems. Carbotech im Auftrag des BAFU. Carbotech AG. Zürich. CH.
Type: Separate publication
Source: Report
First author: Kägi Thomas
Other authors: Livia Waldburger, Cyril Kern, Gavin Roberts, Mischa Zschokke, Flora Conte, Lea Weber
Year: 2020
Title of anthology: Carbotech im Auftrag des BAFU
Place of publication: Zürich. CH
Publisher: Carbotech AG

## Validation
Proof reading validation: 16.10.2020; Other validation: Z:\Schreibtisch\WinShare\BAFU Holzheizsysteme\A_Konvertieren\[EcoSpold_wood chips_burned in furnace_5000kW_v0.2_gr_lwa.xlsx]X-Process;
