# Anode plant

Dataset: EcoSpold 1, unit process, infrastructure
Functional unit: 1 p
Category: metals / non ferro\production\infrastructure
Geography: RER
Time period: 2000-01 to 2000-12
Generated by: Hans-Joerg Althaus
accessRestrictedTo: 0
copyright: true

## General comment
Medium sized plant. Output: 80'000 t/a, life time: 50 years. Assumption is based on data for casting plant.;

## Included processes
Production hall, machinery and administrative buildings (including disposal)

## Geography
Some Swiss datasets are used for European processes.

## Technology
Assumed technology

## Reference product
- Anode plant [RER]: 1 p
  Europe

## Inputs from technosphere
All rows: lognormal SD95 3.23
- Building, multi-storey [RER]: 10000 m3
  (5,n.A.,n.A.,n.A.,n.A.,n.A.);
- Industrial machine, heavy, unspecified, at plant [RER]: 1.23e6 kg
  (5,n.A.,n.A.,n.A.,n.A.,n.A.);
- Disposal, building, concrete, not reinforced, to final disposal [CH]: 1.23e6 kg
  (5,n.A.,n.A.,n.A.,n.A.,n.A.);
- Building, hall [CH]: 13400 m2
  (5,n.A.,n.A.,n.A.,n.A.,n.A.);
- Concrete, sole plate and foundation, at plant [CH]: 559 m3
  (5,n.A.,n.A.,n.A.,n.A.,n.A.);

## Inputs from nature
- Occupation, industrial area, built up [resources, land]: 1.2e7 m2a; lognormal SD95 1.77
  (5,n.A.,n.A.,n.A.,n.A.,n.A.);
- Transformation, to industrial area, vegetation [resources, land]: 60100 m2; lognormal SD95 2.23
  (5,n.A.,n.A.,n.A.,n.A.,n.A.);
- Transformation, from unknown [resources, land]: 300000 m2; lognormal SD95 2.23
  (5,n.A.,n.A.,n.A.,n.A.,n.A.);
- Occupation, industrial area, vegetation [resources, land]: 3e6 m2a; lognormal SD95 1.77
  (5,n.A.,n.A.,n.A.,n.A.,n.A.);
- Transformation, to industrial area, built up [resources, land]: 240000 m2; lognormal SD95 2.23
  (5,n.A.,n.A.,n.A.,n.A.,n.A.);

## Sampling procedure
Internet search

## Extrapolations
see Geography

## Uncertainty adjustments
Uncertainty is adjusted for geographical mismatch (using the pedigree matrix).

## Sources
- Classen M., Althaus H.-J., Blaser S., Scharnhorst W., Tuchschmid M., Jungbluth N., Faist Emmenegger M., 2009, 2009 - LCI metals - Classen, Final report ecoinvent data v2.1, 10, Swiss Centre for LCI, Empa, ESU-services Ltd., Duebendorf, CH
Classen M., Althaus H.-J., Blaser S., Doka G., Jungbluth N., Tuchschmid M. (2008) Life Cycle Inventories of Metals. Final report ecoinvent data v2.1. Volume: 10. Issue: 0. Swiss Centre for LCI, Empa - TSL. Dübendorf, CH.
Type: Measurement on site
Source: CD-ROM
First author: Classen M.
Other authors: Althaus H.-J., Blaser S., Doka G., Jungbluth N., Tuchschmid M.
Year: 2008
Title of anthology: Final report ecoinvent data v2.1
Place of publication: Dübendorf, CH
Publisher: Swiss Centre for LCI, Empa - TSL
Volume No: 10
Issue No: 0

## Validation
Proof reading validation: Passed.; Other validation: none;
