# xx Wind power plant 2MW, offshore, moving parts

Dataset: EcoSpold 1, unit process, infrastructure
Functional unit: 1 p
Category: electricity by fuel / wind\infrastructure
Geography: OCE
Time period: 2000-01 to 2000-12
Generated by: Christian Bauer
accessRestrictedTo: 0
copyright: true

## General comment
Lifetime is assumed to be 20 years. Annual electricity production is assumed to be 5.6 GWh. Data are from a plant of the type "Bonus 2 MW", installed at the wind park Middelgrunden on the coast of Denmark.;

## Included processes
Includes materials used for moving parts: rotor, nacelle, electric parts, transformer, and their disposal. Also includes the prozessing, the energy requirements for assembling, the transports needed, and the connection to the grid.

## Technology
Average European technology for a 2 MW offshore wind power plant.

## Reference product
- xx Wind power plant 2MW, offshore, moving parts [OCE]: 1 p
  Oceanic

## Inputs from technosphere
- Disposal, polyvinylchloride, 0.2% water, to municipal incineration [CH]: 6 kg; lognormal SD95 3.1
  own estimation
- Sheet rolling, chromium steel [RER]: 51600 kg; lognormal SD95 1.3
  own estimation
- Copper, at regional storage [RER]: 1590 kg; lognormal SD95 1.5
  own estimation
- Polyvinylchloride, bulk polymerised, at plant [RER]: 6 kg; lognormal SD95 3.1
  own estimation
- Lubricating oil, at plant [RER]: 1150 kg; lognormal SD95 1.5
  own estimation
- Transport, freight, lorry, fleet average [RER]: 28200 tkm; lognormal SD95 2.1
  standard for transprts
- Lead, at regional storage [RER]: 0.5 kg; lognormal SD95 1.15
  standard for metals
- Transport, freight, rail [RER]: 28200 tkm; lognormal SD95 2.1
  standard for transprts
- Sheet rolling, aluminium [RER]: 845 kg; lognormal SD95 1.2
  own estimation
- Steel, low-alloyed, at plant [RER]: 15900 kg; lognormal SD95 1.15
  own estimation
- Cast iron, at plant [RER]: 26400 kg; lognormal SD95 1.3
  own estimation
- Wire drawing, copper [RER]: 1590 kg; lognormal SD95 3.1
  own estimation
- Section bar rolling, steel [RER]: 42200 kg; lognormal SD95 1.3
  own estimation
- Aluminium, primary, at plant [RER]: 845 kg; lognormal SD95 1.2
  own estimation
- Polyethylene, HDPE, granulate, at plant [RER]: 27 kg; lognormal SD95 3.1
  own estimation
- Synthetic rubber, at plant [RER]: 100 kg; lognormal SD95 1.6
  own estimation
- Transport, barge [RER]: 970 tkm; lognormal SD95 2.1
  standard for transprts
- Disposal, glass, 0% water, to municipal incineration [CH]: 26700 kg; lognormal SD95 1.3
  uncertainty of input plus composition of glass fibre reinforced plastic
- Chromium steel 18/8, at plant [RER]: 51600 kg; lognormal SD95 1.3
  own estimation
- Disposal, polyethylene, 0.4% water, to municipal incineration [CH]: 27 kg; lognormal SD95 3.1
  own estimation
- Tin, at regional storage [RER]: 0.5 kg; lognormal SD95 1.15
  standard for metals
- Electricity, medium voltage, production ENTSO-E, at grid: 67500 kWh; lognormal SD95 2
  own estimation
- Glass fibre reinforced plastic, polyamide, injection moulding, at plant [RER]: 41000 kg; lognormal SD95 1.2
  own estimation
- Disposal, used mineral oil, 10% water, to hazardous waste incineration [CH]: 1150 kg; lognormal SD95 1.5
  own estimation
- Disposal, plastics, mixture, 15.3% water, to municipal incineration [CH]: 14500 kg; lognormal SD95 1.3
  uncertainty of input plus composition of glass fibre reinforced plastic

## Sampling procedure
Literature

## Sources
- Burger B., Bauer C., 2007, 2007 - Windpower - Buger, Sachbilanzen von Energiesystemen. Final report No. 6 ecoinvent data v2.0, 6, Swiss Centre for LCI, PSI, Duebendorf and Villigen, CH
Burger, B., Bauer, Ch. (2007) Windkraft. Sachbilanzen von Energiesystemen. Final report No. 6 ecoinvent data v2.0. Editors: Dones R.. Volume: 6. Swiss Centre for LCI, PSI. Dübendorf and Villigen, CH.
Type: Measurement on site
Source: CD-ROM
First author: Burger, B.
Other authors: Bauer, Ch.
Year: 2007
Name of editors: Dones R.
Title of anthology: Sachbilanzen von Energiesystemen. Final report No. 6 ecoinvent data v2.0
Place of publication: Dübendorf and Villigen, CH
Publisher: Swiss Centre for LCI, PSI
Volume No: 6

## Validation
Proof reading validation: Passed.; Other validation: none;
