# Transport, passenger bus, battery electric - battery-equipped trolleybus, fleet average

Dataset: EcoSpold 1, unit process
Functional unit: 1 personkm
Category: transport systems / road\Transformation
Geography: CH
Time period: 2020-01 to 2020-12
Generated by: Brian Cox
accessRestrictedTo: 0
copyright: False

## General comment
Average of other Mobitool datasets created with the purpose of replacing older datasets in the database. Basis for fleet shares: Switzerland year 2020. Source: HBEFA 5.1, INFRAS.

## Time period
Technology and fleet shares valid for year 2020

## Reference product
- Transport, passenger bus, battery electric - battery-equipped trolleybus, fleet average [CH]: 1 personkm

## Inputs from technosphere
- Transport, passenger bus, battery electric - battery-equipped trolleybus, LTO battery, 13m single deck urban bus, 2020 [CH]: 0.05 personkm; lognormal SD95 1.0587
  Uncertainty from pedigree matrix: (2,1,2,1,1,1); Trolleybuses in Switzerland almost exclusively 18m and longer
- Transport, passenger bus, battery electric - battery-equipped trolleybus, LTO battery, 18m articulated urban bus, 2020 [CH]: 0.95 personkm; lognormal SD95 1.0587
  (same comment as for Transport, passenger bus, battery electric - battery-equipped trolleyb)

## Sources
- Cox B., 2025, 2025 - Mobitool integration project - Cox, INFRAS, Bern, CH

## Validation
Data from HBEFA 5.1 for the year 2020. Some technologies with very small shares in the fleet removed for simplicity. Technology shares normalised to ensure sum of 100%
