# Disposal, ash horse dung and wood chips, to sanitary landfill

Dataset: EcoSpold 1, unit process
Functional unit: 1 kg
Category: landfill / sanitary landfill
Geography: CH
Time period: 2005-01 to 2005-12
Generated by: Gabor Doka
accessRestrictedTo: 0
copyright: true

## General comment
Inventoried waste contains . waste composition (wet, in ppm): H2O n.a.; O 490900; H n.a.; C 12000; S 9200; N n.a.; P 3920; B n.a.; Cl 204; Br n.a.; F n.a.; I n.a.; Ag n.a.; As 6.7; Ba n.a.; Cd 5; Co 1.8; Cr 19.5; Cu 103; Hg 0.01; Mn 20000; Mo 3.7; Ni 5.52; Pb 16; Sb n.a.; Se n.a.; Sn n.a.; V 39.5; Zn 1020; Be n.a.; Sc n.a.; Sr n.a.; Ti 1380; Tl n.a.; W n.a.; Si 82600; Fe 22800; Ca 284000; Al 20800; K 18860; Mg 32100; Na n.a.; Share of carbon in waste that is biogenic 100%. Overall degradability of waste during 100 years: 5%.;;

## Included processes
Waste-specific short-term emissions to air via landfill gas incineration and landfill leachate. Burdens from treatment of short-term leachate (0-100a) in wastewater treatment plant (including WWTP sludge disposal in municipal incinerator). Long-term emissions from landfill to groundwater (after base lining failure).

## Geography
Technology encountered in Switzerland in 2000. Landfill includes base seal, leachate collection system, treatment of leachate in municipal wastewater treatment plant.

## Technology
Swiss municipal sanitary landfill for biogenic or untreated municipal waste ("reactive organic landfill"). Landfill gas and leachate collection system. Recultivation and monitoring for 150 years after closure.

## Reference product
- Disposal, ash horse dung and wood chips, to sanitary landfill [CH]: 1 kg
  SWITZERLAND

## Inputs from technosphere
- Process-specific burdens, municipal waste incineration [CH]: 0.0032712 kg; lognormal SD95 2.2812
  burden from incineration of sludge from wastewater treatment of the short-term leachate (0-100a).
- Transport, freight, lorry, 16t-32t gross weight, fleet average [CH]: 0.0001435 tkm; lognormal SD95 2.2812
  burden from incineration of sludge from wastewater treatment of the short-term leachate (0-100a). uncertainty is calculated from uncertainties in waste composition and transfer coefficients in incinerator and uncertainty of waste decomposition and short-term leaching in sanitary landfill
- Electricity, low voltage, at grid [CH]: 0.0005954 kWh; lognormal SD95 2.2353
  burden from wastewater treatment of the short-term leachate (0-100a). Uncertainty calculated from unertainty of the waste composition of this waste, uncertainty in waste decomposition and short-term leaching in sanitary landfill
- Chemicals organic, at plant [GLO]: 6.733e-8 kg; lognormal SD95 14.22
  (same comment as for Transport, freight, lorry, 16t-32t gross weight, fleet average)
- Chemicals inorganic, at plant [GLO]: 2.0104e-8 kg; lognormal SD95 3.552
  (same comment as for Transport, freight, lorry, 16t-32t gross weight, fleet average)
- Quicklime, milled, packed, at plant [CH]: 3.1609e-9 kg; lognormal SD95 7.8059
  (same comment as for Transport, freight, lorry, 16t-32t gross weight, fleet average)
- Iron (III) chloride, 40% in H2O, at plant [CH]: 7.4508e-5 kg; lognormal SD95 7.1906
  (same comment as for Transport, freight, lorry, 16t-32t gross weight, fleet average)
- Natural gas, burned in boiler modulating >100kW [RER]: 0.0015942 MJ; lognormal SD95 2.4084
  (same comment as for Electricity, low voltage, at grid)
- Residual material landfill facility [CH]: 4.3339e-13 p; lognormal SD95 2.3447
  (same comment as for Transport, freight, lorry, 16t-32t gross weight, fleet average)
- Disposal, cement, hydrated, 0% water, to residual material landfill [CH]: 0.00020803 kg; lognormal SD95 2.3649
  (same comment as for Transport, freight, lorry, 16t-32t gross weight, fleet average)
- Sewer grid, class 3 [CH]: 5.4455e-10 km; lognormal SD95 1.1025
  (same comment as for Electricity, low voltage, at grid)
- Heat from waste, at municipal waste incineration plant [CH]: 0.0027435 MJ; lognormal SD95 2.2825
  (same comment as for Transport, freight, lorry, 16t-32t gross weight, fleet average)
- Hydrochloric acid, 30% in H2O, at plant [RER]: 1.2062e-8 kg; lognormal SD95 3.552
  (same comment as for Transport, freight, lorry, 16t-32t gross weight, fleet average)
- Process-specific burdens, slag compartment [CH]: 0.0015246 kg; lognormal SD95 2.315
  (same comment as for Transport, freight, lorry, 16t-32t gross weight, fleet average)
- Transport, freight, rail [RER]: 9.6069e-5 tkm; lognormal SD95 6.4048
  (same comment as for Transport, freight, lorry, 16t-32t gross weight, fleet average)
- Process-specific burdens, sanitary landfill [CH]: 0.99998 kg; lognormal SD95 1
  demands per kilogram waste. uncertainty is heeded in the module
- Light fuel oil, burned in boiler 100kW, non-modulating [CH]: 0.0011814 MJ; lognormal SD95 2.4084
  (same comment as for Electricity, low voltage, at grid)
- Aluminium sulphate, powder, at plant [RER]: 1.4045e-5 kg; lognormal SD95 7.5394
  (same comment as for Electricity, low voltage, at grid)
- Sanitary landfill facility [CH]: 5.5555e-10 p; lognormal SD95 1
  demands per kilogram waste. uncertainty is heeded in the module
- Wastewater treatment plant, class 3 [CH]: 1.422e-11 p; lognormal SD95 1.1025
  (same comment as for Electricity, low voltage, at grid)
- Sodium hydroxide, 50% in H2O, production mix, at plant [RER]: 1.7434e-8 kg; lognormal SD95 7.7804
  (same comment as for Transport, freight, lorry, 16t-32t gross weight, fleet average)
- Process-specific burdens, residual material landfill [CH]: 0.00020803 kg; lognormal SD95 2.3447
  (same comment as for Transport, freight, lorry, 16t-32t gross weight, fleet average)
- Cement, unspecified, at plant [CH]: 8.3211e-5 kg; lognormal SD95 2.3649
  (same comment as for Transport, freight, lorry, 16t-32t gross weight, fleet average)
- Municipal waste incineration plant [CH]: 8.1781e-13 p; lognormal SD95 2.2812
  (same comment as for Process-specific burdens, municipal waste incineration)
- Slag compartment [CH]: 2.7103e-12 p; lognormal SD95 2.315
  (same comment as for Transport, freight, lorry, 16t-32t gross weight, fleet average)
- Iron sulphate, at plant [RER]: 5.1967e-5 kg; lognormal SD95 7.5394
  (same comment as for Electricity, low voltage, at grid)
- Disposal, paper, 11.2% water, to municipal incineration [CH]: 3.875e-5 kg; lognormal SD95 1.1261
  (same comment as for Electricity, low voltage, at grid)
- Disposal, plastics, mixture, 15.3% water, to municipal incineration [CH]: 3.875e-5 kg; lognormal SD95 1.1261
  (same comment as for Electricity, low voltage, at grid)
- Electricity from waste, at municipal waste incineration plant [CH]: 0.0004703 kWh; lognormal SD95 3.3732
  (same comment as for Transport, freight, lorry, 16t-32t gross weight, fleet average)

## Emissions to nature
- Calcium [emissions to air, high. pop.]: 3.0237e-7 kg; lognormal SD95 4.0673
  Emissions from short-term leachate treatment and incineration of resulting sludge. Uncertainty calculated depending on waste input and uncertainty of transfer coefficents in landfill, wastewater treatment and incineration model.
- Potassium [emissions to water, groundwater, long-term]: 0.01817 kg; lognormal SD95 2.954
  Emissions from long-term leachate (>100a) directly from MSW landfill and indirectly via incineration of treatement sludge from leachate treatement. Uncertainty calculated depending on waste input and uncertainty of long-term transfer coefficents in landfill.
- Molybdenum [emissions to water, groundwater, long-term]: 1.4622e-6 kg; lognormal SD95 12.615
  (same comment as for Potassium)
- Cadmium [emissions to water, river]: 2.2335e-8 kg; lognormal SD95 13.984
  (same comment as for Calcium)
- Aluminium [emissions to air, high. pop.]: 7.9807e-8 kg; lognormal SD95 6.0047
  (same comment as for Calcium)
- Carbon dioxide, biogenic [emissions to air, low. pop.]: 0.0015023 kg; lognormal SD95 4.3377
  burden from direct release or incineration of landfill biogas. Uncertainty calculated from unertainty of the waste composition of this waste, uncertainty in waste decomposition and short-term leaching in sanitary landfill
- Aluminium [emissions to water, groundwater, long-term]: 0.020786 kg; lognormal SD95 2.8863
  (same comment as for Potassium)
- DOC, Dissolved Organic Carbon [emissions to water, groundwater, long-term]: 0.0029224 kg; lognormal SD95 6.1839
  (same comment as for Potassium)
- Molybdenum [emissions to air, high. pop.]: 1.9216e-11 kg; lognormal SD95 15.487
  (same comment as for Calcium)
- Lead [emissions to air, low. pop.]: 1.5712e-12 kg; lognormal SD95 33.089
  (same comment as for Carbon dioxide, biogenic)
- Silicon [emissions to air, high. pop.]: 4.518e-7 kg; lognormal SD95 5.397
  (same comment as for Calcium)
- Iron [emissions to air, high. pop.]: 1.7123e-9 kg; lognormal SD95 6.5374
  (same comment as for Calcium)
- Magnesium [emissions to water, groundwater, long-term]: 0.031199 kg; lognormal SD95 2.625
  (same comment as for Potassium)
- Phosphorus [emissions to air, high. pop.]: 6.9544e-9 kg; lognormal SD95 7.6814
  (same comment as for Calcium)
- Magnesium [emissions to air, high. pop.]: 1.3379e-7 kg; lognormal SD95 4.1384
  (same comment as for Calcium)
- TOC, Total Organic Carbon [emissions to water, river]: 2.7882e-6 kg; lognormal SD95 7.0496
  (same comment as for Calcium)
- Particulates, < 2.5 um [emissions to air, low. pop.]: 2.8588e-8 kg; lognormal SD95 6.249
  (same comment as for Carbon dioxide, biogenic)
- Chromium [emissions to air, high. pop.]: 4.0471e-16 kg; lognormal SD95 17.147
  (same comment as for Calcium)
- NMVOC, non-methane volatile organic compounds, unspecified origin [emissions to air, high. pop.]: 4.4619e-10 kg; lognormal SD95 8.308
  (same comment as for Calcium)
- Chromium [emissions to air, low. pop.]: 2.7784e-12 kg; lognormal SD95 31.727
  (same comment as for Carbon dioxide, biogenic)
- Potassium [emissions to air, low. pop.]: 1.7236e-7 kg; lognormal SD95 12.206
  (same comment as for Carbon dioxide, biogenic)
- Arsenic [emissions to water, groundwater, long-term]: 6.6461e-6 kg; lognormal SD95 9.9426
  (same comment as for Potassium)
- Heat, waste [emissions to water, river]: 0.00031949 MJ; lognormal SD95 7.0418
  (same comment as for Transport, freight, lorry, 16t-32t gross weight, fleet average)
- Magnesium [emissions to water, river]: 0.00089359 kg; lognormal SD95 3.943
  (same comment as for Calcium)
- Cadmium [emissions to air, high. pop.]: 1.2028e-12 kg; lognormal SD95 14.596
  (same comment as for Calcium)
- Cobalt [emissions to water, groundwater, long-term]: 1.7835e-6 kg; lognormal SD95 11.397
  (same comment as for Potassium)
- Iron [emissions to air, low. pop.]: 3.9146e-9 kg; lognormal SD95 17.607
  (same comment as for Carbon dioxide, biogenic)
- Nickel [emissions to water, groundwater, long-term]: 5.5099e-6 kg; lognormal SD95 10.163
  (same comment as for Potassium)
- Copper [emissions to air, low. pop.]: 7.2054e-12 kg; lognormal SD95 29.369
  (same comment as for Carbon dioxide, biogenic)
- Hydrogen chloride [emissions to air, low. pop.]: 3.7024e-7 kg; lognormal SD95 11.086
  (same comment as for Carbon dioxide, biogenic)
- COD, Chemical Oxygen Demand [emissions to water, river]: 1.1019e-5 kg; lognormal SD95 7.0462
  (same comment as for Calcium)
- Carbon monoxide, biogenic [emissions to air, high. pop.]: 7.5905e-7 kg; lognormal SD95 3.8518
  (same comment as for Calcium)
- Nickel [emissions to air, high. pop.]: 2.7258e-16 kg; lognormal SD95 16.68
  (same comment as for Calcium)
- BOD5, Biological Oxygen Demand [emissions to water, river]: 3.4683e-6 kg; lognormal SD95 7.0663
  (same comment as for Calcium)
- Sulfate [emissions to water, groundwater, long-term]: 0.025145 kg; lognormal SD95 3.417
  (same comment as for Potassium)
- Manganese [emissions to water, groundwater, long-term]: 0.018925 kg; lognormal SD95 2.8426
  (same comment as for Potassium)
- Titanium [emissions to air, high. pop.]: 1.6987e-9 kg; lognormal SD95 8.8574
  (same comment as for Calcium)
- Zinc [emissions to air, low. pop.]: 5.3689e-10 kg; lognormal SD95 20.728
  (same comment as for Carbon dioxide, biogenic)
- Aluminium [emissions to air, low. pop.]: 1.2997e-8 kg; lognormal SD95 15.778
  (same comment as for Carbon dioxide, biogenic)
- Zinc [emissions to water, groundwater, long-term]: 0.00084059 kg; lognormal SD95 5.1021
  (same comment as for Potassium)
- Chloride [emissions to water, groundwater, long-term]: 0.00017795 kg; lognormal SD95 6.4475
  (same comment as for Potassium)
- BOD5, Biological Oxygen Demand [emissions to water, groundwater, long-term]: 0.00075671 kg; lognormal SD95 6.1837
  (same comment as for Potassium)
- COD, Chemical Oxygen Demand [emissions to water, groundwater, long-term]: 0.0031964 kg; lognormal SD95 6.1837
  (same comment as for Potassium)
- Zinc [emissions to air, high. pop.]: 2.7269e-11 kg; lognormal SD95 9.4697
  (same comment as for Calcium)
- Cadmium [emissions to air, low. pop.]: 2.9327e-10 kg; lognormal SD95 21.955
  (same comment as for Carbon dioxide, biogenic)
- Zinc [emissions to water, river]: 7.471e-7 kg; lognormal SD95 8.9327
  (same comment as for Calcium)
- Manganese [emissions to water, river]: 0.00058127 kg; lognormal SD95 3.8797
  (same comment as for Calcium)
- Iron [emissions to water, river]: 7.9641e-6 kg; lognormal SD95 7.1919
  (same comment as for Calcium)
- Mercury [emissions to water, groundwater, long-term]: 9.9533e-9 kg; lognormal SD95 15.99
  (same comment as for Potassium)
- Sulfur dioxide [emissions to air, low. pop.]: 6.0031e-5 kg; lognormal SD95 6.5222
  (same comment as for Carbon dioxide, biogenic)
- Heat, waste [emissions to air, high. pop.]: 0.0022564 MJ; lognormal SD95 2.1886
  (same comment as for Transport, freight, lorry, 16t-32t gross weight, fleet average)
- Titanium [emissions to water, river]: 1.7504e-6 kg; lognormal SD95 8.5649
  (same comment as for Calcium)
- Mercury [emissions to air, low. pop.]: 1.37e-11 kg; lognormal SD95 24.136
  (same comment as for Carbon dioxide, biogenic)
- Mercury [emissions to water, river]: 1.084e-11 kg; lognormal SD95 22.434
  (same comment as for Calcium)
- Copper [emissions to water, groundwater, long-term]: 0.00010299 kg; lognormal SD95 7.0806
  (same comment as for Potassium)
- Calcium [emissions to air, low. pop.]: 4.6224e-7 kg; lognormal SD95 11.956
  (same comment as for Carbon dioxide, biogenic)
- Cobalt [emissions to air, low. pop.]: 7.232e-12 kg; lognormal SD95 29.656
  (same comment as for Carbon dioxide, biogenic)
- Cobalt [emissions to air, high. pop.]: 4.5234e-16 kg; lognormal SD95 16.034
  (same comment as for Calcium)
- Manganese [emissions to air, high. pop.]: 3.0713e-12 kg; lognormal SD95 4.7127
  (same comment as for Calcium)
- Carbon monoxide, biogenic [emissions to air, low. pop.]: 8.5157e-8 kg; lognormal SD95 8.8232
  (same comment as for Carbon dioxide, biogenic)
- Methane, biogenic [emissions to air, high. pop.]: 1.1904e-7 kg; lognormal SD95 6.0918
  (same comment as for Calcium)
- Hydrogen sulfide [emissions to water, groundwater, long-term]: 0.00065547 kg; lognormal SD95 3.417
  (same comment as for Potassium)
- Silicon [emissions to water, groundwater, long-term]: 0.0015937 kg; lognormal SD95 55.021
  (same comment as for Potassium)
- Calcium [emissions to water, river]: 0.0016683 kg; lognormal SD95 3.8729
  (same comment as for Calcium)
- Vanadium [emissions to water, groundwater, long-term]: 1.1461e-5 kg; lognormal SD95 11.253
  (same comment as for Potassium)
- Nickel [emissions to air, low. pop.]: 4.0115e-12 kg; lognormal SD95 30.987
  (same comment as for Carbon dioxide, biogenic)
- Manganese [emissions to air, low. pop.]: 2.8632e-7 kg; lognormal SD95 11.574
  (same comment as for Carbon dioxide, biogenic)
- TOC, Total Organic Carbon [emissions to water, groundwater, long-term]: 0.0029224 kg; lognormal SD95 6.1839
  (same comment as for Potassium)
- Copper [emissions to air, high. pop.]: 1.3788e-13 kg; lognormal SD95 15.398
  (same comment as for Calcium)
- Mercury [emissions to air, high. pop.]: 5.7986e-17 kg; lognormal SD95 23.227
  (same comment as for Calcium)
- Copper [emissions to water, river]: 6.5419e-9 kg; lognormal SD95 14.603
  (same comment as for Calcium)
- DOC, Dissolved Organic Carbon [emissions to water, river]: 2.6764e-6 kg; lognormal SD95 7.0614
  (same comment as for Calcium)
- Silicon [emissions to air, low. pop.]: 5.1612e-8 kg; lognormal SD95 14.192
  (same comment as for Carbon dioxide, biogenic)
- Titanium [emissions to air, low. pop.]: 8.6228e-10 kg; lognormal SD95 19.901
  (same comment as for Carbon dioxide, biogenic)
- Chloride [emissions to water, river]: 7.2272e-5 kg; lognormal SD95 5.1266
  Emissions from short-term leachate treatment. Uncertainty calculated depending on waste input and uncertainty of transfer coefficents in landfill and wastewater treatment.
- Lead [emissions to water, groundwater, long-term]: 1.5996e-5 kg; lognormal SD95 8.9862
  (same comment as for Potassium)
- Phosphate [emissions to water, groundwater, long-term]: 8.1839e-5 kg; lognormal SD95 178.43
  (same comment as for Potassium)
- Vanadium [emissions to air, high. pop.]: 1.0257e-11 kg; lognormal SD95 12.352
  (same comment as for Calcium)
- Phosphate [emissions to water, river]: 1.1823e-5 kg; lognormal SD95 7.4241
  (same comment as for Calcium)
- Vanadium [emissions to water, river]: 1.0577e-7 kg; lognormal SD95 11.866
  (same comment as for Calcium)
- Arsenic [emissions to water, river]: 5.3023e-8 kg; lognormal SD95 13.55
  (same comment as for Calcium)
- Potassium [emissions to water, river]: 0.00068945 kg; lognormal SD95 4.1804
  (same comment as for Chloride)
- Silicon [emissions to water, river]: 1.2423e-5 kg; lognormal SD95 5.3223
  (same comment as for Calcium)
- Chromium VI [emissions to water, groundwater, long-term]: 8.8858e-8 kg; lognormal SD95 336.3
  (same comment as for Potassium)
- Arsenic [emissions to air, low. pop.]: 8.4351e-10 kg; lognormal SD95 20.03
  (same comment as for Carbon dioxide, biogenic)
- Calcium [emissions to water, groundwater, long-term]: 0.28231 kg; lognormal SD95 1.5071
  (same comment as for Potassium)
- Cadmium [emissions to water, groundwater, long-term]: 4.9559e-6 kg; lognormal SD95 10.29
  (same comment as for Potassium)
- Iron [emissions to water, groundwater, long-term]: 0.0016199 kg; lognormal SD95 17.112
  (same comment as for Potassium)
- Chromium VI [emissions to water, river]: 5.8185e-9 kg; lognormal SD95 15.822
  (same comment as for Calcium)
- Sulfate [emissions to water, river]: 0.00056799 kg; lognormal SD95 4.636
  (same comment as for Chloride)
- Lead [emissions to air, high. pop.]: 1.5589e-13 kg; lognormal SD95 17.883
  (same comment as for Calcium)
- Vanadium [emissions to air, low. pop.]: 5.2068e-11 kg; lognormal SD95 25.307
  (same comment as for Carbon dioxide, biogenic)
- Titanium [emissions to water, groundwater, long-term]: 0.0013771 kg; lognormal SD95 4.8003
  (same comment as for Potassium)
- Molybdenum [emissions to air, low. pop.]: 4.8773e-12 kg; lognormal SD95 30.552
  (same comment as for Carbon dioxide, biogenic)
- Carbon dioxide, biogenic [emissions to air, high. pop.]: 5.0159e-5 kg; lognormal SD95 7.0511
  (same comment as for Calcium)
- Lead [emissions to water, river]: 5.1815e-10 kg; lognormal SD95 17.201
  (same comment as for Calcium)
- Cobalt [emissions to water, river]: 1.4683e-8 kg; lognormal SD95 14.662
  (same comment as for Calcium)
- Molybdenum [emissions to water, river]: 1.1542e-8 kg; lognormal SD95 15.107
  (same comment as for Calcium)
- Methane, biogenic [emissions to air, low. pop.]: 0.00023033 kg; lognormal SD95 4.5794
  (same comment as for Carbon dioxide, biogenic)
- Chromium [emissions to water, river]: 1.7444e-11 kg; lognormal SD95 16.195
  (same comment as for Calcium)
- Magnesium [emissions to air, low. pop.]: 2.476e-7 kg; lognormal SD95 11.85
  (same comment as for Carbon dioxide, biogenic)
- Nickel [emissions to water, river]: 9.7342e-9 kg; lognormal SD95 15.328
  (same comment as for Calcium)
- Arsenic [emissions to air, high. pop.]: 1.6939e-11 kg; lognormal SD95 13.994
  (same comment as for Calcium)
- Heat, waste [emissions to air, low. pop.]: 0.0081699 MJ; lognormal SD95 5.18
  (same comment as for Carbon dioxide, biogenic)
- Aluminium [emissions to water, river]: 3.1222e-6 kg; lognormal SD95 6.1478
  (same comment as for Calcium)
- NMVOC, non-methane volatile organic compounds, unspecified origin [emissions to air, low. pop.]: 1.6111e-9 kg; lognormal SD95 4.5794
  (same comment as for Carbon dioxide, biogenic)

## Sampling procedure
Landfill model based on observed leachate concentrations in literature. Extrapolated to 60'000 years heeding chemical characteristics. Initial waste composition from various literature sources.

## Uncertainty adjustments
uncertainty of waste input composition data derived from generic formula GSD(c) = N*ln(c)+1. Mean long-term emissions are the emissions until the next glacial period occurs (in 60'000a) and the landfill is eroded. Maximal long-term emissions are the complete emissions of all landfilled material (except Cr). Minimal long-term emissions are derived implicitly from the mean and maximal values assuming a lognormal distribution.

## Sources
- Itten R., Stucki M., Jungbluth N., 2011, 2011 - LCA burning diff. solid biomass substrates - Itten, Project report, 321, ESU-services Ltd., Uster, CH
Itten R.,, Jungbluth N. (2011) Life Cycle Assessment of Burning Different Biomass Substrates. Project report. Volume: 321. ESU-services Ltd.. Uster, CH.
Type: Separate publication
Source: Report
First author: Itten R.,
Other authors: Jungbluth N.
Year: 2011
Title of anthology: Project report
Place of publication: Uster, CH
Publisher: ESU-services Ltd.
Volume No: 321
