# Sawnwood, lath, softwood, dried (u=20%), planed, at sawmill

Dataset: EcoSpold 1, unit process
Functional unit: 1 m3
Category: wood / wooden materials\new processes\other material
Geography: RER
Time period: 2000-01 to 2016-12
Generated by: Frank Werner
accessRestrictedTo: 0
copyright: true

## Reference product
- Sawnwood, lath, softwood, dried (u=20%), planed, at sawmill [RER]: 1 m3

## Inputs from technosphere
- Electricity, medium voltage, production ENTSO-E, at grid: 21.4 kWh; lognormal SD95 1.56535
  Pedigree: (2,1,2,1,1).
- Sawnwood, lath, softwood, raw, kiln dried (u=20%), at sawmill [RER]: 0.882 m3; lognormal SD95 1.08192
  Pedigree: (1,1,2,1,1).
- Planing mill [RER]: 6.8e-7 p; lognormal SD95 1.92775
  Pedigree: (2,1,2,1,1).
- Sawnwood, lath, softwood, raw, air dried (u=20%), at sawmill [RER]: 0.221 m3; lognormal SD95 1.08192
  Pedigree: (1,1,2,1,1).

## Inputs from nature
- Energy, gross calorific value, in biomass [resources, biotic]: -1240 MJ
  Pedigree: (1,1,4,5,4).
- Carbon dioxide, in air [resources, in air]: -110 kg; lognormal SD95 1.17204
  Pedigree: (1,1,2,1,1).

## Sources
- Werner F., 2017, 2017 - LCI wood and wood based products - Werner, Project Report, 0, Environment & Development, Zuerich, CH
