# Lignite, burned in power plant

Dataset: EcoSpold 1, unit process
Functional unit: 1 MJ
Category: electricity by fuel / lignite\power plant
Geography: ES
Time period: 2000-01 to 2000-12
Generated by: Christian Bauer
accessRestrictedTo: 0
copyright: true

## General comment
The module describes the average for the country. The plant is used for middle load with 6000 hours of operation at full capacity per year. The plant is assumed to operate 200000 hours during its lifetime. For the assessment of main characteristics (LHV, sulphur and ash content of coal, efficiency of the plant) and criteria emissions (SOx, NOx, particles, and CO2) a bottom-up approach has been used. It consists on the collection of information about single plants. Base data on all major UCTE power plants in 1993 have been integrated, to the extent possible, with updated information for year 2000. The size distribution of particles has been derived from German data. Halogene emissions have been estimated on the basis of the content of the species in the country-specific coal input mix, assuming average retention rates. For CO and VOC-emissions average values for UCTE are included. Two average values for N2O emissions from UCTE plants are considered for the two cases with or without DeNOx;

## Included processes
Energy conversion for electricity production. Particle removal is included in this module. DeSOx and DeNOx are described in different modules; they are applied here according to the actual use in the country; SOx and NOx emissions are the reduced ones. It is assumed that 25 % of the plants are river cooled, 75 % use cooling tower (average UCTE). The water treatment is described in separate modules. The disposal of non-recycled ashes is modelled separately.

## Geography
Country-specific data.

## Technology
Average installed technology.

## Reference product
- Lignite, burned in power plant [ES]: 1 MJ
  SPAIN

## Inputs from technosphere
- Water, decarbonised, at plant [RER]: 0.15 kg; lognormal SD95 1.4
  (4,5,3,2,3,3); estimate based on literature
- NOx retained, in SCR [GLO]: 1.1e-5 kg; lognormal SD95 1.52
  (3,1,1,1,1,1); see power plant data base for details
- Water, completely softened, at plant [RER]: 0.006 kg; lognormal SD95 1.4
  (4,5,3,2,3,3); estimate based on literature
- Lignite, at mine [RER]: 0.0952 kg; lognormal SD95 1.07
  (2,1,1,1,1,1); see power plant data base for details
- Petroleum coke, at refinery [RER]: 0.000825 kg; lognormal SD95 1.07
  (2,1,1,1,1,1); see power plant data base for details
- SOx retained, in lignite flue gas desulphurisation [GLO]: 0.00109 kg; lognormal SD95 1.11
  (3,1,1,1,1,1); see power plant data base for details
- Lignite power plant [RER]: 9.72e-13 p; lognormal SD95 3.02
  (3,3,2,3,1,3);
- Disposal, lignite ash, 0% water, to opencast refill [ES]: 0.0338 kg; lognormal SD95 1.5
  (5,1,1,1,1,1); calculated from mass balance
- Chlorine, liquid, production mix, at plant [RER]: 1e-5 kg; lognormal SD95 1.65
  (5,4,3,2,3,5); rough guess
- Transport, freight, rail [RER]: 3.56e-5 tkm; lognormal SD95 2.1
  (4,2,2,3,1,5); average distance is guesstimate

## Inputs from nature
- Water, cooling, unspecified natural origin/m3 [resources, in water]: 0.0035 m3; lognormal SD95 1.4
  (4,5,3,2,1,5); estimate based on literature

## Emissions to nature
- Radon-220 [emissions to air, low. pop.]: 0.000102 kBq; lognormal SD95 3.27
  (5,1,1,1,1,5); calculated from trace element balance, input uncertain
- Dioxin, 2,3,7,8 Tetrachlorodibenzo-p- [emissions to air, low. pop.]: 7e-15 kg; lognormal SD95 3.12
  (3,5,3,2,1,5); based on available literature
- Hydrocarbons, aliphatic, alkanes, unspecified [emissions to air, low. pop.]: 2.19e-7 kg; lognormal SD95 1.65
  (3,5,3,2,1,5); based on available literature
- Propane [emissions to air, low. pop.]: 3.5e-8 kg; lognormal SD95 1.65
  (3,5,3,2,1,5); based on available literature
- Hydrogen fluoride [emissions to air, low. pop.]: 1.91e-6 kg; lognormal SD95 2.28
  (5,1,1,1,1,5); calculated from trace element balance, input uncertain
- Cadmium [emissions to air, low. pop.]: 2.8e-10 kg; lognormal SD95 5.31
  (5,1,1,1,1,5); calculated from trace element balance, input uncertain
- Benzene [emissions to air, low. pop.]: 2.17e-7 kg; lognormal SD95 1.65
  (3,5,3,2,1,5); based on available literature
- Thorium-228 [emissions to air, low. pop.]: 3.22e-7 kBq; lognormal SD95 3.27
  (5,1,1,1,1,5); calculated from trace element balance, input uncertain
- Lead-210 [emissions to air, low. pop.]: 6.29e-6 kBq; lognormal SD95 3.27
  (5,1,1,1,1,5); calculated from trace element balance, input uncertain
- Particulates, > 2.5 um, and < 10um [emissions to air, low. pop.]: 4.91e-6 kg; lognormal SD95 2.28
  (5,1,1,1,1,5); see power plant data base for details
- Thorium-232 [emissions to air, low. pop.]: 5.05e-7 kBq; lognormal SD95 3.27
  (5,1,1,1,1,5); calculated from trace element balance, input uncertain
- Heat, waste [emissions to air, low. pop.]: 0.65 MJ; lognormal SD95 1.07
  (2,1,1,1,1,1); calculated from energy balance
- Zinc [emissions to air, low. pop.]: 1.14e-8 kg; lognormal SD95 5.31
  (5,1,1,1,1,5); calculated from trace element balance, input uncertain
- Methane, fossil [emissions to air, low. pop.]: 1e-6 kg; lognormal SD95 1.61
  (3,4,3,2,1,5); based on available literature
- Selenium [emissions to air, low. pop.]: 1.41e-8 kg; lognormal SD95 5.31
  (5,1,1,1,1,5); calculated from trace element balance, input uncertain
- Xylene [emissions to air, low. pop.]: 9.22e-7 kg; lognormal SD95 1.65
  (3,5,3,2,1,5); based on available literature
- Dinitrogen monoxide [emissions to air, low. pop.]: 5.3e-7 kg; lognormal SD95 1.61
  (3,4,3,2,1,5); based on available literature
- Hydrocarbons, aliphatic, unsaturated [emissions to air, low. pop.]: 2.16e-7 kg; lognormal SD95 1.65
  (3,5,3,2,1,5); based on available literature
- Sulfur dioxide [emissions to air, low. pop.]: 0.00272 kg; lognormal SD95 1.11
  (3,1,1,1,1,1); see power plant data base for details
- Chromium VI [emissions to air, low. pop.]: 1.01e-10 kg; lognormal SD95 4
  based on range of data
- Carbon dioxide, fossil [emissions to air, low. pop.]: 0.105 kg; lognormal SD95 1.11
  (3,1,1,1,1,1); based on available literature
- Radium-226 [emissions to air, low. pop.]: 1.62e-6 kBq; lognormal SD95 3.27
  (5,1,1,1,1,5); calculated from trace element balance, input uncertain
- Arsenic [emissions to air, low. pop.]: 2.79e-9 kg; lognormal SD95 5.31
  (5,1,1,1,1,5); calculated from trace element balance, input uncertain
- Bromine [emissions to air, low. pop.]: 9.41e-8 kg; lognormal SD95 2.28
  (5,1,1,1,1,5); calculated from trace element balance, input uncertain
- Molybdenum [emissions to air, low. pop.]: 9.17e-10 kg; lognormal SD95 5.31
  (5,1,1,1,1,5); calculated from trace element balance, input uncertain
- Polonium-210 [emissions to air, low. pop.]: 1.15e-5 kBq; lognormal SD95 3.27
  (5,1,1,1,1,5); calculated from trace element balance, input uncertain
- Lead [emissions to air, low. pop.]: 1.96e-9 kg; lognormal SD95 5.31
  (5,1,1,1,1,5); calculated from trace element balance, input uncertain
- Copper [emissions to air, low. pop.]: 9.04e-10 kg; lognormal SD95 5.31
  (5,1,1,1,1,5); calculated from trace element balance, input uncertain
- Formaldehyde [emissions to air, low. pop.]: 5.8e-8 kg; lognormal SD95 1.65
  (3,5,3,2,1,5); based on available literature
- Particulates, < 2.5 um [emissions to air, low. pop.]: 4.17e-5 kg; lognormal SD95 3.27
  (5,1,1,1,1,5); see power plant data base for details
- Nitrogen oxides [emissions to air, low. pop.]: 0.000301 kg; lognormal SD95 1.52
  (3,1,1,1,1,1); see power plant data base for details
- Cobalt [emissions to air, low. pop.]: 9.82e-10 kg; lognormal SD95 5.31
  (5,1,1,1,1,5); calculated from trace element balance, input uncertain
- Manganese [emissions to air, low. pop.]: 1.17e-9 kg; lognormal SD95 5.31
  (5,1,1,1,1,5); calculated from trace element balance, input uncertain
- Toluene [emissions to air, low. pop.]: 1.09e-7 kg; lognormal SD95 1.65
  (3,5,3,2,1,5); based on available literature
- Potassium-40 [emissions to air, low. pop.]: 1.22e-6 kBq; lognormal SD95 3.27
  (5,1,1,1,1,5); calculated from trace element balance, input uncertain
- Vanadium [emissions to air, low. pop.]: 3.83e-9 kg; lognormal SD95 5.31
  (5,1,1,1,1,5); calculated from trace element balance, input uncertain
- Boron [emissions to air, low. pop.]: 3.71e-6 kg; lognormal SD95 5.31
  (5,1,1,1,1,5); calculated from trace element balance, input uncertain
- Benzo(a)pyrene [emissions to air, low. pop.]: 2e-13 kg; lognormal SD95 1.65
  (3,5,3,2,1,5); based on available literature
- Strontium [emissions to air, low. pop.]: 5.51e-9 kg; lognormal SD95 5.31
  (5,1,1,1,1,5); calculated from trace element balance, input uncertain
- Butane [emissions to air, low. pop.]: 1.9e-8 kg; lognormal SD95 1.65
  (3,5,3,2,1,5); based on available literature
- Radon-222 [emissions to air, low. pop.]: 0.000181 kBq; lognormal SD95 3.27
  (5,1,1,1,1,5); calculated from trace element balance, input uncertain
- Mercury [emissions to air, low. pop.]: 3.75e-9 kg; lognormal SD95 5.31
  (5,1,1,1,1,5); calculated from trace element balance, input uncertain
- PAH, polycyclic aromatic hydrocarbons [emissions to air, low. pop.]: 1e-9 kg; lognormal SD95 3.12
  (3,5,3,2,1,5); based on available literature
- Antimony [emissions to air, low. pop.]: 9.32e-10 kg; lognormal SD95 5.31
  (5,1,1,1,1,5); calculated from trace element balance, input uncertain
- Ethane [emissions to air, low. pop.]: 4.1e-8 kg; lognormal SD95 1.65
  (3,5,3,2,1,5); based on available literature
- Propene [emissions to air, low. pop.]: 1.6e-8 kg; lognormal SD95 1.65
  (3,5,3,2,1,5); based on available literature
- Radium-228 [emissions to air, low. pop.]: 5.97e-7 kBq; lognormal SD95 3.27
  (5,1,1,1,1,5); calculated from trace element balance, input uncertain
- Carbon monoxide, fossil [emissions to air, low. pop.]: 2e-5 kg; lognormal SD95 5.09
  (3,4,3,2,1,5); based on available literature
- Barium [emissions to air, low. pop.]: 6.55e-9 kg; lognormal SD95 5.31
  (5,1,1,1,1,5); calculated from trace element balance, input uncertain
- Pentane [emissions to air, low. pop.]: 1.47e-7 kg; lognormal SD95 1.65
  (3,5,3,2,1,5); based on available literature
- Uranium-238 [emissions to air, low. pop.]: 1.35e-6 kBq; lognormal SD95 3.27
  (5,1,1,1,1,5); calculated from trace element balance, input uncertain
- Chromium [emissions to air, low. pop.]: 8.16e-10 kg; lognormal SD95 5.31
  (5,1,1,1,1,5); calculated from trace element balance, input uncertain
- Iodine [emissions to air, low. pop.]: 7.15e-8 kg; lognormal SD95 2.28
  (5,1,1,1,1,5); calculated from trace element balance, input uncertain
- Particulates, > 10 um [emissions to air, low. pop.]: 7.45e-6 kg; lognormal SD95 1.83
  (5,1,1,1,1,5); see power plant data base for details
- Nickel [emissions to air, low. pop.]: 3.24e-9 kg; lognormal SD95 5.31
  (5,1,1,1,1,5); calculated from trace element balance, input uncertain
- Hydrogen chloride [emissions to air, low. pop.]: 1.94e-5 kg; lognormal SD95 2.28
  (5,1,1,1,1,5); calculated from trace element balance, input uncertain
- Heat, waste [emissions to water, river]: 0.171 MJ; lognormal SD95 1.07
  (2,1,1,1,1,1); calculated from energy balance
- Water [emissions to water, unspecified]: 3.325 kg; lognormal SD95 2.5196
  (5,5,5,5,5,BU:1.05); All uncertainty-values set to 5.0 by default. Balance of input water

## Sampling procedure
literature and statistics

## Extrapolations
see Geography/Text

## Sources
- Dones R., Bauer C., Roeder A., 2007, 2007 - Coal - Dones, Sachbilanzen von Energiesystemen. Final report No. 6 ecoinvent data v2.0, 6, Swiss Centre for LCI, PSI, Duebendorf and Villigen, CH
Röder, A., Ch. Bauer, R. Dones (2007) Kohle. Sachbilanzen von Energiesystemen. Final report No. 6 ecoinvent data v2.0. Editors: Dones R.. Volume: 6. Swiss Centre for LCI, PSI. Dübendorf and Villigen, CH.
Type: Measurement on site
Source: CD-ROM
First author: Röder, A.
Other authors: Ch. Bauer, R. Dones
Year: 2007
Name of editors: Dones R.
Title of anthology: Sachbilanzen von Energiesystemen. Final report No. 6 ecoinvent data v2.0
Place of publication: Dübendorf and Villigen, CH
Publisher: Swiss Centre for LCI, PSI
Volume No: 6

## Validation
Proof reading validation: passed; Other validation: none;
