# Vegetable oil methyl ester, at esterification plant

Dataset: EcoSpold 1, unit process
Functional unit: 1 kg
Category: biomass / fuels
Geography: CH
Production volume: Approx. 2.5-3 kt of vegetable oil were processed to methyl ester in 2004 in CH
Generated by: Niels Jungbluth
accessRestrictedTo: 0
copyright: true

## General comment
Inventory refers to the production of 1 kg vegetable oil methyl ester (VOME), respectively glycerine, from purified waste cooking oil. The multioutput-process 'vegetable oil, from waste cooking oil, in esterification plant' delivers the co-products 'vegetable oil methyl ester, at esterification plant' and 'glycerine, from vegetable oil, at esterification plant'. Economic allocation with allocation factor of 97.8% to methyl ester. Allocation of CO2 emissions is done according to carbon balance.;

## Included processes
Original Author: Arnaud Dauriat; Author of updated dataset: Niels Jungbluth. The update includes the allocation based on updated price information (208 CHF/ton glycerine).

## Technology
Typical vegetable oil esterification plant designed for vegetable oil methyl ester (VOME) production (for use in the vehicle fuels market), in the French context. Vegetable oil base-catalyzed transesterification.

## Reference product
- Vegetable oil methyl ester, at esterification plant [CH]: 1 kg
  SWITZERLAND

## Inputs from technosphere
- Transport, freight, rail [RER]: 0.0760598 tkm; lognormal SD95 1.32505
  (1,4,2,1,3,4); Based on ecoinvent Guidelines, standard distances
- Methanol, at regional storage [CH]: 0.111102 kg; lognormal SD95 1.32505
  (1,4,2,1,3,4); Literature data & biodiesel producer
- Vegetable oil, from waste cooking oil, at plant [CH]: 1.00544 kg; lognormal SD95 1.32505
  (1,4,2,1,3,4); Literature data & biodiesel producer
- Potassium hydroxide, at regional storage [RER]: 0.0111061 kg; lognormal SD95 1.65173
  (1,4,2,1,3,4); Literature data & biodiesel producer
- Vegetable oil esterification plant [CH]: 9.14039e-10 p; lognormal SD95 1.32505
  (1,4,2,1,3,4); Calculation, according to feed capacity and lifetime of the plant
- Transport, freight, lorry, fleet average [RER]: 0.0115596 tkm; lognormal SD95 1.32505
  (1,4,2,1,3,4); Based on ecoinvent Guidelines, standard distances
- Electricity, low voltage, at grid [CH]: 0.041365 kWh; lognormal SD95 1.32505
  (1,4,2,1,3,4); Literature data & biodiesel producer
- Treatment, sewage, from residence, to wastewater treatment, class 2 [CH]: 6.11551e-5 m3; lognormal SD95 1
  (1,4,2,1,3,4); Literature data & biodiesel producer
- Heat, natural gas, at industrial furnace 1MW [CH]: 0.903452 MJ; lognormal SD95 1.32505
  (1,4,2,1,3,4); Literature data & biodiesel producer
- Tap water, unspecified natural origin CH, at user [CH]: 0.0267227 kg; lognormal SD95 3.34281
  (1,1,1,1,1,1); Literature, environmental report

## Inputs from nature
- Carbon dioxide, in air [resources, in air]: 0.139385 kg; lognormal SD95 1.65173
  (1,4,2,1,3,4); Calculation, to close mass balance of process

## Emissions to nature
- Heat, waste [emissions to air, high. pop.]: 14.2954 MJ; lognormal SD95 1.65173
  (1,4,2,1,3,4); ecoinvent guidelines, calculation from electricity consumption and energy balance

## Sampling procedure
Data from biodiesel producers in CH, industrial data

## Sources
- Stucki M., Jungbluth N., Leuenberger M., 2011, 2011 - LCA biogas prod. from diff. substrates - Stucki, Project report, 320, ESU-services Ltd., Uster, CH
Stucki M., Jungbluth N., Leuenberger M. (2011) Life Cycle Assessment of Biogas Production from Different Substrates. Project report. Volume: 320. ESU-services Ltd.. Uster, CH.
Type: Separate publication
Source: Report
First author: Stucki M.
Other authors: Jungbluth N., Leuenberger M.
Year: 2011
Title of anthology: Project report
Place of publication: Uster, CH
Publisher: ESU-services Ltd.
Volume No: 320
Original title: Life Cycle Assessment of Biogas Production from Different Substrates

## Validation
Proof reading validation: 10.10.2017; Other validation: Z:\Projekte Ablage\320 FP Biomasse Biogas_Substrate\Ecospold\Veröffentlicht\[ESU-2017-biogas-productionv4.xlsx]X-Process;
