# High pressure hydrogen storage tank

Dataset: EcoSpold 1, unit process
Functional unit: 1 kg
Category: transport systems / road\Vehicle components\Energy storage\Hydrogen tank
Geography: GLO
Time period: 2020-01 to 2020-12
Generated by: Romain Sacchi
accessRestrictedTo: 0
copyright: False

## General comment
LCI for a high pressure storage tank per 1 kg hydrogen (Boureima et al., 2011, Das, 2011). Assumed lifetime of 20 years. Original source: C. Wulf et al. / Journal of Cleaner Production 199 (2018) 431-443.

## Time period
Base technology year of 2020

## Reference product
- High pressure hydrogen storage tank [GLO]: 1 kg

## Inputs from technosphere
All rows: lognormal SD95 1.16387
- Steel, low-alloyed, at plant [RER]: 0.9 kg
  Uncertainty from pedigree matrix: (3, 3, 3, 2, 1, 3)
- Chromium steel 18/8, at plant [RER]: 0.9 kg
  Uncertainty from pedigree matrix: (3, 3, 3, 2, 1, 3)
- Carbon fiber, weaved, at factory [RER]: 7.14 kg
  Uncertainty from pedigree matrix: (3, 3, 3, 2, 1, 3)
- Sheet rolling, copper [RER]: 0.9 kg
  Uncertainty from pedigree matrix: (3, 3, 3, 2, 1, 3)
- Sheet rolling, aluminium [RER]: 0.6 kg
  Uncertainty from pedigree matrix: (3, 3, 3, 2, 1, 3)
- Sheet rolling, chromium steel [RER]: 0.9 kg
  Uncertainty from pedigree matrix: (3, 3, 3, 2, 1, 3)
- Aluminium alloy, AlMg3, at plant [RER]: 0.6 kg
  Uncertainty from pedigree matrix: (3, 3, 3, 2, 1, 3)
- Epoxy resin, liquid, at plant [RER]: 3.06 kg
  Uncertainty from pedigree matrix: (3, 3, 3, 2, 1, 3)
- Transport, freight, rail [RER]: 2.32 tkm
  Uncertainty from pedigree matrix: (3, 3, 3, 2, 1, 3)
- Transport, freight, lorry, 16t-32t gross weight, fleet average [RER]: 0.546 tkm
  Uncertainty from pedigree matrix: (3, 3, 3, 2, 1, 3)

## Sources
- Sacchi R., Bauer C., 2023, 2023 - LCI on-road vehicles - Sacchi, PSI, Villigen, CH
doi: 10.5281/ZENODO.5156043
