# xxx Industrial residue wood, from planing, hard, air, kiln dried, u=10%, at plant

Dataset: EcoSpold 1, unit process
Functional unit: 1 m3
Category: material, obsolete / wood, obsolete\extraction, obsolete
Geography: RER
Generated by: Hans-Joerg Althaus
accessRestrictedTo: 0
copyright: true

## General comment
The multi-output process "planing, hardwood, air / kiln dried, u=10%" delivers the two coproducts "sawn timber, hardwood, planed, air / kiln dried, u=10%, at plant" and "industrial residue wood, from planing, hard, air/kiln dried, u=10%, at plant". Allocation is based on the over-all proceeds of the process.;

## Included processes
Includes planing process. planing mill is assumed to be located on the sawmill site. No transports are considered. Dust emissions are neglected for a lack of data.

## Technology
Technology mix used in Germany (1986)

## Reference product
- xxx Industrial residue wood, from planing, hard, air, kiln dried, u=10%, at plant [RER]: 1 m3
  Europe

## Inputs from technosphere
- xxx Sawn timber, hardwood, raw, air / kiln dried, u=10%, at plant [RER]: 0.076667 m3; lognormal SD95 1.51
  (1,3,5,3,1,1,4)
- xx Hardwood, allocation correction, 2 [RER]: 0.92 m3; lognormal SD95 1
  calculated correction term
- Electricity, medium voltage, production ENTSO-E, at grid: 2.07333 kWh; lognormal SD95 1.51
  (1,3,5,3,1,1,4)
- Planing mill [RER]: 5.3333e-8 p; lognormal SD95 3.36
  (4,5,2,3,4,5,9)

## Emissions to nature
- Heat, waste [emissions to air, low. pop.]: 7.46667 MJ; lognormal SD95 1.51
  (1,3,5,3,1,1,13)

## Sampling procedure
Literature

## Extrapolations
see Geography and Technology

## Uncertainty adjustments
The assumption that the German technology mix is representative for central Europe is considered in the uncertainties.

## Sources
- Werner F., Althaus H.-J., Kuenniger T., Richter K., Jungbluth N., 2007, 2007 - LCI wood as fuel and const. mat. - Werner, Final report ecoinvent data v2.0, 9, Swiss Centre for LCI, Empa - TSL, ESU-services Ltd., Duebendorf, CH
Werner F., Althaus H.-J., Künniger T., Richter K., Jungbluth N. (2007) 1Life Cycle Inventories of Wood as Fuel and Construction Material. Final report ecoinvent data v2.0. Volume: 9. Issue: 0. Swiss Centre for LCI, Empa - TSL. Dübendorf, CH.
Type: Measurement on site
Source: CD-ROM
First author: Werner F.
Other authors: Althaus H.-J., Künniger T., Richter K., Jungbluth N.
Year: 2007
Title of anthology: Final report ecoinvent data v2.0
Place of publication: Dübendorf, CH
Publisher: Swiss Centre for LCI, Empa - TSL
Volume No: 9
Issue No: 0

## Validation
Proof reading validation: passed; Other validation: none;
