# Smartphone, repairable type Fairphone, at plant

Dataset: EcoSpold 1, unit process
Functional unit: 1 p
Category: electronics / devices
Geography: GLO
Time period: 2023-01 to 2029-12
Synonyms: Smartphone; Reparierbares Smartphone; Fairphone
Generated by: Lugas Raka Adrianto, Maulana Permana Ajie, Didier Beloin-Saint-Pierre
accessRestrictedTo: 0
copyright: false

## General comment
The data set represents the production of smartphone with defined technical specifications;

## Included processes
The dataset for for Fairphone was taken from the life cycle inventory study of the thesis project of Güvendik, 2014, which analyzes the bill of materials and components of Fairphone 1st gen. It is acknowledged that the recent model of Fairphone 4 is currently sold in the market, yet the transparent inventory data is kept confidential in the LCA report of the company due to intellectual property. Therefore, the latter technical report was only used to validate the LCIA results of the cited literature. The weight of the smartphone is defined to be about 160 grams. The data for other bill of materials foraverage smartphones are mainly taken from the JRC technical report and other published articles. The modeled smartphone has a flash storage capacity of 16 GB and RAM capacity of 1 GB. According to the industry technology for IC smartphones, up to 6 stacked dies can be integrated in a single package to optimize density and performance. In the modeling, the area of wafer/die is assumed to be ~4 cm2 to represent total wafer logic area according to the literature.

## Geography
Data for global average for smartphone

## Technology
The smartphone has a processing unit, flash storage, RAM, and other connectivity features for standard Fairphone.

## Reference product
- Smartphone, repairable type Fairphone, at plant [GLO]: 1 p

## Inputs from technosphere
- Battery, Li-ion, NMC111, rechargeable, prismatic [GLO]: 0.0386 kg; lognormal SD95 1.25
  (2,3,3,2,1,5,BU:1.05); Battery. Literature: Guvendik 2014.
- Brass, at plant [CH]: 0.00014 kg; lognormal SD95 1.25
  (2,3,3,2,1,5,BU:1.05); Others. Literature: Guvendik 2014.
- Cable, ribbon cable, 20-pin, with plugs, at plant [GLO]: 0.00019 kg; lognormal SD95 1.25
  (2,3,3,2,1,5,BU:1.05); Others. Literature: Guvendik 2014.
- Capacitor, unspecified, at plant [GLO]: 0.00052 kg; lognormal SD95 1.25
  (2,3,3,2,1,5,BU:1.05); Electronics. Literature: Guvendik 2014.
- Chromium steel 18/8, at plant [RER]: 0.05482 kg; lognormal SD95 1.25
  (2,3,3,2,1,5,BU:1.05); LCD screen and housing. Literature: Guvendik 2014.
- Connector, computer, peripherical type, at plant [GLO]: 0.00191 kg; lognormal SD95 1.25
  (2,3,3,2,1,5,BU:1.05); Others. Literature: Guvendik 2014.
- Copper, primary, at refinery [GLO]: 0.00419 kg; lognormal SD95 1.25
  (2,3,3,2,1,5,BU:1.05); Others. Literature: Guvendik 2014.
- Diode, glass-, SMD type, surface mounting, at plant [GLO]: 0.00052 kg; lognormal SD95 1.25
  (2,3,3,2,1,5,BU:1.05); Electronics. Literature: Guvendik 2014.
- Electricity, medium voltage, production RAS, at grid [RAS]: 4.698 kWh; lognormal SD95 1.25
  (2,3,3,2,1,5,BU:1.05); Assembly. Literature: Cordella et al 2020.
- Electronic component, passive, unspecified, at plant [GLO]: 0.00501 kg; lognormal SD95 1.25
  (2,3,3,2,1,5,BU:1.05); Others. Literature: Guvendik 2014.
- Extrusion, plastic film [RER]: 0.00055 kg; lognormal SD95 1.25
  (2,3,3,2,1,5,BU:1.05); Others. Literature: Guvendik 2014.
- Ferrite, at plant [GLO]: 2e-5 kg; lognormal SD95 1.25
  (2,3,3,2,1,5,BU:1.05); Others. Literature: Guvendik 2014.
- Glass fibre reinforced plastic, polyester resin, hand lay-up, at plant [RER]: 0.00078 kg; lognormal SD95 1.25
  (2,3,3,2,1,5,BU:1.05); Others. Literature: Guvendik 2014.
- Inductor, miniature RF chip type, MRFI, at plant [GLO]: 6e-5 kg; lognormal SD95 1.25
  (2,3,3,2,1,5,BU:1.05); Others. Literature: Guvendik 2014.
- Injection moulding [RER]: 0.0202 kg; lognormal SD95 1.25
  (2,3,3,2,1,5,BU:1.05); LCD screen and housing. Literature: Guvendik 2014.
- Integrated circuit, IC, logic type, at plant [GLO]: 0.00042 kg; lognormal SD95 1.25
  (2,3,3,2,1,5,BU:1.05); ICs. Literature: Guvendik 2014.
- Integrated circuit, IC, memory type, at plant [GLO]: 0.00065 kg; lognormal SD95 1.25
  (2,3,3,2,1,5,BU:1.05); ICs. Literature: Guvendik 2014.
- Kraft paper, unbleached, at plant [RER]: 0.054 kg; lognormal SD95 1.25
  (2,3,3,2,1,5,BU:1.05); Packaging. Literature: Guvendik 2014.
- LED module, at plant [GLO]: 0.034 kg; lognormal SD95 1.25
  (2,3,3,2,1,5,BU:1.05); LCD screen and housing. Literature: Guvendik 2014.
- Light emitting diode, LED, at plant [GLO]: 0.00041 kg; lognormal SD95 1.25
  (2,3,3,2,1,5,BU:1.05); LCD screen and housing. Literature: Guvendik 2014.
- Packaging film, LDPE, at plant [RER]: 0.0071 kg; lognormal SD95 1.25
  (2,3,3,2,1,5,BU:1.05); Packaging. Literature: Guvendik 2014.
- Packaging, corrugated board, mixed fibre, single wall, at plant [RER]: 0.0361 kg; lognormal SD95 1.25
  (2,3,3,2,1,5,BU:1.05); Packaging. Literature: Guvendik 2014.
- Paper, woodcontaining, LWC, at plant [RER]: 0.068 kg; lognormal SD95 1.25
  (2,3,3,2,1,5,BU:1.05); Packaging. Literature: Guvendik 2014.
- Polycarbonate, at plant [RER]: 0.01314 kg; lognormal SD95 1.25
  (2,3,3,2,1,5,BU:1.05); LCD screen and housing. Literature: Guvendik 2014.
- Polyethylene terephthalate, granulate, amorphous, at plant [RER]: 0.00055 kg; lognormal SD95 1.25
  (2,3,3,2,1,5,BU:1.05); Others. Literature: Guvendik 2014.
- Printed wiring board, surface mounted, unspec., Pb free, at plant [GLO]: 0.00732 kg; lognormal SD95 1.25
  (2,3,3,2,1,5,BU:1.05); Printed circuit boards. Literature: Guvendik 2014.
- Sheet rolling, chromium steel [RER]: 0.05482 kg; lognormal SD95 1.25
  (2,3,3,2,1,5,BU:1.05); LCD screen and housing. Literature: Guvendik 2014.
- Sheet rolling, copper [RER]: 0.00419 kg; lognormal SD95 1.25
  (2,3,3,2,1,5,BU:1.05); Others. Literature: Guvendik 2014.
- Charger, for smartphone, at plant [GLO]: 1 p; lognormal SD95 1.25
  (2,3,3,2,1,5,BU:1.05); Literature: Hischier et al 2014.
- Transistor, SMD type, surface mounting, at plant [GLO]: 2e-5 kg; lognormal SD95 1.25
  (2,3,3,2,1,5,BU:1.05); Electronics. Literature: Guvendik 2014.
- Transport, freight, lorry, fleet average [RER]: 0.0165 tkm; lognormal SD95 2.07
  (2,3,3,2,1,5,BU:2.00); Transport, adjusted using mass.
- Transport, freight, rail [RER]: 0.033 tkm; lognormal SD95 2.07
  (2,3,3,2,1,5,BU:2.00); Transport, adjusted using mass.
- Transport, transoceanic container ship [OCE]: 3.47 tkm; lognormal SD95 2.07
  (2,3,3,2,1,5,BU:2.00); Transport, adjusted using mass.
- Wafer, fabricated, for integrated circuit, logic type, at plant [GLO]: 0.0004 m2; lognormal SD95 1.25
  (2,3,3,2,1,5,BU:1.05); Total die area = 4cm2 wafer logic. Literature: Clement et al. 2020
- Wafer, fabricated, for integrated circuit, memory type, at plant [GLO]: 0.000117 m2; lognormal SD95 1.25
  (2,3,3,2,1,5,BU:1.05); Memory = 16 GB and RAM = 1 GB. Literature: UBA report, 2021.
- Disposal, laptop computer, to WEEE treatment [CH]: 0.06 p; lognormal SD95 1.36
  (3,4,3,3,3,5,BU:1.05); Proxy, adjusted using weight

## Sampling procedure
Literature & own estimations

## Extrapolations
Average technology

## Sources
- Raka Adrianto L., Permana Ajie M., Beloin-Saint-Pierre D., 2024, 2024 - LCI ICT sector - Raka Adrianto, Empa, St. Gallen, CH

## Validation
Proof reading validation: Passed, Other validation: none, Validator: Mischa Zschokke, Company: Carbotech, Country: CH
