# xx Electricity, biogas, allocation exergy, at micro gas turbine 100kWe

Dataset: EcoSpold 1, unit process
Functional unit: 1 kWh
Category: energy, obsolete / biomass, obsolete\cogeneration, obsolete
Geography: CH
Time period: 2000-01 to 2005-12
Generated by: Alex Primas
accessRestrictedTo: 0
copyright: true

## General comment
The multioutput-process 'biogas, burned in micro gas turbine delivers the coproducts 'heat, biogas, allocation exergy, at micro gas turbine 100kWe' and 'electricity, biogas, allocation exergy, at micro gas turbine 100kWe'. The exergy allocation is the allocation scheme suggested to be used within the ecoinvent database (e.g. in electricity mixes).;

## Included processes
The module includes fuel input, infrastructure, emissions to air, and working materials for operation.

## Geography
Biogas input modelled for conditions in Switzerland. Process applicable in central European conditions.

## Technology
Radial turbine with recuperation for preheating the compressed air and fuel gas booster to increase gas pressure. Operation with refined biogas from low pressure gas network. Electrical efficiency 29%, total efficiency 75%. Operation as base load engine with low partial load hours.

## Reference product
- xx Electricity, biogas, allocation exergy, at micro gas turbine 100kWe [CH]: 1 kWh
  SWITZERLAND

## Inputs from technosphere
- Micro gas turbine 100kWe [CH]: 1.8818e-7 p; lognormal SD95 3.0201
  (2,3,2,1,1,4); uncertainty of life time
- Methane, 96 vol-%, from biogas, low pressure, at consumer [CH]: 9.45604 MJ; lognormal SD95 1.05
  (nA,nA,nA,nA,nA,nA); input
- Disposal, used mineral oil, 10% water, to hazardous waste incineration [CH]: 5.2008e-6 kg; lognormal SD95 1.3081
  (4,3,2,1,1,5); calculated from oil input
- Maintenance micro gas turbine 100kWe [CH]: 9.4088e-7 p; lognormal SD95 1.1397
  (2,3,2,1,1,4); uncertainty of maintenance cycle
- Lubricating oil, at plant [RER]: 4.728e-6 kg; lognormal SD95 1.1397
  (2,3,2,1,1,4); company data

## Emissions to nature
- Sulfur dioxide [emissions to air, high. pop.]: 5.2008e-6 kg; lognormal SD95 1.2152
  (2,nA,nA,nA,3,nA); approximation with data from natural gas network
- Heat, waste [emissions to air, high. pop.]: 7.72558 MJ; lognormal SD95 1.1073
  (2,3,2,1,1,3); uncertainty of heating value and electric efficiency
- Nitrogen oxides [emissions to air, high. pop.]: 0.00030259 kg; lognormal SD95 1.5854
  (2,3,2,1,3,4); estimate based on different references
- NMVOC, non-methane volatile organic compounds, unspecified origin [emissions to air, high. pop.]: 5.6736e-6 kg; lognormal SD95 1.6771
  (4,3,2,1,3,5); estimate based on few references
- Carbon dioxide, biogenic [emissions to air, high. pop.]: 0.52744 kg; lognormal SD95 1.0714
  (2,nA,nA,nA,1,nA); calculated from composition of biogas
- Carbon monoxide, biogenic [emissions to air, high. pop.]: 0.00026477 kg; lognormal SD95 5.0747
  (2,3,2,1,3,4); estimate based on different references
- Methane, biogenic [emissions to air, high. pop.]: 5.1063e-5 kg; lognormal SD95 1.6771
  (4,3,2,1,3,5); estimate based on few references
- Dinitrogen monoxide [emissions to air, high. pop.]: 9.456e-6 kg; lognormal SD95 1.9377
  (4,5,3,1,4,5); value for large natural gas power plants used as approximation
- Particulates, < 2.5 um [emissions to air, high. pop.]: 4.728e-6 kg; lognormal SD95 3.3424
  (4,4,3,2,4,5); value for large natural gas power plants used as approximation

## Sampling procedure
Literature data and manufacturer information

## Sources
- Primas A., 2007, 2007 - LCI new CHP systems - Primas, Final report ecoinvent Data v2.0, 20, Swiss Centre for LCI, B&H AG, Duebendorf and Zuerich, CH
Primas A., 0 (2007) Life Cycle Inventories of new CHP systems. Final report ecoinvent Data v2.0. Editors: 0. Volume: 20. Swiss Centre for LCI, B&H AG. Duebendorf and Zurich, CH.
Type: Measurement on site
Source: CD-ROM
First author: Primas A.
Other authors: 0
Year: 2007
Name of editors: 0
Title of anthology: Final report ecoinvent Data v2.0
Place of publication: Duebendorf and Zurich, CH
Publisher: Swiss Centre for LCI, B&H AG
Volume No: 20

## Validation
Proof reading validation: passed; Other validation: none;
