# xx Glazing, double (2-IV), U<1.1 W/m2K, laminated safety glass, at plant

Dataset: EcoSpold 1, unit process
Functional unit: 1 m2
Category: material, obsolete / glass, obsolete\construction, obsolete
Geography: RER
Time period: 1996-01 to 2004-12
Generated by: Martin Lehmann
accessRestrictedTo: 0
copyright: true

## General comment
This dataset describes the processes included in the production of 1.06m2 (corresponding to 1m2 visible area) double glazing (2-IV, LSG) with a U-value below 1.1 W/m2K. It can be applied for laminated safety double glazing used in the building sector. 1 m2 visible glazing area has a final weight of 26 kg.;

## Included processes
Included in this dataset are the materials and production processes of 1.06m2 (corresponding to 1m2 visible area) LSG double glazing (2-IV, LSG) with a U-value below 1.1 W/m2K including disposal of waste water and production wastes.

## Geography
Data estimated according to a European company.

## Technology
The technology represents average European production.

## Reference product
- xx Glazing, double (2-IV), U<1.1 W/m2K, laminated safety glass, at plant [RER]: 1 m2
  Europe

## Inputs from technosphere
- Flat glass, uncoated, at plant [RER]: 4.84 kg; lognormal SD95 1.22
  (1,3,1,3,1,5,3)
- Electricity, medium voltage, production ENTSO-E, at grid: 9.67 kWh; lognormal SD95 1.24
  (2,4,1,3,1,5,2)
- Extrusion, plastic film [RER]: 1.05 kg; lognormal SD95 1.22
  (2,3,1,3,1,5,3)
- Polyvinylchloride, at regional storage [RER]: 1.05 kg; lognormal SD95 1.22
  (1,3,1,3,1,5,3)
- Glazing, double (2-IV), U<1.1 W/m2K, at plant [RER]: 1 m2; lognormal SD95 2.05
  (1,3,1,3,1,5,5)

## Emissions to nature
- Heat, waste [emissions to air, unspecified]: 34.8 MJ; lognormal SD95 1.26
  (3,4,1,3,1,5,13)

## Sampling procedure
Company documentation, calculations based on geometry

## Extrapolations
see Geography

## Uncertainty adjustments
The assumption that this dataset is representative for the whole Europe is taken into account in the uncertainties.

## Sources
- Kellenberger D., Althaus H.-J., Jungbluth N., Kuenniger T., Lehmann M., Thalmann P., 2007, 2007 - LCI building products - Kellenberger, Final report ecoinvent data v2.0, 7, Swiss Centre for LCI, Empa - TSL, ESU-services Ltd., Bau- und Umweltchimie, Duebendorf, CH
Kellenberger D., Althaus H.-J., Jungbluth N., Künniger T. (2007) Life Cycle Inventories of Building Products. Final report ecoinvent data v2.0. Volume: 7. Swiss Centre for LCI, Empa - TSL. Dübendorf, CH.
Type: Measurement on site
Source: CD-ROM
First author: Kellenberger D.
Other authors: Althaus H.-J., Jungbluth N., Künniger T.
Year: 2007
Title of anthology: Final report ecoinvent data v2.0
Place of publication: Dübendorf, CH
Publisher: Swiss Centre for LCI, Empa - TSL
Volume No: 7

## Validation
Proof reading validation: passed; Other validation: none;
