# Electricity, hard coal, at power plant

Dataset: EcoSpold 1, unit process
Functional unit: 1 kWh
Category: electricity by fuel / coal
Geography: ENTSO-E
Time period: 2018-01 to 2020-01
Production volume: 200 TWh
Share of production covered: 100 %
Generated by: Christopher Oberschelp
accessRestrictedTo: 0
copyright: true

## General comment
The average allocated net electrical efficiency is about 37.9 %. The electricity generation of this technology in the region is at about 200 TWh based on Eurostat/IEA. NA;

## Included processes
Electricity output at busbar. The dataset is composed of the electricity generation in covered sub-regions and thus uses the average net efficiencies of power plants in those regions adjusted for co-generation (using allocation based on exergy content).

## Geography
ENTSO-E in 2019

## Technology
Average installed technology.

## Reference product
- Electricity, hard coal, at power plant [ENTSO-E]: 1 kWh

## Inputs from technosphere
All rows: lognormal SD95 1.05
- Electricity, hard coal, at power plant [AT]: 0.0077868 kWh
  (1,1,1,1,1,1,BU:1.05)calculated from IEA Extended World Energy Balances for 2019; uncertainty own estimate
- Electricity, hard coal, at power plant [BE]: 0.00049345 kWh
  (same comment as for Electricity, hard coal, at power plant)
- Electricity, hard coal, at power plant [CZ]: 0.010368 kWh
  (same comment as for Electricity, hard coal, at power plant)
- Electricity, hard coal, at power plant [DE]: 0.28883 kWh
  (same comment as for Electricity, hard coal, at power plant)
- Electricity, hard coal, at power plant [ES]: 0.066969 kWh
  (same comment as for Electricity, hard coal, at power plant)
- Electricity, hard coal, at power plant [FR]: 0.018605 kWh
  (same comment as for Electricity, hard coal, at power plant)
- Electricity, hard coal, at power plant [HR]: 0.0080146 kWh
  (same comment as for Electricity, hard coal, at power plant)
- Electricity, hard coal, at power plant [IT]: 0.096739 kWh
  (same comment as for Electricity, hard coal, at power plant)
- Electricity, hard coal, at power plant [NL]: 0.09361 kWh
  (same comment as for Electricity, hard coal, at power plant)
- Electricity, hard coal, at power plant [PL]: 0.37543 kWh
  (same comment as for Electricity, hard coal, at power plant)
- Electricity, hard coal, at power plant [PT]: 0.028794 kWh
  (same comment as for Electricity, hard coal, at power plant)
- Electricity, hard coal, at power plant [SK]: 0.0043652 kWh
  (same comment as for Electricity, hard coal, at power plant)

## Sampling procedure
Databases/ literature data based on regional statistics.

## Extrapolations
No relevant extrapolations.

## Sources
- Itten R., Oberschelp C., Kroehnert H., Stucki M., 2023, 2023 - LCI solid fossil fuel - Itten, Project report, ZHAW, Waedenswil, CH

## Validation
27.07.2023
