# Electricity, biogas from beet residues, at cogen

Dataset: EcoSpold 1, unit process
Functional unit: 1 kWh
Category: electricity by fuel / biomass\cogeneration
Geography: CH
Time period: 2008-01 to 2010-12
Production volume: In 2002 the production of electricity from biogas was 9.8 GWh/a.
Generated by: Matthias Stucki
accessRestrictedTo: 0
copyright: true

## General comment
The multioutput process "biogas gas burned in cogen with gas engine" delivers the co-products: heat and electricity. The allocation is based on the exergy values of heat and electricity. The exergy value of electricity is 1, and the exergy value of heat is 0.17. The degrees of efficiency are as follows: electricity: 0.354 and heat: 0.51.;

## Included processes
Use of biogas in a cogeneration unit. Included are emissions to air, biogas consumption, use and disposal of operational supplements as well as infrastructure expenditures.

## Geography
Conditions of cogeneration in Switzerland.

## Technology
Lambda 1-engine" with a catalytic converter

## Reference product
- Electricity, biogas from beet residues, at cogen [CH]: 1 kWh

## Inputs from technosphere
- Cogen unit 160kWe, common components for heat+electricity [RER]: 4.0844e-8 p; lognormal SD95 1.6517
  (1,4,2,1,3,4);
- Operation, biogas combustion, in cogen with biogas engine [CH]: 8.1688 MJ; lognormal SD95 3.3428
  (1,1,1,1,1,1);
- Cogen unit 160kWe, components for electricity only [RER]: 5.0847e-8 p; lognormal SD95 1.6517
  (1,4,2,1,3,4);
- Biogas, from beet residues, co-digestion, at storage [CH]: 0.35935 m3; lognormal SD95 1.325
  (1,4,2,1,3,4);

## Sampling procedure
Literature data

## Sources
- Stucki M., Jungbluth N., Leuenberger M., 2011, 2011 - LCA biogas prod. from diff. substrates - Stucki, Project report, 320, ESU-services Ltd., Uster, CH
Stucki M., Jungbluth N., Leuenberger M. (2011) Life Cycle Assessment of Biogas Production from Different Substrates. Project report. Volume: 320. ESU-services Ltd.. Uster, CH.
Type: Separate publication
Source: Report
First author: Stucki M.
Other authors: Jungbluth N., Leuenberger M.
Year: 2011
Title of anthology: Project report
Place of publication: Uster, CH
Publisher: ESU-services Ltd.
Volume No: 320
Original title: Life Cycle Assessment of Biogas Production from Different Substrates

## Validation
Proof reading validation: 01.02.2012; Other validation: \\Server\e\ESU-Docs\Projektablage\320_FP Biomasse Biogas_Substrate\Ecospold\Veröffentlicht\[stucki-2011-biogas-production.xlsx]X-Process;
