# Ethanol, 95% in H2O, from whey, at fermentation plant

Dataset: EcoSpold 1, unit process
Functional unit: 1 kg
Category: fuels / biofuels\ethanol
Geography: CH
Time period: 2000-01 to 2004-12
Production volume: The world production of ethanol from whey was 6.8 Million litres per year.
Share of production covered: 0 %
Generated by: Juergen Sutter
accessRestrictedTo: 0
copyright: true

## General comment
The multioutput-process "whey, to fermentation" delivers the co-products Ethanol, 95% in H20, from whey", "yeast paste from whey", and "portein concentrate rom whey". The allocation is based on economic criteria. The production of ethanol from whey is of no economical importance in the world.;

## Included processes
Fermentation of whey including materials, energy uses, infrastructure, and emissions.

## Geography
The inventory is modelled with data from a plant in Ireland.

## Technology
Production of ethanol from whey with the Carbery process.

## Reference product
- Ethanol, 95% in H2O, from whey, at fermentation plant [CH]: 1 kg
  SWITZERLAND

## Inputs from technosphere
- Whey, at dairy [CH]: 6.85998 kg; lognormal SD95 1.115
  (1,1,1,3,1,4); Eners 2005
- Heat, at cogen with biogas engine, allocation exergy [CH]: 0.82902 MJ; lognormal SD95 1.113
  (1,1,1,1,1,4); Frometin 2000
- Sulphuric acid, liquid, at plant [RER]: 0.0053672 kg; lognormal SD95 1.115
  (1,1,1,3,1,4); Eners 2005
- Heat, natural gas, at industrial furnace 1MW [CH]: 1.52016 MJ; lognormal SD95 1.115
  (1,1,1,3,1,4); Eners 2005
- Transport, freight, lorry, 7.5t-16t gross weight, fleet average [CH]: 0.686 tkm; lognormal SD95 2.095
  (4,5,na,na,na,na); Standard distances 100 km
- Electricity, medium voltage, at grid [CH]: 0.080125 kWh; lognormal SD95 1.115
  (1,1,1,3,1,4); Eners 2005
- Sodium phosphate, at plant [RER]: 0.0012644 kg; lognormal SD95 1.0596
  (1,1,2,2,1,3); Eners 2005
- Transport, freight, rail, electricity with shunting [CH]: 0.0073736 tkm; lognormal SD95 2.095
  (4,5,na,na,na,na); Standard distances 600km
- Tap water, at user [CH]: 1.46013 kg; lognormal SD95 1.115
  (1,1,1,3,1,4); Eners 2005
- Transport, freight, lorry, 16t-32t gross weight, fleet average [CH]: 0.00061447 tkm; lognormal SD95 2.095
  (4,5,na,na,na,na); Standard distances 50 km
- Soda, powder, at plant [RER]: 0.0098553 kg; lognormal SD95 1.115
  (1,1,1,3,1,4); Eners 2005
- Ethanol fermentation plant [CH]: 7.3402e-11 p; lognormal SD95 3.086
  (2,4,1,5,3,4); Estimation
- Sodium sulphate, from natural sources, at plant [RER]: 0.0004831 kg; lognormal SD95 1.115
  (1,1,1,3,1,4); Eners 2005

## Inputs from nature
- Water, cooling, unspecified natural origin/m3 [resources, in water]: 0.00024721 m3; lognormal SD95 1.115
  (1,1,1,3,1,4); Eners 2005

## Emissions to nature
- TOC, Total Organic Carbon [emissions to water, river]: 0.0021633 kg; lognormal SD95 1.5647
  (1,2,1,1,3,3); Calculated from the water emissions
- DOC, Dissolved Organic Carbon [emissions to water, river]: 0.0021633 kg; lognormal SD95 1.5763
  (3,na,na,3,1,5); Extrapolation for sum parameter
- Heat, waste [emissions to air, high. pop.]: 0.28845 MJ; lognormal SD95 1.113
  (1,1,1,1,1,4); Calculated from the electricity input
- Carbon dioxide, biogenic [emissions to air, high. pop.]: -1.19288 kg; lognormal SD95 1.115
  (1,1,1,3,1,4); Calculated from the carbon balance
- BOD5, Biological Oxygen Demand [emissions to water, river]: 0.0054082 kg; lognormal SD95 1.5647
  (1,2,1,1,3,3); Calculated from the water emissions
- COD, Chemical Oxygen Demand [emissions to water, river]: 0.0054082 kg; lognormal SD95 1.5647
  (1,2,1,1,3,3); Calculated from the water emissions
- Water [emissions to water, unspecified]: 0.234849 kg; lognormal SD95 2.5196
  (5,5,5,5,5,BU:1.05); All uncertainty-values set to 5.0 by default. Balance of input water

## Sampling procedure
Literature data

## Extrapolations
Some data are derived from other or unknown plants or have been estimated.

## Sources
- Jungbluth N., Chudacoff M., Dauriat A., Dinkel F., Doka G., Faist Emmenegger M., Gnansounou E., Kljun N., Spielmann M., Stettler C., Sutter J., 2007, 2007 - LCI bioenergy - Jungbluth, Final report ecoinvent data v2.0, 17, Swiss Centre for LCI, ESU-services Ltd., Duebendorf and Uster, CH
Jungbluth N., Chudacoff M., Dauriat A., Dinkel F., Doka G., Faist Emmenegger M., Gnansounou E., Kljun N., Spielmann M., Stettler C., Sutter J. (2007) Life Cycle Inventories of Bioenergy. Final report ecoinvent data v2.0. Volume: 17. Swiss Centre for LCI, ESU. Duebendorf and Uster, CH.
Type: Measurement on site
Source: CD-ROM
First author: Jungbluth N.
Other authors: Chudacoff M., Dauriat A., Dinkel F., Doka G., Faist Emmenegger M., Gnansounou E., Kljun N., Spielmann M., Stettler C., Sutter J.
Year: 2007
Title of anthology: Final report ecoinvent data v2.0
Place of publication: Duebendorf and Uster, CH
Publisher: Swiss Centre for LCI, ESU
Volume No: 17

## Validation
Proof reading validation: Passed.; Other validation: none;
