# xx Heat, natural gas, allocation exergy, at micro gas turbine 100kWe

Dataset: EcoSpold 1, unit process
Functional unit: 1 MJ
Category: energy, obsolete / cogeneration, obsolete\gas, obsolete
Geography: CH
Time period: 2000-01 to 2005-12
Generated by: Alex Primas
accessRestrictedTo: 0
copyright: true

## General comment
The multioutput-process 'natural gas, burned in micro gas turbine delivers the coproducts 'heat, natural gas, allocation exergy, at micro gas turbine 100kWe' and 'electricity, natural gas, allocation exergy, at micro gas turbine 100kWe'. The exergy allocation is the allocation scheme suggested to be used within the ecoinvent database (e.g. in electricity mixes).;

## Included processes
The module includes fuel input, infrastructure, emissions to air, and working materials for operation.

## Geography
Natural gas input modelled for Switzerland. Process applicable in central European conditions.

## Technology
Radial turbine with recuperation for preheating the compressed air and fuel gas booster to increase gas pressure. Operation with connection to low pressure gas network. Electrical efficiency 29%, total efficiency 75%. Operation as base load engine with low partial load hours.

## Reference product
- xx Heat, natural gas, allocation exergy, at micro gas turbine 100kWe [CH]: 1 MJ
  SWITZERLAND

## Inputs from technosphere
- Storage 10000 l [RER]: 1.7935e-8 p; lognormal SD95 3.0201
  (2,3,2,1,1,4); uncertainty of life time
- Lubricating oil, at plant [RER]: 2.3043e-7 kg; lognormal SD95 1.1397
  (2,3,2,1,1,4); company data
- Disposal, used mineral oil, 10% water, to hazardous waste incineration [CH]: 2.5348e-7 kg; lognormal SD95 1.3081
  (4,3,2,1,1,5); calculated from oil input
- Natural gas, low pressure, at consumer [CH]: 0.46087 MJ; lognormal SD95 1.05
  (nA,nA,nA,nA,nA,nA); input
- Maintenance micro gas turbine 100kWe [CH]: 4.5857e-8 p; lognormal SD95 1.1397
  (2,3,2,1,1,4); uncertainty of maintenance cycle
- Micro gas turbine 100kWe [CH]: 9.1713e-9 p; lognormal SD95 3.0201
  (2,3,2,1,1,4); uncertainty of life time

## Emissions to nature
- Particulates, < 2.5 um [emissions to air, high. pop.]: 2.3043e-7 kg; lognormal SD95 3.3424
  (4,4,3,2,4,5); value for large gas power plants used as approximation
- Carbon monoxide, fossil [emissions to air, high. pop.]: 1.2904e-5 kg; lognormal SD95 5.0229
  (2,3,2,1,1,4); estimate based on different references
- Dinitrogen monoxide [emissions to air, high. pop.]: 4.6087e-7 kg; lognormal SD95 1.9377
  (4,5,3,1,4,5); value for large gas power plants used as approximation
- Sulfur dioxide [emissions to air, high. pop.]: 2.5348e-7 kg; lognormal SD95 1.0714
  (2,nA,nA,nA,1,nA); composition of natural gas
- Nitrogen oxides [emissions to air, high. pop.]: 1.4748e-5 kg; lognormal SD95 1.5269
  (2,3,2,1,1,4); estimate based on different references
- NMVOC, non-methane volatile organic compounds, unspecified origin [emissions to air, high. pop.]: 2.7652e-7 kg; lognormal SD95 1.6224
  (4,3,2,1,1,5); estimate based on few references
- Heat, waste [emissions to air, high. pop.]: 0.37377 MJ; lognormal SD95 1.1073
  (2,3,2,1,1,3); uncertainty of heating value and electric efficiency
- Methane, fossil [emissions to air, high. pop.]: 2.4887e-6 kg; lognormal SD95 1.6224
  (4,3,2,1,1,5); estimate based on few references
- Carbon dioxide, fossil [emissions to air, high. pop.]: 0.025809 kg; lognormal SD95 1.0714
  (2,nA,nA,nA,1,nA); composition of natural gas

## Sampling procedure
Literature data and manufacturer information

## Sources
- Primas A., 2007, 2007 - LCI new CHP systems - Primas, Final report ecoinvent Data v2.0, 20, Swiss Centre for LCI, B&H AG, Duebendorf and Zuerich, CH
Primas A., 0 (2007) Life Cycle Inventories of new CHP systems. Final report ecoinvent Data v2.0. Editors: 0. Volume: 20. Swiss Centre for LCI, B&H AG. Duebendorf and Zurich, CH.
Type: Measurement on site
Source: CD-ROM
First author: Primas A.
Other authors: 0
Year: 2007
Name of editors: 0
Title of anthology: Final report ecoinvent Data v2.0
Place of publication: Duebendorf and Zurich, CH
Publisher: Swiss Centre for LCI, B&H AG
Volume No: 20

## Validation
Proof reading validation: passed; Other validation: none;
