# Photovoltaic panel for PVT, single-Si, without flat glass, at regional storage

Dataset: EcoSpold 1, unit process, infrastructure
Functional unit: 1 m2
Category: heat / pvt\heating systems
Geography: RER
Time period: 2015-01 to 2020-12
Generated by: Livia Waldburger
accessRestrictedTo: 0
copyright: true

## General comment
Shares of production in Europe (15%) and import from APAC (6%) and China (79%). ALL WITHOUT FLAT GLASS! ONLY FOR USE IN PVT-SYSTEM!;
Synonyms: Solarmodul nur für PVT-Systeme, PV-module for PVT systems only, cadmium telluride, thin film, WITHOUT FLAT GLASS;

## Included processes
Consumption mix for use in Europe ONLY FOR PVT-SYSTEM (all the pv-modules are WITHOUT FLAT GLASS)!! Transport of modules from overseas.

## Technology
Modern production plant.

## Reference product
- Photovoltaic panel for PVT, single-Si, without flat glass, at regional storage [RER]: 1 m2
  Europe

## Inputs from technosphere
- Transport, freight, lorry, fleet average [RER]: 1.7832 tkm; lognormal SD95 3.0371
  (4,5,5,5,5,5,BU:2); ;
- Transport, freight, rail [RER]: 7.1327 tkm; lognormal SD95 3.0371
  (4,5,5,5,5,5,BU:2); ;
- Photovoltaic panel for PVT, single-Si, without flat glass, at plant [RER]: 0.14536 m2; lognormal SD95 3.2712
  (5,1,1,1,1,5,BU:3); ;
- Photovoltaic panel for PVT, single-Si, without flat glass, at plant [CN]: 0.79585 m2; lognormal SD95 3.2712
  (5,1,1,1,1,5,BU:3); ;
- Photovoltaic panel for PVT, single-Si, without flat glass, at plant [APAC]: 0.058789 m2; lognormal SD95 3.2712
  (5,1,1,1,1,5,BU:3); ;
- Transport, transoceanic freight ship [OCE]: 600.08 tkm; lognormal SD95 3.0371
  (4,5,5,5,5,5,BU:2); ;

## Sampling procedure
Data provided by manufacturer and literature data on worldwide module production.

## Sources
- Kaegi T., Waldburger L., Kern C., Roberts G., Zschokke M., Conte F., Weber L., 2021, 2021 - LCI heating systems - Kaegi, Carbotech im Auftrag des BAFU, Carbotech AG, Zuerich, CH
Kägi Thomas, Livia Waldburger, Cyril Kern, Gavin Roberts, Mischa Zschokke, Flora Conte, Lea Weber (2020) LCI of heating systems. Carbotech im Auftrag des BAFU. Carbotech AG. Zürich. CH.
Type: Separate publication
Source: Report
First author: Kägi Thomas
Other authors: Livia Waldburger, Cyril Kern, Gavin Roberts, Mischa Zschokke, Flora Conte, Lea Weber
Year: 2020
Title of anthology: Carbotech im Auftrag des BAFU
Place of publication: Zürich. CH
Publisher: Carbotech AG

## Validation
Proof reading validation: 14.09.2020; Other validation: Z:\Schreibtisch\WinShare\BAFU Heizsysteme\_A-Konvertieren\PVT\[EcoSpold_photovoltaic panel for PVT, single-Si, without tempering flat glass, at regional storage_v0.1_lwa.xlsx]X-Process;
