# Compressor Bitzer

Dataset: EcoSpold 1, unit process, infrastructure
Functional unit: 1 kg
Category: energy supply, kbob recommendation / heat pumps, waste water
Geography: DE
Time period: 2004-01 to 2004-12
Share of production covered: 0 %
Generated by: Matthias Tuchschmid
accessRestrictedTo: 0
copyright: true

## General comment
This data set describes the production of the a compressor of the Bitzer company from literature source. Data regarding to production (energy use, working materials, waste) stems from company data, requirements of half-finished products from literature. Transport distances are estimated.;

## Included processes
This data set describes the production of the a compressor of the Bitzer company including energy use, use of semi-finished products and working materials, waste treatment and transports of components.

## Geography
This data represent the assembling in Germany.

## Technology
Data set for a 7.8 kWth compressor (about 30 kg).

## Time period
The literature source from 1999 uses company specific of year 1997 for the requirements by the production, and data from 1996 for the material requirements.

## Reference product
- Compressor Bitzer [DE]: 1 kg

## Inputs from technosphere
All rows: lognormal SD95 1.218
- Electricity, medium voltage, at grid [CH]: 1.4722 kWh
  (1,3,2,1,3,3); Literature
- Sawnwood, production mix, softwood, dried (u=20%), planed, at sawmill [RER]: 5.7407e-5 m3
  (1,3,2,1,3,3); Literature
- Natural gas, burned in industrial furnace 1MWth [CH]: 1 MJ
  (1,3,2,1,3,3); Literature
- Aluminium, primary, at plant [RER]: 0.064 kg
  (1,3,2,1,3,3); Literature
- Light fuel oil, burned in industrial furnace 1MW, non-modulating [CH]: 5.6 MJ
  (1,3,2,1,3,3); Literature
- Polystyrene, expandable, at plant [RER]: 0.0003 kg
  (1,3,2,1,3,3); Literature
- Reinforcing steel, at plant [RER]: 0.524 kg
  (1,3,2,1,3,3); Literature
- Lubricating oil, at plant [RER]: 0.032 kg
  (1,3,2,1,3,3); Literature
- Transport, freight, lorry, fleet average [RER]: 0.57 tkm
  (1,3,2,1,3,3); Literature
- Paper, wood-containing, LWC, at regional storage [CH]: 0.023 kg
  (1,3,2,1,3,3); Literature
- Disposal, hazardous waste, 25% water, to hazardous waste incineration [CH]: 0.0254 kg
  (1,3,2,1,3,3); Literature
- Disposal, used mineral oil, 10% water, to hazardous waste incineration [CH]: 0.0017 kg
  (1,3,2,1,3,3); Literature
- Water, decarbonised, at plant [RER]: 5.4 kg
  (1,3,2,1,3,3); Literature
- Alkyd paint, white, 60% in solvent, at plant [RER]: 0.011 kg
  (1,3,2,1,3,3); Literature
- Copper, at regional storage [RER]: 0.134 kg
  (1,3,2,1,3,3); Literature
- Disposal, municipal solid waste, 22.9% water, to municipal incineration [CH]: 0.017 kg
  (1,3,2,1,3,3); Literature
- Cast iron, at plant [RER]: 0.314 kg
  (1,3,2,1,3,3); Literature

## Sampling procedure
literature

## Extrapolations
production requirements are calculated per kg product

## Sources
- Faist Emmenegger M., Frischknecht R., 2005, 2005 - LCA heat pump raw sewage - Faist Emmenegger, -, ESU-services Ltd., Uster, CH
Rolf Frischknecht, Mireille Faist Emmenegger (2004) Nutzwärmebereitstellung mit Wärmepumpe für Rohabwasser. Uster.
Type: Separate publication
Source: Interner Bericht
First author: Rolf Frischknecht
Other authors: Mireille Faist Emmenegger
Year: 2004
Place of publication: Uster

## Validation
Proof reading validation: automatic validation in Excel; Other validation: none;
