# Mischmetal, primary, at plant

Dataset: EcoSpold 1, unit process
Functional unit: 1 kg
Category: metals / non ferro
Geography: GLO
Time period: 1968-01 to 2002-12
Generated by: Mischa Classen
accessRestrictedTo: 0
copyright: true

## General comment
Production of Mischmetal from bastnaesite by wet chemical attack and fused salt electrolysis. The product contains 53% Ce, 21% La, 17% Nd, 6% Pr, 0.2% Sm, the rest consistin of Eu, Gd and others. The overall quality of the data is poor. It however may be used as alloying constituent in HSLA steels, nodular iron and hydrogen storage in metal hydride batteries (LaNi5).This dataset is not to be used when mischmetal is a substantial part of the system modelled ;
CAS number: 008049-20-5;
Synonyms: cerium mischmetal, rare earth mischmetal, misch metal;

## Included processes
Includes the basic raw materials consumed and energy for precipitation reaction, filtration and drying. No direct emissions or infrastructure are included.

## Geography
This dataset production facilities scattered over the world. Most upstream processes such as electricity demand and chemicals consumption are approximated with datasets for European situation.

## Technology
Production from bastnaesite concentrate that is converted to its chloride and reduced with fused salt electrolysis. Electrolysis approximated with processes from aluminium industry.

## Reference product
- Mischmetal, primary, at plant [GLO]: 1 kg
  Global

## Inputs from technosphere
- Transport, transoceanic freight ship [OCE]: 28.66 tkm; lognormal SD95 2.0989
  (2,1,1,3,3,5,5)
- Sodium chloride, powder, at plant [RER]: 1 kg; lognormal SD95 1.9285
  (5,5,5,3,3,5,3)
- Aluminium electrolysis, plant [RER]: 2.31e-10 p; lognormal SD95 3.9516
  (2,2,5,3,5,5,9)
- Transport, freight, rail [RER]: 3.9494 tkm; lognormal SD95 2.0989
  (2,1,1,3,3,5,5)
- Rare earth concentrate, 70% REO, from bastnasite, at beneficiation [CN]: 2.866 kg; lognormal SD95 1.9285
  Variation based on observed variability in REO content
- Disposal, slag from MG silicon prod., 0% water, to construction waste landfill [CH]: 0.2 kg; lognormal SD95 1.9285
  (5,5,5,3,3,5,6)
- Transport, freight, lorry, fleet average [RER]: 0.65823 tkm; lognormal SD95 2.0989
  (2,1,1,3,3,5,5)
- Sodium hydroxide, 50% in H2O, production mix, at plant [RER]: 1.3987 kg; lognormal SD95 1.6222
  (1,2,4,3,4,5,3)
- Disposal, non-sulfidic tailings, off-site [GLO]: 3.2308 kg; lognormal SD95 1.677
  (4,2,4,3,4,5,6)
- Kaolin, at plant [RER]: 0.2 kg; lognormal SD95 1.9285
  (5,5,5,3,3,5,3)
- Electricity, production mix: 14.6 kWh; lognormal SD95 1.8799
  (4,2,5,3,4,5,2)
- Chemical plant, organics [RER]: 4e-10 p; lognormal SD95 3.1039
  (3,1,1,3,3,5,9)
- Cathode, aluminium electrolysis [RER]: 0.0181 kg; lognormal SD95 1.677
  (4,2,5,3,3,5,3)
- Natural gas, burned in industrial furnace 1MWth [CH]: 5.3042 MJ; lognormal SD95 2.2861
  (2,2,5,3,5,5,1)
- Hydrochloric acid, 30% in H2O, at plant [RER]: 2.3176 kg; lognormal SD95 1.6222
  (1,2,4,3,4,5,3)
- Anode, aluminium electrolysis [RER]: 0.448 kg; lognormal SD95 1.677
  (4,2,5,3,3,5,3)

## Emissions to nature
- Heat, waste [emissions to air, unspecified]: 52.56 MJ; lognormal SD95 1.8336
  (2,2,5,3,4,5,13)
- Hydrogen chloride [emissions to air, unspecified]: 0.000539 kg; lognormal SD95 2.7734
  (5,5,5,3,5,5,31)
- Carbon dioxide, fossil [emissions to air, unspecified]: 0.30772 kg; lognormal SD95 1.677
  (4,2,4,3,4,5,14)

## Sampling procedure
Literature

## Extrapolations
see Geography and Technology

## Uncertainty adjustments
This dataset bases on old process description and rough approximation.

## Sources
- Hischier R., Classen M., Lehmann M., Scharnhorst W., 2007, 2007 - LCI electric and electronic equipment - Hischier, Final report ecoinvent Data v2.0, 18, Swiss Centre for LCI, Empa - TSL, Duebendorf and St. Gallen, CH
Hischier R., Classen M., Lehmann M., Scharnhorst W. (2007) Life Cycle Inventories of Electric and Electronic Equipment - Production, Use & Disposal. Final report ecoinvent Data v2.0. Volume: 18. Swiss Centre for LCI, Empa - TSL. Duebendorf and St. Gallen, CH.
Type: Measurement on site
Source: CD-ROM
First author: Hischier R.
Other authors: Classen M., Lehmann M., Scharnhorst W.
Year: 2007
Title of anthology: Final report ecoinvent Data v2.0
Place of publication: Duebendorf and St. Gallen, CH
Publisher: Swiss Centre for LCI, Empa - TSL
Volume No: 18
Original title: Life Cycle Inventories of Electric and Electronic Equipment - Production, Use & Disposal

## Validation
Proof reading validation: Passed; Other validation: none;
