# Electricity, nuclear, at power plant pressure water reactor

Dataset: EcoSpold 1, unit process
Functional unit: 1 kWh
Category: electricity by fuel / waste\nuclear\pwr
Geography: CH
Time period: 2000-01 to 2000-12
Generated by: Roberto Dones
accessRestrictedTo: 0
copyright: true

## General comment
PSI data (BFE project 407, Christian Bauer, April 2012).;

## Included processes
The module includes fuel elements, chemicals, and diesel requirements as well as the relevant transport requirements. Water use (fresh and decarbonized) for cooling is included. Considered radioactive waste streams are: spent fuel to reprocessing and conditioning; operational low active waste for conditioning in the intermediate repository; and, contaminated waste from dismantling. Non-radioactive wastes are accounted for.

## Geography
Swiss data of one specific plant for requirements and all Swiss PWRs for emissions.

## Technology
Best current technology for fuel element. Standard technology for commercial operation.

## Reference product
- Electricity, nuclear, at power plant pressure water reactor [CH]: 1 kWh
  SWITZERLAND

## Inputs from technosphere
- Anionic resin, at plant [CH]: 6.43e-8 kg; lognormal SD95 1.1
  own estimation on data from utility
- Cement, unspecified, at plant [CH]: 9.19e-7 kg; lognormal SD95 1.2
  extrapolation from another plant type
- Nuclear spent fuel, in reprocessing, at plant [RER]: 9.84e-7 kg; lognormal SD95 1.05
  referring to current policy
- Disposal, hazardous waste, 25% water, to hazardous waste incineration [CH]: 9.7e-7 kg; lognormal SD95 1.2
  extrapolation from another plant type
- Disposal, separator sludge, 90% water, to hazardous waste incineration [CH]: 2.19e-6 kg; lognormal SD95 1.2
  extrapolation from another plant type
- Nuclear power plant, pressure water reactor 1000MW [CH]: 2.58e-12 p
  50a lifetime
- Acetylene, at regional storehouse [CH]: 3.6e-8 kg; lognormal SD95 1.2
  own estimation
- Hydrogen, liquid, at plant [RER]: 1.03e-5 kg; lognormal SD95 1.2
  extrapolation from another plant type
- Oxygen, liquid, at plant [RER]: 1.67e-5 kg; lognormal SD95 1.2
  extrapolation from another plant type
- Radioactive waste, in interim storage, for final repository LLW [CH]: 1.76e-9 m3; lognormal SD95 1.1
  own estimation on data from utility
- Chemicals organic, at plant [GLO]: 1.38e-6 kg; lognormal SD95 1.15
  own estimation on data from utility and extrapolated
- Chemicals inorganic, at plant [GLO]: 2.34e-6 kg; lognormal SD95 1.2
  own estimation on data from utility and extrapolated
- U enriched 4.75%, in fuel element for LWR, at nuclear fuel fabrication plant [CH]: 2.17e-6 kg; lognormal SD95 1.1
  according to burnup of 60 MWd/kgU
- Cast iron, at plant [RER]: 1.29e-7 kg; lognormal SD95 1.2
  extrapolation from another plant type
- Boric acid, anhydrous, powder, at plant [RER]: 6.43e-8 kg; lognormal SD95 1.1
  own estimation on data from utility
- Bitumen, at refinery [CH]: 7.71e-7 kg; lognormal SD95 1.2
  extrapolation from another plant type
- Argon, liquid, at plant [RER]: 2.61e-5 kg; lognormal SD95 1.2
  extrapolation from another plant type
- Transport, freight, lorry, fleet average [RER]: 7.72e-6 tkm; lognormal SD95 2.1
  standard
- Nitrogen, liquid, at plant [RER]: 6.17e-5 kg; lognormal SD95 1.2
  extrapolation from another plant type
- Radioactive waste, in final repository for nuclear waste LLW [CH]: 2.84e-8 m3; lognormal SD95 1.3
  data possibly overestimated
- Reinforcing steel, at plant [RER]: 4.7e-7 kg; lognormal SD95 1.2
  extrapolation from another plant type
- Radioactive waste, in interim storage conditioning [CH]: 4.32e-11 m3; lognormal SD95 1.1
  own estimation on data from utility
- Flat glass, coated, at plant [RER]: 4.37e-6 kg; lognormal SD95 1.2
  extrapolation from another plant type
- Carbon dioxide liquid, at plant [RER]: 1.67e-7 kg; lognormal SD95 1.2
  extrapolation from another plant type
- Diesel, burned in diesel-electric generating set [GLO]: 0.00037 MJ; lognormal SD95 1.2
  extrapolation from another plant type
- Concrete, normal, at plant [CH]: 9.74e-9 m3; lognormal SD95 1.3
  own estimation
- Cationic resin, at plant [CH]: 6.43e-8 kg; lognormal SD95 1.1
  own estimation on data from utility
- Lubricating oil, at plant [RER]: 1.62e-6 kg; lognormal SD95 1.2
  extrapolation from another plant type
- Paper, woodfree, coated, at integrated mill [RER]: 6.43e-7 kg; lognormal SD95 1.2
  extrapolation from another plant type
- Water, decarbonised, at plant [RER]: 2.68 kg; lognormal SD95 1.2
  own estimation
- Nuclear spent fuel, in conditioning, at plant [CH]: 1.48e-6 kg; lognormal SD95 1.05
  referring to current policy
- Disposal, used mineral oil, 10% water, to hazardous waste incineration [CH]: 1.63e-6 kg; lognormal SD95 1.2
  extrapolation from another plant type
- Sodium hypochlorite, 15% in H2O, at plant [RER]: 1.73e-5 kg; lognormal SD95 1.2
  extrapolation from another plant type
- Transport, freight, lorry, 16t-32t gross weight, fleet average [CH]: 2.6e-5 tkm; lognormal SD95 2.1
  standard
- Steel, low-alloyed, at plant [RER]: 1.6e-6 kg; lognormal SD95 1.5
  own assumption

## Inputs from nature
- Water, river [resources, in water]: 0.00575 m3; lognormal SD95 1.2
  own estimation

## Emissions to nature
- Ruthenium-103 [emissions to water, river]: 2.85e-7 kBq; lognormal SD95 1.5
  uncertainty declared in reports for radioactive releases
- Antimony-124 [emissions to air, low. pop.]: 4.75e-10 kBq; lognormal SD95 1.5
  uncertainty declared in reports for radioactive releases
- Tellurium-123m [emissions to water, river]: 1.57e-6 kBq; lognormal SD95 1.5
  uncertainty declared in reports for radioactive releases
- Niobium-95 [emissions to water, river]: 3.07e-6 kBq; lognormal SD95 1.5
  uncertainty declared in reports for radioactive releases
- Antimony-125 [emissions to air, low. pop.]: 2.34e-8 kBq; lognormal SD95 1.5
  uncertainty declared in reports for radioactive releases
- Radioactive species, alpha emitters [emissions to water, river]: 3.02e-8 kBq; lognormal SD95 1.5
  uncertainty declared in reports for radioactive releases
- Sodium-24 [emissions to water, river]: 9.98e-6 kBq; lognormal SD95 1.5
  uncertainty declared in reports for radioactive releases
- Iodine-131 [emissions to air, low. pop.]: 3.38e-6 kBq; lognormal SD95 1.5
  uncertainty declared in reports for radioactive releases
- Cesium-137 [emissions to water, river]: 0.0001 kBq; lognormal SD95 1.5
  uncertainty declared in reports for radioactive releases
- Barium-140 [emissions to air, low. pop.]: 3.17e-10 kBq; lognormal SD95 1.5
  uncertainty declared in reports for radioactive releases
- Manganese-54 [emissions to water, river]: 1.31e-5 kBq; lognormal SD95 1.5
  uncertainty declared in reports for radioactive releases
- Radioactive species, other beta emitters [emissions to air, low. pop.]: 8.67e-8 kBq; lognormal SD95 1.5
  uncertainty declared in reports for radioactive releases
- Iodine-133 [emissions to air, low. pop.]: 1.82e-6 kBq; lognormal SD95 1.5
  uncertainty declared in reports for radioactive releases
- Noble gases, radioactive, unspecified [emissions to air, low. pop.]: 0.259 kBq; lognormal SD95 1.5
  uncertainty declared in reports for radioactive releases
- Krypton-85m [emissions to air, low. pop.]: 0.00987 kBq; lognormal SD95 1.5
  uncertainty declared in reports for radioactive releases
- Zirconium-95 [emissions to air, low. pop.]: 5.78e-8 kBq; lognormal SD95 1.5
  uncertainty declared in reports for radioactive releases
- Strontium-89 [emissions to water, river]: 3.65e-6 kBq; lognormal SD95 1.5
  uncertainty declared in reports for radioactive releases
- Cobalt-57 [emissions to water, river]: 8.92e-6 kBq; lognormal SD95 1.5
  uncertainty declared in reports for radioactive releases
- Cesium-136 [emissions to water, river]: 2.81e-7 kBq; lognormal SD95 1.5
  uncertainty declared in reports for radioactive releases
- Zirconium-95 [emissions to water, river]: 1.5e-6 kBq; lognormal SD95 1.5
  uncertainty declared in reports for radioactive releases
- Xenon-135 [emissions to air, low. pop.]: 0.166 kBq; lognormal SD95 1.5
  uncertainty declared in reports for radioactive releases
- Lanthanum-140 [emissions to water, river]: 4.95e-7 kBq; lognormal SD95 1.5
  uncertainty declared in reports for radioactive releases
- Iron-59 [emissions to water, river]: 4.2e-7 kBq; lognormal SD95 1.5
  uncertainty declared in reports for radioactive releases
- Antimony-125 [emissions to water, river]: 4.17e-5 kBq; lognormal SD95 1.5
  uncertainty declared in reports for radioactive releases
- Cobalt-60 [emissions to air, low. pop.]: 7.57e-8 kBq; lognormal SD95 1.5
  uncertainty declared in reports for radioactive releases
- Cesium-134 [emissions to water, river]: 3.77e-6 kBq; lognormal SD95 1.5
  uncertainty declared in reports for radioactive releases
- Cerium-141 [emissions to water, river]: 1.76e-7 kBq; lognormal SD95 1.5
  uncertainty declared in reports for radioactive releases
- Cobalt-58 [emissions to water, river]: 0.00114 kBq; lognormal SD95 1.5
  uncertainty declared in reports for radioactive releases
- Niobium-95 [emissions to air, low. pop.]: 1.12e-10 kBq; lognormal SD95 1.5
  uncertainty declared in reports for radioactive releases
- Cobalt-58 [emissions to air, low. pop.]: 1.64e-8 kBq; lognormal SD95 1.5
  uncertainty declared in reports for radioactive releases
- Cesium-137 [emissions to air, low. pop.]: 7.28e-9 kBq; lognormal SD95 1.5
  uncertainty declared in reports for radioactive releases
- Xenon-133 [emissions to air, low. pop.]: 0.604 kBq; lognormal SD95 1.5
  uncertainty declared in reports for radioactive releases
- Silver-110 [emissions to water, river]: 4.43e-6 kBq; lognormal SD95 1.5
  uncertainty declared in reports for radioactive releases
- Strontium-90 [emissions to water, river]: 1.3e-6 kBq; lognormal SD95 1.5
  uncertainty declared in reports for radioactive releases
- Antimony-124 [emissions to water, river]: 4.13e-5 kBq; lognormal SD95 1.5
  uncertainty declared in reports for radioactive releases
- Silver-110 [emissions to air, low. pop.]: 3.13e-9 kBq; lognormal SD95 1.5
  uncertainty declared in reports for radioactive releases
- Heat, waste [emissions to air, low. pop.]: 7.65 MJ; lognormal SD95 1.03
  uncertainty on efficiency
- Molybdenum-99 [emissions to water, river]: 6e-9 kBq; lognormal SD95 1.5
  uncertainty declared in reports for radioactive releases
- Cerium-144 [emissions to water, river]: 4.82e-7 kBq; lognormal SD95 1.5
  uncertainty declared in reports for radioactive releases
- Iodine-131 [emissions to water, river]: 8.21e-6 kBq; lognormal SD95 1.5
  uncertainty declared in reports for radioactive releases
- Zinc-65 [emissions to water, river]: 2.63e-7 kBq; lognormal SD95 1.5
  uncertainty declared in reports for radioactive releases
- Chromium-51 [emissions to water, river]: 7.56e-6 kBq; lognormal SD95 1.5
  uncertainty declared in reports for radioactive releases
- Cobalt-60 [emissions to water, river]: 0.000395 kBq; lognormal SD95 1.5
  uncertainty declared in reports for radioactive releases
- Antimony-122 [emissions to water, river]: 9.04e-7 kBq; lognormal SD95 1.5
  uncertainty declared in reports for radioactive releases
- Iodine-133 [emissions to water, river]: 4.16e-7 kBq; lognormal SD95 1.5
  uncertainty declared in reports for radioactive releases
- Aerosols, radioactive, unspecified [emissions to air, low. pop.]: 5.37e-9 kBq; lognormal SD95 1.5
  uncertainty declared in reports for radioactive releases
- Technetium-99m [emissions to water, river]: 2.81e-6 kBq; lognormal SD95 1.5
  uncertainty declared in reports for radioactive releases
- Tellurium-132 [emissions to water, river]: 8.42e-8 kBq; lognormal SD95 1.5
  uncertainty declared in reports for radioactive releases
- Hydrogen-3, Tritium [emissions to water, river]: 1.86 kBq; lognormal SD95 1.5
  uncertainty declared in reports for radioactive releases
- Carbon-14 [emissions to air, low. pop.]: 0.00764 kBq; lognormal SD95 1.5
  uncertainty declared in reports for radioactive releases
- Water [emissions to water, unspecified]: 5.4625 kg; lognormal SD95 2.5196
  (5,5,5,5,5,BU:1.05); All uncertainty-values set to 5.0 by default. Balance of input water

## Sampling procedure
Literature, statistics of radioactive emissions, and information from operators.

## Sources
- Bauer C., Frischknecht R., Eckle P., Flury K., Neal T., Papp K., Schori S., Simons A., Stucki M., Treyer K., 2012, 2012 - LCA electricity generation in Switzerland - Uster, -, 407, Swiss Centre for LCI, ESU-services Ltd., PSI, Uster and Villigen, CH
Ch. Bauer, Frischknecht (2012) Umweltauswirkungen Strom. Volume: 407. PSI. Uster und Villigen, CH.
Type: Separate publication
Source: CD-ROM
First author: Ch. Bauer
Other authors: Frischknecht
Year: 2012
Place of publication: Uster und Villigen, CH
Publisher: PSI
Volume No: 407
