# Use, IP network, videoconference

Dataset: EcoSpold 1, unit process
Functional unit: 1 hr
Category: computers & network / use, obsolete\computers & network
Geography: CH
Time period: 2005-01 to 2009-12
Generated by: Marianne Leuenberger
accessRestrictedTo: 0
copyright: true

## General comment
The data set represents average values for one hour of IP network use during a videoconference per participant;

## Included processes
This data set includes the use of the IP core network for videoconference (0.7 Mbit/s) data exchange for one hour, taking into account IP router use and electricity consumption.

## Technology
IP core network device (IP router) derived from Cisco Service Router 1800 Series, maximal data rate: 100 Mbit/s, realistic: 25 Mbit/s. Power demand: 0.0042 kW at 1 Mbit/s. Band width for videoconference: 0.7Mbit/s

## Reference product
- Use, IP network, videoconference [CH]: 1 hr
  SWITZERLAND

## Inputs from technosphere
- Electricity, low voltage, at grid [CH]: 0.0882 kWh; lognormal SD95 1.3277
  (4,3,1,1,3,4); Electricity demand: 4.2Wh ADSL, 1.3Wh DSLAM per port, 4.2Wh/Router at 1MBit/s
- Router, IP network, at server [GLO]: 9.589e-6 p; lognormal SD95 3.1066
  (4,3,1,1,3,4); 18 routers bandwidth 25MBits

## Extrapolations
Average technology

## Sources
- Spielmann M., Bauer C., Dones R., Tuchschmid M., 2007, 2007 - Transport services - Spielmann, Final report ecoinvent Data v2.0, 14, Swiss Centre for LCI, PSI, ESU-services Ltd., Duebendorf, Villigen and Uster, CH
Spielmann M., Dones R; Bauer C. (2007) Life Cycle Inventories of Transport Services. Final report ecoinvent Data v2.0. Volume: 14. Issue: 0. Swiss Centre for LCI, PSI. Dübendorf and Villigen, CH.
Type: Measurement on site
Source: CD-ROM
First author: Spielmann M.
Other authors: Dones R; Bauer C.
Year: 2007
Title of anthology: Final report ecoinvent Data v2.0
Place of publication: Dübendorf and Villigen, CH
Publisher: Swiss Centre for LCI, PSI
Volume No: 14
Issue No: 0

## Validation
Proof reading validation: 26.01.2010; Other validation: C:\Dokumente und Einstellungen\Marianne\Eigene Dateien\Projekte\277_Mobitool\Ecoinvent\Review\Upload 1\[Ecospold_Use_Devices-v1.1.xls]X-Process;
