# Delivery and return well for groundwater heat pump, 9m,

Dataset: EcoSpold 1, unit process, infrastructure
Functional unit: 1 p
Category: heat / heat pumps\heating systems
Geography: CH
Generated by: Livia Waldburger
accessRestrictedTo: 0
copyright: true

## General comment
Inventory for the production of a delivery well 9m deep and a return well 7m deep for a groundwater heat pump with a lifetime of 20 years.;
Synonyms: Förder- und Schluckbrunenn für Grundwasser Wärmepumpe;

## Included processes
Infrastructure of the delivery and return well which is connected to the groundwater, including all material inputs (pipes and inert materials) and also the energy use for building the wells with machines.

## Geography
Data apply to the supply in Switzerland.

## Technology
Industry data.

## Reference product
- Delivery and return well for groundwater heat pump, 9m, [CH]: 1 p
  SWITZERLAND

## Inputs from technosphere
- Gravel, round, at mine [CH]: 288.97, 228.57 kg (2 entries); lognormal SD95 1.3488
  (3,3,3,2,3,5,BU:1.05); ;
- Steel product manufacturing, average metal working [RER]: 1.894 kg; lognormal SD95 1.3488
  (3,3,3,2,3,5,BU:1.05); ;
- Extrusion, plastic pipes [RER]: 6.7898 kg; lognormal SD95 1.8928
  (5,5,3,3,4,5,BU:1.05); ;
- Extrusion, plastic pipes [RER]: 28.489, 10.679 kg (2 entries); lognormal SD95 1.3488
  (3,3,3,2,3,5,BU:1.05); ;
- Transport, freight, lorry, 16t-32t gross weight, fleet average [CH]: 15.175 tkm; lognormal SD95 2.3385
  (4,4,2,3,4,5,BU:2); ;
- Steel, low-alloyed, at plant [RER]: 1.894 kg; lognormal SD95 1.3488
  (3,3,3,2,3,5,BU:1.05); ;
- Transport, freight, rail, diesel, without particle filter [CH]: 74.226 tkm; lognormal SD95 2.3385
  (4,4,2,3,4,5,BU:2); ;
- Aluminium, primary, at plant [RER]: 0.3 kg; lognormal SD95 1.6402
  (5,3,3,2,3,5,BU:1.05); ;
- Disposal, inert waste, 5% water, to construction waste landfill [CH]: 518.8 kg; lognormal SD95 1.6402
  (5,3,3,2,3,5,BU:1.05); ;
- Diesel, burned in building machine, average [CH]: 1051.3, 817.7 MJ (2 entries); lognormal SD95 2.3402
  (5,3,3,2,3,5,BU:2); ;
- Aluminium product manufacturing, average metal working [RER]: 0.3 kg; lognormal SD95 1.6402
  (5,3,3,2,3,5,BU:1.05); ;
- Polyvinylchloride, at regional storage [RER]: 6.7898 kg; lognormal SD95 1.8928
  (5,5,3,3,4,5,BU:1.05); ;
- Clay plaster, at plant [CH]: 70.053, 50.793 kg (2 entries); lognormal SD95 1.3488
  (3,3,3,2,3,5,BU:1.05); ;
- Polyvinylchloride, at regional storage [RER]: 28.489, 10.679 kg (2 entries); lognormal SD95 1.3488
  (3,3,3,2,3,5,BU:1.05); ;
- Disposal, municipal solid waste, 22.9% water, to municipal incineration [CH]: 451.77 kg; lognormal SD95 1.6402
  (5,3,3,2,3,5,BU:1.05); ;

## Sampling procedure
Data provided by manufacturer

## Sources
- Kaegi T., Waldburger L., Kern C., Roberts G., Zschokke M., Conte F., Weber L., 2021, 2021 - LCI heating systems - Kaegi, Carbotech im Auftrag des BAFU, Carbotech AG, Zuerich, CH
Kägi Thomas, Livia Waldburger, Cyril Kern, Gavin Roberts, Mischa Zschokke, Flora Conte, Lea Weber (2020) LCI of heating systems. Carbotech im Auftrag des BAFU. Carbotech AG. Zürich. CH.
Type: Separate publication
Source: Report
First author: Kägi Thomas
Other authors: Livia Waldburger, Cyril Kern, Gavin Roberts, Mischa Zschokke, Flora Conte, Lea Weber
Year: 2020
Title of anthology: Carbotech im Auftrag des BAFU
Place of publication: Zürich. CH
Publisher: Carbotech AG

## Validation
Proof reading validation: 19.02.2021; Other validation: Z:\Schreibtisch\WinShare\BAFU Heizsysteme\A_zum konvertieren\WP\[EcoSpold_delivery and return well for groundwater heat pump_ 9m CH _v0.1_lwa.xlsx]X-Process;
