# CPU, network equipment, at plant

Dataset: EcoSpold 1, unit process
Functional unit: 1 kg
Category: electronics / internet network
Geography: GLO
Time period: 2023-01 to 2029-12
Synonyms: Netzwerkkomponente; Zentraleinheit; CPU
Generated by: Lugas Raka Adrianto, Maulana Permana Ajie, Didier Beloin-Saint-Pierre
accessRestrictedTo: 0
copyright: false

## General comment
The data set represents the production of CPUs for data centers;

## Included processes
The dataset is based on an average three CPUs found in rack and blade servers. According to literature, the logic IC type is used. The CPU housing is also considered.

## Geography
Data for global average for CPUs

## Technology
Typical CPUs for data centers

## Reference product
- CPU, network equipment, at plant [GLO]: 1 kg

## Inputs from technosphere
All rows: lognormal SD95 1.35
- Acrylonitrile-butadiene-styrene copolymer, ABS, at plant [RER]: 0.0894 kg
  (3,3,3,3,3,5,BU:1.05)
- Aluminium alloy, AlMg3, at plant [RER]: 0.465 kg
  (3,3,3,3,3,5,BU:1.05)
- Capacitor, Tantalum-, through-hole mounting, at plant [GLO]: 0.0268 kg
  (3,3,3,3,3,5,BU:1.05)
- xx Cathode, copper, primary copper production [GLO]: 0.0894 kg
  (3,3,3,3,3,5,BU:1.05)
- Gold, at regional storage [RER]: 0.00141 kg
  (3,3,3,3,3,5,BU:1.05)
- Integrated circuit, IC, memory type, at plant [GLO]: 0.0627 kg
  (3,3,3,3,3,5,BU:1.05)
- Printed wiring board, mounted, Desktop PC mainboard, at plant [GLO]: 0.0676 kg
  (3,3,3,3,3,5,BU:1.05)
- Sheet rolling, aluminium [RER]: 0.465 kg
  (3,3,3,3,3,5,BU:1.05)
- Sheet rolling, copper [RER]: 0.0894 kg
  (3,3,3,3,3,5,BU:1.05)
- Sheet rolling, steel [RER]: 0.275 kg
  (3,3,3,3,3,5,BU:1.05)
- Silicone product, at plant [RER]: 0.000704 kg
  (3,3,3,3,3,5,BU:1.05)
- Steel, low-alloyed, at plant [RER]: 0.275 kg
  (3,3,3,3,3,5,BU:1.05)

## Sampling procedure
Literature & own estimations

## Extrapolations
Average technology

## Sources
- Raka Adrianto L., Permana Ajie M., Beloin-Saint-Pierre D., 2024, 2024 - LCI ICT sector - Raka Adrianto, Empa, St. Gallen, CH

## Validation
Proof reading validation: Passed, Other validation: none, Validator: Mischa Zschokke, Company: Carbotech, Country: CH
