# Light fuel oil, burned in boiler 10kW, non-modulating (proj. 210)

Dataset: EcoSpold 1, unit process
Functional unit: 1.061 MJ
Category: energy supply, kbob recommendation / fuels (heating), fossil
Geography: CH
Time period: 2004-01 to 2004-12
Generated by: Thomas Heck
accessRestrictedTo: 0
copyright: true

## General comment
adapted from ecoinvent v2.0, with modification in order to express the heat as the upper heating value. This dataset is based on the input of fuel with a lower heating value of 42.7 MJ per kg;

## Included processes
Direct air emissions from combustion, waste and electricity use.

## Geography
Assumption for operation in Switzerland.

## Technology
Non-modulating boiler sold in 2000.

## Time period
New data for regulated emissions like NOx, particles, other figures are partly based on older literature data.

## Reference product
- Light fuel oil, burned in boiler 10kW, non-modulating (proj. 210) [CH]: 1.061 MJ

## Inputs from technosphere
- Electricity, low voltage, at grid [CH]: 0.0036028 kWh; lognormal SD95 1.1724
  (3,3,3,1,1,3); Literature
- Light fuel oil, at regional storage [CH]: 0.02342 kg; lognormal SD95 1.1724
  (3,3,3,1,1,3); Literature

## Emissions to nature
- Zinc [emissions to air, high. pop.]: 7e-10 kg; lognormal SD95 5.0357
  (3,3,3,1,1,3); Literature
- Dinitrogen monoxide [emissions to air, high. pop.]: 7e-7 kg; lognormal SD95 4.0331
  (3,3,3,1,1,3); Literature, basic uncertainty estimated = 4
- Carbon dioxide, fossil [emissions to air, high. pop.]: 0.074 kg; lognormal SD95 1.1724
  (3,3,3,1,1,3); Literature
- Methane, fossil [emissions to air, high. pop.]: 2e-7 kg; lognormal SD95 6.0384
  (3,3,3,1,1,3); Literature, basic uncertainity estimated = 6
- Pentane [emissions to air, high. pop.]: 1e-7 kg; lognormal SD95 6.0384
  (3,3,3,1,1,3); Literature, basic uncertainity estimated = 6
- Hydrocarbons, aliphatic, unsaturated [emissions to air, high. pop.]: 2e-8 kg; lognormal SD95 6.0384
  (3,3,3,1,1,3); Literature, basic uncertainity estimated = 6
- Benzaldehyde [emissions to air, high. pop.]: 6e-9 kg; lognormal SD95 6.0384
  (3,3,3,1,1,3); Literature, basic uncertainity estimated = 6
- Heat, waste [emissions to air, high. pop.]: 1.0716 MJ; lognormal SD95 1.1724
  (3,3,3,1,1,3); Literature
- Benzene [emissions to air, high. pop.]: 2e-8 kg; lognormal SD95 6.0384
  (3,3,3,1,1,3); Literature, basic uncertainity estimated = 6
- Hydrocarbons, aliphatic, alkanes, unspecified [emissions to air, high. pop.]: 2.5e-7 kg; lognormal SD95 6.0384
  (3,3,3,1,1,3); Literature, basic uncertainity estimated = 6
- Toluene [emissions to air, high. pop.]: 1e-8 kg; lognormal SD95 6.0384
  (3,3,3,1,1,3); Literature, basic uncertainity estimated = 6
- Hydrocarbons, aromatic [emissions to air, high. pop.]: 2e-8 kg; lognormal SD95 6.0384
  (3,3,3,1,1,3); Literature, basic uncertainity estimated = 6
- Nitrogen oxides [emissions to air, high. pop.]: 2.75e-5 kg; lognormal SD95 1.7
  Deviation calculated
- Acetaldehyde [emissions to air, high. pop.]: 2.05e-8 kg; lognormal SD95 6.0384
  (3,3,3,1,1,3); Literature, basic uncertainity estimated = 6
- Acetone [emissions to air, high. pop.]: 5e-8 kg; lognormal SD95 6.0384
  (3,3,3,1,1,3); Literature, basic uncertainity estimated = 6
- Ethyne [emissions to air, high. pop.]: 1e-8 kg; lognormal SD95 6.0384
  (3,3,3,1,1,3); Literature, basic uncertainity estimated = 6
- Propene [emissions to air, high. pop.]: 2e-8 kg; lognormal SD95 6.0384
  (3,3,3,1,1,3); Literature, basic uncertainity estimated = 6
- Butane [emissions to air, high. pop.]: 1.5e-7 kg; lognormal SD95 6.0384
  (3,3,3,1,1,3); Literature, basic uncertainity estimated = 6
- Particulates, < 2.5 um [emissions to air, high. pop.]: 5e-7 kg; lognormal SD95 3.0313
  (3,3,3,1,1,3); Literature, basic uncertainty estimated = 3
- Hydrogen chloride [emissions to air, high. pop.]: 9.4e-8 kg; lognormal SD95 1.5416
  (3,3,3,1,1,3); Literature
- Acrolein [emissions to air, high. pop.]: 1.15e-8 kg; lognormal SD95 6.0384
  (3,3,3,1,1,3); Literature, basic uncertainity estimated = 6
- Propanal [emissions to air, high. pop.]: 6e-9 kg; lognormal SD95 6.0384
  (3,3,3,1,1,3); Literature, basic uncertainity estimated = 6
- Sulfur dioxide [emissions to air, high. pop.]: 4.684e-5 kg; lognormal SD95 1.1358
  (3,3,1,1,1,3); Calculated
- Copper [emissions to air, high. pop.]: 7e-10 kg; lognormal SD95 5.0357
  (3,3,3,1,1,3); Literature
- Mercury [emissions to air, high. pop.]: 5e-10 kg; lognormal SD95 5.0357
  (3,3,3,1,1,3); Literature
- Carbon monoxide, fossil [emissions to air, high. pop.]: 9e-6 kg; lognormal SD95 6.6
  Deviation calculated
- Hydrogen fluoride [emissions to air, high. pop.]: 9e-9 kg; lognormal SD95 1.5416
  (3,3,3,1,1,3); Literature
- PAH, polycyclic aromatic hydrocarbons [emissions to air, high. pop.]: 4.6e-10 kg; lognormal SD95 3.0313
  (3,3,3,1,1,3); Literature
- Formaldehyde [emissions to air, high. pop.]: 6e-9 kg; lognormal SD95 6.0384
  (3,3,3,1,1,3); Literature, basic uncertainity estimated = 6
- Propane [emissions to air, high. pop.]: 3e-8 kg; lognormal SD95 6.0384
  (3,3,3,1,1,3); Literature, basic uncertainity estimated = 6
- Dioxin, 2,3,7,8 Tetrachlorodibenzo-p- [emissions to air, high. pop.]: 5.7e-17 kg; lognormal SD95 3.0313
  (3,3,3,1,1,3); Literature
- Ethane [emissions to air, high. pop.]: 2e-8 kg; lognormal SD95 6.0384
  (3,3,3,1,1,3); Literature, basic uncertainity estimated = 6
- Ethene [emissions to air, high. pop.]: 5e-8 kg; lognormal SD95 6.0384
  (3,3,3,1,1,3); Literature, basic uncertainity estimated = 6

## Sampling procedure
Data published in literature based on measurements.

## Extrapolations
Some information from other European countries has been used to determine the emission factors.

## Sources
- Jungbluth N., 2007, 2007 - Crude oil - Jungbluth, Sachbilanzen von Energiesystemen. Final report No. 6 ecoinvent data v2.0, 6, Swiss Centre for LCI, ESU-services Ltd., Duebendorf and Uster, CH
Jungbluth, N. (2007) Erdöl. Sachbilanzen von Energiesystemen. Final report No. 6 ecoinvent data v2.0. Editors: Dones R.. Volume: 6. Swiss Centre for LCI, PSI. Dübendorf and Villigen, CH.
Type: Measurement on site
Source: CD-ROM
First author: Jungbluth, N.
Year: 2007
Name of editors: Dones R.
Title of anthology: Sachbilanzen von Energiesystemen. Final report No. 6 ecoinvent data v2.0
Place of publication: Dübendorf and Villigen, CH
Publisher: Swiss Centre for LCI, PSI
Volume No: 6

## Validation
Proof reading validation: passed; Other validation: none;
