# Disposal, polyolefin flooring, as building waste

Dataset: EcoSpold 1, unit process
Functional unit: 1 m2
Category: waste management / building demolition
Geography: CH
Time period: 2019-01 to 2021-12
Generated by: Daniel Savi
accessRestrictedTo: 0
copyright: true

## General comment
Entsorgung Dichtungsbahnen und Schutzfolien, Dichtungsbahn Polyolefin (FPO/TPO)
Version: 0.0

Local category: Entsorgungssysteme
Local subcategory: Gebäudeentsorgung

## Reference product
- Disposal, polyolefin flooring, as building waste [CH]: 1 m2
  SWITZERLAND

## Inputs from technosphere
- Deconstruction, average [CH]: 3.4 kg
- Disposal, construction waste, to final disposal type B [CH]: 0.03995 kg
- Disposal, pure hydrocarbon plastics as building waste, to municipal waste incineration [CH]: 3.3201 kg
- Mixed construction and demolition waste to sorting [CH]: 1.598 kg
- Disposal, seal sheeting as construction waste, to final disposal type E [CH]: 0.03995 kg

## Sources
- Klingler M., Savi D., Doka G., 2019, 2019 - LCA disposal of building materials - Klingler, -, Buero fuer Umweltchemie, Zuerich, CH
M. Klingler (2019) Harmonisierte O¨kobilanzen der Entsorgung von Baustoffen - Fu¨r die Liste der O¨kobilanzdaten im Baubereich. Zürich.

Source: M. Klingler, D. Savi (2019) Harmonisierte O¨kobilanzen der Entsorgung von Baustoffen - Fu¨r die Liste der O¨kobilanzdaten im Baubereich, Büro für Umweltchemie, Zürich
First author: M. Klingler
Year: 2019
Place of publication: Zürich
Original title: Harmonisierte O¨kobilanzen der Entsorgung von Baustoffen - Fu¨r die Liste der O¨kobilanzdaten im Baubereich
