# Residential sewer grid

Dataset: EcoSpold 1, unit process, infrastructure
Functional unit: 1 km
Category: waste / infrastructure
Geography: CH
Time period: 2000-01 to 2000-12
Generated by: Gabor Doka
accessRestrictedTo: 0
copyright: true

## General comment
Sewer system for residential building area. Average length 0.087 km. The lifetime is 100 years including a renovation after 70 years.;
Synonyms: sewer infrastructure for residential building area;

## Included processes
Infrastructure materials for private, residential sewer system, transports, dismantling.

## Technology
Underground sewer system with pipes

## Reference product
- Residential sewer grid [CH]: 1 km
  SWITZERLAND

## Inputs from technosphere
- Disposal, polyvinylchloride, 0.2% water, to municipal incineration [CH]: 7100 kg; lognormal SD95 3.1
  (2,2,2,1,1,5) & basic uncertainty of 3; Data from one inventory study (Labhardt 1996)
- Diesel, burned in building machine, average [CH]: 42200 MJ; lognormal SD95 3.1
  (2,2,2,1,1,5) & basic uncertainty of 3; Data from one inventory study (Labhardt 1996)
- Disposal, building, concrete, not reinforced, to final disposal [CH]: 926000 kg; lognormal SD95 3.1
  (2,2,2,1,1,5) & basic uncertainty of 3; Data from one inventory study (Labhardt 1996)
- Concrete, sole plate and foundation, at plant [CH]: 264 m3; lognormal SD95 3.1
  (2,2,2,1,1,5) & basic uncertainty of 3; Data from one inventory study (Labhardt 1996)
- Transport, freight, lorry, 16t-32t gross weight, fleet average [CH]: 39700 tkm; lognormal SD95 1.8
  uncertainty calculated from uncertainty in material input and the uncertainty in generic transportation distances
- Electricity, medium voltage, at grid [CH]: 5890 kWh; lognormal SD95 3.1
  (2,2,2,1,1,5) & basic uncertainty of 3; Data from one inventory study (Labhardt 1996)
- Transport, freight, rail [RER]: 11000 tkm; lognormal SD95 1.9
  (same comment as for Transport, freight, lorry, 16t-32t gross weight, fleet average)
- Cast iron, at plant [RER]: 5130 kg; lognormal SD95 3.1
  (2,2,2,1,1,5) & basic uncertainty of 3; Data from one inventory study (Labhardt 1996)
- Sand, at mine [CH]: 201000 kg; lognormal SD95 3.1
  (2,2,2,1,1,5) & basic uncertainty of 3; Data from one inventory study (Labhardt 1996)
- Polyvinylchloride, at regional storage [RER]: 7100 kg; lognormal SD95 3.1
  (2,2,2,1,1,5) & basic uncertainty of 3; Data from one inventory study (Labhardt 1996)
- Disposal, polyethylene, 0.4% water, to municipal incineration [CH]: 19300 kg; lognormal SD95 3.1
  (2,2,2,1,1,5) & basic uncertainty of 3; Data from one inventory study (Labhardt 1996)
- Gravel, unspecified, at mine [CH]: 320000 kg; lognormal SD95 3.1
  (2,2,2,1,1,5) & basic uncertainty of 3; Data from one inventory study (Labhardt 1996)
- Tap water, at user [RER]: 3.16e6 kg; lognormal SD95 3.1
  (2,2,2,1,1,5) & basic uncertainty of 3; Data from one inventory study (Labhardt 1996)
- Excavation, hydraulic digger, average [CH]: 6450 m3; lognormal SD95 3.1
  (2,2,2,1,1,5) & basic uncertainty of 3; Data from one inventory study (Labhardt 1996)
- Cement, unspecified, at plant [CH]: 26000 kg; lognormal SD95 3.1
  (2,2,2,1,1,5) & basic uncertainty of 3; Data from one inventory study (Labhardt 1996)
- Polyethylene, HDPE, granulate, at plant [RER]: 19300 kg; lognormal SD95 3.1
  (2,2,2,1,1,5) & basic uncertainty of 3; Data from one inventory study (Labhardt 1996)

## Emissions to nature
- Heat, waste [emissions to air, high. pop.]: 21200 MJ; lognormal SD95 3.1
  (2,2,2,1,1,5) & basic uncertainty of 3; Data from one inventory study (Labhardt 1996)

## Sampling procedure
data from literature

## Sources
- Doka G., 2009, 2009 - LCI waste treatment services - Doka, Final report ecoinvent data v2.0, 13, Swiss Centre for LCI, Doka LCA, Duebendorf and St. Gallen, CH
Doka G. (2007) Life Cycle Inventories of Waste Treatment Services. Final report ecoinvent data v2.0. Volume: 13. Swiss Centre for LCI, Empa - TSL. Dübendorf, CH.
Type: Separate publication
Source: CD-ROM
First author: Doka G.
Year: 2007
Title of anthology: Final report ecoinvent data v2.0
Place of publication: Dübendorf, CH
Publisher: Swiss Centre for LCI, Empa - TSL
Volume No: 13

## Validation
Proof reading validation: Passed.; Other validation: none;
