# Disposal, ash coffee ground pellets, to municipal incineration

Dataset: EcoSpold 1, unit process
Functional unit: 1 kg
Category: incineration / municipal incineration
Geography: CH
Time period: 2008-01 to 2008-12
Generated by: Gabor Doka
accessRestrictedTo: 0
copyright: true

## General comment
Inventoried waste contains . waste composition (wet, in ppm): H2O n.a.; O 401500; H n.a.; C 12000; S 9200; N n.a.; P 9800; B n.a.; Cl 3200; Br n.a.; F n.a.; I n.a.; Ag n.a.; As 6.7; Ba n.a.; Cd 9.9055; Co 34.483; Cr 31.997; Cu 1020.7; Hg n.a.; Mn 2172.4; Mo 3.7; Ni 65.2; Pb 156.72; Sb 206.9; Se n.a.; Sn 1172.4; V 34.483; Zn 2777.2; Be n.a.; Sc n.a.; Sr n.a.; Ti 1380; Tl n.a.; W n.a.; Si 82600; Fe 22800; Ca 284000; Al 79310; K 54500; Mg 32100; Na n.a.; Share of carbon in waste that is biogenic 100%. Share of iron in waste that is metallic/recyclable 0%. Net energy produced in MSWI: 0MJ/kg waste electric energy and 0MJ/kg waste thermal energy Allocation of energy production: no substitution or expansion. Total burden allocated to waste disposal function of MSWI. One kg of this waste produces 0.7736 kg of slag and 0.1359 kg of residues, which are landfilled. Additional solidification with 0.05436 kg of cement.;;

## Included processes
waste-specific air and water emisions from incineration, auxiliary material consumption for flue gas cleaning. Short-term emissions to river water and long-term emisisons to ground water from slag compartment (from bottom slag) and residual material landfill (from solidified fly ashes and scrubber slugde). Process energy demands for MSWI.

## Geography
Specific to the technology mix encountered in Switzerland in 2000. Well applicable to modern incineration practices in Europe, North America or Japan.

## Technology
average Swiss MSWI plants in 2000 (grate incinerators) with electrostatic precipitator for fly ash (ESP), wet flue gas scrubber and 29.4% SNCR , 32.2% SCR-high dust , 24.6% SCR-low dust -DeNOx facilities and 13.8% without Denox (by burnt waste, according to Swiss average). Share of waste incinerated in plants with magnetic scrap separation from slag : 50%. Gross electric efficiency technology mix 12.997% and Gross thermal efficiency technology mix 25.57%

## Time period
Waste composition as given in literature reference, theoretical data or other source. Transfer coefficients for modern Swiss MSWI. Emission speciation based on early 90ies data.

## Reference product
- Disposal, ash coffee ground pellets, to municipal incineration [CH]: 1 kg
  SWITZERLAND

## Inputs from technosphere
- Electricity from waste, at municipal waste incineration plant [CH]: 0.14377 kWh; lognormal SD95 3.78
  uncertainty is calculated from uncertainties in waste composition and uncertainties in energy efficiency and the uncertainty in internal energy demand
- Disposal, cement, hydrated, 0% water, to residual material landfill [CH]: 0.1359 kg; lognormal SD95 1.3075
  Hydrated cement for solidification of landfilled residual material. Uncertainty calculated from unertainty of the waste composition of this waste and transfer coefficients in the incinerator and of the solidification recipe.
- Transport, freight, lorry, 16t-32t gross weight, fleet average [CH]: 0.040256 tkm; lognormal SD95 1.1847
  uncertainty calculated from calculated from uncertainties in waste composition, in transfer coefficients in incinerator, uncertainty in average auxiliary material input, the unertainty of the waste composition of this waste and the uncertainty in generic transportation distances
- Sodium hydroxide, 50% in H2O, production mix, at plant [RER]: 0.0065012 kg; lognormal SD95 2.5081
  uncertainty calculated from uncertainty in average auxiliary material input, and the unertainty of the waste composition of this waste
- Cement, unspecified, at plant [CH]: 0.054358 kg; lognormal SD95 1.3075
  Cement for solidification of landfilled residual material. Uncertainty calculated from unertainty of the waste composition of this waste, of transfer coefficients in the incinerator and of the solidification recipe.
- Chemicals inorganic, at plant [GLO]: 1.7395e-5 kg; lognormal SD95 2.4941
  Proxy for Polyelectrolyte. uncertainty calculated from uncertainty in average auxiliary material input, and the unertainty of the waste composition of this waste
- Process-specific burdens, residual material landfill [CH]: 0.1359 kg; lognormal SD95 1.2075
  uncertainty is calculated from uncertainties in waste composition and transfer coefficients in incinerator
- Municipal waste incineration plant [CH]: 2.5e-10 p; lognormal SD95 1
  demands per kilogram waste. uncertainty is heeded in the module
- Hydrochloric acid, 30% in H2O, at plant [RER]: 1.0437e-5 kg; lognormal SD95 2.4941
  (same comment as for Sodium hydroxide, 50% in H2O, production mix, at plant)
- Chemicals organic, at plant [GLO]: 3.9397e-5 kg; lognormal SD95 9.6078
  Proxy for TMT15. uncertainty calculated from uncertainty in average auxiliary material input, and the unertainty of the waste composition of this waste
- Residual material landfill facility [CH]: 2.8312e-10 p; lognormal SD95 1.2075
  (same comment as for Process-specific burdens, residual material landfill)
- Process-specific burdens, slag compartment [CH]: 0.77363 kg; lognormal SD95 1.2384
  (same comment as for Process-specific burdens, residual material landfill)
- Heat from waste, at municipal waste incineration plant [CH]: 0.83868 MJ; lognormal SD95 1.05
  (same comment as for Electricity from waste, at municipal waste incineration plant)
- Process-specific burdens, municipal waste incineration [CH]: 1 kg; lognormal SD95 1
  demands per kilogram waste. uncertainty is heeded in the module
- Transport, freight, rail [RER]: 0.019217 tkm; lognormal SD95 1.912
  uncertainty calculated from uncertainty in average auxiliary material input, the unertainty of the waste composition of this waste and the uncertainty in generic transportation distances
- Slag compartment [CH]: 1.3753e-9 p; lognormal SD95 1.2384
  (same comment as for Process-specific burdens, residual material landfill)
- Iron (III) chloride, 40% in H2O, at plant [CH]: 0.00036321 kg; lognormal SD95 3.3691
  (same comment as for Sodium hydroxide, 50% in H2O, production mix, at plant)
- Quicklime, milled, packed, at plant [CH]: 0.00055595 kg; lognormal SD95 4.1607
  (same comment as for Sodium hydroxide, 50% in H2O, production mix, at plant)

## Emissions to nature
- BOD5, Biological Oxygen Demand [emissions to water, groundwater, long-term]: 9.6863e-5 kg; lognormal SD95 2.6967
  Long-term emissions from landfilling of incineration residues. uncertainty is calculated from uncertainties in waste composition and transfer coefficients in incinerator and landfills.
- Vanadium [emissions to water, groundwater, long-term]: 5.9146e-6 kg; lognormal SD95 14.984
  (same comment as for BOD5, Biological Oxygen Demand)
- Aluminium [emissions to water, groundwater, long-term]: 0.058693 kg; lognormal SD95 2.0934
  (same comment as for BOD5, Biological Oxygen Demand)
- TOC, Total Organic Carbon [emissions to water, river]: 3.2897e-7 kg; lognormal SD95 3.7052
  uncertainty is calculated from uncertainties in waste composition and transfer coefficients in incinerator and landfills
- Aluminium [emissions to air, high. pop.]: 0.0001239 kg; lognormal SD95 2.2201
  (same comment as for Process-specific burdens, residual material landfill)
- Sulfate [emissions to water, river]: 0.0044671 kg; lognormal SD95 2.2744
  (same comment as for TOC, Total Organic Carbon)
- Zinc [emissions to water, groundwater, long-term]: 4.3057e-5 kg; lognormal SD95 95.251
  (same comment as for BOD5, Biological Oxygen Demand)
- Lead [emissions to air, high. pop.]: 5.8174e-9 kg; lognormal SD95 6.9696
  (same comment as for Process-specific burdens, residual material landfill)
- Tin [emissions to water, groundwater, long-term]: 0.00058935 kg; lognormal SD95 7.7998
  (same comment as for BOD5, Biological Oxygen Demand)
- Tin [emissions to water, river]: 4.3499e-8 kg; lognormal SD95 6.5647
  (same comment as for TOC, Total Organic Carbon)
- Arsenic [emissions to water, groundwater, long-term]: 3.6795e-6 kg; lognormal SD95 9.9606
  (same comment as for BOD5, Biological Oxygen Demand)
- Chromium VI [emissions to water, river]: 1.0426e-6 kg; lognormal SD95 7.7756
  (same comment as for TOC, Total Organic Carbon)
- Potassium [emissions to air, high. pop.]: 0.00016431 kg; lognormal SD95 2.4025
  (same comment as for Process-specific burdens, residual material landfill)
- Nickel [emissions to water, groundwater, long-term]: 6.1044e-5 kg; lognormal SD95 7.188
  (same comment as for BOD5, Biological Oxygen Demand)
- Arsenic [emissions to air, high. pop.]: 6.834e-14 kg; lognormal SD95 10.956
  (same comment as for Process-specific burdens, residual material landfill)
- Potassium [emissions to water, groundwater, long-term]: 0.044885 kg; lognormal SD95 1.9276
  (same comment as for BOD5, Biological Oxygen Demand)
- Manganese [emissions to water, river]: 1.2154e-7 kg; lognormal SD95 10.187
  (same comment as for TOC, Total Organic Carbon)
- Copper [emissions to air, high. pop.]: 7.5344e-9 kg; lognormal SD95 5.3824
  (same comment as for Process-specific burdens, residual material landfill)
- BOD5, Biological Oxygen Demand [emissions to water, river]: 4.4907e-7 kg; lognormal SD95 3.0052
  (same comment as for TOC, Total Organic Carbon)
- Calcium [emissions to air, high. pop.]: 0.00047343 kg; lognormal SD95 1.6384
  (same comment as for Process-specific burdens, residual material landfill)
- Heat, waste [emissions to air, high. pop.]: 0.44446 MJ; lognormal SD95 1.0649
  (same comment as for Electricity from waste, at municipal waste incineration plant)
- Carbon monoxide, biogenic [emissions to air, high. pop.]: 0.0002229 kg; lognormal SD95 5.01
  (1,3,2,2,1,2) & basic uncertainty of 5; literature data from switzerland and germany adapted to plant age distribution in switzerland
- Iron [emissions to air, high. pop.]: 7.6117e-7 kg; lognormal SD95 3.0625
  (same comment as for Process-specific burdens, residual material landfill)
- Iron [emissions to water, river]: 7.8024e-6 kg; lognormal SD95 2.8808
  (same comment as for TOC, Total Organic Carbon)
- Nickel [emissions to air, high. pop.]: 2.8139e-12 kg; lognormal SD95 8.2944
  (same comment as for Process-specific burdens, residual material landfill)
- Calcium [emissions to water, river]: 0.0010736 kg; lognormal SD95 4.1261
  (same comment as for TOC, Total Organic Carbon)
- Molybdenum [emissions to water, groundwater, long-term]: 3.0606e-6 kg; lognormal SD95 10.642
  (same comment as for BOD5, Biological Oxygen Demand)
- Cobalt [emissions to water, groundwater, long-term]: 3.0191e-5 kg; lognormal SD95 7.8011
  (same comment as for BOD5, Biological Oxygen Demand)
- Potassium [emissions to water, river]: 0.0094506 kg; lognormal SD95 2.0054
  (same comment as for TOC, Total Organic Carbon)
- Cadmium [emissions to water, river]: 4.4923e-9 kg; lognormal SD95 9.2317
  (same comment as for TOC, Total Organic Carbon)
- Cobalt [emissions to air, high. pop.]: 1.0948e-12 kg; lognormal SD95 9
  (same comment as for Process-specific burdens, residual material landfill)
- Copper [emissions to water, groundwater, long-term]: 0.00082505 kg; lognormal SD95 4.9372
  (same comment as for BOD5, Biological Oxygen Demand)
- Silicon [emissions to water, river]: 1.7503e-5 kg; lognormal SD95 4.1466
  (same comment as for TOC, Total Organic Carbon)
- Phosphate [emissions to water, groundwater, long-term]: 0.0011477 kg; lognormal SD95 71.876
  (same comment as for BOD5, Biological Oxygen Demand)
- Tin [emissions to air, high. pop.]: 1.5552e-6 kg; lognormal SD95 5.0625
  (same comment as for Process-specific burdens, residual material landfill)
- Molybdenum [emissions to water, river]: 6.3194e-7 kg; lognormal SD95 6.6963
  (same comment as for TOC, Total Organic Carbon)
- COD, Chemical Oxygen Demand [emissions to water, groundwater, long-term]: 0.00029613 kg; lognormal SD95 2.6967
  (same comment as for BOD5, Biological Oxygen Demand)
- Antimony [emissions to water, river]: 7.1813e-5 kg; lognormal SD95 5.4368
  (same comment as for TOC, Total Organic Carbon)
- Vanadium [emissions to air, high. pop.]: 3.4483e-9 kg; lognormal SD95 8.4681
  (same comment as for Process-specific burdens, residual material landfill)
- Sulfur dioxide [emissions to air, high. pop.]: 3.9194e-5 kg; lognormal SD95 3.5065
  (same comment as for Process-specific burdens, residual material landfill)
- Antimony [emissions to air, high. pop.]: 8.048e-13 kg; lognormal SD95 7.3441
  (same comment as for Process-specific burdens, residual material landfill)
- COD, Chemical Oxygen Demand [emissions to water, river]: 8.0204e-7 kg; lognormal SD95 3.7933
  (same comment as for TOC, Total Organic Carbon)
- Chloride [emissions to water, groundwater, long-term]: 7.5505e-5 kg; lognormal SD95 2.592
  (same comment as for BOD5, Biological Oxygen Demand)
- Manganese [emissions to water, groundwater, long-term]: 0.0018707 kg; lognormal SD95 5.129
  (same comment as for BOD5, Biological Oxygen Demand)
- Antimony [emissions to water, groundwater, long-term]: 0.00013223 kg; lognormal SD95 5.247
  (same comment as for BOD5, Biological Oxygen Demand)
- Silicon [emissions to air, high. pop.]: 0.0001923 kg; lognormal SD95 2.1904
  (same comment as for Process-specific burdens, residual material landfill)
- Cadmium [emissions to air, high. pop.]: 5.4547e-10 kg; lognormal SD95 9.8596
  (same comment as for Process-specific burdens, residual material landfill)
- Phosphate [emissions to water, river]: 1.9161e-6 kg; lognormal SD95 5.9527
  (same comment as for TOC, Total Organic Carbon)
- Sulfate [emissions to water, groundwater, long-term]: 0.023074 kg; lognormal SD95 2.4404
  (same comment as for BOD5, Biological Oxygen Demand)
- Lead [emissions to water, groundwater, long-term]: 1.1166e-5 kg; lognormal SD95 196.43
  (same comment as for BOD5, Biological Oxygen Demand)
- Zinc [emissions to air, high. pop.]: 4.537e-8 kg; lognormal SD95 4.5369
  (same comment as for Process-specific burdens, residual material landfill)
- Carbon dioxide, biogenic [emissions to air, high. pop.]: 0.043165 kg; lognormal SD95 3.2412
  (same comment as for Process-specific burdens, residual material landfill)
- Nickel [emissions to water, river]: 4.0894e-8 kg; lognormal SD95 12.531
  (same comment as for TOC, Total Organic Carbon)
- Magnesium [emissions to air, high. pop.]: 4.4202e-5 kg; lognormal SD95 2.7225
  (same comment as for Process-specific burdens, residual material landfill)
- Cobalt [emissions to water, river]: 5.8989e-9 kg; lognormal SD95 12.121
  (same comment as for TOC, Total Organic Carbon)
- TOC, Total Organic Carbon [emissions to water, groundwater, long-term]: 0.00011718 kg; lognormal SD95 2.6967
  (same comment as for BOD5, Biological Oxygen Demand)
- Chromium VI [emissions to water, groundwater, long-term]: 3.3872e-6 kg; lognormal SD95 10.092
  (same comment as for BOD5, Biological Oxygen Demand)
- Chromium [emissions to water, river]: 1.0198e-7 kg; lognormal SD95 8.3647
  (same comment as for TOC, Total Organic Carbon)
- Chloride [emissions to water, river]: 0.0031245 kg; lognormal SD95 3.8567
  (same comment as for TOC, Total Organic Carbon)
- Iron [emissions to water, groundwater, long-term]: 0.01068 kg; lognormal SD95 7.901
  (same comment as for BOD5, Biological Oxygen Demand)
- Aluminium [emissions to water, river]: 6.5993e-6 kg; lognormal SD95 5.2528
  (same comment as for TOC, Total Organic Carbon)
- Titanium [emissions to water, groundwater, long-term]: 0.00041349 kg; lognormal SD95 7.2292
  (same comment as for BOD5, Biological Oxygen Demand)
- Chromium [emissions to air, high. pop.]: 2.3659e-12 kg; lognormal SD95 9
  (same comment as for Process-specific burdens, residual material landfill)
- Titanium [emissions to air, high. pop.]: 1.38e-6 kg; lognormal SD95 4.9284
  (same comment as for Process-specific burdens, residual material landfill)
- Phosphorus [emissions to air, high. pop.]: 9.8e-6 kg; lognormal SD95 3.4969
  (same comment as for Process-specific burdens, residual material landfill)
- Cadmium [emissions to water, groundwater, long-term]: 9.9391e-8 kg; lognormal SD95 201.65
  (same comment as for BOD5, Biological Oxygen Demand)
- Copper [emissions to water, river]: 4.1447e-8 kg; lognormal SD95 9.8279
  (same comment as for TOC, Total Organic Carbon)
- Vanadium [emissions to water, river]: 2.3267e-8 kg; lognormal SD95 9.627
  (same comment as for TOC, Total Organic Carbon)
- Magnesium [emissions to water, river]: 0.00011237 kg; lognormal SD95 5.4033
  (same comment as for TOC, Total Organic Carbon)
- DOC, Dissolved Organic Carbon [emissions to water, groundwater, long-term]: 0.00011718 kg; lognormal SD95 2.6967
  (same comment as for BOD5, Biological Oxygen Demand)
- Molybdenum [emissions to air, high. pop.]: 7.4e-9 kg; lognormal SD95 10.824
  (same comment as for Process-specific burdens, residual material landfill)
- Methane, biogenic [emissions to air, high. pop.]: 6.3821e-6 kg; lognormal SD95 1.57
  (2,3,4,2,1,2) & basic uncertainty of 1.5; confidential data from 5 plants in Switzerland and Germany
- Heat, waste [emissions to water, river]: 0.073108 MJ; lognormal SD95 1.0649
  (same comment as for Electricity from waste, at municipal waste incineration plant)
- Lead [emissions to water, river]: 4.3656e-9 kg; lognormal SD95 7.1478
  (same comment as for TOC, Total Organic Carbon)
- Hydrogen chloride [emissions to air, high. pop.]: 3.5529e-8 kg; lognormal SD95 4.4568
  (same comment as for Process-specific burdens, residual material landfill)
- Calcium [emissions to water, groundwater, long-term]: 0.24715 kg; lognormal SD95 1.5098
  (same comment as for BOD5, Biological Oxygen Demand)
- Silicon [emissions to water, groundwater, long-term]: 0.0071725 kg; lognormal SD95 83.777
  (same comment as for BOD5, Biological Oxygen Demand)
- DOC, Dissolved Organic Carbon [emissions to water, river]: 3.2897e-7 kg; lognormal SD95 3.7052
  (same comment as for TOC, Total Organic Carbon)
- Titanium [emissions to water, river]: 6.651e-9 kg; lognormal SD95 16.577
  (same comment as for TOC, Total Organic Carbon)
- Arsenic [emissions to water, river]: 3.0205e-6 kg; lognormal SD95 8.1087
  (same comment as for TOC, Total Organic Carbon)
- Magnesium [emissions to water, groundwater, long-term]: 0.029632 kg; lognormal SD95 2.5965
  (same comment as for BOD5, Biological Oxygen Demand)
- Manganese [emissions to air, high. pop.]: 1.1829e-11 kg; lognormal SD95 5.1984
  (same comment as for Process-specific burdens, residual material landfill)
- Zinc [emissions to water, river]: 5.106e-7 kg; lognormal SD95 4.0155
  (same comment as for TOC, Total Organic Carbon)

## Sampling procedure
waste-specific calculation based on literature data

## Extrapolations
Typical elemental transfer coefficients from current studies for modern MSWI, completed with data from coal power plants and estimates, adapted for inert/burnable waste.

## Uncertainty adjustments
uncertainty of waste input composition data derived from generic formula GSD(c) = N*ln(c)+1

## Sources
- Doka G., 2009, 2009 - LCI waste treatment services - Doka, Final report ecoinvent data v2.0, 13, Swiss Centre for LCI, Doka LCA, Duebendorf and St. Gallen, CH
Doka G. (2007) Life Cycle Inventories of Waste Treatment Services. Final report ecoinvent data v2.0. Volume: 13. Swiss Centre for LCI, Empa - TSL. Dübendorf, CH.
Type: Separate publication
Source: CD-ROM
First author: Doka G.
Year: 2007
Title of anthology: Final report ecoinvent data v2.0
Place of publication: Dübendorf, CH
Publisher: Swiss Centre for LCI, Empa - TSL
Volume No: 13

## Validation
Proof reading validation: automatic validation; Other validation: none;
