# Electricity, production mix photovoltaic, at plant

Dataset: EcoSpold 1, unit process
Functional unit: 1 kWh
Category: electricity by fuel / photovoltaic
Geography: CZ
Time period: 2005-01 to 2018-12
Share of production covered: 100 %
Generated by: Philippe Stolz
accessRestrictedTo: 0
copyright: true

## General comment
Annual output of grid-connected PV power plants differentiated for roof-top, facade and centralized power plants. Technology and installation type breakdown based on literature (IEA-PVPS Task 1 and Fraunhofer ISE reports) and expert estimates. Average yield based on population-weighted average according to Breyer & Schmid (2010), corrected by performance ratio as specified in IEA-PVPS Task 12 methodology guidelines. The lifetime of PV systems is estimated at 30 years based on the PEFCR PV electricity.
Technology: Electricity production with grid-connected photovoltaic power plants.
Time period: Time of publications
Version: 1

100.0
Production volume: Unknown.
Local category: Photovoltaik
Local subcategory: Kraftwerke

## Included processes
Production mix of photovoltaic electricity in the country. Annual output, Roof-Top: 944, Annual output, Facade: 661 kWh/kWp, Annual output, centralized PV systems: 1001 kWh/kWp. Amount of solar energy transformed to electricity. Waste heat emission due to losses of electricity in the system.

## Time period
Time of publications

## Reference product
- Electricity, production mix photovoltaic, at plant [CZ]: 1 kWh
  CZECH REPUBLIC

## Inputs from technosphere
- 3kWp facade installation, multi-Si, laminated, integrated, at building [RER]: 6.8583e-8 p; lognormal SD95 1.2165
  (2,2,1,1,1,3); Calculation with average annual yield and share of technologies. Lifetime: 30a.
- 3kWp slanted-roof installation, single-Si, panel, mounted, on roof [RER]: 3.1305e-7 p; lognormal SD95 1.2165
  (same comment as for 3kWp facade installation, multi-Si, laminated, integrated, at building)
- 93 kWp slanted-roof installation, multi-Si, laminated, integrated, on roof [CH]: 3.0973e-9 p; lognormal SD95 1.2165
  (same comment as for 3kWp facade installation, multi-Si, laminated, integrated, at building)
- 156 kWp flat-roof installation, single-Si, on roof [CH]: 1.4669e-8 p; lognormal SD95 1.2165
  (same comment as for 3kWp facade installation, multi-Si, laminated, integrated, at building)
- 3kWp slanted-roof installation, multi-Si, panel, mounted, on roof [RER]: 5.9111e-7 p; lognormal SD95 1.2165
  (same comment as for 3kWp facade installation, multi-Si, laminated, integrated, at building)
- Treatment, sewage, from residence, to wastewater treatment, class 2 [CH]: 3.4034e-6 m3; lognormal SD95 1.0907
  (2,2,1,1,1,3); Estimation 20l/m2 panel
- 3kWp facade installation, single-Si, laminated, integrated, at building [RER]: 3.6322e-8 p; lognormal SD95 1.2165
  (same comment as for 3kWp facade installation, multi-Si, laminated, integrated, at building)
- 93 kWp slanted-roof installation, single-Si, panel, mounted, on roof [CH]: 2.7339e-8 p; lognormal SD95 1.2165
  (same comment as for 3kWp facade installation, multi-Si, laminated, integrated, at building)
- 570 kWp open ground installation, single-Si, on open ground [RER]: 7.2591e-9 p; lognormal SD95 1.2165
  (same comment as for 3kWp facade installation, multi-Si, laminated, integrated, at building)
- 570 kWp open ground installation, multi-Si, on open ground [RER]: 1.3707e-8 p; lognormal SD95 1.2165
  (same comment as for 3kWp facade installation, multi-Si, laminated, integrated, at building)
- 93 kWp slanted-roof installation, single-Si, laminated, integrated, on roof [CH]: 1.6404e-9 p; lognormal SD95 1.2165
  (same comment as for 3kWp facade installation, multi-Si, laminated, integrated, at building)
- 3kWp slanted-roof installation, single-Si, laminated, integrated, on roof [RER]: 1.8783e-8 p; lognormal SD95 1.2165
  (same comment as for 3kWp facade installation, multi-Si, laminated, integrated, at building)
- 3kWp slanted-roof installation, CIS, panel, mounted, on roof [CH]: 1.35e-7 p; lognormal SD95 1.2165
  (same comment as for 3kWp facade installation, multi-Si, laminated, integrated, at building)
- 3kWp flat roof installation, multi-Si, on roof [RER]: 7.2013e-7 p; lognormal SD95 1.2165
  (same comment as for 3kWp facade installation, multi-Si, laminated, integrated, at building)
- 3kWp slanted-roof installation, CdTe, laminated, integrated, on roof [CH]: 9.8054e-9 p; lognormal SD95 1.2165
  (same comment as for 3kWp facade installation, multi-Si, laminated, integrated, at building)
- 93 kWp slanted-roof installation, multi-Si, panel, mounted, on roof [CH]: 5.1622e-8 p; lognormal SD95 1.2165
  (same comment as for 3kWp facade installation, multi-Si, laminated, integrated, at building)
- 3kWp slanted-roof installation, multi-Si, laminated, integrated, on roof [RER]: 3.5466e-8 p; lognormal SD95 1.2165
  (same comment as for 3kWp facade installation, multi-Si, laminated, integrated, at building)
- Tap water, water balance according to MoeK 2013, at user [CZ]: 0.0037816 kg; lognormal SD95 1.0907
  (2,2,1,1,1,3); Estimation 20l/m2 panel
- 3kWp facade installation, single-Si, panel, mounted, at building [RER]: 3.6322e-8 p; lognormal SD95 1.2165
  (same comment as for 3kWp facade installation, multi-Si, laminated, integrated, at building)
- 3kWp slanted-roof installation, micro-Si, laminated, integrated, on roof [RER]: 1.279e-9 p; lognormal SD95 1.2165
  (same comment as for 3kWp facade installation, multi-Si, laminated, integrated, at building)
- 3kWp facade installation, multi-Si, panel, mounted, at building [RER]: 6.8583e-8 p; lognormal SD95 1.2165
  (same comment as for 3kWp facade installation, multi-Si, laminated, integrated, at building)
- 3kWp flat roof installation, single-Si, on roof [RER]: 3.8138e-7 p; lognormal SD95 1.2165
  (same comment as for 3kWp facade installation, multi-Si, laminated, integrated, at building)
- 3kWp slanted-roof installation, micro-Si, panel, mounted, on roof [RER]: 2.1316e-8 p; lognormal SD95 1.2165
  (same comment as for 3kWp facade installation, multi-Si, laminated, integrated, at building)
- 156 kWp flat-roof installation, multi-Si, on roof [CH]: 2.7697e-8 p; lognormal SD95 1.2165
  (same comment as for 3kWp facade installation, multi-Si, laminated, integrated, at building)
- 570 kWp open ground installation, CdTe, on open ground [RER]: 5.1851e-10 p; lognormal SD95 1.2165
  (same comment as for 3kWp facade installation, multi-Si, laminated, integrated, at building)
- 3kWp slanted-roof installation, CdTe, panel, mounted, on roof [CH]: 1.6342e-7 p; lognormal SD95 1.2165
  (same comment as for 3kWp facade installation, multi-Si, laminated, integrated, at building)
- 570 kWp open ground installation, micro-Si, on open ground [RER]: 6.7631e-11 p; lognormal SD95 1.2165
  (same comment as for 3kWp facade installation, multi-Si, laminated, integrated, at building)
- 570 kWp open ground installation, CIS, on open ground [RER]: 4.2833e-10 p; lognormal SD95 1.2165
  (same comment as for 3kWp facade installation, multi-Si, laminated, integrated, at building)
- 3kWp slanted-roof installation, CIS, laminated, integrated, on roof [CH]: 8.1001e-9 p; lognormal SD95 1.2165
  (same comment as for 3kWp facade installation, multi-Si, laminated, integrated, at building)

## Inputs from nature
- Energy, solar, converted [resources, in air]: 3.8503 MJ; lognormal SD95 1.0907
  (2,2,1,1,1,3); Energy loss in the system

## Emissions to nature
- Water, CZ [emissions to air, unspecified]: 0.00037816 kg; lognormal SD95 1.5095
  (2,2,1,1,1,3); Assumption: 10% of water used is evaporated
- Heat, waste [emissions to air, unspecified]: 0.25027 MJ; lognormal SD95 1.05
  (1,na,na,na,na,na); Calculation with average annual output and share of technologies; Average degradation of 10.5% included

## Sampling procedure
Statistical data and model calculations

## Extrapolations
Use of PV technology data investigated for other countries (Switzerland). Correction of average yield with Swiss data.

## Sources
- Frischknecht R., Itten R., Sinha P., de Wild-Scholten M., Zhank J., 2020, 2015 - LCI and LCA photovoltaic systems - Frischknecht, Project report, 174, IEA PVPS Task 12, Petten, NL
Frischknecht R.,, Stolz P., Sinha P., de Wild-Scholten M. (2020) Life Cycle Inventories and Life Cycle Assessments of Photovoltaic Systems. Project report. Volume: 174. IEA PVPS Task 12.
Type: Separate publication
Source: Report
First author: Frischknecht R.,
Other authors: Stolz P., Sinha P., de Wild-Scholten M.
Year: 2020
Title of anthology: Project report
Publisher: IEA PVPS Task 12
Volume No: 174
Original title: Life Cycle Inventories and Life Cycle Assessments of Photovoltaic Systems

## Validation
Proof reading validation: 30.09.2020; Other validation: G:\Projekte laufend\174 Photovoltaic, IEA Task 12\2017 Global supply chain\EcoSpold\[174-photovoltaics-global-supply-chain-v2.5.xlsx]X-Process;
