# Printed wiring board, surface mount, lead-free surface, at plant

Dataset: EcoSpold 1, unit process
Functional unit: 1 m2
Category: electronics / component
Geography: GLO
Time period: 2023-01 to 2029-12
Production volume: $ 18.9315 Billion in 1998 (includes all rigid PWB)
Generated by: Lugas Raka Adrianto, Maulana Permana Ajie, Didier Beloin-Saint-Pierre
accessRestrictedTo: 0
copyright: false

## General comment
The functional unit represents 1 m2 of a 6-layer FR-4 PWB, Pb-free surface finished (mixture of different finishing methods), with soldermask, for surface mount applications, without mounted components. It is designed to be used in ICT applications. Process data are taken from environmental reports of 3 German PWB producers, plus from literature. The described PWB has a square weight of 3.26 kg/m2. An update was made in 2023, comprising: modification to energy consumption and regionalization of inventory flows, such as energy and metal input (Duque Ciceri et al., 2010; Kupka et al., 2018.); Geography: This module is based on information from European producers that are seen as representative for the global situation.;

## Included processes
The module covers the assembly of a PWB prepared for surface mounting of components. In this dataset (raw) materials, infrastructure, energy consumption, emissions to air and water and waste amounts from the production of 1 m2 of board are taken into account. Not included into this dataset is the mounting of the PWB.

## Technology
Dataset comprises the following steps of PWB production: substrate preparation, imaging, exposure, etching, sandwiching, activation and accelaration steps as well as copper plating, cleaning, oxidification, dry vacuum lamination, micro etching, surface finishing.

## Reference product
- Printed wiring board, surface mount, lead-free surface, at plant [GLO]: 1 m2
  Global

## Inputs from technosphere
- Copper, primary, at refinery [GLO]: 2.8746 kg; lognormal SD95 1.27
  (2,4,3,4,1,5,BU:1.05); average data over 3 years from 1 European PWB producer
- Dipropylene glycol monomethyl ether, at plant [RER]: 0.50069 kg; lognormal SD95 1.27
  (2,4,3,4,1,5,BU:1.05); average data over 3 years from 1 European PWB producer
- Electricity, medium voltage, production GLO, at grid [GLO]: 185 kWh; lognormal SD95 1.27
  (2,4,3,4,1,5,BU:1.05); Updated data from literature
- Electronic component production plant [GLO]: 2e-8 p; lognormal SD95 3.81
  (4,5,1,3,5,5,BU:3.00); rough assumption
- Glass fibre reinforced plastic, polyester resin, hand lay-up, at plant [RER]: 1.8897 kg; lognormal SD95 1.27
  (2,4,3,4,1,5,BU:1.05); average data over 3 years from 1 European PWB producer
- Gold, primary, at refinery [GLO]: 0.00015474 kg; lognormal SD95 1.27
  (2,4,3,4,1,5,BU:1.05); average from several ZVEI umbrella specifications for PWB
- Heat, natural gas, at industrial furnace 1MW [CH]: 213 MJ; lognormal SD95 1.27
  (2,4,3,4,1,5,BU:1.05); Updated data from literature
- Hydrochloric acid, 30% in H2O, at plant [RER]: 13.644 kg; lognormal SD95 1.27
  (2,4,3,4,1,5,BU:1.05); average data over 3 years from 1 European PWB producer
- Hydrogen peroxide, 50% in H2O, at plant [RER]: 1.7693 kg; lognormal SD95 1.27
  (2,4,3,4,1,5,BU:1.05); average data over 3 years from 1 European PWB producer
- Iron (III) chloride, 40% in H2O, at plant [CH]: 0.86093 kg; lognormal SD95 1.27
  (2,4,3,4,1,5,BU:1.05); average data over 3 years from 1 European PWB producer
- Nickel, 99.5%, at plant [GLO]: 0.00077474 kg; lognormal SD95 1.27
  (2,4,3,4,1,5,BU:1.05); average from several ZVEI umbrella specifications for PWB
- Phenolic resin, at plant [RER]: 0.21332 kg; lognormal SD95 1.27
  (2,4,3,4,1,5,BU:1.05); average data over 3 years from 1 European PWB producer
- Sheet rolling, copper [RER]: 1.8167 kg; lognormal SD95 1.27
  (2,4,3,4,1,5,BU:1.05); average data over 3 years from 1 European PWB producer
- Silver, at regional storage [RER]: 0.00051474 kg; lognormal SD95 1.27
  (2,4,3,4,1,5,BU:1.05); average from several ZVEI umbrella specifications for PWB
- Sodium chloride, powder, at plant [RER]: 0.51072 kg; lognormal SD95 1.27
  (2,4,3,4,1,5,BU:1.05); average data over 3 years from 1 European PWB producer
- Sodium hydroxide, 50% in H2O, production mix, at plant [RER]: 6.9677 kg; lognormal SD95 1.27
  (2,4,3,4,1,5,BU:1.05); average data over 3 years from 1 European PWB producer
- Sulphuric acid, liquid, at plant [RER]: 1.1674 kg; lognormal SD95 1.27
  (2,4,3,4,1,5,BU:1.05); average data over 3 years from 1 European PWB producer
- Tap water, at user [RER]: 23.967 kg; lognormal SD95 1.27
  (2,4,3,4,1,5,BU:1.05); average data over 3 years from 1 European PWB producer
- Tin, at regional storage [RER]: 0.0027884 kg; lognormal SD95 1.27
  (2,4,3,4,1,5,BU:1.05); average from several ZVEI umbrella specifications for PWB
- Transport, freight, rail [RER]: 19.303 tkm; lognormal SD95 2.08
  (2,4,3,4,1,5,BU:2.00); standard distances
- Transport, freight, lorry, fleet average [RER]: 3.2172 tkm; lognormal SD95 2.08
  (2,4,3,4,1,5,BU:2.00); standard distances
- Water, ultrapure, at plant [GLO]: 1087.1 kg; lognormal SD95 1.27
  (2,4,3,4,1,5,BU:1.05); average data over 3 years from 3 European PWB producer
- Disposal, emulsion paint, 0% water, to municipal incineration [CH]: 0.18204 kg; lognormal SD95 1.27
  (2,4,3,4,1,5,BU:1.05); average data over 3 years from 1 European PWB producer
- Disposal, hazardous waste, 25% water, to hazardous waste incineration [CH]: 13.899 kg; lognormal SD95 1.27
  (2,4,3,4,1,5,BU:1.05); average data over 3 years from 1 European PWB producer
- Disposal, municipal solid waste, 22.9% water, to municipal incineration [CH]: 0.052276 kg; lognormal SD95 1.27
  (2,4,3,4,1,5,BU:1.05); average data over 3 years from 1 European PWB producer
- Disposal, sludge, pig iron production, 8.6% water, to residual material landfill [CH]: 4.1222 kg; lognormal SD95 1.27
  (2,4,3,4,1,5,BU:1.05); average data over 3 years from 1 European PWB producer

## Inputs from nature
- Water, unspecified natural origin/m3 [resources, in water]: 5.5814 m3; lognormal SD95 1.27
  (2,4,3,4,1,5,BU:1.05); average data over 3 years from 1 European PWB producer

## Emissions to nature
- Copper [emissions to air, high. pop.]: 0.00498 kg; lognormal SD95 3.08
  (2,4,3,4,1,5,BU:3.00); calculated from total release in USA
- Heat, waste [emissions to air, high. pop.]: 1175.4 MJ; lognormal SD95 1.6
  (2,4,3,4,1,5,BU:1.50); calculated, from electricity input
- Hydrogen chloride [emissions to air, high. pop.]: 0.0028564 kg; lognormal SD95 2.08
  (2,4,3,4,1,5,BU:2.00); average data over 3 years from 1 European PWB producer
- Hydrogen peroxide [emissions to air, high. pop.]: 0.00034474 kg; lognormal SD95 2.08
  (2,4,3,4,1,5,BU:2.00); average data over 3 years from 1 European PWB producer
- NMVOC, non-methane volatile organic compounds, unspecified origin [emissions to air, high. pop.]: 0.042682 kg; lognormal SD95 2.08
  (2,4,3,4,1,5,BU:2.00); average data over 3 years from 1 European PWB producer
- Particulates, < 2.5 um [emissions to air, high. pop.]: 0.00033653 kg; lognormal SD95 2.08
  (2,4,3,4,1,5,BU:2.00); average data over 3 years from 1 European PWB producer
- Particulates, > 2.5 um, and < 10um [emissions to air, high. pop.]: 0.00011218 kg; lognormal SD95 2.08
  (2,4,3,4,1,5,BU:2.00); average data over 3 years from 1 European PWB producer
- Sodium hydroxide [emissions to air, high. pop.]: 0.0014774 kg; lognormal SD95 2.08
  (2,4,3,4,1,5,BU:2.00); average data over 3 years from 1 European PWB producer
- Sulfuric acid [emissions to air, high. pop.]: 0.00024624 kg; lognormal SD95 2.08
  (2,4,3,4,1,5,BU:2.00); average data over 3 years from 1 European PWB producer
- AOX, Adsorbable Organic Halogen as Cl [emissions to water, unspecified]: 0.00013352 kg; lognormal SD95 1.6
  (2,4,3,4,1,5,BU:1.50); average data over 3 years from 1 European PWB producer
- Arsenic [emissions to water, unspecified]: 2.1779e-6 kg; lognormal SD95 5.09
  (2,4,3,4,1,5,BU:5.00); average data over 3 years from 1 European PWB producer
- BOD5, Biological Oxygen Demand [emissions to water, unspecified]: 0.081715 kg; lognormal SD95 1.6
  (2,4,3,4,1,5,BU:1.50); average data over 3 years from 1 European PWB producer
- Cadmium [emissions to water, unspecified]: 1.8422e-5 kg; lognormal SD95 5.09
  (2,4,3,4,1,5,BU:5.00); average data over 3 years from 1 European PWB producer
- Chromium [emissions to water, unspecified]: 5.2166e-5 kg; lognormal SD95 5.09
  (2,4,3,4,1,5,BU:5.00); average data over 3 years from 1 European PWB producer
- COD, Chemical Oxygen Demand [emissions to water, unspecified]: 0.081715 kg; lognormal SD95 1.6
  (2,4,3,4,1,5,BU:1.50); average data over 3 years from 1 European PWB producer
- Copper [emissions to water, unspecified]: 0.00017547 kg; lognormal SD95 5.09
  (2,4,3,4,1,5,BU:5.00); average data over 3 years from 1 European PWB producer
- Fluoride [emissions to water, unspecified]: 0.00037574 kg; lognormal SD95 1.6
  (2,4,3,4,1,5,BU:1.50); average data over 3 years from 1 European PWB producer
- Mercury [emissions to water, unspecified]: 6.0922e-7 kg; lognormal SD95 5.09
  (2,4,3,4,1,5,BU:5.00); average data over 3 years from 1 European PWB producer
- Nickel [emissions to water, unspecified]: 6.0922e-5 kg; lognormal SD95 5.09
  (2,4,3,4,1,5,BU:5.00); average data over 3 years from 1 European PWB producer
- Zinc [emissions to water, unspecified]: 5.1437e-5 kg; lognormal SD95 5.09
  (2,4,3,4,1,5,BU:5.00); average data over 3 years from 1 European PWB producer
- Water [emissions to water, unspecified]: 5302.33 kg; lognormal SD95 2.5196
  (5,5,5,5,5,BU:1.05); All uncertainty-values set to 5.0 by default. Balance of input water

## Sampling procedure
literature

## Extrapolations
see Geography and Technology

## Sources
- Raka Adrianto L., Permana Ajie M., Beloin-Saint-Pierre D., 2024, 2024 - LCI ICT sector - Raka Adrianto, Empa, St. Gallen, CH

## Validation
Proof reading validation: Passed, Other validation: none, Validator: Mischa Zschokke, Company: Carbotech, Country: CH
