# Aluminium hydroxide, plant

Dataset: EcoSpold 1, unit process, infrastructure
Functional unit: 1 p
Category: metals / non ferro\production\infrastructure
Geography: RER
Time period: 2000-01 to 2000-12
Generated by: Hans-Joerg Althaus
accessRestrictedTo: 0
copyright: true

## General comment
Medium sized plant. Output: 1'220'000 t/a, life time: 50 years;

## Included processes
Part of the Al2O3 plant needed for Al(OH)3 fabrication including port, storage and process infrastructure. Also includes Building for administration. Includes disposal.

## Geography
Some Swiss datasets are used for European processes.

## Technology
Technology of one medium sized plant in Germany

## Reference product
- Aluminium hydroxide, plant [RER]: 1 p
  Europe

## Inputs from technosphere
All rows: lognormal SD95 3
- Steel, low-alloyed, at plant [RER]: 24600 kg
  (3,4,1,1,1,4);
- Chromium steel 18/8, at plant [RER]: 1.87e6 kg
  (3,4,1,1,1,4);
- Conveyor belt, at plant [RER]: 640 m
  (3,4,1,1,1,4);
- Disposal, building, concrete, not reinforced, to final disposal [CH]: 220000 kg
  (3,4,1,1,1,4);
- Disposal, building, reinforced concrete, to final disposal [CH]: 8.73e6 kg
  (3,4,1,1,1,4);
- Reinforcing steel, at plant [RER]: 2.09e6 kg
  (3,4,1,1,1,4);
- Industrial machine, heavy, unspecified, at plant [RER]: 220000 kg
  (3,4,1,1,1,4);
- Concrete, normal, at plant [CH]: 3020 m3
  (3,4,1,1,1,4);
- Building, multi-storey [RER]: 25000 m3
  (3,4,1,1,1,4);
- Concrete, sole plate and foundation, at plant [CH]: 100 m3
  (3,4,1,1,1,4);
- Building, hall [CH]: 5600 m2
  (3,4,1,1,1,4);

## Inputs from nature
- Occupation, industrial area, built up [resources, land]: 2.09e7 m2a; lognormal SD95 1.5
  (2,4,1,1,1,4);
- Occupation, industrial area, vegetation [resources, land]: 5.22e6 m2a; lognormal SD95 1.5
  (2,4,1,1,1,4);
- Transformation, to industrial area, built up [resources, land]: 418000 m2; lognormal SD95 2
  (2,4,1,1,1,4);
- Transformation, to industrial area, vegetation [resources, land]: 104000 m2; lognormal SD95 2
  (2,4,1,1,1,4);
- Transformation, from unknown [resources, land]: 522000 m2; lognormal SD95 2
  (1,4,1,1,1,4);

## Sampling procedure
Internet search

## Extrapolations
see Geography

## Uncertainty adjustments
Uncertainty is adjusted for geographical mismatch (using the pedigree matrix).

## Sources
- Classen M., Althaus H.-J., Blaser S., Scharnhorst W., Tuchschmid M., Jungbluth N., Faist Emmenegger M., 2009, 2009 - LCI metals - Classen, Final report ecoinvent data v2.1, 10, Swiss Centre for LCI, Empa, ESU-services Ltd., Duebendorf, CH
Classen M., Althaus H.-J., Blaser S., Doka G., Jungbluth N., Tuchschmid M. (2008) Life Cycle Inventories of Metals. Final report ecoinvent data v2.1. Volume: 10. Issue: 0. Swiss Centre for LCI, Empa - TSL. Dübendorf, CH.
Type: Measurement on site
Source: CD-ROM
First author: Classen M.
Other authors: Althaus H.-J., Blaser S., Doka G., Jungbluth N., Tuchschmid M.
Year: 2008
Title of anthology: Final report ecoinvent data v2.1
Place of publication: Dübendorf, CH
Publisher: Swiss Centre for LCI, Empa - TSL
Volume No: 10
Issue No: 0

## Validation
Proof reading validation: Passed.; Other validation: none;
