# Transport, high speed train

Dataset: EcoSpold 1, unit process
Functional unit: 1 personkm
Category: transport systems / train
Geography: FR
Time period: 2000-01 to 2014-12
Production volume: 97837945 pkm
Share of production covered: 100 %
Generated by: Annika Messmer
accessRestrictedTo: 0
copyright: true

## General comment
For rail infrastructure, expenditures and environmental interventions due to construction, renewal and disposal of railway tracks have been allocated based on the train kilometric performance of an average German ICE train 417182 vkm and a life time of 40 years . For the determination of the train demand the yearly transport performance of ICE trains in Germany was used 97837945 pkm.;

## Included processes
The module calls the modules "production, maintenance and disposal of vehicles"; "construction and maintenance and disposal of railway tracks". The module includes the energy consumption and emission of the train operation.

## Technology
For vehicle operation all technologies are included in the average data. Rail construction addresses conventional and modern ballastless beddings.

## Time period
Time of publications

## Reference product
- Transport, high speed train [FR]: 1 personkm
  FRANCE

## Inputs from technosphere
- Diesel, at regional storage [RER]: 0.00022576 kg; lognormal SD95 1.5846
  (2,4,1,3,4,5,BU:1.05); assumed energy demand: (0,2E-4kg/vkm) and an average load of 235p; Pers. Corrspondence SBB, Fabiano Piccinno, Okt. 2020
- ICE [DE]: 2.5552e-10 p; lognormal SD95 3.2876
  (2,4,1,3,4,5,BU:3); assuming a constant transport performance of 97837945 pkm per year and an average life time of 40 years; Data of German ICE in UIC statistic, 2014
- Disposal, railway track [CH]: 0.00014246 my; lognormal SD95 3.2876
  (2,4,1,3,4,5,BU:3); ;
- Railway track, ICE [DE]: 0.00014246 my; lognormal SD95 3.2876
  (2,4,1,3,4,5,BU:3); assuming the length of 33281km of the German rail track and a yearly gross transport performanc of 465248000000Gtkm/a; DB business report, 2015
- Refrigerant R134a, at plant [RER]: 8.9085e-9 kg; lognormal SD95 1.5846
  (2,4,1,3,4,5,BU:1.05); extrapolated from refrigerant consumption in CH 2,10E-6 kg/vkm;
- Maintenance, ICE [DE]: 2.5552e-10 p; lognormal SD95 3.2876
  (2,4,1,3,4,5,BU:3); assuming a constant year transport performance of 97837945 pkm per year and an average life time of 40 years; Data of German ICE in UIC statistic, 2014
- Disposal, ICE [DE]: 2.5552e-10 p; lognormal SD95 3.2876
  (2,4,1,3,4,5,BU:3); ;
- Operation, maintenance, railway track, ICE [DE]: 0.00014246 my; lognormal SD95 3.2876
  (2,4,1,3,4,5,BU:3); ;
- Electricity, medium voltage, railway, at grid [FR]: 0.0501 kWh; lognormal SD95 1.5846
  (2,4,1,3,4,5,BU:1.05); assumed energy demand: 0,5E-2kWh/pkm and a loss of 8.50%; Pers. Corrspondence SBB, Fabiano Piccinno, Okt. 2020

## Emissions to nature
- Zinc [emissions to water, unspecified]: 2.2726e-10 kg; lognormal SD95 5.3295
  (2,4,1,3,4,5,BU:5); extrapolated from abrasion emission of long-distance train in CH;
- Benzaldehyde [emissions to air, unspecified]: 1.6277e-8 kg; lognormal SD95 2.308
  (3,3,2,5,5,5,BU:1.5); emission factor of diesel: 7,21E-2 g/kg diesel, no use of particle filter is assumed; BAFU 2015: Non-road database; EMEP/EEA guidebook 2013, Tab. 3-112
- Zinc [emissions to air, unspecified]: 1.5336e-10 kg; lognormal SD95 5.3295
  (2,4,1,3,4,5,BU:5); extrapolated from abrasion emission of long-distance train in CH;
- Antimony [emissions to air, unspecified]: 1.4663e-10 kg; lognormal SD95 5.3295
  (2,4,1,3,4,5,BU:5); extrapolated from abrasion emission of long-distance train in CH;
- Chromium [emissions to air, unspecified]: 1.1288e-11 kg; lognormal SD95 5.8584
  (3,3,2,5,5,5,BU:5); emission factor of diesel: 5,00E-5 g/kg diesel, no use of particle filter is assumed; EMEP/EEA guidebook 2013, 1.A.2.f.ii, Tab. 3-1
- Formaldehyde [emissions to air, unspecified]: 9.9799e-8 kg; lognormal SD95 2.308
  (3,3,2,5,5,5,BU:1.5); emission factor of diesel: 4,42E-1 g/kg diesel, no use of particle filter is assumed; BAFU 2015: Non-road database; EMEP/EEA guidebook 2013, Tab. 3-112
- Copper [emissions to water, unspecified]: 2.3858e-11 kg; lognormal SD95 3.2876
  (2,4,1,3,4,5,BU:3); extrapolated from abrasion emission of long-distance train in CH;
- Lead [emissions to air, unspecified]: 1.1739e-11 kg; lognormal SD95 5.8584
  (3,3,2,5,5,5,BU:5); emission factor of diesel: 5,20E-5 g/kg diesel, no use of particle filter is assumed; EMEP/EEA guidebook 2013, 1.A.2.f.ii, Tab. 3-1
- Copper [emissions to air, unspecified]: 3.8379e-10 kg; lognormal SD95 5.8584
  (3,3,2,5,5,5,BU:5); emission factor of diesel: 1,70E-3 g/kg diesel, no use of particle filter is assumed; EMEP/EEA guidebook 2013, 1.A.2.f.ii, Tab. 3-1
- m-Xylene [emissions to air, unspecified]: 1.1643e-8 kg; lognormal SD95 2.308
  (3,3,2,5,5,5,BU:1.5); emission factor of diesel: 5,16E-2 g/kg diesel, no use of particle filter is assumed; BAFU 2015: Non-road database; EMEP/EEA guidebook 2013, Tab. 3-112
- Methane, fossil [emissions to air, unspecified]: 1.2783e-8 kg; lognormal SD95 2.308
  (3,3,2,5,5,5,BU:1.5); emission factor of diesel: 5,66E-2 g/kg diesel, no use of particle filter is assumed; BAFU 2015: non road emission factor database
- Nickel [emissions to air, unspecified]: 1.5803e-11 kg; lognormal SD95 5.8584
  (3,3,2,5,5,5,BU:5); emission factor of diesel: 7,00E-5 g/kg diesel, no use of particle filter is assumed; EMEP/EEA guidebook 2013, 1.A.2.f.ii, Tab. 3-1
- Iron [emissions to soil, industrial]: 5.5947e-9 kg; lognormal SD95 1.8431
  (2,4,1,3,4,5,BU:1.5); extrapolated from abrasion emission of long-distance train in CH;
- Iron [emissions to air, unspecified]: 2.9353e-8 kg; lognormal SD95 5.3295
  (2,4,1,3,4,5,BU:5); extrapolated from abrasion emission of long-distance train in CH;
- Heat, waste [emissions to air, unspecified]: 0.0096624 MJ; lognormal SD95 2.0816
  (3,3,2,5,5,5,BU:1.05); ;
- Chromium [emissions to air, unspecified]: 5.1569e-11 kg; lognormal SD95 5.3295
  (2,4,1,3,4,5,BU:5); extrapolated from abrasion emission of long-distance train in CH;
- Benzene [emissions to air, unspecified]: 1.5979e-9 kg; lognormal SD95 3.7429
  (3,3,2,5,5,5,BU:3); emission factor of diesel: 7,08E-3 g/kg diesel, no use of particle filter is assumed; BAFU 2015: non road emission factor database
- Arsenic [emissions to air, unspecified]: 2.2576e-14 kg; lognormal SD95 5.8584
  (3,3,2,5,5,5,BU:5); emission factor of diesel: 1,00E-7 g/kg diesel, no use of particle filter is assumed; EMEP/EEA guidebook 2013, 1.A.2.f.ii, Tab. 3-1
- NMVOC, non-methane volatile organic compounds, unspecified origin [emissions to air, unspecified]: 9.6508e-7 kg; lognormal SD95 2.308
  (3,3,2,5,5,5,BU:1.5); emission factor of diesel: 4,27E+0 g/kg diesel, no use of particle filter is assumed; non road emission factor
- Styrene [emissions to air, unspecified]: 6.6533e-9 kg; lognormal SD95 2.308
  (3,3,2,5,5,5,BU:1.5); emission factor of diesel: 2,95E-2 g/kg diesel, no use of particle filter is assumed; BAFU 2015: Non-road database; EMEP/EEA guidebook 2013, Tab. 3-112
- Pentane [emissions to air, unspecified]: 7.1285e-10 kg; lognormal SD95 2.308
  (3,3,2,5,5,5,BU:1.5); emission factor of diesel: 3,16E-3 g/kg diesel, no use of particle filter is assumed; BAFU 2015: Non-road database; EMEP/EEA guidebook 2013, Tab. 3-112
- Oils, unspecified [emissions to soil, industrial]: 3.0996e-9 kg; lognormal SD95 1.8431
  (2,4,1,3,4,5,BU:1.5); extrapolated from abrasion emission of long-distance train in CH;
- Lead [emissions to air, unspecified]: 5.9235e-12 kg; lognormal SD95 5.3295
  (2,4,1,3,4,5,BU:5); extrapolated from abrasion emission of long-distance train in CH;
- Nitrogen oxides [emissions to air, unspecified]: 1.0482e-5 kg; lognormal SD95 2.308
  (3,3,2,5,5,5,BU:1.5); emission factor of diesel: 4,64E+1 g/kg diesel, no use of particle filter is assumed; BAFU 2015: non road emission factor database
- Copper [emissions to soil, industrial]: 1.5567e-10 kg; lognormal SD95 1.8431
  (2,4,1,3,4,5,BU:1.5); extrapolated from abrasion emission of long-distance train in CH;
- Ammonia [emissions to air, unspecified]: 2.2576e-9 kg; lognormal SD95 2.1253
  (3,3,2,5,5,5,BU:1.2); emission factor of diesel: 1,00E-2 g/kg diesel, no use of particle filter is assumed; EMEP/EEA guidebook 2013, 1.A.3.c, Tab. 3-3
- Toluene [emissions to air, unspecified]: 1.1881e-10 kg; lognormal SD95 2.308
  (3,3,2,5,5,5,BU:1.5); emission factor of diesel: 5,26E-4 g/kg diesel, no use of particle filter is assumed; BAFU 2015: Non-road database; EMEP/EEA guidebook 2013, Tab. 3-112
- Copper [emissions to air, unspecified]: 8.1674e-10 kg; lognormal SD95 5.3295
  (2,4,1,3,4,5,BU:5); extrapolated from abrasion emission of long-distance train in CH;
- Antimony [emissions to soil, industrial]: 2.7948e-11 kg; lognormal SD95 1.8431
  (2,4,1,3,4,5,BU:1.5); extrapolated from abrasion emission of long-distance train in CH;
- Heat, waste [emissions to air, unspecified]: 0.18036 MJ; lognormal SD95 1.0907
  (2,3,1,3,1,1,BU:1.05); default value;
- Particulates, < 2.5 um [emissions to air, unspecified]: 3.9158e-7 kg; lognormal SD95 3.7429
  (3,3,2,5,5,5,BU:3); emission factor of diesel: 1,73E+0 g/kg diesel, no use of particle filter is assumed; own calculation with SBB tractions data and non road emission factor (BAFU 2015)
- Ethane [emissions to air, unspecified]: 3.5643e-10 kg; lognormal SD95 2.308
  (3,3,2,5,5,5,BU:1.5); emission factor of diesel: 1,58E-3 g/kg diesel, no use of particle filter is assumed; BAFU 2015: Non-road database; EMEP/EEA guidebook 2013, Tab. 3-112
- Particulates, > 10 um [emissions to air, unspecified]: 1.6546e-8 kg; lognormal SD95 2.308
  (3,3,2,5,5,5,BU:1.5); emission factor of diesel: 7,33E-2 g/kg diesel, no use of particle filter is assumed; own calculation with SBB tractions data and non road emission factor (BAFU 2015)
- Chromium [emissions to soil, industrial]: 9.8289e-12 kg; lognormal SD95 1.8431
  (2,4,1,3,4,5,BU:1.5); extrapolated from abrasion emission of long-distance train in CH;
- PAH, polycyclic aromatic hydrocarbons [emissions to air, unspecified]: 7.4274e-10 kg; lognormal SD95 3.7429
  (3,3,2,5,5,5,BU:3); emission factor of diesel: 3,29E-3 g/kg diesel, no use of particle filter is assumed; EMEP/EEA guidebook 2013, 1.A.2.f.ii, Tab. 3-1
- Manganese [emissions to soil, industrial]: 2.1908e-11 kg; lognormal SD95 1.8431
  (2,4,1,3,4,5,BU:1.5); extrapolated from abrasion emission of long-distance train in CH;
- Chromium VI [emissions to air, unspecified]: 2.2576e-14 kg; lognormal SD95 5.8584
  (same comment as for Arsenic)
- Heptane [emissions to air, unspecified]: 3.5643e-9 kg; lognormal SD95 2.308
  (3,3,2,5,5,5,BU:1.5); emission factor of diesel: 1,58E-2 g/kg diesel, no use of particle filter is assumed; BAFU 2015: Non-road database; EMEP/EEA guidebook 2013, Tab. 3-112
- Sulfur dioxide [emissions to air, unspecified]: 4.5152e-9 kg; lognormal SD95 2.0816
  (3,3,2,5,5,5,BU:1.05); emission factor of diesel: 2,00E-2 g/kg diesel, no use of particle filter is assumed; HBEFA 3.1., CH
- Particulates, > 2.5 um, and < 10um [emissions to air, unspecified]: 1.6121e-8 kg; lognormal SD95 2.7394
  (3,3,2,5,5,5,BU:2); emission factor of diesel: 7,14E-2 g/kg diesel, no use of particle filter is assumed; own calculation with SBB tractions data and non road emission factor (BAFU 2015)
- Zinc [emissions to soil, industrial]: 2.923e-11 kg; lognormal SD95 1.8431
  (2,4,1,3,4,5,BU:1.5); extrapolated from abrasion emission of long-distance train in CH;
- Acrolein [emissions to air, unspecified]: 2.1029e-8 kg; lognormal SD95 2.308
  (3,3,2,5,5,5,BU:1.5); emission factor of diesel: 9,31E-2 g/kg diesel, no use of particle filter is assumed; BAFU 2015: Non-road database; EMEP/EEA guidebook 2013, Tab. 3-112
- o-Xylene [emissions to air, unspecified]: 4.7523e-9 kg; lognormal SD95 2.308
  (3,3,2,5,5,5,BU:1.5); emission factor of diesel: 2,11E-2 g/kg diesel, no use of particle filter is assumed; BAFU 2015: Non-road database; EMEP/EEA guidebook 2013, Tab. 3-112
- Butane [emissions to air, unspecified]: 1.7821e-9 kg; lognormal SD95 2.308
  (3,3,2,5,5,5,BU:1.5); emission factor of diesel: 7,89E-3 g/kg diesel, no use of particle filter is assumed; BAFU 2015: Non-road database; EMEP/EEA guidebook 2013, Tab. 3-112
- Acetaldehyde [emissions to air, unspecified]: 5.4295e-8 kg; lognormal SD95 2.308
  (3,3,2,5,5,5,BU:1.5); emission factor of diesel: 2,41E-1 g/kg diesel, no use of particle filter is assumed; BAFU 2015: Non-road database; EMEP/EEA guidebook 2013, Tab. 3-112
- Cadmium [emissions to air, unspecified]: 2.2576e-12 kg; lognormal SD95 5.8584
  (3,3,2,5,5,5,BU:5); emission factor of diesel: 1,00E-5 g/kg diesel, no use of particle filter is assumed; EMEP/EEA guidebook 2013, 1.A.2.f.ii, Tab. 3-1
- Zinc [emissions to air, unspecified]: 2.2576e-10 kg; lognormal SD95 5.8584
  (3,3,2,5,5,5,BU:5); emission factor of diesel: 1,00E-3 g/kg diesel, no use of particle filter is assumed; EMEP/EEA guidebook 2013, 1.A.2.f.ii, Tab. 3-1
- Carbon dioxide, fossil [emissions to air, unspecified]: 0.00071115 kg; lognormal SD95 2.0816
  (3,3,2,5,5,5,BU:1.05); emission factor of diesel: 3,15E+3 g/kg diesel, no use of particle filter is assumed; BAFU 2015: non road emission factor database
- Manganese [emissions to air, unspecified]: 1.1494e-10 kg; lognormal SD95 5.3295
  (2,4,1,3,4,5,BU:5); extrapolated from abrasion emission of long-distance train in CH;
- Selenium [emissions to air, unspecified]: 2.2576e-12 kg; lognormal SD95 5.8584
  (same comment as for Cadmium)
- Lead [emissions to soil, industrial]: 1.129e-12 kg; lognormal SD95 1.8431
  (2,4,1,3,4,5,BU:1.5); extrapolated from abrasion emission of long-distance train in CH;
- Ethane, 1,1,1,2-tetrafluoro-, HFC-134a [emissions to air, unspecified]: 8.9085e-9 kg; lognormal SD95 2.3401
  (2,5,1,5,5,5,BU:1.5); extrapolated from abrasion emission of long-distance train in CH;
- Carbon monoxide, fossil [emissions to air, unspecified]: 5.798e-6 kg; lognormal SD95 5.8584
  (3,3,2,5,5,5,BU:5); emission factor of diesel: 2,57E+1 g/kg diesel, no use of particle filter is assumed; BAFU 2015: non road emission factor database
- Dinitrogen monoxide [emissions to air, unspecified]: 3.5154e-8 kg; lognormal SD95 2.308
  (3,3,2,5,5,5,BU:1.5); emission factor of diesel: 1,56E-1 g/kg diesel, no use of particle filter is assumed; BAFU 2015: non road emission factor database
- Benzo(a)pyrene [emissions to air, unspecified]: 6.7727e-12 kg; lognormal SD95 3.7429
  (3,3,2,5,5,5,BU:3); emission factor of diesel: 3,00E-5 g/kg diesel, no use of particle filter is assumed; EMEP/EEA guidebook 2013, 1.A.2.f.ii, Tab. 3-1
- Mercury [emissions to air, unspecified]: 1.1965e-12 kg; lognormal SD95 5.8584
  (3,3,2,5,5,5,BU:5); emission factor of diesel: 5,30E-6 g/kg diesel, no use of particle filter is assumed; EMEP/EEA guidebook 2013, 1.A.2.f.ii, Tab. 3-1
- Noise, rail, passenger train, average [non material emissions, unspecified]: 1 personkm; lognormal SD95 2.532
  (3,3,5,5,5,5,BU:1.5); ; Ecological Scarcity method 2013; Frischknecht & Büsser Knöpfel 2013
- Propane [emissions to air, unspecified]: 1.1881e-9 kg; lognormal SD95 2.308
  (3,3,2,5,5,5,BU:1.5); emission factor of diesel: 5,26E-3 g/kg diesel, no use of particle filter is assumed; BAFU 2015: Non-road database; EMEP/EEA guidebook 2013, Tab. 3-112

## Sampling procedure
Statistics

## Extrapolations
Emission, extrapolated from long distance train transport in CH

## Sources
- Messmer A., Frischknecht R., 2016, 2016 - LCI rail transport services - Messmer, Project report, 544, treeze Ltd., Uster, CH
A. Messmer, R. Frischknecht (2016) Life Cycle Inventory of Rail Transport Services. Project report. Volume: 544. treeze Ltd.. Uster, CH.
Type: Separate publication
Source: Report
First author: A. Messmer
Other authors: R. Frischknecht
Year: 2016
Title of anthology: Project report
Place of publication: Uster, CH
Publisher: treeze Ltd.
Volume No: 544

## Validation
Proof reading validation: 13.11.2020; Other validation: G:\Projekte laufend\713 Aktualisierung mobitool 2020\EcoSpold\[713_Transport-highspeed-Train-passenger-RER_EIV2_v0.2.xlsx]X-Process;
