# Photovoltaic panel, CIS, at regional storage

Dataset: EcoSpold 1, unit process, infrastructure
Functional unit: 1 m2
Category: chemicals / processing
Geography: RER
Time period: 2014-01 to 2014-12
Share of production covered: 0 %
Generated by: Philippe Stolz
accessRestrictedTo: 0
copyright: true

## General comment
Average production;
Synonyms: Solarmodul, PV-module, copper indium selenide, thin film, CIGS;

## Included processes
Main production takes place in Japan and US. However LCI data is still from Germany. Hence an additional transport from US (14350 km) and from Japan (20730 km) to Rotterdam is included. The average transport distance from all non-Europe CIS production companies to Rotterdam is 14840 km. Transport from Rotterdam to the regional storage takes into account the three main producers of solar power in Europe (Italy, Germany and Spain). The transport distance is 940 km.

## Technology
Modern technology.

## Time period
Time of publications.

## Reference product
- Photovoltaic panel, CIS, at regional storage [RER]: 1 m2
  Europe

## Inputs from technosphere
- Transport, transoceanic freight ship [OCE]: 253.41 tkm; lognormal SD95 2.095
  (4,5,na,na,na,na); import from US and Asia to Rotterdam
- Photovoltaic panel, CIS, at plant [DE]: 1 m2; lognormal SD95 3.0033
  (1,1,1,1,1,3);
- Transport, freight, lorry, fleet average [RER]: 16.098 tkm; lognormal SD95 2.095
  (4,5,na,na,na,na); transport from Rotterdam to regional storage

## Sources
- Frischknecht R., Itten R., Sinha P., de Wild-Scholten M., Zhank J., 2020, 2015 - LCI and LCA photovoltaic systems - Frischknecht, Project report, 174, IEA PVPS Task 12, Petten, NL
Frischknecht R.,, Stolz P., Sinha P., de Wild-Scholten M. (2020) Life Cycle Inventories and Life Cycle Assessments of Photovoltaic Systems. Project report. Volume: 174. IEA PVPS Task 12.
Type: Separate publication
Source: Report
First author: Frischknecht R.,
Other authors: Stolz P., Sinha P., de Wild-Scholten M.
Year: 2020
Title of anthology: Project report
Publisher: IEA PVPS Task 12
Volume No: 174
Original title: Life Cycle Inventories and Life Cycle Assessments of Photovoltaic Systems

## Validation
Proof reading validation: 30.09.2020; Other validation: G:\Projekte laufend\174 Photovoltaic, IEA Task 12\2017 Global supply chain\EcoSpold\[174-photovoltaics-global-supply-chain-v2.5.xlsx]X-Process;
