# Disposal, raw sewage sludge, to municipal incineration

Dataset: EcoSpold 1, unit process
Functional unit: 1 kg
Category: waste management / municipal incineration
Geography: CH
Time period: 2000-01 to 2000-12
Generated by: Gabor Doka
accessRestrictedTo: 0
copyright: true

## General comment
This dataset represents the activity of waste disposal of raw sewage sludge in a municipal solid waste incinerator (MSWI) Recommended use of this dataset: for incineration of unfermented sewage sludge from treatment of average municipal wastewater Waste composition (wet, in ppm): upper heating value 5.077 MJ/kg; lower heating value 3.196 MJ/kg; H2O 730000; O 61097; H 13886; C 111090; S 5191.6; N 11827; P 5613.7; B n.a.; Cl n.a.; Br n.a.; F n.a.; I n.a.; Ag n.a.; As 0.50992; Ba n.a.; Cd 0.36239; Co 2.0891; Cr 15.796; Cu 72.712; Hg 0.36239; Mn 68.441; Mo 1.2364; Ni 6.8001; Pb 20.145; Sb n.a.; Se n.a.; Sn 5.1856; V n.a.; Zn 198.1; Be n.a.; Sc n.a.; Sr n.a.; Ti n.a.; Tl n.a.; W n.a.; Si 7705.6; Fe 34796; Ca 13075; Al 3862.6; K n.a.; Mg 1468; Na n.a.; Share of carbon in waste that is biogenic 100%. Share of metals in waste not oxidised and bulk-recyclable (exclude very small or thin parts) Iron: 0%; Alu: 0%; Copper: 0%. One kg of this waste produces 0.126 kg of slag and 0.0168 kg of residues, which are landfilled. Additional solidification with 0.006721 kg of cement. Net energy production: 0.26MJ/kg electric energy and 0.72MJ/kg thermal energy. Recovery of metal scrap to recycling: 0g iron scrap, 0g aluminium scrap, 0g copper scrap.;;

## Included processes
Waste incineration from waste reception gate further downstream (excluding transport to the MSWI plant). Waste-specific air and water emisions from incineration, auxiliary material consumption for flue gas cleaning. Short-term emissions to river water and long-term emisisons to ground water from slag compartment (from bottom ash) and residual material landfill (from solidified fly ashes and scrubber slugde). Waste-specific process energy demands for MSWI and net energy generation.

## Geography
Specific to the technology mix encountered in Switzerland in 2010. Well applicable to modern incineration practices in Europe, North America or Japan.

## Technology
average Swiss MSWI plants in 2010 (grate incinerators) with electrostatic precipitator for fly ash (ESP), wet flue gas scrubber and 25% SNCR , 42.77% SCR-high dust , 32.68% SCR-low dust -DeNOx facilities and 0% without Denox (weighted according to mass of burnt waste, representing Swiss average). Efficiency of iron scrap separation from slag : 58%. Efficiency of non-ferrous scrap separation from slag : 31%. Gross electric efficiency technology mix 15.84% and Gross thermal efficiency technology mix 28.51%

## Time period
Waste composition as given in literature reference, theoretical data or other source. Transfer coefficients for modern MSWI.

## Reference product
- Disposal, raw sewage sludge, to municipal incineration [CH]: 1 kg
  SWITZERLAND

## Inputs from technosphere
- Chemicals inorganic, at plant [GLO]: 5.0996e-5 kg; lognormal SD95 1.9487
  auxilliary inputs for the wastewater treatment stage of the incinerator plant. Proxy for Polyelectrolyte. uncertainty calculated from uncertainty in average Polyelectrolyte input, of transfer coefficients in the incinerator, and the uncertainty of the waste composition of this waste
- Transport, freight, rail [RER]: 0.0081439 tkm; lognormal SD95 1.7749
  Transport services to transport incineration residues to landfills and to transport auxilliary inputs of the incinerator plant. uncertainty calculated from uncertainty in average auxiliary material input, the uncertainty of the waste composition of this waste and the uncertainty in generic transportation distances
- Municipal waste incineration plant [CH]: 2.5e-10 p; lognormal SD95 1
  demands per kilogram waste. uncertainty is heeded in the module
- Hydrochloric acid, 30% in H2O, at plant [RER]: 1.3404e-5 kg; lognormal SD95 1.9487
  auxilliary inputs for the wastewater treatment stage of the incinerator plant. uncertainty calculated from uncertainty in average HCl input, of transfer coefficients in the incinerator, and the uncertainty of the waste composition of this waste
- Process-specific burdens, slag compartment [CH]: 0.12574 kg; lognormal SD95 1.5346
  mass-specific expenditures required for landfilling of bottom ash. uncertainty is calculated from uncertainties in waste composition and transfer coefficients in incinerator
- Quicklime, milled, packed, at plant [CH]: 8.3607e-5 kg; lognormal SD95 2.8738
  auxilliary inputs for the flue gas treatment stage of the incinerator plant. uncertainty calculated from uncertainty in average CaO input, of transfer coefficients in the incinerator, and the uncertainty of the waste composition of this waste
- Process-specific burdens, residual material landfill [CH]: 0.016803 kg; lognormal SD95 1.5
  mass-specific expenditures required for landfilling of incineration residues. uncertainty is calculated from uncertainties in waste composition and transfer coefficients in incinerator
- Slag compartment [CH]: 2.2353e-10 p; lognormal SD95 1.5346
  landfill infrastructure required for landfilling of bottom ash. uncertainty is calculated from uncertainties in waste composition and transfer coefficients in incinerator
- Water, decarbonised, at plant [RER]: 0.32516 kg; lognormal SD95 3.6575
  Incinerator process water used in flue gas scrubber stage. uncertainty calculated from uncertainty in average water input, and the uncertainty of the waste composition of this waste
- Ammonia, liquid, at regional storehouse [CH]: 0.001426 kg; lognormal SD95 7.1721
  Input to DeNOx stage (100% NH3). uncertainty calculated from uncertainty in average DeNOx input, uncertainty in the share of thermal NOx, uncertainty of nitrogen content in average municipal waste and the uncertainty in nitrogen content in *this* waste.
- Disposal, cement, hydrated, 0% water, to residual material landfill [CH]: 0.016803 kg; lognormal SD95 1.5653
  Hydrated cement output for solidification of landfilled residual material. Uncertainty calculated from uncertainty of the waste composition of this waste and transfer coefficients in the incinerator and of the solidification recipe.
- Sodium hydroxide, 50% in H2O, production mix, at plant [RER]: 0.0018103 kg; lognormal SD95 2.7318
  auxilliary inputs for the flue gas treatment stage of the incinerator plant. uncertainty calculated from uncertainty in average NaOH input, of transfer coefficients in the incinerator, and the uncertainty of the waste composition of this waste
- Transport, freight, lorry, 16t-32t gross weight, fleet average [CH]: 0.0079602 tkm; lognormal SD95 1.3699
  (same comment as for Transport, freight, rail)
- Natural gas, burned in industrial furnace 1MW [CH]: 0.26665 MJ; lognormal SD95 7.1721
  Input to DeNOx stage, to heat up flue gas in low-dust SCR. uncertainty calculated from uncertainty in average DeNOx input, uncertainty in the share of thermal NOx, uncertainty of nitrogen content in average municipal waste and the uncertainty in nitrogen content in *this* waste.
- Chromium oxide, flakes, at plant [RER]: 1.8233e-6 kg; lognormal SD95 10.506
  Input to DeNOx stage. uncertainty calculated from uncertainty in average DeNOx input, uncertainty in the share of thermal NOx, uncertainty of nitrogen content in average municipal waste and the uncertainty in nitrogen content in *this* waste.
- Iron (III) chloride, 40% in H2O, at plant [CH]: 5.4279e-6 kg; lognormal SD95 3.6575
  auxilliary inputs for the wastewater treatment stage of the incinerator plant. uncertainty calculated from uncertainty in average FeCl3 input, of transfer coefficients in the incinerator, and the uncertainty of the waste composition of this waste
- Titanium dioxide, production mix, at plant [RER]: 8.934e-5 kg; lognormal SD95 10.506
  Input to DeNOx stage (TiO2 catalyst carrier) uncertainty calculated from uncertainty in average DeNOx input, uncertainty in the share of thermal NOx, uncertainty of nitrogen content in average municipal waste and the uncertainty in nitrogen content in *this* waste.
- Chemicals organic, at plant [GLO]: 6.0939e-6 kg; lognormal SD95 13.304
  auxilliary inputs for the wastewater treatment stage of the incinerator plant. Proxy for (pure) Trisodium-trimercapto-s-triazine (CAS 17766-26-6), used as 15% diluted solution, aka TMT15. uncertainty calculated from uncertainty in average TMT15 input, of transfer coefficients in the incinerator, and the uncertainty of the waste composition of this waste
- Residual material landfill facility [CH]: 3.5005e-11 p; lognormal SD95 1.5
  landfill infrastructure required for landfilling of incineration residues. uncertainty is calculated from uncertainties in waste composition and transfer coefficients in incinerator
- Cement, unspecified, at plant [CH]: 0.006721 kg; lognormal SD95 1.5653
  Cement required for solidification of landfilled residual material. Uncertainty calculated from uncertainty of the waste composition of this waste, of transfer coefficients in the incinerator and of the solidification recipe.

## Emissions to nature
- Mercury [emissions to water, river]: 3.9357e-10 kg; lognormal SD95 9.0377
  Emissions to water from waste composition and transfer coefficients in incinerator and landfills. uncertainty is calculated from uncertainties in waste composition and transfer coefficients in incinerator and landfills
- Cadmium [emissions to air, high. pop.]: 1.8471e-10 kg; lognormal SD95 13.838
  Emission to air from waste composition and transfer coefficients. uncertainty is calculated from uncertainties in waste composition and transfer coefficients in incinerator
- Iron [emissions to water, river]: 9.1474e-7 kg; lognormal SD95 4.6466
  (same comment as for Mercury)
- Calcium [emissions to air, high. pop.]: 0.0001029 kg; lognormal SD95 3.24
  (same comment as for Cadmium)
- TOC, Total Organic Carbon [emissions to water, groundwater, long-term]: 0.0003301 kg; lognormal SD95 1.709
  Long-term emissions from landfilling of incineration residues. uncertainty is calculated from uncertainties in waste composition and transfer coefficients in incinerator and landfills.
- Copper [emissions to water, river]: 9.4219e-9 kg; lognormal SD95 6.7346
  (same comment as for Mercury)
- COD, Chemical Oxygen Demand [emissions to water, river]: 0.00012995 kg; lognormal SD95 2.0575
  (same comment as for Mercury)
- Benzene, pentachloro- [emissions to air, high. pop.]: 2.2366e-10 kg; lognormal SD95 1.7202
  Incomplete combustion product emitted to air. uncertainty calculated from uncertainty in average operation emissions, and the uncertainty of the flue gas volume from this waste.
- Tin [emissions to water, groundwater, long-term]: 1.9846e-6 kg; lognormal SD95 19.416
  (same comment as for TOC, Total Organic Carbon)
- Manganese [emissions to air, high. pop.]: 1.3071e-8 kg; lognormal SD95 7.7284
  (same comment as for Cadmium)
- Dinitrogen monoxide [emissions to air, high. pop.]: 0.00017639 kg; lognormal SD95 8.3144
  Nitrogen species emitted to air after DeNOx stage. uncertainty calculated from uncertainty in average N-emissions and uncertainty in the share of thermal NOx and the uncertainty in nitrogen content in *this* waste.
- Lead [emissions to water, groundwater, long-term]: 9.7398e-6 kg; lognormal SD95 63.69
  (same comment as for TOC, Total Organic Carbon)
- Manganese [emissions to water, river]: 1.0654e-8 kg; lognormal SD95 6.4784
  (same comment as for Mercury)
- BOD5, Biological Oxygen Demand [emissions to water, groundwater, long-term]: 0.00027287 kg; lognormal SD95 1.709
  (same comment as for TOC, Total Organic Carbon)
- Cobalt [emissions to air, high. pop.]: 3.7993e-9 kg; lognormal SD95 11.492
  (same comment as for Cadmium)
- Arsenic [emissions to air, high. pop.]: 3.9943e-9 kg; lognormal SD95 13.25
  (same comment as for Cadmium)
- Calcium [emissions to water, river]: 0.00014475 kg; lognormal SD95 2.8585
  (same comment as for Mercury)
- Silicon [emissions to water, groundwater, long-term]: 0.00077826 kg; lognormal SD95 90.026
  (same comment as for TOC, Total Organic Carbon)
- Mercury [emissions to water, groundwater, long-term]: 2.3081e-8 kg; lognormal SD95 36.569
  (same comment as for TOC, Total Organic Carbon)
- Nickel [emissions to water, river]: 4.569e-9 kg; lognormal SD95 15.352
  (same comment as for Mercury)
- Iron [emissions to air, high. pop.]: 6.236e-8 kg; lognormal SD95 2.9241
  (same comment as for Cadmium)
- Nitrate [emissions to water, river]: 0.00015076 kg; lognormal SD95 2.7053
  (same comment as for Mercury)
- Dioxin, 2,3,7,8 Tetrachlorodibenzo-p- [emissions to air, high. pop.]: 8.466e-14 kg; lognormal SD95 3.4405
  (same comment as for Benzene, pentachloro-)
- Silicon [emissions to water, river]: 1.8892e-6 kg; lognormal SD95 5.0124
  (same comment as for Mercury)
- Iron [emissions to water, groundwater, long-term]: 0.017554 kg; lognormal SD95 3.5996
  (same comment as for TOC, Total Organic Carbon)
- NMVOC, non-methane volatile organic compounds, unspecified origin [emissions to air, high. pop.]: 1.9266e-6 kg; lognormal SD95 1.7202
  (same comment as for Benzene, pentachloro-)
- Carbon dioxide, biogenic [emissions to air, high. pop.]: 0.40475 kg; lognormal SD95 1.9534
  (same comment as for Cadmium)
- Tin [emissions to water, river]: 1.3719e-10 kg; lognormal SD95 16.669
  (same comment as for Mercury)
- Copper [emissions to water, groundwater, long-term]: 6.4949e-5 kg; lognormal SD95 7.2886
  (same comment as for TOC, Total Organic Carbon)
- Phosphate [emissions to water, river]: 3.1561e-6 kg; lognormal SD95 3.4524
  (same comment as for Mercury)
- Molybdenum [emissions to water, river]: 3.3768e-7 kg; lognormal SD95 8.048
  (same comment as for Mercury)
- Cobalt [emissions to water, groundwater, long-term]: 1.7018e-6 kg; lognormal SD95 10.562
  (same comment as for TOC, Total Organic Carbon)
- Zinc [emissions to water, river]: 1.7873e-8 kg; lognormal SD95 5.4884
  (same comment as for Mercury)
- Cyanide [emissions to air, high. pop.]: 3.7897e-5 kg; lognormal SD95 8.3144
  (same comment as for Dinitrogen monoxide)
- Carbon monoxide, biogenic [emissions to air, high. pop.]: 7.1961e-5 kg; lognormal SD95 5.7341
  (same comment as for Benzene, pentachloro-)
- Aluminium [emissions to water, groundwater, long-term]: 0.0027933 kg; lognormal SD95 3.7461
  (same comment as for TOC, Total Organic Carbon)
- Nickel [emissions to water, groundwater, long-term]: 6.5274e-6 kg; lognormal SD95 9.6791
  (same comment as for TOC, Total Organic Carbon)
- Tin [emissions to air, high. pop.]: 3.3873e-12 kg; lognormal SD95 10.89
  (same comment as for Cadmium)
- Lead [emissions to water, river]: 1.927e-9 kg; lognormal SD95 7.2973
  (same comment as for Mercury)
- BOD5, Biological Oxygen Demand [emissions to water, river]: 0.00012828 kg; lognormal SD95 2.0792
  (same comment as for Mercury)
- Chromium VI [emissions to water, river]: 4.4147e-7 kg; lognormal SD95 9.6181
  (same comment as for Mercury)
- TOC, Total Organic Carbon [emissions to water, river]: 5.6748e-5 kg; lognormal SD95 2.0604
  (same comment as for Mercury)
- Sulfur dioxide [emissions to air, high. pop.]: 5.521e-5 kg; lognormal SD95 3.878
  (same comment as for Cadmium)
- Cadmium [emissions to water, river]: 3.4733e-11 kg; lognormal SD95 10.742
  (same comment as for Mercury)
- Zinc [emissions to water, groundwater, long-term]: 6.0242e-5 kg; lognormal SD95 31.821
  (same comment as for TOC, Total Organic Carbon)
- Chromium VI [emissions to water, groundwater, long-term]: 1.449e-6 kg; lognormal SD95 13.249
  (same comment as for TOC, Total Organic Carbon)
- Nitrate [emissions to water, groundwater, long-term]: 0.00042538 kg; lognormal SD95 3.2933
  (same comment as for TOC, Total Organic Carbon)
- Sulfate [emissions to water, river]: 0.0026337 kg; lognormal SD95 2.4681
  (same comment as for Mercury)
- Heat, waste [emissions to air, high. pop.]: 3.7479 MJ; lognormal SD95 1.8741
  Waste heat generated from heating value of this waste plus any electricity required to process it. uncertainty is calculated from uncertainties in waste composition and uncertainties in energy efficiency and the uncertainty in internal energy demand
- Calcium [emissions to water, groundwater, long-term]: 0.0097394 kg; lognormal SD95 3.0628
  (same comment as for TOC, Total Organic Carbon)
- Sulfate [emissions to water, groundwater, long-term]: 0.012858 kg; lognormal SD95 2.6819
  (same comment as for TOC, Total Organic Carbon)
- DOC, Dissolved Organic Carbon [emissions to water, groundwater, long-term]: 0.0003301 kg; lognormal SD95 1.709
  (same comment as for TOC, Total Organic Carbon)
- COD, Chemical Oxygen Demand [emissions to water, groundwater, long-term]: 0.00083422 kg; lognormal SD95 1.709
  (same comment as for TOC, Total Organic Carbon)
- Aluminium [emissions to water, river]: 4.1802e-7 kg; lognormal SD95 6.3358
  (same comment as for Mercury)
- Arsenic [emissions to water, river]: 3.5323e-7 kg; lognormal SD95 11.937
  (same comment as for Mercury)
- Phosphorus [emissions to air, high. pop.]: 5.7049e-6 kg; lognormal SD95 3.8809
  (same comment as for Cadmium)
- Magnesium [emissions to water, river]: 6.8495e-6 kg; lognormal SD95 5.8427
  (same comment as for Mercury)
- Heat, waste [emissions to water, river]: 1.307 MJ; lognormal SD95 1.8741
  (same comment as for Heat, waste)
- Silicon [emissions to air, high. pop.]: 1.2002e-8 kg; lognormal SD95 3.9204
  (same comment as for Cadmium)
- Zinc [emissions to air, high. pop.]: 1.3278e-7 kg; lognormal SD95 6.6049
  (same comment as for Cadmium)
- Molybdenum [emissions to air, high. pop.]: 1.6268e-9 kg; lognormal SD95 12.18
  (same comment as for Cadmium)
- Manganese [emissions to water, groundwater, long-term]: 4.2223e-5 kg; lognormal SD95 16.892
  (same comment as for TOC, Total Organic Carbon)
- Benzo(a)pyrene [emissions to air, high. pop.]: 9.4204e-13 kg; lognormal SD95 3.4405
  (same comment as for Benzene, pentachloro-)
- Cobalt [emissions to water, river]: 3.7849e-10 kg; lognormal SD95 14.163
  (same comment as for Mercury)
- Molybdenum [emissions to water, groundwater, long-term]: 8.9707e-7 kg; lognormal SD95 11.965
  (same comment as for TOC, Total Organic Carbon)
- Ammonia [emissions to air, high. pop.]: 1.6766e-6 kg; lognormal SD95 7.6535
  (same comment as for Dinitrogen monoxide)
- Lead [emissions to air, high. pop.]: 1.6596e-9 kg; lognormal SD95 9
  (same comment as for Cadmium)
- Magnesium [emissions to air, high. pop.]: 1.5484e-6 kg; lognormal SD95 4.8841
  (same comment as for Cadmium)
- DOC, Dissolved Organic Carbon [emissions to water, river]: 5.6748e-5 kg; lognormal SD95 2.0604
  (same comment as for Mercury)
- Chromium [emissions to water, river]: 1.2265e-9 kg; lognormal SD95 9.2993
  (same comment as for Mercury)
- Cadmium [emissions to water, groundwater, long-term]: 2.6444e-8 kg; lognormal SD95 210.41
  (same comment as for TOC, Total Organic Carbon)
- Toluene [emissions to air, high. pop.]: 8.4666e-8 kg; lognormal SD95 1.7202
  (same comment as for Benzene, pentachloro-)
- Phosphate [emissions to water, groundwater, long-term]: 0.0007522 kg; lognormal SD95 70.836
  (same comment as for TOC, Total Organic Carbon)
- Aluminium [emissions to air, high. pop.]: 3.1493e-9 kg; lognormal SD95 4.4521
  (same comment as for Cadmium)
- Methane, biogenic [emissions to air, high. pop.]: 6.35e-7 kg; lognormal SD95 1.7202
  (same comment as for Benzene, pentachloro-)
- Mercury [emissions to air, high. pop.]: 1.0275e-8 kg; lognormal SD95 13.616
  (same comment as for Cadmium)
- Particulates, < 2.5 um [emissions to air, high. pop.]: 5.0542e-6 kg; lognormal SD95 3.4405
  (same comment as for Benzene, pentachloro-)
- Magnesium [emissions to water, groundwater, long-term]: 0.0013 kg; lognormal SD95 4.6223
  (same comment as for TOC, Total Organic Carbon)
- Nickel [emissions to air, high. pop.]: 8.5425e-9 kg; lognormal SD95 10.112
  (same comment as for Cadmium)
- Benzene [emissions to air, high. pop.]: 4.2333e-8 kg; lognormal SD95 1.7202
  (same comment as for Benzene, pentachloro-)
- Benzene, hexachloro- [emissions to air, high. pop.]: 8.8516e-11 kg; lognormal SD95 1.7202
  (same comment as for Benzene, pentachloro-)
- Phenol, pentachloro- [emissions to air, high. pop.]: 1.8435e-11 kg; lognormal SD95 1.7202
  (same comment as for Benzene, pentachloro-)
- Chromium [emissions to air, high. pop.]: 1.3793e-8 kg; lognormal SD95 9.1809
  (same comment as for Cadmium)
- Particulates, > 2.5 um, and < 10um [emissions to air, high. pop.]: 2.5398e-8 kg; lognormal SD95 2.2936
  (same comment as for Benzene, pentachloro-)
- Arsenic [emissions to water, groundwater, long-term]: 1.527e-7 kg; lognormal SD95 13.125
  (same comment as for TOC, Total Organic Carbon)
- Nitrogen oxides [emissions to air, high. pop.]: 0.00053091 kg; lognormal SD95 7.6535
  sum of fuel-Nox and thermal-NOx emitted to air after DeNOx stage. uncertainty calculated from uncertainty in average N-emissions and uncertainty in the share of thermal NOx and the uncertainty in nitrogen content in *this* waste.
- Copper [emissions to air, high. pop.]: 6.6598e-9 kg; lognormal SD95 7.6729
  (same comment as for Cadmium)

## Sampling procedure
fully waste-specific calculation based on literature data for average MSWI operation performance

## Extrapolations
Typical elemental transfer coefficients from current studies for modern MSWI, completed with data from coal power plants and estimates, adapted for inert/burnable waste.

## Uncertainty adjustments
uncertainty of waste input composition data derived from generic formula GSD(c) = N*ln(c)+1

## Sources
- Doka G., 2013, 2013 - Updates LCI waste treatment services - Doka, -, Doka LCA, Zuerich, CH
Doka G. (2013) Updates to Life Cycle Inventories of Waste Treatment Services - part II: waste incineration. Doka LCA. Zurich.
Type: Separate publication
Source: Report to document the 2013 changes to the MSWI incinerator model and datasets (URL: http://www.doka.ch/ecoinventMSWIupdateLCI2013.pdf). To be read with the ecoinvent Nr 13 report (Doka 2009, Life Cycle Inventories of Waste Treatment Services) for ecoinvent v2.2.
First author: Doka G.
Year: 2013
Place of publication: Zurich
Publisher: Doka LCA
Original title: Updates to Life Cycle Inventories of Waste Treatment Services - part II: waste incineration

## Validation
Proof reading validation: Passed.; Other validation: none;
