# Blast furnace slag, at plant

Dataset: EcoSpold 1, unit process
Functional unit: 1 kg
Category: metals / extraction
Geography: RER
Time period: 2015-01 to 2015-12
Generated by: Mischa Zschokke
accessRestrictedTo: 0
copyright: true

## General comment
Total amount of produced slag is 0.248 kg/kg pig iron. Slag is economically allocated with factor 0.015, assumption: 94% of slag is reused, 6% is landfilled.;
Synonyms: In UVEK2018 enthalten;

## Geography
Data apply to the production in Europe

## Technology
Industry data.

## Time period
Time of publications.

## Reference product
- Blast furnace slag, at plant [RER]: 1 kg
  Europe

## Inputs from technosphere
- Tap water, at user [CH]: 5.0201e-5 kg; lognormal SD95 1.1267
  (2,2,3,1,1,nA,BU:1.05); process water; Remus (2013)
- Hard coal mix, at regional storage [UCTE]: 0.0023919 kg; lognormal SD95 1.1267
  (2,2,3,1,1,nA,BU:1.05); ; Remus (2013)
- Compressed air, average installation, <30kW, 8 bar gauge, at supply network [RER]: 0.00013436 m3; lognormal SD95 1.1267
  (2,2,3,1,1,nA,BU:1.05); ; Remus (2013)
- Light fuel oil, at regional storage [RER]: 0.00044443 kg; lognormal SD95 1.1267
  (2,2,3,1,1,nA,BU:1.05); ; Remus (2013)
- Natural gas, high pressure, at consumer [RER]: 0.0012019, 0.0024805 MJ (2 entries); lognormal SD95 1.1267
  (2,2,3,1,1,nA,BU:1.05); ; Remus (2013)
- Disposal, slag, unalloyed electr. steel, 0% water, to residual material landfill [CH]: 0.0002197 kg; lognormal SD95 1.1267
  (2,2,3,1,1,nA,BU:1.05); slag, 6 % landfilled; Remus (2013)
- Transport, barge [RER]: 0.00024362 tkm; lognormal SD95 2.0171
  (2,2,3,1,1,nA,BU:2); ; Remus (2013)
- Basic oxygen furnace gas, burned in power plant [RER]: 0.0031449 MJ; lognormal SD95 1.1267
  (2,2,3,1,1,nA,BU:1.05); ; Remus (2013)
- Coke oven gas, at plant [GLO]: 0.0041933, 0.00031671 MJ (2 entries); lognormal SD95 1.1267
  (2,2,3,1,1,nA,BU:1.05); ; Remus (2013)
- Oxygen, liquid, at plant [RER]: 0.00090727, 0.00080322 kg (2 entries); lognormal SD95 1.1267
  (2,2,3,1,1,nA,BU:1.05); ; Remus (2013)
- Pig iron, at plant [RER]: 0.00029678 kg; lognormal SD95 1.1267
  (2,2,3,1,1,nA,BU:1.05); returned materials; Remus (2013)
- Steam, for chemical processes, at plant [RER]: 0.00088661 kg; lognormal SD95 1.1267
  (2,2,3,1,1,nA,BU:1.05); steam; Remus (2013)
- Pellets, iron, at plant [RER]: 0.0052859 kg; lognormal SD95 1.1267
  (2,2,3,1,1,nA,BU:1.05); ; Remus (2013)
- Hard coal coke, at plant [RER]: 0.0053006 MJ; lognormal SD95 1.1267
  (2,2,3,1,1,nA,BU:1.05); ; Remus (2013)
- Transport, freight, lorry, fleet average [RER]: 0.00014824 tkm; lognormal SD95 2.0171
  (2,2,3,1,1,nA,BU:2); ; Remus (2013)
- Limestone, at mine [CH]: 0.00037946 kg; lognormal SD95 1.1267
  (2,2,3,1,1,nA,BU:1.05); ; Remus (2013)
- Blast furnace gas, burned in power plant [RER]: 0.022679 MJ; lognormal SD95 1.1267
  (2,2,3,1,1,nA,BU:1.05); ; Remus (2013)
- Disposal, sludge, pig iron production, 8.6% water, to residual material landfill [CH]: 0.00018013 kg; lognormal SD95 1.1267
  (2,2,3,1,1,nA,BU:1.05); top gas sludge; Remus (2013)
- Nitrogen, liquid, at plant [RER]: 0.00084967 kg; lognormal SD95 1.1267
  (2,2,3,1,1,nA,BU:1.05); ; Remus (2013)
- Sinter, iron, at plant [RER]: 0.016094 kg; lognormal SD95 1.1267
  (2,2,3,1,1,nA,BU:1.05); ; Remus (2013)
- Blast furnace [RER]: 1.9686e-13 p; lognormal SD95 3.0162
  (2,2,3,1,1,nA,BU:3); based on UVEK:2018;
- Transport, freight, rail [RER]: 0.0037156 tkm; lognormal SD95 2.0171
  (2,2,3,1,1,nA,BU:2); ; Remus (2013)
- Transport, transoceanic freight ship [OCE]: 0.021926 tkm; lognormal SD95 2.0171
  (2,2,3,1,1,nA,BU:2); ; Remus (2013)
- Disposal, inert waste, 5% water, to construction waste landfill [CH]: 4.5772e-5 kg; lognormal SD95 1.1267
  (2,2,3,1,1,nA,BU:1.05); used fractory - alltough partially recycled total amount is assumed to be diposited in intert material landfill; Remus (2013)
- Treatment, pig iron production effluent, to wastewater treatment, class 3 [CH]: 0.00010203 m3; lognormal SD95 1.1267
  (2,2,3,1,1,nA,BU:1.05); waste water; Remus (2013)
- Iron ore, 65% Fe, at beneficiation [GLO]: 0.0026577 kg; lognormal SD95 1.1267
  (2,2,3,1,1,nA,BU:1.05); ; Remus (2013)
- Electricity, medium voltage, production ENTSO-E, at grid: 0.0010992 kWh; lognormal SD95 1.1267
  (2,2,3,1,1,nA,BU:1.05); ; Remus (2013)

## Inputs from nature
- Water, cooling, unspecified natural origin/m3 [resources, in water]: 0.00017179 m3; lognormal SD95 1.1267
  (2,2,3,1,1,nA,BU:1.05); ; Remus (2013)

## Emissions to nature
- Carbon monoxide, fossil [emissions to air, unspecified]: 4.2228e-7 kg; lognormal SD95 5.0184
  (2,2,3,1,1,nA,BU:5); ; Remus (2013)
- Manganese [emissions to air, unspecified]: 7.2496e-10 kg; lognormal SD95 5.0184
  (2,2,3,1,1,nA,BU:5); ; Remus (2013)
- Particulates, < 2.5 um [emissions to air, unspecified]: 1.3471e-6 kg; lognormal SD95 3.0163
  (2,2,3,2,2,nA,BU:3); dust, emissions to air from BF cast house + emissions from coal preparation for injection + emissions from the charging zone after abatement (2.5 um); Remus (2013)
- Cadmium [emissions to air, unspecified]: 2.1262e-12 kg; lognormal SD95 5.0184
  (2,2,3,1,1,nA,BU:5); ; Remus (2013)
- Particulates, > 2.5 um, and < 10um [emissions to air, unspecified]: 2.7596e-7 kg; lognormal SD95 2.0172
  (2,2,3,2,2,nA,BU:2); PM10, emissions to air from BF cast house + emissions from the charging zone ; Remus (2013)
- Lead [emissions to air, unspecified]: 1.9637e-10 kg; lognormal SD95 5.0184
  (2,2,3,1,1,nA,BU:5); ; Remus (2013)
- Nitrogen oxides [emissions to air, unspecified]: 3.0711e-8 kg; lognormal SD95 1.5217
  (2,2,3,1,1,nA,BU:1.5); ; Remus (2013)
- Mercury [emissions to air, unspecified]: 1.8899e-12 kg; lognormal SD95 5.0184
  (2,2,3,1,1,nA,BU:5); ; Remus (2013)
- Chromium [emissions to air, unspecified]: 9.7301e-11 kg; lognormal SD95 5.0184
  (2,2,3,1,1,nA,BU:5); ; Remus (2013)
- Sulfur dioxide [emissions to air, unspecified]: 1.4913e-6 kg; lognormal SD95 1.1267
  (2,2,3,1,1,nA,BU:1.05); ; Remus (2013)
- Carbon dioxide, fossil [emissions to air, unspecified]: 0.0126 kg; lognormal SD95 1.1267
  (2,2,3,1,1,nA,BU:5); ; calculated CO2 emissions from burned CO without the share of emitted CO2 that is credited to energy production
- Zinc [emissions to air, unspecified]: 1.2344e-10 kg; lognormal SD95 5.0184
  (2,2,3,1,1,nA,BU:5); ; Remus (2013)
- Nickel [emissions to air, unspecified]: 9.302e-11 kg; lognormal SD95 5.0184
  (2,2,3,1,1,nA,BU:5); ; Remus (2013)
- Arsenic [emissions to air, unspecified]: 1.8899e-12 kg; lognormal SD95 5.0184
  (2,2,3,1,1,nA,BU:5); ; Remus (2013)
- Water [emissions to water, unspecified]: 0.1632 kg; lognormal SD95 2.5196
  (5,5,5,5,5,BU:1.05); All uncertainty-values set to 5.0 by default. Balance of input water

## Sampling procedure
Sampling procedure: Data from literature

## Extrapolations
Some generic datasets from ecoinvent have been used.

## Sources
- Zschokke M., Bolt P., Conrad S., 2021, 2021 - LCI steel and iron processes - Zschokke, Project report, Carbotech AG, Zuerich, CH
M. Zschokke, S. Conrad, P. Bolt (2020) Life cycle inventories of steel and iron processes for UVEK:2020. Project report. carbotech. Zurich, CH.
Type: Separate publication
Source: Report
First author: M. Zschokke
Other authors: S. Conrad, P. Bolt
Year: 2020
Title of anthology: Project report
Place of publication: Zurich, CH
Publisher: carbotech
Original title: Life cycle inventories of steel and iron processes for UVEK:2020

## Validation
Proof reading validation: 23.02.2021; Other validation: C:\Users\Administrator\Desktop\Feb corrected\[pig iron, blast furnace, at plant, RER_v.0.8.xlsx]X-Process;
