# Disposal, hard coal ash, 0% water, to residual material landfill

Dataset: EcoSpold 1, unit process
Functional unit: 1 kg
Category: landfill / residual material landfill
Geography: ES
Time period: 2000-01 to 2000-12
Generated by: Gabor Doka
accessRestrictedTo: 0
copyright: true

## General comment
Inventoried waste contains 100% ES hard coal ash; . waste composition (wet, in ppm): H2O n.a.; O 746170; H n.a.; C n.a.; S 3500.5; N n.a.; P 462.89; B 158.24; Cl 13.652; Br 20.523; F 46.51; I 1.5718; Ag n.a.; As 20.917; Ba 895.15; Cd 1.082; Co 19.676; Cr 83.345; Cu 45.942; Hg 0.059522; Mn 242.26; Mo 7.6085; Ni 62.313; Pb 74.931; Sb 2.393; Se 3.4093; Sn 29.927; V 114.23; Zn 103.49; Be 7.6443; Sc 19.504; Sr 876.86; Ti 3401; Tl 3.7288; W 9.8034; Si 101870; Fe 28247; Ca 8147.3; Al 69293; K 8114.1; Mg 23808; Na 4123.4; Share of carbon in waste that is biogenic 60.4%. ;;

## Included processes
Waste-specific short-term emissions to water from leachate. Long-term emissions from landfill to ground water.

## Geography
Technology encountered in Switzerland in 2000. Landfill includes base seal and leachate collection system.

## Technology
Swiss residual material landfill for polluted, inorganic waste. With base seal and leachate collection system. Recultivation after closure.

## Time period
Waste composition as given in literature reference, theoretical data or other source. Transfer coefficients from prospective model.

## Reference product
- Disposal, hard coal ash, 0% water, to residual material landfill [ES]: 1 kg
  SPAIN

## Inputs from technosphere
- Residual material landfill facility [CH]: 2.0833e-9 p; lognormal SD95 1
  demands per kilogram waste. uncertainty is heeded in the module
- Process-specific burdens, residual material landfill [CH]: 1 kg; lognormal SD95 1
  demands per kilogram waste. uncertainty is heeded in the module

## Emissions to nature
- Chloride [emissions to water, river]: 3.9047e-6 kg; lognormal SD95 9.5078
  uncertainty is calculated from uncertainties in waste composition and transfer coefficients in residual landfill
- Mercury [emissions to water, river]: 4.6904e-12 kg; lognormal SD95 30.299
  (same comment as for Chloride)
- Bromine [emissions to water, groundwater, long-term]: 4.0369e-6 kg; lognormal SD95 8.864
  uncertainty is calculated from uncertainties in waste composition and transfer coefficients in incinerator and landfills.
- Strontium [emissions to water, river]: 5.2998e-7 kg; lognormal SD95 10.598
  (same comment as for Chloride)
- Iron [emissions to water, river]: 2.3635e-7 kg; lognormal SD95 11.881
  (same comment as for Chloride)
- Calcium [emissions to water, river]: 1.229e-6 kg; lognormal SD95 9.722
  (same comment as for Chloride)
- Manganese [emissions to water, groundwater, long-term]: 2.0011e-6 kg; lognormal SD95 170.09
  (same comment as for Bromine)
- Iodide [emissions to water, river]: 1.5718e-6 kg; lognormal SD95 11.684
  (same comment as for Chloride)
- Fluoride [emissions to water, river]: 2.5205e-6 kg; lognormal SD95 9.2885
  (same comment as for Chloride)
- Strontium [emissions to water, groundwater, long-term]: 0.00031746 kg; lognormal SD95 6.9006
  (same comment as for Bromine)
- Potassium [emissions to water, river]: 0.0022872 kg; lognormal SD95 3.7385
  (same comment as for Chloride)
- Nickel [emissions to water, river]: 3.7662e-8 kg; lognormal SD95 14.024
  (same comment as for Chloride)
- Aluminium [emissions to water, river]: 3.434e-5 kg; lognormal SD95 6.6663
  (same comment as for Chloride)
- Tungsten [emissions to water, groundwater, long-term]: 6.3462e-6 kg; lognormal SD95 9.5749
  (same comment as for Bromine)
- Copper [emissions to water, groundwater, long-term]: 1.7685e-6 kg; lognormal SD95 47.295
  (same comment as for Bromine)
- Sodium [emissions to water, river]: 0.0015474 kg; lognormal SD95 4.1275
  (same comment as for Chloride)
- Cadmium [emissions to water, river]: 1.2263e-11 kg; lognormal SD95 28.451
  (same comment as for Chloride)
- Arsenic [emissions to water, groundwater, long-term]: 2.0917e-14 kg; lognormal SD95 8.8925
  (same comment as for Bromine)
- Selenium [emissions to water, groundwater, long-term]: 2.207e-6 kg; lognormal SD95 10.795
  (same comment as for Bromine)
- Chloride [emissions to water, groundwater, long-term]: 9.7476e-6 kg; lognormal SD95 9.1953
  (same comment as for Bromine)
- Arsenic [emissions to water, river]: 2.0917e-5 kg; lognormal SD95 8.7013
  (same comment as for Chloride)
- Boron [emissions to water, groundwater, long-term]: 0.00015559 kg; lognormal SD95 6.6755
  (same comment as for Bromine)
- Chromium VI [emissions to water, river]: 5.0101e-6 kg; lognormal SD95 8.5717
  (same comment as for Chloride)
- Tungsten [emissions to water, river]: 3.4573e-6 kg; lognormal SD95 9.7809
  (same comment as for Chloride)
- Mercury [emissions to water, groundwater, long-term]: 2.8096e-9 kg; lognormal SD95 61.825
  (same comment as for Bromine)
- Zinc [emissions to water, groundwater, long-term]: 1.2684e-6 kg; lognormal SD95 123.61
  (same comment as for Bromine)
- Scandium [emissions to water, groundwater, long-term]: 1.6751e-5 kg; lognormal SD95 8.7866
  (same comment as for Bromine)
- Cadmium [emissions to water, groundwater, long-term]: 7.3454e-9 kg; lognormal SD95 265.67
  (same comment as for Bromine)
- Cobalt [emissions to water, river]: 5.6159e-9 kg; lognormal SD95 16.861
  (same comment as for Chloride)
- Magnesium [emissions to water, groundwater, long-term]: 0.0027051 kg; lognormal SD95 11.11
  (same comment as for Bromine)
- Boron [emissions to water, river]: 1.2398e-6 kg; lognormal SD95 9.7345
  (same comment as for Chloride)
- Beryllium [emissions to water, river]: 4.6202e-9 kg; lognormal SD95 17.181
  (same comment as for Chloride)
- Potassium [emissions to water, groundwater, long-term]: 0.0058268 kg; lognormal SD95 3.5228
  (same comment as for Bromine)
- Phosphate [emissions to water, river]: 5.2936e-7 kg; lognormal SD95 11.968
  (same comment as for Chloride)
- Cobalt [emissions to water, groundwater, long-term]: 3.364e-6 kg; lognormal SD95 16.423
  (same comment as for Bromine)
- Tin [emissions to water, groundwater, long-term]: 5.671e-7 kg; lognormal SD95 89.711
  (same comment as for Bromine)
- Aluminium [emissions to water, groundwater, long-term]: 0.02057 kg; lognormal SD95 4.2537
  (same comment as for Bromine)
- Bromine [emissions to water, river]: 1.6486e-5 kg; lognormal SD95 8.7336
  (same comment as for Chloride)
- Barium [emissions to water, river]: 1.2344e-8 kg; lognormal SD95 15.631
  (same comment as for Chloride)
- Calcium [emissions to water, groundwater, long-term]: 0.00073618 kg; lognormal SD95 15.038
  (same comment as for Bromine)
- Iodide [emissions to water, groundwater, long-term]: 1.5718e-13 kg; lognormal SD95 11.91
  (same comment as for Bromine)
- Antimony [emissions to water, river]: 8.4392e-7 kg; lognormal SD95 11.445
  (same comment as for Chloride)
- Barium [emissions to water, groundwater, long-term]: 7.3942e-6 kg; lognormal SD95 158.98
  (same comment as for Bromine)
- Copper [emissions to water, river]: 2.9525e-9 kg; lognormal SD95 17.889
  (same comment as for Chloride)
- Titanium [emissions to water, groundwater, long-term]: 0.0010096 kg; lognormal SD95 6.4519
  (same comment as for Bromine)
- Chromium VI [emissions to water, groundwater, long-term]: 1.5826e-5 kg; lognormal SD95 7.3368
  (same comment as for Bromine)
- Magnesium [emissions to water, river]: 4.516e-6 kg; lognormal SD95 8.4428
  (same comment as for Chloride)
- Selenium [emissions to water, river]: 1.2023e-6 kg; lognormal SD95 11.015
  (same comment as for Chloride)
- Silicon [emissions to water, river]: 0.00022909 kg; lognormal SD95 5.13
  (same comment as for Chloride)
- Sodium [emissions to water, groundwater, long-term]: 0.002576 kg; lognormal SD95 4.0089
  (same comment as for Bromine)
- Phosphate [emissions to water, groundwater, long-term]: 0.00031709 kg; lognormal SD95 9.9509
  (same comment as for Bromine)
- Manganese [emissions to water, river]: 3.3408e-9 kg; lognormal SD95 17.67
  (same comment as for Chloride)
- Thallium [emissions to water, groundwater, long-term]: 1.35e-6 kg; lognormal SD95 13.113
  (same comment as for Bromine)
- Lead [emissions to water, groundwater, long-term]: 3.8868e-7 kg; lognormal SD95 278.39
  (same comment as for Bromine)
- Molybdenum [emissions to water, groundwater, long-term]: 3.4931e-8 kg; lognormal SD95 10.017
  (same comment as for Bromine)
- Titanium [emissions to water, river]: 1.6855e-6 kg; lognormal SD95 9.3119
  (same comment as for Chloride)
- Nickel [emissions to water, groundwater, long-term]: 2.256e-5 kg; lognormal SD95 9.635
  (same comment as for Bromine)
- Vanadium [emissions to water, river]: 2.8034e-7 kg; lognormal SD95 11.412
  (same comment as for Chloride)
- Vanadium [emissions to water, groundwater, long-term]: 8.7798e-5 kg; lognormal SD95 7.1077
  (same comment as for Bromine)
- Sulfate [emissions to water, groundwater, long-term]: 0.0093747 kg; lognormal SD95 4.0984
  (same comment as for Bromine)
- Zinc [emissions to water, river]: 2.1175e-9 kg; lognormal SD95 18.432
  (same comment as for Chloride)
- Silicon [emissions to water, groundwater, long-term]: 0.10164 kg; lognormal SD95 1.9975
  (same comment as for Bromine)
- Antimony [emissions to water, groundwater, long-term]: 1.5491e-6 kg; lognormal SD95 11.22
  (same comment as for Bromine)
- Fluoride [emissions to water, groundwater, long-term]: 4.399e-5 kg; lognormal SD95 7.8711
  (same comment as for Bromine)
- Iron [emissions to water, groundwater, long-term]: 0.00014157 kg; lognormal SD95 218.93
  (same comment as for Bromine)
- Thallium [emissions to water, river]: 2.2537e-9 kg; lognormal SD95 18.347
  (same comment as for Chloride)
- Tin [emissions to water, river]: 9.4674e-10 kg; lognormal SD95 19.825
  (same comment as for Chloride)
- Sulfate [emissions to water, river]: 0.0011267 kg; lognormal SD95 4.7729
  (same comment as for Chloride)
- Lead [emissions to water, river]: 6.4888e-10 kg; lognormal SD95 20.479
  (same comment as for Chloride)
- Molybdenum [emissions to water, river]: 7.5736e-6 kg; lognormal SD95 9.8144
  (same comment as for Chloride)
- Beryllium [emissions to water, groundwater, long-term]: 2.7675e-6 kg; lognormal SD95 12.172
  (same comment as for Bromine)
- Scandium [emissions to water, river]: 2.7525e-6 kg; lognormal SD95 9.5297
  (same comment as for Chloride)

## Sampling procedure
Landfill model based on observed leachate concentrations in literature. Extrapolated to 60'000 years heeding chemical characteristics. Initial waste composition from various literature sources.

## Uncertainty adjustments
uncertainty of waste input composition data derived from generic formula GSD(c) = N*ln(c)+1. Mean long-term emissions are the emissions until the next glacial period occurs (in 60'000a) and the landfill is eroded. Maximal long-term emissions are the complete emissions of all landfilled material (except Cr). Minimal long-term emissions are derived implicitly from the mean and maximal values assuming a lognormal distribution.

## Sources
- Doka G., 2009, 2009 - LCI waste treatment services - Doka, Final report ecoinvent data v2.1, 13, Swiss Centre for LCI, Doka LCA, Duebendorf and St. Gallen, CH
Doka G. (2009) Life Cycle Inventories of Waste Treatment Services. Final report ecoinvent data v2.1. Volume: 13. Swiss Centre for LCI, Empa - TSL. Dübendorf, CH.
Type: Measurement on site
Source: CD-ROM
First author: Doka G.
Year: 2009
Title of anthology: Final report ecoinvent data v2.1
Place of publication: Dübendorf, CH
Publisher: Swiss Centre for LCI, Empa - TSL
Volume No: 13

## Validation
Proof reading validation: passed.; Other validation: none;
