# Silicon carbide, at plant

Dataset: EcoSpold 1, unit process
Functional unit: 1 kg
Category: chemicals / inorganic
Geography: RER
Time period: 1990-01 to 1992-12
Share of production covered: 10 %
Generated by: Mariska J. de Wild-Scholten
accessRestrictedTo: 0
copyright: true

## General comment
Life cycle inventory for the production process based on raw material inputs and data for energy use and emissions.;
CAS number: 000409-21-2;
Formula: SiC;
Synonyms: silicon monocarbide, carborundum, carbolon;

## Included processes
Gate to gate inventory for production of silicon carbide from silica sand. Including materials and electricity use. Some emissions to air from the process.

## Technology
Average technology data for 4 companies.

## Time period
Time of publication.

## Reference product
- Silicon carbide, at plant [RER]: 1 kg
  Europe

## Inputs from technosphere
- Transport, freight, lorry, fleet average [RER]: 0.10419 tkm; lognormal SD95 2.095
  (4,5,na,na,na,na); Standard distance 50km, 20km for sand
- Disposal, waste, Si waferprod., inorg, 9.4% water, to residual material landfill [CH]: 0.2 kg; lognormal SD95 1.2435
  (3,2,1,1,3,3); Rough estimation
- Petroleum coke, at refinery [RER]: 1.09 kg; lognormal SD95 1.0907
  (2,2,1,1,1,3); de Wild 2007, Internet
- Sodium chloride, powder, at plant [RER]: 0.007 kg; lognormal SD95 1.0907
  (2,2,1,1,1,3); de Wild 2007, Internet
- Electricity, medium voltage, production ENTSO-E, at grid: 8.6 kWh; lognormal SD95 1.2165
  (1,2,1,1,3,3); Liethschmidt 2002
- Wood chips, production mix, wet, measured as dry mass, at forest road & at sawmill [RER]: 0.03583 kg
  (2,2,1,1,1,3); de Wild 2007, Internet
- Silica sand, at plant [DE]: 1.77 kg; lognormal SD95 1.0907
  (2,2,1,1,1,3); de Wild 2007, Internet
- Silicone plant [RER]: 1e-11 p; lognormal SD95 3.0492
  (1,2,1,1,3,3); Estimation
- Transport, freight, rail [RER]: 0.11758 tkm; lognormal SD95 2.095
  (4,5,na,na,na,na); Standard distance 100km

## Emissions to nature
- Heat, waste [emissions to air, high. pop.]: 71.032 MJ; lognormal SD95 1.0907
  (2,2,1,1,1,3); Calculation for petroleum coke, wood chips and electricity
- Ammonia [emissions to air, high. pop.]: 0.00020215 kg; lognormal SD95 1.2165
  (2,2,1,1,1,3); Kollo silicon 2004, environmental report
- Carbon monoxide, fossil [emissions to air, high. pop.]: 0.0084344 kg; lognormal SD95 5.008
  (2,2,1,1,1,3); Kollo silicon 2004, environmental report
- Nitrogen oxides [emissions to air, high. pop.]: 0.0014359 kg; lognormal SD95 1.5095
  (2,2,1,1,1,3); Kollo silicon 2004, environmental report
- Carbon dioxide, biogenic [emissions to air, high. pop.]: 0.064904 kg; lognormal SD95 1.0907
  (2,2,1,1,1,3); Calculation for wood chips
- Sulfur dioxide [emissions to air, high. pop.]: 0.0070961 kg; lognormal SD95 1.0907
  (2,2,1,1,1,3); Kollo silicon 2004, environmental report
- Carbon dioxide, fossil [emissions to air, high. pop.]: 1.896 kg; lognormal SD95 1.0907
  (2,2,1,1,1,3); Calculation for burning of petroleum coke not including carbon in the product

## Sampling procedure
Literature and internet. Average data from 4 companies.

## Extrapolations
Emission data extrapolated with total CO2 emissions.

## Sources
- Jungbluth N., Stucki M., Frischknecht R., 2009, 2009 - Photovoltaics - Jungbluth, Sachbilanzen von Energiesystemen. Final report No. 6 ecoinvent v2.1, 6, Swiss Centre for LCI, ESU-services Ltd., Duebendorf, CH
Jungbluth, N., Stucki, M., Frischknecht, R. (2009) Photovoltaics. Sachbilanzen von Energiesystemen. Final report No. 6 ecoinvent v2.1. Editors: Bauer C.. Volume: 6. Swiss Centre for LCI, PSI. Dübendorf and Villigen, CH.
Type: Measurement on site
Source: CD-ROM
First author: Jungbluth, N.
Other authors: Stucki, M., Frischknecht, R.
Year: 2009
Name of editors: Bauer C.
Title of anthology: Sachbilanzen von Energiesystemen. Final report No. 6 ecoinvent v2.1
Place of publication: Dübendorf and Villigen, CH
Publisher: Swiss Centre for LCI, PSI
Volume No: 6

## Validation
Proof reading validation: Passed.; Other validation: none;
