# Ferrochromium, high-carbon, 68% Cr, at regional storage

Dataset: EcoSpold 1, unit process
Functional unit: 1 kg
Category: metals / alloys
Geography: RER
Time period: 1994-01 to 2003-12
Production volume: n.a. 350'000 t in GER (1994), no info on consumpt. in RER
Generated by: Mischa Classen
accessRestrictedTo: 0
copyright: true

## General comment
The module describes the consump-tion of chromite in Europe in 1994. It is designed for the use of chromite as intermediary product in the pro-duction of ferrochromium, dichro-mate and refractories. This module does not consider secondary sources of chromium. Process data is taken mainly from a material flow analysis for the consumption of chromium compounds in Germany. Results are used as a proxy for the European situation. ;
Synonyms: ferro-chrome, ferrochrome, chromeisen;

## Included processes
The module includes the transportation of high-carbon ferrochromium to Europe. No secondary production considered, since secondary chromium is recycled to the foundries and has to be inventoried in the respective module, i. e. when casting the final rawmaterial in the stainless steel production.

## Geography
This module relates to the consumption in Europe, although the import mix for Germany is chosen. Production relates to a global average.

## Technology
Most transport by ship

## Reference product
- Ferrochromium, high-carbon, 68% Cr, at regional storage [RER]: 1 kg
  Europe

## Inputs from technosphere
- Transport, freight, rail [RER]: 3 tkm; lognormal SD95 2
  (2,2,3,1,1,2,5); calculation based on assumptions
- Transport, transoceanic tanker [OCE]: 11.6 tkm; lognormal SD95 2
  (2,2,3,1,1,2,5); calculation based on assumptions
- Ferrochromium, high-carbon, 68% Cr, at plant [GLO]: 1 kg; lognormal SD95 1.1
  (2,2,3,1,1,2,4)

## Sampling procedure
literature

## Extrapolations
see Geography and Technology

## Sources
- Classen M., Althaus H.-J., Blaser S., Scharnhorst W., Tuchschmid M., Jungbluth N., Faist Emmenegger M., 2009, 2009 - LCI metals - Classen, Final report ecoinvent data v2.1, 10, Swiss Centre for LCI, Empa, ESU-services Ltd., Duebendorf, CH
Classen M., Althaus H.-J., Blaser S., Doka G., Jungbluth N., Tuchschmid M. (2008) Life Cycle Inventories of Metals. Final report ecoinvent data v2.1. Volume: 10. Issue: 0. Swiss Centre for LCI, Empa - TSL. Dübendorf, CH.
Type: Measurement on site
Source: CD-ROM
First author: Classen M.
Other authors: Althaus H.-J., Blaser S., Doka G., Jungbluth N., Tuchschmid M.
Year: 2008
Title of anthology: Final report ecoinvent data v2.1
Place of publication: Dübendorf, CH
Publisher: Swiss Centre for LCI, Empa - TSL
Volume No: 10
Issue No: 0

## Validation
Proof reading validation: Passed.; Other validation: none;
