# Strawberries, conventional, heated greenhouse

Dataset: EcoSpold 1, unit process
Functional unit: 1 kg
Category: agricultural / agricultural production\plant protection
Geography: CH
Time period: 2016-01 to 2022-12
Generated by: Tanja Laube
accessRestrictedTo: 0
copyright: true

## General comment
The inventory refers to the production of 1 kg of conventional strawberries in a heated greenhouse in Switzerland.

## Geography
The inventory is modelled for Switzerland

## Reference product
- Strawberries, conventional, heated greenhouse [CH]: 1 kg

## Inputs from technosphere
- Extrusion, plastic film [RER]: 0.0019231 kg; lognormal SD95 1.22259
  (2,3,1,1,1,5,BU:1.05);
- Average mineral fertiliser, as P2O5, at regional storehouse [RER]: 0.002 kg; lognormal SD95 1.22259
  (2,3,1,1,1,5,BU:1.05);
- Electricity, low voltage, at grid [CH]: 0.0036406, 0.061538 kWh (2 entries); lognormal SD95 1.22259
  (2,3,1,1,1,5,BU:1.05);
- Greenhouse, glass walls and roof, metal tubes [CH]: 0.19231 m2a; lognormal SD95 3.0519
  (2,3,1,1,1,5,BU:3);
- Average mineral fertiliser, as K2O, at regional storehouse [RER]: 0.00475 kg; lognormal SD95 1.22259
  (2,3,1,1,1,5,BU:1.05);
- Pesticide unspecified, at regional storehouse [RER]: 3.0577e-5 kg; lognormal SD95 1.22259
  (2,3,1,1,1,5,BU:1.05);
- Average mineral fertiliser, as N, at regional storehouse [RER]: 0.0042308 kg; lognormal SD95 1.22259
  (2,3,1,1,1,5,BU:1.05);
- Magnesium sulphate, at plant [RER]: 0.00096154 kg; lognormal SD95 1.22259
  (2,3,1,1,1,5,BU:1.05);
- xx Heat, natural gas, at boiler modulating >100kW [RER]: 22.154 MJ; lognormal SD95 1.22259
  (2,3,1,1,1,5,BU:1.05);
- Tap water, unspecified natural origin CH, at user [CH]: 0.015808 kg; lognormal SD95 1.22259
  (2,3,1,1,1,5,BU:1.05);
- Strawberry seedling, for planting, in unheated greenhouse [RER]: 0.86538 p; lognormal SD95 1.22259
  (2,3,1,1,1,5,BU:1.05);
- Polypropylene, granulate, at plant [RER]: 0.0019231 kg; lognormal SD95 1.22259
  (2,3,1,1,1,5,BU:1.05);
- Disposal, polyethylene, 0.4% water, to municipal incineration [CH]: 0.0019231 kg; lognormal SD95 1.22259
  (2,3,1,1,1,5,BU:1.05);
- Transport, freight, lorry, fleet average [CH]: 0.0041712 tkm; lognormal SD95 2.05449
  (2,3,1,1,1,5,BU:2);

## Inputs from nature
- Energy, gross calorific value, in biomass [resources, biotic]: 0.18287 MJ; lognormal SD95 1.2152
  (2,1,1,1,1,5,BU:1.05);
- Carbon dioxide, in air [resources, in air]: 1.9372 kg; lognormal SD95 1.2152
  (2,1,1,1,1,5,BU:1.05);

## Emissions to nature
- Phosphorus [emissions to water, groundwater]: 1.3462e-6 kg; lognormal SD95 1.61689
  (4,1,1,1,1,5,BU:1.5);
- Thiacloprid [emissions to soil, agricultural]: 2.5e-6 kg; lognormal SD95 1.37131
  (4,1,1,1,1,5,BU:1.2);
- Chromium [emissions to water, river]: 3.6538e-7 kg; lognormal SD95 3.09092
  (4,1,1,1,1,5,BU:3);
- Copper [emissions to water, river]: 6.1538e-8 kg; lognormal SD95 3.09092
  (4,1,1,1,1,5,BU:3);
- Nitrogen oxides [emissions to air, low. pop.]: 1.5385e-5 kg; lognormal SD95 1.61689
  (4,1,1,1,1,5,BU:1.5);
- Azoxystrobin [emissions to soil, agricultural]: 3.8462e-7 kg; lognormal SD95 1.37131
  (4,1,1,1,1,5,BU:1.2);
- Quinoxyfen [emissions to soil, agricultural]: 1.9231e-7 kg; lognormal SD95 1.37131
  (4,1,1,1,1,5,BU:1.2);
- Bupirimate [emissions to soil, agricultural]: 7.6923e-7 kg; lognormal SD95 1.37131
  (4,1,1,1,1,5,BU:1.2);
- Water, CH [emissions to air, unspecified]: 14.265 kg; lognormal SD95 1.61689
  (4,1,1,1,1,5,BU:1.5);
- Etoxazole [emissions to soil, agricultural]: 1.9231e-7 kg; lognormal SD95 1.37131
  (4,1,1,1,1,5,BU:1.2);
- Phosphorus [emissions to water, river]: 1.4423e-5 kg; lognormal SD95 1.61689
  (4,1,1,1,1,5,BU:1.5);
- Cadmium [emissions to soil, agricultural]: 6.4615e-8 kg; lognormal SD95 1.31639
  (4,1,1,1,1,5,BU:1.1);
- Ammonia [emissions to air, low. pop.]: 0.00022135 kg; lognormal SD95 1.37131
  (4,1,1,1,1,5,BU:1.2);
- Lead [emissions to water, river]: 2.3077e-9 kg; lognormal SD95 5.10371
  (4,1,1,1,1,5,BU:5);
- Water, embodied in product, CH [economic issues, unspecified]: 0.9 kg; lognormal SD95 1.3001
  (4,1,1,1,1,5,BU:1.05);
- Cadmium [emissions to water, river]: 8.6538e-10 kg; lognormal SD95 3.09092
  (4,1,1,1,1,5,BU:3);
- Zoxamide [emissions to soil, agricultural]: 1.5385e-6 kg; lognormal SD95 1.37131
  (4,1,1,1,1,5,BU:1.2);
- Difenoconazole [emissions to soil, agricultural]: 7.6923e-7 kg; lognormal SD95 1.37131
  (4,1,1,1,1,5,BU:1.2);
- Zinc [emissions to water, river]: 3.0769e-7 kg; lognormal SD95 5.10371
  (4,1,1,1,1,5,BU:5);
- Cyprodinil [emissions to soil, agricultural]: 4.4231e-6 kg; lognormal SD95 1.37131
  (4,1,1,1,1,5,BU:1.2);
- Kresoxim-methyl [emissions to soil, agricultural]: 1.7308e-6 kg; lognormal SD95 1.37131
  (4,1,1,1,1,5,BU:1.2);
- Phenmedipham [emissions to soil, agricultural]: 2.3077e-6 kg; lognormal SD95 1.37131
  (4,1,1,1,1,5,BU:1.2);
- Myclobutanil [emissions to soil, agricultural]: 3.8462e-7 kg; lognormal SD95 1.37131
  (4,1,1,1,1,5,BU:1.2);
- Fludioxonil [emissions to soil, agricultural]: 1.9231e-6 kg; lognormal SD95 1.37131
  (4,1,1,1,1,5,BU:1.2);
- Trifloxystrobin [emissions to soil, agricultural]: 3.0769e-6 kg; lognormal SD95 1.37131
  (4,1,1,1,1,5,BU:1.2);
- Nickel [emissions to water, river]: 1.5e-10 kg; lognormal SD95 5.10371
  (4,1,1,1,1,5,BU:5);
- Nitrate [emissions to water, groundwater]: 0.0024808 kg; lognormal SD95 1.61689
  (4,1,1,1,1,5,BU:1.5);
- N-(2,3-dichloro-4-hydroxyphenyl)-1-methylcyclohexane-1-carboxamide [emissions to soil, agricultural]: 1.0192e-5 kg; lognormal SD95 1.37131
  (4,1,1,1,1,5,BU:1.2);
- Water, CH [emissions to water, unspecified]: 0.00063846 m3; lognormal SD95 1.61689
  (4,1,1,1,1,5,BU:1.5);
- Dinitrogen monoxide [emissions to air, low. pop.]: 7.3077e-5 kg; lognormal SD95 1.61689
  (4,1,1,1,1,5,BU:1.5);

## Sampling procedure
Literature and data from producer

## Sources
- Kaegi T., Conte F., Laube T., Roberts G., 2022, 2022 - LCA strawberry and asparagus production - Kaegi, Carbotech on behalf of BAFU, Carbotech AG, Zuerich, CH

## Validation
15.08.2022 \\tsclient\Schreibtisch\WinShare\BAFU Gemuese\Spargeln und Erdbeeren\[EcoSpold_Bafu_Gemuese_Strawberries conventional heated greenhouse_CH v1.xlsx]X-Process
