# CEM II, A cement, GGBFS with burdens, at plant

Dataset: EcoSpold 1, unit process
Functional unit: 1 kg
Category: construction materials / binder
Geography: CH
Time period: 2015-01 to 2015-12
Generated by: Laura Tschuemperlin
accessRestrictedTo: 0
copyright: true

## General comment
The dataset describes the production of cement (CEM II-A) in Switzerland and covers the representative production mix of CEM II/A-D, CEM II/A-LL and CEM II/A-S according to EN 197-1.
Technology: Industry data. Data approximates average swiss production
Time period: Time of publications.
Version: 1

Local category: Mineralische Baustoffe
Local subcategory: Bindemittel

## Included processes
The activity starts with the clinker in the silo to be used for cement production and with the additional ingredients of the cement at the gate of the cement plant. The activity includes also the electricy used for the grinding of the clinker, griding aids, heat for the drying of additions etc. and ends with the cement produced in the cement mill. The burdens for the production of ground granulated blast furnace slag (GGBFS) are accounted for (economic allocation). The dataset does not include packaging and administration.

## Time period
Time of publications.

## Reference product
- CEM II, A cement, GGBFS with burdens, at plant [CH]: 1 kg
  SWITZERLAND

## Inputs from technosphere
- Ground granulated blast furnace slag, with burdens, at plant [RER]: 0.0018 kg; lognormal SD95 1.3059
  (1,3,3,3,1,1,BU:1.05); ;
- Limestone, crushed, for mill [CH]: 0.161 kg; lognormal SD95 1.2152
  (2,1,1,1,1,5,BU:1.05); ;
- Steel, low-alloyed, at plant [RER]: 4.04e-5 kg; lognormal SD95 1.2152
  (2,1,1,1,1,5,BU:1.05); ;
- Clinker, at plant [CH]: 0.788 kg; lognormal SD95 1.3059
  (2,1,1,1,3,5,BU:1.05); ;
- Cement plant [CH]: 2.73e-11 p; lognormal SD95 3
  (1,1,1,1,1,1,BU:3); ;
- Gypsum, mineral, at mine [CH]: 0.0464 kg; lognormal SD95 1.3001
  (4,5,na,na,na,na,BU:1.05); ;
- Transport, freight, lorry, 16t-32t gross weight, fleet average [CH]: 0.0010306 tkm; lognormal SD95 2.0511
  (2,1,1,1,1,5,BU:2); ;
- Transport, freight, rail [RER]: 0.0012314 tkm; lognormal SD95 2.0511
  (2,1,1,1,1,5,BU:2); ;
- Heavy fuel oil, burned in industrial furnace 1MW, non-modulating [RER]: 0.00121 MJ; lognormal SD95 1.2152
  (2,1,1,1,1,5,BU:1.05); ;
- Ethylene glycol, at plant [RER]: 0.000212 kg; lognormal SD95 1.1267
  (1,3,3,3,1,1,BU:1.05); ;
- Electricity, medium voltage, at grid [CH]: 0.0313 kWh; lognormal SD95 1.3059
  (2,1,1,1,3,5,BU:1.05); ;

## Emissions to nature
- Heat, waste [emissions to air, unspecified]: 0.11268 MJ; lognormal SD95 1.2152
  (2,1,1,1,1,5,BU:1.05); ;

## Sampling procedure
Data represents the average Swiss production of the 6 cement plants that were operational in 2009 - 2009

## Sources
- Tschuemperlin L., Ramseier L., Frischknecht R., 2020, 2020 - LCA selected types of concrete - Tschuemperlin, Project Report, 0, treeze Ltd., Zuerich, CH

## Validation
Proof reading validation: 06.05.2021; Other validation: G:\Projektablage\551 CEM IIIA Beton und Fertigbetonteile\EcoSpold\[551-Zement-Klinker_v0.13_UVEK2021.xlsx]X-Process;
