# Tubular particleboard production, at regional storage, with resource correction

Dataset: EcoSpold 1, unit process
Functional unit: 1 m3
Category: wood / wooden materials\new processes\other material
Geography: CH
Generated by: default
accessRestrictedTo: 0
copyright: true

## Reference product
- Tubular particleboard production, at regional storage, with resource correction [CH]: 1 m3

## Inputs from technosphere
- Transport, freight, rail [RER]: 54.4 tkm
- Tubular particleboard, at plant [RER]: 1 m3
  272 kg/m3
- Transport, freight, lorry, 32t-40t gross weight, fleet average [CH]: 13.6 tkm

## Inputs from nature
- Energy, gross calorific value, in biomass, resource correction [resources, biotic]: -3336.37 MJ
  684-Holzdaten-Ressourcenkorrektur-v0.4

## Sources
- Created for EcoSpold 1 compatibility, Final report ecoinvent data v2.0, 7
Kellenberger D., Althaus H.-J., Jungbluth N., Künniger T. (2007) Life Cycle Inventories of Building Products. Final report ecoinvent data v2.0. Volume: 7. Swiss Centre for LCI, Empa - TSL. Dübendorf, CH.
Type: Measurement on site
Source: CD-ROM
First author: Kellenberger D.
Other authors: Althaus H.-J., Jungbluth N., Künniger T.
Year: 2007
Title of anthology: Final report ecoinvent data v2.0
Place of publication: Dübendorf, CH
Publisher: Swiss Centre for LCI, Empa - TSL
Volume No: 7
