# Micro gas turbine 100kWe

Dataset: EcoSpold 1, unit process, infrastructure
Functional unit: 1 p
Category: heat / natural gas\cogeneration\power unit\infrastructure
Geography: CH
Time period: 2000-01 to 2005-12
Generated by: Alex Primas
accessRestrictedTo: 0
copyright: true

## General comment
The module reflects a micro gas turbine system with 100 kW electrical output. Inventory based on information from literature and different manufacturers. Life time operation is 50'000 h.;

## Included processes
The module includes the most important materials used for production, the energy needed for production, planning and engineering. Also included is the transport of the raw materials and for the engine delivery and installation on the site.

## Geography
Process applicable in central European conditions.

## Technology
Radial turbine with recuperation for preheating the compressed air and fuel gas booster to increase gas pressure. Operation with connection to low pressure gas network. Electrical efficiency 29%, total efficiency 75%.

## Reference product
- Micro gas turbine 100kWe [CH]: 1 p
  SWITZERLAND

## Inputs from technosphere
- Building, multi-storey [RER]: 0.068 m3; lognormal SD95 3.117
  (4,4,2,5,1,5); rough estimation based on company data
- Steel, low-alloyed, at plant [RER]: 2036 kg; lognormal SD95 1.3488
  (2,4,3,2,3,5); data from 250kWel plant adapted
- Transport, freight, lorry, 32t-40t gross weight, fleet average [CH]: 1280 tkm; lognormal SD95 2.1242
  (2,4,3,2,3,5); data from 250kWel plant adapted, assumption for material type
- Welding, arc, steel [RER]: 4 m; lognormal SD95 1.3488
  (2,4,3,2,3,5); data from 250kWel plant adapted, assumption for material type
- Treatment, sewage, from residence, to wastewater treatment, class 2 [CH]: 4.88 m3; lognormal SD95 1.6362
  (4,4,1,2,4,5); approximation for waste water treatment
- Building, hall, steel construction [CH]: 0.021 m2; lognormal SD95 3.117
  (4,4,2,5,1,5); rough estimation based on company data
- Polyvinylchloride, at regional storage [RER]: 30 kg; lognormal SD95 1.3488
  (2,4,3,2,3,5); data from 250kWel plant adapted, assumption for material type
- Electricity, medium voltage, production ENTSO-E, at grid: 2120 kWh; lognormal SD95 1.5841
  (2,4,1,2,4,5); approximation with company data of similar branch
- Electricity, low voltage, at grid [CH]: 800 kWh; lognormal SD95 1.2872
  (3,4,2,1,3,4); estimation based on specific energy demand of engineering hours
- Sheet rolling, chromium steel [RER]: 444 kg; lognormal SD95 1.3488
  (2,4,3,2,3,5); data from 250kWel plant adapted, assumption for process used
- Disposal, building, polyethylene/polypropylene products, to final disposal [CH]: 30 kg; lognormal SD95 1.3488
  (2,4,3,2,3,5); approximation for disposal of plastic parts
- Chromium steel 18/8, at plant [RER]: 444 kg; lognormal SD95 1.3488
  (2,4,3,2,3,5); data from 250kWel plant adapted
- Disposal, building, polyvinylchloride products, to final disposal [CH]: 30 kg; lognormal SD95 1.3488
  (2,4,3,2,3,5); approximation for disposal of plastic parts
- Transport, transoceanic freight ship [OCE]: 32000 tkm; lognormal SD95 2.1242
  (2,4,3,2,3,5); data from 250kWel plant adapted, assumption for material type
- Iron-nickel-chromium alloy, at plant [RER]: 36 kg; lognormal SD95 1.3488
  (2,4,3,2,3,5); data from 250kWel plant adapted
- Construction work, cogen unit 160kWe [RER]: 0.4 p; lognormal SD95 3.1192
  (2,4,3,2,3,5); data from 160 kWel engine cogen plant adapted
- Reinforcing steel, at plant [RER]: 1236 kg; lognormal SD95 1.3488
  (2,4,3,2,3,5); data from 250kWel plant adapted
- Sheet rolling, steel [RER]: 3272 kg; lognormal SD95 1.3488
  (2,4,3,2,3,5); data from 250kWel plant adapted, assumption for process used
- Sheet rolling, aluminium [RER]: 68 kg; lognormal SD95 1.3488
  (2,4,3,2,3,5); data from 250kWel plant adapted, assumption for process used
- Transport, passenger car, fleet average [CH]: 1250 km; lognormal SD95 2.1559
  (4,4,2,1,3,5); estimation
- Aluminium, production mix, wrought alloy, at plant [RER]: 68 kg; lognormal SD95 1.3488
  (2,4,3,2,3,5); data from 250kWel plant adapted
- Light fuel oil, burned in boiler 100kW, non-modulating [CH]: 6000 MJ; lognormal SD95 1.2872
  (3,4,2,1,3,4); estimation based on specific energy demand of engineering hours
- Copper, at regional storage [RER]: 120 kg; lognormal SD95 1.3488
  (2,4,3,2,3,5); data from 250kWel plant adapted
- Natural gas, burned in industrial furnace 1MWth [CH]: 15300 MJ; lognormal SD95 1.5841
  (2,4,1,2,4,5); approximation with company data of similar branch
- Polyethylene, HDPE, granulate, at plant [RER]: 30 kg; lognormal SD95 1.3488
  (2,4,3,2,3,5); data from 250kWel plant adapted, assumption for material type

## Inputs from nature
- Transformation, from unknown [resources, land]: 0.044 m2; lognormal SD95 2.1219
  (4,4,2,5,1,5); rough estimation based on company data
- Transformation, to industrial area, built up [resources, land]: 0.044 m2; lognormal SD95 2.1219
  (4,4,2,5,1,5); rough estimation based on company data
- Water, unspecified natural origin/m3 [resources, in water]: 4.88 m3; lognormal SD95 1.5841
  (2,4,1,2,4,5); approximation with company data of similar branch
- Occupation, industrial area [resources, land]: 2.19 m2a; lognormal SD95 1.6486
  (4,4,2,5,1,5); rough estimation based on company data

## Emissions to nature
- Heat, waste [emissions to air, high. pop.]: 10512 MJ; lognormal SD95 1.5841
  (2,4,1,2,4,5); uncertainty electricity demand
- Water [emissions to water, unspecified]: 4636 kg; lognormal SD95 2.5196
  (5,5,5,5,5,BU:1.05); All uncertainty-values set to 5.0 by default. Balance of input water

## Sampling procedure
Literature data and manufacturer information

## Sources
- Primas A., 2007, 2007 - LCI new CHP systems - Primas, Final report ecoinvent Data v2.0, 20, Swiss Centre for LCI, B&H AG, Duebendorf and Zuerich, CH
Primas A., 0 (2007) Life Cycle Inventories of new CHP systems. Final report ecoinvent Data v2.0. Editors: 0. Volume: 20. Swiss Centre for LCI, B&H AG. Duebendorf and Zurich, CH.
Type: Measurement on site
Source: CD-ROM
First author: Primas A.
Other authors: 0
Year: 2007
Name of editors: 0
Title of anthology: Final report ecoinvent Data v2.0
Place of publication: Duebendorf and Zurich, CH
Publisher: Swiss Centre for LCI, B&H AG
Volume No: 20

## Validation
Proof reading validation: passed; Other validation: none;
