# Operation, maintenance, port

Dataset: EcoSpold 1, unit process, infrastructure
Functional unit: 1 p
Category: water / operations\infrastructure
Geography: RER
Time period: 2000-01 to 2000-12
Generated by: Michael Spielmann
accessRestrictedTo: 0
copyright: true

## General comment
Land use is further distingished in built up area (0.6%), road area (sealed area) (45.6%) and water bodies (54.29%). Emission to waters include emission from production sites on the port site, which are not directly connected to the the transport activities.;

## Included processes
This inventory includes emissions of to water due to non removed oil spills. Land occupation and transformation are taken into account. Energy consumption at the port is based on assumptions for the specifice electricty consumption at the port in Hamburg.

## Geography
Data refers to one port in Europe.

## Time period
Land use data represents conditions in 2002.

## Reference product
- Operation, maintenance, port [RER]: 1 p
  Europe

## Inputs from technosphere
- Electricity, medium voltage, production ENTSO-E, at grid: 2.27e9 kWh; lognormal SD95 2
  data based on literature studies for the port in Hamburg.

## Inputs from nature
All rows: lognormal SD95 1.5
- Transformation, from unknown [resources, land]: 595000 m2
  Estimation based on land occupation and an assumed life span of the port of 100 years.
- Transformation, to industrial area, built up [resources, land]: 415 m2
  Estimation based on land occupation and an assumed life span of the port of 100 years.
- Transformation, to traffic area, road network [resources, land]: 122000 m2
  Estimation based on land occupation and an assumed life span of the port of 100 years.
- Occupation, industrial area, built up [resources, land]: 41500 m2a
  Port statistics and oral communication. Data represent occupied area in 2002
- Occupation, traffic area, road network [resources, land]: 1.22e7 m2a
  Port statistics and oral communication. Data represent occupied area in 2002
- Transformation, to water bodies, artificial [resources, land]: 350000 m2
  Estimation based on land occupation and an assumed life span of the port of 100 years.
- Occupation, water bodies, artificial [resources, land]: 3.5e7 m2a
  Port statistics and oral communication. Data represent occupied area in 2002
- Transformation, to industrial area [resources, land]: 122000 m2
  Estimation based on land occupation and an assumed life span of the port of 100 years.
- Occupation, industrial area [resources, land]: 1.22e7 m2a
  Port statistics and oral communication. Data represent occupied area in 2002

## Emissions to nature
- TOC, Total Organic Carbon [emissions to water, ocean]: 86600 kg; lognormal SD95 2
  own calculation, according to quality guidelines, derived from emissions of oil.
- BOD5, Biological Oxygen Demand [emissions to water, ocean]: 315000 kg; lognormal SD95 2
  own calculation, according to quality guidelines, derived from emissions of oil.
- Oils, unspecified [emissions to water, unspecified]: 100000 kg; lognormal SD95 9.53
  oral communication. The data represents the geomean of a data from 1994-1998.
- COD, Chemical Oxygen Demand [emissions to water, ocean]: 315000 kg; lognormal SD95 2
  own calculation, according to quality guidelines, derived from emissions of oil.
- Heat, waste [emissions to air, low. pop.]: 8.18e9 MJ; lognormal SD95 3
  standard value
- DOC, Dissolved Organic Carbon [emissions to water, ocean]: 86600 kg; lognormal SD95 2
  own calculation, according to quality guidelines, derived from emissions of oil.

## Sampling procedure
literature studies and own assumptions

## Sources
- Spielmann M., Bauer C., Dones R., Tuchschmid M., 2007, 2007 - Transport services - Spielmann, Final report ecoinvent Data v2.0, 14, Swiss Centre for LCI, PSI, ESU-services Ltd., Duebendorf, Villigen and Uster, CH
Spielmann M., Dones R; Bauer C. (2007) Life Cycle Inventories of Transport Services. Final report ecoinvent Data v2.0. Volume: 14. Issue: 0. Swiss Centre for LCI, PSI. Dübendorf and Villigen, CH.
Type: Measurement on site
Source: CD-ROM
First author: Spielmann M.
Other authors: Dones R; Bauer C.
Year: 2007
Title of anthology: Final report ecoinvent Data v2.0
Place of publication: Dübendorf and Villigen, CH
Publisher: Swiss Centre for LCI, PSI
Volume No: 14
Issue No: 0

## Validation
Proof reading validation: passed.; Other validation: none;
