# Solder, paste, Sn63Pb37, for electronics industry, at plant

Dataset: EcoSpold 1, unit process
Functional unit: 1 kg
Category: metals / alloys
Geography: GLO
Time period: 2004-01 to 2004-12
Generated by: Roland Hischier
accessRestrictedTo: 0
copyright: true

## General comment
Data are based on literature (report from a European research project in the field of lead-free soldering). Infrastructure and transportation efforts are based on own assumptions.;

## Included processes
This dataset includes raw material input, auxillaries input, energy consumption and emissions (air), as well as an estimation of the efforts for transportation and of the infrastructure for the production of solder paste.

## Technology
Typical solder material for the electronics industry. Production by melting (of solder bar), atomizing & sieving, followed by mixing with the respective flux. Data based on literature.

## Reference product
- Solder, paste, Sn63Pb37, for electronics industry, at plant [GLO]: 1 kg
  Global

## Inputs from technosphere
- Rosin size, in paper production, at plant [RER]: 0.046 kg; lognormal SD95 1.2238
  (2,3,1,3,1,5,3); data from literature
- Electricity, medium voltage, production ENTSO-E, at grid: 3.18 kWh; lognormal SD95 1.2238
  (2,3,1,3,1,5,3); data from literature
- Disposal, tin sheet, 0% water, to sanitary landfill [CH]: 0.1 kg; lognormal SD95 2.0551
  (2,3,1,3,1,5,8); data from literature
- Transport, freight, rail [RER]: 0.01 tkm; lognormal SD95 2.095
  (4,5,na,na,na,na,5); standard distances
- Isopropanol, at plant [RER]: 0.046 kg; lognormal SD95 1.2238
  (2,3,1,3,1,5,3); data from literature
- Monoethanolamine, at plant [RER]: 0.003 kg; lognormal SD95 1.2238
  (2,3,1,3,1,5,3); data from literature
- Formic acid, at plant [RER]: 0.005 kg; lognormal SD95 1.2238
  (2,3,1,3,1,5,3); data from literature
- Transport, freight, lorry, fleet average [RER]: 0.06 tkm; lognormal SD95 2.095
  (4,5,na,na,na,na,5); standard distances
- Solder, bar, Sn63Pb37, for electronics industry, at plant [GLO]: 1 kg; lognormal SD95 1.2238
  (2,3,1,3,1,5,3); data from literature
- Heat, natural gas, at industrial furnace 1MW [CH]: 54.45 MJ; lognormal SD95 1.2238
  (2,3,1,3,1,5,1); data from literature

## Emissions to nature
- Particulates, > 2.5 um, and < 10um [emissions to air, high. pop.]: 0.00071595 kg; lognormal SD95 3.0525
  (2,3,1,3,1,5,27); data from literature
- Particulates, < 2.5 um [emissions to air, high. pop.]: 0.00055685 kg; lognormal SD95 3.0525
  (2,3,1,3,1,5,27); data from literature
- Heat, waste [emissions to air, high. pop.]: 11.448 MJ; lognormal SD95 1.2238
  (2,3,1,3,1,5,13); calculated from electricity input
- Lead [emissions to air, high. pop.]: 0.000368 kg; lognormal SD95 1.5688
  (2,3,1,3,1,5,31); data from literature
- Particulates, > 10 um [emissions to air, high. pop.]: 0.0003182 kg; lognormal SD95 3.0525
  (2,3,1,3,1,5,27); data from literature
- Tin [emissions to air, high. pop.]: 0.000297 kg; lognormal SD95 1.5688
  (2,3,1,3,1,5,31); data from literature

## Sampling procedure
own estimation

## Extrapolations
see Geography & Technology

## Sources
- Hischier R., Classen M., Lehmann M., Scharnhorst W., 2007, 2007 - LCI electric and electronic equipment - Hischier, Final report ecoinvent Data v2.0, 18, Swiss Centre for LCI, Empa - TSL, Duebendorf and St. Gallen, CH
Hischier R., Classen M., Lehmann M., Scharnhorst W. (2007) Life Cycle Inventories of Electric and Electronic Equipment - Production, Use & Disposal. Final report ecoinvent Data v2.0. Volume: 18. Swiss Centre for LCI, Empa - TSL. Duebendorf and St. Gallen, CH.
Type: Measurement on site
Source: CD-ROM
First author: Hischier R.
Other authors: Classen M., Lehmann M., Scharnhorst W.
Year: 2007
Title of anthology: Final report ecoinvent Data v2.0
Place of publication: Duebendorf and St. Gallen, CH
Publisher: Swiss Centre for LCI, Empa - TSL
Volume No: 18
Original title: Life Cycle Inventories of Electric and Electronic Equipment - Production, Use & Disposal

## Validation
Proof reading validation: passed; Other validation: none;
