# DummyWasteTreatment

Dataset: EcoSpold 1, unit process
Functional unit: 1 kg
Category: Others / unspecified_wt
Geography: GLO
Generated by: default
accessRestrictedTo: 0
copyright: true

## General comment
Dummy process, used in LCA Wizard

## Reference product
- DummyWasteTreatment [GLO]: 1 kg

## Sources
- Created for EcoSpold 1 compatibility, Ecoinvent report version 2.0, 15
Nemecek, T., Kägi, T., Blaser, S. (2007) Life Cycle Inventories of Agricultural Production Systems. Ecoinvent report version 2.0. Editors: 0. Volume: 15. Swiss Centre for LCI, ART. Duebendorf and Zurich, CH.
Type: Measurement on site
Source: CD-ROM
First author: Nemecek, T.
Other authors: Kägi, T., Blaser, S.
Year: 2007
Name of editors: 0
Title of anthology: Ecoinvent report version 2.0
Place of publication: Duebendorf and Zurich, CH
Publisher: Swiss Centre for LCI, ART
Volume No: 15
