# Oriented strand board, at regional storage, with resource correction

Dataset: EcoSpold 1, unit process
Functional unit: 1 kg
Category: wood / wooden materials\at regional storage\other material
Geography: CH
Time period: 2000-01 to 2016-12
Generated by: default
accessRestrictedTo: 0
copyright: true

## Reference product
- Oriented strand board, at regional storage, with resource correction [CH]: 1 kg
  SWITZERLAND

## Inputs from technosphere
- Transport, freight, rail [RER]: 0 tkm
- Transport, freight, lorry, fleet average [RER]: 0.6 tkm
  100% market share; 600 km
- Oriented strand board, at plant [RER]: 0.00165 m3
  605 kg/m3

## Inputs from nature
- Energy, gross calorific value, in biomass, resource correction [resources, unspecified]: -7.605 MJ
  (1,1,1,1,1,1,BU:1.05); correction for recycling of wood, calculated in "563-Holzdaten-Ressourcenkorrektur v4.xlsx"

## Sources
- Werner F., 2017, 2017 - LCI wood and wood based products - Werner, Project Report, 0, Environment & Development, Zuerich, CH
