# Integrated circuit, IC, logic type, at plant

Dataset: EcoSpold 1, unit process
Functional unit: 1 kg
Category: electronics / component
Geography: GLO
Time period: 2023-01 to 2029-12
Synonyms: Microchip; Microcircuit; Computer chip; Silicon chip; Chip
Generated by: Lugas Raka Adrianto, Maulana Permana Ajie, Didier Beloin-Saint-Pierre
accessRestrictedTo: 0
copyright: false

## General comment
This dataset can be applied to describe the entire production of a logic type integrated circuit. The included wafer fabrication data refers to a 200-mm wafer for a 32 MB DRAM chip, whereas the chip packaging data describes the material contents (in percent) of a plastic ball grid array package (PBGA) microchip (years 2002 to 2004). In 2023, the dataset is updated using the technical parameters found in the report of (Umweltbundesamt, 2021). This update mainly relates the energy and heat consumption, as well as the gold input for ICs. After consulting various reports and literature, it is decided that the mass flow of gold is unchanged, 0.0108 kg gold/kg packaged IC. The regionalization to the datasets is applied for the Eastern Asia electricity mix and global average, primary metal flows. The amount of wafer required (m2) to produce 1 kg IC is taken from the empirical study of (Teehan & Kandlikar, 2013), which is 0.02 m2/kg packaged IC..;

## Included processes
Describes all the processes required to produce a logic type microchip. Included are 'die separation', 'encapsulation', 'die attachment', 'lead bonding', 'plating', and 'marking'. These operations are represented by the material input of glass epoxy, metals, epoxy resin, doped silicon, glue, gold (wires) etc. and the assembly process energy used.The required the infrastructure, and the ship, train and road transport are also inventoried. Calculated for 1 kg of packaged logic IC.

## Geography
The data is based on two semiconductor companies in the USA and Western Europe representing international standard.

## Technology
This dataset describes the chip packaging technology with the typical operation classes die separation, encapsulation, die attachment, lead bonding, plating and marking (inventoried only in form of consumed energy) for a logic-type microchip.

## Reference product
- Integrated circuit, IC, logic type, at plant [GLO]: 1 kg
  Global

## Inputs from technosphere
- Chemicals organic, at plant [GLO]: 0.0086 kg; lognormal SD95 1.33
  (2,4,2,3,3,5,BU:1.05)
- Copper, primary, at refinery [GLO]: 0.082 kg; lognormal SD95 1.33
  (2,4,2,3,3,5,BU:1.05)
- Electricity, medium voltage, production RAS, at grid [RAS]: 36.75 kWh; lognormal SD95 1.35
  (3,4,2,3,3,5,BU:1.05)
- Electronic component production plant [GLO]: 2e-8 p; lognormal SD95 3.11
  (2,4,2,3,3,5,BU:3.00)
- Epoxy resin insulator (SiO2), at plant [RER]: 0.4365 kg; lognormal SD95 1.33
  (2,4,2,3,3,5,BU:1.05)
- Epoxy resin, liquid, at plant [RER]: 0.0025 kg; lognormal SD95 1.33
  (2,4,2,3,3,5,BU:1.05)
- Glass fibre reinforced plastic, polyamide, injection moulding, at plant [RER]: 0.3169 kg; lognormal SD95 1.33
  (2,4,2,3,3,5,BU:1.05)
- Gold, primary, at refinery [GLO]: 0.0108 kg; lognormal SD95 1.33
  (2,4,2,3,3,5,BU:1.05)
- Heat, heavy fuel oil, at industrial furnace 1MW [RER]: 27.1 MJ; lognormal SD95 1.35
  (3,4,2,3,3,5,BU:1.05)
- Lead, primary, at plant [GLO]: 0.037 kg; lognormal SD95 1.33
  (2,4,2,3,3,5,BU:1.05)
- Nickel, 99.5%, at plant [GLO]: 0.00328 kg; lognormal SD95 1.33
  (2,4,2,3,3,5,BU:1.05)
- Silver, at regional storage [RER]: 0.0075 kg; lognormal SD95 1.33
  (2,4,2,3,3,5,BU:1.05)
- Tin, at regional storage [RER]: 0.063 kg; lognormal SD95 1.33
  (2,4,2,3,3,5,BU:1.05)
- Transport, freight, rail [RER]: 1.1948 tkm; lognormal SD95 2.08
  (3,4,2,3,3,5,BU:2.00)
- Transport, freight, lorry, fleet average [RER]: 0.19913 tkm; lognormal SD95 2.08
  (3,4,2,3,3,5,BU:2.00)
- Transport, transoceanic freight ship [OCE]: 20.538 tkm; lognormal SD95 2.12
  (4,4,3,3,1,5,BU:2.00)
- Wafer, fabricated, for integrated circuit, logic type, at plant [GLO]: 0.02 m2; lognormal SD95 1.33
  (2,4,2,3,3,5,BU:1.05)
- Zinc, primary, at regional storage [RER]: 0.00756 kg; lognormal SD95 1.33
  (2,4,2,3,3,5,BU:1.05)

## Sampling procedure
Manufacturer information and "chemical content" publications by companies.

## Extrapolations
see Geography and Technology

## Sources
- Raka Adrianto L., Permana Ajie M., Beloin-Saint-Pierre D., 2024, 2024 - LCI ICT sector - Raka Adrianto, Empa, St. Gallen, CH

## Validation
Proof reading validation: Passed, Other validation: none, Validator: Mischa Zschokke, Company: Carbotech, Country: CH
