# Maintenance, ICE

Dataset: EcoSpold 1, unit process, infrastructure
Functional unit: 1 p
Category: transport systems / train\operations\infrastructure
Geography: DE
Time period: 2000-01 to 2000-12
Generated by: Michael Spielmann
accessRestrictedTo: 0
copyright: true

## General comment
The life span of the train is assumed to be 25 years;

## Included processes
This inventory includes expenditures for regular maintenance and repair.

## Geography
Data represents a train maintenance of an ICE (no distinction between ICE 1 and ICE 2 is made)

## Technology
ICE 1 and ICE 2

## Reference product
- Maintenance, ICE [DE]: 1 p
  GERMANY

## Inputs from technosphere
- Tap water, at user [RER]: 457000 kg; lognormal SD95 1.17
  (2,2,1,3,1,3); literature studies (repair & regular maintenance)
- Aluminium, production mix, at plant [RER]: 125 kg; lognormal SD95 1.17
  (2,2,1,3,1,3); literature studies (repair)
- Treatment, sewage, to wastewater treatment, class 1 [CH]: 457 m3; lognormal SD95 1.17
  (2,2,1,3,1,3); literature studies (repair & regular maintenance)
- Electricity, medium voltage, at grid [DE]: 1.58e6 kWh; lognormal SD95 1.17
  (2,2,1,3,1,3); literature studies (repair & regular maintenance)
- Solvents, organic, unspecified, at plant [GLO]: 500 kg; lognormal SD95 1.17
  (2,2,1,3,1,3); literature studies (repair)
- Copper, at regional storage [RER]: 125 kg; lognormal SD95 1.17
  (2,2,1,3,1,3); literature studies (repair)
- Transport, freight, lorry, fleet average [RER]: 5600 tkm; lognormal SD95 2.28
  (4,5,na,na,na,na); calculation based on standard distances
- Sodium hydroxide, 50% in H2O, production mix, at plant [RER]: 40000 kg; lognormal SD95 1.17
  (2,2,1,3,1,3); literature studies (regular maintenance)
- Lubricating oil, at plant [RER]: 500 kg; lognormal SD95 1.17
  (2,2,1,3,1,3); literature studies (repair)
- Transport, freight, rail [RER]: 22400 tkm; lognormal SD95 2.28
  (4,5,na,na,na,na); calculation based on standard distances
- Paper, woodfree, uncoated, at regional storage [RER]: 20700 kg; lognormal SD95 1.17
  (2,2,1,3,1,3); literature studies (repair & regular maintenance)
- Alkyd paint, white, 60% in solvent, at plant [RER]: 5000 kg; lognormal SD95 1.17
  (2,2,1,3,1,3); literature studies (repair)
- Disposal, emulsion paint, 0% water, to municipal incineration [CH]: 2000 kg; lognormal SD95 2.03
  (2,2,1,3,1,3); based on own calculations, assuming that 0.6 of the paint are emitted as NMVOCs.
- Reinforcing steel, at plant [RER]: 45000 kg; lognormal SD95 1.17
  (2,2,1,3,1,3); literature study (repair)
- Heat, at cogen 1MWe lean burn, allocation exergy [RER]: 2.51e7 MJ; lognormal SD95 1.17
  (2,2,1,3,1,3); literature studies (repair & regular maintenance)

## Emissions to nature
- Heat, waste [emissions to air, unspecified]: 5.69e6 MJ; lognormal SD95 1.17
  (2,2,1,3,1,3); standard value
- NMVOC, non-methane volatile organic compounds, unspecified origin [emissions to air, unspecified]: 3500 kg; lognormal SD95 2.03
  (2,2,1,3,1,3); Derived from the used paint and solvent, assuming all solvent is emitted to air.

## Sampling procedure
The data of the material composition and energy consumption is based on literature studies.

## Sources
- Spielmann M., Bauer C., Dones R., Tuchschmid M., 2007, 2007 - Transport services - Spielmann, Final report ecoinvent Data v2.0, 14, Swiss Centre for LCI, PSI, ESU-services Ltd., Duebendorf, Villigen and Uster, CH
Spielmann M., Dones R; Bauer C. (2007) Life Cycle Inventories of Transport Services. Final report ecoinvent Data v2.0. Volume: 14. Issue: 0. Swiss Centre for LCI, PSI. Dübendorf and Villigen, CH.
Type: Measurement on site
Source: CD-ROM
First author: Spielmann M.
Other authors: Dones R; Bauer C.
Year: 2007
Title of anthology: Final report ecoinvent Data v2.0
Place of publication: Dübendorf and Villigen, CH
Publisher: Swiss Centre for LCI, PSI
Volume No: 14
Issue No: 0

## Validation
Proof reading validation: passed; Other validation: none;
