# Heat, at nuclear power plant, allocation exergy

Dataset: EcoSpold 1, unit process
Functional unit: 1 MJ
Category: heat / nuclear power\district heat
Geography: CH
Time period: 2019-01 to 2020-12
Generated by: Livia Waldburger
accessRestrictedTo: 0
copyright: true

## General comment
Inventory for 1 MJ heat from nuclear power plant. In 2019, of the total energy produced were 97.8% as electricity and 2.2% as heat. The exergy factor is 1 for ectricity and 0.170 for heat. This leads to the allocation factor of 0.996 for electricity an 0.004 for heat.;

## Included processes
Included is the demnd of materials, energy, infrastructures and transports for the production of heat at a nuclear power plant

## Geography
Data apply to the supply in Switzerland.

## Technology
average technology

## Time period
Time of publications.

## Reference product
- Heat, at nuclear power plant, allocation exergy [CH]: 1 MJ
  SWITZERLAND

## Inputs from technosphere
- Paper, woodfree, coated, at integrated mill [RER]: 6.8862e-10 kg; lognormal SD95 1.2192
  (2,2,2,1,1,5,BU:1.05); ;
- Steel, low-alloyed, at plant [RER]: 1.7135e-9 kg; lognormal SD95 1.2192
  (2,2,2,1,1,5,BU:1.05); ;
- Hydrogen, liquid, at plant [RER]: 1.1031e-8 kg; lognormal SD95 1.2192
  (2,2,2,1,1,5,BU:1.05); ;
- Cast iron, at plant [RER]: 1.3815e-10 kg; lognormal SD95 1.2192
  (2,2,2,1,1,5,BU:1.05); ;
- Nuclear spent fuel, in conditioning, at plant [CH]: 1.585e-9 kg; lognormal SD95 1.2192
  (2,2,2,1,1,5,BU:1.05); ;
- Nitrogen, liquid, at plant [RER]: 6.6078e-8 kg; lognormal SD95 1.2192
  (2,2,2,1,1,5,BU:1.05); ;
- Bitumen, at refinery [CH]: 8.257e-10 kg; lognormal SD95 1.2192
  (2,2,2,1,1,5,BU:1.05); ;
- Chemicals inorganic, at plant [GLO]: 2.506e-9 kg; lognormal SD95 1.2192
  (2,2,2,1,1,5,BU:1.05); ;
- Concrete, normal, at plant [CH]: 1.0431e-11 m3; lognormal SD95 1.2192
  (2,2,2,1,1,5,BU:1.05); ;
- U enriched 4.75%, in fuel element for LWR, at nuclear fuel fabrication plant [CH]: 2.324e-9 kg; lognormal SD95 1.2192
  (2,2,2,1,1,5,BU:1.05); ;
- Disposal, hazardous waste, 25% water, to hazardous waste incineration [CH]: 1.0388e-9 kg; lognormal SD95 1.2192
  (2,2,2,1,1,5,BU:1.05); ;
- Disposal, used mineral oil, 10% water, to hazardous waste incineration [CH]: 1.7456e-9 kg; lognormal SD95 1.2192
  (2,2,2,1,1,5,BU:1.05); ;
- Lubricating oil, at plant [RER]: 1.7349e-9 kg; lognormal SD95 1.2192
  (2,2,2,1,1,5,BU:1.05); ;
- Disposal, separator sludge, 90% water, to hazardous waste incineration [CH]: 2.3454e-9 kg; lognormal SD95 1.2192
  (2,2,2,1,1,5,BU:1.05); ;
- Anionic resin, at plant [CH]: 6.8862e-11 kg; lognormal SD95 1.2192
  (2,2,2,1,1,5,BU:1.05); ;
- Cationic resin, at plant [CH]: 6.8862e-11 kg; lognormal SD95 1.2192
  (2,2,2,1,1,5,BU:1.05); ;
- Water, decarbonised, at plant [RER]: 0.0028701 kg; lognormal SD95 1.2192
  (2,2,2,1,1,5,BU:1.05); ;
- Acetylene, at regional storehouse [CH]: 3.8554e-11 kg; lognormal SD95 1.2192
  (2,2,2,1,1,5,BU:1.05); ;
- Radioactive waste, in final repository for nuclear waste LLW [CH]: 3.0415e-11 m3; lognormal SD95 1.2192
  (2,2,2,1,1,5,BU:1.05); ;
- Nuclear spent fuel, in reprocessing, at plant [RER]: 1.0538e-9 kg; lognormal SD95 1.2192
  (2,2,2,1,1,5,BU:1.05); ;
- Reinforcing steel, at plant [RER]: 5.0335e-10 kg; lognormal SD95 1.2192
  (2,2,2,1,1,5,BU:1.05); ;
- Transport, freight, lorry, fleet average [RER]: 8.2677e-9 tkm; lognormal SD95 2.0529
  (2,2,2,1,1,5,BU:2); ;
- Transport, freight, lorry, 16t-32t gross weight, fleet average [CH]: 2.7845e-8 tkm; lognormal SD95 2.0529
  (2,2,2,1,1,5,BU:2); ;
- Sodium hypochlorite, 15% in H2O, at plant [RER]: 1.8527e-8 kg; lognormal SD95 1.2192
  (2,2,2,1,1,5,BU:1.05); ;
- Boric acid, anhydrous, powder, at plant [RER]: 6.8862e-11 kg; lognormal SD95 1.2192
  (2,2,2,1,1,5,BU:1.05); ;
- Oxygen, liquid, at plant [RER]: 1.7885e-8 kg; lognormal SD95 1.2192
  (2,2,2,1,1,5,BU:1.05); ;
- Flat glass, coated, at plant [RER]: 4.6801e-9 kg; lognormal SD95 1.2192
  (2,2,2,1,1,5,BU:1.05); ;
- Carbon dioxide liquid, at plant [RER]: 1.7885e-10 kg; lognormal SD95 1.2192
  (2,2,2,1,1,5,BU:1.05); ;
- Diesel, burned in diesel-electric generating set [GLO]: 3.9625e-7 MJ; lognormal SD95 1.2192
  (2,2,2,1,1,5,BU:1.05); ;
- Radioactive waste, in interim storage conditioning [CH]: 4.6265e-14 m3; lognormal SD95 1.2192
  (2,2,2,1,1,5,BU:1.05); ;
- Cement, unspecified, at plant [CH]: 9.842e-10 kg; lognormal SD95 1.2192
  (2,2,2,1,1,5,BU:1.05); ;
- Nuclear power plant, pressure water reactor 1000MW [CH]: 2.7631e-15 p; lognormal SD95 3.0504
  (2,2,2,1,1,5,BU:3); ;
- Chemicals organic, at plant [GLO]: 1.4779e-9 kg; lognormal SD95 1.2192
  (2,2,2,1,1,5,BU:1.05); ;
- Argon, liquid, at plant [RER]: 2.7952e-8 kg; lognormal SD95 1.2192
  (2,2,2,1,1,5,BU:1.05); ;
- Radioactive waste, in interim storage, for final repository LLW [CH]: 1.8849e-12 m3; lognormal SD95 1.2192
  (2,2,2,1,1,5,BU:1.05); ;

## Inputs from nature
- Water, river [resources, in water]: 6.158e-6 m3; lognormal SD95 1.2192
  (2,2,2,1,1,5,BU:1.05); ;

## Emissions to nature
- Cesium-134 [emissions to water, river]: 4.0375e-9 kBq; lognormal SD95 3.0504
  (2,2,2,1,1,5,BU:3); ;
- Carbon-14 [emissions to air, low. pop.]: 8.1821e-6 kBq; lognormal SD95 3.0504
  (2,2,2,1,1,5,BU:3); ;
- Manganese-54 [emissions to water, river]: 1.4029e-8 kBq; lognormal SD95 3.0504
  (2,2,2,1,1,5,BU:3); ;
- Silver-110 [emissions to water, river]: 4.7443e-9 kBq; lognormal SD95 3.0504
  (2,2,2,1,1,5,BU:3); ;
- Niobium-95 [emissions to air, low. pop.]: 1.1995e-13 kBq; lognormal SD95 3.0504
  (2,2,2,1,1,5,BU:3); ;
- Radioactive species, alpha emitters [emissions to water, river]: 3.2343e-11 kBq; lognormal SD95 3.0504
  (2,2,2,1,1,5,BU:3); ;
- Lanthanum-140 [emissions to water, river]: 5.3012e-10 kBq; lognormal SD95 3.0504
  (2,2,2,1,1,5,BU:3); ;
- Iodine-133 [emissions to air, low. pop.]: 1.9491e-9 kBq; lognormal SD95 3.0504
  (2,2,2,1,1,5,BU:3); ;
- Iodine-131 [emissions to water, river]: 8.7925e-9 kBq; lognormal SD95 3.0504
  (2,2,2,1,1,5,BU:3); ;
- Krypton-85 [emissions to air, low. pop.]: 1.057e-5 kBq; lognormal SD95 3.0504
  (2,2,2,1,1,5,BU:3); ;
- Cerium-144 [emissions to water, river]: 5.162e-10 kBq; lognormal SD95 3.0504
  (2,2,2,1,1,5,BU:3); ;
- Aerosols, radioactive, unspecified [emissions to air, low. pop.]: 5.751e-12 kBq; lognormal SD95 3.0504
  (2,2,2,1,1,5,BU:3); ;
- Cesium-137 [emissions to water, river]: 1.0709e-7 kBq; lognormal SD95 3.0504
  (2,2,2,1,1,5,BU:3); ;
- Barium-140 [emissions to air, low. pop.]: 3.3949e-13 kBq; lognormal SD95 3.0504
  (2,2,2,1,1,5,BU:3); ;
- Hydrogen-3, Tritium [emissions to water, river]: 0.001992 kBq; lognormal SD95 3.0504
  (2,2,2,1,1,5,BU:3); ;
- Heat, waste [emissions to air, low. pop.]: 0.0081928 MJ; lognormal SD95 1.2192
  (2,2,2,1,1,5,BU:1.05); ;
- Antimony-124 [emissions to air, low. pop.]: 5.087e-13 kBq; lognormal SD95 3.0504
  (2,2,2,1,1,5,BU:3); ;
- Antimony-125 [emissions to air, low. pop.]: 2.506e-11 kBq; lognormal SD95 3.0504
  (2,2,2,1,1,5,BU:3); ;
- Zinc-65 [emissions to water, river]: 2.8166e-10 kBq; lognormal SD95 3.0504
  (2,2,2,1,1,5,BU:3); ;
- Antimony-122 [emissions to water, river]: 9.6814e-10 kBq; lognormal SD95 3.0504
  (2,2,2,1,1,5,BU:3); ;
- Antimony-124 [emissions to water, river]: 4.423e-8 kBq; lognormal SD95 3.0504
  (2,2,2,1,1,5,BU:3); ;
- Chromium-51 [emissions to water, river]: 8.0964e-9 kBq; lognormal SD95 3.0504
  (2,2,2,1,1,5,BU:3); ;
- Sodium-24 [emissions to water, river]: 1.0688e-8 kBq; lognormal SD95 3.0504
  (2,2,2,1,1,5,BU:3); ;
- Xenon-133 [emissions to air, low. pop.]: 0.00064685 kBq; lognormal SD95 3.0504
  (2,2,2,1,1,5,BU:3); ;
- Cesium-137 [emissions to air, low. pop.]: 7.7965e-12 kBq; lognormal SD95 3.0504
  (2,2,2,1,1,5,BU:3); ;
- Cobalt-60 [emissions to water, river]: 4.2303e-7 kBq; lognormal SD95 3.0504
  (2,2,2,1,1,5,BU:3); ;
- Zirconium-95 [emissions to water, river]: 1.6064e-9 kBq; lognormal SD95 3.0504
  (2,2,2,1,1,5,BU:3); ;
- Tellurium-123m [emissions to water, river]: 1.6814e-9 kBq; lognormal SD95 3.0504
  (2,2,2,1,1,5,BU:3); ;
- Silver-110 [emissions to air, low. pop.]: 3.3521e-12 kBq; lognormal SD95 3.0504
  (2,2,2,1,1,5,BU:3); ;
- Tellurium-132 [emissions to water, river]: 9.0174e-11 kBq; lognormal SD95 3.0504
  (2,2,2,1,1,5,BU:3); ;
- Iodine-131 [emissions to air, low. pop.]: 3.6198e-9 kBq; lognormal SD95 3.0504
  (2,2,2,1,1,5,BU:3); ;
- Radioactive species, other beta emitters [emissions to air, low. pop.]: 9.2851e-11 kBq; lognormal SD95 3.0504
  (2,2,2,1,1,5,BU:3); ;
- Strontium-89 [emissions to water, river]: 3.909e-9 kBq; lognormal SD95 3.0504
  (2,2,2,1,1,5,BU:3); ;
- Antimony-125 [emissions to water, river]: 4.4659e-8 kBq; lognormal SD95 3.0504
  (2,2,2,1,1,5,BU:3); ;
- Cobalt-57 [emissions to water, river]: 9.5529e-9 kBq; lognormal SD95 3.0504
  (2,2,2,1,1,5,BU:3); ;
- Iodine-133 [emissions to water, river]: 4.4552e-10 kBq; lognormal SD95 3.0504
  (2,2,2,1,1,5,BU:3); ;
- Cerium-141 [emissions to water, river]: 1.8849e-10 kBq; lognormal SD95 3.0504
  (2,2,2,1,1,5,BU:3); ;
- Noble gases, radioactive, unspecified [emissions to air, low. pop.]: 0.00027738 kBq; lognormal SD95 3.0504
  (2,2,2,1,1,5,BU:3); ;
- Cobalt-58 [emissions to air, low. pop.]: 1.7564e-11 kBq; lognormal SD95 3.0504
  (2,2,2,1,1,5,BU:3); ;
- Strontium-90 [emissions to water, river]: 1.3922e-9 kBq; lognormal SD95 3.0504
  (2,2,2,1,1,5,BU:3); ;
- Niobium-95 [emissions to water, river]: 3.2878e-9 kBq; lognormal SD95 3.0504
  (2,2,2,1,1,5,BU:3); ;
- Technetium-99m [emissions to water, river]: 3.0094e-9 kBq; lognormal SD95 3.0504
  (2,2,2,1,1,5,BU:3); ;
- Molybdenum-99 [emissions to water, river]: 6.4257e-12 kBq; lognormal SD95 3.0504
  (2,2,2,1,1,5,BU:3); ;
- Cobalt-58 [emissions to water, river]: 1.2209e-6 kBq; lognormal SD95 3.0504
  (2,2,2,1,1,5,BU:3); ;
- Cesium-136 [emissions to water, river]: 3.0094e-10 kBq; lognormal SD95 3.0504
  (2,2,2,1,1,5,BU:3); ;
- Zirconium-95 [emissions to air, low. pop.]: 6.1901e-11 kBq; lognormal SD95 3.0504
  (2,2,2,1,1,5,BU:3); ;
- Iron-59 [emissions to water, river]: 4.498e-10 kBq; lognormal SD95 3.0504
  (2,2,2,1,1,5,BU:3); ;
- Xenon-135 [emissions to air, low. pop.]: 0.00017778 kBq; lognormal SD95 3.0504
  (2,2,2,1,1,5,BU:3); ;
- Ruthenium-103 [emissions to water, river]: 3.0522e-10 kBq; lognormal SD95 3.0504
  (2,2,2,1,1,5,BU:3); ;
- Cobalt-60 [emissions to air, low. pop.]: 8.1071e-11 kBq; lognormal SD95 3.0504
  (2,2,2,1,1,5,BU:3); ;
- Water [emissions to water, unspecified]: 0.0058501 kg; lognormal SD95 2.5196
  (5,5,5,5,5,BU:1.05); All uncertainty-values set to 5.0 by default. Balance of input water

## Sampling procedure
literature

## Sources
- Kaegi T., Waldburger L., Kern C., Roberts G., Zschokke M., Conte F., Weber L., 2021, 2021 - LCI heating systems - Kaegi, Carbotech im Auftrag des BAFU, Carbotech AG, Zuerich, CH
Kägi Thomas, Livia Waldburger, Cyril Kern, Gavin Roberts, Mischa Zschokke, Flora Conte, Lea Weber (2020) LCI of heating systems. Carbotech im Auftrag des BAFU. Carbotech AG. Zürich. CH.
Type: Separate publication
Source: Report
First author: Kägi Thomas
Other authors: Livia Waldburger, Cyril Kern, Gavin Roberts, Mischa Zschokke, Flora Conte, Lea Weber
Year: 2020
Title of anthology: Carbotech im Auftrag des BAFU
Place of publication: Zürich. CH
Publisher: Carbotech AG

## Validation
Proof reading validation: 02.12.2020; Other validation: Z:\Schreibtisch\WinShare\BAFU Heizsysteme\_A konvertieren\[EcoSpold_heat at nuclear power plant onlyv0.1.xlsx]X-Process;
