# Light clay brick, at plant

Dataset: EcoSpold 1, unit process
Functional unit: 1 kg
Category: construction / bricks
Geography: DE
Time period: 2000-01 to 2000-12
Generated by: Daniel Kellenberger
accessRestrictedTo: 0
copyright: true

## General comment
technical drying by heat from liquid gas (natural gas used as proxy). It is assumed that there is wastewater but as no data is available it is not included. The lifespan of the plant is assumed to be 50 years.;

## Included processes
includes the raw materials clay, straw and water, their transport to the finishing plant, the drying energy, the packaging and the infrastructure. Beside the product, some solid household (e.g. packing material) waste is taken into account.

## Geography
For some exchanges CH, RER and GLO modules have been used as proxy.

## Technology
The raw materials (clay and straw) are mixed with water and poured into a mould. The drying process is technical with the use of a natural gas heater

## Reference product
- Light clay brick, at plant [DE]: 1 kg
  GERMANY

## Inputs from technosphere
- Disposal, inert waste, 5% water, to construction waste landfill [CH]: 0.000125 kg; lognormal SD95 1.64
  (3,5,5,3,1,5);
- Electricity, medium voltage, at grid [DE]: 0.00556 kWh; lognormal SD95 1.64
  (3,5,5,3,1,5);
- Heat, natural gas, at industrial furnace 1MW [CH]: 1.78 MJ; lognormal SD95 1.64
  (3,5,5,3,1,5);
- Straw IP, at farm [CH]: 0.162 kg; lognormal SD95 1.34
  (3,5,3,1,1,5);
- Mine, clay [CH]: 1.67e-10 p; lognormal SD95 5
  estimated
- Tap water, at user [RER]: 0.113 kg; lognormal SD95 1.64
  (3,5,5,3,1,5);
- Diesel, burned in building machine, average [CH]: 0.0158 MJ; lognormal SD95 1.64
  (3,5,5,3,1,5);
- Transport, freight, lorry, fleet average [RER]: 0.0176 tkm; lognormal SD95 2.34
  (3,5,5,3,1,5);
- Packing, clay products [CH]: 1 kg; lognormal SD95 5
  estimated
- Clay, at mine [CH]: 1.01 kg; lognormal SD95 1.34
  (3,5,3,1,1,5);

## Emissions to nature
- Heat, waste [emissions to air, unspecified]: 0.02 MJ; lognormal SD95 1.64
  (3,5,5,3,1,5);

## Sampling procedure
Literature

## Extrapolations
See geography

## Sources
- Kellenberger D., Althaus H.-J., Jungbluth N., Kuenniger T., Lehmann M., Thalmann P., 2007, 2007 - LCI building products - Kellenberger, Final report ecoinvent data v2.0, 7, Swiss Centre for LCI, Empa - TSL, ESU-services Ltd., Bau- und Umweltchimie, Duebendorf, CH
Kellenberger D., Althaus H.-J., Jungbluth N., Künniger T. (2007) Life Cycle Inventories of Building Products. Final report ecoinvent data v2.0. Volume: 7. Swiss Centre for LCI, Empa - TSL. Dübendorf, CH.
Type: Measurement on site
Source: CD-ROM
First author: Kellenberger D.
Other authors: Althaus H.-J., Jungbluth N., Künniger T.
Year: 2007
Title of anthology: Final report ecoinvent data v2.0
Place of publication: Dübendorf, CH
Publisher: Swiss Centre for LCI, Empa - TSL
Volume No: 7

## Validation
Proof reading validation: passed; Other validation: none;
