# Electricity mix, SBB

Dataset: EcoSpold 1, unit process
Functional unit: 1 kWh
Category: electricity / supply mix
Geography: CH
Time period: 2000-01 to 2000-12
Production volume: GWh
Share of production covered: 100 %
Generated by: Luana Krebs
accessRestrictedTo: 0
copyright: true

## General comment
Technology shares determined based on information from SBB (pers. correspondence).;

## Included processes
This dataset includes the shares of different technologies of the SBB production mix in Switzerland in 2014.

## Geography
Switzerland

## Technology
Average technology

## Time period
Time of publications

## Reference product
- Electricity mix, SBB [CH]: 1 kWh
  SWITZERLAND

## Inputs from technosphere
All rows: lognormal SD95 1.05
- Electricity, hydropower, at power plant [CH]: 0.75274 kWh
  (1,1,1,1,1,1,BU:1,05); ; personal communication SBB (2020)
- Electricity from waste, at municipal waste incineration plant [CH]: 0.001868 kWh
  (1,1,1,1,1,1,BU:1,05); ; personal communication SBB (2020)
- Electricity, production mix photovoltaic, at plant [CH]: 0.00176 kWh
  (1,1,1,1,1,1,BU:1,05); ; personal communication SBB (2020)
- Electricity, hydropower, at power plant [FR]: 0.197 kWh
  (1,1,1,1,1,1,BU:1,05); ; personal communication SBB (2020)
- Electricity, at cogen 300kWth, biomethane, allocation exergy [CH]: 0.00043232 kWh
  (1,1,1,1,1,1,BU:1,05); ; personal communication SBB (2020)
- Electricity, at cogen with biogas engine, agricultural covered, alloc. exergy [CH]: 0.00028124 kWh
  (1,1,1,1,1,1,BU:1,05); ; personal communication SBB (2020)
- Electricity, at cogen 1MWth, wood chips, allocation exergy [CH]: 0.00058847 kWh
  (1,1,1,1,1,1,BU:1,05); ; personal communication SBB (2020)
- Electricity, nuclear, at power plant [CH]: 0.045 kWh
  (1,1,1,1,1,1,BU:1,05); ; personal communication SBB (2020)
- Electricity, at wind farm [CH]: 0.00033 kWh
  (1,1,1,1,1,1,BU:1,05); ; personal communication SBB (2020)

## Sampling procedure
Statistics

## Extrapolations
Some generic datasets from ecoinvent have been used.

## Sources
- Krebs L., Frischknecht R., 2020, 2020 - Update Mobitool 2020 - Krebs, Project report, 713, treeze Ltd., Uster, CH
L. Krebs, R. Frischknecht (2020) Aktualisierung Ökobilanzdaten mobitool 2020, Teil 1. Project report. Volume: 713. treeze Ltd.. Uster, CH.
Type: Separate publication
Source: Report
First author: L. Krebs
Other authors: R. Frischknecht
Year: 2020
Title of anthology: Project report
Place of publication: Uster, CH
Publisher: treeze Ltd.
Volume No: 713

## Validation
Proof reading validation: 02.11.2020; Other validation: G:\Projekte laufend\713 Aktualisierung mobitool 2020\EcoSpold\[713-Strommix-Übertragung-Verteilung-Bahnstrom-EIv2-v0.4.xlsx]X-Process;
