# xxx Industrial residue wood, softwood, forest-debarked, air dried, u=20%, at plant

Dataset: EcoSpold 1, unit process
Functional unit: 1 m3
Category: material, obsolete / wood, obsolete\extraction, obsolete
Geography: RER
Generated by: Hans-Joerg Althaus
accessRestrictedTo: 0
copyright: true

## General comment
The volume refers to the wood not including the bark.;
Synonyms: Fichte, Spruce;

## Included processes
Natural drying at the sawmill. Land use is accounted for. Air emissions released from the wood are not accounted for because the same emissions would occur if the wood would not be used.

## Technology
Naturaly dried on 5 m high staples for 2 years. Shrinkeage for spruce

## Reference product
- xxx Industrial residue wood, softwood, forest-debarked, air dried, u=20%, at plant [RER]: 1 m3
  Europe

## Inputs from technosphere
- Softwood, allocation correction, 1 [RER]: -0.099 m3; lognormal SD95 1
- xxx Industrial residue wood, softwood, forest-debarked, u=70%, at plant [RER]: 1.1 m3; lognormal SD95 1.21
  (1,1,1,1,3,1,3)

## Inputs from nature
- Transformation, from unknown [resources, land]: 0.00749 m2; lognormal SD95 2.37
  (4,5,1,3,4,5,8)
- Transformation, to industrial area, vegetation [resources, land]: 0.00749 m2; lognormal SD95 2.37
  (4,5,1,3,4,5,8)
- Occupation, industrial area, vegetation [resources, land]: 0.749 m2a; lognormal SD95 1.92
  (4,5,1,3,4,5,7)

## Sampling procedure
Literature

## Extrapolations
see Technology

## Uncertainty adjustments
The assumption that the volume change of spruce is the same as for other softwood is considered in the uncertainties.

## Sources
- Werner F., Althaus H.-J., Kuenniger T., Richter K., Jungbluth N., 2007, 2007 - LCI wood as fuel and const. mat. - Werner, Final report ecoinvent data v2.0, 9, Swiss Centre for LCI, Empa - TSL, ESU-services Ltd., Duebendorf, CH
Werner F., Althaus H.-J., Künniger T., Richter K., Jungbluth N. (2007) 1Life Cycle Inventories of Wood as Fuel and Construction Material. Final report ecoinvent data v2.0. Volume: 9. Issue: 0. Swiss Centre for LCI, Empa - TSL. Dübendorf, CH.
Type: Measurement on site
Source: CD-ROM
First author: Werner F.
Other authors: Althaus H.-J., Künniger T., Richter K., Jungbluth N.
Year: 2007
Title of anthology: Final report ecoinvent data v2.0
Place of publication: Dübendorf, CH
Publisher: Swiss Centre for LCI, Empa - TSL
Volume No: 9
Issue No: 0

## Validation
Proof reading validation: passed; Other validation: none;
