# Acrylic render, at plant

Dataset: EcoSpold 1, unit process
Functional unit: 1 kg
Category: construction materials / plaster
Geography: CH
Time period: 2000-01 to 2016-12
Generated by: Daniel Savi
accessRestrictedTo: 0
copyright: true

## General comment
Kunststoffputz (Dispersionsputz), Herstellung
Viskose Mischung ab Werktor ohne Anmachwasser
Bindemittel Polymerdispersion, Musterrezeptur mit 14% Polymerdispersion (50%-ig), 56 % mineralische Füllstoffe, 23 % Additive, 7 % Wasser
Version: 0.0

Local category: construction materials
Local subcategory: Putze

## Reference product
- Acrylic render, at plant [CH]: 1 kg
  SWITZERLAND

## Inputs from technosphere
- Aluminium hydroxide, at plant [RER]: 0.1005 kg; lognormal SD95 1.10306
- Polymethyl methacrylate, beads, at plant [RER]: 0.002513 kg; lognormal SD95 1.10306
- Chemicals organic, at plant [GLO]: 0.01005, 0.003015 kg (2 entries); lognormal SD95 1.10306
- Sodium tripolyphosphate, at plant [RER]: 0.002513 kg; lognormal SD95 1.10306
- Acrylic binder, 34% in H2O, at plant [RER]: 0.0704 kg; lognormal SD95 1.10306
  (2;3;1;2;2)
- Silicone product, at plant [RER]: 0.01005, 0.01005 kg (2 entries); lognormal SD95 1.10306
- Disposal, plaster, mortar, as building waste [CH]: 0.005 kg; lognormal SD95 1.10306
- Tap water, at user [RER]: 0.14271 kg; lognormal SD95 1.10306
- Titanium dioxide, production mix, at plant [RER]: 0.0402 kg; lognormal SD95 1.10306
- Limestone, milled, loose, at plant [CH]: 0.5628 kg; lognormal SD95 1.10306
- Manufacturing, wet green mortar, per kg mortar [CH]: 1 kg; lognormal SD95 1.10306
  (2;3;1;2;2)
- Ethylene glycol monoethyl ether, at plant [RER]: 0.0201 kg; lognormal SD95 1.10306
- Plastics bucket 18 l incl. transport packaging, at plant [RER]: 0.04 p; lognormal SD95 1.30007
  (4;5;1;1;1)
- Modified starch, at plant [RER]: 0.0201 kg; lognormal SD95 1.10306
- Disposal, plastics bucket 18 l [CH]: 0.04 p; lognormal SD95 1.30007
- Glass fibre, at plant [RER]: 0.01005 kg; lognormal SD95 1.10306
- Transport, freight, lorry, 16t-32t gross weight, fleet average [RER]: 0.486 tkm; lognormal SD95 2.01043
  (2;3;1;2;2)

## Sources
- Kasser U., R. Frischknecht, M. Klingler, D. Savi, R. Itten, F. Wyss,P. Stolz, L. Tschuemperlin, 2016, 2016 - Renewal and exp. of LCA data in KBOB - Kasser, -, Buero fuer Umweltchemie, treeze Ltd., Zuerich and Uster, CH
U. Kasser, R. Frischknecht, M. Klingler, D. Savi, R. Itten, F. Wyss,P. Stolz, L. Tschümperlin 2016 (2015Z) Erneuerung und Erweiterung der Ökobilanzdaten in der KBOB-Liste "Ökobilanzdaten im Baubereich", Projekt QualiBOB. unknown.

First author: U. Kasser, R. Frischknecht, M. Klingler, D. Savi, R. Itten, F. Wyss,P. Stolz, L. Tschümperlin 2016
Year: 2015Z
Place of publication: unknown
Original title: Erneuerung und Erweiterung der Ökobilanzdaten in der KBOB-Liste "Ökobilanzdaten im Baubereich", Projekt QualiBOB
