# Bitumen sealing Alu80, at plant

Dataset: EcoSpold 1, unit process
Functional unit: 1 kg
Category: construction / sealing
Geography: RER
Time period: 1994-01 to 2000-12
Generated by: Martin Lehmann
accessRestrictedTo: 0
copyright: true

## General comment
The dataset is applicable in the construction building sector. Bitumen sealing is used to protect the construction against water intrusion.;

## Included processes
The dataset describes the production of bitumen sealing Alu80. Included processes are the extrusion of polypropylene foil, the fabrication of the sealing, the infrastructure, the transport by road and rail as well as the disposal of the bitumen cuttings in a municipal incineration. The production of bitumen sealing does not include any chemical processes. Bitumen sealing Alu80 has as a specification a moisture barrier.

## Geography
The data of this dataset is taken from literature studies and producer information.

## Technology
Simple processes involved, a carrier material is being treated with bitumen. The bitumen coatings are then gritted with minerals (talcum, sand).

## Time period
The production of bitumen sealing has not changed very much over the years, as there are no chemical processes involved.

## Reference product
- Bitumen sealing Alu80, at plant [RER]: 1 kg
  Europe

## Inputs from technosphere
- Electricity, medium voltage, production ENTSO-E, at grid: 0.42 kWh; lognormal SD95 1.22
  (2,3,1,3,1,5,2)
- Disposal, bitumen sheet, 1.5% water, to municipal incineration [CH]: 0.00665 kg; lognormal SD95 1.35
  (2,4,3,3,3,5,6)
- Sheet rolling, aluminium [RER]: 0.168 kg; lognormal SD95 1.26
  (3,4,1,3,1,5,2)
- Disposal, glass, 0% water, to municipal incineration [CH]: 0.00261 kg; lognormal SD95 1.35
  (2,4,3,3,3,5,6)
- Limestone, milled, loose, at plant [CH]: 0.241 kg; lognormal SD95 1.24
  composite
- Transport, freight, lorry, fleet average [RER]: 0.0879 tkm; lognormal SD95 2.1
  (4,3,1,3,1,5,5)
- Sand, at mine [CH]: 0.0199 kg; lognormal SD95 1.24
  (2,4,1,3,1,5,3)
- Aluminium, production mix, at plant [RER]: 0.0839 kg; lognormal SD95 1.22
  (2,2,1,3,1,5,3)
- Transport, freight, rail [RER]: 0.15 tkm; lognormal SD95 2.1
  (4,3,1,3,1,5,5)
- Disposal, aluminium, 0% water, to municipal incineration [CH]: 0.000839 kg; lognormal SD95 1.35
  (2,4,3,3,3,5,6)
- Bitumen, at refinery [RER]: 0.665 kg; lognormal SD95 1.24
  (2,4,1,3,1,5,3)
- Chemical plant, organics [RER]: 4e-10 p; lognormal SD95 3.06
  (2,4,1,3,1,5,9)

## Emissions to nature
- Heat, waste [emissions to air, unspecified]: 1.51 MJ; lognormal SD95 1.24
  (2,4,1,3,1,5,13)
- Benzo(a)pyrene [emissions to air, unspecified]: 3.46e-9 kg; lognormal SD95 5
  estimation
- NMVOC, non-methane volatile organic compounds, unspecified origin [emissions to air, unspecified]: 0.000997 kg; lognormal SD95 2.06
  (2,4,1,3,1,5,23)

## Sampling procedure
Literature, database

## Extrapolations
see Geography

## Uncertainty adjustments
The used data is mainly valid for Central Europe, the dataset is applicable for the whole European region.

## Sources
- Kellenberger D., Althaus H.-J., Jungbluth N., Kuenniger T., Lehmann M., Thalmann P., 2007, 2007 - LCI building products - Kellenberger, Final report ecoinvent data v2.0, 7, Swiss Centre for LCI, Empa - TSL, ESU-services Ltd., Bau- und Umweltchimie, Duebendorf, CH
Kellenberger D., Althaus H.-J., Jungbluth N., Künniger T. (2007) Life Cycle Inventories of Building Products. Final report ecoinvent data v2.0. Volume: 7. Swiss Centre for LCI, Empa - TSL. Dübendorf, CH.
Type: Measurement on site
Source: CD-ROM
First author: Kellenberger D.
Other authors: Althaus H.-J., Jungbluth N., Künniger T.
Year: 2007
Title of anthology: Final report ecoinvent data v2.0
Place of publication: Dübendorf, CH
Publisher: Swiss Centre for LCI, Empa - TSL
Volume No: 7

## Validation
Proof reading validation: passed; Other validation: none;
