# Flat plate collector, aluminium copper absorber, at plant

Dataset: EcoSpold 1, unit process, infrastructure
Functional unit: 1 m2
Category: heat / solar\infrastructure
Geography: CH
Time period: 2010-01 to 2010-12
Production volume: In 2009 135'355 m2 of flat plate collectors (95 MW capacity) were sold in CH.
Generated by: Matthias Stucki
accessRestrictedTo: 0
copyright: true

## General comment
One collector has an aparture area of 2.335 m2 and an empty weight of 42 kg. The dataset refers to 1 m2 aparture area, which is equal to 1.09 m2 collector area. The flat plate collector has a selective nickel pigmented aluminium oxide coating on an aluminium absorber. ;

## Included processes
Production and disposal of a flat plate collector with am aluminium absorber in Switzerland. Including materials, water and energy use of production. Materials for mounting on roof are excluded.

## Geography
Production in CH. Main components are imported from the Germany.

## Technology
Assembly of a flat plate collector. The collector has a aluminium sheet coated by a nickel pigmented aluminium oxide coating.

## Time period
Material data have been investigated for a collector produced in 2010. Data for energy uses during production have been investigated for 2001.

## Reference product
- Flat plate collector, aluminium copper absorber, at plant [CH]: 1 m2
  SWITZERLAND

## Inputs from technosphere
- Transport, freight, lorry, 16t-32t gross weight, fleet average [CH]: 0.95475 tkm; lognormal SD95 2.8459
  (4,5,na,na,na,na); Standard distance 50km
- Propylene glycol, liquid, at plant [RER]: 1.0211 kg; lognormal SD95 1.3882
  (3,4,1,1,1,5); Questionnaires 2002 and 2010, extrapolation for life time 10a
- Silicone product, at plant [RER]: 0.085653 kg; lognormal SD95 1.3882
  (3,4,1,1,1,5); Questionnaires 2002 and 2010
- Selective coating, aluminium sheet, nickel pigmented aluminium oxide [SK]: 1 m2; lognormal SD95 1.3882
  (3,4,1,1,1,5); Questionnaire 2010, absorber coating
- Sheet rolling, aluminium [RER]: 1.4101 kg; lognormal SD95 1.4586
  (2,5,1,1,1,5); Questionnaire 2010
- Aluminium, production mix, wrought alloy, at plant [RER]: 5.3439 kg; lognormal SD95 1.3882
  (3,4,1,1,1,5); Questionnaires 2002 and 2010
- Disposal, building, mineral wool, to sorting plant [CH]: 1.5948 kg; lognormal SD95 1.4841
  (3,5,1,1,1,5); Estimation
- Copper, at regional storage [RER]: 1.7298 kg; lognormal SD95 1.3882
  (3,4,1,1,1,5); Questionnaires 2002 and 2010
- Treatment, sewage, from residence, to wastewater treatment, class 2 [CH]: 0.0094 m3; lognormal SD95 1.493
  (2,5,3,1,1,5); Questionnaire 2002
- Electricity, medium voltage, at grid [CH]: 1.1564 kWh; lognormal SD95 1.6106
  (2,5,3,1,3,5); Questionnaire 2001
- Synthetic rubber, at plant [RER]: 0.85653 kg; lognormal SD95 1.3882
  (3,4,1,1,1,5); Questionnaires 2002 and 2010
- Disposal, building, glass sheet, to sorting plant [CH]: 8.2698 kg; lognormal SD95 1.4841
  (3,5,1,1,1,5); Estimation
- Solar glass, low-iron, at regional storage [RER]: 8.2698 kg; lognormal SD95 1.3882
  (3,4,1,1,1,5); Questionnaires 2002 and 2010
- Treatment, heat carrier liquid, 40% C3H8O2, to wastewater treatment, class 2 [CH]: 0.002761 m3; lognormal SD95 1.4586
  (2,5,1,1,1,5); Questionnaire 2010
- Drawing of pipes, steel [RER]: 1.7298 kg; lognormal SD95 1.4586
  (2,5,1,1,1,5);
- Transport, freight, lorry, fleet average [RER]: 15.892 tkm; lognormal SD95 2.8296
  (3,4,3,1,1,5); 1260 km for glass from UK to DE, 450 km (890 km resp.) for glass from DE to CH, 750km for ALU-Cu absorber from DE, 600km for Cu absorber from US
- Disposal, plastics, mixture, 15.3% water, to municipal incineration [CH]: 0.94218 kg; lognormal SD95 1.4841
  (3,5,1,1,1,5); Estimation
- Tap water, at user [CH]: 9.4 kg; lognormal SD95 1.6106
  (2,5,3,1,3,5); Questionnaire 2001
- Rock wool, packed, at plant [CH]: 1.5948 kg; lognormal SD95 1.3882
  (3,4,1,1,1,5); Questionnaires 2002 and 2010
- Soft solder, Sn97Cu3, at plant [RER]: 0.058824 kg; lognormal SD95 1.493
  (2,5,3,1,1,5); Questionnaire 2002
- Water, completely softened, at plant [RER]: 1.7398 kg; lognormal SD95 1.3882
  (3,4,1,1,1,5); Questionnaires 2002 and 2010, extrapolation for life time 10a
- Polyethylene, HDPE, granulate, at plant [RER]: 0.0085653 kg; lognormal SD95 1.3882
  (3,4,1,1,1,5); Questionnaire 2010
- Solar collector factory [RER]: 2e-7 p; lognormal SD95 5.0433
  (2,5,1,1,3,5); Questionnaire 2002
- EUR-flat pallet [RER]: 0.045081 p; lognormal SD95 1.3882
  (3,4,1,1,1,5); Questionnaire 2010, pallet weight 19kg; used amount: 2kg/collector
- Transport, freight, rail [RER]: 7.1221 tkm; lognormal SD95 2.8296
  (3,4,3,1,1,5); Standard distance 600km; 60 km solar glass + lorry
- Chromium steel 18/8, at plant [RER]: 0.077088 kg; lognormal SD95 1.3882
  (3,4,1,1,1,5); Questionnaire 2010, fixing parts
- Brazing solder, cadmium free, at plant [RER]: 0.0036765 kg; lognormal SD95 1.493
  (2,5,3,1,1,5); Questionnaire 2002
- Section bar extrusion, aluminium [RER]: 3.9338 kg; lognormal SD95 1.4586
  (2,5,1,1,1,5); Questionnaire 2002
- Tempering, flat glass [RER]: 8.2698 kg; lognormal SD95 1.3882
  (3,4,1,1,1,5); Questionnaire 2010
- Disposal, building, waste wood, untreated, to final disposal [CH]: 0.85653 kg; lognormal SD95 1.4841
  (3,5,1,1,1,5); Estimation

## Emissions to nature
- Heat, waste [emissions to air, high. pop.]: 4.163 MJ; lognormal SD95 1.4586
  (2,5,1,1,1,5); calculated from electricity consumption

## Sampling procedure
Questionnaires.

## Extrapolations
Energy use during production investigated in an other factory.

## Sources
- Stucki M., Jungbluth N., 2012, 2012 - Update LCI solar collectors - Stucki, -, 352, ESU-services Ltd., Uster, CH
Stucki M., Jungbluth N. (2010) Update of the Life Cycle Inventories of Solar Collectors. Volume: 352. ESU-services Ltd.. Uster, CH.
Type: Separate publication
First author: Stucki M.
Other authors: Jungbluth N.
Year: 2010
Place of publication: Uster, CH
Publisher: ESU-services Ltd.
Volume No: 352

## Validation
Proof reading validation: 17.12.2010; Other validation: \\Server\E\ESU-Docs\Projekte laufend\352 Sonnenkollektoranlagen\Berechnung\[neueingabe-Kollektoren-2.2+V1.0.xlsx]X-Process;
