# xxx Operation, freight train

Dataset: EcoSpold 1, unit process
Functional unit: 1 tkm
Category: transport systems / transport, obsolete\rail, obsolete\operations, obsolete
Geography: CH
Production volume: 10786 Mio. tkm in 2007 in Switzerland
Share of production covered: 100 %
Generated by: Michael Spielmann
accessRestrictedTo: 0
copyright: true

## General comment
Average data for the operation of goods transportation by rail in Switzerland. The data has been determined top down, by combining the total yearly energy consumption and the yearly tkm-performance of goods transportation.;

## Included processes
The inventory includes the actual energy consumption for an average goods train (869Gt) in Switzerland using electro and diesel energy. In addition the diesel consumption and emissions of shunting processes are accounted for.

## Technology
electric traction, diesel traction for shunting processes, average share of particle filters

## Time period
Data for emission indices for shunting is based on figures of 1995, specific energy consumption per tkm is from 2006

## Reference product
- xxx Operation, freight train [CH]: 1 tkm
  SWITZERLAND

## Inputs from technosphere
- Electricity, high voltage, SBB, at grid [CH]: 0.086124 kWh; lognormal SD95 1
- Diesel, at regional storage [CH]: 0.00068 kg; lognormal SD95 1

## Emissions to nature
- Dinitrogen monoxide [emissions to air, unspecified]: 6.8e-8 kg; lognormal SD95 1
- Sulfur hexafluoride [emissions to air, unspecified]: 3.7895e-9 kg; lognormal SD95 1
- Copper [emissions to air, unspecified]: 1.1551e-9 kg; lognormal SD95 1
- Carbon dioxide, fossil [emissions to air, unspecified]: 0.0021394 kg; lognormal SD95 1
- Nitrogen oxides [emissions to air, unspecified]: 3.7365e-5 kg; lognormal SD95 1
- Particulates, > 10 um [emissions to air, unspecified]: 1.5782e-5 kg; lognormal SD95 1
- Cadmium [emissions to air, unspecified]: 6.8e-12 kg; lognormal SD95 1
- NMVOC, non-methane volatile organic compounds, unspecified origin [emissions to air, unspecified]: 3.4452e-6 kg; lognormal SD95 1
- Ammonia [emissions to air, unspecified]: 1.356e-8 kg; lognormal SD95 1
- Xylene [emissions to air, unspecified]: 2.722e-8 kg; lognormal SD95 1
- Heat, waste [emissions to air, unspecified]: 0.31005 MJ; lognormal SD95 1
- Iron [emissions to soil, unspecified]: 1.7786e-5 kg; lognormal SD95 1
- Benzene [emissions to air, unspecified]: 6.8e-8 kg; lognormal SD95 1
- Lead [emissions to air, unspecified]: 7.483e-14 kg; lognormal SD95 1
- Noise, rail, freight train [non material emissions, unspecified]: 1 tkm
- Selenium [emissions to air, unspecified]: 6.8e-12 kg; lognormal SD95 1
- Nickel [emissions to air, unspecified]: 4.761e-11 kg; lognormal SD95 1
- Chromium [emissions to air, unspecified]: 3.405e-11 kg; lognormal SD95 1
- Particulates, > 2.5 um, and < 10um [emissions to air, unspecified]: 6.8899e-6 kg; lognormal SD95 1
- Mercury [emissions to air, unspecified]: 1.356e-14 kg; lognormal SD95 1
- Toluene [emissions to air, unspecified]: 2.722e-8 kg; lognormal SD95 1
- Sulfur dioxide [emissions to air, unspecified]: 4.078e-7 kg; lognormal SD95 1
- Particulates, < 2.5 um [emissions to air, unspecified]: 4.266e-7 kg; lognormal SD95 1
- Methane, fossil [emissions to air, unspecified]: 8.839e-8 kg; lognormal SD95 1
- Carbon monoxide, fossil [emissions to air, unspecified]: 1.0747e-5 kg; lognormal SD95 1
- Zinc [emissions to air, unspecified]: 6.8e-10 kg; lognormal SD95 1

## Sampling procedure
International Railway statistic

## Sources
- Spielmann M., Bauer C., Dones R., Tuchschmid M., 2007, 2007 - Transport services - Spielmann, Final report ecoinvent Data v2.0, 14, Swiss Centre for LCI, PSI, ESU-services Ltd., Duebendorf, Villigen and Uster, CH
Spielmann M., Dones R; Bauer C. (2007) Life Cycle Inventories of Transport Services. Final report ecoinvent Data v2.0. Volume: 14. Issue: 0. Swiss Centre for LCI, PSI. Dübendorf and Villigen, CH.
Type: Measurement on site
Source: CD-ROM
First author: Spielmann M.
Other authors: Dones R; Bauer C.
Year: 2007
Title of anthology: Final report ecoinvent Data v2.0
Place of publication: Dübendorf and Villigen, CH
Publisher: Swiss Centre for LCI, PSI
Volume No: 14
Issue No: 0

## Validation
Proof reading validation: passed; Other validation: none;
