# xx Electricity, at refinery

Dataset: EcoSpold 1, unit process
Functional unit: 1 kWh
Category: energy, obsolete / electricity by fuel, obsolete\oil, obsolete
Geography: CH
Time period: 2000-01 to 2000-12
Production volume: 4.6 mio. tonnes crude oil throughput in 2000.
Share of production covered: 100 %
Generated by: Niels Jungbluth
accessRestrictedTo: 0
copyright: true

## General comment
Description of all flows of materials and energy due to the throughput of 1kg crude oil in the refinery. The multioutput-process 'crude oil, in refinery' delivers the co-products petrol, unleaded, bitumen, diesel, light fuel oil, heavy fuel oil, kerosene, naphtha, propane/ butane, refinery gas, secondary sulphur and electricity. The impacts of processing are allocated to the different products.;

## Included processes
All processes on the refinery site excluding the emissions from combustion facilities, including waste water treatment, process emissions and direct discharges to rivers.

## Geography
Investigation for the refineries in Collombey and Cressier in Switzerland.

## Technology
Average data for the used technology.

## Time period
The most important data (e.g. production, throughput, energy use, regulated emissions) have been investigated for the 2 Swiss refineries for the year 2000. Other data and indicators have been assessed based on older literature data.

## Reference product
- xx Electricity, at refinery [CH]: 1 kWh
  SWITZERLAND

## Inputs from technosphere
- Refinery gas, burned in furnace [CH]: 5.69005 MJ; lognormal SD95 1.09
  (2,1,1,1,1,3); Swiss statistic
- Heavy fuel oil, burned in refinery furnace [CH]: 1.31524 MJ; lognormal SD95 1.09
  (2,1,1,1,1,3); Swiss statistic

## Emissions to nature
- Nitrogen oxides [emissions to air, high. pop.]: 7.0271e-5 kg; lognormal SD95 1.51
  (2,1,1,1,1,3); Swiss plants
- Dinitrogen monoxide [emissions to air, high. pop.]: 3.7001e-6 kg; lognormal SD95 1.52
  (3,na,na,na,1,na); Average of plant data

## Sampling procedure
Questionnaires and literature.

## Sources
- Jungbluth N., 2007, 2007 - Crude oil - Jungbluth, Sachbilanzen von Energiesystemen. Final report No. 6 ecoinvent data v2.0, 6, Swiss Centre for LCI, ESU-services Ltd., Duebendorf and Uster, CH
Jungbluth, N. (2007) Erdöl. Sachbilanzen von Energiesystemen. Final report No. 6 ecoinvent data v2.0. Editors: Dones R.. Volume: 6. Swiss Centre for LCI, PSI. Dübendorf and Villigen, CH.
Type: Measurement on site
Source: CD-ROM
First author: Jungbluth, N.
Year: 2007
Name of editors: Dones R.
Title of anthology: Sachbilanzen von Energiesystemen. Final report No. 6 ecoinvent data v2.0
Place of publication: Dübendorf and Villigen, CH
Publisher: Swiss Centre for LCI, PSI
Volume No: 6

## Validation
Proof reading validation: Passed.; Other validation: none;
