# Flooring, carpet from natural fibre, at regional storage

Dataset: EcoSpold 1, unit process
Functional unit: 1 m2
Category: flooring / flooring kbob
Geography: CH
Time period: 2012-01 to 2012-12
Share of production covered: 0 %
Generated by: Matthias Klingler
accessRestrictedTo: 0
copyright: true

## General comment
Durchschnittliches Flächengewicht = 2.7 kg/m2;

## Included processes
Daten zur Zusammensetzung des Teppichs aus Ecodevis.

## Reference product
- Flooring, carpet from natural fibre, at regional storage [CH]: 1 m2

## Inputs from technosphere
- Light fuel oil, burned in boiler 100kW, non-modulating [CH]: 0.517 MJ; lognormal SD95 1.1257
- Chemical plant, organics [RER]: 2.714e-10 p; lognormal SD95 1.6822
- Kenaf fibres, at farm [IN]: 0.688 kg; lognormal SD95 1.1257
- Limestone, milled, loose, at plant [CH]: 0.299 kg; lognormal SD95 1.1257
- Latex, at plant [RER]: 0.271 kg; lognormal SD95 1.1257
- Transport, transoceanic freight ship [OCE]: 20.629 tkm; lognormal SD95 1.311
- Transport, freight, lorry, 32t-40t gross weight, fleet average [RER]: 2.436 tkm; lognormal SD95 1.311
- Jute fibres, irrigated system, at farm [IN]: 0.688 kg; lognormal SD95 1.1257
- Electricity, medium voltage, production ENTSO-E, at grid: 1.292 kWh; lognormal SD95 1.1257
- Jute fibres, rainfed system, at farm [IN]: 0.688 kg; lognormal SD95 1.1257
- Chemicals organic, at plant [GLO]: 0.054 kg; lognormal SD95 1.1257
- Transport, freight, rail [RER]: 0.081 tkm; lognormal SD95 1.311
- Chemicals inorganic, at plant [GLO]: 0.027 kg; lognormal SD95 1.1257

## Sources
- Werner F., 2017, 2017 - LCI wood and wood based products - Werner, Project Report, 0, Environment & Development, Zuerich, CH

## Validation
Proof reading validation: 13.03.2013; Other validation: \\SERVER\Users\Admin\Documents\Projekte laufend\297 BAFU Anfragen\Bodenbeläge\[c Ecospold alle Prozesse_v0.2.xlsx]X-Process;
