# Electrode, positive, LaNi5, at plant

Dataset: EcoSpold 1, unit process
Functional unit: 1 kg
Category: electronics / devices\module\component
Geography: GLO
Time period: 2004-01 to 2004-12
Generated by: Wolfram Scharnhorst
accessRestrictedTo: 0
copyright: true

## General comment
The functional unit represents 1 kg of the positive LaNi5 electrode material for the production of NiMH batteries. Process data is taken mainly from an environmental report of a battery producer as well as from literature. In addition own measurements of sizes and weights of batteries were used.;

## Included processes
(Raw) materials, transport efforts and energy consumption for the production of the positive electrode for NiMH batteries. Neither waste nor emissions to air or water are taken into account.

## Geography
This module relates to the global situation (electricity consumption according to the main producing countries).

## Technology
Construction details as described for NiMH-rechargable batteries and manufacturing conditions as documented in the environmental report were adopted.

## Reference product
- Electrode, positive, LaNi5, at plant [GLO]: 1 kg
  Global

## Inputs from technosphere
- Electricity, medium voltage, at grid [CN]: 0.0030345 kWh; lognormal SD95 1.8806
  (5,5,2,3,4,5,2)
- Electricity, medium voltage, at grid [JP]: 0.002023 kWh; lognormal SD95 1.8806
  (5,5,2,3,4,5,2)
- Nickel, 99.5%, at plant [GLO]: 0.1 kg; lognormal SD95 1.6295
  (2,3,4,3,4,5,4)
- Tetrafluoroethylene, at plant [RER]: 0.03 kg; lognormal SD95 1.6295
  (2,3,4,3,4,5,4)
- Transport, freight, lorry, fleet average [RER]: 0.17047 tkm; lognormal SD95 2.095
  (4,5,na,na,na,na,5)
- Hydrogen, liquid, at plant [RER]: 0.7047 kg; lognormal SD95 1.9285
  (5,5,4,3,4,5,4)
- Transport, freight, rail [RER]: 0.63482 tkm; lognormal SD95 2.095
  (4,5,na,na,na,na,5)
- Mischmetal, primary, at plant [GLO]: 0.87 kg; lognormal SD95 1.5886
  (2,3,3,3,4,5,4)

## Emissions to nature
- Heat, waste [emissions to air, high. pop.]: 0.018207 MJ; lognormal SD95 1.5881
  (2,3,3,2,3,3,31)

## Sampling procedure
Literature, measurements

## Extrapolations
see technology & general comments

## Sources
- Hischier R., Classen M., Lehmann M., Scharnhorst W., 2007, 2007 - LCI electric and electronic equipment - Hischier, Final report ecoinvent Data v2.0, 18, Swiss Centre for LCI, Empa - TSL, Duebendorf and St. Gallen, CH
Hischier R., Classen M., Lehmann M., Scharnhorst W. (2007) Life Cycle Inventories of Electric and Electronic Equipment - Production, Use & Disposal. Final report ecoinvent Data v2.0. Volume: 18. Swiss Centre for LCI, Empa - TSL. Duebendorf and St. Gallen, CH.
Type: Measurement on site
Source: CD-ROM
First author: Hischier R.
Other authors: Classen M., Lehmann M., Scharnhorst W.
Year: 2007
Title of anthology: Final report ecoinvent Data v2.0
Place of publication: Duebendorf and St. Gallen, CH
Publisher: Swiss Centre for LCI, Empa - TSL
Volume No: 18
Original title: Life Cycle Inventories of Electric and Electronic Equipment - Production, Use & Disposal

## Validation
Proof reading validation: passed; Other validation: none;
