# Paraná pine, allocation correction 2

Dataset: EcoSpold 1, unit process
Functional unit: 1 m3
Category: wood / extraction\allocation corrections
Geography: GLO
Time period: 2000-01 to 2005-12
Generated by: Frank Werner
accessRestrictedTo: 0
copyright: true

## General comment
auxiliary module;

## Included processes
corrects economically allocated resource use, feedstock energy and carbon uptake to fit with physical flows (=mass-based allocation)

## Reference product
- Paraná pine, allocation correction 2 [GLO]: 1 m3
  Global

## Inputs from nature
- Wood, soft, standing [resources, biotic]: 1 m3; lognormal SD95 1.2621
  (3,4,1,3,1,5)
- Energy, gross calorific value, in biomass [resources, biotic]: 13125 MJ; lognormal SD95 1.2621
  (3,4,1,3,1,5)
- Carbon dioxide, in air [resources, in air]: 904.02 kg; lognormal SD95 1.2621
  (3,4,1,3,1,5)

## Sources
- Althaus H.-J., Werner F., Stettler C., Dinkel F., 2007, 2007 - LCI renewable materials - Althaus, Final report ecoinvent Data v2.0, 21, Swiss Centre for LCI, Empa - TSL, Umwelt & Entwicklung, Carbotech AG, Duebendorf, CH
Althaus H.J., Dinkel F., Werner F. (2007) Life Cycle Inventories of Renewable Materials. Final report ecoinvent Data v2.0. Editors: 0. 0. Volume: 21. Issue: 0. Swiss Centre for LCI, Empa - TSL. Duebendorf, CH.
Type: Measurement on site
Source: CD-ROM
First author: Althaus H.J.
Other authors: Dinkel F., Werner F.
Year: 2007
Name of editors: 0
Title of anthology: Final report ecoinvent Data v2.0
Place of publication: Duebendorf, CH
Publisher: Swiss Centre for LCI, Empa - TSL
Journal: 0
Volume No: 21
Issue No: 0

## Validation
Proof reading validation: Passed; Other validation: none;
