# Control and wiring, decentralized unit, at plant

Dataset: EcoSpold 1, unit process
Functional unit: 1 p
Category: construction / ventilation\components
Geography: RER
Time period: 2003-01 to 2003-12
Generated by: Alex Primas
accessRestrictedTo: 0
copyright: true

## General comment
Production of a typical component used for a ventilation system in a multi family house. The house considered in the investigation includes 6 flats with 130 m2 floor area each and a ventilation rate of 120 m3/h.;

## Included processes
Materials used for the production. Estimation of electricity use for the different production steps. Energy use for heating of the production building. Transport of raw materials to the plant. Estimation for the Infrastructure of the Production site included.

## Geography
Data for production in Germany used.

## Technology
Basic control unit for decentral ventilation equipment with 120 m3/h nominal air flow. Electrical wiring for connection of unit and grid connection. Weight of control unit 0.6 kg, weight of wiring 1.58 kg. Electrical wiring for connection of unit

## Time period
Materials investigated in 2003

## Reference product
- Control and wiring, decentralized unit, at plant [RER]: 1 p
  Europe

## Inputs from technosphere
- Transport, freight, lorry, fleet average [RER]: 0.229 tkm; lognormal SD95 2.09
  (4,5,nA,nA,nA,nA); Standard distance of ecoinvent used
- Light fuel oil, burned in industrial furnace 1MW, non-modulating [RER]: 3.16 MJ; lognormal SD95 1.38
  (4,5,1,1,1,5); Data estimated from related companies
- Polyvinylchloride, at regional storage [RER]: 1.03 kg; lognormal SD95 1.24
  (2,4,1,1,1,5); Questionnaire
- Plastics processing factory [RER]: 1.61e-9 p; lognormal SD95 3.18
  (4,5,1,1,3,5); Calculated with data of a similar company
- Transport, freight, rail [RER]: 0.458 tkm; lognormal SD95 2.09
  (4,5,nA,nA,nA,nA); Standard distance of ecoinvent used
- Wire drawing, copper [RER]: 0.66 kg; lognormal SD95 1.26
  (3,4,1,1,1,5); Questionnaire, estimations
- Electronics for control units [RER]: 0.6 kg; lognormal SD95 1.34
  (3,4,1,1,3,5); Questionnaire, approximation for technology
- Copper, at regional storage [RER]: 0.66 kg; lognormal SD95 1.26
  (3,4,1,1,1,5); Questionnaire, estimations
- Electricity, medium voltage, production ENTSO-E, at grid: 0.24 kWh; lognormal SD95 1.69
  (3,5,5,1,3,5); Data estimated from related processes
- Natural gas, burned in industrial furnace 1MWth [CH]: 3.16 MJ; lognormal SD95 1.38
  (4,5,1,1,1,5); Data estimated from related companies
- Extrusion, plastic pipes [RER]: 1.03 kg; lognormal SD95 1.24
  (2,4,1,1,1,5); Questionnaire
- Disposal, polyvinylchloride, 0.2% water, to municipal incineration [CH]: 0.049 kg; lognormal SD95 1.32
  (4,4,1,1,1,5); Estimations on precentage material disposed

## Emissions to nature
- Heat, waste [emissions to air, high. pop.]: 0.863 MJ; lognormal SD95 1.69
  (3,5,5,1,3,5); Calculated from electricity use

## Sampling procedure
Questionnaire, technical information of producer and estimations. For control electronic proxy process used.

## Sources
- Haessig W., Primas A., 2007, 2007 - LCI comfort ventilation in dwellings - Haessig, Final report ecoinvent Data v2.0, 25, Swiss Centre for LCI, B+H, Duebendorf and Zuerich, CH
Hässig, W., Primas, A. (2007) Ökologische Aspekte der Komfortlüftungen im Wohnbereich. Final report ecoinvent Data v2.0. Volume: 25. Swiss Centre for LCI, B+H. Dübendorf and Zürich, CH.
Type: Measurement on site
Source: CD-ROM
First author: Hässig, W.
Other authors: Primas, A.
Year: 2007
Title of anthology: Final report ecoinvent Data v2.0
Place of publication: Dübendorf and Zürich, CH
Publisher: Swiss Centre for LCI, B+H
Volume No: 25

## Validation
Proof reading validation: passed; Other validation: none;
