# Operation, lorry 28t, rape methyl ester 100%

Dataset: EcoSpold 1, unit process
Functional unit: 1 km
Category: transport systems / road\operations
Geography: CH
Time period: 2004-01 to 2004-12
Share of production covered: 0 %
Generated by: Natascha Kljun
accessRestrictedTo: 0
copyright: true

## General comment
Average data for the operation of heavy duty vehicles (20-28t) in Switzerland, with an average load of 50%.;
Synonyms: RME;

## Included processes
rape methyl ester, at regional storage supplies is included. Direct airborne emissions of gaseous substances, particulate matters and heavy metals are accounted for. Heavy metal emissions to water and to soil are included. Tyre abrasion is included.

## Geography
Data refers to average transport conditions in Switzerland.

## Technology
Euro3

## Reference product
- Operation, lorry 28t, rape methyl ester 100% [CH]: 1 km
  SWITZERLAND

## Inputs from technosphere
- Rape methyl ester, at regional storage [CH]: 0.26665 kg; lognormal SD95 1.3127
  (,,,,,); Same as for carbon dioxide. However, value might be much higher since fuel consumption calculated following ecoinvent convention differs from lab values.

## Emissions to nature
- Lead [emissions to water, unspecified]: 5.2e-8 kg; lognormal SD95 6
  14_transports, table 4.34
- Zinc [emissions to soil, unspecified]: 8.35e-6 kg; lognormal SD95 6
  14_transports, table 4.34
- Nitrogen oxides [emissions to air, unspecified]: 0.0069924 kg; lognormal SD95 1.6255
  (2,3,1,3,3,5); Munack et al 2003, Scharmer 2001, UFOP 2004, Keller et al. 1998
- Copper [emissions to water, unspecified]: 1.56e-7 kg; lognormal SD95 6
  14_transports, table 4.34
- Nickel [emissions to soil, unspecified]: 8.32e-8 kg; lognormal SD95 6
  14_transports, table 4.34
- Copper [emissions to soil, unspecified]: 1.56e-7 kg; lognormal SD95 6
  14_transports, table 4.34
- Methane, fossil [emissions to air, unspecified]: 2.1195e-7 kg; lognormal SD95 1.6255
  (2,3,1,3,3,5); Munack et al 2003, Scharmer 2001, UFOP 2004, Keller et al. 1998
- Particulates, < 2.5 um [emissions to air, unspecified]: 0.00013395 kg; lognormal SD95 3.1403
  (4,3,1,3,3,5); Munack et al 2003, Scharmer 2001, UFOP 2004, Keller et al. 1998; 14_transports, non-exhaust table 4.23
- Methane, biogenic [emissions to air, unspecified]: 3.8151e-6 kg; lognormal SD95 1.6255
  (2,3,1,3,3,5); Munack et al 2003, Scharmer 2001, UFOP 2004, Keller et al. 1998
- Carbon dioxide, biogenic [emissions to air, unspecified]: 0.71446 kg; lognormal SD95 1.3127
  (2,3,1,3,3,5); Munack et al 2003, Scharmer 2001, UFOP 2004, Keller et al. 1998
- Chromium [emissions to water, unspecified]: 9.36e-8 kg; lognormal SD95 6
  14_transports, table 4.34
- Cadmium [emissions to soil, unspecified]: 1.04e-8 kg; lognormal SD95 6
  14_transports, table 4.34
- Benzene [emissions to air, unspecified]: 1.1642e-6 kg; lognormal SD95 1.6255
  (2,3,1,3,3,5); Munack et al 2003, Scharmer 2001, UFOP 2004, Keller et al. 1998
- Lead [emissions to air, unspecified]: 2.1e-8 kg; lognormal SD95 5.1038
  (4,5,1,2,1,1); 14_transports, table 4.33
- Cadmium [emissions to air, unspecified]: 4.21e-9 kg; lognormal SD95 5.1038
  (4,5,1,2,1,1); 14_transports, table 4.33
- Ethane, 1,1,1,2-tetrafluoro-, HFC-134a [emissions to air, unspecified]: 2.29e-6 kg; lognormal SD95 2
  literature study and own assumptions: initial input cooling agent: 2kg/vehicle. Yearly loss 8%. Yearly kilometric performance: 70000vkm
- Zinc [emissions to air, unspecified]: 3.38e-6 kg; lognormal SD95 5.1038
  (4,5,1,2,1,1); 14_transports, table 4.33
- Chromium [emissions to air, unspecified]: 3.79e-8 kg; lognormal SD95 5.1038
  (4,5,1,2,1,1); 14_transports, table 4.33
- Dinitrogen monoxide [emissions to air, unspecified]: 7.0385e-6 kg; lognormal SD95 1.6255
  (2,3,1,3,3,5); Munack et al 2003, Scharmer 2001, UFOP 2004, Keller et al. 1998
- Nickel [emissions to water, unspecified]: 8.32e-8 kg; lognormal SD95 6
  14_transports, table 4.34
- Zinc [emissions to water, unspecified]: 8.35e-6 kg; lognormal SD95 6
  14_transports, table 4.34
- Copper [emissions to air, unspecified]: 6.31e-8 kg; lognormal SD95 5.1038
  (4,5,1,2,1,1); 14_transports, table 4.33
- Noise, road, lorry, average [non material emissions, unspecified]: 1 km
- Cadmium [emissions to water, unspecified]: 1.04e-8 kg; lognormal SD95 6
  14_transports, table 4.34
- Lead [emissions to soil, unspecified]: 5.2e-8 kg; lognormal SD95 6
  14_transports, table 4.34
- Particulates, > 2.5 um, and < 10um [emissions to air, unspecified]: 7.9472e-5 kg; lognormal SD95 2.1458
  (same comment as for Particulates, < 2.5 um)
- Heat, waste [emissions to air, unspecified]: 10.799 MJ; lognormal SD95 1.11
  14_transports, table 4.63
- Chromium [emissions to soil, unspecified]: 9.36e-8 kg; lognormal SD95 6
  14_transports, table 4.34
- Carbon monoxide, fossil [emissions to air, unspecified]: 4.9934e-5 kg; lognormal SD95 5.1117
  (2,3,1,3,3,5); Munack et al 2003, Scharmer 2001, UFOP 2004, Keller et al. 1998
- NMVOC, non-methane volatile organic compounds, unspecified origin [emissions to air, unspecified]: 0.00016268 kg; lognormal SD95 1.6255
  (2,3,1,3,3,5); Munack et al 2003, Scharmer 2001, UFOP 2004, Keller et al. 1998
- Carbon monoxide, biogenic [emissions to air, unspecified]: 0.00089881 kg; lognormal SD95 5.1117
  (2,3,1,3,3,5); Munack et al 2003, Scharmer 2001, UFOP 2004, Keller et al. 1998
- Carbon dioxide, fossil [emissions to air, unspecified]: 0.039692 kg; lognormal SD95 1.3127
  (2,3,1,3,3,5); Munack et al 2003, Scharmer 2001, UFOP 2004, Keller et al. 1998
- Ammonia [emissions to air, unspecified]: 5e-6 kg; lognormal SD95 1.4455
  (4,3,1,3,3,5); Munack et al 2003, Scharmer 2001, UFOP 2004, Keller et al. 1998
- Nickel [emissions to air, unspecified]: 3.37e-8 kg; lognormal SD95 5.1038
  (4,5,1,2,1,1); 14_transports, table 4.33
- Particulates, > 10 um [emissions to air, unspecified]: 0.00042795 kg; lognormal SD95 1.6764
  (same comment as for Particulates, < 2.5 um)

## Sampling procedure
National statistics, data from technical institutions and literature data.

## Sources
- Jungbluth N., Chudacoff M., Dauriat A., Dinkel F., Doka G., Faist Emmenegger M., Gnansounou E., Kljun N., Spielmann M., Stettler C., Sutter J., 2007, 2007 - LCI bioenergy - Jungbluth, Final report ecoinvent data v2.0, 17, Swiss Centre for LCI, ESU-services Ltd., Duebendorf and Uster, CH
Jungbluth N., Chudacoff M., Dauriat A., Dinkel F., Doka G., Faist Emmenegger M., Gnansounou E., Kljun N., Spielmann M., Stettler C., Sutter J. (2007) Life Cycle Inventories of Bioenergy. Final report ecoinvent data v2.0. Volume: 17. Swiss Centre for LCI, ESU. Duebendorf and Uster, CH.
Type: Measurement on site
Source: CD-ROM
First author: Jungbluth N.
Other authors: Chudacoff M., Dauriat A., Dinkel F., Doka G., Faist Emmenegger M., Gnansounou E., Kljun N., Spielmann M., Stettler C., Sutter J.
Year: 2007
Title of anthology: Final report ecoinvent data v2.0
Place of publication: Duebendorf and Uster, CH
Publisher: Swiss Centre for LCI, ESU
Volume No: 17

## Validation
Proof reading validation: Passed.; Other validation: none;
