# Ferrite, at plant

Dataset: EcoSpold 1, unit process
Functional unit: 1 kg
Category: metals / ferro
Geography: GLO
Time period: 2004-01 to 2004-12
Generated by: Roland Hischier
accessRestrictedTo: 0
copyright: true

## General comment
Data about a MnZn ferrite (type (Mn,Zn)O.F2O3), based on general information from literature as well as estimations based on further processes of the database.;

## Included processes
This module is a rough estimation of the composition by including raw materials, energy consumption, infrastructure, and transport efforts. Waste as well as all kind of emissions are not taken into account.

## Geography
Literature data are used to establish a global valuable dataset.

## Technology
estimation of the production efforts for a MnZn ferrite.

## Reference product
- Ferrite, at plant [GLO]: 1 kg
  Global

## Inputs from technosphere
- Aluminium oxide, plant [RER]: 2.5e-11 p; lognormal SD95 3.1827
  (4,5,4,3,1,5,9); Estimation, based on aluminium oxide production site
- Manganese, at regional storage [RER]: 0.3 kg; lognormal SD95 2.3276
  (5,5,na,na,5,5,3); assumption by author
- Zinc oxide, at plant [RER]: 0.15 kg; lognormal SD95 2.3276
  (5,5,na,na,5,5,3); assumption by author
- Heat, natural gas, at industrial furnace 1MW [CH]: 0.0363 MJ; lognormal SD95 1.6764
  (4,5,na,3,4,5,1); Estimation, based on the iron sintering process
- Transport, freight, rail [RER]: 0.2 tkm; lognormal SD95 2.095
  (4,5,na,na,na,na,5); standard values
- Heat, hard coal coke, at stove 5-15kW [RER]: 1.43 MJ; lognormal SD95 1.6764
  (4,5,na,3,4,5,1); Estimation, based on the iron sintering process
- Portafer, at plant [RER]: 0.55 kg; lognormal SD95 2.3276
  (5,5,na,na,5,5,3); assumption by author
- Electricity, medium voltage, production ENTSO-E, at grid: 0.01 kWh; lognormal SD95 1.6764
  (4,5,na,3,4,5,2); Estimation, based on the iron sintering process
- Transport, freight, lorry, fleet average [RER]: 0.1 tkm; lognormal SD95 2.095
  (4,5,na,na,na,na,5); standard values

## Sampling procedure
literature & own estimations

## Extrapolations
see generalComment

## Sources
- Hischier R., Classen M., Lehmann M., Scharnhorst W., 2007, 2007 - LCI electric and electronic equipment - Hischier, Final report ecoinvent Data v2.0, 18, Swiss Centre for LCI, Empa - TSL, Duebendorf and St. Gallen, CH
Hischier R., Classen M., Lehmann M., Scharnhorst W. (2007) Life Cycle Inventories of Electric and Electronic Equipment - Production, Use & Disposal. Final report ecoinvent Data v2.0. Volume: 18. Swiss Centre for LCI, Empa - TSL. Duebendorf and St. Gallen, CH.
Type: Measurement on site
Source: CD-ROM
First author: Hischier R.
Other authors: Classen M., Lehmann M., Scharnhorst W.
Year: 2007
Title of anthology: Final report ecoinvent Data v2.0
Place of publication: Duebendorf and St. Gallen, CH
Publisher: Swiss Centre for LCI, Empa - TSL
Volume No: 18
Original title: Life Cycle Inventories of Electric and Electronic Equipment - Production, Use & Disposal

## Validation
Proof reading validation: passed.; Other validation: none;
