# xx Copper, primary, from platinum group metal production

Dataset: EcoSpold 1, unit process
Functional unit: 1 kg
Category: material, obsolete / metals, obsolete\non ferro, obsolete
Geography: RU
Time period: 2000-01 to 2000-12
Production volume: 81 t / a
Share of production covered: 23 %
Generated by: Mischa Classen
accessRestrictedTo: 0
copyright: true

## General comment
The multioutput-process "platinum group metal production, primary" delivers the co-products "platinum, primary, at refinery", "palladium, primary, at refinery", "rhodium, primary, at refinery", "nickel, primary, from platinum group metal production" and "copper, primary, from platinum group metal production" in the Russian Federation (RU). The module is designed for the use of the metal in technical systems, where it plays a minor role like the use in manufacturing of electronic or technical chemistry using certain catalysts. It is not to be used if the impact of the PGM within the modelled process in scope is considered to be high. In such cases, a more detailed analysis depending on scope and allocation procedures has to be conducted. The data used is mainly based on a LCA study for autocatalysts in Germany.;

## Included processes
The module includes a mining and a beneficiation step with the mining infrastructure and disposal of overburden and tailings. Subsequently it includes the metallurgy step with the disposal of slag, the infrastructure and the separation of the co-products nickel and copper, and the refining step yielding the desired PGM-mix inclusively the refining infrastructure. Production, application and emissions of most agents used in beneficiation and metallurgy are also included.

## Geography
Some agents used like lime or sodium cyanide originate from data sets valid for Switzerland or Europe. Processes like blasting and transport originate from data sets valid for Switzerland or Europe.

## Technology
Mining is done underground, followed by beneficiation trough flotation where considerable amounts of agents are added. Overburden and tailings are disposed on the mining site and partly refilled. In RU a Outokumpu flash furnace followed by a Pierce-Smith-Converter is used. The resulting nickel matte is treated by elektrorefining. No recovery of sulphur dioxide in the off gas. The refining is done by selective precipitation, using data from the ZA process as proxy. For electricity mix the UCTE production mix is inventoried

## Reference product
- xx Copper, primary, from platinum group metal production [RU]: 1 kg
  RUSSIAN FEDERATION

## Inputs from technosphere
- Natural gas, burned in industrial furnace 1MWth [CH]: 7.84713 MJ; lognormal SD95 1.13
  (2,2,1,1,1,4,1)
- Disposal, sulfidic tailings, off-site [GLO]: 1.46955 kg; lognormal SD95 1.13
  (2,2,2,3,1,4) 6;
- Conveyor belt, at plant [RER]: 1.2084e-7 m; lognormal SD95 2.91
  (5,4,3,3,5,6,5)
- Limestone, milled, packed, at plant [CH]: 0.01087 kg; lognormal SD95 2
  reported values
- Disposal, nickel smelter slag, 0% water, to residual material landfill [CH]: 2.52009 kg; lognormal SD95 1.13
  (2,2,2,3,1,4) 6;
- Chemicals inorganic, at plant [GLO]: 0.25565 kg; lognormal SD95 2
  reported values
- Blasting [RER]: 2.7266e-6 kg; lognormal SD95 1.26
  (3,2,1,1,3,4,3)
- Hydrogen cyanide, at plant [RER]: 0.00019189 kg; lognormal SD95 2
  reported values
- Non-ferrous metal mine, underground [GLO]: 3.0302e-10 p; lognormal SD95 3.07
  (3,2,1,1,3,4,9)
- Non-ferrous metal smelter [GLO]: 8.8051e-12 p; lognormal SD95 3.3
  (4,2,1,5,4,4,9)
- Electricity, medium voltage, production ENTSO-E, at grid: 1.56912 kWh; lognormal SD95 1.26
  (3,2,1,1,3,4) 2;
- Diesel, burned in building machine, average [CH]: 0.419 MJ; lognormal SD95 1.63
  (4,3,2,2,4,5,5)
- Chemicals organic, at plant [GLO]: 0.0012327 kg; lognormal SD95 2
  reported values

## Inputs from nature
- Water, river [resources, in water]: 0.056899 m3; lognormal SD95 1.13
  (2,2,1,1,1,4,12)
- Transformation, to mineral extraction site [resources, land]: 1.3602e-5 m2; lognormal SD95 2.03
  (3,2,3,1,1,2,8); calculation based on reported value
- Water, well [resources, in water]: 0.00076514 m3; lognormal SD95 1.26
  (3,2,1,1,3,4,12)
- Transformation, from unknown [resources, land]: 1.3602e-5 m2; lognormal SD95 2.03
  (3,2,3,1,1,2,8); calculation based on reported value
- Occupation, mineral extraction site [resources, land]: 0.00096553 m2a; lognormal SD95 1.53
  (3,2,3,1,1,2,7); calculation based on reported value
- Copper, Cu 3.2E+0%, Pt 2.5E-4%, Pd 7.3E-4%, Rh 2.0E-5%, Ni 2.3E+0% in ore [resources, in ground]: 1.1125 kg; lognormal SD95 1.12
  reported values

## Emissions to nature
- Aluminium [emissions to water, river]: 2.6476e-7 kg; lognormal SD95 10
  (,,,,,) ; reported values
- Sulfur dioxide [emissions to air, low. pop.]: 1.79139 kg; lognormal SD95 1.38
  (4,2,2,1,3,5) 15;
- Cadmium [emissions to air, low. pop.]: 2.4533e-10 kg; lognormal SD95 1.59
  (3,2,1,1,3,4,31)
- Mercury [emissions to air, low. pop.]: 1.1113e-10 kg; lognormal SD95 1.59
  (3,2,1,1,3,4,31)
- COD, Chemical Oxygen Demand [emissions to water, river]: 3.201e-5 kg; lognormal SD95 10
  (,,,,,) ; reported values
- Manganese [emissions to air, low. pop.]: 2.1193e-6 kg; lognormal SD95 1.59
  (3,2,1,1,3,4,31)
- Particulates, < 2.5 um [emissions to air, low. pop.]: 0.00010977 kg; lognormal SD95 3.69
  (3,2,1,1,5,4) 20;
- Particulates, > 10 um [emissions to air, low. pop.]: 0.0011654 kg; lognormal SD95 2.26
  (3,2,1,1,5,4) 18;
- Lead [emissions to water, river]: 9.0648e-8 kg; lognormal SD95 10
  (,,,,,) ; reported values
- BOD5, Biological Oxygen Demand [emissions to water, river]: 2.1301e-5 kg; lognormal SD95 10
  (,,,,,) ; reported values
- DOC, Dissolved Organic Carbon [emissions to water, river]: 1.2503e-5 kg; lognormal SD95 10
  (,,,,,) ; reported values
- TOC, Total Organic Carbon [emissions to water, river]: 1.2503e-5 kg; lognormal SD95 10
  (,,,,,) ; reported values
- Arsenic [emissions to water, river]: 1.8521e-8 kg; lognormal SD95 10
  (,,,,,) ; reported values
- Chromium [emissions to water, river]: 1.257e-7 kg; lognormal SD95 10
  (,,,,,) ; reported values
- Fluorine [emissions to air, low. pop.]: 2.1193e-6 kg; lognormal SD95 1.59
  (3,2,1,1,3,4,31)
- Antimony [emissions to air, low. pop.]: 4.4572e-7 kg; lognormal SD95 1.59
  (3,2,1,1,3,4,31)
- Carbon dioxide, fossil [emissions to air, unspecified]: 0.060057 kg; lognormal SD95 1.58
  (4,2,1,1,4,4) 14; excluding stdev of lime addition
- Beryllium [emissions to air, low. pop.]: 5.7932e-9 kg; lognormal SD95 1.59
  (3,2,1,1,3,4,31)
- Cobalt [emissions to water, river]: 2.3986e-9 kg; lognormal SD95 10
  (,,,,,) ; reported values
- Carbon disulfide [emissions to air, low. pop.]: 0.0005447 kg; lognormal SD95 2.31
  (4,2,2,5,4,4,23)
- Particulates, > 2.5 um, and < 10um [emissions to air, low. pop.]: 0.0010866 kg; lognormal SD95 2.69
  (3,2,1,1,5,4) 19;
- Calcium [emissions to water, river]: 0.0021072 kg; lognormal SD95 10
  reported values
- NMVOC, non-methane volatile organic compounds, unspecified origin [emissions to air, low. pop.]: 6.6798e-5 kg; lognormal SD95 1.59
  (3,2,1,1,3,4,16)
- Tin [emissions to water, river]: 1.2388e-7 kg; lognormal SD95 10
  reported values
- Copper [emissions to water, river]: 5.7863e-7 kg; lognormal SD95 10
  (,,,,,) ; reported values
- Boron [emissions to air, low. pop.]: 2.2286e-8 kg; lognormal SD95 1.59
  (3,2,1,1,3,4,31)
- Sulfate [emissions to water, river]: 0.0072263 kg; lognormal SD95 10
  (,,,,,) ; reported values
- Manganese [emissions to water, river]: 7.5906e-8 kg; lognormal SD95 10
  (,,,,,) ; reported values
- Zinc [emissions to air, low. pop.]: 3.4249e-5 kg; lognormal SD95 5.08
  (3,2,1,1,3,4) 22;
- Nitrogen, organic bound [emissions to water, river]: 6.9834e-5 kg; lognormal SD95 10
  (,,,,,) ; reported values
- Nickel [emissions to air, low. pop.]: 1.0566e-5 kg; lognormal SD95 1.59
  (3,2,1,1,3,4) 31;
- Cadmium [emissions to water, river]: 4.2265e-9 kg; lognormal SD95 10
  (,,,,,) ; reported values
- Tin [emissions to air, low. pop.]: 2.1861e-6 kg; lognormal SD95 5.08
  (3,2,1,1,3,4,22)
- Zinc [emissions to water, river]: 1.2631e-6 kg; lognormal SD95 10
  (,,,,,) ; reported values
- Arsenic [emissions to air, low. pop.]: 1.9553e-6 kg; lognormal SD95 5.08
  (3,2,1,1,3,4) 22;
- Cobalt [emissions to air, low. pop.]: 1.008e-5 kg; lognormal SD95 5.08
  (3,2,1,1,3,4) 22;
- Mercury [emissions to water, river]: 1.3551e-9 kg; lognormal SD95 10
  (,,,,,) ; reported values
- Copper [emissions to air, low. pop.]: 1.3481e-5 kg; lognormal SD95 5.08
  (3,2,1,1,3,4) 22;
- Cyanide [emissions to water, river]: 2.1132e-5 kg; lognormal SD95 3.84
  (4,2,2,3,4,4,33); including stdev of sodium cyanide
- Iron [emissions to water, river]: 8.9266e-7 kg; lognormal SD95 10
  (,,,,,) ; reported values
- Selenium [emissions to air, low. pop.]: 1.1113e-10 kg; lognormal SD95 1.59
  (3,2,1,1,3,4,31)
- Suspended solids, unspecified [emissions to water, river]: 1.5849e-5 kg; lognormal SD95 10
  (,,,,,) ; reported values
- Dioxin, 2,3,7,8 Tetrachlorodibenzo-p- [emissions to air, low. pop.]: 3.3459e-12 kg; lognormal SD95 3.07
  (3,2,1,1,3,4,21)
- Lead [emissions to air, low. pop.]: 1.0445e-5 kg; lognormal SD95 5.08
  (3,2,1,1,3,4) 22;
- Chromium [emissions to air, low. pop.]: 2.2286e-7 kg; lognormal SD95 1.59
  (3,2,1,1,3,4,31)
- Nickel [emissions to water, river]: 2.5232e-7 kg; lognormal SD95 10
  (,,,,,) ; reported values
- Water [emissions to water, unspecified]: 54.054, 0.688626 kg (2 entries); lognormal SD95 2.5196
  (5,5,5,5,5,BU:1.05); All uncertainty-values set to 5.0 by default. Balance of input water

## Sampling procedure
Literature

## Extrapolations
see Geography and Technology

## Sources
- Classen M., Althaus H.-J., Blaser S., Scharnhorst W., Tuchschmid M., Jungbluth N., Faist Emmenegger M., 2009, 2009 - LCI metals - Classen, Final report ecoinvent data v2.1, 10, Swiss Centre for LCI, Empa, ESU-services Ltd., Duebendorf, CH
Classen M., Althaus H.-J., Blaser S., Doka G., Jungbluth N., Tuchschmid M. (2008) Life Cycle Inventories of Metals. Final report ecoinvent data v2.1. Volume: 10. Issue: 0. Swiss Centre for LCI, Empa - TSL. Dübendorf, CH.
Type: Measurement on site
Source: CD-ROM
First author: Classen M.
Other authors: Althaus H.-J., Blaser S., Doka G., Jungbluth N., Tuchschmid M.
Year: 2008
Title of anthology: Final report ecoinvent data v2.1
Place of publication: Dübendorf, CH
Publisher: Swiss Centre for LCI, Empa - TSL
Volume No: 10
Issue No: 0

## Validation
Proof reading validation: passed; Other validation: none;
