# Plastics bucket 18 l incl. transport packaging, at plant

Dataset: EcoSpold 1, unit process
Functional unit: 1 p
Category: construction materials / plaster
Geography: RER
Time period: 2000-01 to 2016-12
Generated by: Daniel Savi
accessRestrictedTo: 0
copyright: true

## General comment
Kunststoff-Eimer 18 l inkl. Transportverpackung
Herstellung des KS-Eimers, inkl. Transportpaletten für den Transport der gefüllten KS-Eimer zum Kunden.
Version: 0.0

Local category: construction materials
Local subcategory: Putze

## Reference product
- Plastics bucket 18 l incl. transport packaging, at plant [RER]: 1 p
  Europe

## Inputs from technosphere
- Compressed air, average installation, <30kW, 8 bar gauge, at supply network [RER]: 0.0437 m3; lognormal SD95 1.10306
- EUR-flat pallet [RER]: 0.000833 p; lognormal SD95 1.12487
  (3;3;1;1;1)
- Disposal, polyethylene, 0.4% water, to municipal incineration [CH]: 0.0163 kg; lognormal SD95 1.10306
- Treatment, sewage, to wastewater treatment, class 3 [CH]: 3.35e-5 m3; lognormal SD95 1.50967
  (5;2;1;2;2)
- Steel, low-alloyed, at plant [RER]: 0.05 kg; lognormal SD95 1.10306
- Transport, freight, lorry, 32t-40t gross weight, fleet average [RER]: 0.332 tkm; lognormal SD95 2.01043
- Transport, transoceanic freight ship [OCE]: 0.335 tkm; lognormal SD95 2.01043
  (2;3;1;2;2)
- Tap water, at user [RER]: 0.0335 kg; lognormal SD95 1.10306
- Transport, freight, rail [RER]: 0.083 tkm; lognormal SD95 2.01043
- Disposal, polypropylene, 15.9% water, to municipal incineration [CH]: 0.0012 kg; lognormal SD95 1.10306
- Sheet rolling, steel [RER]: 0.05 kg; lognormal SD95 1.10306
- Polyethylene, HDPE, granulate, at plant [RER]: 0.5611 kg; lognormal SD95 1.10306
  (2;3;1;2;2)
- Polypropylene, granulate, at plant [RER]: 0.0834 kg; lognormal SD95 1.10306
- Packaging film, LDPE, at plant [RER]: 0.000181 kg; lognormal SD95 1.12487
  (3;3;1;1;1)

## Sources
- Kasser U., R. Frischknecht, M. Klingler, D. Savi, R. Itten, F. Wyss,P. Stolz, L. Tschuemperlin, 2016, 2016 - Renewal and exp. of LCA data in KBOB - Kasser, -, Buero fuer Umweltchemie, treeze Ltd., Zuerich and Uster, CH
U. Kasser, R. Frischknecht, M. Klingler, D. Savi, R. Itten, F. Wyss,P. Stolz, L. Tschümperlin 2016 (2015Z) Erneuerung und Erweiterung der Ökobilanzdaten in der KBOB-Liste "Ökobilanzdaten im Baubereich", Projekt QualiBOB. unknown.

First author: U. Kasser, R. Frischknecht, M. Klingler, D. Savi, R. Itten, F. Wyss,P. Stolz, L. Tschümperlin 2016
Year: 2015Z
Place of publication: unknown
Original title: Erneuerung und Erweiterung der Ökobilanzdaten in der KBOB-Liste "Ökobilanzdaten im Baubereich", Projekt QualiBOB
