# Cable car, for passenger transport

Dataset: EcoSpold 1, unit process, infrastructure
Functional unit: 1 p
Category: transport systems / cable car
Geography: CH
Time period: 2009-01 to 2015-12
Production volume: 12
Share of production covered: 100 %
Generated by: Annika Messmer
accessRestrictedTo: 0
copyright: true

## General comment
No specific data was avaiable therefore the cable car cabine was aproximated with the production of a regional train.;

## Included processes
Included is the production of one single cable car cabine (total weight of the cabins 2.8t) of an average cable car with a capacity of 35 persons.

## Geography
Switzerland

## Technology
Average technology

## Time period
Time of publications

## Reference product
- Cable car, for passenger transport [CH]: 1 p
  SWITZERLAND

## Inputs from technosphere
- Transport, freight, lorry, 16t-32t gross weight, fleet average [CH]: 129.51, 22.201 tkm (2 entries); lognormal SD95 2.5169
  (5,4,1,3,4,5,BU:2); ; ecoinvent 2.2
- Aluminium, production mix, at plant [RER]: 168.19 kg; lognormal SD95 1.8431
  (5,4,1,3,4,5,BU:1.05); ; ecoinvent 2.2
- Heat, light fuel oil, at industrial furnace 1MW [CH]: 3027.4 MJ; lognormal SD95 1.8431
  (5,4,1,3,4,5,BU:1.05); ; ecoinvent 2.2
- Polyethylene, HDPE, granulate, at plant [RER]: 218.65 kg; lognormal SD95 1.8431
  (5,4,1,3,4,5,BU:1.05); ; ecoinvent 2.2
- Copper, at regional storage [RER]: 117.73 kg; lognormal SD95 1.8431
  (5,4,1,3,4,5,BU:1.05); ; ecoinvent 2.2
- Electricity, medium voltage, at grid [CH]: 2152.8 kWh; lognormal SD95 1.8431
  (5,4,1,3,4,5,BU:1.05); ; ecoinvent 2.2
- Lead, at regional storage [RER]: 24.387 kg; lognormal SD95 1.8431
  (5,4,1,3,4,5,BU:1.05); ; ecoinvent 2.2
- Transport, freight, rail, electricity with shunting [CH]: 518.02 tkm; lognormal SD95 2.5169
  (5,4,1,3,4,5,BU:2); ; ecoinvent 2.2
- Disposal, plastics, mixture, 15.3% water, to sanitary landfill [CH]: 218.65 kg; lognormal SD95 1.8431
  (5,4,1,3,4,5,BU:1.05); ; ecoinvent 2.2
- Reinforcing steel, at plant [RER]: 1917.4 kg; lognormal SD95 1.8431
  (5,4,1,3,4,5,BU:1.05); approximated with data on manufacturing and maintenance of a regional train; ecoinvent 2.2
- Flat glass, uncoated, at plant [RER]: 121.6 kg; lognormal SD95 1.8431
  (5,4,1,3,4,5,BU:1.05); ; ecoinvent 2.2
- Disposal, emulsion paint, 0% water, to municipal incineration [CH]: 0.093682 kg; lognormal SD95 1.8431
  (5,4,1,3,4,5,BU:1.05); ; ecoinvent 2.2
- Disposal, wood untreated, 20% water, to municipal incineration [CH]: 104.28 kg; lognormal SD95 1.8431
  (5,4,1,3,4,5,BU:1.05); ; ecoinvent 2.2
- Glued laminated timber, average glue mix, at plant [RER]: 0.14582 m3; lognormal SD95 1.8431
  (5,4,1,3,4,5,BU:1.05); ; ecoinvent 2.2
- Alkyd paint, white, 60% in solvent, at plant [RER]: 21.528 kg; lognormal SD95 1.8431
  (5,4,1,3,4,5,BU:1.05); ; ecoinvent 2.2
- Disposal, glass, 0% water, to municipal incineration [CH]: 121.6 kg; lognormal SD95 1.8431
  (5,4,1,3,4,5,BU:1.05); ; ecoinvent 2.2
- Rock wool, packed, at plant [CH]: 21.528 kg; lognormal SD95 1.8431
  (5,4,1,3,4,5,BU:1.05); ; ecoinvent 2.2

## Emissions to nature
- Heat, waste [emissions to air, unspecified]: 7770.4 MJ; lognormal SD95 1.8431
  (5,4,1,3,4,5,BU:1.05); ; ecoinvent 2.2

## Sampling procedure
Approximation with the production of a regional train

## Extrapolations
Some generic datasets from ecoinvent have been used.

## Sources
- Messmer A., Frischknecht R., 2016, 2016 - LCI air transport services - Messmer, Project report, 544, treeze Ltd., Uster, CH
Messmer A., Frischknecht R. (2015) Life cycle inventories of air transport services. Project report. Volume: 544. treeze Ltd.. Uster, CH.
Type: Separate publication
Source: Report
First author: Messmer A.
Other authors: Frischknecht R.
Year: 2015
Title of anthology: Project report
Place of publication: Uster, CH
Publisher: treeze Ltd.
Volume No: 544

## Validation
Proof reading validation: 08.11.2016; Other validation: G:\Projekte laufend\544 Aktualisierung mobitool\Seilbahntransport\Ecospold\[544_Seilbahn_EIV2_v0.3.xlsx]X-Process;
