# Heavy fuel oil, burned in refinery furnace

Dataset: EcoSpold 1, unit process
Functional unit: 1 MJ
Category: heat / oil\heating systems
Geography: RER
Time period: 1980-01 to 2000-12
Share of production covered: 5 %
Generated by: Niels Jungbluth
accessRestrictedTo: 0
copyright: true

## General comment
Description of the direct emissions due to the combustion of fuel in refinery furnaces and generators not including the infrastructure of the furnace.;
Synonyms: Schweröl, HFO;

## Included processes
Consumption of heavy fuel oil and combustion emissions.

## Geography
Data for single European plants.

## Technology
Average technology in use. There might be large differences for single plants due to the technology used for the flue gas treatment.

## Time period
European data for regulated emissions CO2, NOx, SOx, Ni and V have been provided by some refineries. They have been compared and discussed with older literature data. Literature data have been used for other emissions.

## Reference product
- Heavy fuel oil, burned in refinery furnace [RER]: 1 MJ
  Europe

## Inputs from technosphere
- Heavy fuel oil, at refinery [RER]: 0.024272 kg; lognormal SD95 1.05
  (1,1,1,1,1,1); Product properties
- Industrial furnace 1MW, oil [CH]: 2.7778e-9 p; lognormal SD95 3
  (1,1,1,1,1,1); Estimation 5000h use per year
- Chimney [CH]: 3.4722e-8 m; lognormal SD95 3
  (1,1,1,1,1,1); Calculated

## Emissions to nature
- Chromium VI [emissions to air, high. pop.]: 2.4272e-10 kg; lognormal SD95 1.5542
  (3,4,5,3,1,4); Literature data
- Heat, waste [emissions to water, river]: 0.26517 MJ; lognormal SD95 1.1376
  (3,3,1,3,1,3); Literature data, 25% of waste heat to cooling water
- Particulates, > 2.5 um, and < 10um [emissions to air, high. pop.]: 1.5e-6 kg; lognormal SD95 1.1672
  (2,4,2,2,1,4); Literature data
- Zinc [emissions to air, high. pop.]: 4.93e-8 kg; lognormal SD95 1.1882
  (3,4,1,2,1,4); Literature data
- Hydrogen fluoride [emissions to air, high. pop.]: 2.1845e-7 kg; lognormal SD95 1.5542
  (3,4,5,3,1,4); Literature data
- PAH, polycyclic aromatic hydrocarbons [emissions to air, high. pop.]: 3.67e-12 kg; lognormal SD95 3.0374
  (3,4,1,2,1,4); Literature data
- Lead [emissions to air, high. pop.]: 4.56e-9 kg; lognormal SD95 3.0374
  (3,4,1,2,1,4); Literature data
- Cobalt [emissions to air, high. pop.]: 4.8544e-8 kg; lognormal SD95 5.3017
  (3,4,5,3,1,4); Literature data
- Calcium [emissions to air, high. pop.]: 1.699e-7 kg; lognormal SD95 5.0949
  (3,4,4,3,1,4); Literature data
- Selenium [emissions to air, high. pop.]: 1.9417e-8 kg; lognormal SD95 5.0949
  (3,4,4,3,1,4); Literature data
- Chromium [emissions to air, high. pop.]: 1.48e-8 kg; lognormal SD95 1.1882
  (3,4,1,2,1,4); Literature data
- Hydrogen chloride [emissions to air, high. pop.]: 2.1845e-6 kg; lognormal SD95 1.8167
  (3,4,5,3,1,4); Literature data
- Particulates, > 10 um [emissions to air, high. pop.]: 3e-6 kg; lognormal SD95 1.5391
  (2,4,2,2,1,4); Literature data
- Heat, waste [emissions to air, high. pop.]: 0.79551 MJ; lognormal SD95 1.1249
  (3,1,1,1,1,3); Product properties, 75% of waste heat to air
- Copper [emissions to air, high. pop.]: 1.19e-8 kg; lognormal SD95 1.1882
  (3,4,1,2,1,4); Literature data
- Carbon monoxide, fossil [emissions to air, high. pop.]: 6e-6 kg; lognormal SD95 5.0141
  (3,na,1,na,1,na); Literature data
- Mercury [emissions to air, high. pop.]: 1.4563e-10 kg; lognormal SD95 1.5542
  (3,4,5,3,1,4); Literature data
- Particulates, < 2.5 um [emissions to air, high. pop.]: 1.05e-5 kg; lognormal SD95 1.1672
  (2,4,2,2,1,4); Literature data
- Dinitrogen monoxide [emissions to air, high. pop.]: 1.6e-6 kg; lognormal SD95 1.5494
  (3,4,1,2,1,4); Swiss greenhouse gas inventory
- Cadmium [emissions to air, high. pop.]: 1.2e-9 kg; lognormal SD95 3.0374
  (3,4,1,2,1,4); Literature data
- Nitrogen oxides [emissions to air, high. pop.]: 0.00011 kg; lognormal SD95 3.0374
  (3,4,1,2,1,4); Literature data
- Benzene [emissions to air, high. pop.]: 6.47e-10 kg; lognormal SD95 3.0374
  (3,4,1,2,1,4); Literature data
- Vanadium [emissions to air, high. pop.]: 8.5857e-7 kg; lognormal SD95 1.286
  (3,4,4,3,1,4); Literature data
- NMVOC, non-methane volatile organic compounds, unspecified origin [emissions to air, high. pop.]: 8.45e-7 kg; lognormal SD95 1.5494
  (3,4,1,2,1,4); Literature data
- Iron [emissions to air, high. pop.]: 2.4272e-7 kg; lognormal SD95 5.3017
  (3,4,5,3,1,4); Literature data
- Sodium [emissions to air, high. pop.]: 1.1165e-6 kg; lognormal SD95 5.0949
  (3,4,4,3,1,4); Literature data
- Dioxin, 2,3,7,8 Tetrachlorodibenzo-p- [emissions to air, high. pop.]: 1.24e-15 kg; lognormal SD95 3.0374
  (3,4,1,2,1,4); Literature data
- Nickel [emissions to air, high. pop.]: 7.73e-7 kg; lognormal SD95 5.0076
  (1,3,1,2,1,3); Emission factor published by CONCAWE
- Sulfur dioxide [emissions to air, high. pop.]: 0.00072816 kg; lognormal SD95 1.1892
  (3,4,1,3,1,4); Literature data
- Arsenic [emissions to air, high. pop.]: 3.98e-9 kg; lognormal SD95 1.1882
  (3,4,1,2,1,4); Literature data
- Carbon dioxide, fossil [emissions to air, high. pop.]: 0.076982 kg; lognormal SD95 1.113
  (3,1,1,1,1,1); Product properties
- Molybdenum [emissions to air, high. pop.]: 2.4272e-8 kg; lognormal SD95 5.3017
  (3,4,5,3,1,4); Literature data
- Methane, fossil [emissions to air, high. pop.]: 3.02e-6 kg; lognormal SD95 3.0374
  (3,4,1,2,1,4); Swiss greenhouse gas inventory

## Sampling procedure
Environmental reports, public statistics and literature data.

## Extrapolations
From single plants to average situation.

## Sources
- Jungbluth N., Meili C., Wenzel P., 2018, 2018 - LCI oil refinery processing and products - Jungbluth, Project report, 565, ESU-services Ltd., Schaffhausen, CH
Jungbluth N., Meili C., Wenzel P. (2018) Life cycle inventories of oil refinery processing and products. Project report. Volume: 565. ESU-services Ltd.. Schaffhausen, CH.
Type: Separate publication
Source: Report
First author: Jungbluth N.
Other authors: Meili C., Wenzel P.
Year: 2018
Title of anthology: Project report
Place of publication: Schaffhausen, CH
Publisher: ESU-services Ltd.
Volume No: 565

## Validation
Proof reading validation: 08.11.2018; Other validation: C:\Users;
