# Exhaust air system for kitchen and bathroom in appartment buildings

Dataset: EcoSpold 1, unit process
Functional unit: 1 m2
Category: ventilation / ventilation systems
Geography: CH
Time period: 1994-01 to 2008-12
Generated by: Alex Primas
accessRestrictedTo: 0
copyright: true

## General comment
Production of a exhaust air system for kitchen and bathroom in appartment buildings. The reference value of the inventory is 1 m2 heated gross floor area. The inventory is based on a study of one large appartment building with a heated gross floor area of 30800 m2.The inventory includes materials needed for fans, ducts, insulations and silencers. The data represents ductwork mainly made of galvanized steel. It includes duct fans and radial fans without heat recovery and a nominal air flow rate of 100-5700 m3/h per unit.;

## Included processes
Materials used for the production. Energy use for the production and processing of the raw materials. No infrastructure of the production site and no transports of raw materials included.

## Geography
Data sources from one building in Switzerland. Process applicable in central European conditions.

## Technology
Typical technology, materials and components used for ventilation systems in appartment buildings

## Time period
Amount of material investigated in 1998. Process information partly from 1998 to 2008

## Reference product
- Exhaust air system for kitchen and bathroom in appartment buildings [CH]: 1 m2
  SWITZERLAND

## Inputs from technosphere
All rows: lognormal SD95 1.24
- Vermiculite, at mine [ZA]: 0.0077386 kg
  (2,4,2,1,1,5); Data for average system considered
- Zinc coating, coils [RER]: 0.27393 m2
  (2,4,2,1,1,5); Data for average system considered
- Copper, at regional storage [RER]: 0.00010714 kg
  (2,4,2,1,1,5); Data for average system considered
- Sheet rolling, copper [RER]: 0.00010714 kg
  (2,4,2,1,1,5); Data for average system considered
- Reinforcing steel, at plant [RER]: 0.93479 kg
  (2,4,2,1,1,5); Data for average system considered
- Rock wool, at plant [CH]: 0.15861 kg
  (2,4,2,1,1,5); Data for average system considered
- Sheet rolling, aluminium [RER]: 0.021393 kg
  (2,4,2,1,1,5); Data for average system considered
- Polyethylene, HDPE, granulate, at plant [RER]: 0.040977 kg
  (2,4,2,1,1,5); Data for average system considered
- Aluminium, production mix, at plant [RER]: 0.021393 kg
  (2,4,2,1,1,5); Data for average system considered
- Extrusion, plastic pipes [RER]: 0.040977 kg
  (2,4,2,1,1,5); Data for average system considered
- Sheet rolling, steel [RER]: 0.93479 kg
  (2,4,2,1,1,5); Data for average system considered

## Sampling procedure
Data from one specific building from literature and assumptions

## Sources
- Primas A., 2008, 2008 - LCA building tech. inst. SIA 2032 - Primas, Schlussbericht, B&H AG, Zuerich, CH
Primas A. (2008) Ökologische Bewertung von Gebäudetechnikanlagen für SIA 2032. Schlussbericht. Amt für Hochbauten der Stadt Zürich. Zürich.
Type: Separate publication
Source: Report
First author: Primas A.
Year: 2008
Title of anthology: Schlussbericht
Place of publication: Zürich
Publisher: Amt für Hochbauten der Stadt Zürich
