# Canning of legumes

Dataset: EcoSpold 1, unit process
Functional unit: 1 kg
Category: food industry / processing
Geography: CH
Time period: 2014-01 to 2020-12
Generated by: Melina Glimmann
accessRestrictedTo: 0
copyright: true

## General comment
The inventory applies to the canning of 1kg of legumes.

## Geography
The inventory is modelled for Switzerland

## Reference product
- Canning of legumes [CH]: 1 kg

## Inputs from technosphere
- Tap water, at user [CH]: 1.2 kg; lognormal SD95 1.24941
  (2,3,3,2,1,5,BU:1.05); ;
- Chemical plant, organics [RER]: 1e-10 p; lognormal SD95 3.0645
  (2,3,3,2,1,5,BU:3); ;
- Electricity, low voltage, at grid [CH]: 0.70833 kWh; lognormal SD95 1.24941
  (2,3,3,2,1,5,BU:1.05); ;

## Sources
- Kaegi T., Glimmann M., Conte F., Roberts G., 2021, 2021 - LCA tomatoes and green beans production - Kaegi, Carbotech on behalf of BAFU, nan, Carbotech AG, Zuerich, CH

## Validation
15.12.2021 \\tsclient\Schreibtisch\WinShare\BAFU Gemuese\2021-12-15\[EcoSpold_Bafu_Gemuese_Canning of beans CH v1.xlsx]X-Process
