# Bagasse, from sweet sorghum, at distillery

Dataset: EcoSpold 1, unit process
Functional unit: 1 kg
Category: fuels / biofuels\ethanol\byproducts
Geography: CN
Time period: 2000-01 to 2000-12
Production volume: Production volume of ethanol for use as a fuel was 1'500 Ml in 2004 in CN
Share of production covered: 0 %
Generated by: Edgard Gnansounou
accessRestrictedTo: 0
copyright: true

## General comment
Inventory refers to the production of 1 kg of hydrated ethanol 95% (dry basis, i.e. 1.05 kg hydrated ethanol 95% wet basis), respectively 1 kg of excess bagasse (70% dry matter), 1 kWh of electricity and 1 kg of vinasse. The multioutput-process 'sweet sorghum, in ethanol distillery' delivers the co-products 'ethanol, 95% in H2O, from sweet sorghum, at distillery', 'bagasse, from sweet sorghum, at distillery', 'electricity, bagasse, sorghum, at distillery' and 'vinasse, from sweet sorghum, at distillery'. Economic allocation with allocation factor for common stages of 91% to ethanol. Allocation according to carbon balance for CO2.;

## Included processes
This dataset includes the transport of sorghum to the distillery and the processing of sorghum to ethanol (95% w/w), bagasse (70% dry matter, excess), excess electricity and vinasse from ethanol production. System boundary is at the ethanol distillery. Treatment of waste effluents is not included (most wastewater is spread over the fields nearby).

## Geography
Data is from the etha+ project (Alcosuisse, CH) and the ASIATIC project (LASEN, CH), adapted to CN context

## Technology
Juice extraction is performed through milling (not diffusion). The juice is then converted to ethanol by standard fermentation and distillation techniques. Energy supply is done by combustion of the bagasse resulting from the extraction stage. The main product is ethanol.

## Time period
Data from 1992 to 2005, current technology

## Reference product
- Bagasse, from sweet sorghum, at distillery [CN]: 1 kg
  CHINA

## Inputs from technosphere
- Ethanol fermentation plant [CH]: 3.5351e-12 p; lognormal SD95 3.0616
  (2,4,1,3,1,5); Calculation, according to feed capacity and lifetime of the plant
- Water, decarbonised, at plant [RER]: 0.00018748 kg; lognormal SD95 1.3451
  (4,4,2,5,1,5); Adapted from the dataset 'wood chips, in cogen 6400kWth, wood', according to actual water, carbon and energy content of the fuel (pressed sorghum bagasse)
- Tap water, at user [RER]: 0.14836 kg; lognormal SD95 1.05
  (1,1,1,1,1,1); Literature survey, industrial data
- Ammonia, liquid, at regional storehouse [RER]: 1.9534e-9 kg; lognormal SD95 1.3451
  (same comment as for Water, decarbonised, at plant)
- Sodium chloride, powder, at plant [RER]: 9.7666e-7 kg; lognormal SD95 1.3451
  (same comment as for Water, decarbonised, at plant)
- Disposal, wood ash mixture, pure, 0% water, to sanitary landfill [CH]: 6.3126e-5 kg; lognormal SD95 1.3451
  (same comment as for Water, decarbonised, at plant)
- Cogen unit 6400kWth, wood burning, common components for heat+electricity [CH]: 2.2987e-10 p; lognormal SD95 3.117
  (same comment as for Water, decarbonised, at plant)
- Cogen unit 6400kWth, wood burning, building [CH]: 5.7408e-11 p; lognormal SD95 3.117
  (same comment as for Water, decarbonised, at plant)
- Disposal, municipal solid waste, 22.9% water, to municipal incineration [CH]: 7.8132e-7 kg; lognormal SD95 1.3451
  (same comment as for Water, decarbonised, at plant)
- Transport, freight, lorry, 7.5t-16t gross weight, fleet average [RER]: 0.0001872 tkm; lognormal SD95 2.077
  (2,4,1,5,1,5); Industrial data, for sweet sorghum delivery to sugar mill/ethanol plant; includes delivery of raw materials according to ecoinvent guidelines, adapted to Chinese conditions
- Chlorine, liquid, production mix, at plant [RER]: 7.8132e-8 kg; lognormal SD95 1.3451
  (same comment as for Water, decarbonised, at plant)
- Lubricating oil, at plant [RER]: 3.1887e-6 kg; lognormal SD95 1.3279
  (2,4,1,2,3,5); Compilation of data from sugarcane and sorghum milling, industrial data
- Treatment, sewage, to wastewater treatment, class 2 [CH]: 1.8748e-7 m3; lognormal SD95 1.3451
  (same comment as for Water, decarbonised, at plant)
- Sweet sorghum stem, at farm [CN]: 0.1799 kg; lognormal SD95 1.0882
  (2,1,1,1,1,3); Average ethanol yields in China, literature survey
- Cogen unit 6400kWth, wood burning, components for electricity only [CH]: 2.2987e-10 p; lognormal SD95 3.117
  (same comment as for Water, decarbonised, at plant)
- Disposal, used mineral oil, 10% water, to hazardous waste incineration [CH]: 7.8132e-7 kg; lognormal SD95 1.3451
  (same comment as for Water, decarbonised, at plant)
- Chemicals organic, at plant [GLO]: 1.3673e-6 kg; lognormal SD95 1.3451
  (same comment as for Water, decarbonised, at plant)
- Disposal, wood ash mixture, pure, 0% water, to landfarming [CH]: 3.1444e-5 kg; lognormal SD95 1.3451
  (same comment as for Water, decarbonised, at plant)
- Transport, freight, lorry, fleet average [RER]: 0.0026383 tkm; lognormal SD95 2.077
  (same comment as for Transport, freight, lorry, 7.5t-16t gross weight, fleet average)
- Disposal, wood ash mixture, pure, 0% water, to municipal incineration [CH]: 3.1444e-5 kg; lognormal SD95 1.3451
  (same comment as for Water, decarbonised, at plant)

## Inputs from nature
- Carbon dioxide, in air [resources, in air]: 1.06437 kg; lognormal SD95 1.05
  (1,1,1,1,1,1); Calculation, to close carbon balance

## Emissions to nature
- Bromine [emissions to air, high. pop.]: 1.4293e-8 kg; lognormal SD95 5.1335
  (same comment as for Water, decarbonised, at plant)
- NMVOC, non-methane volatile organic compounds, unspecified origin [emissions to air, high. pop.]: 1.3031e-7 kg; lognormal SD95 1.6486
  (same comment as for Water, decarbonised, at plant)
- Arsenic [emissions to air, high. pop.]: 2.3822e-10 kg; lognormal SD95 5.1335
  (same comment as for Water, decarbonised, at plant)
- Sodium [emissions to air, high. pop.]: 3.0967e-7 kg; lognormal SD95 5.1335
  (same comment as for Water, decarbonised, at plant)
- m-Xylene [emissions to air, high. pop.]: 2.5634e-8 kg; lognormal SD95 1.6486
  (same comment as for Water, decarbonised, at plant)
- Calcium [emissions to air, high. pop.]: 1.3935e-6 kg; lognormal SD95 5.1335
  (same comment as for Water, decarbonised, at plant)
- Nitrogen oxides [emissions to air, high. pop.]: 2.0962e-5 kg; lognormal SD95 1.6486
  (same comment as for Water, decarbonised, at plant)
- Benzene, ethyl- [emissions to air, high. pop.]: 6.4085e-9 kg; lognormal SD95 1.6486
  (same comment as for Water, decarbonised, at plant)
- Dinitrogen monoxide [emissions to air, high. pop.]: 5.4789e-7 kg; lognormal SD95 1.6486
  (same comment as for Water, decarbonised, at plant)
- Sulfur dioxide [emissions to air, high. pop.]: 5.9315e-7 kg; lognormal SD95 1.3451
  (same comment as for Water, decarbonised, at plant)
- Ammonia [emissions to air, high. pop.]: 4.1449e-7 kg; lognormal SD95 1.4115
  (same comment as for Water, decarbonised, at plant)
- Magnesium [emissions to air, high. pop.]: 8.5994e-8 kg; lognormal SD95 5.1335
  (same comment as for Water, decarbonised, at plant)
- Fluorine [emissions to air, high. pop.]: 1.191e-8 kg; lognormal SD95 1.6486
  (same comment as for Water, decarbonised, at plant)
- Chromium [emissions to air, high. pop.]: 9.4331e-10 kg; lognormal SD95 5.1335
  (same comment as for Water, decarbonised, at plant)
- Carbon monoxide, biogenic [emissions to air, high. pop.]: 1.4953e-6 kg; lognormal SD95 5.1335
  (same comment as for Water, decarbonised, at plant)
- Methane, biogenic [emissions to air, high. pop.]: 9.271e-8 kg; lognormal SD95 1.6486
  (same comment as for Water, decarbonised, at plant)
- Benzene [emissions to air, high. pop.]: 1.944e-7 kg; lognormal SD95 1.6486
  (same comment as for Water, decarbonised, at plant)
- Zinc [emissions to air, high. pop.]: 7.1463e-8 kg; lognormal SD95 5.1335
  (same comment as for Water, decarbonised, at plant)
- Benzo(a)pyrene [emissions to air, high. pop.]: 1.0681e-10 kg; lognormal SD95 3.117
  (same comment as for Water, decarbonised, at plant)
- Heat, waste [emissions to air, high. pop.]: 0.093369 MJ; lognormal SD95 1.3117
  (2,3,1,1,3,5); ecoinvent guidelines, calculation from electricity consumption and energy balance
- Chromium VI [emissions to air, high. pop.]: 9.5285e-12 kg; lognormal SD95 5.1335
  (same comment as for Water, decarbonised, at plant)
- Phosphorus [emissions to air, high. pop.]: 7.1463e-8 kg; lognormal SD95 1.6486
  (same comment as for Water, decarbonised, at plant)
- Benzene, hexachloro- [emissions to air, high. pop.]: 1.538e-15 kg; lognormal SD95 3.117
  (same comment as for Water, decarbonised, at plant)
- Copper [emissions to air, high. pop.]: 5.2406e-9 kg; lognormal SD95 5.1335
  (same comment as for Water, decarbonised, at plant)
- Cadmium [emissions to air, high. pop.]: 1.6674e-10 kg; lognormal SD95 5.1335
  (same comment as for Water, decarbonised, at plant)
- Phenol, pentachloro- [emissions to air, high. pop.]: 1.7303e-12 kg; lognormal SD95 1.6486
  (same comment as for Water, decarbonised, at plant)
- Potassium [emissions to air, high. pop.]: 5.574e-6 kg; lognormal SD95 5.1335
  (same comment as for Water, decarbonised, at plant)
- Dioxin, 2,3,7,8 Tetrachlorodibenzo-p- [emissions to air, high. pop.]: 6.622e-15 kg; lognormal SD95 3.117
  (same comment as for Water, decarbonised, at plant)
- Hydrocarbons, aliphatic, alkanes, unspecified [emissions to air, high. pop.]: 1.944e-7 kg; lognormal SD95 1.6486
  (same comment as for Water, decarbonised, at plant)
- PAH, polycyclic aromatic hydrocarbons [emissions to air, high. pop.]: 2.3498e-9 kg; lognormal SD95 3.117
  (same comment as for Water, decarbonised, at plant)
- Lead [emissions to air, high. pop.]: 5.9315e-9 kg; lognormal SD95 5.1335
  (same comment as for Water, decarbonised, at plant)
- Nickel [emissions to air, high. pop.]: 1.4293e-9 kg; lognormal SD95 5.1335
  (same comment as for Water, decarbonised, at plant)
- Acetaldehyde [emissions to air, high. pop.]: 1.4531e-8 kg; lognormal SD95 1.6486
  (same comment as for Water, decarbonised, at plant)
- Manganese [emissions to air, high. pop.]: 4.0734e-8 kg; lognormal SD95 5.1335
  (same comment as for Water, decarbonised, at plant)
- Particulates, < 2.5 um [emissions to air, high. pop.]: 9.5914e-6 kg; lognormal SD95 3.117
  (same comment as for Water, decarbonised, at plant)
- Formaldehyde [emissions to air, high. pop.]: 2.7771e-8 kg; lognormal SD95 1.6486
  (same comment as for Water, decarbonised, at plant)
- Hydrocarbons, aliphatic, unsaturated [emissions to air, high. pop.]: 6.6221e-7 kg; lognormal SD95 1.6486
  (same comment as for Water, decarbonised, at plant)
- Mercury [emissions to air, high. pop.]: 7.1463e-11 kg; lognormal SD95 5.1335
  (same comment as for Water, decarbonised, at plant)
- Toluene [emissions to air, high. pop.]: 6.4085e-8 kg; lognormal SD95 1.6486
  (same comment as for Water, decarbonised, at plant)
- Chlorine [emissions to air, high. pop.]: 4.2877e-8 kg; lognormal SD95 1.6486
  (same comment as for Water, decarbonised, at plant)

## Sampling procedure
Data is from the etha+ project (Alcosuisse, CH) and the ASIATIC project (LASEN, CH), technology by French ethanol plant supplier, modelling by ENERS (CH)

## Extrapolations
Direct emissions (resulting from the combustion of sorghum bagasse) are based on the the combustion of wood chips (without emission control), according to the corresponding dry matter content, carbon content and energy content.

## Sources
- Jungbluth N., Chudacoff M., Dauriat A., Dinkel F., Doka G., Faist Emmenegger M., Gnansounou E., Kljun N., Spielmann M., Stettler C., Sutter J., 2007, 2007 - LCI bioenergy - Jungbluth, Final report ecoinvent data v2.0, 17, Swiss Centre for LCI, ESU-services Ltd., Duebendorf and Uster, CH
Jungbluth N., Chudacoff M., Dauriat A., Dinkel F., Doka G., Faist Emmenegger M., Gnansounou E., Kljun N., Spielmann M., Stettler C., Sutter J. (2007) Life Cycle Inventories of Bioenergy. Final report ecoinvent data v2.0. Volume: 17. Swiss Centre for LCI, ESU. Duebendorf and Uster, CH.
Type: Measurement on site
Source: CD-ROM
First author: Jungbluth N.
Other authors: Chudacoff M., Dauriat A., Dinkel F., Doka G., Faist Emmenegger M., Gnansounou E., Kljun N., Spielmann M., Stettler C., Sutter J.
Year: 2007
Title of anthology: Final report ecoinvent data v2.0
Place of publication: Duebendorf and Uster, CH
Publisher: Swiss Centre for LCI, ESU
Volume No: 17

## Validation
Proof reading validation: Passed.; Other validation: none;
