# Zinc monosulphate, ZnSO4.H2O, at plant

Dataset: EcoSpold 1, unit process
Functional unit: 1 kg
Category: chemicals / inorganic
Geography: RER
Time period: 2004-01 to 2004-12
Generated by: Roland Hischier
accessRestrictedTo: 0
copyright: true

## General comment
The functional unit represent 1 kg of solid zinc monosulphate powder. Large uncertainty of the process data due to weak data on the production process and missing data on process emissions.;
CAS number: 007446-19-7;
Formula: ZnSO4.H2O;
Synonyms: zinc sulphate monohydrate;

## Included processes
Raw materials and chemicals used for production, transport of materials to manufacturing plant, estimated emissions to air and water from production (incomplete), estimation of energy demand and infrastructure of the plant (approximation). Solid wastes omitted.

## Technology
Production out of zinc oxide and sulphuric acid, assuming a yield of 95%. Raw material inputs are calculated according to stoichiometry. The emissions to air and water were estimated using mass balance.

## Time period
data of published literature

## Reference product
- Zinc monosulphate, ZnSO4.H2O, at plant [RER]: 1 kg
  Europe

## Inputs from technosphere
- Transport, freight, lorry, fleet average [RER]: 0.1053 tkm; lognormal SD95 2.095
  (4,5,na,na,na,na,5); standard values
- Transport, freight, rail [RER]: 0.6318 tkm; lognormal SD95 2.095
  (4,5,na,na,na,na,5); standard values
- Heat, natural gas, at industrial furnace 1MW [CH]: 3.742 MJ; lognormal SD95 1.6764
  (4,5,na,3,4,5,1); Estimation, based on quicklime kiln process
- Zinc oxide, at plant [RER]: 0.478 kg; lognormal SD95 1.2077
  (4,na,na,na,na,na,3); estimation, based on a process yield of 95%
- Chemical plant, organics [RER]: 4e-10 p; lognormal SD95 3.1827
  (4,5,4,3,1,5,9); Estimation, based on chemical production site
- Sulphuric acid, liquid, at plant [RER]: 0.575 kg; lognormal SD95 1.2077
  (4,na,na,na,na,na,3); estimation, based on a process yield of 95%

## Inputs from nature
- Water, unspecified natural origin/m3 [resources, in water]: 0.00095 m3; lognormal SD95 1.2077
  (4,na,na,na,na,na,3); estimation, based on a process yield of 95%

## Emissions to nature
- Zinc [emissions to air, high. pop.]: 0.00478 kg; lognormal SD95 1.8752
  estimation
- BOD5, Biological Oxygen Demand [emissions to water, river]: 0.00486 kg; lognormal SD95 2.113
  calculated from mass balance & WWTP efficiency
- Sulfate [emissions to air, high. pop.]: 0.00063 kg; lognormal SD95 1.8752
  estimation
- COD, Chemical Oxygen Demand [emissions to water, river]: 0.00486 kg; lognormal SD95 2.113
  calculated from mass balance & WWTP efficiency
- Sulfate [emissions to water, river]: 0.03105 kg; lognormal SD95 2.113
  calculated from mass balance & WWTP efficiency
- Water [emissions to water, unspecified]: 0.9025 kg; lognormal SD95 2.5196
  (5,5,5,5,5,BU:1.05); All uncertainty-values set to 5.0 by default. Balance of input water

## Sampling procedure
Process data based on stoichiometry. Energy demand based on approximation from large chemical plant. Process emissions based on estimations only.

## Extrapolations
see generalComment

## Sources
- Hischier R., Classen M., Lehmann M., Scharnhorst W., 2007, 2007 - LCI electric and electronic equipment - Hischier, Final report ecoinvent Data v2.0, 18, Swiss Centre for LCI, Empa - TSL, Duebendorf and St. Gallen, CH
Hischier R., Classen M., Lehmann M., Scharnhorst W. (2007) Life Cycle Inventories of Electric and Electronic Equipment - Production, Use & Disposal. Final report ecoinvent Data v2.0. Volume: 18. Swiss Centre for LCI, Empa - TSL. Duebendorf and St. Gallen, CH.
Type: Measurement on site
Source: CD-ROM
First author: Hischier R.
Other authors: Classen M., Lehmann M., Scharnhorst W.
Year: 2007
Title of anthology: Final report ecoinvent Data v2.0
Place of publication: Duebendorf and St. Gallen, CH
Publisher: Swiss Centre for LCI, Empa - TSL
Volume No: 18
Original title: Life Cycle Inventories of Electric and Electronic Equipment - Production, Use & Disposal

## Validation
Proof reading validation: passed.; Other validation: none;
