# Disposal, paint remains, 0% water, to construction waste landfill

Dataset: EcoSpold 1, unit process
Functional unit: 1 kg
Category: waste management / construction waste landfill
Geography: CH
Time period: 2000-01 to 2000-12
Generated by: default
accessRestrictedTo: 0
copyright: true

## General comment
This dataset represents the activity of waste disposal of waste paint in a construction waste landfill. Recommended use of this dataset: For minor amounts going to construction waste landfill as part of a building product (eg. paint on concrete). Large amounts of separated paint cannot go into this type of landfill.Inventoried waste consists of fraction: 100% paint (remains); . Waste composition (wet, in ppm): upper heating value 10.86 MJ/kg; lower heating value 10.14 MJ/kg; H2O na; O 290300; H 36288; C 651510; S na; N na; P na; B na; Cl 1600; Br na; F na; I na; Ag na; As 2.5; Ba na; Cd 5.0622; Co 388.23; Cr 1040.7; Cu 59; Hg 0.6; Mn na; Mo 38.619; Ni 15; Pb 15246; Sb na; Se na; Sn 256.78; V na; Zn 3251.5; Be na; Sc na; Sr na; Ti na; Tl na; W na; Si na; Fe na; Ca na; Al na; K na; Mg na; Na na. Share of carbon in waste that is biogenic 0%.;;

## Included processes
Waste-specific short-term emissions via landfill leachate. Waste-specific long-term emissions from landfill. Land transformation and occupation. Waste placement and compaction. Landfill construction materials, sewer pipe for leachate, and access road.

## Technology
This is an inventory for a construction waste landfill (mostly mineral C&D waste, VVEA type B). Ultimate average landfill height is 11 meters. Operation phase duration is 15 years.

## Reference product
- Disposal, paint remains, 0% water, to construction waste landfill [CH]: 1 kg
  SWITZERLAND

## Inputs from technosphere
- Concrete, sole plate and foundation, at plant [CH]: 1.156e-8 m3; lognormal SD95 3.1055
  for sewer pipe. Uncertainty calculated from uncertainty in base parameters.
- Polyvinylchloride, at regional storage [RER]: 1.9736e-8 kg; lognormal SD95 3.1055
  for sewer auxiliary materials. Uncertainty calculated from uncertainty in base parameters.
- Excavation, hydraulic digger, average [CH]: 0.00030229 m3; lognormal SD95 3.1055
  excavation work for landfill construction, sewer construction, waste placement and compaction, and landfill recultivation. Uncertainty calculated from uncertainty in base parameters.
- Tap water, at user [RER]: 0.00016406 kg; lognormal SD95 3.1055
  for sewer auxiliary materials. Uncertainty calculated from uncertainty in base parameters.
- Bitumen, at refinery [CH]: 8.1169e-6 kg; lognormal SD95 3.1055
  for access street. Uncertainty calculated from uncertainty in base parameters.
- Reinforcing steel, at plant [RER]: 7.6971e-7 kg; lognormal SD95 3.1055
  for sewer auxiliary materials. Uncertainty calculated from uncertainty in base parameters.
- Excavation, skid-steer loader [RER]: 0.00030229 m3; lognormal SD95 3.1055
  (same comment as for Excavation, hydraulic digger, average)
- Transport, freight, lorry, 16t-32t gross weight, fleet average [CH]: 0.0036943 tkm; lognormal SD95 1.9032
  transport for landfill infrastructure materials. uncertainty calculated from uncertainty in transported goods
- Polyethylene, HDPE, granulate, at plant [RER]: 2.5439e-6 kg; lognormal SD95 3.1055
  for base drain system in landfill and sewer auxiliary materials. Uncertainty calculated from uncertainty in base parameters.
- Gravel, round, at mine [CH]: 0.036583 kg; lognormal SD95 3.1055
  for access street, for recultivation layer. Uncertainty calculated from uncertainty in base parameters.
- Sand, at mine [CH]: 0.021824 kg; lognormal SD95 3.1055
  for landfill base layer and sewer auxiliary materials. Uncertainty calculated from uncertainty in base parameters.
- Transport, freight, rail [RER]: 2.8427e-6 tkm; lognormal SD95 2.0832
  (same comment as for Transport, freight, lorry, 16t-32t gross weight, fleet average)
- Extrusion, plastic pipes [RER]: 2.5834e-6 kg; lognormal SD95 3.1055
  (same comment as for Polyethylene, HDPE, granulate, at plant)
- Polypropylene, granulate, at plant [RER]: 1.9736e-8 kg; lognormal SD95 3.1055
  for sewer auxiliary materials. Uncertainty calculated from uncertainty in base parameters.
- Synthetic rubber, at plant [RER]: 7.8944e-9 kg; lognormal SD95 3.1055
  for sewer auxiliary materials. Uncertainty calculated from uncertainty in base parameters.
- Diesel, burned in building machine, average [CH]: 1.9748e-6 MJ; lognormal SD95 3.1055
  construction diesel for access street and sewer construction. Uncertainty calculated from uncertainty in base parameters.
- Cast iron, at plant [RER]: 1.3026e-7 kg; lognormal SD95 3.1055
  for sewer auxiliary materials. Uncertainty calculated from uncertainty in base parameters.
- Chromium steel 18/8, at plant [RER]: 2.6841e-7 kg; lognormal SD95 3.1055
  for sewer auxiliary materials. Uncertainty calculated from uncertainty in base parameters.

## Inputs from nature
- Waste mass, total, placed in landfill [resources, in ground]: 1 kg; lognormal SD95 1
  waste mass placed in construction waste landfill (for ecoscarcity LCIA only). uncertainty is low as functional unit.
- Transformation, to dump site, inert material landfill [resources, land]: 4.5455e-5 m2; lognormal SD95 4.3339
  for establishing the landfill. Uncertainty calculated from uncertainty in base parameters.
- Transformation, to pasture, man made [resources, land]: 4.5455e-5 m2; lognormal SD95 4.3339
  recultivation of landfill after operation phase. Uncertainty calculated from uncertainty in base parameters.
- Occupation, dump site [resources, land]: 0.00068182 m2a; lognormal SD95 2.5417
  occupation of landfill during operation phase of 15 years. Uncertainty calculated from uncertainty in base parameters.
- Organic carbon, placed in landfill [resources, in ground]: 0.65151 kg; lognormal SD95 1.1611
  organic carbon placed in construction waste landfill (for ecoscarcity LCIA only). uncertainty is derived from uncertainty in initial waste composition.
- Transformation, to traffic area, road network [resources, land]: 2.1645e-7 m2; lognormal SD95 4.3339
  for access road to landfill. Uncertainty calculated from uncertainty in base parameters.
- Transformation, from dump site, inert material landfill [resources, land]: 4.5455e-5 m2; lognormal SD95 4.3339
  (same comment as for Transformation, to pasture, man made)
- Transformation, from pasture, man made [resources, land]: 4.5671e-5 m2; lognormal SD95 4.3339
  for establishing the landfill on open ground. Uncertainty calculated from uncertainty in base parameters.
- Occupation, traffic area, road network [resources, land]: 8.658e-6 m2a; lognormal SD95 2.5417
  for access road to landfill during construction, operation, and aftercare phase of 25 years. Uncertainty calculated from uncertainty in base parameters.

## Emissions to nature
- Chloride [emissions to water, river]: 0.00030125 kg; lognormal SD95 5.1129
  burden from short-term leachate to groundwater in uncontrolled landfill in moist cimate. Uncertainty calculated from unertainty of the waste composition of this waste and short-term leaching in landfill
- TOC, Total Organic Carbon [emissions to water, river]: 0.0080468 kg; lognormal SD95 3.2381
  (same comment as for Chloride)
- BOD5, Biological Oxygen Demand [emissions to water, groundwater, long-term]: 0.39248 kg; lognormal SD95 1.1614
  Emissions from long-term leachate (>100a) directly from construction waste landfill. Uncertainty calculated depending on waste input and uncertainty of long-term transfer coefficents in landfill.
- Arsenic [emissions to water, river]: 4.7648e-9 kg; lognormal SD95 17.159
  (same comment as for Chloride)
- Copper [emissions to water, river]: 3.6491e-8 kg; lognormal SD95 14.069
  (same comment as for Chloride)
- Zinc [emissions to water, river]: 3.674e-6 kg; lognormal SD95 8.4841
  (same comment as for Chloride)
- Zinc [emissions to water, groundwater, long-term]: 0.0022007 kg; lognormal SD95 4.3715
  (same comment as for BOD5, Biological Oxygen Demand)
- Mercury [emissions to water, river]: 1.9318e-9 kg; lognormal SD95 18.632
  (same comment as for Chloride)
- Cadmium [emissions to water, groundwater, long-term]: 5.02e-6 kg; lognormal SD95 10.282
  (same comment as for BOD5, Biological Oxygen Demand)
- Chloride [emissions to water, groundwater, long-term]: 0.0012987 kg; lognormal SD95 4.6995
  (same comment as for BOD5, Biological Oxygen Demand)
- Molybdenum [emissions to water, groundwater, long-term]: 3.562e-5 kg; lognormal SD95 8.0712
  (same comment as for BOD5, Biological Oxygen Demand)
- COD, Chemical Oxygen Demand [emissions to water, groundwater, long-term]: 2.8763 kg; lognormal SD95 1.1614
  (same comment as for BOD5, Biological Oxygen Demand)
- Mercury [emissions to water, groundwater, long-term]: 5.9807e-7 kg; lognormal SD95 12.906
  (same comment as for BOD5, Biological Oxygen Demand)
- Arsenic [emissions to water, groundwater, long-term]: 1.6994e-6 kg; lognormal SD95 11.463
  (same comment as for BOD5, Biological Oxygen Demand)
- Cobalt [emissions to water, river]: 1.1615e-7 kg; lognormal SD95 12.479
  (same comment as for Chloride)
- DOC, Dissolved Organic Carbon [emissions to water, groundwater, long-term]: 0.64347 kg; lognormal SD95 1.1614
  (same comment as for BOD5, Biological Oxygen Demand)
- Nickel [emissions to water, groundwater, long-term]: 1.402e-5 kg; lognormal SD95 9.0692
  (same comment as for BOD5, Biological Oxygen Demand)
- COD, Chemical Oxygen Demand [emissions to water, river]: 0.035969 kg; lognormal SD95 3.2381
  (same comment as for Chloride)
- TOC, Total Organic Carbon [emissions to water, groundwater, long-term]: 0.64347 kg; lognormal SD95 1.1614
  (same comment as for BOD5, Biological Oxygen Demand)
- Tin [emissions to water, river]: 2.659e-6 kg; lognormal SD95 8.9188
  (same comment as for Chloride)
- Copper [emissions to water, groundwater, long-term]: 2.1858e-5 kg; lognormal SD95 9.5984
  (same comment as for BOD5, Biological Oxygen Demand)
- Molybdenum [emissions to water, river]: 1.6782e-7 kg; lognormal SD95 12.105
  (same comment as for Chloride)
- Cobalt [emissions to water, groundwater, long-term]: 6.9575e-5 kg; lognormal SD95 11.78
  (same comment as for BOD5, Biological Oxygen Demand)
- DOC, Dissolved Organic Carbon [emissions to water, river]: 0.0080468 kg; lognormal SD95 3.2381
  (same comment as for Chloride)
- BOD5, Biological Oxygen Demand [emissions to water, river]: 0.0049081 kg; lognormal SD95 3.2381
  (same comment as for Chloride)
- Nickel [emissions to water, river]: 2.3406e-8 kg; lognormal SD95 14.739
  (same comment as for Chloride)
- Lead [emissions to water, groundwater, long-term]: 0.0035203 kg; lognormal SD95 6.3538
  (same comment as for BOD5, Biological Oxygen Demand)
- Chromium VI [emissions to water, river]: 2.4908e-7 kg; lognormal SD95 11.512
  (same comment as for Chloride)
- Tin [emissions to water, groundwater, long-term]: 0.00025412 kg; lognormal SD95 6.2302
  (same comment as for BOD5, Biological Oxygen Demand)
- Lead [emissions to water, river]: 5.877e-6 kg; lognormal SD95 8.1083
  (same comment as for Chloride)
- Cadmium [emissions to water, river]: 4.2152e-8 kg; lognormal SD95 14.031
  (same comment as for Chloride)
- Chromium VI [emissions to water, groundwater, long-term]: 0.00013898 kg; lognormal SD95 13.214
  (same comment as for BOD5, Biological Oxygen Demand)

## Sampling procedure
Landfill model based on average mineral building waste composition and observed average leachate concentrations from various literature sources. Extrapolated to 60'000 years heeding chemical characteristics and hydrology. Based on waste composition and climate data the end of carbonate phase of this landfill is estimated to be reached beyond 60'000 years.

## Uncertainty adjustments
uncertainty of waste input composition data derived from generic formula GSD(c) = N*ln(c)+1. *Mean* long-term emissions are the emissions until 60'000 years after waste placement. *Maximal* (upper bound) long-term emissions are the complete emissions of all landfilled material, depicting possible mechanical landfill failures and/or natural erosion not heeded in the mean value. Minimal long-term emissions are derived implicitly from the mean and maximal values assuming a lognormal distribution.

## Sources
- Doka G., 2020, 2020 - LCI exc. mat. constr. and dem. waste landfill - Doka, -, Doka LCA, Zuerich, CH
Doka G. (2020) Two models for waste-specific and climate-specific life cycle inventories of excavation material landfills and construction & demolition waste landfills. Doka LCA. Zürich, CH. http://www.doka.ch/publications.htm.
Type: Separate publication
First author: Doka G.
Year: 2020
Place of publication: Zürich, CH. http://www.doka.ch/publications.htm
Publisher: Doka LCA
Original title: Two models for waste-specific and climate-specific life cycle inventories of excavation material landfills and construction & demolition waste landfills
