# Treatment, liquid crystal production effluent, to wastewater treatment, class 2

Dataset: EcoSpold 1, unit process
Functional unit: 1 m3
Category: wastewater treatment / unspecified
Geography: CH
Time period: 2004-01 to 2004-12
Generated by: Roland Hischier
accessRestrictedTo: 0
copyright: true

## General comment
Wastewater purified in a moderatly large municipal wastewater treatment plant (capacity class 2), with an average capacity size of 71100 per-captia-equivalents PCE. \nWastewater contains (in kg/m3): BOD: 92.6 (GSD=122.5%);

## Included processes
Infrastructure materials for municipal wastewater treatment plant, transports, dismantling. Land use burdens.

## Technology
Three stage wastewater treatment (mechanical, biological, chemical) including sludge digestion (fermentation) according to the average technology in Switzerland

## Reference product
- Treatment, liquid crystal production effluent, to wastewater treatment, class 2 [CH]: 1 m3
  SWITZERLAND

## Inputs from technosphere
- Electricity, low voltage, at grid [CH]: 35.754 kWh; lognormal SD95 2.1403
  direct wastewater treatment plant burden. Uncertainty calculated from wastewater composition and treatment model
- Residual material landfill facility [CH]: 1.1464e-10 p; lognormal SD95 1.4495
  burden from sludge incineration. Uncertainty calculated from wastewater composition and treatment model
- Sewer grid, class 2 [CH]: 1.6832e-7 km; lognormal SD95 1
  uncertainty heeded in exchanges of the module
- Disposal, plastics, mixture, 15.3% water, to municipal incineration [CH]: 0.0155 kg; lognormal SD95 1.07
  (same comment as for Electricity, low voltage, at grid)
- Transport, freight, rail [RER]: 0.0022214 tkm; lognormal SD95 1.5113
  direct wastewater treatment plant burden plus burden from sludge incineration. Uncertainty calculated from wastewater composition and treatment model
- Heat from waste, at municipal waste incineration plant [CH]: 37.521 MJ; lognormal SD95 1.1589
  (same comment as for Residual material landfill facility)
- Electricity from waste, at municipal waste incineration plant [CH]: 6.4319 kWh; lognormal SD95 3.8075
  (same comment as for Residual material landfill facility)
- Transport, freight, lorry, 16t-32t gross weight, fleet average [CH]: 4.0151 tkm; lognormal SD95 1.0759
  (same comment as for Transport, freight, rail)
- Cement, unspecified, at plant [CH]: 0.02201 kg; lognormal SD95 1.5179
  (same comment as for Residual material landfill facility)
- Hydrochloric acid, 30% in H2O, at plant [RER]: 1.2257e-5 kg; lognormal SD95 3.4938
  (same comment as for Residual material landfill facility)
- Process-specific burdens, municipal waste incineration [CH]: 44.738 kg; lognormal SD95 1.1493
  (same comment as for Residual material landfill facility)
- Process-specific burdens, slag compartment [CH]: 0.096796 kg; lognormal SD95 1.4438
  (same comment as for Residual material landfill facility)
- Disposal, paper, 11.2% water, to municipal incineration [CH]: 0.0155 kg; lognormal SD95 1.07
  (same comment as for Electricity, low voltage, at grid)
- Slurry spreading, by vacuum tanker [CH]: 0.15115 m3; lognormal SD95 1.0942
  burden from sludge spreading. Uncertainty calculated from wastewater composition and treatment model
- Slag compartment [CH]: 1.7208e-10 p; lognormal SD95 1.4438
  (same comment as for Residual material landfill facility)
- Municipal waste incineration plant [CH]: 1.1184e-8 p; lognormal SD95 1.1493
  (same comment as for Residual material landfill facility)
- Wastewater treatment plant, class 2 [CH]: 1.9883e-9 p; lognormal SD95 1
  uncertainty heeded in exchanges of the module
- Process-specific burdens, residual material landfill [CH]: 0.055025 kg; lognormal SD95 1.4495
  (same comment as for Residual material landfill facility)
- Chemicals inorganic, at plant [GLO]: 2.0429e-5 kg; lognormal SD95 3.4938
  (same comment as for Residual material landfill facility)
- Disposal, cement, hydrated, 0% water, to residual material landfill [CH]: 0.055025 kg; lognormal SD95 1.5179
  (same comment as for Residual material landfill facility)

## Emissions to nature
- Heat, waste [emissions to air, high. pop.]: 646.28 MJ; lognormal SD95 1.5333
  direct wastewater treatment plant emission plus emission from sludge incineration. Uncertainty calculated from wastewater composition and treatment model
- Methane, fossil [emissions to air, high. pop.]: 0.46701 kg; lognormal SD95 1.8776
  emission from sludge incineration. Uncertainty calculated from wastewater composition and treatment model
- NMVOC, non-methane volatile organic compounds, unspecified origin [emissions to air, high. pop.]: 0.002122 kg; lognormal SD95 2.5292
  direct digester gas emission. Uncertainty calculated from wastewater composition and treatment model
- Carbon monoxide, fossil [emissions to air, high. pop.]: 0.14842 kg; lognormal SD95 2.0014
  (same comment as for Methane, fossil)
- Boron [emissions to air, high. pop.]: 0.0022616 kg; lognormal SD95 5.1543
  direct digester gas emission plus emission from sludge incineration. Uncertainty calculated from wastewater composition and treatment model
- TOC, Total Organic Carbon [emissions to water, river]: 7.1538 kg; lognormal SD95 1.4265
  sewer overload discharge plus direct wastewater treatment plant emission plus emission from sludge incineration. Uncertainty calculated from wastewater composition and treatment model
- Boron [emissions to water, river]: 0.034616 kg; lognormal SD95 4.4023
  (same comment as for TOC, Total Organic Carbon)
- Carbon [emissions to soil, agricultural]: 6.2203 kg; lognormal SD95 1.6656
  emission from sludge spreading. Uncertainty calculated from wastewater composition and treatment model
- COD, Chemical Oxygen Demand [emissions to water, river]: 26.836 kg; lognormal SD95 1.114
  (same comment as for TOC, Total Organic Carbon)
- COD, Chemical Oxygen Demand [emissions to water, groundwater, long-term]: 0.24341 kg; lognormal SD95 1.717
  (same comment as for Methane, fossil)
- Carbon dioxide, fossil [emissions to air, high. pop.]: 171.22 kg; lognormal SD95 1.3548
  (same comment as for Methane, fossil)
- Chloride [emissions to water, river]: 0.0783 kg; lognormal SD95 4.9019
  (same comment as for TOC, Total Organic Carbon)
- TOC, Total Organic Carbon [emissions to water, groundwater, long-term]: 0.096316 kg; lognormal SD95 1.717
  (same comment as for Methane, fossil)
- BOD5, Biological Oxygen Demand [emissions to water, groundwater, long-term]: 0.079617 kg; lognormal SD95 1.717
  (same comment as for Methane, fossil)
- Boron [emissions to water, groundwater, long-term]: 0.012422 kg; lognormal SD95 5.1535
  (same comment as for Methane, fossil)
- DOC, Dissolved Organic Carbon [emissions to water, groundwater, long-term]: 0.096316 kg; lognormal SD95 1.717
  (same comment as for Methane, fossil)
- Boron [emissions to soil, agricultural]: 0.011885 kg; lognormal SD95 5.1492
  (same comment as for Carbon)
- DOC, Dissolved Organic Carbon [emissions to water, river]: 6.6981 kg; lognormal SD95 1.1485
  (same comment as for TOC, Total Organic Carbon)
- BOD5, Biological Oxygen Demand [emissions to water, river]: 8.78 kg; lognormal SD95 1.4543
  (same comment as for TOC, Total Organic Carbon)
- Heat, waste [emissions to water, river]: 1019.1 MJ; lognormal SD95 1.3854
  (same comment as for Heat, waste)

## Sources
- Hischier R., Classen M., Lehmann M., Scharnhorst W., 2007, 2007 - LCI electric and electronic equipment - Hischier, Final report ecoinvent Data v2.0, 18, Swiss Centre for LCI, Empa - TSL, Duebendorf and St. Gallen, CH
Hischier R., Classen M., Lehmann M., Scharnhorst W. (2007) Life Cycle Inventories of Electric and Electronic Equipment - Production, Use & Disposal. Final report ecoinvent Data v2.0. Volume: 18. Swiss Centre for LCI, Empa - TSL. Duebendorf and St. Gallen, CH.
Type: Measurement on site
Source: CD-ROM
First author: Hischier R.
Other authors: Classen M., Lehmann M., Scharnhorst W.
Year: 2007
Title of anthology: Final report ecoinvent Data v2.0
Place of publication: Duebendorf and St. Gallen, CH
Publisher: Swiss Centre for LCI, Empa - TSL
Volume No: 18
Original title: Life Cycle Inventories of Electric and Electronic Equipment - Production, Use & Disposal

## Validation
Proof reading validation: passed.; Other validation: none;
