# Disposal, ash coffee ground pellets, to landfarming

Dataset: EcoSpold 1, unit process
Functional unit: 1 kg
Category: landfarming / unspecified
Geography: CH
Time period: 2008-01 to 2008-12
Share of production covered: 0 %
Generated by: Matthias Stucki
accessRestrictedTo: 0
copyright: true

## General comment
Ash composition data completed with the ecoinvent inventory of "disposal, wood ash mixture, pure, 0% water, to landfarming";

## Included processes
This data set describes the disposal of the ash, only spreading of the ash is included (no transport)

## Geography
The inventory is modelled for a pilot plant in Switzerland

## Time period
Collection of data and publication.

## Reference product
- Disposal, ash coffee ground pellets, to landfarming [CH]: 1 kg
  SWITZERLAND

## Inputs from technosphere
- Solid manure loading and spreading, by hydraulic loader and spreader [CH]: 1 kg; lognormal SD95 1.6209
  (4,5,na,1,4,na,BU:1.05); Assumption for spreading

## Emissions to nature
- Chloride [emissions to soil, agricultural]: 0.0032 kg; lognormal SD95 1.5772
  (1,4,2,1,1,5,BU:1.5); direct emission from landfarming process. Uncertainty from uncertainty in waste composition.
- Iron [emissions to soil, agricultural]: 0.0228 kg; lognormal SD95 1.2569
  (1,4,2,1,1,5,BU:1.1); direct emission from landfarming process. Uncertainty from uncertainty in waste composition.
- Cobalt [emissions to soil, agricultural]: 3.448e-5 kg; lognormal SD95 1.2569
  (1,4,2,1,1,5,BU:1.1); Ash composition: Prüfbericht 544946, SGS Institut Fresenius, 2008;
- Manganese [emissions to soil, agricultural]: 0.0021724 kg; lognormal SD95 1.2569
  (1,4,2,1,1,5,BU:1.1); Ash composition: Prüfbericht 544946, SGS Institut Fresenius, 2008;
- Antimony [emissions to soil, agricultural]: 0.0002069 kg; lognormal SD95 1.2569
  (1,4,2,1,1,5,BU:1.1); Ash composition: Prüfbericht 544946, SGS Institut Fresenius, 2008;
- Phosphorus [emissions to soil, agricultural]: 0.0098 kg; lognormal SD95 1.5772
  (same comment as for Chloride)
- Cadmium [emissions to soil, agricultural]: 9.9055e-6 kg; lognormal SD95 1.2569
  (1,4,2,1,1,5,BU:1.1); Ash composition: Prüfbericht 544946, SGS Institut Fresenius, 2008;
- Chromium [emissions to soil, agricultural]: 3.1997e-5 kg; lognormal SD95 1.2569
  (1,4,2,1,1,5,BU:1.1); Ash composition: Prüfbericht 544946, SGS Institut Fresenius, 2008;
- Tin [emissions to soil, agricultural]: 0.0011724 kg; lognormal SD95 1.2569
  (1,4,2,1,1,5,BU:1.1); Ash composition: Prüfbericht 544946, SGS Institut Fresenius, 2008;
- Carbon [emissions to soil, agricultural]: 0.012 kg; lognormal SD95 1.5772
  (same comment as for Chloride)
- Titanium [emissions to soil, agricultural]: 0.00138 kg; lognormal SD95 1.2569
  (same comment as for Iron)
- Mercury [emissions to soil, agricultural]: 3.3e-8 kg; lognormal SD95 1.3406
  (1,4,2,3,3,5,BU:1.1); direct emission from landfarming process. Uncertainty from uncertainty in waste composition.
- Sulfur [emissions to soil, agricultural]: 0.0092 kg; lognormal SD95 1.5772
  (same comment as for Chloride)
- Silicon [emissions to soil, agricultural]: 0.0826 kg; lognormal SD95 1.2569
  (same comment as for Iron)
- Aluminium [emissions to soil, agricultural]: 0.07931 kg; lognormal SD95 1.2569
  (1,4,2,1,1,5,BU:1.1); Ash composition: Prüfbericht 544946, SGS Institut Fresenius, 2008;
- Vanadium [emissions to soil, agricultural]: 3.448e-5 kg; lognormal SD95 1.2569
  (1,4,2,1,1,5,BU:1.1); Ash composition: Prüfbericht 544946, SGS Institut Fresenius, 2008;
- Copper [emissions to soil, agricultural]: 0.0010207 kg; lognormal SD95 1.2569
  (1,4,2,1,1,5,BU:1.1); Ash composition: Prüfbericht 544946, SGS Institut Fresenius, 2008;
- Molybdenum [emissions to soil, agricultural]: 3.7e-6 kg; lognormal SD95 1.3406
  (same comment as for Mercury)
- Zinc [emissions to soil, agricultural]: 0.0027772 kg; lognormal SD95 1.2569
  (1,4,2,1,1,5,BU:1.1); Ash composition: Prüfbericht 544946, SGS Institut Fresenius, 2008;
- Nickel [emissions to soil, agricultural]: 6.52e-5 kg; lognormal SD95 1.2569
  (1,4,2,1,1,5,BU:1.1); Ash composition: Prüfbericht 544946, SGS Institut Fresenius, 2008;
- Arsenic [emissions to soil, agricultural]: 6.7e-6 kg; lognormal SD95 1.3406
  (same comment as for Mercury)
- Lead [emissions to soil, agricultural]: 0.00015672 kg; lognormal SD95 1.2569
  (1,4,2,1,1,5,BU:1.1); Ash composition: Prüfbericht 544946, SGS Institut Fresenius, 2008;
- Magnesium [emissions to soil, agricultural]: 0.0321 kg; lognormal SD95 1.2569
  (same comment as for Iron)
- Potassium [emissions to soil, agricultural]: 0.0545 kg; lognormal SD95 1.2569
  (same comment as for Iron)
- Calcium [emissions to soil, agricultural]: 0.284 kg; lognormal SD95 1.2569
  (same comment as for Iron)

## Sampling procedure
Literature

## Extrapolations
ash composition estimated with data for wood ash

## Sources
- Itten R., Stucki M., Jungbluth N., 2011, 2011 - LCA burning diff. solid biomass substrates - Itten, Project report, 321, ESU-services Ltd., Uster, CH
Itten R.,, Jungbluth N. (2011) Life Cycle Assessment of Burning Different Biomass Substrates. Project report. Volume: 321. ESU-services Ltd.. Uster, CH.
Type: Separate publication
Source: Report
First author: Itten R.,
Other authors: Jungbluth N.
Year: 2011
Title of anthology: Project report
Place of publication: Uster, CH
Publisher: ESU-services Ltd.
Volume No: 321

## Validation
Proof reading validation: 29.04.2011; Other validation: Z:\ESU-Docs\Projekte laufend\321 FP Biomasse Verbrennung Feste Substrate\EcoSpold\[321_Biomasse_6-30kW-v1.0.xlsx]X-Process;
