# Ceramic tiles, at regional storage

Dataset: EcoSpold 1, unit process
Functional unit: 1 kg
Category: construction / coverings
Geography: CH
Time period: 2000-01 to 2000-12
Generated by: Hans-Joerg Althaus
accessRestrictedTo: 0
copyright: true

## General comment
Data from one producer only. Composition of ceramic might differ from case to case. This dataset refers to oxidic ceramics.;

## Included processes
gate to gate production of ceramic tiles, including transports of raw materials to factory and of product to Switzerland

## Geography
data from Italy

## Technology
large scale, single fired production in Europe. Gas fired kiln

## Reference product
- Ceramic tiles, at regional storage [CH]: 1 kg
  SWITZERLAND

## Inputs from technosphere
- Barite, at plant [RER]: 0.000556 kg; lognormal SD95 1.13
  (1,3,1,3,1,4)
- Feldspar, at plant [RER]: 0.386 kg; lognormal SD95 1.13
  (1,3,1,3,1,4)
- Transport, freight, rail, electricity with shunting [CH]: 0.6 tkm; lognormal SD95 2.09
  (4,5,n.A.,n.A.,n.A.,n.A.)
- Ceramic plant [CH]: 4e-9 p; lognormal SD95 3.02
  (1,3,1,3,1,4)
- Lead, at regional storage [RER]: 0.00665 kg; lognormal SD95 1.13
  (1,3,1,3,1,4)
- Natural gas, burned in industrial furnace 1MWth [CH]: 5.87 MJ; lognormal SD95 1.13
  (1,3,1,3,1,4)
- Disposal, hazardous waste, 0% water, to underground deposit [DE]: 0.00961 kg; lognormal SD95 1.13
  (1,3,1,3,1,4)
- Electricity, medium voltage, production ENTSO-E, at grid: 0.313 kWh; lognormal SD95 1.13
  (1,3,1,3,1,4)
- Stucco, at plant [CH]: 0.0623 kg; lognormal SD95 1.24
  (1,3,1,3,3,4)
- Sodium perborate, tetrahydrate, powder, at plant [RER]: 0.00611 kg; lognormal SD95 1.13
  (1,3,1,3,1,4)
- Tap water, at user [RER]: 0.667 kg; lognormal SD95 1.13
  (1,3,1,3,1,4)
- Aluminium oxide, at plant [RER]: 0.000389 kg; lognormal SD95 1.13
  (1,3,1,3,1,4)
- Silica sand, at plant [DE]: 0.17 kg; lognormal SD95 1.13
  (1,3,1,3,1,4)
- Treatment, ceramic production effluent, to wastewater treatment, class 3 [CH]: 2e-5 m3; lognormal SD95 1.13
  (1,3,1,3,1,4)
- Clay, at mine [CH]: 0.489 kg; lognormal SD95 1.13
  (1,3,1,3,1,4)
- Tin, at regional storage [RER]: 4.9e-5 kg; lognormal SD95 1.13
  (1,3,1,3,1,4)
- Zinc, primary, at regional storage [RER]: 0.00339 kg; lognormal SD95 1.13
  (1,3,1,3,1,4)
- Transport, freight, lorry, fleet average [RER]: 0.061 tkm; lognormal SD95 2.09
  (4,5,n.A.,n.A.,n.A.,n.A.)
- Limestone, milled, packed, at plant [CH]: 0.0773 kg; lognormal SD95 1.13
  (1,3,1,3,1,4)
- Titanium dioxide, production mix, at plant [RER]: 0.0184 kg; lognormal SD95 1.13
  (1,3,1,3,1,4)

## Emissions to nature
- Particulates, < 2.5 um [emissions to air, unspecified]: 0.00871 kg; lognormal SD95 1.32
  (1,3,1,5,1,5)
- Heat, waste [emissions to air, unspecified]: 1.13 MJ; lognormal SD95 1.13
  (1,3,1,3,1,4)

## Sampling procedure
publication

## Sources
- Kellenberger D., Althaus H.-J., Jungbluth N., Kuenniger T., Lehmann M., Thalmann P., 2007, 2007 - LCI building products - Kellenberger, Final report ecoinvent data v2.0, 7, Swiss Centre for LCI, Empa - TSL, ESU-services Ltd., Bau- und Umweltchimie, Duebendorf, CH
Kellenberger D., Althaus H.-J., Jungbluth N., Künniger T. (2007) Life Cycle Inventories of Building Products. Final report ecoinvent data v2.0. Volume: 7. Swiss Centre for LCI, Empa - TSL. Dübendorf, CH.
Type: Measurement on site
Source: CD-ROM
First author: Kellenberger D.
Other authors: Althaus H.-J., Jungbluth N., Künniger T.
Year: 2007
Title of anthology: Final report ecoinvent data v2.0
Place of publication: Dübendorf, CH
Publisher: Swiss Centre for LCI, Empa - TSL
Volume No: 7

## Validation
Proof reading validation: passed; Other validation: none;
