# Integrated circuit, SQFP, at plant

Dataset: EcoSpold 1, unit process
Functional unit: 1 p
Category: electronics / production of components
Geography: RER
Time period: 2000-01 to 2000-12
Share of production covered: 0 %
Generated by: Mireille Faist Emmenegger
accessRestrictedTo: 0
copyright: true

## General comment
This data is based on confidential data from a company. The data refers to one unit integrated circuit. Input of multi-Si wafer linked to an updated unit process by Philippe Stolz, August 2016.
Geography: Data describes requirements for a mobile phone's chips from Germany.
Technology: Fabrication of a SQFP chip
Time period: Period of company data.
Version: 1

0.0
Production volume: unknown

## Included processes
The data describes the materials and energy requirements for a SQFP chip (0.8 g).

## Technology
Fabrication of a SQFP chip

## Time period
Period of company data.

## Reference product
- Integrated circuit, SQFP, at plant [RER]: 1 p
  Europe

## Inputs from technosphere
- Tin, at regional storage [RER]: 4.4e-5 kg; lognormal SD95 1.5723
  (2,3,1,1,4,5); company data
- Transport, freight, rail [RER]: 0.0001441 tkm; lognormal SD95 2.095
  (4,5,na,na,na,na); estimates
- Transport, freight, lorry, fleet average [RER]: 5.6752e-5 tkm; lognormal SD95 2.095
  (4,5,na,na,na,na); estimates
- Gold, at regional storage [RER]: 1.6e-6 kg; lognormal SD95 1.2226
  (2,3,1,1,1,5); company data
- Electricity, medium voltage, production ENTSO-E, at grid: 0.7896 kWh; lognormal SD95 1.2226
  (2,3,1,1,1,5); company data
- Transport, aircraft, freight, long-haul [RER]: 0.008 tkm; lognormal SD95 2.095
  (4,5,na,na,na,na); estimates
- Silver, at regional storage [RER]: 6.88e-5 kg; lognormal SD95 1.2226
  (2,3,1,1,1,5); company data
- Multi-Si wafer, at plant [RER]: 0.00047437 m2; lognormal SD95 1.3117
  (2,3,1,1,3,5); company data; Input of mc-Si wafer (FU: p) replaced and converted to m2; Size: 100mm x 100mm; Conversion factor: 0.01 m2/p
- Epoxy resin, liquid, at plant [RER]: 3.056e-5 kg; lognormal SD95 1.2226
  (2,3,1,1,1,5); company data
- Lead, at regional storage [RER]: 4.4e-5 kg; lognormal SD95 1.2226
  (2,3,1,1,1,5); company data
- Copper, at regional storage [RER]: 0.0002488 kg; lognormal SD95 1.2226
  (2,3,1,1,1,5); company data
- Bisphenol A, powder, at plant [RER]: 7.648e-5 kg; lognormal SD95 1.2226
  (2,3,1,1,1,5); company data
- Aluminium, primary, at plant [RER]: 7.68e-6 kg; lognormal SD95 1.5723
  (2,3,1,1,4,5); company data

## Emissions to nature
- Heat, waste [emissions to air, low. pop.]: 2.8426 MJ; lognormal SD95 1.2226
  (2,3,1,1,1,5); company data

## Sources
- Hischier R., Classen M., Lehmann M., Scharnhorst W., 2007, 2007 - LCI electric and electronic equipment - Hischier, 0, 0, Swiss Centre for LCI, Empa - TSL, Duebendorf and St. Gallen, CH
Faist Emmenegger M., Jungbluth N., Frischknecht R. (2004) Life Cycle Inventories. Project reports. Volume: 0. ESU-services. Uster, CH.

## Validation
Proof reading validation: 1; Other validation: none;
