# Sodium carbonate from ammonium chloride production, at plant

Dataset: EcoSpold 1, unit process
Functional unit: 1 kg
Category: chemicals / inorganic
Geography: GLO
Time period: 2000-01 to 2006-12
Share of production covered: 100 %
Generated by: Juergen Sutter
accessRestrictedTo: 0
copyright: true

## General comment
The multioutput-process "modified Solvay process" delivers the co-products ammonium chloride and sodium carbonate. The allocation is based on stoechiometric calculation.;

## Included processes
Modified Solvay process including materials, energy uses, infrastructure and emissions.

## Technology
Chlorination of ammonium

## Time period
Time of publications.

## Reference product
- Sodium carbonate from ammonium chloride production, at plant [GLO]: 1 kg
  Global

## Inputs from technosphere
- Heat, natural gas, at industrial furnace 1MW [CH]: 1.99997 MJ; lognormal SD95 1.3001
  (4,5,na,na,na,na); Estimation
- Carbon dioxide liquid, at plant [RER]: 0.21847 kg; lognormal SD95 1.3765
  (4,5,1,1,1,5); Stoechiometric calculation
- Ammonia, liquid, at regional storehouse [RER]: 0.16882 kg; lognormal SD95 1.3765
  (4,5,1,1,1,5); Stoechiometric calculation
- Transport, freight, lorry, fleet average [RER]: 0.096325 tkm; lognormal SD95 2.095
  (4,5,na,na,na,na); Standard distance 100km
- Transport, freight, rail [RER]: 0.57794 tkm; lognormal SD95 2.095
  (4,5,na,na,na,na); Standard distance 600km
- Water, ultrapure, at plant [GLO]: 0.084904 kg; lognormal SD95 1.3765
  (4,5,1,1,1,5); Stoechiometric calculation
- Chemical plant, organics [RER]: 3.9999e-10 p; lognormal SD95 3.0909
  (4,5,na,na,na,na); Estimation
- Electricity, medium voltage, production ENTSO-E, at grid: 0.33299 kWh; lognormal SD95 1.3001
  (4,5,na,na,na,na); Estimation
- Sodium chloride, powder, at plant [RER]: 0.57597 kg; lognormal SD95 1.3765
  (4,5,1,1,1,5); Stoechiometric calculation

## Inputs from nature
- Water, cooling, unspecified natural origin/m3 [resources, in water]: 0.023999 m3; lognormal SD95 1.3001
  (4,5,na,na,na,na); Estimation

## Emissions to nature
- Sodium [emissions to water, river]: 0.01142 kg; lognormal SD95 5.1037
  (4,5,na,na,na,na); calculated from mass balance
- Carbon dioxide, fossil [emissions to air, high. pop.]: 0.010923 kg; lognormal SD95 1.3001
  (4,5,na,na,na,na); Estimation
- Ammonia [emissions to air, high. pop.]: 0.00033763 kg; lognormal SD95 1.3713
  (4,5,na,na,na,na); Estimation
- Heat, waste [emissions to air, high. pop.]: 1.19878 MJ; lognormal SD95 1.3001
  (4,5,na,na,na,na); Calculated from the electricity input
- Ammonium, ion [emissions to water, river]: 0.0040516 kg; lognormal SD95 1.6169
  (4,5,na,na,na,na); Estimation
- Chloride [emissions to water, river]: 0.017378 kg; lognormal SD95 3.0909
  (4,5,na,na,na,na); calculated from mass balance
- Water [emissions to water, unspecified]: 22.7991 kg; lognormal SD95 2.5196
  (5,5,5,5,5,BU:1.05); All uncertainty-values set to 5.0 by default. Balance of input water

## Sampling procedure
Literature data

## Extrapolations
Energy consumptions and emissions are estimated. Infrastructure and transports are calculated with standard values.

## Sources
- Sutter J., 2007, 2007 - LCI highly pure chemicals - Sutter, Final report ecoinvent Data v2.0, 19, Swiss Centre for LCI, ETH, Duebendorf and Uster, CH
Sutter, J., 0 (2007) Life Cycle Inventories of Highly Pure Chemicals. Final report ecoinvent Data v2.0. Editors: 0. Volume: 19. Swiss Centre for LCI, ETHZ. Duebendorf and St. Gallen, CH.
Type: Measurement on site
Source: CD-ROM
First author: Sutter, J.
Other authors: 0
Year: 2007
Name of editors: 0
Title of anthology: Final report ecoinvent Data v2.0
Place of publication: Duebendorf and St. Gallen, CH
Publisher: Swiss Centre for LCI, ETHZ
Volume No: 19

## Validation
Proof reading validation: passed.; Other validation: none;
