# Quicklime, milled, loose, at plant

Dataset: EcoSpold 1, unit process
Functional unit: 1 kg
Category: chemicals / inorganic
Geography: CH
Time period: 2000-01 to 2000-12
Production volume: 150'000t
Share of production covered: 50 %
Generated by: Daniel Kellenberger
accessRestrictedTo: 0
copyright: true

## General comment
Infrastructure data are estimated based on a tour and sketches of the process. The value of the infrastructure is normalized with a annual production capacity of about 23'000 tons of product per year. The estimated lifespan of the machines is 25 years. There are no significant dust emissions as a dust control system is installed. This product exists also packed.;
CAS number: 001305-62-0;
Formula: CaO;
Synonyms: burnt, caustic, quick, lime, Calciumhydroxid, Calcium hydroxide;

## Included processes
Includes the processes: crushing, milling, filtering (cyclone), dedusting, transportation, and storing. One part of the total heating energy for "production" and "administration" is included. Equipment included in the infrastructure: 1 crusher, 1 roller mill, 1 plant for dedusting, 1cyclone, and 1 small silo.

## Technology
The company KFN works on a technically high level. Effective dust control systems are installed.

## Reference product
- Quicklime, milled, loose, at plant [CH]: 1 kg
  SWITZERLAND

## Inputs from technosphere
- Electricity, medium voltage, at grid [CH]: 0.0135 kWh; lognormal SD95 1.1
  (1,2,1,1,1,1);
- Electricity, hydropower, at run-of-river power plant [CH]: 0.0135 kWh; lognormal SD95 1.1
  (1,2,1,1,1,1);
- Light fuel oil, burned in boiler 100kW, non-modulating [CH]: 0.0015 MJ; lognormal SD95 1.1
  (1,2,1,1,1,1);
- Conveyor belt, at plant [RER]: 8.79e-8 m; lognormal SD95 3.1
  (4,3,1,1,1,5);
- Quicklime, in pieces, loose, at plant [CH]: 1 kg; lognormal SD95 1.2
  (3,2,1,1,1,5);
- Industrial machine, heavy, unspecified, at plant [RER]: 0.000109 kg; lognormal SD95 3.1
  (4,3,1,1,1,5);

## Emissions to nature
- Heat, waste [emissions to air, low. pop.]: 0.0972 MJ; lognormal SD95 1.1
  (1,2,1,1,1,1);

## Sampling procedure
survey

## Extrapolations
data which are only available for RER have been used as proxy for CH

## Sources
- Kellenberger D., Althaus H.-J., Jungbluth N., Kuenniger T., Lehmann M., Thalmann P., 2007, 2007 - LCI building products - Kellenberger, Final report ecoinvent data v2.0, 7, Swiss Centre for LCI, Empa - TSL, ESU-services Ltd., Bau- und Umweltchimie, Duebendorf, CH
Kellenberger D., Althaus H.-J., Jungbluth N., Künniger T. (2007) Life Cycle Inventories of Building Products. Final report ecoinvent data v2.0. Volume: 7. Swiss Centre for LCI, Empa - TSL. Dübendorf, CH.
Type: Measurement on site
Source: CD-ROM
First author: Kellenberger D.
Other authors: Althaus H.-J., Jungbluth N., Künniger T.
Year: 2007
Title of anthology: Final report ecoinvent data v2.0
Place of publication: Dübendorf, CH
Publisher: Swiss Centre for LCI, Empa - TSL
Volume No: 7

## Validation
Proof reading validation: Passed; Other validation: none;
