# Storage 10000 l

Dataset: EcoSpold 1, unit process, infrastructure
Functional unit: 1 p
Category: heat / natural gas\cogeneration\power unit\infrastructure
Geography: RER
Generated by: Thomas Heck
accessRestrictedTo: 0
copyright: true

## General comment
Inventory refers to infrastructure of an existing natural gas cogeneration plant (lambda=1 motor, 160kWe, operation start 1987) at Jakobsberg, Basel, Switzerland. (Life time for operation assumed 100'000 h.);

## Included processes
The module includes the most important materials used for production. It includes also the transport of these materials and the water needed for production. It applies also modules for welding and sheet rolling.

## Technology
Component of a specific cogeneration unit installed in Switzerland. Technology at end of 1980s.

## Reference product
- Storage 10000 l [RER]: 1 p
  Europe

## Inputs from technosphere
- Alkyd paint, white, 60% in H2O, at plant [RER]: 4.2 kg; lognormal SD95 2.06
  basic uncertainty:2;(4,na,3,1,1,na);
- Disposal, mineral wool, 0% water, to construction waste landfill [CH]: 84 kg; lognormal SD95 1.55
  (3,3,3,3,4,3);
- Chromium steel 18/8, at plant [RER]: 3.7 kg; lognormal SD95 2.06
  basic uncertainty:2;(4,na,3,1,1,na);
- Aluminium, primary, at plant [RER]: 87.2 kg; lognormal SD95 2.06
  basic uncertainty:2;(4,na,3,1,1,na);
- Transport, freight, rail [RER]: 1080 tkm; lognormal SD95 2.49
  uncertainty of transport distance and of amount of material
- Transport, freight, lorry, fleet average [RER]: 76.5 tkm; lognormal SD95 2.49
  uncertainty of transport distance and of amount of material
- Sheet rolling, steel [RER]: 1770 kg; lognormal SD95 2.06
  basic uncertainty:2;(4,na,3,1,1,na);
- Rock wool, at plant [CH]: 84 kg; lognormal SD95 2.06
  basic uncertainty:2;(4,na,3,1,1,na);
- Reinforcing steel, at plant [RER]: 1770 kg; lognormal SD95 2.06
  basic uncertainty:2;(4,na,3,1,1,na);
- Welding, arc, aluminium [RER]: 17.7 m; lognormal SD95 1.2
  low uncertainty, defined by size
- Sheet rolling, aluminium [RER]: 87.2 kg; lognormal SD95 2.06
  basic uncertainty:2;(4,na,3,1,1,na);
- Treatment, pig iron production effluent, to wastewater treatment, class 3 [CH]: 10.2 m3; lognormal SD95 3
  rough estimate, uncertainty refers to amount of water only; not quantified here: composition of waste water unkown, therefore high uncertainty of applicability of modul.
- Welding, arc, steel [RER]: 15.4 m; lognormal SD95 1.2
  low uncertainty, defined by size

## Inputs from nature
- Water, unspecified natural origin/m3 [resources, in water]: 12.8 m3; lognormal SD95 3
  rough estimate

## Emissions to nature
- Water [emissions to water, unspecified]: 12160 kg; lognormal SD95 2.5196
  (5,5,5,5,5,BU:1.05); All uncertainty-values set to 5.0 by default. Balance of input water

## Sampling procedure
Operator and manufacturer information

## Extrapolations
see Geography/Text

## Sources
- Heck T., 2007, 2007 - Combined heat power generation - Heck, Sachbilanzen von Energiesystemen. Final report No. 6 ecoinvent data v2.0, 6, Swiss Centre for LCI, PSI, Duebendorf and Villigen, CH
Heck, T. (2007) Wärme-Kraft-Kopplung. Sachbilanzen von Energiesystemen. Final report No. 6 ecoinvent data v2.0. Editors: Dones R.. Volume: 6. Swiss Centre for LCI, PSI. Dübendorf and Villigen, CH.
Type: Measurement on site
Source: CD-ROM
First author: Heck, T.
Year: 2007
Name of editors: Dones R.
Title of anthology: Sachbilanzen von Energiesystemen. Final report No. 6 ecoinvent data v2.0
Place of publication: Dübendorf and Villigen, CH
Publisher: Swiss Centre for LCI, PSI
Volume No: 6

## Validation
Proof reading validation: had passed; Other validation: none;
