# Carbon dioxide, captured from atmosphere, with adsorbent-based direct air capture system, operated with HP, 100kt CO2

Dataset: EcoSpold 1, unit process
Functional unit: 1 kg
Category: chemicals / gases\transformation
Geography: CH
Time period: 2024-01 to 2024-01
Generated by: Romain Sacchi
accessRestrictedTo: 0
copyright: true

## General comment
Direct Air Capture (DAC) of CO2 through temperature-vacuum swing adsorption. This DAC process uses adsorbents to capture CO2 from the air and separates it through vacuum and low-temperature heating. Climeworks provides data from its commercial DAC plants, which consist of multiple CO2 collectors and heat exchangers, capturing and releasing CO2 in cyclic operations. The solid sorbent used here is Amine on Silica. It can be regenerated at low temperatures (80-120C). For the sorbent system, the LCI data are collected from the work of Deutz and Bardow based on the Climeworks system. The LCI data represent a plant with an annual capacity of 100 kt CO2/year and a lifetime of 20 years.

Source: Deutz, S., Bardow, A. Life-cycle assessment of an industrial direct air capture process based on temperature-vacuum swing adsorption. Nat Energy 6, (2021). https://doi.org/10.1038/s41560-020-00771-9. Assumes "future" electricity consumption of 0.5 kWh/kg CO2 captured as per Deutz and Bardow, 2021. Current electricity consumption is closer to 0.7 kWh/kg CO2 captured. Future heat demand is 5.4 MJ/kg CO2 captured, as per Deutz and Bardow, 2021. The current demand is closer to 11.9. Future MEA consumption is 3 kg/t CO2 captured. Current consumption is closer to 7 kg/t CO2 captured, as per Deutz and Bardow, 2021.

## Reference product
- Carbon dioxide, captured from atmosphere, with adsorbent-based direct air capture system, operated with HP, 100kt CO2 [CH]: 1 kg
  not defined

## Inputs from technosphere
- Electricity, low voltage, at grid [CH]: 0.5 kWh; lognormal SD95 1.377
  operational {1;5;1;2;3;5;1.05;}
- Heat, at heat pump, air-water, 50kW, CH electricity, in old building [CH]: 5.4 MJ; lognormal SD95 1.377
  operational, proxy used (no industrial HP in the database) {1;5;1;2;3;5;1.05;}
- Amine-based silica production, for sorbent-based direct air capture system [RER]: 0.003 kg; lognormal SD95 1.377
  operational {1;5;1;2;3;5;1.05;}
- Direct air capture system, sorbent-based, 100ktCO2 [CH]: 5e-10 p; lognormal SD95 3.137
  System
- Carbon dioxide compression, transport and storage [CH]: 1 kg; lognormal SD95 1
  CO2 sent for compression and storage
- Transport, freight, rail, electricity with shunting [CH]: 0.0018 tkm; lognormal SD95 2.208
  Generic transport distances calculated based on Table 4.2 of the ecoinvent v.2 Methodology report. Distribution: over 600.0 km.
- Transport, freight, lorry, 16t-32t gross weight, fleet average [CH]: 0.00015 tkm; lognormal SD95 2.208
  Generic transport distances calculated based on Table 4.2 of the ecoinvent v.2 Methodology report. Distribution: over 50.0 km.
- Treatment of direct air capture system, sorbent-based, 100ktCO2 [RER]: 5e-10 p; lognormal SD95 3.137
  EoL

## Inputs from nature
- Carbon dioxide, in air [resources, in air]: 1 kg; lognormal SD95 1.377
  CO2 uptake {1;5;1;2;3;5;1.05;}

## Emissions to nature
- Carbon dioxide, biogenic [emissions to air, high. pop.]: 0.021 kg; lognormal SD95 1.377
  leak {1;5;1;2;3;5;1.05;}

## Sampling procedure
Sampling procedure: Literature data

## Sources
- Sacchi R., Bauer C., 2024, 2024 - LCA power-to-X in residential sector - Sacchi, Project report, PSI, Villigen, CH

## Validation
Proof reading validation: Passed, Other validation: none, Validator: Pierryves Padey, Telephone: +41 58 462 93 11, E-mail: pierryves.padey@bafu.admin.ch, Company: Federal Office for the Environment, Country: CH
