# Coolant circuit

Dataset: EcoSpold 1, unit process
Functional unit: 1 p
Category: energy supply, kbob recommendation / heat pumps, waste water
Geography: CH
Time period: 2004-01 to 2004-12
Share of production covered: 0 %
Generated by: Matthias Tuchschmid
accessRestrictedTo: 0
copyright: true

## General comment
This data set describes the production of the coolant circuit. Data stems from questionnaire.;

## Included processes
This data set includes material requirements for the production of the coolant circuit.

## Geography
This data represent the production in Switzerland.

## Technology
Data set for a brine-water heat pump.

## Time period
Actual data.

## Reference product
- Coolant circuit [CH]: 1 p

## Inputs from technosphere
- Water, decarbonised, at plant [RER]: 3280 kg; lognormal SD95 1.2077
  (1,1,1,1,3,1); Questionnaire
- Extrusion, plastic pipes [RER]: 1800 kg; lognormal SD95 1.05
  (1,1,1,1,1,1); Questionnaire
- Diethylene glycol, at plant [RER]: 820 kg; lognormal SD95 1.2077
  (1,1,1,1,3,1); Questionnaire
- Polyethylene, HDPE, granulate, at plant [RER]: 1800 kg; lognormal SD95 1.2077
  (1,1,1,1,3,1); Questionnaire

## Sampling procedure
questionnaire

## Extrapolations
no extrapolations

## Sources
- Faist Emmenegger M., Frischknecht R., 2005, 2005 - LCA heat pump raw sewage - Faist Emmenegger, -, ESU-services Ltd., Uster, CH
Rolf Frischknecht, Mireille Faist Emmenegger (2004) Nutzwärmebereitstellung mit Wärmepumpe für Rohabwasser. Uster.
Type: Separate publication
Source: Interner Bericht
First author: Rolf Frischknecht
Other authors: Mireille Faist Emmenegger
Year: 2004
Place of publication: Uster

## Validation
Proof reading validation: automatic validation in Excel; Other validation: none;
