# Electricity, high voltage, certified electricity, at grid

Dataset: EcoSpold 1, unit process
Functional unit: 1 kWh
Category: electricity / supply mix
Geography: CH
Time period: 1992 to 2020
Synonyms: 0
Share of production covered: 100 %
Generated by: Rolf Frischknecht
accessRestrictedTo: 0
copyright: true

## General comment
This dataset describes the transmission of high voltage electricity.;

## Included processes
Included are the electricity production in Switzerland and from imports, the transmission network and direct emissions to air (ozone and N2O). Electricity losses are accounted for.

## Geography
Data apply to public and self producers. Geographical classification according to IEA. Ozone- and NO2-emission factors are based on published measurements made in various countries. Transmission network, losses and emissions are taken from Itten, Frischknecht and Stucki (2014): LCI of Electricity Mixes and Grid.

## Technology
Average technology used to transmit and distribute electricity. Includes underground and overhead lines. Electricity production according to related datasets

## Time period
Time of publications.

## Reference product
- Electricity, high voltage, certified electricity, at grid [CH]: 1 kWh

## Inputs from technosphere
- Electricity, certified eletricity [CH]: 1.028 kWh; lognormal SD95 1.129
  (3,1,2,1,1,3,BU:1.05); Specific network losses estimated based on statistics; Itten, Frischknecht & Stucki 2014
- Transmission network, electricity, high voltage [CH]: 6.8199e-9 km; lognormal SD95 3.2848
  (3,2,5,3,1,5,BU:3); Assumed service life of the electricity grid: 40a; Long-distance transport included by assuming a distance of 50 km, a capacity of 1 GW and a load factor of 60%; Itten, Frischknecht & Stucki 2014

## Emissions to nature
- Heat, waste [emissions to soil, unspecified]: 0.0050435 MJ; lognormal SD95 1.2423
  (2,4,1,1,1,5,BU:1.05); Estimation based on network losses;
- Heat, waste [emissions to air, unspecified]: 0.095827 MJ; lognormal SD95 1.2423
  (2,4,1,1,1,5,BU:1.05); Estimation based on network losses;
- Dinitrogen monoxide [emissions to air, unspecified]: 5e-6 kg; lognormal SD95 1.8532
  (3,4,5,3,1,5,BU:1.5); Literature estimation; Itten, Frischknecht & Stucki 2014
- Ozone [emissions to air, unspecified]: 4.5e-6 kg; lognormal SD95 1.8532
  (3,4,5,3,1,5,BU:1.5); Literature estimation; Itten, Frischknecht & Stucki 2014

## Sampling procedure
Statistical data

## Sources
- Frischknecht R., 2022, 2022 - Energy label for passenger cars - Frischknecht, Project reports, 754, treeze Ltd., Bern, CH

## Validation
automatic validation in Excel
G:\Projekte laufend\754 Aktualisierung Energieetikette 2022 BFE\EcoSpold\Strommix Schweiz 2020\[754-StrommixSchweiz2020_v0.1.xlsx]X-Process
