# Formic acid, at plant

Dataset: EcoSpold 1, unit process
Functional unit: 1 kg
Category: chemicals / acids (organic)
Geography: RER
Time period: 2000-01 to 2005-12
Share of production covered: 10 %
Generated by: Juergen Sutter
accessRestrictedTo: 0
copyright: true

## General comment
Formic acid production mix in Europe;
CAS number: 000064-18-6;
Formula: CH2O;
Synonyms: methanoic acid;

## Included processes
Formic acid production mix

## Geography
The inventory is modelled for Europe.

## Technology
Production mix

## Time period
Time of publications

## Reference product
- Formic acid, at plant [RER]: 1 kg
  Europe

## Inputs from technosphere
- Formic acid from methyl formate, at plant [RER]: 0.69 kg; lognormal SD95 1.0587
  (1,1,2,1,1,1); Ullmann 2005
- Formic acid from butane, at plant [RER]: 0.31 kg; lognormal SD95 1.0587
  (1,1,2,1,1,1); Ullmann 2005

## Sampling procedure
Literature data

## Extrapolations
No extrapolations

## Sources
- Sutter J., 2007, 2007 - LCI petrochemical solvents - Sutter, Final report ecoinvent Data v2.0, 22, Swiss Centre for LCI, ETH, Duebendorf and Uster, CH
Sutter, J., 0 (2007) Life Cycle Inventories of Petrochemical Solvents. Final report ecoinvent Data v2.0. Editors: 0. 0. Volume: 22. Issue: 0. Swiss Centre for LCI, ETHZ. Duebendorf and St. Gallen, CH.
Type: Measurement on site
Source: CD-ROM
First author: Sutter, J.
Other authors: 0
Year: 2007
Name of editors: 0
Title of anthology: Final report ecoinvent Data v2.0
Place of publication: Duebendorf and St. Gallen, CH
Publisher: Swiss Centre for LCI, ETHZ
Journal: 0
Volume No: 22
Issue No: 0

## Validation
Proof reading validation: passed.; Other validation: none;
