# Coffee ground pellets, at regional storehouse

Dataset: EcoSpold 1, unit process
Functional unit: 1 m3
Category: fuels / biofuels
Geography: CH
Time period: 2008-01 to 2008-12
Share of production covered: 0 %
Generated by: Matthias Stucki
accessRestrictedTo: 0
copyright: true

## General comment
Based on ecoinvent dataset "wood pellets, u=10%, at storehouse, RER, [m3]";

## Included processes
This data set includes the production of the pellets and the transport to the regional storage centre

## Geography
The inventory is modelled for pellet production in Switzerland

## Time period
Collection of data and publication.

## Reference product
- Coffee ground pellets, at regional storehouse [CH]: 1 m3
  SWITZERLAND

## Inputs from technosphere
- Technical wood drying, infrastructure [RER]: 1.83e-5 p; lognormal SD95 3.3649
  (4,5,2,3,4,5,BU:3); Based on econinvent dataset "sawn timber, softwood, raw, kiln dried, u=10%, at plant, RER, [m3]"
- Transport, freight, lorry, fleet average [RER]: 35.8 tkm; lognormal SD95 2.095
  (4,5,na,na,na,na,BU:2); Based on ecoinvent dataset "wood pellets, u=10%, at storehouse, RER, [m3]"
- Transport, freight, rail [RER]: 164 tkm; lognormal SD95 2.095
  (same comment as for Transport, freight, lorry, fleet average)
- Heat, light fuel oil, at boiler 100kW, non-modulating [CH]: 1719.9 MJ; lognormal SD95 2.095
  (4,5,2,3,3,5,BU:2); Own calculations: 3.78 MJ required for drying one kg water; bulk density coffee pellets 650 kg/m3; 0.7 kg water removed from coffee ground
- Wood pellet manufacturing, infrastructure [RER]: 1e-8 p; lognormal SD95 3.3649
  (4,5,2,3,4,5,BU:3); Based on ecoinvent dataset "wood pellets, u=10%, at storehouse, RER, [m3]"
- Electricity, medium voltage, at grid [CH]: 164 kWh; lognormal SD95 1.3286
  (1,3,3,3,3,5,BU:1.05); Based on ecoinvent dataset "wood pellets, u=10%, at storehouse, RER, [m3]"

## Emissions to nature
- Heat, waste [emissions to air, unspecified]: 591 MJ; lognormal SD95 1.3286
  (same comment as for Electricity, medium voltage, at grid)

## Sampling procedure
Literature

## Extrapolations
Drying and pellet manufacturing process estimated with data for wood drying and wood pellet production

## Sources
- Itten R., Stucki M., Jungbluth N., 2011, 2011 - LCA burning diff. solid biomass substrates - Itten, Project report, 321, ESU-services Ltd., Uster, CH
Itten R.,, Jungbluth N. (2011) Life Cycle Assessment of Burning Different Biomass Substrates. Project report. Volume: 321. ESU-services Ltd.. Uster, CH.
Type: Separate publication
Source: Report
First author: Itten R.,
Other authors: Jungbluth N.
Year: 2011
Title of anthology: Project report
Place of publication: Uster, CH
Publisher: ESU-services Ltd.
Volume No: 321

## Validation
Proof reading validation: 29.04.2011; Other validation: Z:\ESU-Docs\Projekte laufend\321 FP Biomasse Verbrennung Feste Substrate\EcoSpold\[321_Biomasse_6-30kW-v1.0.xlsx]X-Process;
