# Crude coconut oil, at plant

Dataset: EcoSpold 1, unit process
Functional unit: 1 kg
Category: agricultural / plant oils
Geography: PH
Time period: 1995-01 to 1995-12
Production volume: worldwide 2'900 kt in 1993
Generated by: Roland Hischier
accessRestrictedTo: 0
copyright: true

## General comment
data based on the ECOSOL study of the European surfactant industry. Allocations in multioutput processes were made, using the relative mass outputs of products.;

## Included processes
This module contains material and energy input, production of waste and emissions for the steps from the harvested coconuts to the crude coconut oil (i.e. the coconut halving, extraction of water, meat removal & shell production, drying and the oil extraction). Water consumption and infrastructure have been estimated.

## Geography
Data based on coconut oil mills in Phillippines

## Technology
Average technology, typical for Phillippines conditions in the mid 90s

## Time period
data of published literature

## Reference product
- Crude coconut oil, at plant [PH]: 1 kg
  PHILIPPINES

## Inputs from technosphere
- Electricity, medium voltage, production ENTSO-E, at grid: 0.172 kWh; lognormal SD95 1.38
  (4,5,2,1,1,5); estimation, based on ECOSOL data
- Husked nuts harvesting, at farm [PH]: 2.97 kg
- Heat, heavy fuel oil, at industrial furnace 1MW [RER]: 0.297 MJ; lognormal SD95 1.38
  (4,5,2,1,1,5); estimation, based on ECOSOL data
- Transport, freight, lorry, fleet average [RER]: 0.134 tkm
- Chemical plant, organics [RER]: 4e-10 p; lognormal SD95 3.56
  (5,5,1,5,4,5); estimated from a large chem. plant
- Disposal, wood ash mixture, pure, 0% water, to sanitary landfill [CH]: 0.00104 kg; lognormal SD95 1.31
  (2,5,2,1,1,5); data from ECOSOL study (Literature)

## Inputs from nature
- Water, cooling, unspecified natural origin/m3 [resources, in water]: 0.024 m3; lognormal SD95 1.89
  (5,5,1,5,4,5); estimated from a large chem. plant
- Energy, gross calorific value, in biomass [resources, biotic]: 37.5 MJ
- Water, unspecified natural origin/m3 [resources, in water]: 0.006 m3; lognormal SD95 1.89
  (5,5,1,5,4,5); estimated from a large chem. plant

## Emissions to nature
- Oils, unspecified [emissions to water, river]: 0.00442 kg; lognormal SD95 3.1
  (2,5,2,1,1,5); data from ECOSOL study (Literature)
- Particulates, < 2.5 um [emissions to air, high. pop.]: 0.000265 kg; lognormal SD95 3.1
  (2,5,2,1,1,5); data from ECOSOL study (Literature)
- Particulates, > 10 um [emissions to air, high. pop.]: 0.000339 kg; lognormal SD95 1.62
  (2,5,2,1,1,5); data from ECOSOL study (Literature)
- Acidity, unspecified [emissions to water, river]: 0.00479 kg
- Particulates, > 2.5 um, and < 10um [emissions to air, high. pop.]: 0.000456 kg; lognormal SD95 2.1
  (2,5,2,1,1,5); data from ECOSOL study (Literature)
- Heat, waste [emissions to air, high. pop.]: 0.619 MJ; lognormal SD95 1.31
  (2,5,2,1,1,5); data from ECOSOL study (Literature)
- Nitrogen oxides [emissions to air, high. pop.]: 8.8e-5 kg; lognormal SD95 1.62
  (2,5,2,1,1,5); data from ECOSOL study (Literature)
- Nitrogen [emissions to water, river]: 0.00442 kg; lognormal SD95 1.62
  (2,5,2,1,1,5); data from ECOSOL study (Literature)
- NMVOC, non-methane volatile organic compounds, unspecified origin [emissions to air, high. pop.]: 0.0002 kg; lognormal SD95 1.62
  (2,5,2,1,1,5); data from ECOSOL study (Literature)
- BOD5, Biological Oxygen Demand [emissions to water, river]: 0.0138 kg; lognormal SD95 1.62
  (2,5,2,1,1,5); data from ECOSOL study (Literature)
- Suspended solids, unspecified [emissions to water, river]: 0.0416 kg; lognormal SD95 1.62
  (2,5,2,1,1,5); data from ECOSOL study (Literature)
- Carbon dioxide, biogenic [emissions to air, high. pop.]: 0.268 kg; lognormal SD95 1.31
  (2,5,2,1,1,5); data from ECOSOL study (Literature)
- Sulfur dioxide [emissions to air, high. pop.]: 5.8e-5 kg; lognormal SD95 1.31
  (2,5,2,1,1,5); data from ECOSOL study (Literature)
- COD, Chemical Oxygen Demand [emissions to water, river]: 0.0138 kg; lognormal SD95 1.62
  (2,5,2,1,1,5); data from ECOSOL study (Literature)
- Water [emissions to water, unspecified]: 22.8, 5.7 kg (2 entries); lognormal SD95 2.5196
  (5,5,5,5,5,BU:1.05); All uncertainty-values set to 5.0 by default. Balance of input water

## Sources
- Zah R., Hischier R., 2007, 2007 - LCI detergents - Zah, Final report ecoinvent data v2.0, 12, Swiss Centre for LCI, Empa - TSL, Duebendorf and St. Gallen, CH
Zah R., Hischier R. (2007) Life Cycle Inventories of Detergents. Final report ecoinvent data v2.0. Volume: 12. Swiss Centre for LCI, Empa - TSL. Dübendorf, CH.
Type: Measurement on site
Source: CD-ROM
First author: Zah R.
Other authors: Hischier R.
Year: 2007
Title of anthology: Final report ecoinvent data v2.0
Place of publication: Dübendorf, CH
Publisher: Swiss Centre for LCI, Empa - TSL
Volume No: 12

## Validation
Proof reading validation: energetic value of crude coconut oil has been added; Other validation: none;
