# Disposal, sludge, pig iron production, 8.6% water, to residual material landfill

Dataset: EcoSpold 1, unit process
Functional unit: 1 kg
Category: landfill / residual material landfill
Geography: CH
Time period: 2000-01 to 2000-12
Generated by: Gabor Doka
accessRestrictedTo: 0
copyright: true

## General comment
Inventoried waste contains 100% sludge from pig iron production to landfill; . waste composition (wet, in ppm): H2O 85850; O 118420; H n.a.; C 310000; S 24500; N n.a.; P 1178.4; B n.a.; Cl n.a.; Br n.a.; F n.a.; I n.a.; Ag n.a.; As n.a.; Ba n.a.; Cd n.a.; Co n.a.; Cr n.a.; Cu n.a.; Hg n.a.; Mn 1300; Mo n.a.; Ni n.a.; Pb 14000; Sb n.a.; Se n.a.; Sn n.a.; V n.a.; Zn 50500; Be n.a.; Sc n.a.; Sr n.a.; Ti n.a.; Tl n.a.; W n.a.; Si 28047; Fe 210000; Ca 76830; Al 14290; K 1826.3; Mg 61812; Na 1446.6; Share of carbon in waste that is biogenic 0%. Additional solidification with 0.4 kg of cement.;;

## Included processes
Waste-specific short-term emissions to water from leachate. Long-term emissions from landfill to ground water. Expenditures for solidificalion with cement (user-specified option)

## Geography
Technology encountered in Switzerland in 2000. Landfill includes base seal and leachate collection system.

## Technology
Swiss residual material landfill for polluted, inorganic waste. With base seal and leachate collection system. Recultivation after closure.

## Time period
Waste composition as given in literature reference, theoretical data or other source. Transfer coefficients from prospective model.

## Reference product
- Disposal, sludge, pig iron production, 8.6% water, to residual material landfill [CH]: 1 kg
  SWITZERLAND

## Inputs from technosphere
- Process-specific burdens, residual material landfill [CH]: 1 kg; lognormal SD95 1
  demands per kilogram waste. uncertainty is heeded in the module
- Disposal, cement, hydrated, 0% water, to residual material landfill [CH]: 1 kg; lognormal SD95 1.21
  Hydrated cement for solidification of residual material waste. Uncertainty in mass from solidification recipe.
- Transport, freight, lorry, 16t-32t gross weight, fleet average [CH]: 0.02 tkm; lognormal SD95 1.21
  Transport of solidification cement, uncertainty from transported mass and generic transportation distances
- Residual material landfill facility [CH]: 2.0833e-9 p; lognormal SD95 1
  demands per kilogram waste. uncertainty is heeded in the module
- Cement, unspecified, at plant [CH]: 0.4 kg; lognormal SD95 1.21
  Cement for solidification of residual material waste. Uncertainty in mass from solidification recipe.
- Transport, freight, rail [RER]: 0.04 tkm; lognormal SD95 1.21
  (same comment as for Transport, freight, lorry, 16t-32t gross weight, fleet average)

## Emissions to nature
- Calcium [emissions to water, groundwater, long-term]: 0.0069422 kg; lognormal SD95 12.455
  uncertainty is calculated from uncertainties in waste composition and transfer coefficients in incinerator and landfills.
- Phosphate [emissions to water, river]: 1.3476e-6 kg; lognormal SD95 10.821
  uncertainty is calculated from uncertainties in waste composition and transfer coefficients in residual landfill
- DOC, Dissolved Organic Carbon [emissions to water, river]: 0.00033445 kg; lognormal SD95 5.2028
  (same comment as for Phosphate)
- Silicon [emissions to water, groundwater, long-term]: 0.027984 kg; lognormal SD95 2.7117
  (same comment as for Calcium)
- DOC, Dissolved Organic Carbon [emissions to water, groundwater, long-term]: 0.20034 kg; lognormal SD95 1.7888
  (same comment as for Calcium)
- Magnesium [emissions to water, groundwater, long-term]: 0.0070232 kg; lognormal SD95 10.205
  (same comment as for Calcium)
- TOC, Total Organic Carbon [emissions to water, river]: 0.00033445 kg; lognormal SD95 5.2028
  (same comment as for Phosphate)
- BOD5, Biological Oxygen Demand [emissions to water, river]: 0.00027647 kg; lognormal SD95 5.2028
  (same comment as for Phosphate)
- Sodium [emissions to water, groundwater, long-term]: 0.00090374 kg; lognormal SD95 4.8026
  (same comment as for Calcium)
- COD, Chemical Oxygen Demand [emissions to water, river]: 0.00084522 kg; lognormal SD95 5.2028
  (same comment as for Phosphate)
- BOD5, Biological Oxygen Demand [emissions to water, groundwater, long-term]: 0.1656 kg; lognormal SD95 1.7888
  (same comment as for Calcium)
- Potassium [emissions to water, river]: 0.00051481 kg; lognormal SD95 4.8402
  (same comment as for Phosphate)
- Sodium [emissions to water, river]: 0.00054289 kg; lognormal SD95 4.9284
  (same comment as for Phosphate)
- Aluminium [emissions to water, groundwater, long-term]: 0.004242 kg; lognormal SD95 5.2911
  (same comment as for Calcium)
- Aluminium [emissions to water, river]: 7.0819e-6 kg; lognormal SD95 7.9124
  (same comment as for Phosphate)
- TOC, Total Organic Carbon [emissions to water, groundwater, long-term]: 0.20034 kg; lognormal SD95 1.7888
  (same comment as for Calcium)
- Calcium [emissions to water, river]: 1.159e-5 kg; lognormal SD95 7.7376
  (same comment as for Phosphate)
- Lead [emissions to water, groundwater, long-term]: 7.262e-5 kg; lognormal SD95 218.04
  (same comment as for Calcium)
- Iron [emissions to water, groundwater, long-term]: 0.0010525 kg; lognormal SD95 204.23
  (same comment as for Calcium)
- COD, Chemical Oxygen Demand [emissions to water, groundwater, long-term]: 0.50629 kg; lognormal SD95 1.7888
  (same comment as for Calcium)
- Potassium [emissions to water, groundwater, long-term]: 0.0013115 kg; lognormal SD95 4.6071
  (same comment as for Calcium)
- Manganese [emissions to water, groundwater, long-term]: 1.0738e-5 kg; lognormal SD95 155.96
  (same comment as for Calcium)
- Zinc [emissions to water, groundwater, long-term]: 0.00061893 kg; lognormal SD95 88.741
  (same comment as for Calcium)
- Silicon [emissions to water, river]: 6.3076e-5 kg; lognormal SD95 5.9659
  (same comment as for Phosphate)
- Manganese [emissions to water, river]: 1.7927e-8 kg; lognormal SD95 15.085
  (same comment as for Phosphate)
- Magnesium [emissions to water, river]: 1.1725e-5 kg; lognormal SD95 7.667
  (same comment as for Phosphate)
- Sulfate [emissions to water, groundwater, long-term]: 0.065614 kg; lognormal SD95 2.7973
  (same comment as for Calcium)
- Lead [emissions to water, river]: 1.2123e-7 kg; lognormal SD95 12.615
  (same comment as for Phosphate)
- Phosphate [emissions to water, groundwater, long-term]: 0.00080719 kg; lognormal SD95 8.9215
  (same comment as for Calcium)
- Sulfate [emissions to water, river]: 0.0078857 kg; lognormal SD95 3.4188
  (same comment as for Phosphate)
- Iron [emissions to water, river]: 1.7571e-6 kg; lognormal SD95 10.172
  (same comment as for Phosphate)
- Zinc [emissions to water, river]: 1.0333e-6 kg; lognormal SD95 10.233
  (same comment as for Phosphate)

## Sampling procedure
Landfill model based on observed leachate concentrations in literature. Extrapolated to 60'000 years heeding chemical characteristics. Initial waste composition from various literature sources.

## Uncertainty adjustments
uncertainty of waste input composition data derived from generic formula GSD(c) = N*ln(c)+1. Mean long-term emissions are the emissions until the next glacial period occurs (in 60'000a) and the landfill is eroded. Maximal long-term emissions are the complete emissions of all landfilled material (except Cr). Minimal long-term emissions are derived implicitly from the mean and maximal values assuming a lognormal distribution.

## Sources
- Doka G., 2009, 2009 - LCI waste treatment services - Doka, Final report ecoinvent data v2.1, 13, Swiss Centre for LCI, Doka LCA, Duebendorf and St. Gallen, CH
Doka G. (2009) Life Cycle Inventories of Waste Treatment Services. Final report ecoinvent data v2.1. Volume: 13. Swiss Centre for LCI, Empa - TSL. Dübendorf, CH.
Type: Measurement on site
Source: CD-ROM
First author: Doka G.
Year: 2009
Title of anthology: Final report ecoinvent data v2.1
Place of publication: Dübendorf, CH
Publisher: Swiss Centre for LCI, Empa - TSL
Volume No: 13

## Validation
Proof reading validation: passed.; Other validation: none;
