# Disposal, PVC sealing sheet, 1.64% water, to municipal incineration

Dataset: EcoSpold 1, unit process
Functional unit: 1 kg
Category: waste management / municipal incineration
Geography: CH
Time period: 2000-01 to 2000-12
Generated by: Gabor Doka
accessRestrictedTo: 0
copyright: true

## General comment
This dataset represents the activity of waste disposal of waste sealing sheet, polyvinylchloride in a municipal solid waste incinerator (MSWI) Recommended use of this dataset: For disposal of bulk or small parts of PVC sealing sheet (waste building product) Inventoried waste contains 1.7% Glass; 53.9% PVC sealing sheet; 11% Filler (lime); 33.4% plastiziser; . Waste composition (wet, in ppm): upper heating value 23.26 MJ/kg; lower heating value 22.53 MJ/kg; H2O 1387.9; O 124680; H 61320; C 490710; S 1000; N 553.8; P n.a.; B n.a.; Cl 249040; Br 38.689; F 8.1246; I n.a.; Ag n.a.; As 1.2205; Ba 103.08; Cd 1.4498; Co 17.46; Cr 28.23; Cu 14.921; Hg 0.47261; Mn 44.17; Mo n.a.; Ni 11.754; Pb 14601; Sb 23.748; Se 1.1607; Sn 205.09; V 159.26; Zn 33.914; Be 0.27635; Sc n.a.; Sr 48.914; Ti 552.7; Tl 0.22108; W n.a.; Si 6104.5; Fe 2059.2; Ca 45238; Al 110.54; K n.a.; Mg n.a.; Na 1906; Share of carbon in waste that is biogenic 0%. Share of metals in waste not oxidised and bulk-recyclable (exclude very small or thin parts) Iron: 0%; Alu: 0%; Copper: 0%. One kg of this waste produces 0.1693 kg of slag and 0.1292 kg of residues, which are landfilled. Additional solidification with 0.05169 kg of cement. Net energy production: 2.6MJ/kg electric energy and 5.64MJ/kg thermal energy. Recovery of metal scrap to recycling: 0g iron scrap, 0g aluminium scrap, 0g copper scrap.;;

## Included processes
Waste incineration from waste reception gate further downstream (excluding transport to the MSWI plant). Waste-specific air and water emisions from incineration, auxiliary material consumption for flue gas cleaning. Short-term emissions to river water and long-term emisisons to ground water from slag compartment (from bottom ash) and residual material landfill (from solidified fly ashes and scrubber slugde). Waste-specific process energy demands for MSWI and net energy generation.

## Geography
Specific to the technology mix encountered in Switzerland in 2010. Well applicable to modern incineration practices in Europe, North America or Japan.

## Technology
average Swiss MSWI plants in 2010 (grate incinerators) with electrostatic precipitator for fly ash (ESP), wet flue gas scrubber and 25% SNCR , 42.77% SCR-high dust , 32.68% SCR-low dust -DeNOx facilities and 0% without Denox (weighted according to mass of burnt waste, representing Swiss average). Efficiency of iron scrap separation from slag : 58%. Efficiency of non-ferrous scrap separation from slag : 31%. Gross electric efficiency technology mix 15.84% and Gross thermal efficiency technology mix 28.51%

## Time period
Waste composition as given in literature reference, theoretical data or other source. Transfer coefficients for modern MSWI.

## Reference product
- Disposal, PVC sealing sheet, 1.64% water, to municipal incineration [CH]: 1 kg
  SWITZERLAND

## Inputs from technosphere
- Titanium dioxide, production mix, at plant [RER]: 3.9039e-5 kg; lognormal SD95 4.3376
  Input to DeNOx stage (TiO2 catalyst carrier) uncertainty calculated from uncertainty in average DeNOx input, uncertainty in the share of thermal NOx, uncertainty of nitrogen content in average municipal waste and the uncertainty in nitrogen content in *this* waste.
- Process-specific burdens, residual material landfill [CH]: 0.12924 kg; lognormal SD95 1.3951
  mass-specific expenditures required for landfilling of incineration residues. uncertainty is calculated from uncertainties in waste composition and transfer coefficients in incinerator
- Hydrochloric acid, 30% in H2O, at plant [RER]: 0.0019421 kg; lognormal SD95 1.5705
  auxilliary inputs for the wastewater treatment stage of the incinerator plant. uncertainty calculated from uncertainty in average HCl input, of transfer coefficients in the incinerator, and the uncertainty of the waste composition of this waste
- Transport, freight, lorry, 16t-32t gross weight, fleet average [CH]: 0.02758 tkm; lognormal SD95 1.1642
  Transport services to transport incineration residues to landfills and to transport auxilliary inputs of the incinerator plant. uncertainty calculated from uncertainty in average auxiliary material input, the uncertainty of the waste composition of this waste and the uncertainty in generic transportation distances
- Chemicals inorganic, at plant [GLO]: 0.0073888 kg; lognormal SD95 1.5705
  auxilliary inputs for the wastewater treatment stage of the incinerator plant. Proxy for Polyelectrolyte. uncertainty calculated from uncertainty in average Polyelectrolyte input, of transfer coefficients in the incinerator, and the uncertainty of the waste composition of this waste
- Sodium hydroxide, 50% in H2O, production mix, at plant [RER]: 0.025672 kg; lognormal SD95 1.564
  auxilliary inputs for the flue gas treatment stage of the incinerator plant. uncertainty calculated from uncertainty in average NaOH input, of transfer coefficients in the incinerator, and the uncertainty of the waste composition of this waste
- Ammonia, liquid, at regional storehouse [CH]: 0.0006231 kg; lognormal SD95 2.546
  Input to DeNOx stage (100% NH3). uncertainty calculated from uncertainty in average DeNOx input, uncertainty in the share of thermal NOx, uncertainty of nitrogen content in average municipal waste and the uncertainty in nitrogen content in *this* waste.
- Municipal waste incineration plant [CH]: 2.5e-10 p; lognormal SD95 1
  demands per kilogram waste. uncertainty is heeded in the module
- Process-specific burdens, slag compartment [CH]: 0.16175 kg; lognormal SD95 1.4648
  mass-specific expenditures required for landfilling of bottom ash. uncertainty is calculated from uncertainties in waste composition and transfer coefficients in incinerator
- Transport, freight, rail [RER]: 0.07955 tkm; lognormal SD95 1.2106
  (same comment as for Transport, freight, lorry, 16t-32t gross weight, fleet average)
- Iron (III) chloride, 40% in H2O, at plant [CH]: 0.000312 kg; lognormal SD95 2.6848
  auxilliary inputs for the wastewater treatment stage of the incinerator plant. uncertainty calculated from uncertainty in average FeCl3 input, of transfer coefficients in the incinerator, and the uncertainty of the waste composition of this waste
- Residual material landfill facility [CH]: 2.6924e-10 p; lognormal SD95 1.3951
  landfill infrastructure required for landfilling of incineration residues. uncertainty is calculated from uncertainties in waste composition and transfer coefficients in incinerator
- Chromium oxide, flakes, at plant [RER]: 7.9671e-7 kg; lognormal SD95 4.3376
  Input to DeNOx stage. uncertainty calculated from uncertainty in average DeNOx input, uncertainty in the share of thermal NOx, uncertainty of nitrogen content in average municipal waste and the uncertainty in nitrogen content in *this* waste.
- Natural gas, burned in industrial furnace 1MW [CH]: 0.11652 MJ; lognormal SD95 2.546
  Input to DeNOx stage, to heat up flue gas in low-dust SCR. uncertainty calculated from uncertainty in average DeNOx input, uncertainty in the share of thermal NOx, uncertainty of nitrogen content in average municipal waste and the uncertainty in nitrogen content in *this* waste.
- Quicklime, milled, packed, at plant [CH]: 0.1325 kg; lognormal SD95 1.5743
  auxilliary inputs for the flue gas treatment stage of the incinerator plant. uncertainty calculated from uncertainty in average CaO input, of transfer coefficients in the incinerator, and the uncertainty of the waste composition of this waste
- Chemicals organic, at plant [GLO]: 8.1482e-6 kg; lognormal SD95 12.51
  auxilliary inputs for the wastewater treatment stage of the incinerator plant. Proxy for (pure) Trisodium-trimercapto-s-triazine (CAS 17766-26-6), used as 15% diluted solution, aka TMT15. uncertainty calculated from uncertainty in average TMT15 input, of transfer coefficients in the incinerator, and the uncertainty of the waste composition of this waste
- Water, decarbonised, at plant [RER]: 47.112 kg; lognormal SD95 2.6848
  Incinerator process water used in flue gas scrubber stage. uncertainty calculated from uncertainty in average water input, and the uncertainty of the waste composition of this waste
- Cement, unspecified, at plant [CH]: 0.051694 kg; lognormal SD95 1.4676
  Cement required for solidification of landfilled residual material. Uncertainty calculated from uncertainty of the waste composition of this waste, of transfer coefficients in the incinerator and of the solidification recipe.
- Disposal, cement, hydrated, 0% water, to residual material landfill [CH]: 0.12924 kg; lognormal SD95 1.4676
  Hydrated cement output for solidification of landfilled residual material. Uncertainty calculated from uncertainty of the waste composition of this waste and transfer coefficients in the incinerator and of the solidification recipe.
- Slag compartment [CH]: 2.8756e-10 p; lognormal SD95 1.4648
  landfill infrastructure required for landfilling of bottom ash. uncertainty is calculated from uncertainties in waste composition and transfer coefficients in incinerator

## Emissions to nature
- Cobalt [emissions to air, high. pop.]: 3.1754e-8 kg; lognormal SD95 9.0601
  Emission to air from waste composition and transfer coefficients. uncertainty is calculated from uncertainties in waste composition and transfer coefficients in incinerator
- Bromine [emissions to air, high. pop.]: 1.9325e-8 kg; lognormal SD95 8.2369
  (same comment as for Cobalt)
- Bromine [emissions to water, river]: 3.494e-5 kg; lognormal SD95 4.2899
  Emissions to water from waste composition and transfer coefficients in incinerator and landfills. uncertainty is calculated from uncertainties in waste composition and transfer coefficients in incinerator and landfills
- TOC, Total Organic Carbon [emissions to water, groundwater, long-term]: 0.0079952 kg; lognormal SD95 1.3085
  Long-term emissions from landfilling of incineration residues. uncertainty is calculated from uncertainties in waste composition and transfer coefficients in incinerator and landfills.
- DOC, Dissolved Organic Carbon [emissions to water, groundwater, long-term]: 0.0079952 kg; lognormal SD95 1.3085
  (same comment as for TOC, Total Organic Carbon)
- Iron [emissions to water, river]: 5.4133e-8 kg; lognormal SD95 6.2807
  (same comment as for Bromine)
- Carbon dioxide, fossil [emissions to air, high. pop.]: 1.7403 kg; lognormal SD95 1.2742
  (same comment as for Cobalt)
- Barium [emissions to water, groundwater, long-term]: 5.1912e-5 kg; lognormal SD95 20.697
  (same comment as for TOC, Total Organic Carbon)
- Nitrate [emissions to water, groundwater, long-term]: 1.9919e-5 kg; lognormal SD95 5.5875
  (same comment as for TOC, Total Organic Carbon)
- Particulates, > 2.5 um, and < 10um [emissions to air, high. pop.]: 1.5473e-8 kg; lognormal SD95 2.442
  Incomplete combustion product emitted to air. uncertainty calculated from uncertainty in average operation emissions, and the uncertainty of the flue gas volume from this waste.
- Benzene, pentachloro- [emissions to air, high. pop.]: 1.3626e-10 kg; lognormal SD95 1.8315
  (same comment as for Particulates, > 2.5 um, and < 10um)
- Mercury [emissions to water, river]: 5.9613e-10 kg; lognormal SD95 9.3663
  (same comment as for Bromine)
- Manganese [emissions to water, groundwater, long-term]: 2.7249e-5 kg; lognormal SD95 17.521
  (same comment as for TOC, Total Organic Carbon)
- DOC, Dissolved Organic Carbon [emissions to water, river]: 0.00026767 kg; lognormal SD95 1.4886
  (same comment as for Bromine)
- Copper [emissions to water, river]: 1.9208e-9 kg; lognormal SD95 7.9986
  (same comment as for Bromine)
- Antimony [emissions to air, high. pop.]: 1.9023e-11 kg; lognormal SD95 9.1809
  (same comment as for Cobalt)
- Sulfur dioxide [emissions to air, high. pop.]: 1.0634e-5 kg; lognormal SD95 5.1369
  (same comment as for Cobalt)
- Arsenic [emissions to air, high. pop.]: 8.2259e-9 kg; lognormal SD95 12.11
  (same comment as for Cobalt)
- BOD5, Biological Oxygen Demand [emissions to water, groundwater, long-term]: 0.0066091 kg; lognormal SD95 1.3085
  (same comment as for TOC, Total Organic Carbon)
- Nickel [emissions to water, river]: 7.8819e-9 kg; lognormal SD95 14.625
  (same comment as for Bromine)
- Tin [emissions to water, groundwater, long-term]: 7.8491e-5 kg; lognormal SD95 14.077
  (same comment as for TOC, Total Organic Carbon)
- Ammonia [emissions to air, high. pop.]: 7.3261e-7 kg; lognormal SD95 2.7838
  Nitrogen species emitted to air after DeNOx stage. uncertainty calculated from uncertainty in average N-emissions and uncertainty in the share of thermal NOx and the uncertainty in nitrogen content in *this* waste.
- Mercury [emissions to water, groundwater, long-term]: 3.3104e-8 kg; lognormal SD95 34.14
  (same comment as for TOC, Total Organic Carbon)
- Sodium [emissions to water, groundwater, long-term]: 0.0015455 kg; lognormal SD95 3.7476
  (same comment as for TOC, Total Organic Carbon)
- Phenol, pentachloro- [emissions to air, high. pop.]: 1.1231e-11 kg; lognormal SD95 1.8315
  (same comment as for Particulates, > 2.5 um, and < 10um)
- Aluminium [emissions to water, groundwater, long-term]: 7.9937e-5 kg; lognormal SD95 6.4415
  (same comment as for TOC, Total Organic Carbon)
- Strontium [emissions to air, high. pop.]: 4.8914e-9 kg; lognormal SD95 8.0656
  (same comment as for Cobalt)
- Nitrate [emissions to water, river]: 7.0596e-6 kg; lognormal SD95 4.2002
  (same comment as for Bromine)
- Vanadium [emissions to water, river]: 2.5427e-7 kg; lognormal SD95 7.4254
  (same comment as for Bromine)
- Antimony [emissions to water, river]: 8.185e-6 kg; lognormal SD95 8.5655
  (same comment as for Bromine)
- Hydrogen fluoride [emissions to air, high. pop.]: 5.4814e-8 kg; lognormal SD95 9.8354
  (same comment as for Cobalt)
- Silicon [emissions to water, river]: 2.2524e-7 kg; lognormal SD95 11.724
  (same comment as for Bromine)
- Zinc [emissions to water, river]: 2.903e-9 kg; lognormal SD95 6.6567
  (same comment as for Bromine)
- Hydrogen chloride [emissions to air, high. pop.]: 0.00014211 kg; lognormal SD95 1.7208
  (same comment as for Cobalt)
- Copper [emissions to air, high. pop.]: 1.3544e-9 kg; lognormal SD95 9.3636
  (same comment as for Cobalt)
- Barium [emissions to air, high. pop.]: 4.0459e-7 kg; lognormal SD95 7.1824
  (same comment as for Cobalt)
- Thallium [emissions to water, river]: 1.3544e-10 kg; lognormal SD95 16.123
  (same comment as for Bromine)
- Thallium [emissions to air, high. pop.]: 2.2108e-10 kg; lognormal SD95 14.44
  (same comment as for Cobalt)
- Fluoride [emissions to water, groundwater, long-term]: 7.2844e-6 kg; lognormal SD95 5.8848
  (same comment as for TOC, Total Organic Carbon)
- Strontium [emissions to water, groundwater, long-term]: 4.885e-5 kg; lognormal SD95 7.8143
  (same comment as for TOC, Total Organic Carbon)
- Dinitrogen monoxide [emissions to air, high. pop.]: 8.2598e-6 kg; lognormal SD95 11.669
  (same comment as for Ammonia)
- Chromium VI [emissions to water, groundwater, long-term]: 2.1088e-6 kg; lognormal SD95 16.268
  (same comment as for TOC, Total Organic Carbon)
- Manganese [emissions to water, river]: 6.8756e-9 kg; lognormal SD95 6.808
  (same comment as for Bromine)
- Selenium [emissions to water, groundwater, long-term]: 7.5385e-7 kg; lognormal SD95 8.4833
  (same comment as for TOC, Total Organic Carbon)
- Copper [emissions to water, groundwater, long-term]: 1.3342e-5 kg; lognormal SD95 8.8988
  (same comment as for TOC, Total Organic Carbon)
- Zinc [emissions to water, groundwater, long-term]: 1.2118e-5 kg; lognormal SD95 29.876
  (same comment as for TOC, Total Organic Carbon)
- Tin [emissions to air, high. pop.]: 1.3396e-10 kg; lognormal SD95 6.9696
  (same comment as for Cobalt)
- Tin [emissions to water, river]: 5.4257e-9 kg; lognormal SD95 11.938
  (same comment as for Bromine)
- Aluminium [emissions to air, high. pop.]: 9.0124e-11 kg; lognormal SD95 7.5625
  (same comment as for Cobalt)
- NMVOC, non-methane volatile organic compounds, unspecified origin [emissions to air, high. pop.]: 1.1737e-6 kg; lognormal SD95 1.8315
  (same comment as for Particulates, > 2.5 um, and < 10um)
- Benzene [emissions to air, high. pop.]: 2.579e-8 kg; lognormal SD95 1.8315
  (same comment as for Particulates, > 2.5 um, and < 10um)
- Selenium [emissions to air, high. pop.]: 1.3847e-8 kg; lognormal SD95 12.18
  (same comment as for Cobalt)
- Nickel [emissions to air, high. pop.]: 1.4302e-8 kg; lognormal SD95 9.4864
  (same comment as for Cobalt)
- Mercury [emissions to air, high. pop.]: 1.3307e-8 kg; lognormal SD95 13.25
  (same comment as for Cobalt)
- Sodium [emissions to air, high. pop.]: 6.6501e-6 kg; lognormal SD95 4.6225
  (same comment as for Cobalt)
- Fluoride [emissions to water, river]: 6.2124e-7 kg; lognormal SD95 6.2784
  (same comment as for Bromine)
- Toluene [emissions to air, high. pop.]: 5.158e-8 kg; lognormal SD95 1.8315
  (same comment as for Particulates, > 2.5 um, and < 10um)
- Thallium [emissions to water, groundwater, long-term]: 1.29e-7 kg; lognormal SD95 10.034
  (same comment as for TOC, Total Organic Carbon)
- Arsenic [emissions to water, river]: 7.2769e-7 kg; lognormal SD95 10.907
  (same comment as for Bromine)
- Lead [emissions to water, groundwater, long-term]: 0.0070599 kg; lognormal SD95 41.93
  (same comment as for TOC, Total Organic Carbon)
- Titanium [emissions to air, high. pop.]: 4.5854e-7 kg; lognormal SD95 5.7121
  (same comment as for Cobalt)
- Lead [emissions to air, high. pop.]: 1.2028e-6 kg; lognormal SD95 3.3124
  (same comment as for Cobalt)
- Chloride [emissions to water, river]: 0.19119 kg; lognormal SD95 1.4873
  (same comment as for Bromine)
- Cadmium [emissions to air, high. pop.]: 7.3567e-10 kg; lognormal SD95 12.041
  (same comment as for Cobalt)
- Cobalt [emissions to water, river]: 3.1633e-9 kg; lognormal SD95 11.6
  (same comment as for Bromine)
- Zinc [emissions to air, high. pop.]: 2.0992e-8 kg; lognormal SD95 8.3521
  (same comment as for Cobalt)
- Antimony [emissions to water, groundwater, long-term]: 1.5102e-5 kg; lognormal SD95 8.2871
  (same comment as for TOC, Total Organic Carbon)
- Lead [emissions to water, river]: 1.3966e-6 kg; lognormal SD95 3.0225
  (same comment as for Bromine)
- Cadmium [emissions to water, river]: 1.4168e-10 kg; lognormal SD95 9.5728
  (same comment as for Bromine)
- Chloride [emissions to water, groundwater, long-term]: 0.057708 kg; lognormal SD95 1.5919
  (same comment as for TOC, Total Organic Carbon)
- Nickel [emissions to water, groundwater, long-term]: 1.1297e-5 kg; lognormal SD95 9.087
  (same comment as for TOC, Total Organic Carbon)
- Carbon monoxide, fossil [emissions to air, high. pop.]: 4.384e-5 kg; lognormal SD95 6.1049
  (same comment as for Particulates, > 2.5 um, and < 10um)
- Aluminium [emissions to water, river]: 1.1963e-8 kg; lognormal SD95 8.6478
  (same comment as for Bromine)
- COD, Chemical Oxygen Demand [emissions to water, river]: 0.00061857 kg; lognormal SD95 1.497
  (same comment as for Bromine)
- Sodium [emissions to water, river]: 0.00035383 kg; lognormal SD95 3.0892
  (same comment as for Bromine)
- Chromium [emissions to air, high. pop.]: 1.9722e-8 kg; lognormal SD95 8.5849
  (same comment as for Cobalt)
- Iron [emissions to air, high. pop.]: 3.6904e-9 kg; lognormal SD95 4.8841
  (same comment as for Cobalt)
- COD, Chemical Oxygen Demand [emissions to water, groundwater, long-term]: 0.020205 kg; lognormal SD95 1.3085
  (same comment as for TOC, Total Organic Carbon)
- Calcium [emissions to water, river]: 0.00019739 kg; lognormal SD95 5.0978
  (same comment as for Bromine)
- Bromine [emissions to water, groundwater, long-term]: 3.729e-6 kg; lognormal SD95 8.0688
  (same comment as for TOC, Total Organic Carbon)
- Calcium [emissions to water, groundwater, long-term]: 0.045041 kg; lognormal SD95 2.4343
  (same comment as for TOC, Total Organic Carbon)
- Arsenic [emissions to water, groundwater, long-term]: 4.8462e-7 kg; lognormal SD95 12.003
  (same comment as for TOC, Total Organic Carbon)
- Cobalt [emissions to water, groundwater, long-term]: 1.4223e-5 kg; lognormal SD95 8.2801
  (same comment as for TOC, Total Organic Carbon)
- Beryllium [emissions to water, river]: 1.7308e-10 kg; lognormal SD95 20.057
  (same comment as for Bromine)
- Strontium [emissions to water, river]: 3.0798e-8 kg; lognormal SD95 14.296
  (same comment as for Bromine)
- Heat, waste [emissions to air, high. pop.]: 17.599 MJ; lognormal SD95 1.4314
  Waste heat generated from heating value of this waste plus any electricity required to process it. uncertainty is calculated from uncertainties in waste composition and uncertainties in energy efficiency and the uncertainty in internal energy demand
- Selenium [emissions to water, river]: 3.9209e-7 kg; lognormal SD95 9.2612
  (same comment as for Bromine)
- Iron [emissions to water, groundwater, long-term]: 0.0010388 kg; lognormal SD95 5.5954
  (same comment as for TOC, Total Organic Carbon)
- BOD5, Biological Oxygen Demand [emissions to water, river]: 0.00057103 kg; lognormal SD95 1.4655
  (same comment as for Bromine)
- Manganese [emissions to air, high. pop.]: 8.4356e-9 kg; lognormal SD95 8.1796
  (same comment as for Cobalt)
- Titanium [emissions to water, river]: 2.0607e-7 kg; lognormal SD95 4.4743
  (same comment as for Bromine)
- Cadmium [emissions to water, groundwater, long-term]: 1.1182e-7 kg; lognormal SD95 193.6
  (same comment as for TOC, Total Organic Carbon)
- Chromium VI [emissions to water, river]: 6.314e-7 kg; lognormal SD95 8.9997
  (same comment as for Bromine)
- Sulfate [emissions to water, river]: 0.0005073 kg; lognormal SD95 3.0376
  (same comment as for Bromine)
- Titanium [emissions to water, groundwater, long-term]: 0.00016523 kg; lognormal SD95 6.3573
  (same comment as for TOC, Total Organic Carbon)
- Particulates, < 2.5 um [emissions to air, high. pop.]: 3.0791e-6 kg; lognormal SD95 3.6629
  (same comment as for Particulates, > 2.5 um, and < 10um)
- TOC, Total Organic Carbon [emissions to water, river]: 0.00026767 kg; lognormal SD95 1.4886
  (same comment as for Bromine)
- Methane, fossil [emissions to air, high. pop.]: 3.8685e-7 kg; lognormal SD95 1.8315
  (same comment as for Particulates, > 2.5 um, and < 10um)
- Silicon [emissions to water, groundwater, long-term]: 5.2231e-5 kg; lognormal SD95 139.4
  (same comment as for TOC, Total Organic Carbon)
- Beryllium [emissions to water, groundwater, long-term]: 2.5256e-7 kg; lognormal SD95 13.088
  (same comment as for TOC, Total Organic Carbon)
- Nitrogen oxides [emissions to air, high. pop.]: 0.00023199 kg; lognormal SD95 2.7838
  sum of fuel-Nox and thermal-NOx emitted to air after DeNOx stage. uncertainty calculated from uncertainty in average N-emissions and uncertainty in the share of thermal NOx and the uncertainty in nitrogen content in *this* waste.
- Barium [emissions to water, river]: 1.3874e-8 kg; lognormal SD95 9.3375
  (same comment as for Bromine)
- Benzo(a)pyrene [emissions to air, high. pop.]: 5.7391e-13 kg; lognormal SD95 3.6629
  (same comment as for Particulates, > 2.5 um, and < 10um)
- Chromium [emissions to water, river]: 1.7537e-9 kg; lognormal SD95 8.6812
  (same comment as for Bromine)
- Cyanide [emissions to air, high. pop.]: 1.7745e-6 kg; lognormal SD95 11.669
  (same comment as for Ammonia)
- Benzene, hexachloro- [emissions to air, high. pop.]: 5.3925e-11 kg; lognormal SD95 1.8315
  (same comment as for Particulates, > 2.5 um, and < 10um)
- Vanadium [emissions to water, groundwater, long-term]: 7.424e-5 kg; lognormal SD95 5.1374
  (same comment as for TOC, Total Organic Carbon)
- Vanadium [emissions to air, high. pop.]: 3.3777e-6 kg; lognormal SD95 6.7081
  (same comment as for Cobalt)
- Dioxin, 2,3,7,8 Tetrachlorodibenzo-p- [emissions to air, high. pop.]: 5.1576e-14 kg; lognormal SD95 3.6629
  (same comment as for Particulates, > 2.5 um, and < 10um)
- Heat, waste [emissions to water, river]: 4.0279 MJ; lognormal SD95 1.4314
  (same comment as for Heat, waste)
- Sulfate [emissions to water, groundwater, long-term]: 0.0024767 kg; lognormal SD95 3.4093
  (same comment as for TOC, Total Organic Carbon)

## Sampling procedure
fully waste-specific calculation based on literature data for average MSWI operation performance

## Extrapolations
Typical elemental transfer coefficients from current studies for modern MSWI, completed with data from coal power plants and estimates, adapted for inert/burnable waste.

## Uncertainty adjustments
uncertainty of waste input composition data derived from generic formula GSD(c) = N*ln(c)+1

## Sources
- Doka G., 2013, 2013 - Updates LCI waste treatment services - Doka, -, Doka LCA, Zuerich, CH
Doka G. (2013) Updates to Life Cycle Inventories of Waste Treatment Services - part II: waste incineration. Doka LCA. Zurich.
Type: Separate publication
Source: Report to document the 2013 changes to the MSWI incinerator model and datasets (URL: http://www.doka.ch/ecoinventMSWIupdateLCI2013.pdf). To be read with the ecoinvent Nr 13 report (Doka 2009, Life Cycle Inventories of Waste Treatment Services) for ecoinvent v2.2.
First author: Doka G.
Year: 2013
Place of publication: Zurich
Publisher: Doka LCA
Original title: Updates to Life Cycle Inventories of Waste Treatment Services - part II: waste incineration

## Validation
Proof reading validation: Passed.; Other validation: none;
