# Fatty acids, from vegetarian oil, at plant

Dataset: EcoSpold 1, unit process
Functional unit: 1 kg
Category: chemicals / organic
Geography: RER
Time period: 2000-01 to 2000-12
Production volume: worldwide 902 kt in 1994
Generated by: Roland Hischier
accessRestrictedTo: 0
copyright: true

## General comment
The functional unit is 1 kg of fatty acids - based on the oil from soya, palm, palm kernel and coco nuts. ;

## Included processes
Energy consumption, water and raw materials and waste. Emissions to air according to methodology of database. No emissions to water.

## Geography
data from different European producers - therefore representing a European average

## Technology
No information about techonology given.

## Time period
according to used literature source

## Reference product
- Fatty acids, from vegetarian oil, at plant [RER]: 1 kg
  Europe

## Inputs from technosphere
- Electricity, medium voltage, production ENTSO-E, at grid: 0.025 kWh; lognormal SD95 1.3
  (2,3,3,1,1,5); data from literature (von Däniken 1995)
- Heat, heavy fuel oil, at industrial furnace 1MW [RER]: 0.48 MJ; lognormal SD95 1.3
  (2,3,3,1,1,5); data from literature (von Däniken 1995)
- Palm oil, at oil mill [MY]: 0.258 kg; lognormal SD95 1.3
  (2,3,3,1,1,5); data from literature (von Däniken 1995)
- Transport, freight, lorry, fleet average [RER]: 0.13 tkm; lognormal SD95 2.1
  (4,5,na,na,na,na); standard distances
- Soya oil, at plant [RER]: 0.258 kg; lognormal SD95 1.3
  (2,3,3,1,1,5); data from literature (von Däniken 1995)
- Palm kernel oil, at oil mill [MY]: 0.258 kg; lognormal SD95 1.3
  (2,3,3,1,1,5); data from literature (von Däniken 1995)
- Heat, light fuel oil, at industrial furnace 1MW [RER]: 0.11 MJ; lognormal SD95 1.3
  (2,3,3,1,1,5); data from literature (von Däniken 1995)
- Crude coconut oil, at plant [PH]: 0.258 kg; lognormal SD95 1.3
  (2,3,3,1,1,5); data from literature (von Däniken 1995)
- Transport, freight, rail [RER]: 0.78 tkm; lognormal SD95 2.1
  (4,5,na,na,na,na); standard distances
- Heat, natural gas, at industrial furnace 1MW [CH]: 1.22 MJ; lognormal SD95 1.3
  (2,3,3,1,1,5); data from literature (von Däniken 1995)
- Heat, at hard coal industrial furnace 1-10MW [RER]: 0.82 MJ; lognormal SD95 1.3
  (2,3,3,1,1,5); data from literature (von Däniken 1995)
- Chemical plant, organics [RER]: 4e-10 p; lognormal SD95 3.2
  (5,na,na,na,na,na); estimation

## Inputs from nature
- Water, unspecified natural origin/m3 [resources, in water]: 7e-5 m3; lognormal SD95 1.3
  (2,3,3,1,1,5); data from literature (von Däniken 1995)
- Water, cooling, unspecified natural origin/m3 [resources, in water]: 0.024 m3; lognormal SD95 1.9
  (5,5,1,1,4,5); estimated with data from a chemical plant

## Emissions to nature
- Heat, waste [emissions to air, high. pop.]: 0.09 MJ; lognormal SD95 1.3
  (2,3,3,1,1,5); calculated from electricity input
- Water [emissions to water, unspecified]: 0.0665, 22.8 kg (2 entries); lognormal SD95 2.5196
  (5,5,5,5,5,BU:1.05); All uncertainty-values set to 5.0 by default. Balance of input water

## Sampling procedure
Process data based on information from European producers.

## Sources
- Hischier R., 2007, 2007 - LCI packagings and graphical papers - Hischier, Final report ecoinvent data v2.0, 11, Swiss Centre for LCI, Empa - TSL, Duebendorf and St. Gallen, CH
Hischier R. (2007) Life Cycle Inventories of Packaging and Graphical Paper. Final report ecoinvent data v2.0. Volume: 11. Swiss Centre for LCI, Empa - TSL. Dübendorf, CH.
Type: Measurement on site
Source: CD-ROM
First author: Hischier R.
Year: 2007
Title of anthology: Final report ecoinvent data v2.0
Place of publication: Dübendorf, CH
Publisher: Swiss Centre for LCI, Empa - TSL
Volume No: 11

## Validation
Proof reading validation: passed; Other validation: none;
