# Vinasse, from sweet sorghum, at distillery

Dataset: EcoSpold 1, unit process
Functional unit: 1 kg
Category: fuels / biofuels\ethanol\byproducts
Geography: CN
Time period: 2000-01 to 2000-12
Production volume: Production volume of ethanol for use as a fuel was 1'500 Ml in 2004 in CN
Share of production covered: 0 %
Generated by: Edgard Gnansounou
accessRestrictedTo: 0
copyright: true

## General comment
Inventory refers to the production of 1 kg of hydrated ethanol 95% (dry basis, i.e. 1.05 kg hydrated ethanol 95% wet basis), respectively 1 kg of excess bagasse (70% dry matter), 1 kWh of electricity and 1 kg of vinasse. The multioutput-process 'sweet sorghum, in ethanol distillery' delivers the co-products 'ethanol, 95% in H2O, from sweet sorghum, at distillery', 'bagasse, from sweet sorghum, at distillery', 'electricity, bagasse, sorghum, at distillery' and 'vinasse, from sweet sorghum, at distillery'. Economic allocation with allocation factor for common stages of 91% to ethanol. Allocation according to carbon balance for CO2.;

## Included processes
This dataset includes the transport of sorghum to the distillery and the processing of sorghum to ethanol (95% w/w), bagasse (70% dry matter, excess), excess electricity and vinasse from ethanol production. System boundary is at the ethanol distillery. Treatment of waste effluents is not included (most wastewater is spread over the fields nearby).

## Technology
Juice extraction is performed through milling (not diffusion). The juice is then converted to ethanol by standard fermentation and distillation techniques. Energy supply is done by combustion of the bagasse resulting from the extraction stage. The main product is ethanol.

## Time period
Data from 1992 to 2005, current technology

## Reference product
- Vinasse, from sweet sorghum, at distillery [CN]: 1 kg
  CHINA

## Inputs from nature
- Carbon dioxide, in air [resources, in air]: 0.044837 kg; lognormal SD95 1.05
  (1,1,1,1,1,1); Calculation, to close carbon balance

## Sampling procedure
Data is from the etha+ project (Alcosuisse, CH) and the ASIATIC project (LASEN, CH), technology by French ethanol plant supplier, modelling by ENERS (CH)

## Extrapolations
Direct emissions (resulting from the combustion of sorghum bagasse) are based on the the combustion of wood chips (without emission control), according to the corresponding dry matter content, carbon content and energy content.

## Sources
- Jungbluth N., Chudacoff M., Dauriat A., Dinkel F., Doka G., Faist Emmenegger M., Gnansounou E., Kljun N., Spielmann M., Stettler C., Sutter J., 2007, 2007 - LCI bioenergy - Jungbluth, Final report ecoinvent data v2.0, 17, Swiss Centre for LCI, ESU-services Ltd., Duebendorf and Uster, CH
Jungbluth N., Chudacoff M., Dauriat A., Dinkel F., Doka G., Faist Emmenegger M., Gnansounou E., Kljun N., Spielmann M., Stettler C., Sutter J. (2007) Life Cycle Inventories of Bioenergy. Final report ecoinvent data v2.0. Volume: 17. Swiss Centre for LCI, ESU. Duebendorf and Uster, CH.
Type: Measurement on site
Source: CD-ROM
First author: Jungbluth N.
Other authors: Chudacoff M., Dauriat A., Dinkel F., Doka G., Faist Emmenegger M., Gnansounou E., Kljun N., Spielmann M., Stettler C., Sutter J.
Year: 2007
Title of anthology: Final report ecoinvent data v2.0
Place of publication: Duebendorf and Uster, CH
Publisher: Swiss Centre for LCI, ESU
Volume No: 17

## Validation
Proof reading validation: Passed.; Other validation: none;
