# Disposal, wood untreated, 20% water, to municipal incineration

Dataset: EcoSpold 1, unit process
Functional unit: 1 kg
Category: waste management / municipal incineration
Geography: CH
Time period: 2000-01 to 2000-12
Generated by: Gabor Doka
accessRestrictedTo: 0
copyright: true

## General comment
This dataset represents the activity of waste disposal of waste wood, untreated in a municipal solid waste incinerator (MSWI) Recommended use of this dataset: For small amounts of wood, which go to disposal as part of communal waste mixture. Waste composition (wet, in ppm): upper heating value 15.36 MJ/kg; lower heating value 13.99 MJ/kg; H2O 174080; O 372180; H 50163; C 401470; S 125.51; N 986.98; P 108.97; B 2.1107; Cl 330.95; Br n.a.; F 21.106; I n.a.; Ag n.a.; As 0.42213; Ba n.a.; Cd 0.20051; Co 0.086772; Cr 0.65782; Cu 4.1482; Hg 0.31976; Mn 53.118; Mo 0.8302; Ni 0.55581; Pb 27.868; Sb n.a.; Se n.a.; Sn n.a.; V n.a.; Zn 17.807; Be n.a.; Sc n.a.; Sr n.a.; Ti n.a.; Tl n.a.; W n.a.; Si n.a.; Fe 15.479; Ca 130.89; Al 6.3322; K 65.412; Mg 197.56; Na 14.071; Share of carbon in waste that is biogenic 100%. Share of metals in waste not oxidised and bulk-recyclable (exclude very small or thin parts) Iron: 0%; Alu: 0%; Copper: 0%. One kg of this waste produces 0.007032 kg of slag and 0.002349 kg of residues, which are landfilled. Additional solidification with 0.0009395 kg of cement. Net energy production: 1.74MJ/kg electric energy and 3.49MJ/kg thermal energy. Recovery of metal scrap to recycling: 0g iron scrap, 0g aluminium scrap, 0g copper scrap.;;

## Included processes
Waste incineration from waste reception gate further downstream (excluding transport to the MSWI plant). Waste-specific air and water emisions from incineration, auxiliary material consumption for flue gas cleaning. Short-term emissions to river water and long-term emisisons to ground water from slag compartment (from bottom ash) and residual material landfill (from solidified fly ashes and scrubber slugde). Waste-specific process energy demands for MSWI and net energy generation.

## Geography
Specific to the technology mix encountered in Switzerland in 2010. Well applicable to modern incineration practices in Europe, North America or Japan.

## Technology
average Swiss MSWI plants in 2010 (grate incinerators) with electrostatic precipitator for fly ash (ESP), wet flue gas scrubber and 25% SNCR , 42.77% SCR-high dust , 32.68% SCR-low dust -DeNOx facilities and 0% without Denox (weighted according to mass of burnt waste, representing Swiss average). Efficiency of iron scrap separation from slag : 58%. Efficiency of non-ferrous scrap separation from slag : 31%. Gross electric efficiency technology mix 15.84% and Gross thermal efficiency technology mix 28.51%

## Time period
Waste composition as given in literature reference, theoretical data or other source. Transfer coefficients for modern MSWI.

## Reference product
- Disposal, wood untreated, 20% water, to municipal incineration [CH]: 1 kg
  SWITZERLAND

## Inputs from technosphere
- Slag compartment [CH]: 1.1071e-11 p; lognormal SD95 1.3217
  landfill infrastructure required for landfilling of bottom ash. uncertainty is calculated from uncertainties in waste composition and transfer coefficients in incinerator
- Chemicals organic, at plant [GLO]: 5.3457e-6 kg; lognormal SD95 13.562
  auxilliary inputs for the wastewater treatment stage of the incinerator plant. Proxy for (pure) Trisodium-trimercapto-s-triazine (CAS 17766-26-6), used as 15% diluted solution, aka TMT15. uncertainty calculated from uncertainty in average TMT15 input, of transfer coefficients in the incinerator, and the uncertainty of the waste composition of this waste
- Residual material landfill facility [CH]: 4.8934e-12 p; lognormal SD95 1.2895
  landfill infrastructure required for landfilling of incineration residues. uncertainty is calculated from uncertainties in waste composition and transfer coefficients in incinerator
- Disposal, cement, hydrated, 0% water, to residual material landfill [CH]: 0.0023488 kg; lognormal SD95 1.3741
  Hydrated cement output for solidification of landfilled residual material. Uncertainty calculated from uncertainty of the waste composition of this waste and transfer coefficients in the incinerator and of the solidification recipe.
- Process-specific burdens, slag compartment [CH]: 0.0062272 kg; lognormal SD95 1.3217
  mass-specific expenditures required for landfilling of bottom ash. uncertainty is calculated from uncertainties in waste composition and transfer coefficients in incinerator
- Titanium dioxide, production mix, at plant [RER]: 2.9147e-5 kg; lognormal SD95 5.1741
  Input to DeNOx stage (TiO2 catalyst carrier) uncertainty calculated from uncertainty in average DeNOx input, uncertainty in the share of thermal NOx, uncertainty of nitrogen content in average municipal waste and the uncertainty in nitrogen content in *this* waste.
- Cement, unspecified, at plant [CH]: 0.00093954 kg; lognormal SD95 1.3741
  Cement required for solidification of landfilled residual material. Uncertainty calculated from uncertainty of the waste composition of this waste, of transfer coefficients in the incinerator and of the solidification recipe.
- Iron (III) chloride, 40% in H2O, at plant [CH]: 2.1888e-6 kg; lognormal SD95 4.2708
  auxilliary inputs for the wastewater treatment stage of the incinerator plant. uncertainty calculated from uncertainty in average FeCl3 input, of transfer coefficients in the incinerator, and the uncertainty of the waste composition of this waste
- Municipal waste incineration plant [CH]: 2.5e-10 p; lognormal SD95 1
  demands per kilogram waste. uncertainty is heeded in the module
- Sodium hydroxide, 50% in H2O, production mix, at plant [RER]: 7.8237e-5 kg; lognormal SD95 3.4906
  auxilliary inputs for the flue gas treatment stage of the incinerator plant. uncertainty calculated from uncertainty in average NaOH input, of transfer coefficients in the incinerator, and the uncertainty of the waste composition of this waste
- Water, decarbonised, at plant [RER]: 0.18336 kg; lognormal SD95 4.2708
  Incinerator process water used in flue gas scrubber stage. uncertainty calculated from uncertainty in average water input, and the uncertainty of the waste composition of this waste
- Chemicals inorganic, at plant [GLO]: 2.8757e-5 kg; lognormal SD95 1.8842
  auxilliary inputs for the wastewater treatment stage of the incinerator plant. Proxy for Polyelectrolyte. uncertainty calculated from uncertainty in average Polyelectrolyte input, of transfer coefficients in the incinerator, and the uncertainty of the waste composition of this waste
- Hydrochloric acid, 30% in H2O, at plant [RER]: 7.5585e-6 kg; lognormal SD95 1.8842
  auxilliary inputs for the wastewater treatment stage of the incinerator plant. uncertainty calculated from uncertainty in average HCl input, of transfer coefficients in the incinerator, and the uncertainty of the waste composition of this waste
- Natural gas, burned in industrial furnace 1MW [CH]: 0.086996 MJ; lognormal SD95 3.3934
  Input to DeNOx stage, to heat up flue gas in low-dust SCR. uncertainty calculated from uncertainty in average DeNOx input, uncertainty in the share of thermal NOx, uncertainty of nitrogen content in average municipal waste and the uncertainty in nitrogen content in *this* waste.
- Transport, freight, lorry, 16t-32t gross weight, fleet average [CH]: 0.0039546 tkm; lognormal SD95 1.2612
  Transport services to transport incineration residues to landfills and to transport auxilliary inputs of the incinerator plant. uncertainty calculated from uncertainty in average auxiliary material input, the uncertainty of the waste composition of this waste and the uncertainty in generic transportation distances
- Chromium oxide, flakes, at plant [RER]: 5.9484e-7 kg; lognormal SD95 5.1741
  Input to DeNOx stage. uncertainty calculated from uncertainty in average DeNOx input, uncertainty in the share of thermal NOx, uncertainty of nitrogen content in average municipal waste and the uncertainty in nitrogen content in *this* waste.
- Quicklime, milled, packed, at plant [CH]: 0.00018236 kg; lognormal SD95 5.7577
  auxilliary inputs for the flue gas treatment stage of the incinerator plant. uncertainty calculated from uncertainty in average CaO input, of transfer coefficients in the incinerator, and the uncertainty of the waste composition of this waste
- Ammonia, liquid, at regional storehouse [CH]: 0.00046522 kg; lognormal SD95 3.3934
  Input to DeNOx stage (100% NH3). uncertainty calculated from uncertainty in average DeNOx input, uncertainty in the share of thermal NOx, uncertainty of nitrogen content in average municipal waste and the uncertainty in nitrogen content in *this* waste.
- Process-specific burdens, residual material landfill [CH]: 0.0023488 kg; lognormal SD95 1.2895
  mass-specific expenditures required for landfilling of incineration residues. uncertainty is calculated from uncertainties in waste composition and transfer coefficients in incinerator
- Transport, freight, rail [RER]: 0.0023019 tkm; lognormal SD95 1.2793
  (same comment as for Transport, freight, lorry, 16t-32t gross weight, fleet average)

## Emissions to nature
- Lead [emissions to water, groundwater, long-term]: 1.3474e-5 kg; lognormal SD95 62.407
  Long-term emissions from landfilling of incineration residues. uncertainty is calculated from uncertainties in waste composition and transfer coefficients in incinerator and landfills.
- Copper [emissions to water, groundwater, long-term]: 3.7052e-6 kg; lognormal SD95 10.317
  (same comment as for Lead)
- Boron [emissions to water, river]: 1.6538e-8 kg; lognormal SD95 13.473
  Emissions to water from waste composition and transfer coefficients in incinerator and landfills. uncertainty is calculated from uncertainties in waste composition and transfer coefficients in incinerator and landfills
- Cadmium [emissions to air, high. pop.]: 1.022e-10 kg; lognormal SD95 14.592
  Emission to air from waste composition and transfer coefficients. uncertainty is calculated from uncertainties in waste composition and transfer coefficients in incinerator
- Particulates, < 2.5 um [emissions to air, high. pop.]: 4.0219e-6 kg; lognormal SD95 3.6823
  Incomplete combustion product emitted to air. uncertainty calculated from uncertainty in average operation emissions, and the uncertainty of the flue gas volume from this waste.
- Magnesium [emissions to air, high. pop.]: 2.0838e-7 kg; lognormal SD95 6.6049
  (same comment as for Cadmium)
- Hydrogen fluoride [emissions to air, high. pop.]: 1.424e-7 kg; lognormal SD95 8.7811
  (same comment as for Cadmium)
- Calcium [emissions to water, groundwater, long-term]: 9.7493e-5 kg; lognormal SD95 6.4501
  (same comment as for Lead)
- Heat, waste [emissions to air, high. pop.]: 11.219 MJ; lognormal SD95 1.5794
  Waste heat generated from heating value of this waste plus any electricity required to process it. uncertainty is calculated from uncertainties in waste composition and uncertainties in energy efficiency and the uncertainty in internal energy demand
- NMVOC, non-methane volatile organic compounds, unspecified origin [emissions to air, high. pop.]: 1.5331e-6 kg; lognormal SD95 1.8411
  (same comment as for Particulates, < 2.5 um)
- Ammonia [emissions to air, high. pop.]: 5.4698e-7 kg; lognormal SD95 3.6379
  Nitrogen species emitted to air after DeNOx stage. uncertainty calculated from uncertainty in average N-emissions and uncertainty in the share of thermal NOx and the uncertainty in nitrogen content in *this* waste.
- Sodium [emissions to water, river]: 3.8233e-6 kg; lognormal SD95 5.2397
  (same comment as for Boron)
- Mercury [emissions to water, river]: 3.4727e-10 kg; lognormal SD95 9.1479
  (same comment as for Boron)
- Arsenic [emissions to air, high. pop.]: 3.3066e-9 kg; lognormal SD95 13.469
  (same comment as for Cadmium)
- COD, Chemical Oxygen Demand [emissions to water, river]: 0.00046963 kg; lognormal SD95 1.5306
  (same comment as for Boron)
- Cobalt [emissions to water, river]: 1.5721e-11 kg; lognormal SD95 19.126
  (same comment as for Boron)
- Benzene, pentachloro- [emissions to air, high. pop.]: 1.7798e-10 kg; lognormal SD95 1.8411
  (same comment as for Particulates, < 2.5 um)
- Cobalt [emissions to air, high. pop.]: 1.5781e-10 kg; lognormal SD95 16.16
  (same comment as for Cadmium)
- Cyanide [emissions to air, high. pop.]: 3.1626e-6 kg; lognormal SD95 10.962
  (same comment as for Ammonia)
- Lead [emissions to water, river]: 2.6657e-9 kg; lognormal SD95 7.0279
  (same comment as for Boron)
- Potassium [emissions to water, groundwater, long-term]: 5.085e-5 kg; lognormal SD95 4.527
  (same comment as for Lead)
- TOC, Total Organic Carbon [emissions to water, river]: 0.00020509 kg; lognormal SD95 1.5317
  (same comment as for Boron)
- Chromium VI [emissions to water, river]: 1.8385e-8 kg; lognormal SD95 13.389
  (same comment as for Boron)
- Molybdenum [emissions to water, groundwater, long-term]: 6.0236e-7 kg; lognormal SD95 12.468
  (same comment as for Lead)
- Manganese [emissions to air, high. pop.]: 1.0144e-8 kg; lognormal SD95 7.9524
  (same comment as for Cadmium)
- Potassium [emissions to air, high. pop.]: 3.2317e-7 kg; lognormal SD95 7.6176
  (same comment as for Cadmium)
- Hydrogen chloride [emissions to air, high. pop.]: 1.8886e-7 kg; lognormal SD95 6.16
  (same comment as for Cadmium)
- Molybdenum [emissions to air, high. pop.]: 1.0924e-9 kg; lognormal SD95 12.674
  (same comment as for Cadmium)
- Copper [emissions to air, high. pop.]: 3.7993e-10 kg; lognormal SD95 10.824
  (same comment as for Cadmium)
- DOC, Dissolved Organic Carbon [emissions to water, groundwater, long-term]: 0.001193 kg; lognormal SD95 1.368
  (same comment as for Lead)
- Dinitrogen monoxide [emissions to air, high. pop.]: 1.4721e-5 kg; lognormal SD95 10.962
  (same comment as for Ammonia)
- Iron [emissions to water, groundwater, long-term]: 7.8088e-6 kg; lognormal SD95 10.467
  (same comment as for Lead)
- BOD5, Biological Oxygen Demand [emissions to water, groundwater, long-term]: 0.00098616 kg; lognormal SD95 1.368
  (same comment as for Lead)
- Zinc [emissions to water, river]: 1.6066e-9 kg; lognormal SD95 7.1752
  (same comment as for Boron)
- Molybdenum [emissions to water, river]: 2.2674e-7 kg; lognormal SD95 8.3857
  (same comment as for Boron)
- Manganese [emissions to water, groundwater, long-term]: 3.277e-5 kg; lognormal SD95 17.254
  (same comment as for Lead)
- Magnesium [emissions to water, groundwater, long-term]: 0.00017495 kg; lognormal SD95 6.2793
  (same comment as for Lead)
- Chromium VI [emissions to water, groundwater, long-term]: 6.0344e-8 kg; lognormal SD95 17.727
  (same comment as for Lead)
- DOC, Dissolved Organic Carbon [emissions to water, river]: 0.00020509 kg; lognormal SD95 1.5317
  (same comment as for Boron)
- Iron [emissions to water, river]: 4.0691e-10 kg; lognormal SD95 10.481
  (same comment as for Boron)
- Nitrate [emissions to water, river]: 1.2582e-5 kg; lognormal SD95 3.8835
  (same comment as for Boron)
- Phenol, pentachloro- [emissions to air, high. pop.]: 1.467e-11 kg; lognormal SD95 1.8411
  (same comment as for Particulates, < 2.5 um)
- Potassium [emissions to water, river]: 1.4239e-5 kg; lognormal SD95 4.8802
  (same comment as for Boron)
- Methane, biogenic [emissions to air, high. pop.]: 5.053e-7 kg; lognormal SD95 1.8411
  (same comment as for Particulates, < 2.5 um)
- Fluoride [emissions to water, groundwater, long-term]: 1.8924e-5 kg; lognormal SD95 5.2802
  (same comment as for Lead)
- Benzo(a)pyrene [emissions to air, high. pop.]: 7.4963e-13 kg; lognormal SD95 3.6823
  (same comment as for Particulates, < 2.5 um)
- Manganese [emissions to water, river]: 8.2685e-9 kg; lognormal SD95 6.6678
  (same comment as for Boron)
- Zinc [emissions to air, high. pop.]: 1.1935e-8 kg; lognormal SD95 9.0601
  (same comment as for Cadmium)
- Nickel [emissions to air, high. pop.]: 6.9822e-10 kg; lognormal SD95 13.177
  (same comment as for Cadmium)
- Mercury [emissions to air, high. pop.]: 9.0665e-9 kg; lognormal SD95 13.764
  (same comment as for Cadmium)
- Nickel [emissions to water, groundwater, long-term]: 5.3351e-7 kg; lognormal SD95 12.674
  (same comment as for Lead)
- Cadmium [emissions to water, river]: 1.9218e-11 kg; lognormal SD95 11.334
  (same comment as for Boron)
- Nitrogen oxides [emissions to air, high. pop.]: 0.00017321 kg; lognormal SD95 3.6379
  sum of fuel-Nox and thermal-NOx emitted to air after DeNOx stage. uncertainty calculated from uncertainty in average N-emissions and uncertainty in the share of thermal NOx and the uncertainty in nitrogen content in *this* waste.
- Sulfate [emissions to water, groundwater, long-term]: 0.00031087 kg; lognormal SD95 4.4984
  (same comment as for Lead)
- Sodium [emissions to water, groundwater, long-term]: 1.0133e-5 kg; lognormal SD95 5.3555
  (same comment as for Lead)
- Copper [emissions to water, river]: 5.3751e-10 kg; lognormal SD95 9.0945
  (same comment as for Boron)
- Phosphate [emissions to water, groundwater, long-term]: 1.4601e-5 kg; lognormal SD95 90.669
  (same comment as for Lead)
- Sulfate [emissions to water, river]: 6.3673e-5 kg; lognormal SD95 3.8948
  (same comment as for Boron)
- Benzene [emissions to air, high. pop.]: 3.3687e-8 kg; lognormal SD95 1.8411
  (same comment as for Particulates, < 2.5 um)
- Fluoride [emissions to water, river]: 1.6139e-6 kg; lognormal SD95 5.6391
  (same comment as for Boron)
- COD, Chemical Oxygen Demand [emissions to water, groundwater, long-term]: 0.0030149 kg; lognormal SD95 1.368
  (same comment as for Lead)
- Chromium [emissions to air, high. pop.]: 5.7442e-10 kg; lognormal SD95 12.96
  (same comment as for Cadmium)
- Sodium [emissions to air, high. pop.]: 1.1553e-7 kg; lognormal SD95 9.2416
  (same comment as for Cadmium)
- Nickel [emissions to water, river]: 3.7344e-10 kg; lognormal SD95 19.238
  (same comment as for Boron)
- Dioxin, 2,3,7,8 Tetrachlorodibenzo-p- [emissions to air, high. pop.]: 6.7369e-14 kg; lognormal SD95 3.6823
  (same comment as for Particulates, < 2.5 um)
- Mercury [emissions to water, groundwater, long-term]: 2.0366e-8 kg; lognormal SD95 36.84
  (same comment as for Lead)
- Nitrate [emissions to water, groundwater, long-term]: 3.5499e-5 kg; lognormal SD95 5.1072
  (same comment as for Lead)
- Cobalt [emissions to water, groundwater, long-term]: 7.0684e-8 kg; lognormal SD95 14.955
  (same comment as for Lead)
- Phosphate [emissions to water, river]: 6.1261e-8 kg; lognormal SD95 5.2181
  (same comment as for Boron)
- TOC, Total Organic Carbon [emissions to water, groundwater, long-term]: 0.001193 kg; lognormal SD95 1.368
  (same comment as for Lead)
- Zinc [emissions to water, groundwater, long-term]: 5.4151e-6 kg; lognormal SD95 37.935
  (same comment as for Lead)
- Sulfur dioxide [emissions to air, high. pop.]: 1.3348e-6 kg; lognormal SD95 6.9787
  (same comment as for Cadmium)
- Boron [emissions to water, groundwater, long-term]: 1.7949e-6 kg; lognormal SD95 9.7551
  (same comment as for Lead)
- Benzene, hexachloro- [emissions to air, high. pop.]: 7.0437e-11 kg; lognormal SD95 1.8411
  (same comment as for Particulates, < 2.5 um)
- Chromium [emissions to water, river]: 5.1078e-11 kg; lognormal SD95 13.148
  (same comment as for Boron)
- Cadmium [emissions to water, groundwater, long-term]: 1.4632e-8 kg; lognormal SD95 216.41
  (same comment as for Lead)
- Chloride [emissions to water, groundwater, long-term]: 7.669e-5 kg; lognormal SD95 5.9723
  (same comment as for Lead)
- Calcium [emissions to air, high. pop.]: 1.0301e-6 kg; lognormal SD95 6.9169
  (same comment as for Cadmium)
- Toluene [emissions to air, high. pop.]: 6.7373e-8 kg; lognormal SD95 1.8411
  (same comment as for Particulates, < 2.5 um)
- Heat, waste [emissions to water, river]: 2.8864 MJ; lognormal SD95 1.5794
  (same comment as for Heat, waste)
- Aluminium [emissions to water, groundwater, long-term]: 4.5791e-6 kg; lognormal SD95 9.1937
  (same comment as for Lead)
- Particulates, > 2.5 um, and < 10um [emissions to air, high. pop.]: 2.0211e-8 kg; lognormal SD95 2.4548
  (same comment as for Particulates, < 2.5 um)
- Arsenic [emissions to water, groundwater, long-term]: 1.2641e-7 kg; lognormal SD95 13.374
  (same comment as for Lead)
- Carbon monoxide, biogenic [emissions to air, high. pop.]: 5.7263e-5 kg; lognormal SD95 6.1371
  (same comment as for Particulates, < 2.5 um)
- Chloride [emissions to water, river]: 0.00025408 kg; lognormal SD95 5.1037
  (same comment as for Boron)
- Carbon dioxide, biogenic [emissions to air, high. pop.]: 1.4631 kg; lognormal SD95 1.3576
  (same comment as for Cadmium)
- Aluminium [emissions to air, high. pop.]: 5.1627e-12 kg; lognormal SD95 10.693
  (same comment as for Cadmium)
- Magnesium [emissions to water, river]: 9.218e-7 kg; lognormal SD95 7.4085
  (same comment as for Boron)
- Phosphorus [emissions to air, high. pop.]: 1.1074e-7 kg; lognormal SD95 7.1824
  (same comment as for Cadmium)
- Lead [emissions to air, high. pop.]: 2.2959e-9 kg; lognormal SD95 8.7025
  (same comment as for Cadmium)
- Arsenic [emissions to water, river]: 2.9241e-7 kg; lognormal SD95 12.166
  (same comment as for Boron)
- BOD5, Biological Oxygen Demand [emissions to water, river]: 0.0004636 kg; lognormal SD95 1.5394
  (same comment as for Boron)
- Calcium [emissions to water, river]: 1.449e-6 kg; lognormal SD95 5.3368
  (same comment as for Boron)
- Iron [emissions to air, high. pop.]: 2.774e-11 kg; lognormal SD95 9.5481
  (same comment as for Cadmium)
- Aluminium [emissions to water, river]: 6.8527e-10 kg; lognormal SD95 11.114
  (same comment as for Boron)

## Sampling procedure
fully waste-specific calculation based on literature data for average MSWI operation performance

## Extrapolations
Typical elemental transfer coefficients from current studies for modern MSWI, completed with data from coal power plants and estimates, adapted for inert/burnable waste.

## Uncertainty adjustments
uncertainty of waste input composition data derived from generic formula GSD(c) = N*ln(c)+1

## Sources
- Doka G., 2013, 2013 - Updates LCI waste treatment services - Doka, -, Doka LCA, Zuerich, CH
Doka G. (2013) Updates to Life Cycle Inventories of Waste Treatment Services - part II: waste incineration. Doka LCA. Zurich.
Type: Separate publication
Source: Report to document the 2013 changes to the MSWI incinerator model and datasets (URL: http://www.doka.ch/ecoinventMSWIupdateLCI2013.pdf). To be read with the ecoinvent Nr 13 report (Doka 2009, Life Cycle Inventories of Waste Treatment Services) for ecoinvent v2.2.
First author: Doka G.
Year: 2013
Place of publication: Zurich
Publisher: Doka LCA
Original title: Updates to Life Cycle Inventories of Waste Treatment Services - part II: waste incineration

## Validation
Proof reading validation: Passed.; Other validation: none;
