# Glass cullets, sorted, at sorting plant

Dataset: EcoSpold 1, unit process
Functional unit: 1 kg
Category: glass / waste glass
Geography: RER
Time period: 2000-01 to 2000-12
Generated by: Roland Hischier
accessRestrictedTo: 0
copyright: true

## General comment
A production site with a production amount of 3 times 250 t/d (resulting in 266 kt per year) and a total life span of 50 a is assumed here.;

## Included processes
This module includes the efforts for sorting collected glass cullets (energy, materials). No transport efforts are included for the used auxillaries.

## Geography
module is based on information from a Swiss and a German sorting site and valuable for European conditions

## Technology
Typical technology in the middle of the 90"s in Germany and Switzerland

## Reference product
- Glass cullets, sorted, at sorting plant [RER]: 1 kg
  Europe

## Inputs from technosphere
- Disposal, inert waste, 5% water, to construction waste landfill [CH]: 0.00426 kg; lognormal SD95 1.25
  (2,4,2,3,1,5); based on data from 1 DE site
- Disposal, glass, 0% water, to construction waste landfill [CH]: 0.055 kg; lognormal SD95 1.25
  (2,4,2,3,1,5); based on data from 1 DE site
- Glass, from public collection, unsorted [RER]: 1.08 kg; lognormal SD95 1.23
  (2,3,2,3,1,5); based on data from 2 sites in CH & DE
- Glass sorting site [RER]: 2e-10 p; lognormal SD95 3.51
  (5,4,1,3,4,5); own estimation
- Disposal, plastics, mixture, 15.3% water, to municipal incineration [CH]: 0.00386 kg; lognormal SD95 1.25
  (2,4,2,3,1,5); based on data from 1 DE site
- Disposal, municipal solid waste, 22.9% water, to municipal incineration [CH]: 0.00129 kg; lognormal SD95 1.25
  (2,4,2,3,1,5); based on data from 1 DE site
- Disposal, paper, 11.2% water, to municipal incineration [CH]: 0.00378 kg; lognormal SD95 1.25
  (2,4,2,3,1,5); based on data from 1 DE site
- Transport, freight, lorry, fleet average [RER]: 0.0151 tkm; lognormal SD95 1.23
  (2,3,2,3,1,5); based on data from 2 sites in CH & DE
- Disposal, aluminium, 0% water, to sanitary landfill [CH]: 0.00514 kg; lognormal SD95 1.25
  (2,4,2,3,1,5); based on data from 1 DE site
- Electricity, medium voltage, production ENTSO-E, at grid: 0.00375 kWh; lognormal SD95 1.23
  (2,3,2,3,1,5); based on data from 2 sites in CH & DE
- Lubricating oil, at plant [RER]: 1e-6 kg; lognormal SD95 1.23
  (2,3,2,3,1,5); based on data from 2 sites in CH & DE
- Treatment, glass production effluent, to wastewater treatment, class 2 [CH]: 5.4e-7 m3; lognormal SD95 1.25
  (2,4,2,3,1,5); based on data from 1 DE site

## Inputs from nature
- Water, unspecified natural origin/m3 [resources, in water]: 5.4e-7 m3; lognormal SD95 1.25
  (2,4,2,3,1,5); based on data from 1 DE site
- Water, cooling, unspecified natural origin/m3 [resources, in water]: 0.000251 m3; lognormal SD95 1.25
  (2,4,2,3,1,5); based on data from 1 DE site

## Emissions to nature
- Water [emissions to water, unspecified]: 0.000513, 0.23845 kg (2 entries); lognormal SD95 2.5196
  (5,5,5,5,5,BU:1.05); All uncertainty-values set to 5.0 by default. Balance of input water

## Sources
- Hischier R., 2007, 2007 - LCI packagings and graphical papers - Hischier, Final report ecoinvent data v2.0, 11, Swiss Centre for LCI, Empa - TSL, Duebendorf and St. Gallen, CH
Hischier R. (2007) Life Cycle Inventories of Packaging and Graphical Paper. Final report ecoinvent data v2.0. Volume: 11. Swiss Centre for LCI, Empa - TSL. Dübendorf, CH.
Type: Measurement on site
Source: CD-ROM
First author: Hischier R.
Year: 2007
Title of anthology: Final report ecoinvent data v2.0
Place of publication: Dübendorf, CH
Publisher: Swiss Centre for LCI, Empa - TSL
Volume No: 11

## Validation
Proof reading validation: passed; Other validation: none;
