# xx Disposal, hard coal ash from stove, 0% water, to sanitary landfill

Dataset: EcoSpold 1, unit process
Functional unit: 1 kg
Category: waste treatment, obsolete / landfill, obsolete\sanitary landfill, obsolete
Geography: CH
Time period: 2000-01 to 2000-12
Generated by: Gabor Doka
accessRestrictedTo: 0
copyright: true

## General comment
Inventoried waste contains 100% hard coal ash small scale; . waste composition (wet, in ppm): upper heating value 0.4712 MJ/kg; H2O n.a.; O 298030; H n.a.; C 100000; S n.a.; N n.a.; P 980; B 350; Cl n.a.; Br 97; F n.a.; I 16.4; Ag n.a.; As 92; Ba 1960; Cd 4.5; Co 49; Cr 192; Cu 146.25; Hg 0.1; Mn 693; Mo 28.5; Ni 194; Pb 376; Sb 9.5; Se 7; Sn 19.8; V 388; Zn 475; Be 19.6; Sc 39.6; Sr 1940; Ti 5880; Tl 9.5; W n.a.; Si 245000; Fe 68600; Ca 19600; Al 166600; K 19600; Mg 58800; Na 9800; Share of carbon in waste that is biogenic 0%. Overall degradability of waste during 100 years: 5%.;;

## Included processes
Waste-specific short-term emissions to air via landfill gas incineration and landfill leachate. Burdens from treatment of short-term leachate (0-100a) in wastewater treatment plant (including WWTP sludge disposal in municipal incinerator). Long-term emissions from landfill to groundwater (after base lining failure).

## Geography
Technology encountered in Switzerland in 2000. Landfill includes base seal, leachate collection system, treatment of leachate in municipal wastewater treatment plant.

## Technology
Swiss municipal sanitary landfill for biogenic or untreated municipal waste ("reactive organic landfill"). Landfill gas and leachate collection system. Recultivation and monitoring for 150 years after closure.

## Reference product
- xx Disposal, hard coal ash from stove, 0% water, to sanitary landfill [CH]: 1 kg
  SWITZERLAND

## Inputs from technosphere
- Quicklime, milled, packed, at plant [CH]: 7.9e-10 kg; lognormal SD95 9.22
  burden from incineration of sludge from wastewater treatment of the short-term leachate (0-100a). uncertainty is calculated from uncertainties in waste composition and transfer coefficients in incinerator and uncertainty of waste decomposition and short-term leaching in sanitary landfill
- Chemicals inorganic, at plant [GLO]: 6.29e-8 kg; lognormal SD95 6.05
  (same comment as for Quicklime, milled, packed, at plant)
- Chemicals organic, at plant [GLO]: 6.13e-8 kg; lognormal SD95 14.1
  (same comment as for Quicklime, milled, packed, at plant)
- Heat from waste, at municipal waste incineration plant [CH]: 0.00337 MJ; lognormal SD95 2.4
  (same comment as for Quicklime, milled, packed, at plant)
- Light fuel oil, burned in boiler 100kW, non-modulating [CH]: 0.00142 MJ; lognormal SD95 2.59
  burden from wastewater treatment of the short-term leachate (0-100a). Uncertainty calculated from unertainty of the waste composition of this waste, uncertainty in waste decomposition and short-term leaching in sanitary landfill
- Process-specific burdens, residual material landfill [CH]: 0.00032 kg; lognormal SD95 2.55
  (same comment as for Quicklime, milled, packed, at plant)
- Disposal, paper, 11.2% water, to municipal incineration [CH]: 3.88e-5 kg; lognormal SD95 1.13
  (same comment as for Light fuel oil, burned in boiler 100kW, non-modulating)
- Wastewater treatment plant, class 3 [CH]: 1.42e-11 p; lognormal SD95 1.1
  (same comment as for Light fuel oil, burned in boiler 100kW, non-modulating)
- Iron (III) chloride, 40% in H2O, at plant [CH]: 1.8e-5 kg; lognormal SD95 8.79
  (same comment as for Quicklime, milled, packed, at plant)
- Sodium hydroxide, 50% in H2O, production mix, at plant [RER]: 4.36e-9 kg; lognormal SD95 9.19
  (same comment as for Quicklime, milled, packed, at plant)
- Natural gas, burned in boiler modulating >100kW [RER]: 0.00192 MJ; lognormal SD95 2.59
  (same comment as for Light fuel oil, burned in boiler 100kW, non-modulating)
- Disposal, cement, hydrated, 0% water, to residual material landfill [CH]: 0.00032 kg; lognormal SD95 2.57
  (same comment as for Quicklime, milled, packed, at plant)
- Transport, freight, lorry, 16t-32t gross weight, fleet average [CH]: 0.00019 tkm; lognormal SD95 2.54
  (same comment as for Quicklime, milled, packed, at plant)
- Electricity, low voltage, at grid [CH]: 0.000779 kWh; lognormal SD95 2.33
  (same comment as for Light fuel oil, burned in boiler 100kW, non-modulating)
- Slag compartment [CH]: 4.07e-12 p; lognormal SD95 2.71
  (same comment as for Quicklime, milled, packed, at plant)
- Hydrochloric acid, 30% in H2O, at plant [RER]: 3.78e-8 kg; lognormal SD95 6.05
  (same comment as for Quicklime, milled, packed, at plant)
- Iron sulphate, at plant [RER]: 1.3e-5 kg; lognormal SD95 8.93
  (same comment as for Light fuel oil, burned in boiler 100kW, non-modulating)
- Process-specific burdens, sanitary landfill [CH]: 1 kg; lognormal SD95 1
  demands per kilogram waste. uncertainty is heeded in the module
- Process-specific burdens, slag compartment [CH]: 0.00229 kg; lognormal SD95 2.71
  (same comment as for Quicklime, milled, packed, at plant)
- Municipal waste incineration plant [CH]: 1.01e-12 p; lognormal SD95 2.4
  burden from incineration of sludge from wastewater treatment of the short-term leachate (0-100a).
- Process-specific burdens, municipal waste incineration [CH]: 0.00402 kg; lognormal SD95 2.4
  (same comment as for Municipal waste incineration plant)
- Electricity from waste, at municipal waste incineration plant [CH]: 0.000578 kWh; lognormal SD95 3.46
  (same comment as for Quicklime, milled, packed, at plant)
- Disposal, plastics, mixture, 15.3% water, to municipal incineration [CH]: 3.88e-5 kg; lognormal SD95 1.13
  (same comment as for Light fuel oil, burned in boiler 100kW, non-modulating)
- Sewer grid, class 3 [CH]: 5.45e-10 km; lognormal SD95 1.1
  (same comment as for Light fuel oil, burned in boiler 100kW, non-modulating)
- Sanitary landfill facility [CH]: 5.56e-10 p; lognormal SD95 1
  demands per kilogram waste. uncertainty is heeded in the module
- Cement, unspecified, at plant [CH]: 0.000128 kg; lognormal SD95 2.57
  (same comment as for Quicklime, milled, packed, at plant)
- Residual material landfill facility [CH]: 6.66e-13 p; lognormal SD95 2.55
  (same comment as for Quicklime, milled, packed, at plant)
- Aluminium sulphate, powder, at plant [RER]: 3.51e-6 kg; lognormal SD95 8.93
  (same comment as for Light fuel oil, burned in boiler 100kW, non-modulating)
- Transport, freight, rail [RER]: 3.4e-5 tkm; lognormal SD95 5.35
  (same comment as for Quicklime, milled, packed, at plant)

## Emissions to nature
- Arsenic [emissions to water, groundwater, long-term]: 9.13e-5 kg; lognormal SD95 7.18
  Emissions from long-term leachate (>100a) directly from MSW landfill and indirectly via incineration of treatement sludge from leachate treatement. Uncertainty calculated depending on waste input and uncertainty of long-term transfer coefficents in landfill.
- Strontium [emissions to air, low. pop.]: 1.41e-9 kg; lognormal SD95 19.1
  burden from direct release or incineration of landfill biogas. Uncertainty calculated from unertainty of the waste composition of this waste, uncertainty in waste decomposition and short-term leaching in sanitary landfill
- Calcium [emissions to water, river]: 0.000115 kg; lognormal SD95 5.36
  Emissions from short-term leachate treatment and incineration of resulting sludge. Uncertainty calculated depending on waste input and uncertainty of transfer coefficents in landfill, wastewater treatment and incineration model.
- Arsenic [emissions to air, high. pop.]: 2.33e-10 kg; lognormal SD95 10.6
  (same comment as for Calcium)
- Molybdenum [emissions to water, groundwater, long-term]: 1.13e-5 kg; lognormal SD95 10.1
  (same comment as for Arsenic)
- Manganese [emissions to water, groundwater, long-term]: 0.000656 kg; lognormal SD95 5.18
  (same comment as for Arsenic)
- Bromine [emissions to water, river]: 1.22e-5 kg; lognormal SD95 7.89
  Emissions from short-term leachate treatment. Uncertainty calculated depending on waste input and uncertainty of transfer coefficents in landfill and wastewater treatment.
- Carbon dioxide, fossil [emissions to air, low. pop.]: 0.0125 kg; lognormal SD95 3.07
  (same comment as for Strontium)
- Barium [emissions to water, river]: 6.75e-6 kg; lognormal SD95 5.77
  (same comment as for Calcium)
- Selenium [emissions to water, river]: 2.47e-8 kg; lognormal SD95 14.2
  (same comment as for Calcium)
- Vanadium [emissions to air, low. pop.]: 5.11e-10 kg; lognormal SD95 20.8
  (same comment as for Strontium)
- Magnesium [emissions to air, high. pop.]: 2.45e-7 kg; lognormal SD95 3.78
  (same comment as for Calcium)
- Carbon dioxide, fossil [emissions to air, high. pop.]: 0.000418 kg; lognormal SD95 5.52
  (same comment as for Calcium)
- Tin [emissions to water, river]: 2.44e-9 kg; lognormal SD95 16.8
  (same comment as for Calcium)
- Antimony [emissions to water, groundwater, long-term]: 9.64e-7 kg; lognormal SD95 24.9
  (same comment as for Arsenic)
- Aluminium [emissions to water, groundwater, long-term]: 0.166 kg; lognormal SD95 1.75
  (same comment as for Arsenic)
- Cadmium [emissions to air, low. pop.]: 2.64e-10 kg; lognormal SD95 22.2
  (same comment as for Strontium)
- Molybdenum [emissions to air, high. pop.]: 1.48e-10 kg; lognormal SD95 12.6
  (same comment as for Calcium)
- Lead [emissions to water, groundwater, long-term]: 0.000376 kg; lognormal SD95 5.89
  (same comment as for Arsenic)
- Silicon [emissions to water, river]: 3.68e-5 kg; lognormal SD95 4.78
  (same comment as for Calcium)
- Molybdenum [emissions to air, low. pop.]: 3.76e-11 kg; lognormal SD95 26
  (same comment as for Strontium)
- Mercury [emissions to air, high. pop.]: 5.8e-16 kg; lognormal SD95 22.4
  (same comment as for Calcium)
- Calcium [emissions to air, high. pop.]: 2.09e-8 kg; lognormal SD95 5.58
  (same comment as for Calcium)
- Calcium [emissions to air, low. pop.]: 3.19e-8 kg; lognormal SD95 14.5
  (same comment as for Strontium)
- Antimony [emissions to air, low. pop.]: 1.25e-11 kg; lognormal SD95 28.4
  (same comment as for Strontium)
- Methane, fossil [emissions to air, high. pop.]: 8.44e-7 kg; lognormal SD95 5.65
  (same comment as for Calcium)
- Thallium [emissions to air, high. pop.]: 1.36e-11 kg; lognormal SD95 15
  (same comment as for Calcium)
- Boron [emissions to air, high. pop.]: 6.96e-6 kg; lognormal SD95 6.31
  (same comment as for Calcium)
- Thallium [emissions to air, low. pop.]: 6.9e-12 kg; lognormal SD95 29.7
  (same comment as for Strontium)
- Antimony [emissions to water, river]: 3.4e-8 kg; lognormal SD95 13.8
  (same comment as for Calcium)
- Phosphate [emissions to water, river]: 2.96e-6 kg; lognormal SD95 8.8
  (same comment as for Calcium)
- Chromium [emissions to air, high. pop.]: 3.98e-15 kg; lognormal SD95 13.7
  (same comment as for Calcium)
- Iodide [emissions to water, groundwater, long-term]: 1.43e-5 kg; lognormal SD95 8.97
  (same comment as for Arsenic)
- Selenium [emissions to air, high. pop.]: 9.1e-17 kg; lognormal SD95 15.7
  (same comment as for Calcium)
- BOD5, Biological Oxygen Demand [emissions to water, groundwater, long-term]: 0.00631 kg; lognormal SD95 4.74
  (same comment as for Arsenic)
- Manganese [emissions to air, low. pop.]: 9.92e-9 kg; lognormal SD95 16
  (same comment as for Strontium)
- DOC, Dissolved Organic Carbon [emissions to water, groundwater, long-term]: 0.0244 kg; lognormal SD95 4.74
  (same comment as for Arsenic)
- Silicon [emissions to water, groundwater, long-term]: 0.00473 kg; lognormal SD95 52.7
  (same comment as for Arsenic)
- Beryllium [emissions to water, groundwater, long-term]: 1.96e-5 kg; lognormal SD95 8.75
  (same comment as for Arsenic)
- Lead [emissions to air, high. pop.]: 3.66e-12 kg; lognormal SD95 13.2
  (same comment as for Calcium)
- Scandium [emissions to air, low. pop.]: 4.46e-11 kg; lognormal SD95 25.6
  (same comment as for Strontium)
- Lead [emissions to water, river]: 1.22e-8 kg; lognormal SD95 12.6
  (same comment as for Calcium)
- Heat, waste [emissions to air, low. pop.]: 0.0681 MJ; lognormal SD95 3.66
  (same comment as for Strontium)
- Strontium [emissions to water, river]: 2.86e-6 kg; lognormal SD95 8.07
  (same comment as for Calcium)
- Barium [emissions to air, low. pop.]: 2.81e-8 kg; lognormal SD95 14.4
  (same comment as for Strontium)
- Iodide [emissions to water, river]: 2.06e-6 kg; lognormal SD95 9.81
  (same comment as for Bromine)
- Sodium [emissions to water, groundwater, long-term]: 0.00777 kg; lognormal SD95 3.39
  (same comment as for Arsenic)
- Silicon [emissions to air, high. pop.]: 1.34e-6 kg; lognormal SD95 4.85
  (same comment as for Calcium)
- Calcium [emissions to water, groundwater, long-term]: 0.0195 kg; lognormal SD95 2.93
  (same comment as for Arsenic)
- Nickel [emissions to water, river]: 3.42e-7 kg; lognormal SD95 10.6
  (same comment as for Calcium)
- Heat, waste [emissions to water, river]: 0.00266 MJ; lognormal SD95 5.51
  (same comment as for Quicklime, milled, packed, at plant)
- Arsenic [emissions to air, low. pop.]: 1.16e-8 kg; lognormal SD95 15.7
  (same comment as for Strontium)
- Selenium [emissions to air, low. pop.]: 9.23e-12 kg; lognormal SD95 29.1
  (same comment as for Strontium)
- COD, Chemical Oxygen Demand [emissions to water, groundwater, long-term]: 0.0266 kg; lognormal SD95 4.74
  (same comment as for Arsenic)
- Scandium [emissions to air, high. pop.]: 4.39e-11 kg; lognormal SD95 12.5
  (same comment as for Calcium)
- Heat, waste [emissions to air, high. pop.]: 0.00375 MJ; lognormal SD95 2.53
  (same comment as for Quicklime, milled, packed, at plant)
- Mercury [emissions to air, low. pop.]: 1.37e-10 kg; lognormal SD95 23.3
  (same comment as for Strontium)
- NMVOC, non-methane volatile organic compounds, unspecified origin [emissions to air, high. pop.]: 3.72e-9 kg; lognormal SD95 6.64
  (same comment as for Calcium)
- Cadmium [emissions to water, groundwater, long-term]: 4.46e-6 kg; lognormal SD95 10.4
  (same comment as for Arsenic)
- Iron [emissions to water, river]: 2.39e-5 kg; lognormal SD95 6.39
  (same comment as for Calcium)
- Methane, fossil [emissions to air, low. pop.]: 0.00192 kg; lognormal SD95 3.29
  (same comment as for Strontium)
- Chromium [emissions to air, low. pop.]: 2.74e-11 kg; lognormal SD95 26.5
  (same comment as for Strontium)
- Strontium [emissions to air, high. pop.]: 2.78e-10 kg; lognormal SD95 8.46
  (same comment as for Calcium)
- Zinc [emissions to air, low. pop.]: 2.5e-10 kg; lognormal SD95 22.1
  (same comment as for Strontium)
- Chloride [emissions to water, river]: 1.16e-5 kg; lognormal SD95 8.93
  (same comment as for Bromine)
- Aluminium [emissions to air, high. pop.]: 6.12e-7 kg; lognormal SD95 5.02
  (same comment as for Calcium)
- Titanium [emissions to air, low. pop.]: 3.67e-9 kg; lognormal SD95 17.6
  (same comment as for Strontium)
- Copper [emissions to water, groundwater, long-term]: 0.000146 kg; lognormal SD95 6.75
  (same comment as for Arsenic)
- Carbon monoxide, fossil [emissions to air, high. pop.]: 1.15e-6 kg; lognormal SD95 3.49
  (same comment as for Calcium)
- Magnesium [emissions to water, groundwater, long-term]: 0.0571 kg; lognormal SD95 2.28
  (same comment as for Arsenic)
- Beryllium [emissions to air, low. pop.]: 1.42e-11 kg; lognormal SD95 28.1
  (same comment as for Strontium)
- Vanadium [emissions to water, river]: 1.04e-6 kg; lognormal SD95 9.16
  (same comment as for Calcium)
- Cobalt [emissions to air, high. pop.]: 1.23e-14 kg; lognormal SD95 11.5
  (same comment as for Calcium)
- Aluminium [emissions to air, low. pop.]: 1.04e-7 kg; lognormal SD95 13.6
  (same comment as for Strontium)
- Copper [emissions to air, high. pop.]: 1.96e-13 kg; lognormal SD95 14.9
  (same comment as for Calcium)
- Mercury [emissions to water, river]: 1.08e-10 kg; lognormal SD95 21.6
  (same comment as for Calcium)
- Zinc [emissions to water, river]: 3.48e-7 kg; lognormal SD95 9.77
  (same comment as for Calcium)
- Chromium VI [emissions to water, river]: 5.73e-8 kg; lognormal SD95 12.6
  (same comment as for Calcium)
- Barium [emissions to water, groundwater, long-term]: 0.00194 kg; lognormal SD95 4.26
  (same comment as for Arsenic)
- COD, Chemical Oxygen Demand [emissions to water, river]: 9.18e-5 kg; lognormal SD95 5.51
  (same comment as for Calcium)
- Cobalt [emissions to water, groundwater, long-term]: 4.86e-5 kg; lognormal SD95 7.74
  (same comment as for Arsenic)
- Tin [emissions to air, low. pop.]: 1.46e-12 kg; lognormal SD95 33.2
  (same comment as for Strontium)
- Nickel [emissions to air, low. pop.]: 1.41e-10 kg; lognormal SD95 23.3
  (same comment as for Strontium)
- Molybdenum [emissions to water, river]: 8.89e-8 kg; lognormal SD95 12.3
  (same comment as for Calcium)
- Potassium [emissions to air, low. pop.]: 1.79e-7 kg; lognormal SD95 12.2
  (same comment as for Strontium)
- Cobalt [emissions to water, river]: 4e-7 kg; lognormal SD95 10.4
  (same comment as for Calcium)
- Titanium [emissions to air, high. pop.]: 7.24e-9 kg; lognormal SD95 7.43
  (same comment as for Calcium)
- Zinc [emissions to water, groundwater, long-term]: 0.000391 kg; lognormal SD95 5.75
  (same comment as for Arsenic)
- Arsenic [emissions to water, river]: 7.28e-7 kg; lognormal SD95 10.2
  (same comment as for Calcium)
- Iodine [emissions to air, low. pop.]: 2.89e-8 kg; lognormal SD95 14.4
  (same comment as for Strontium)
- Titanium [emissions to water, river]: 7.46e-6 kg; lognormal SD95 7.16
  (same comment as for Calcium)
- Silicon [emissions to air, low. pop.]: 1.53e-7 kg; lognormal SD95 13.3
  (same comment as for Strontium)
- Thallium [emissions to water, river]: 1.4e-8 kg; lognormal SD95 14.6
  (same comment as for Calcium)
- Iron [emissions to air, low. pop.]: 1.18e-8 kg; lognormal SD95 16.2
  (same comment as for Strontium)
- Antimony [emissions to air, high. pop.]: 2.47e-12 kg; lognormal SD95 21.6
  (same comment as for Calcium)
- Strontium [emissions to water, groundwater, long-term]: 0.00194 kg; lognormal SD95 4.53
  (same comment as for Arsenic)
- Manganese [emissions to air, high. pop.]: 1.06e-13 kg; lognormal SD95 7.54
  (same comment as for Calcium)
- TOC, Total Organic Carbon [emissions to water, river]: 2.32e-5 kg; lognormal SD95 5.52
  (same comment as for Calcium)
- Magnesium [emissions to air, low. pop.]: 4.54e-7 kg; lognormal SD95 11.3
  (same comment as for Strontium)
- Vanadium [emissions to air, high. pop.]: 1.01e-10 kg; lognormal SD95 9.58
  (same comment as for Calcium)
- Copper [emissions to air, low. pop.]: 1.02e-11 kg; lognormal SD95 28.6
  (same comment as for Strontium)
- Mercury [emissions to water, groundwater, long-term]: 9.95e-8 kg; lognormal SD95 15.3
  (same comment as for Arsenic)
- Chromium [emissions to water, river]: 1.72e-10 kg; lognormal SD95 12.9
  (same comment as for Calcium)
- Beryllium [emissions to water, river]: 2.89e-8 kg; lognormal SD95 13.5
  (same comment as for Calcium)
- Scandium [emissions to water, river]: 9.58e-8 kg; lognormal SD95 12.1
  (same comment as for Calcium)
- Tin [emissions to air, high. pop.]: 4.5e-12 kg; lognormal SD95 17.3
  (same comment as for Calcium)
- Nickel [emissions to air, high. pop.]: 9.58e-15 kg; lognormal SD95 11.7
  (same comment as for Calcium)
- Cobalt [emissions to air, low. pop.]: 1.97e-10 kg; lognormal SD95 22.7
  (same comment as for Strontium)
- Phosphorus [emissions to air, high. pop.]: 1.74e-9 kg; lognormal SD95 9.08
  (same comment as for Calcium)
- Sodium [emissions to air, low. pop.]: 5.07e-7 kg; lognormal SD95 10.8
  (same comment as for Strontium)
- Chromium VI [emissions to water, groundwater, long-term]: 8.75e-7 kg; lognormal SD95 303
  (same comment as for Arsenic)
- Iron [emissions to water, groundwater, long-term]: 0.00482 kg; lognormal SD95 16
  (same comment as for Arsenic)
- Magnesium [emissions to water, river]: 0.00164 kg; lognormal SD95 3.59
  (same comment as for Calcium)
- Phosphate [emissions to water, groundwater, long-term]: 2.05e-5 kg; lognormal SD95 191
  (same comment as for Arsenic)
- Cadmium [emissions to water, river]: 2.01e-8 kg; lognormal SD95 14.1
  (same comment as for Calcium)
- Copper [emissions to water, river]: 9.29e-9 kg; lognormal SD95 14.1
  (same comment as for Calcium)
- Carbon monoxide, fossil [emissions to air, low. pop.]: 7.1e-7 kg; lognormal SD95 7.1
  (same comment as for Strontium)
- Barium [emissions to air, high. pop.]: 1.06e-7 kg; lognormal SD95 5.88
  (same comment as for Calcium)
- Zinc [emissions to air, high. pop.]: 1.27e-11 kg; lognormal SD95 10.3
  (same comment as for Calcium)
- Sodium [emissions to water, river]: 0.00203 kg; lognormal SD95 3.72
  (same comment as for Bromine)
- TOC, Total Organic Carbon [emissions to water, groundwater, long-term]: 0.0244 kg; lognormal SD95 4.74
  (same comment as for Arsenic)
- Beryllium [emissions to air, high. pop.]: 2.81e-11 kg; lognormal SD95 13.9
  (same comment as for Calcium)
- NMVOC, non-methane volatile organic compounds, unspecified origin [emissions to air, low. pop.]: 1.34e-8 kg; lognormal SD95 3.29
  (same comment as for Strontium)
- Bromine [emissions to water, groundwater, long-term]: 8.46e-5 kg; lognormal SD95 7.15
  (same comment as for Arsenic)
- BOD5, Biological Oxygen Demand [emissions to water, river]: 2.89e-5 kg; lognormal SD95 5.53
  (same comment as for Calcium)
- Sulfate [emissions to water, river]: 1.12e-5 kg; lognormal SD95 8.93
  (same comment as for Bromine)
- Vanadium [emissions to water, groundwater, long-term]: 0.000113 kg; lognormal SD95 8.63
  (same comment as for Arsenic)
- Particulates, < 2.5 um [emissions to air, low. pop.]: 2.38e-7 kg; lognormal SD95 4.8
  (same comment as for Strontium)
- Lead [emissions to air, low. pop.]: 3.69e-11 kg; lognormal SD95 25.8
  (same comment as for Strontium)
- Boron [emissions to water, river]: 6.88e-5 kg; lognormal SD95 6.18
  (same comment as for Calcium)
- Tin [emissions to water, groundwater, long-term]: 1.98e-5 kg; lognormal SD95 8.76
  (same comment as for Arsenic)
- Heat, waste [emissions to water, groundwater, long-term]: 0.36 MJ; lognormal SD95 10.8
  burden from long-term decomposition of waste (>100a). Uncertainty calculated from unertainty of the waste composition of this waste, uncertainty in waste decomposition and short-term leaching in sanitary landfill
- Thallium [emissions to water, groundwater, long-term]: 9.48e-6 kg; lognormal SD95 9.55
  (same comment as for Arsenic)
- Selenium [emissions to water, groundwater, long-term]: 1.98e-6 kg; lognormal SD95 13.6
  (same comment as for Arsenic)
- Potassium [emissions to water, river]: 0.000717 kg; lognormal SD95 4.15
  (same comment as for Bromine)
- Cadmium [emissions to air, high. pop.]: 1.08e-12 kg; lognormal SD95 14.7
  (same comment as for Calcium)
- Nickel [emissions to water, groundwater, long-term]: 0.000194 kg; lognormal SD95 6.47
  (same comment as for Arsenic)
- Boron [emissions to water, groundwater, long-term]: 0.00027 kg; lognormal SD95 5.05
  (same comment as for Arsenic)
- Aluminium [emissions to water, river]: 2.5e-5 kg; lognormal SD95 4.84
  (same comment as for Calcium)
- Potassium [emissions to water, groundwater, long-term]: 0.0189 kg; lognormal SD95 2.93
  (same comment as for Arsenic)
- Bromine [emissions to air, low. pop.]: 1.71e-7 kg; lognormal SD95 12
  (same comment as for Strontium)
- Iron [emissions to air, high. pop.]: 1.14e-9 kg; lognormal SD95 5.09
  (same comment as for Calcium)
- Scandium [emissions to water, groundwater, long-term]: 3.95e-5 kg; lognormal SD95 8.01
  (same comment as for Arsenic)
- Manganese [emissions to water, river]: 2.01e-5 kg; lognormal SD95 6.52
  (same comment as for Calcium)
- Titanium [emissions to water, groundwater, long-term]: 0.00587 kg; lognormal SD95 3.72
  (same comment as for Arsenic)
- DOC, Dissolved Organic Carbon [emissions to water, river]: 2.23e-5 kg; lognormal SD95 5.53
  (same comment as for Calcium)

## Sampling procedure
Landfill model based on observed leachate concentrations in literature. Extrapolated to 60'000 years heeding chemical characteristics. Initial waste composition from various literature sources.

## Uncertainty adjustments
uncertainty of waste input composition data derived from generic formula GSD(c) = N*ln(c)+1. Minimal long-term emissions are the emissions until the carbonate buffer in the landfill is used up. Mean long-term emissions are the emissions until the next glacial period occurs (in 60'000a) and the landfill is eroded. Maximal long-term emissions are the complete emissions of all landfilled material (except Cr).

## Sources
- Doka G., 2009, 2009 - LCI waste treatment services - Doka, Final report ecoinvent data v2.0, 13, Swiss Centre for LCI, Doka LCA, Duebendorf and St. Gallen, CH
Doka G. (2007) Life Cycle Inventories of Waste Treatment Services. Final report ecoinvent data v2.0. Volume: 13. Swiss Centre for LCI, Empa - TSL. Dübendorf, CH.
Type: Separate publication
Source: CD-ROM
First author: Doka G.
Year: 2007
Title of anthology: Final report ecoinvent data v2.0
Place of publication: Dübendorf, CH
Publisher: Swiss Centre for LCI, Empa - TSL
Volume No: 13

## Validation
Proof reading validation: Passed. Calculation for standard deviation 95 of, i.e., infrastructure, ; Other validation: none;
