# Render carrier board, resin bound, transport DE->CH

Dataset: EcoSpold 1, unit process
Functional unit: 1 m2
Category: construction materials / plaster base
Geography: RER
Generated by: Daniel Savi
accessRestrictedTo: 0
copyright: true

## General comment
Putzträgerplatte, kunstharzgebunden, Transport DE -> CH
Version: 0.0

Local category: construction materials
Local subcategory: Putzträgerplatten

## Reference product
- Render carrier board, resin bound, transport DE->CH [RER]: 1 m2
  Europe

## Inputs from technosphere
- Transport, freight, lorry, 32t-40t gross weight, fleet average [RER]: 1.88 tkm; lognormal SD95 2.24491
  (3;1;1;1;4)

## Sources
- Kasser U., R. Frischknecht, M. Klingler, D. Savi, R. Itten, F. Wyss,P. Stolz, L. Tschuemperlin, 2016, 2016 - Renewal and exp. of LCA data in KBOB - Kasser, -, Buero fuer Umweltchemie, treeze Ltd., Zuerich and Uster, CH
U. Kasser, R. Frischknecht, M. Klingler, D. Savi, R. Itten, F. Wyss,P. Stolz, L. Tschümperlin 2016 (2015Z) Erneuerung und Erweiterung der Ökobilanzdaten in der KBOB-Liste "Ökobilanzdaten im Baubereich", Projekt QualiBOB. unknown.

First author: U. Kasser, R. Frischknecht, M. Klingler, D. Savi, R. Itten, F. Wyss,P. Stolz, L. Tschümperlin 2016
Year: 2015Z
Place of publication: unknown
Original title: Erneuerung und Erweiterung der Ökobilanzdaten in der KBOB-Liste "Ökobilanzdaten im Baubereich", Projekt QualiBOB
