# xx Lightweight concrete block, expanded vermiculite, at plant

Dataset: EcoSpold 1, unit process
Functional unit: 1 kg
Category: material, obsolete / construction, obsolete\concrete, obsolete
Geography: CH
Time period: 2000-01 to 2000-12
Generated by: Daniel Kellenberger
accessRestrictedTo: 0
copyright: true

## General comment
Hardening is assumed to be by air-drying. It is assumed that there is wastewater and solid waste, but as no exact description on the composition of the wastewater and solid waste is available a proxy for each ("treatment, concrete production effluent, to wastewater treatment, class 3" and "disposal, municipal solid waste, 22.9% water, to municipal incineration") is used. The lifespan of the plant is assumed to be 50 years.;

## Included processes
includes the raw materials, their transport to the finishing plant, the air-drying, packing, the infrastructure and the disposal of wastewater and some solid household (e.g. packing material) waste

## Geography
For some exchanges CH, RER and GLO modules have been used as proxy.

## Technology
The raw material mixture (aggregates, cement and water) of lightweight concrete blocks are poured into a mould then squeezed and finaly hardened by air (assumption for this study)

## Reference product
- xx Lightweight concrete block, expanded vermiculite, at plant [CH]: 1 kg
  SWITZERLAND

## Inputs from technosphere
- Packing, clay products [CH]: 1 kg; lognormal SD95 5
  estimated
- Electricity, medium voltage, production ENTSO-E, at grid: 0.0065 kWh; lognormal SD95 1.64
  (3,5,5,3,1,5);
- Tap water, at user [RER]: 0.05 kg; lognormal SD95 1.64
  (3,5,5,3,1,5);
- Mine, clay [CH]: 1.67e-10 p; lognormal SD95 5
  estimated
- Diesel, burned in building machine, average [CH]: 0.0158 MJ; lognormal SD95 1.64
  (3,5,5,3,1,5);
- Portland cement, strength class Z 42.5, at plant [CH]: 0.1 kg; lognormal SD95 1.64
  (3,5,5,3,1,5);
- Disposal, municipal solid waste, 22.9% water, to municipal incineration [CH]: 0.000125 kg; lognormal SD95 5
  estimated
- Treatment, concrete production effluent, to wastewater treatment, class 3 [CH]: 8.33e-5 m3; lognormal SD95 5
  estimated
- Expanded vermiculite, at plant [CH]: 0.9 kg; lognormal SD95 1.64
  (3,5,5,3,1,5);
- Transport, freight, lorry, fleet average [RER]: 0.0769 tkm; lognormal SD95 5
  estimated

## Emissions to nature
- Heat, waste [emissions to air, unspecified]: 0.0234 MJ; lognormal SD95 1.64
  (3,5,5,3,1,5);

## Sampling procedure
Literature

## Extrapolations
See geography

## Sources
- Kellenberger D., Althaus H.-J., Jungbluth N., Kuenniger T., Lehmann M., Thalmann P., 2007, 2007 - LCI building products - Kellenberger, Final report ecoinvent data v2.0, 7, Swiss Centre for LCI, Empa - TSL, ESU-services Ltd., Bau- und Umweltchimie, Duebendorf, CH
Kellenberger D., Althaus H.-J., Jungbluth N., Künniger T. (2007) Life Cycle Inventories of Building Products. Final report ecoinvent data v2.0. Volume: 7. Swiss Centre for LCI, Empa - TSL. Dübendorf, CH.
Type: Measurement on site
Source: CD-ROM
First author: Kellenberger D.
Other authors: Althaus H.-J., Jungbluth N., Künniger T.
Year: 2007
Title of anthology: Final report ecoinvent data v2.0
Place of publication: Dübendorf, CH
Publisher: Swiss Centre for LCI, Empa - TSL
Volume No: 7

## Validation
Proof reading validation: passed; Other validation: none;
