# Coating and curing, general manufacturing

Dataset: EcoSpold 1, unit process
Functional unit: 1 m2
Category: transport systems / road\Vehicle components\Powertrain\Fuel cell
Geography: GLO
Time period: 2020-01 to 2020-12
Generated by: Romain Sacchi
accessRestrictedTo: 0
copyright: False

## General comment
Data for an 80kW automotive PEM fuel cell. Based on qualified estimates of the first commercially available technolgies. Original source: Miotti, M., Hofer, J. & Bauer, C. Integrated environmental and economic assessment of current and future fuel cell vehicles. Int J Life Cycle Assess 22, 94ï¿½110 (2017). https://doi.org/10.1007/s11367-015-0986-4.

## Time period
Base technology year of 2020

## Reference product
- Coating and curing, general manufacturing [GLO]: 1 m2

## Inputs from technosphere
All rows: lognormal SD95 1.64732
- Heat, natural gas, at industrial furnace 1MW [CH]: 34.4 MJ
  Uncertainty from pedigree matrix: (3, 5, 4, 2, 4, 4)
- Lubricating oil, at plant [RER]: 0.0172 kg
  Uncertainty from pedigree matrix: (3, 5, 4, 2, 4, 4)
- Water, decarbonised, at plant [RER]: 6.54e-6 kg
  Uncertainty from pedigree matrix: (3, 5, 4, 2, 4, 4)
- Electricity, medium voltage, production GLO, at grid [GLO]: 1.3 kWh
  Uncertainty from pedigree matrix: (3, 5, 4, 2, 4, 4)
- Metal coating plant [RER]: 3.33e-7 p
  Uncertainty from pedigree matrix: (3, 5, 4, 2, 4, 4)
- Transport, freight, rail [RER]: 0.000757 tkm
  Uncertainty from pedigree matrix: (3, 5, 4, 2, 4, 4)
- Transport, freight, lorry, 16t-32t gross weight, fleet average [RER]: 0.00133 tkm
  Uncertainty from pedigree matrix: (3, 5, 4, 2, 4, 4)
- Transport, barge tanker [RER]: 0.0115 tkm
  Uncertainty from pedigree matrix: (3, 5, 4, 2, 4, 4)
- Disposal, hazardous waste, 25% water, to hazardous waste incineration [CH]: 0.031 kg
  Uncertainty from pedigree matrix: (3, 5, 4, 2, 4, 4)

## Emissions to nature
- NMVOC, non-methane volatile organic compounds, unspecified origin [emissions to air, unspecified]: 0.000482 kg; lognormal SD95 1.64732
  Uncertainty from pedigree matrix: (3, 5, 4, 2, 4, 4)
- Heat, waste [emissions to air, unspecified]: 4.68 MJ; lognormal SD95 1.64732
  Uncertainty from pedigree matrix: (3, 5, 4, 2, 4, 4)

## Sources
- Sacchi R., Bauer C., 2023, 2023 - LCI on-road vehicles - Sacchi, PSI, Villigen, CH
doi: 10.5281/ZENODO.5156043
