# Reinforcing steel, at plant

Dataset: EcoSpold 1, unit process
Functional unit: 1 kg
Category: metals / extraction
Geography: CH
Time period: 2018 to 2020
Generated by: Jonas Giger
accessRestrictedTo: 0
copyright: true

## General comment
Represents Swiss production (100 % electric arc furnace). The ‘Hot rolling, electric’ process with secondary material was used to have only secondary material flows in the upstream process chain.

## Geography
Data from literature, referring to plant in Switzerland

## Technology
Industry data.

## Time period
Time of publications.

## Reference product
- Reinforcing steel, at plant [CH]: 1 kg

## Inputs from technosphere
- Steel, electric, low-alloyed, at plant [CH]: 1 kg; lognormal SD95 1.0744
  (2,2,1,1,1,nA,BU:1.05);
- Hot rolling, electric steel [CH]: 1 kg; lognormal SD95 1.0744
  (2,2,1,1,1,nA,BU:1.05);

## Sampling procedure
Data from literature

## Sources
- Zschokke M., Giger J., 2025, 2025 - Update and suppl. LCI reinforcing steel - Zchokke, Carbotech AG, Zuerich, CH
On behalf of the Federal Office for the Environment, Bern
