# Maintenance, passenger car, diesel, EURO5, city car

Dataset: EcoSpold 1, unit process, infrastructure
Functional unit: 1 p
Category: transport systems / road\operations\infrastructure
Geography: RER
Time period: 2010-01 to 2015-12
Share of production covered: 0 %
Generated by: Marianne Leuenberger
accessRestrictedTo: 0
copyright: true

## General comment
The data set reflects the maintenance of a light weight concept passenger car of 550kg, total weight, diesel engine;

## Included processes
This data set includes material and energy use for passenger car maintenance.

## Geography
Data from a German company but also valid for Europe.

## Technology
Diesel car, 550 kg, light weight concept car

## Reference product
- Maintenance, passenger car, diesel, EURO5, city car [RER]: 1 p
  Europe

## Inputs from technosphere
- Synthetic rubber, at plant [RER]: 48.333 kg; lognormal SD95 1.2515
  (2,3,2,1,3,4,BU:1.05); Extrapolated from passenger car, ecoinvent report no. 14, weight ratio
- Polyethylene, HDPE, granulate, at plant [RER]: 2.0833 kg; lognormal SD95 1.2515
  (same comment as for Synthetic rubber, at plant)
- Steel, low-alloyed, at plant [RER]: 4.5833 kg; lognormal SD95 1.2515
  (same comment as for Synthetic rubber, at plant)
- Polypropylene, granulate, at plant [RER]: 2.5 kg; lognormal SD95 1.2515
  (same comment as for Synthetic rubber, at plant)
- Transport, freight, rail, electricity with shunting [CH]: 24.708 tkm; lognormal SD95 2.095
  (4,5,na,na,na,na,BU:2); Extrapolated from passenger car, ecoinvent report no. 14, weight ratio
- Ethylene, average, at plant [RER]: 15.833 kg; lognormal SD95 1.2515
  (same comment as for Synthetic rubber, at plant)
- Electricity, low voltage, production ENTSO-E, at grid: 242.92 kWh; lognormal SD95 1.2515
  (same comment as for Synthetic rubber, at plant)
- Transport, freight, lorry, fleet average [RER]: 12.333 tkm; lognormal SD95 2.095
  (same comment as for Transport, freight, rail, electricity with shunting)
- Lead, at regional storage [RER]: 10.417 kg; lognormal SD95 1.2515
  (same comment as for Synthetic rubber, at plant)
- Sulphuric acid, liquid, at plant [RER]: 0.58333 kg; lognormal SD95 1.2515
  (same comment as for Synthetic rubber, at plant)
- Copper, at regional storage [RER]: 0.125 kg; lognormal SD95 1.2515
  (same comment as for Synthetic rubber, at plant)

## Emissions to nature
- Heat, waste [emissions to air, unspecified]: 875 MJ; lognormal SD95 1.2515
  (same comment as for Synthetic rubber, at plant)

## Extrapolations
All values extrapolated from average passenger car manufacture according to weight ratio

## Sources
- Spielmann M., Bauer C., Dones R., Tuchschmid M., 2007, 2007 - Transport services - Spielmann, Final report ecoinvent Data v2.0, 14, Swiss Centre for LCI, PSI, ESU-services Ltd., Duebendorf, Villigen and Uster, CH
Spielmann M., Dones R; Bauer C. (2007) Life Cycle Inventories of Transport Services. Final report ecoinvent Data v2.0. Volume: 14. Issue: 0. Swiss Centre for LCI, PSI. Dübendorf and Villigen, CH.
Type: Measurement on site
Source: CD-ROM
First author: Spielmann M.
Other authors: Dones R; Bauer C.
Year: 2007
Title of anthology: Final report ecoinvent Data v2.0
Place of publication: Dübendorf and Villigen, CH
Publisher: Swiss Centre for LCI, PSI
Volume No: 14
Issue No: 0

## Validation
Proof reading validation: 26.01.2010; Other validation: C:\Dokumente und Einstellungen\Marianne\Eigene Dateien\Projekte\277_Mobitool\Ecoinvent\Review\Upload 1\[Ecospold_Diesel_Citycar_all-v1.1.xls]X-Process;
