# Green beans conventional, at farm

Dataset: EcoSpold 1, unit process
Functional unit: 1 kg
Category: agricultural / agricultural production\plant protection
Geography: KE
Time period: 2014-01 to 2020-12
Generated by: Melina Glimmann
accessRestrictedTo: 0
copyright: true

## General comment
The inventory refers to the production of green beans in Kenya.

## Geography
The inventory is modelled for Switzerland

## Reference product
- Green beans conventional, at farm [KE]: 1 kg

## Inputs from technosphere
- Average mineral fertiliser, as P2O5, at regional storehouse [RER]: 0.0054403 kg; lognormal SD95 1.218
  (2,1,2,1,1,5,BU:1.05); ;
- Diesel, burned in diesel-electric generating set [GLO]: 1.7687 MJ; lognormal SD95 1.218
  (2,1,2,1,1,5,BU:1.05); ;
- Average mineral fertiliser, as N, at regional storehouse [RER]: 0.0029216 kg; lognormal SD95 1.218
  (2,1,2,1,1,5,BU:1.05); ;
- Pea seed IP, at regional storehouse [CH]: 0.0045335 kg; lognormal SD95 1.218
  (2,1,2,1,1,5,BU:1.05); ;
- Transport, freight, lorry, 16t-32t gross weight, fleet average [CH]: 0.0025791 tkm; lognormal SD95 2.0524
  (2,1,2,1,1,5,BU:2); ;

## Inputs from nature
- Transformation, from annual crop, non-irrigated [resources, land]: 1.0075 m2; lognormal SD95 1.31639
  (4,1,1,1,1,5,BU:1.1); ;
- Transformation, to annual crop, non-irrigated [resources, land]: 1.0075 m2; lognormal SD95 1.31639
  (4,1,1,1,1,5,BU:1.1); ;
- Water, unspecified natural origin, KE [resources, in water]: 0.40298 m3; lognormal SD95 1.218
  (2,1,2,1,1,5,BU:1.05); ;
- Water, river, KE [resources, in water]: 0.11989 m3; lognormal SD95 1.8752
  (4,1,1,1,4,5,BU:1.5); ;
- Occupation, annual crop, non-irrigated [resources, land]: 0.50373 m2a; lognormal SD95 1.31639
  (4,1,1,1,1,5,BU:1.1); ;
- Energy, gross calorific value, in biomass [resources, biotic]: 15.367 MJ; lognormal SD95 1.3001
  (4,1,1,1,1,5,BU:1.05); ;
- Carbon dioxide, in air [resources, in air]: 1.2114 kg; lognormal SD95 1.3001
  (4,1,1,1,1,5,BU:1.05); ;

## Emissions to nature
- Phosphorus [emissions to water, groundwater]: 7.0522e-6 kg; lognormal SD95 1.8752
  (4,1,1,1,4,5,BU:1.5); ;
- Lead [emissions to water, river]: 2.9115e-9 kg; lognormal SD95 5.36358
  (4,1,1,1,4,5,BU:5); ;
- Chromium [emissions to water, river]: 1.6573e-6 kg; lognormal SD95 3.3171
  (4,1,1,1,4,5,BU:3); ;
- Cadmium [emissions to water, river]: 4.1709e-9 kg; lognormal SD95 3.3171
  (4,1,1,1,4,5,BU:3); ;
- Phosphorus [emissions to water, river]: 7.6869e-5 kg; lognormal SD95 1.8752
  (4,1,1,1,4,5,BU:1.5); ;
- Nitrate [emissions to water, groundwater]: 0.011001 kg; lognormal SD95 1.8752
  (4,1,1,1,4,5,BU:1.5); ;
- Zinc [emissions to water, river]: 6.6492e-7 kg; lognormal SD95 5.36358
  (4,1,1,1,4,5,BU:5); ;
- Mercury [emissions to water, river]: 1.2492e-10 kg; lognormal SD95 5.3636
  (4,1,1,1,4,5,BU:5); ;
- Ammonia [emissions to air, low. pop.]: 0.0007437 kg; lognormal SD95 1.37131
  (4,1,1,1,1,5,BU:1.2); ;
- Water, embodied in product, KE [economic issues, unspecified]: 0.90973 kg; lognormal SD95 1.62091
  (4,1,1,1,4,5,BU:1.05); ;
- Dinitrogen monoxide [emissions to air, low. pop.]: 0.0003649 kg; lognormal SD95 1.61689
  (4,1,1,1,1,5,BU:1.5); ;
- Water, KE [emissions to air, unspecified]: 0.28209 kg; lognormal SD95 1.61689
  (4,1,1,1,1,5,BU:1.5); ;
- Cadmium [emissions to soil, agricultural]: 2.7806e-7 kg; lognormal SD95 1.63211
  (4,1,1,1,4,5,BU:1.1); ;
- Nitrogen oxides [emissions to air, low. pop.]: 7.6627e-5 kg; lognormal SD95 1.61689
  (4,1,1,1,1,5,BU:1.5); ;
- Copper [emissions to water, river]: 1.2593e-7 kg; lognormal SD95 3.3171
  (4,1,1,1,4,5,BU:3); ;
- Nickel [emissions to water, river]: 3.1533e-10 kg; lognormal SD95 5.36358
  (4,1,1,1,4,5,BU:5); ;

## Sampling procedure
Literature

## Sources
- Kaegi T., Glimmann M., Conte F., Roberts G., 2021, 2021 - LCA tomatoes and green beans production - Kaegi, Carbotech on behalf of BAFU, Carbotech AG, Zuerich, CH

## Validation
01.02.2022 \\tsclient\Schreibtisch\WinShare\BAFU Gemuese\2022-02-01\[EcoSpold_Bafu_Gemuese_Green beans conventional_KE v1.xlsx]X-Process
