# Ventilation equipment, decentralized, 180-250 m3/h, at plant

Dataset: EcoSpold 1, unit process
Functional unit: 1 p
Category: construction / ventilation\components
Geography: RER
Time period: 2003-01 to 2003-12
Generated by: Alex Primas
accessRestrictedTo: 0
copyright: true

## General comment
Production of a typical component used for a decentral ventilation system in a multi family house. The house considered in the investigation includes 6 flats with 130 m2 floor area each and a ventilation rate of 120 m3/h.;

## Included processes
Materials used for the production. Estimation of electricity use for the different production steps. Energy use for heating of the production building. Transport of raw materials to the plant. Estimation for the Infrastructure of the Production site included.

## Technology
Ventilation unit for decentral ventilation systems with 120 m3/h average air flow. Average of four different ventilation units with 180-250 m3/h maximal air flow considered. Housing mainly made of galvanised steel. Total weight of component 43.1 kg

## Time period
Materials investigated in 2003

## Reference product
- Ventilation equipment, decentralized, 180-250 m3/h, at plant [RER]: 1 p
  Europe

## Inputs from technosphere
- Electricity, medium voltage, production ENTSO-E, at grid: 21.8 kWh; lognormal SD95 1.69
  (3,5,5,1,3,5); Data estimated from related processes
- Synthetic rubber, at plant [RER]: 0.182 kg; lognormal SD95 1.24
  (2,4,1,1,1,5); Questionnaire
- Zinc coating, coils [RER]: 4.24 m2; lognormal SD95 1.26
  (3,4,1,1,1,5); Questionnaire, estimations
- Sheet rolling, aluminium [RER]: 7.69 kg; lognormal SD95 1.26
  (3,4,1,1,1,5); Questionnaire, estimations
- Sheet rolling, chromium steel [RER]: 0.898 kg; lognormal SD95 1.26
  (3,4,1,1,1,5); Questionnaire, estimations
- Transport, freight, lorry, fleet average [RER]: 4.76 tkm; lognormal SD95 2.09
  (4,5,nA,nA,nA,nA); Standard distance of ecoinvent used
- Sheet rolling, steel [RER]: 25.3 kg; lognormal SD95 1.26
  (3,4,1,1,1,5); Questionnaire, estimations
- Powder coating, steel [RER]: 1.78 m2; lognormal SD95 1.26
  (3,4,1,1,1,5); Questionnaire, estimations
- Polystyrene foam slab, at plant [RER]: 2.86 kg; lognormal SD95 1.24
  (2,4,1,1,1,5); Questionnaire
- Rock wool, packed, at plant [CH]: 2.42 kg; lognormal SD95 1.24
  (2,4,1,1,1,5); Questionnaire
- Steel, electric, un- and low-alloyed, at plant [RER]: 8.88 kg; lognormal SD95 1.24
  (2,4,1,1,1,5); Questionnaire
- Aluminium, production mix, wrought alloy, at plant [RER]: 7.69 kg; lognormal SD95 1.24
  (2,4,1,1,1,5); Questionnaire
- Ventilation components factory [RER]: 1.73e-7 p; lognormal SD95 3.18
  (4,5,1,1,3,5); Calculated with data of a similar company
- Polystyrene, high impact, HIPS, at plant [RER]: 7.26 kg; lognormal SD95 1.24
  (2,4,1,1,1,5); Questionnaire
- Disposal, polystyrene, 0.2% water, to municipal incineration [CH]: 0.66 kg; lognormal SD95 1.32
  (4,4,1,1,1,5); Estimations on precentage material disposed
- Copper, at regional storage [RER]: 0.621 kg; lognormal SD95 1.26
  (3,4,1,1,1,5); Questionnaire, estimations
- Steel, converter, unalloyed, at plant [RER]: 16.4 kg; lognormal SD95 1.24
  (2,4,1,1,1,5); Questionnaire
- Disposal, expanded polystyrene, 5% water, to municipal incineration [CH]: 0.26 kg; lognormal SD95 1.32
  (4,4,1,1,1,5); Estimations on precentage material disposed
- Natural gas, burned in industrial furnace 1MWth [CH]: 90.6 MJ; lognormal SD95 1.38
  (4,5,1,1,1,5); Data estimated from related companies
- Disposal, inert waste, 5% water, to construction waste landfill [CH]: 0.22 kg; lognormal SD95 1.32
  (4,4,1,1,1,5); Estimations on precentage material disposed
- Electronics for control units [RER]: 0.229 kg; lognormal SD95 1.34
  (3,4,1,1,3,5); Questionnaire, approximation for technology
- Light fuel oil, burned in industrial furnace 1MW, non-modulating [RER]: 90.6 MJ; lognormal SD95 1.38
  4,5,1,1,1,5; Data estimated from related companies
- Wire drawing, copper [RER]: 0.621 kg; lognormal SD95 1.26
  (3,4,1,1,1,5); Questionnaire, estimations
- Chromium steel 18/8, at plant [RER]: 0.898 kg; lognormal SD95 1.24
  (2,4,1,1,1,5); Questionnaire
- Disposal, rubber, unspecified, 0% water, to municipal incineration [CH]: 0.00866 kg; lognormal SD95 1.32
  (4,4,1,1,1,5); Estimations on precentage material disposed
- Injection moulding [RER]: 7.44 kg; lognormal SD95 1.24
  (2,4,1,1,1,5); Questionnaire
- Transport, freight, rail [RER]: 9.49 tkm; lognormal SD95 2.09
  (4,5,nA,nA,nA,nA); Standard distance of ecoinvent used

## Emissions to nature
- Heat, waste [emissions to air, high. pop.]: 78.4 MJ; lognormal SD95 1.69
  (3,5,5,1,3,5); Calculated from electricity use

## Sampling procedure
Questionnaire and technical information of four producer used. Average data of four common products used.

## Sources
- Haessig W., Primas A., 2007, 2007 - LCI comfort ventilation in dwellings - Haessig, Final report ecoinvent Data v2.0, 25, Swiss Centre for LCI, B+H, Duebendorf and Zuerich, CH
Hässig, W., Primas, A. (2007) Ökologische Aspekte der Komfortlüftungen im Wohnbereich. Final report ecoinvent Data v2.0. Volume: 25. Swiss Centre for LCI, B+H. Dübendorf and Zürich, CH.
Type: Measurement on site
Source: CD-ROM
First author: Hässig, W.
Other authors: Primas, A.
Year: 2007
Title of anthology: Final report ecoinvent Data v2.0
Place of publication: Dübendorf and Zürich, CH
Publisher: Swiss Centre for LCI, B+H
Volume No: 25

## Validation
Proof reading validation: passed; Other validation: none;
