# SOFC-GT fuel cell 180kWe, future

Dataset: EcoSpold 1, unit process, infrastructure
Functional unit: 1 p
Category: heat / natural gas\cogeneration\power unit\infrastructure
Geography: CH
Time period: 2000-01 to 2005-12
Generated by: Alex Primas
accessRestrictedTo: 0
copyright: true

## General comment
The module reflects a hybrid solid oxide fuel cell (SOFC) micro gas turbine system with 180 kW electrical output. Inventory based on information from literature and one manufacturer. Life time operation of auxiliary systems is 80'000 h. Stack lifetime is 48'000 h. Lifetime of the micro gas turbine is 50'000 h.;
Synonyms: solid oxide fuel cell hybrid cycle power system, SOFC gas turbine hybrid, SOFC Gasturbinen Hybridsystem, Festoxid Brennstoffzellen Gasturbinen Hybridsystem;

## Included processes
The module includes the most important materials used for production, the energy needed for production, planning and engineering. Also included is the transport of the raw materials, the engine delivery and the installation on site.

## Technology
Hybrid system combining a 125 kWe solid oxide fuel cell (SOFC) with tubular stack design and a 55kWe micro gas turbine. For central cogeneration use. Performance, stack lifetime and catalyst use according to expected future values for a serial product. Operation with connection to low pressure gas network. Electrical efficiency 58%, total efficiency 80%.

## Reference product
- SOFC-GT fuel cell 180kWe, future [CH]: 1 p
  SWITZERLAND

## Inputs from technosphere
- SOFC fuel cell 125kWe, future [CH]: 1 p; lognormal SD95 3
  (nA.,nA.,nA.,nA.,1,nA.); material input
- Micro gas turbine 100kWe [CH]: 1 p; lognormal SD95 3.0454
  (nA.,nA.,nA.,nA.,3,nA.); input, data of 100kWel unit used for 55kWel plant

## Sampling procedure
Literature data and manufacturer information

## Sources
- Primas A., 2007, 2007 - LCI new CHP systems - Primas, Final report ecoinvent Data v2.0, 20, Swiss Centre for LCI, B&H AG, Duebendorf and Zuerich, CH
Primas A., 0 (2007) Life Cycle Inventories of new CHP systems. Final report ecoinvent Data v2.0. Editors: 0. Volume: 20. Swiss Centre for LCI, B&H AG. Duebendorf and Zurich, CH.
Type: Measurement on site
Source: CD-ROM
First author: Primas A.
Other authors: 0
Year: 2007
Name of editors: 0
Title of anthology: Final report ecoinvent Data v2.0
Place of publication: Duebendorf and Zurich, CH
Publisher: Swiss Centre for LCI, B&H AG
Volume No: 20

## Validation
Proof reading validation: passed; Other validation: none;
