# Brake wear emissions, lorry

Dataset: EcoSpold 1, unit process
Functional unit: 1 kg
Category: transport systems / road
Geography: RER
Production volume: 48292200 kg
Generated by: Frank Werner
accessRestrictedTo: 0
copyright: false

## General comment
Calculation of non-exhaust emissions (tyre, brake and road wear emissions) are based on EMEP/EEA (2013) and values for net vehicle weights and average load factors. Net vehicle weights are taken from the EcoTransIT (2011) report whilst the average load factors are taken from the Tremove model v2.7b (2009) and EcoTransIT (2011) report. The brake wear emissions are to air only. All particulates are accounted for as emissions to air and have particle sizes below 100um. Anything above this does not remain airborne over longer periods. It must be noted that elementary and organic carbon, substances very dominant in the emissions profile from brake wear are currently not available in the ecoinvent database and are therfore not accounted for in this datase other than their representation as unspecified particulate emissions. This means that although the datasets represent 1kg of brake wear the emissions do not sum up to 1kg. In order to use the treatment of non-exhaust emissions in a transport dataset the quantity of emissions per tkm must be calculated. This must then be devided by the specific load factor of the transport in question.Non-exhaust emissions are considered to be linearly scalable to gross vehicle weight (GVW). For brake wear emissions from lorries the specific quantity is 8.13E-9 kg/kg GVW*km.;

## Included processes
The activity starts with the friction of lorry brakes. The activity ends with emissions of lorry brake wear.

## Reference product
- Brake wear emissions, lorry [RER]: 1 kg
  Europe

## Emissions to nature
All rows: lognormal SD95 1.1218
- Bromine [emissions to air, unspecified]: 5.56e-5 kg
  (2,2,3,1,1,na)
  Calculated value. Derived from EMEP/EEA (2013) and based on an average gross vehicle weight (GVW) of all truck categories and load factors.
- Particulates, < 2.5 um [emissions to air, unspecified]: 0.39 kg
  (same comment as for Bromine)
- Iron [emissions to air, unspecified]: 0.291 kg
  (same comment as for Bromine)
- Manganese [emissions to air, unspecified]: 0.00342 kg
  (same comment as for Bromine)
- Aluminium [emissions to air, unspecified]: 0.00285 kg
  (same comment as for Bromine)
- Antimony [emissions to air, unspecified]: 0.139 kg
  (same comment as for Bromine)
- Nickel [emissions to air, unspecified]: 0.000454 kg
  (same comment as for Bromine)
- Molybdenum [emissions to air, unspecified]: 0.0139 kg
  (same comment as for Bromine)
- Barium [emissions to air, unspecified]: 0.0535 kg
  (same comment as for Bromine)
- Sodium [emissions to air, unspecified]: 0.0108 kg
  (same comment as for Bromine)
- Zinc [emissions to air, unspecified]: 0.0121 kg
  (same comment as for Bromine)
- Potassium [emissions to air, unspecified]: 0.000727 kg
  (same comment as for Bromine)
- Chromium [emissions to air, unspecified]: 8.89e-6 kg
  (same comment as for Bromine)
- Titanium [emissions to air, unspecified]: 0.005 kg
  (same comment as for Bromine)
- Selenium [emissions to air, unspecified]: 2.78e-5 kg
  (same comment as for Bromine)
- Sulfur dioxide [emissions to air, unspecified]: 0.0356 kg
  (same comment as for Bromine)
- Lead [emissions to air, unspecified]: 0.00843 kg
  (same comment as for Bromine)
- Nitrate [emissions to air, unspecified]: 0.00222 kg
  (same comment as for Bromine)
- Silicon [emissions to air, unspecified]: 0.0943 kg
  (same comment as for Bromine)
- Arsenic [emissions to air, unspecified]: 9.38e-5 kg
  (same comment as for Bromine)
- Vanadium [emissions to air, unspecified]: 0.000917 kg
  (same comment as for Bromine)
- Sulfate [emissions to air, unspecified]: 0.0464 kg
  (same comment as for Bromine)
- Particulates, > 10 um [emissions to air, unspecified]: 0.02 kg
  (same comment as for Bromine)
- Tin [emissions to air, unspecified]: 0.00972 kg
  (same comment as for Bromine)
- Calcium [emissions to air, unspecified]: 0.0107 kg
  (same comment as for Bromine)
- PAH, polycyclic aromatic hydrocarbons [emissions to air, unspecified]: 2.47e-6 kg
  (same comment as for Bromine)
- Cobalt [emissions to air, unspecified]: 8.89e-6 kg
  (same comment as for Bromine)
- Cadmium [emissions to air, unspecified]: 3.11e-5 kg
  (same comment as for Bromine)
- Copper [emissions to air, unspecified]: 0.071 kg
  (same comment as for Bromine)
- Chlorine [emissions to air, unspecified]: 0.00208 kg
  (same comment as for Bromine)
- Particulates, > 2.5 um, and < 10um [emissions to air, unspecified]: 0.59 kg
  (same comment as for Bromine)
- Strontium [emissions to air, unspecified]: 0.000722 kg
  (same comment as for Bromine)

## Sampling procedure
Literature

## Sources
- Frischknecht R., Messmer A., Stolz P., 2016, 2016 - Mobitool - Frischknecht, Project Report, 0, treeze Ltd., Bern, CH
