# Synthetic natural gas from catalytic methanation, distributed by pipeline, produced by Electrolysis, PEM using electricity from grid, and carbon from MSWI, with heat recovery (100:0 alloc.)

Dataset: EcoSpold 1, unit process
Functional unit: 1 kg
Category: fuels / synthetic\transformation
Geography: CH
Time period: 2024-01 to 2024-01
Generated by: Romain Sacchi
accessRestrictedTo: 0
copyright: true

## General comment
This dataset represents the supply of 1 kilogram of synthetic natural gas The gas is distributed by pipeline over 250 km from regional storage. The synthetic natural gas from catalytic methanation is produced by Electrolysis, PEM, with electricity from grid as feedstock. Transmission loss [% output]: 0.08. Distribution loss [% output]: 0.2%. Regional storage loss [% output]: 0. For more information, refer to: Sacchi, R. and Bauer, C. LCA of Power-to-X processes and applications in the residential sector. Paul Scherrer Institut, 2023. Source: Sacchi, R. and Bauer, C. LCA of Power-to-X processes and applications in the residential sector. Paul Scherrer Institut, 2023.

## Reference product
- Synthetic natural gas from catalytic methanation, distributed by pipeline, produced by Electrolysis, PEM using electricity from grid, and carbon from MSWI, with heat recovery (100:0 alloc.) [CH]: 1 kg
  not defined

## Inputs from technosphere
- Synthetic natural gas from catalytic methanation, distributed by pipeline, produced by Electrolysis, PEM using electricity from grid, and carbon from MSWI, with heat recovery (100:0 alloc.) [CH]: 0.001303 kg; lognormal SD95 2.565
  Self-consumption for compressors. {5;5;5;5;5;5;1.05;}
- Electricity, low voltage, at grid [CH]: 0.00282 kWh; lognormal SD95 2.565
  To compress the methane and inject it into the grid {5;5;5;5;5;5;1.05;}
- Pipeline, natural gas, high pressure distribution network [CH]: 4.621e-8 km; lognormal SD95 4.247
  SNG pipeline, on the basis of current CNG pipline of 19 TJ/km/year as in ecoinvent. Lifetime of 40 years. {5;5;5;5;5;5;3;}
- Methane, from electrochemical methanation, with carbon from municipal waste incineration plant, with heat recovery (100:0 alloc.) [CH]: 1 kg; lognormal SD95 2.565
  Methane input. {5;5;5;5;5;5;1.05;}
- Methane, from electrochemical methanation, with carbon from municipal waste incineration plant, with heat recovery (100:0 alloc.) [CH]: 0.002801 kg; lognormal SD95 2.565
  Distribution (pipeline) losees and storage lossses. {5;5;5;5;5;5;1.05;}
- Pipeline, natural gas, low pressure distribution network [CH]: 1.721e-7 km; lognormal SD95 4.247
  (same comment as for Pipeline, natural gas, high pressure distribution network)

## Emissions to nature
- Methane, fossil [emissions to air, unspecified]: 0.001344 kg; lognormal SD95 7.389
  Calculated from leakage rate and biogenic carbon share.
- Carbon dioxide, fossil [emissions to air, unspecified]: 0.003491 kg; lognormal SD95 7.389
  Adapted from "market for biomethane, high pressure"
- Hydrogen sulfide [emissions to air, unspecified]: 5.972e-10 kg; lognormal SD95 2.785
  Adapted from "market for biomethane, high pressure" {5;5;5;5;5;5;1.5;}
- Nitrogen [emissions to air, unspecified]: 1.805e-6 kg; lognormal SD95 2.785
  Adapted from "market for biomethane, high pressure" {5;5;5;5;5;5;1.5;}
- Methane, biogenic [emissions to air, unspecified]: 0.001456 kg; lognormal SD95 2.785
  Calculated from leakage rate and biogenic carbon share. {5;5;5;5;5;5;1.5;}

## Sampling procedure
Sampling procedure: Literature data

## Sources
- Sacchi R., Bauer C., 2024, 2024 - LCA power-to-X in residential sector - Sacchi, Project report, PSI, Villigen, CH

## Validation
Proof reading validation: Passed, Other validation: none, Validator: Rolf Frischknecht, Telephone: 0041 44 940 61 91, E-mail: frischknecht@treeze.ch, Company: treeze, Country: CH
