# Strawberries, conventional, unheated plastic tunnel

Dataset: EcoSpold 1, unit process
Functional unit: 1 kg
Category: agricultural / agricultural production\plant protection
Geography: ES
Time period: 2020-01 to 2022-12
Generated by: Tanja Laube
accessRestrictedTo: 0
copyright: true

## Reference product
- Strawberries, conventional, unheated plastic tunnel [ES]: 1 kg

## Inputs from technosphere
- Section bar rolling, steel [RER]: 2.7818e-5 kg; lognormal SD95 1.20769
  (1,1,1,1,1,5,BU:1.05);
- Strawberry seedling, for planting, in unheated greenhouse [RER]: 0.81818 p; lognormal SD95 1.6906
  (4,4,4,2,4,5,BU:1.05);
- Average mineral fertiliser, as N, at regional storehouse [RER]: 0.005 kg; lognormal SD95 1.20769
  (1,1,1,1,1,5,BU:1.05);
- Polyethylene, LDPE, granulate, at plant [RER]: 0.0072727 kg; lognormal SD95 1.20769
  (1,1,1,1,1,5,BU:1.05);
- Average mineral fertiliser, as K2O, at regional storehouse [RER]: 0.0068182 kg; lognormal SD95 1.20769
  (1,1,1,1,1,5,BU:1.05);
- Polyethylene, HDPE, granulate, at plant [RER]: 0.0022947 kg; lognormal SD95 1.20769
  (1,1,1,1,1,5,BU:1.05);
- Transport, freight, lorry, fleet average [RER]: 0.0078 tkm; lognormal SD95 2.05171
  (2,1,1,3,1,5,BU:2);
- Plastic tunnel, type almeria [ES]: 0.18182 m2a; lognormal SD95 3.0611
  (3,3,1,1,1,5,BU:3);
- Average mineral fertiliser, as P2O5, at regional storehouse [RER]: 0.0044909 kg; lognormal SD95 1.20769
  (1,1,1,1,1,5,BU:1.05);
- Electricity, low voltage, at grid [ES]: 0.032527 kWh; lognormal SD95 1.20769
  (1,1,1,1,1,5,BU:1.05);
- Tap water, desalinated sea water, at user [ES]: 0.02401 kg; lognormal SD95 1.2152
  (2,1,1,1,1,5,BU:1.05);
- Extrusion, plastic film [RER]: 0.0072727 kg; lognormal SD95 1.20769
  (1,1,1,1,1,5,BU:1.05);
- Disposal, steel, 0% water, to municipal incineration [CH]: 2.7879e-5 kg; lognormal SD95 1.20769
  (1,1,1,1,1,5,BU:1.05);
- xx Blow moulding [RER]: 0.00039354 kg; lognormal SD95 1.20769
  (1,1,1,1,1,5,BU:1.05);
- Diesel, burned in agricultural machine [CH]: 0.00076909 kg; lognormal SD95 1.20769
  (1,1,1,1,1,5,BU:1.05);
- Extrusion, plastic pipes [RER]: 0.0019012 kg; lognormal SD95 1.20769
  (1,1,1,1,1,5,BU:1.05);
- Pesticide unspecified, at regional storehouse [RER]: 0.00010818 kg; lognormal SD95 1.2152
  (2,1,1,1,1,5,BU:1.05);
- Disposal, polyethylene, 0.4% water, to municipal incineration [CH]: 126.22 kg; lognormal SD95 1.20769
  (1,1,1,1,1,5,BU:1.05);
- Steel, low-alloyed, at plant [RER]: 2.7879e-5 kg; lognormal SD95 1.20769
  (1,1,1,1,1,5,BU:1.05);

## Inputs from nature
- Energy, gross calorific value, in biomass [resources, biotic]: 0.18287 MJ; lognormal SD95 1.32229
  (4,1,3,2,1,5,BU:1.05);
- Carbon dioxide, in air [resources, in air]: 1.9372 kg; lognormal SD95 1.32229
  (4,1,3,2,1,5,BU:1.05);
- Water, unspecified natural origin, ES [resources, in water]: 0.11723 m3; lognormal SD95 1.32229
  (4,1,3,2,1,5,BU:1.05);

## Emissions to nature
- Zoxamide [emissions to soil, agricultural]: 2e-6 kg; lognormal SD95 1.3001
  (2,1,1,1,1,5,BU:1.2);
- Azoxystrobin [emissions to soil, agricultural]: 1.0909e-6 kg; lognormal SD95 1.3001
  (2,1,1,1,1,5,BU:1.2);
- Dimethomorph [emissions to soil, agricultural]: 7.2727e-7 kg; lognormal SD95 1.3001
  (2,1,1,1,1,5,BU:1.2);
- Cyprodinil [emissions to soil, agricultural]: 1.2727e-6 kg; lognormal SD95 1.3001
  (2,1,1,1,1,5,BU:1.2);
- Pendimethalin [emissions to soil, agricultural]: 1.8182e-7 kg; lognormal SD95 1.3001
  (2,1,1,1,1,5,BU:1.2);
- Chlorpyrifos methyl [emissions to soil, agricultural]: 1.8182e-7 kg; lognormal SD95 1.3001
  (2,1,1,1,1,5,BU:1.2);
- Trifloxystrobin [emissions to soil, agricultural]: 3.0909e-6 kg; lognormal SD95 1.3001
  (2,1,1,1,1,5,BU:1.2);
- Myclobutanil [emissions to soil, agricultural]: 3.6364e-7 kg; lognormal SD95 1.3001
  (2,1,1,1,1,5,BU:1.2);
- Water, embodied in product, ES [economic issues, unspecified]: 0.9 kg; lognormal SD95 1.3001
  (4,1,1,1,1,5,BU:1.05);
- Nitrate [emissions to water, groundwater]: 0.0014715 kg; lognormal SD95 1.61689
  (4,1,1,1,1,5,BU:1.5);
- Fludioxonil [emissions to soil, agricultural]: 9.0909e-7 kg; lognormal SD95 1.3001
  (2,1,1,1,1,5,BU:1.2);
- Phosphorus [emissions to water, river]: 9.0909e-6 kg; lognormal SD95 1.61689
  (4,1,1,1,1,5,BU:1.5);
- Indoxacarb [emissions to soil, agricultural]: 1.8182e-7 kg; lognormal SD95 1.3001
  (2,1,1,1,1,5,BU:1.2);
- Ammonia [emissions to air, low. pop.]: 0.00018509 kg; lognormal SD95 1.3032
  (2,2,2,1,1,5,BU:1.2);
- Phosphorus [emissions to water, groundwater]: 1.2727e-6 kg; lognormal SD95 1.61689
  (4,1,1,1,1,5,BU:1.5);
- Cadmium [emissions to soil, agricultural]: 1.8182e-7 kg; lognormal SD95 1.31639
  (4,1,1,1,1,5,BU:1.1);
- Nitrogen oxides [emissions to air, low. pop.]: 0.00013 kg; lognormal SD95 1.61689
  (4,1,1,1,1,5,BU:1.5);
- Dinitrogen monoxide [emissions to air, low. pop.]: 5e-5 kg; lognormal SD95 1.5662
  (2,2,2,1,1,5,BU:1.5);
- Etoxazole [emissions to soil, agricultural]: 1.8182e-7 kg; lognormal SD95 1.3001
  (2,1,1,1,1,5,BU:1.2);
- Maleic hydrazide [emissions to soil, agricultural]: 3.6364e-7 kg; lognormal SD95 1.3001
  (2,1,1,1,1,5,BU:1.2);
- Penconazole [emissions to soil, agricultural]: 1.8182e-7 kg; lognormal SD95 1.3001
  (2,1,1,1,1,5,BU:1.2);
- Water, ES [emissions to water, unspecified]: 7718.4 m3; lognormal SD95 1.61689
  (4,1,1,1,1,5,BU:1.5);
- Water, ES [emissions to air, unspecified]: 119.2 kg; lognormal SD95 1.63229
  (4,1,3,2,1,5,BU:1.5);
- Fosetyl-aluminium [emissions to soil, agricultural]: 1.8182e-6 kg; lognormal SD95 1.3001
  (2,1,1,1,1,5,BU:1.2);
- Spinosad [emissions to soil, agricultural]: 3.6364e-7 kg; lognormal SD95 1.3001
  (2,1,1,1,1,5,BU:1.2);

## Sampling procedure
Based on literature and producer interviews

## Sources
- Kaegi T., Conte F., Laube T., Roberts G., 2022, 2022 - LCA strawberry and asparagus production - Kaegi, Carbotech AG, Zuerich, CH

## Validation
16.08.2022 \\tsclient\Schreibtisch\WinShare\BAFU Gemuese\Spargeln und Erdbeeren\[EcoSpold_Bafu_Gemuese_Strawberries conventional tunnel_ES v1.xlsx]X-Process
