# Walls and foundations, for hydrogen refuelling station

Dataset: EcoSpold 1, unit process
Functional unit: 1 p
Category: fuels / hydrogen\Transformation\Infrastructure
Geography: RER
Time period: 2020-01 to 2020-12
Generated by: Romain Sacchi
accessRestrictedTo: 0
copyright: False

## General comment
Datasets for hydrogen production and refuelling station. Original source: Simons, A. and Bauer, C. (2015). A life-cycle perspective on automotive fuel cells, Applied Energy, doi:10.1016/j.apenergy.2015.02.049.

## Time period
Base technology year of 2020

## Reference product
- Walls and foundations, for hydrogen refuelling station [RER]: 1 p

## Inputs from technosphere
All rows: lognormal SD95 1.1557
- Sheet rolling, steel [RER]: 57500 kg
  Uncertainty from pedigree matrix: (3, 2, 3, 1, 1, 3)
- Gravel, crushed, at mine [CH]: 1.8e6 kg
  Uncertainty from pedigree matrix: (3, 2, 3, 1, 1, 3)
- Diesel, burned in building machine, average [CH]: 42800 MJ
  Uncertainty from pedigree matrix: (3, 2, 3, 1, 1, 3)
- Concrete, normal, at plant [CH]: 10 m3
  Uncertainty from pedigree matrix: (3, 2, 3, 1, 1, 3)
- Electricity, high voltage, production ENTSO-E, at grid [ENTSO-E]: 500 kWh
  Uncertainty from pedigree matrix: (3, 2, 3, 1, 1, 3)
- Flat glass, coated, at plant [RER]: 3250 kg
  Uncertainty from pedigree matrix: (3, 2, 3, 1, 1, 3)
- Gypsum fibre board, at plant [CH]: 100 kg
  Uncertainty from pedigree matrix: (3, 2, 3, 1, 1, 3)
- Reinforcing steel, at plant [RER]: 9000 kg
  Uncertainty from pedigree matrix: (3, 2, 3, 1, 1, 3)
- Lubricating oil, at plant [RER]: 20 kg
  Uncertainty from pedigree matrix: (3, 2, 3, 1, 1, 3)
- Concrete, exacting, at plant [CH]: 130 m3
  Uncertainty from pedigree matrix: (3, 2, 3, 1, 1, 3)
- Transport, freight, lorry, 16t-32t gross weight, fleet average [RER]: 221000, 94100 tkm (2 entries)
  Uncertainty from pedigree matrix: (3, 2, 3, 1, 1, 3)
- Transport, freight, rail [RER]: 3750 tkm
  Uncertainty from pedigree matrix: (3, 2, 3, 1, 1, 3)
- Transport, barge tanker [RER]: 13.4 tkm
  Uncertainty from pedigree matrix: (3, 2, 3, 1, 1, 3)

## Sources
- Sacchi R., Bauer C., 2023, 2023 - LCI on-road vehicles - Sacchi, PSI, Villigen, CH
doi: 10.5281/ZENODO.5156043
