# Electricity mix, consumer, according to BFE 2005, at plant

Dataset: EcoSpold 1, unit process
Functional unit: 1 kWh
Category: energy supply, kbob recommendation / electricity, delivered via network
Geography: CH
Time period: 2004-01 to 2004-12
Production volume: production volume on low voltage level: 51'000GWh
Share of production covered: 100 %
Generated by: Matthias Tuchschmid
accessRestrictedTo: 0
copyright: true

## General comment
Electricity domestic net production and import shares are based on annual averages.;

## Included processes
It includes the shares of domestic electricity production by technology and imports from neighbouring countries (production mixes) at the busbar. It does not include transformation, transport nor distribution losses.

## Geography
Data apply to public and self producers in Switzerland. It includes imports from Germany, France, Italy, Austria and other countries (approximated with the CENTREL Mix).

## Technology
No technology description is provided because the dataset just describes the power plant portfolio of the respective country using current (2004) average technology per energy carrier.

## Time period
Time period of statistics used.

## Reference product
- Electricity mix, consumer, according to BFE 2005, at plant [CH]: 1 kWh

## Inputs from technosphere
- Electricity, production mix photovoltaic, at plant [DE]: 1.8296e-5 kWh; lognormal SD95 1.05
  (1,1,1,1,1,1); national and international statistics
- Electricity, at cogen 300kWth, diesel, allocation exergy [CH]: 0.0021186 kWh; lognormal SD95 1.05
  (1,1,1,1,1,1); national and international statistics
- Electricity, at cogen with biogas engine, allocation exergy [CH]: 0.00012362 kWh; lognormal SD95 1.05
  (1,1,1,1,1,1); national and international statistics
- Electricity, production mix: 0.20709 kWh; lognormal SD95 1.0541
  (1,1,1,3,1,1); national and international statistics
- Electricity, at cogen ORC 1400kWth, wood, allocation exergy [CH]: 0.00012362 kWh; lognormal SD95 1.2077
  (1,1,1,1,3,1); national and international statistics
- Electricity, natural gas, at power plant [DE]: 0.0024218 kWh; lognormal SD95 1.05
  (1,1,1,1,1,1); national and international statistics
- Electricity, hydropower, at pumped storage power plant [CH]: 0.015579 kWh; lognormal SD95 1.05
  (1,1,1,1,1,1); national and international statistics
- Electricity, hydropower, at power plant [FR]: 0.015284 kWh; lognormal SD95 1.05
  (1,1,1,1,1,1); national and international statistics
- Electricity, at cogen 300kWth, natural gas, allocation exergy [CH]: 0.015741 kWh; lognormal SD95 1.05
  (1,1,1,1,1,1); national and international statistics
- Electricity, production mix photovoltaic, at plant [CH]: 0.00027445 kWh; lognormal SD95 1.05
  (1,1,1,1,1,1); national and international statistics
- Electricity, oil, at power plant [IT]: 0.0010593 kWh; lognormal SD95 1.05
  (1,1,1,1,1,1); national and international statistics
- Electricity, nuclear, at power plant [CH]: 0.27334 kWh; lognormal SD95 1.05
  (1,1,1,1,1,1); national and international statistics
- Electricity, at wind farm [CH]: 2.9414e-5 kWh; lognormal SD95 1.05
  (1,1,1,1,1,1); national and international statistics
- Electricity, hydropower, at power plant [CH]: 0.30758 kWh; lognormal SD95 1.05
  (1,1,1,1,1,1); national and international statistics
- Electricity, hard coal, at power plant [DE]: 0.0010844 kWh; lognormal SD95 1.0541
  (1,1,1,3,1,1); national and international statistics
- Electricity, nuclear, at power plant pressure water reactor [FR]: 0.13817 kWh; lognormal SD95 1.05
  (1,1,1,1,1,1); national and international statistics

## Sampling procedure
Statistical data

## Extrapolations
unknown electricity is modeled with UCTE-electricity mix

## Sources
- Frischknecht R., Tuchschmid M., Faist-Emmenegger M., Bauer C., Dones R., 2007, 2007 - Electricy mix and grid - Frischknecht, Project reports, 173, Swiss Centre for LCI, ESU-services Ltd., PSI, Duebendorf and Uster, CH
Jungbluth N., Tuchschmid M., Frischknecht R. (2007) Life Cycle Inventories. Project reports. Volume: 173. ESU-services Ltd.. Uster, CH.

## Validation
Proof reading validation: automatic validation in Excel; Other validation: none;
