# Transport, Bicycle, electric, cargo bike, NMC battery, 2020, label-certified electricity

Dataset: EcoSpold 1, unit process
Functional unit: 1 km
Category: transport systems / road\Transformation
Geography: CH
Time period: 2020-01 to 2020-12
Generated by: Romain Sacchi
accessRestrictedTo: 0
copyright: False

## General comment
Power: 0.25 kW. Lifetime: 20000 km. Annual kilometers: 2000 km. Number of passengers: 1. Curb mass: 45.1 kg. Lightweighting of glider: 0%. Emission standard: None. Service visits throughout lifetime: 1.3. Range: 41 km. Battery capacity: 0.5 kWh. Available battery capacity: 0.4 kWh. Battery mass: 3.1 kg. Battery replacement throughout lifetime: 1. Fuel tank capacity: 0 kWh. Fuel mass: 0 kg. Source: Sacchi R., Bauer C. Life cycle inventories for on-road vehicles. Paul Scherrer Institut, 2023. DOI: 10.5281/zenodo.5156043.

## Time period
Technology and vehicle lightweighting factors match manufacture year of 2020

## Reference product
- Transport, Bicycle, electric, cargo bike, NMC battery, 2020, label-certified electricity [CH]: 1 km

## Inputs from technosphere
- Bicycle, electric, cargo bike, NMC battery, 2020 [CH]: 5e-5 p; lognormal SD95 1.12899
  Uncertainty from pedigree matrix: (3, 3, 2, 1, 1, 3)
- Road [CH]: 9.14e-5 my; lognormal SD95 1.51685
  Uncertainty from pedigree matrix: (3, 1, 5, 2, 1, 1)
- Electricity, low voltage, certified electricity, at grid [CH]: 0.0106 kWh; lognormal SD95 1.23828
  Uncertainty from pedigree matrix: (4, 4, 2, 2, 1, 3)
- Maintenance, electric bicycle, without battery [CH]: 6.67e-5 p; lognormal SD95 1.12899
  Uncertainty from pedigree matrix: (3, 3, 2, 1, 1, 3)
- Road wear emissions, passenger car [RER]: 6.41e-6 kg; lognormal SD95 1.62301
  Uncertainty from pedigree matrix: (4, 5, 2, 3, 4, 3)
- Tyre wear emissions, passenger car [RER]: 5.31e-6 kg; lognormal SD95 1.62301
  Uncertainty from pedigree matrix: (4, 5, 2, 3, 4, 3)
- Brake wear emissions, passenger car [RER]: 5.16e-6 kg; lognormal SD95 1.62301
  Uncertainty from pedigree matrix: (4, 5, 2, 3, 4, 3)
- Disposal, road [RER]: 7.6e-5 my; lognormal SD95 1.51685
  Uncertainty from pedigree matrix: (3, 1, 5, 2, 1, 1)

## Sources
- Sacchi R., Bauer C., 2023, 2023 - LCI on-road vehicles - Sacchi, PSI, Villigen, CH
doi: 10.5281/ZENODO.5156043
