# Sugar refinery

Dataset: EcoSpold 1, unit process, infrastructure
Functional unit: 1 p
Category: agricultural / food\infrastructure
Geography: GLO
Time period: 2000-01 to 2000-12
Production volume: World production of sugar was 130 Mt in 2000
Share of production covered: 0 %
Generated by: Edgard Gnansounou
accessRestrictedTo: 0
copyright: true

## General comment
Sugar refinery with a production capacity of 200 kt sugar per year (production period of 100-180 days/year, depending on the feedstock). Life time is taken as 50 years. Equivalent feed capacities vary from 1’300 kt/yr for sugar beets to 1’650 kt/yr for sugarcane.;

## Included processes
This process includes land use and occupation, buildings and facilities of a typical sugar refinery in the global context. Energy use for construction and related emissions and/or waste effluents are not included.

## Technology
Technology is of a standard sugar refinery, including washing of the feedstock, juice extraction, purification and crystallisation. Juice extraction is performed by diffusion.

## Reference product
- Sugar refinery [GLO]: 1 p
  Global

## Inputs from technosphere
- Concrete, sole plate and foundation, at plant [CH]: 13789 m3; lognormal SD95 1.6511
  (4,4,1,5,4,5); Adapted from the dataset 'ethanol fermentation plant'
- Transport, freight, lorry, 16t-32t gross weight, fleet average [CH]: 1.1089e6 tkm; lognormal SD95 2.3493
  (4,4,1,5,4,5); Adapted from the dataset 'ethanol fermentation plant'
- Disposal, building, concrete, not reinforced, to final disposal [CH]: 3.0333e7 kg; lognormal SD95 1.6511
  (4,4,1,5,4,5); Adapted from the dataset 'ethanol fermentation plant'
- Chromium steel 18/8, at plant [RER]: 161110 kg; lognormal SD95 1.6511
  (4,4,1,5,4,5); Adapted from the dataset 'ethanol fermentation plant'
- Transport, freight, rail [RER]: 554440 tkm; lognormal SD95 2.3493
  (4,4,1,5,4,5); Adapted from the dataset 'ethanol fermentation plant'
- Steel, low-alloyed, at plant [RER]: 185560 kg; lognormal SD95 1.6511
  (4,4,1,5,4,5); Adapted from the dataset 'ethanol fermentation plant'
- Copper, at regional storage [RER]: 40000 kg; lognormal SD95 1.6511
  (4,4,1,5,4,5); Adapted from the dataset 'ethanol fermentation plant'
- Diesel, burned in building machine, average [CH]: 135560 MJ; lognormal SD95 1.6511
  (4,4,1,5,4,5); Adapted from the dataset 'ethanol fermentation plant'
- Nickel, 99.5%, at plant [GLO]: 35556 kg; lognormal SD95 1.6511
  (4,4,1,5,4,5); Adapted from the dataset 'ethanol fermentation plant'
- Zinc, primary, at regional storage [RER]: 95556 kg; lognormal SD95 1.6511
  (4,4,1,5,4,5); Adapted from the dataset 'ethanol fermentation plant'
- Electricity, medium voltage, at grid [CH]: 16444 kWh; lognormal SD95 1.6511
  (4,4,1,5,4,5); Adapted from the dataset 'ethanol fermentation plant'
- Steel, converter, unalloyed, at plant [RER]: 438890 kg; lognormal SD95 1.6511
  (4,4,1,5,4,5); Adapted from the dataset 'ethanol fermentation plant'

## Inputs from nature
- Transformation, to industrial area, built up [resources, land]: 26250 m2; lognormal SD95 2.3493
  (4,4,1,5,4,5); Adapted from the dataset 'ethanol fermentation plant'
- Transformation, from unknown [resources, land]: 41667 m2; lognormal SD95 2.3493
  (4,4,1,5,4,5); Adapted from the dataset 'ethanol fermentation plant'
- Occupation, construction site [resources, land]: 208330 m2a; lognormal SD95 1.9022
  (4,4,1,5,4,5); Adapted from the dataset 'ethanol fermentation plant'
- Occupation, industrial area, vegetation [resources, land]: 770830 m2a; lognormal SD95 1.9022
  (4,4,1,5,4,5); Adapted from the dataset 'ethanol fermentation plant'
- Transformation, to industrial area, vegetation [resources, land]: 15417 m2; lognormal SD95 2.3493
  (4,4,1,5,4,5); Adapted from the dataset 'ethanol fermentation plant'
- Occupation, industrial area, built up [resources, land]: 1.3125e6 m2a; lognormal SD95 1.9022
  (4,4,1,5,4,5); Adapted from the dataset 'ethanol fermentation plant'

## Emissions to nature
- Heat, waste [emissions to air, high. pop.]: 59200 MJ; lognormal SD95 1.6511
  (4,4,1,5,4,5); Adapted from the dataset 'ethanol fermentation plant'

## Sampling procedure
Data was adapted from the ethanol fermentation plant dataset.

## Sources
- Jungbluth N., Chudacoff M., Dauriat A., Dinkel F., Doka G., Faist Emmenegger M., Gnansounou E., Kljun N., Spielmann M., Stettler C., Sutter J., 2007, 2007 - LCI bioenergy - Jungbluth, Final report ecoinvent data v2.0, 17, Swiss Centre for LCI, ESU-services Ltd., Duebendorf and Uster, CH
Jungbluth N., Chudacoff M., Dauriat A., Dinkel F., Doka G., Faist Emmenegger M., Gnansounou E., Kljun N., Spielmann M., Stettler C., Sutter J. (2007) Life Cycle Inventories of Bioenergy. Final report ecoinvent data v2.0. Volume: 17. Swiss Centre for LCI, ESU. Duebendorf and Uster, CH.
Type: Measurement on site
Source: CD-ROM
First author: Jungbluth N.
Other authors: Chudacoff M., Dauriat A., Dinkel F., Doka G., Faist Emmenegger M., Gnansounou E., Kljun N., Spielmann M., Stettler C., Sutter J.
Year: 2007
Title of anthology: Final report ecoinvent data v2.0
Place of publication: Duebendorf and Uster, CH
Publisher: Swiss Centre for LCI, ESU
Volume No: 17

## Validation
Proof reading validation: Passed.; Other validation: none;
