# Wind turbine 15MW, offshore, monopile substructure

Dataset: EcoSpold 1, unit process, infrastructure
Functional unit: 1 unit
Category: wind power / production of components
Geography: RER
Time period: 2024 to 2024
Share of production covered: 100 %
Generated by: Hanna Kroehnert
accessRestrictedTo: 0
copyright: true

## Included processes
Wind turbine substructure (including transition piece), at site including manufacturing, transports, installation, replacements, decommission and waste treatement. Calculated for FU of 1p.
Data of material inputs are based on the IEA reference 15MW offshore wind turbine using a monopile substructure.
The distance to installation port is assumed to be 80 km. The average water depth is 18 m.
Assumed lifetime is 25 years.

Main data source for material composition:
Renewable Energy Material Property Database, REMPD (Cooperman et al., 2023)
IEA Wind TCP Task 37 Definition of the IEA Wind 15-Megawatt Offshore Reference Wind Turbine (Technical Report NREL/TP-5000-75698). IEA Wind TCP. https://www.nrel.gov/docs/fy20osti/75698.pdf (Gaertner, et al., 2020)

## Reference product
- Wind turbine 15MW, offshore, monopile substructure [RER]: 1 unit

## Inputs from technosphere
- Chromium, at regional storage [RER]: 467.79 kg; lognormal SD95 1.1466
  (2,3,3,2,1,3,BU:1.05); Input calculated based on Cooperman et al. (2023) and Gaertner et al. (2020)
- Cobalt, at plant [GLO]: 20.649 kg; lognormal SD95 1.1466
  (same comment as for Chromium, at regional storage)
- Gallium, semiconductor-grade, at regional storage [RER]: 0.24727 kg; lognormal SD95 1.1466
  (same comment as for Chromium, at regional storage)
- Pig iron, at plant [RER]: 614.37 kg; lognormal SD95 1.1466
  (same comment as for Chromium, at regional storage)
- Lithium, at plant [GLO]: 0.00035108 kg; lognormal SD95 1.1466
  (same comment as for Chromium, at regional storage)
- Steel, low-alloyed, at plant [RER]: 1.2746e6 kg; lognormal SD95 1.1466
  (same comment as for Chromium, at regional storage)
- Manganese, at regional storage [RER]: 24038 kg; lognormal SD95 1.1466
  (same comment as for Chromium, at regional storage)
- Nickel, 99.5%, at plant [GLO]: 18022 kg; lognormal SD95 1.1466
  (same comment as for Chromium, at regional storage)
- Tantalum, powder, capacitor-grade, at regional storage [GLO]: 3.7092 kg; lognormal SD95 1.1466
  (same comment as for Chromium, at regional storage)
- Lanthanum oxide, at plant [CN]: 6.514 kg; lognormal SD95 1.1466
  (same comment as for Chromium, at regional storage)
- Gravel, crushed, at mine [CH]: 2.4762e6 kg; lognormal SD95 1.1466
  (same comment as for Chromium, at regional storage)
- Tin, at regional storage [RER]: 1.657 kg; lognormal SD95 1.1466
  (same comment as for Chromium, at regional storage)
- Zinc, primary, at regional storage [RER]: 198.84 kg; lognormal SD95 1.1466
  (same comment as for Chromium, at regional storage)
- Sheet rolling, steel [RER]: 1.2746e6 kg; lognormal SD95 1.1466
  (same comment as for Chromium, at regional storage)
- Welding, arc, steel [RER]: 68.4 m; lognormal SD95 1.1466
  (same comment as for Chromium, at regional storage)
- Transport, freight, lorry, fleet average [RER]: 758830 tkm; lognormal SD95 2.0675
  (4,3,3,1,1,3,BU:2); Includes the transportation of components to port of installation.
- Transport, freight, lorry, diesel, 26t gross weight, 2010, EURO-V, regional delivery [RER]: 344560 tkm; lognormal SD95 2.0675
  (4,3,3,1,1,3,BU:2); Includes the transportation of materials to component manufacturing site and components to waste treatement site.
- Transport, transoceanic freight ship [OCE]: 8.5821e7 tkm; lognormal SD95 2.2975
  (4,3,3,1,4,3,BU:2); Includes the transportation of components to installation port and vessel activiy for installation and decommissioning.
- Operation, freight train, diesel [RER]: 263600 tkm; lognormal SD95 2.0675
  (4,3,3,1,1,3,BU:2); Includes the transportation of components to port of installation.
- Diesel, burned in building machine, average [CH]: 37235 MJ; lognormal SD95 2.2975
  (4,3,3,1,4,3,BU:2); Refers to port crane operation during installation and decommissioning.
- Recycling steel and iron [RER]: 1.2115e6 kg; lognormal SD95 1.2748
  (2,4,3,3,3,3,BU:1.05); Own calculation; recycling of steel and iron; assumed recycling rate: 95%
- Disposal, steel, 0% water, to construction waste landfill [CH]: 63762 kg; lognormal SD95 1.2748
  (2,4,3,3,3,3,BU:1.05); Own calculation; landfill of steel and iron; assumed landfill rate: 5%
- Disposal, plastics, mixture, 15.3% water, to municipal incineration [CH]: 3.2567 kg; lognormal SD95 1.2748
  (2,4,3,3,3,3,BU:1.05); Own calculation; incineration of plastic materials; assumed incineration rate: 50%
- Disposal, plastics, mixture, 15.3% water, to sanitary landfill [CH]: 3.2567 kg; lognormal SD95 1.2748
  (2,4,3,3,3,3,BU:1.05); Own calculation; landfill of plastic materials; assumed landfill rate: 50%
- Disposal, inert material, 0% water, to sanitary landfill [CH]: 2.5189e6 kg; lognormal SD95 1.2748
  (2,4,3,3,3,3,BU:1.05); Own calculation; landfill of remaining materials (which are not classified as steel and iron, aluminum, copper or plastics); assumed landfill rate 100%

## Inputs from nature
- Transformation, from sea and ocean [resources, land]: 157 m2; lognormal SD95 2.095
  (4,1,1,1,1,5,BU:2); Own estimation
- Transformation, to industrial area, built up [resources, land]: 157 m2; lognormal SD95 2.095
  (4,1,1,1,1,5,BU:2); Own estimation
- Occupation, seabed, infrastructure [resources, land]: 3925 m2a; lognormal SD95 1.3164
  (4,1,1,1,1,5,BU:1.1); Own estimation

## Sources
- Kroehnert H., Frehner A., Stucki M., 2025, 2025 - LCI wind Energy - Kroehnert, Project report, 0, ZHAW, Waedenswil, CH

## Validation
22.07.2025
"S:\pools\n\N-IUNR-FG-LCA\Projekte\Wind LCA\LCI-Update\Sachbilanz"
