# Municipal waste incineration plant

Dataset: EcoSpold 1, unit process, infrastructure
Functional unit: 1 p
Category: waste / infrastructure
Geography: CH
Time period: 2000-01 to 2000-12
Generated by: Gabor Doka
accessRestrictedTo: 0
copyright: true

## General comment
Swiss municipal waste incineration plant with 100'000 ton per year capacity. Operational time 40 years;
Synonyms: MSWI, KVA;

## Included processes
construction and disposal of municipal waste incineration plant, land use exchanges.

## Geography
Technology encountered in Switzerland. Well applicable to modern grate incinerators.

## Technology
Municipal soild waste incineration plant with waste bunker, grate incinerator, steam boiler, electrostatic precipitator, wet scrubber.

## Reference product
- Municipal waste incineration plant [CH]: 1 p
  SWITZERLAND

## Inputs from technosphere
- Chromium steel 18/8, at plant [RER]: 80000 kg; lognormal SD95 3.1
  (2,3,3,1,1,5) & basic uncertainty of 3;
- Reinforcing steel, at plant [RER]: 3.92e6 kg; lognormal SD95 3.1
  (2,3,3,1,1,5) & basic uncertainty of 3;
- Transport, freight, lorry, 16t-32t gross weight, fleet average [CH]: 2.83e6 tkm; lognormal SD95 2.2
  uncertainty calculated from uncertainty of transported infrastructure masses and uncertainty of default transport distances
- Transport, freight, rail [RER]: 1.46e6 tkm; lognormal SD95 2.1
  (same comment as for Transport, freight, lorry, 16t-32t gross weight, fleet average)
- Bitumen, at refinery [CH]: 800000 kg; lognormal SD95 3.1
  (2,3,3,1,1,5) & basic uncertainty of 3;
- Disposal, building, concrete, not reinforced, to sorting plant [CH]: 1e7 kg; lognormal SD95 3.1
  (2,3,3,1,1,5) & basic uncertainty of 3;
- Disposal, building, reinforced concrete, to sorting plant [CH]: 4.12e7 kg; lognormal SD95 3.1
  (2,3,3,1,1,5) & basic uncertainty of 3;
- Cement, unspecified, at plant [CH]: 4.99e6 kg; lognormal SD95 3.1
  (2,3,3,1,1,5) & basic uncertainty of 3;
- Gravel, round, at mine [CH]: 3.5e7 kg; lognormal SD95 3.1
  (2,3,3,1,1,5) & basic uncertainty of 3;
- Sand, at mine [CH]: 1e7 kg; lognormal SD95 3.1
  (2,3,3,1,1,5) & basic uncertainty of 3;
- Disposal, building, bitumen sheet, to final disposal [CH]: 800000 kg; lognormal SD95 3.1
  (2,3,3,1,1,5) & basic uncertainty of 3;

## Inputs from nature
- Occupation, industrial area, built up [resources, land]: 120000 m2a; lognormal SD95 1.7
  (4,5,1,1,1,5) & basic uncertainty of 1.5; estimate on land area, production volume and building, operation and demolition time
- Occupation, construction site [resources, land]: 15000 m2a; lognormal SD95 1.7
  (same comment as for Occupation, industrial area, built up)
- Transformation, from unknown [resources, land]: 3000 m2; lognormal SD95 2.1
  (4,5,1,1,1,5) & basic uncertainty of 2; estimate on land area and production volume
- Transformation, to industrial area, built up [resources, land]: 3000 m2; lognormal SD95 2.1
  (4,5,1,1,1,5) & basic uncertainty of 2; estimate on land area and production volume

## Sampling procedure
Data from literature and estimates.

## Sources
- Doka G., 2009, 2009 - LCI waste treatment services - Doka, Final report ecoinvent data v2.0, 13, Swiss Centre for LCI, Doka LCA, Duebendorf and St. Gallen, CH
Doka G. (2007) Life Cycle Inventories of Waste Treatment Services. Final report ecoinvent data v2.0. Volume: 13. Swiss Centre for LCI, Empa - TSL. Dübendorf, CH.
Type: Separate publication
Source: CD-ROM
First author: Doka G.
Year: 2007
Title of anthology: Final report ecoinvent data v2.0
Place of publication: Dübendorf, CH
Publisher: Swiss Centre for LCI, Empa - TSL
Volume No: 13

## Validation
Proof reading validation: Passed.; Other validation: none;
