# xxx Electricity, production mix SE

Dataset: EcoSpold 1, unit process
Functional unit: 1 kWh
Category: electricity / notMaintained
Geography: SE
Time period: 2000-01 to 2000-12
Production volume: 150 TWh
Share of production covered: 100 %
Generated by: René Itten
accessRestrictedTo: 0
copyright: true

## General comment
Electricity domestic net production shares are based on IEA statistics for the year 2008.;

## Included processes
It includes the shares of domestic electricity production by technology at the busbar. It does not include transformation, transport nor distribution losses.

## Geography
Data apply to public and self producers in Sweden.

## Technology
No technology description is provided because the dataset just describes the power plant portfolio of the respective country using current (2004) average technology per energy carrier.

## Time period
Time period of statistics used (2008).

## Reference product
- xxx Electricity, production mix SE [SE]: 1 kWh
  SWEDEN

## Inputs from technosphere
- Electricity, hard coal, at power plant [ENTSO-E]: 0.0033898 kWh; lognormal SD95 1.0511
  (1,1,1,2,1,1); assumption for hard coal power production in Sweden, value: IEA statistics 2008
- Electricity, nuclear, at power plant pressure water reactor [UCTE]: 0.092256 kWh; lognormal SD95 1.0511
  (1,1,1,2,1,1); assumption for nuclear power production in Sweden using PWR, value: IEA statistics 2008, fraction: IAEA Database 2010 (PRIS)
- Electricity, hydropower, at run-of-river power plant [RER]: 0.37767 kWh; lognormal SD95 1.0511
  (1,1,1,2,1,1); estimated share of ROR hydropower production in Sweden: 80%
- Electricity, oil, at power plant [SE]: 0.0052298 kWh; lognormal SD95 1.05
  (1,1,1,1,1,1); assumption for petroleum product and fuel oil power production in Sweden, value: IEA statistics 2008
- Electricity, peat, at power plant [NORDEL]: 0.0040625 kWh; lognormal SD95 1.0541
  (1,1,1,3,1,1); assumption for peat power production in Sweden, value: IEA statistics 2008
- Electricity, at cogen 300kWth, diesel, allocation exergy [CH]: 0.00052759 kWh; lognormal SD95 1.0541
  (1,1,1,3,1,1); assumption for diesel and other fossil fuel power production in Sweden, value: IEA statistics 2008
- Electricity, from natural gas [SE]: 0.0039767 kWh; lognormal SD95 1.0511
  (1,1,1,2,1,1); assumption for natural gas power production in Sweden, value: IEA statistics 2008
- Electricity, at cogen 1MWth, wood chips, allocation exergy [CH]: 0.058906 kWh; lognormal SD95 1.0541
  (1,1,1,3,1,1); assumption for cogeneration power production in Sweden, value: IEA statistics 2008
- Electricity, at cogen with biogas engine, allocation exergy [CH]: 0.00089691 kWh; lognormal SD95 1.0541
  (1,1,1,3,1,1); assumption for power production from biogas, sewage and landfill gas in Sweden, value: IEA statistics 2008
- Electricity, hydropower, at reservoir power plant, alpine region [RER]: 0.094418 kWh; lognormal SD95 1.0511
  (1,1,1,2,1,1); estimated share of reservoir hydropower production in Sweden: 20%
- Electricity, production mix photovoltaic, at plant [SE]: 2.5959e-5 kWh; lognormal SD95 1.05
  (1,1,1,1,1,1); assumption for solar power production in Sweden, value: IEA statistics 2008
- Electricity, hydropower, at pumped storage power plant [SE]: 0.00097058 kWh; lognormal SD95 1.05
  (1,1,1,1,1,1); estimated share of pumped storage production in Sweden: 0.21%
- Electricity from waste, at municipal waste incineration plant [CH]: 0.014225 kWh; lognormal SD95 1.0541
  (1,1,1,3,1,1); assumption for power production from municipal and industrial waste in Sweden, value: IEA statistics 2008
- Electricity, nuclear, at power plant boiling water reactor [UCTE]: 0.32237 kWh; lognormal SD95 1.0511
  (1,1,1,2,1,1); assumption for nuclear power production in Sweden using BWR, value: IEA statistics 2008, fraction: IAEA Database 2010 (PRIS)
- Electricity, at wind farm [RER]: 0.013781 kWh; lognormal SD95 1.0511
  (1,1,1,2,1,1); assumption for geothermal power production in Sweden, value: IEA statistics 2008
- Electricity, industrial gas, at power plant [NORDEL]: 0.0072874 kWh; lognormal SD95 1.0511
  (1,1,1,2,1,1); assumption for industrial, coke and blast furnace gas power production in Sweden, value: IEA statistics 2008

## Sampling procedure
Statistical data

## Sources
- Frischknecht R., Itten R., Flury K., 2012, 2012 - GHG emis. from Swiss elec. mixes - Frischknecht, Project reports, 401, ESU-services Ltd., Uster, CH
Itten, R., Frischknecht, R. (2012) Life Cycle Inventories of electricity mixes. Project reports. Volume: 401. ESU-services Ltd.. Uster, CH.
Type: Separate publication
First author: Itten, R.
Other authors: Frischknecht, R.
Year: 2012
Title of anthology: Project reports
Place of publication: Uster, CH
Publisher: ESU-services Ltd.
Volume No: 401

## Validation
Proof reading validation: automatic validation in Excel; Other validation: \\Server\E\ESU-Docs\Projektablage\401 Update Strommix v3.0\EcoSpold\_Europa\[401-electricity-mix-sweden-SE-v1.1.xlsx]X-Process;
