# All-in-one printer (WiFi), at plant

Dataset: EcoSpold 1, unit process
Functional unit: 1 p
Category: electronics / devices
Geography: GLO
Time period: 2023-01 to 2029-12
Synonyms: Zusatzgeräte; All-in-One Drucker (Wifi)
Generated by: Lugas Raka Adrianto, Maulana Permana Ajie, Didier Beloin-Saint-Pierre
accessRestrictedTo: 0
copyright: false

## General comment
The dataset represents the typical all in one printers, with data sourced from literature and product sheets;

## Included processes
The dataset for this average inkjet printer are taken from the disassembly data from the inkjet all in one printer Kodak printer ESP7 (source: Babbitt et al., 2020) and the product sheets of printer manufacturers, i.e., HP, specifically HP OfficeJet Pro 9022e All-in-One Printer (HP, 2023). The key technical specifications are built-in WiFi connectivity, 1 GHz processor, 512 MB memory, and 4 inkjet cartridges. The total weight of the printer is approximately 11.6 kg, which includes the casing materials (plastics, aluminum, steel, and glass), cartridges, and electronics such as printed circuit boards.

## Geography
Data for global average all in one printers.

## Technology
Average all in one printers with WiFi connection.

## Reference product
- All-in-one printer (WiFi), at plant [GLO]: 1 p
  Literature for the materials: Average all in one printers bill of materials from Babbit et al 2020 and HP 2023 product sheet

## Inputs from technosphere
- Acrylonitrile-butadiene-styrene copolymer, ABS, at plant [RER]: 1.889 kg; lognormal SD95 1.24
  (2,3,2,4,2,5,BU:1.05);
- Aluminium, production mix, at plant [RER]: 0.003 kg; lognormal SD95 1.24
  (2,3,2,4,2,5,BU:1.05); Metal parts.
- Inkjet cartridge, at plant [GLO]: 4 p; lognormal SD95 1.24
  (2,3,2,4,2,5,BU:1.05); 4 cartridges of different colors according to the product sheet
- Cable, connector for computer, without plugs, at plant [GLO]: 1.8 m; lognormal SD95 1.24
  (2,3,2,4,2,5,BU:1.05); Internal parts.
- Cable, printer cable, without plugs, at plant [GLO]: 1.8 m; lognormal SD95 1.24
  (2,3,2,4,2,5,BU:1.05); Internal parts.
- Copper, primary, at refinery [GLO]: 0.055 kg; lognormal SD95 1.24
  (2,3,2,4,2,5,BU:1.05); Metal parts.
- Corrugated board, recycling fibre, double wall, at plant [RER]: 2.32 kg; lognormal SD95 1.24
  (2,3,2,4,2,5,BU:1.05); Housing.
- Electricity, medium voltage, production GLO, at grid [GLO]: 1.3336 kWh; lognormal SD95 1.24
  (2,3,2,4,2,5,BU:1.05); Assumed to be the same as the average laser jet printers
- Flat glass, uncoated, at plant [RER]: 1.129 kg; lognormal SD95 1.24
  (2,3,2,4,2,5,BU:1.05); Flat panel glass + other glass
- Injection moulding [RER]: 7.556 kg; lognormal SD95 1.24
  (2,3,2,4,2,5,BU:1.05);
- Plugs, inlet and outlet, for computer cable, at plant [GLO]: 1 p; lognormal SD95 1.24
  (2,3,2,4,2,5,BU:1.05); Internal parts.
- Plugs, inlet and outlet, for printer cable, at plant [GLO]: 1 p; lognormal SD95 1.24
  (2,3,2,4,2,5,BU:1.05); Internal parts.
- Polystyrene foam slab, at plant [RER]: 0.569 kg; lognormal SD95 1.24
  (2,3,2,4,2,5,BU:1.05); Housing.
- Polystyrene, high impact, HIPS, at plant [RER]: 5.1 kg; lognormal SD95 1.24
  (2,3,2,4,2,5,BU:1.05); Housing.
- Printed wiring board, through-hole mounted, unspec., Pb free, at plant [GLO]: 0.385 kg; lognormal SD95 1.24
  (2,3,2,4,2,5,BU:1.05);
- Section bar extrusion, aluminium [RER]: 0.003 kg; lognormal SD95 1.24
  (2,3,2,4,2,5,BU:1.05);
- Sheet rolling, copper [RER]: 0.055 kg; lognormal SD95 1.24
  (2,3,2,4,2,5,BU:1.05);
- Sheet rolling, steel [RER]: 2.318 kg; lognormal SD95 1.24
  (2,3,2,4,2,5,BU:1.05);
- Steel, low-alloyed, at plant [RER]: 2.318 kg; lognormal SD95 1.24
  (2,3,2,4,2,5,BU:1.05); Metal parts.
- Transport, freight, lorry, fleet average [RER]: 0.997 tkm; lognormal SD95 2.06
  (2,3,2,4,2,5,BU:2.00);
- Transport, freight, rail [RER]: 1.99 tkm; lognormal SD95 2.06
  (2,3,2,4,2,5,BU:2.00);
- Transport, transoceanic freight ship [OCE]: 212 tkm; lognormal SD95 2.06
  (2,3,2,4,2,5,BU:2.00);
- Disposal, plastic, consumer electronics, 15.3% water, to municipal incineration [CH]: 0.7556 kg; lognormal SD95 1.25
  (3,3,2,2,2,5,BU:1.05)
- Disposal, polystyrene, 0.2% water, to municipal incineration [CH]: 2.267 kg; lognormal SD95 1.25
  (3,3,2,2,2,5,BU:1.05)
- Disposal, treatment of cables [GLO]: 0.02 kg; lognormal SD95 1.25
  (3,3,2,2,2,5,BU:1.05)
- Shredding, electrical and electronic scrap [CH]: 6.996 kg; lognormal SD95 1.25
  (3,3,2,2,2,5,BU:1.05); Assuming 60% parts are recycled, Literature: Bousquin 2011.

## Sampling procedure
Literature & own estimations

## Extrapolations
Average technology

## Sources
- Raka Adrianto L., Permana Ajie M., Beloin-Saint-Pierre D., 2024, 2024 - LCI ICT sector - Raka Adrianto, Empa, St. Gallen, CH

## Validation
Proof reading validation: Passed, Other validation: none, Validator: Mischa Zschokke, Company: Carbotech, Country: CH
