# Electricity mix, electric utility Obwalden, at plant

Dataset: EcoSpold 1, unit process
Functional unit: 1 kWh
Category: electricity / supply mix
Geography: CH
Time period: 2009-01 to 2013-12
Generated by: Philippe Stolz
accessRestrictedTo: 0
copyright: true

## General comment
The technology shares in the production mix are based on the electricity declaration of the electric utility Obwalden in 2013. Electricity production from hydropower, biomass and nuclear power plants is further divided into specific technologies based on the Swiss electricity consumption mix in the year 2009.;

## Included processes
Included are the technology shares of the electricity production at the electric utility Obwalden at the busbar. Not included are transformation, transport or distribution losses.

## Geography
Data apply to the supply area of the electric utility Obwalden.

## Technology
Average technology per energy carrier.

## Time period
Time of publications.

## Reference product
- Electricity mix, electric utility Obwalden, at plant [CH]: 1 kWh
  SWITZERLAND

## Inputs from technosphere
All rows: lognormal SD95 1.0714
- Electricity, nuclear, at power plant boiling water reactor [CH]: 0.040319 kWh
  (1,1,1,1,1,3,BU:1.05); Electricity declaration EWO 2013
- Electricity, production mix photovoltaic, at plant [CH]: 0.0066612 kWh
  (1,1,1,1,1,3,BU:1.05); Electricity declaration EWO 2013
- Electricity, hydropower, at small hydropower plant [CH]: 0.091982 kWh
  (1,1,1,1,1,3,BU:1.05); Electricity declaration EWO 2013
- Electricity, hydropower, at run-of-river power plant [CH]: 0.34385 kWh
  (1,1,1,1,1,3,BU:1.05); Electricity declaration EWO 2013
- Electricity, at cogen 300kWth, biomethane, allocation exergy [CH]: 0.0014303 kWh
  (1,1,1,1,1,3,BU:1.05); Electricity declaration EWO 2013
- Electricity, at cogen with biogas engine, agricultural covered, alloc. exergy [CH]: 0.0017592 kWh
  (1,1,1,1,1,3,BU:1.05); Electricity declaration EWO 2013
- Electricity, nuclear, at power plant pressure water reactor [CH]: 0.045028 kWh
  (1,1,1,1,1,3,BU:1.05); Electricity declaration EWO 2013
- Electricity, at wind farm [CH]: 0.00092425 kWh
  (1,1,1,1,1,3,BU:1.05); Electricity declaration EWO 2013
- Electricity, hydropower, net, at reservoir power plant [CH]: 0.50057 kWh
  (1,1,1,1,1,3,BU:1.05); Electricity declaration EWO 2013
- Electricity, at cogen 1MWth, wood chips, allocation exergy [CH]: 0.007252 kWh
  (1,1,1,1,1,3,BU:1.05); Electricity declaration EWO 2013
- Electricity, at cogen 300kWth, natural gas, allocation exergy [CH]: 0.0010408 kWh
  (1,1,1,1,1,3,BU:1.05); Electricity declaration EWO 2013

## Sampling procedure
Electricity declaration of the electric utility Obwalden.

## Extrapolations
Electricity production from hydropower, biomass and nuclear power plants is further divided into specific technologies based on the Swiss electricity production mix in the year 2011.

## Sources
- Stolz P., Frischknecht R., 2015, 2015 - LCA solid wood system holzpur - Stolz, Project report, 527, treeze Ltd., Uster, CH
Stolz P., Frischknecht R. (2015) Ökobilanz Vollholzsystem holzpur. Project report. Volume: 527. treeze Ltd.. Uster, CH.
Type: Separate publication
Source: Report
First author: Stolz P.
Other authors: Frischknecht R.
Year: 2015
Title of anthology: Project report
Place of publication: Uster, CH
Publisher: treeze Ltd.
Volume No: 527

## Validation
Proof reading validation: 08.05.2015; Other validation: \\SRV01\ESU-Docs\Projekte laufend\527 Bilanz Holzpur\EcoSpold\[527-Ökobilanz-holzpur-v0.16.xlsx]X-Process;
