# Corn, at farm

Dataset: EcoSpold 1, unit process
Functional unit: 1 kg
Category: agricultural / plant production
Geography: US
Time period: 2000-01 to 2000-12
Production volume: Total production in the USA is around 280 Million tons.
Share of production covered: 100 %
Generated by: Juergen Sutter
accessRestrictedTo: 0
copyright: true

## General comment
The inventory for the cultivation of corn in the USA is modelled with data from literature. Transports are modelled with standard distances. The functional unit is 1 kg corn grains (fresh mass with a water content of 14 %). Carbon content: 0.375 kg/kg fresh mass. Biomass energy content: 15.9 MJ/kg fresh mass. Yield: 9315 kg/ha. The emissions of N2O and NH3 to air are calculated with emission factors from NREL 2006. The emission of nitrate to water is calculated with a nitrogen loss factor of 32%.;
Synonyms: Körnermais, grain maize;

## Included processes
Cultivation of corn in the USA including use of diesel, machines, fertilizers, and pesticides.

## Geography
The inventory is modelled for the USA

## Technology
Cultivation of corn.

## Time period
Time of publications

## Reference product
- Corn, at farm [US]: 1 kg
  UNITED STATES

## Inputs from technosphere
- Ammonium nitrate, as N, at regional storehouse [RER]: 0.0048927 kg; lognormal SD95 1.0541
  (1,2,1,1,1,1); NREL 2006
- Metolachlor, at regional storehouse [RER]: 4.2885e-5 kg; lognormal SD95 1.0541
  (1,2,1,1,1,1); NASS 2004
- Fertilising, by broadcaster [CH]: 5.4916e-5 ha; lognormal SD95 1.209
  (1,2,1,1,3,1); NREL 2006, KTBL 2004
- Transport, freight, lorry, fleet average [CH]: 0.0028578 tkm; lognormal SD95 2.095
  (4,5,na,na,na,na); Standard Distances
- Acetamide-anillide-compounds, at regional storehouse [RER]: 6.0404e-6 kg; lognormal SD95 1.0541
  (1,2,1,1,1,1); NASS 2004
- Combine harvesting [CH]: 9.5933e-6 ha; lognormal SD95 1.209
  (1,2,1,1,3,1); NREL 2006, KTBL 2004
- Glyphosate, at regional storehouse [RER]: 1.9662e-5 kg; lognormal SD95 1.0541
  (1,2,1,1,1,1); NASS 2004
- Dinitroaniline-compounds, at regional storehouse [RER]: 2.4787e-6 kg; lognormal SD95 1.0541
  (1,2,1,1,1,1); NASS 2004
- Urea, as N, at regional storehouse [RER]: 0.003543 kg; lognormal SD95 1.0541
  (1,2,1,1,1,1); NREL 2006
- 2,4-D, at regional storehouse [RER]: 2.4667e-6 kg; lognormal SD95 1.0541
  (1,2,1,1,1,1); NASS 2004
- Sowing [CH]: 3.8024e-5 ha; lognormal SD95 1.209
  (1,2,1,1,3,1); NREL 2006, KTBL 2004
- Tillage, currying, by weeder [CH]: 0.00019972 ha; lognormal SD95 1.209
  (1,2,1,1,3,1); NREL 2006, KTBL 2004
- Irrigating [CH]: 3.6554e-6 ha; lognormal SD95 1.0541
  (1,2,1,1,1,1); NREL 2006
- Maize seed IP, at regional storehouse [CH]: 0.021471 kg; lognormal SD95 1.0541
  (1,2,1,1,1,1); NREL 2006
- Ammonia, liquid, at regional storehouse [RER]: 0.0084357 kg; lognormal SD95 1.0541
  (1,2,1,1,1,1); NREL 2006
- Pesticide unspecified, at regional storehouse [RER]: 6.2763e-5 kg; lognormal SD95 1.0541
  (1,2,1,1,1,1); NASS 2004
- Dicamba, at regional storehouse [RER]: 1.7327e-6 kg; lognormal SD95 1.0541
  (1,2,1,1,1,1); NASS 2004
- Triazine-compounds, at regional storehouse [RER]: 2.4306e-6 kg; lognormal SD95 1.0541
  (1,2,1,1,1,1); NASS 2004
- Bipyridylium-compounds, at regional storehouse [RER]: 6.1367e-7 kg; lognormal SD95 1.0541
  (1,2,1,1,1,1); NASS 2004
- Application of plant protection products, by field sprayer [CH]: 8.253e-5 ha; lognormal SD95 1.209
  (1,2,1,1,3,1); NREL 2006, KTBL 2004
- Maize drying [CH]: 0.40984 kg; lognormal SD95 1.115
  (1,1,3,3,1,1); Nemecek 2004
- Nitrile-compounds, at regional storehouse [RER]: 9.3855e-7 kg; lognormal SD95 1.0541
  (1,2,1,1,1,1); NASS 2004
- Phenoxy-compounds, at regional storehouse [RER]: 2.1659e-8 kg; lognormal SD95 1.0541
  (1,2,1,1,1,1); NASS 2004
- Pyretroid-compounds, at regional storehouse [CH]: 1.2297e-6 kg; lognormal SD95 1.0541
  (1,2,1,1,1,1); NASS 2004
- Alachlor, at regional storehouse [RER]: 4.1393e-6 kg; lognormal SD95 1.0541
  (1,2,1,1,1,1); NASS 2004
- Atrazine, at regional storehouse [RER]: 9.246e-5 kg; lognormal SD95 1.0541
  (1,2,1,1,1,1); NASS 2004
- Potassium chloride, as K2O, at regional storehouse [RER]: 0.007193 kg; lognormal SD95 1.0541
  (1,2,1,1,1,1); NREL 2006
- Diammonium phosphate, as P2O5, at regional storehouse [RER]: 0.005848 kg; lognormal SD95 1.0541
  (1,2,1,1,1,1); NREL 2006
- Cyclic N-compounds, at regional storehouse [RER]: 5.7757e-7 kg; lognormal SD95 1.0541
  (1,2,1,1,1,1); NASS 2004
- Transport, freight, rail [RER]: 0.015775 tkm; lognormal SD95 2.095
  (4,5,na,na,na,na); Standard Distances
- Tillage, ploughing [CH]: 8.6042e-5 ha; lognormal SD95 1.209
  (1,2,1,1,3,1); NREL 2006, KTBL 2004
- Tillage, cultivating, chiselling [CH]: 0.00012603 ha; lognormal SD95 1.209
  (1,2,1,1,3,1); NREL 2006, KTBL 2004
- Diphenylether-compounds, at regional storehouse [RER]: 1.9252e-7 kg; lognormal SD95 1.0541
  (1,2,1,1,1,1); NASS 2004
- Tillage, harrowing, by spring tine harrow [CH]: 0.00024863 ha; lognormal SD95 1.209
  (1,2,1,1,3,1); NREL 2006, KTBL 2004
- Transport, freight, lorry, fleet average [RER]: 0.004386 tkm; lognormal SD95 2.095
  (4,5,na,na,na,na); Standard Distances
- [sulfonyl]urea-compounds, at regional storehouse [RER]: 5.6313e-7 kg; lognormal SD95 1.0541
  (1,2,1,1,1,1); NASS 2004
- Organophosphorus-compounds, at regional storehouse [RER]: 9.7104e-6 kg; lognormal SD95 1.0541
  (1,2,1,1,1,1); NASS 2004
- Lime, from carbonation, at regional storehouse [CH]: 0.030409 kg; lognormal SD95 1.0541
  (1,2,1,1,1,1); NREL 2006

## Inputs from nature
- Energy, gross calorific value, in biomass [resources, biotic]: 15.91 MJ; lognormal SD95 1.2423
  (4,3,1,1,1,4); calculated from the energy balance
- Carbon dioxide, in air [resources, in air]: 1.3465 kg; lognormal SD95 1.2423
  (4,3,1,1,1,4); calculated from the carbon balance
- Occupation, annual crop [resources, land]: 0.62623 m2a; lognormal SD95 1.5
  (1,1,1,1,1,1); NASS 2005
- Transformation, from annual crop [resources, land]: 1.0735 m2; lognormal SD95 2
  (1,1,1,1,1,1); NASS 2005
- Transformation, to annual crop [resources, land]: 1.0735 m2; lognormal SD95 2
  (1,1,1,1,1,1); NASS 2005

## Emissions to nature
- Tebupirimphos [emissions to soil, agricultural]: 1.0108e-6 kg; lognormal SD95 1.3221
  (4,3,1,1,1,4); Calculated from the pesticide application
- Bifenthrin [emissions to soil, agricultural]: 2.1659e-7 kg; lognormal SD95 1.3221
  (4,3,1,1,1,4); Calculated from the pesticide application
- Chlorpyrifos [emissions to soil, agricultural]: 4.8131e-6 kg; lognormal SD95 1.3221
  (4,3,1,1,1,4); Calculated from the pesticide application
- Metolachlor [emissions to soil, agricultural]: 4.2885e-5 kg; lognormal SD95 1.3221
  (4,3,1,1,1,4); Calculated from the pesticide application
- Dinitrogen monoxide [emissions to air, low. pop.]: 0.00052632 kg; lognormal SD95 1.5798
  (4,3,1,1,1,4); Calculated with standard method
- Cadmium [emissions to soil, agricultural]: -1.8835e-8 kg; lognormal SD95 1.5798
  (4,3,1,1,1,4); Calculated from the fertilizer application
- Foramsulfuron [emissions to soil, agricultural]: 3.6098e-8 kg; lognormal SD95 1.3221
  (4,3,1,1,1,4); Calculated from the pesticide application
- Nitrate [emissions to water, groundwater]: 0.023909 kg; lognormal SD95 1.5798
  (4,3,1,1,1,4); Calculated with standard method
- Isoxaflutole [emissions to soil, agricultural]: 5.7757e-7 kg; lognormal SD95 1.3221
  (4,3,1,1,1,4); Calculated from the pesticide application
- Nitrogen oxides [emissions to air, low. pop.]: 0.00029825 kg; lognormal SD95 1.5798
  (4,3,1,1,1,4); Calculated with standard method
- Atrazine [emissions to soil, agricultural]: 9.246e-5 kg; lognormal SD95 1.3221
  (4,3,1,1,1,4); Calculated from the pesticide application
- Mesotrione [emissions to soil, agricultural]: 1.5643e-6 kg; lognormal SD95 1.3221
  (4,3,1,1,1,4); Calculated from the pesticide application
- Cypermethrin [emissions to soil, agricultural]: 3.6098e-8 kg; lognormal SD95 1.3221
  (4,3,1,1,1,4); Calculated from the pesticide application
- Nickel [emissions to soil, agricultural]: -3.2894e-7 kg; lognormal SD95 1.5798
  (4,3,1,1,1,4); Calculated from the fertilizer application
- Permethrin [emissions to soil, agricultural]: 1.0829e-7 kg; lognormal SD95 1.3221
  (4,3,1,1,1,4); Calculated from the pesticide application
- Glyphosate [emissions to soil, agricultural]: 1.9662e-5 kg; lognormal SD95 1.3221
  (4,3,1,1,1,4); Calculated from the pesticide application
- Zinc [emissions to soil, agricultural]: -5.9001e-6 kg; lognormal SD95 1.5798
  (4,3,1,1,1,4); Calculated from the fertilizer application
- 2,4-D [emissions to soil, agricultural]: 3.0443e-6 kg; lognormal SD95 1.3221
  (4,3,1,1,1,4); Calculated from the pesticide application
- Copper [emissions to soil, agricultural]: -1.5041e-6 kg; lognormal SD95 1.5798
  (4,3,1,1,1,4); Calculated from the fertilizer application
- Rimsulfuron [emissions to soil, agricultural]: 1.2033e-7 kg; lognormal SD95 1.3221
  (4,3,1,1,1,4); Calculated from the pesticide application
- Alachlor [emissions to soil, agricultural]: 4.1393e-6 kg; lognormal SD95 1.3221
  (4,3,1,1,1,4); Calculated from the pesticide application
- Ammonia [emissions to air, low. pop.]: 0.0010965 kg; lognormal SD95 1.3221
  (4,3,1,1,1,4); Calculated with standard method
- Acetochlor [emissions to soil, agricultural]: 5.9442e-5 kg; lognormal SD95 1.3221
  (4,3,1,1,1,4); Calculated from the pesticide application
- Glufosinate [emissions to soil, agricultural]: 1.1912e-6 kg; lognormal SD95 1.3221
  (4,3,1,1,1,4); Calculated from the pesticide application
- Lambda-cyhalothrin [emissions to soil, agricultural]: 2.4065e-8 kg; lognormal SD95 1.3221
  (4,3,1,1,1,4); Calculated from the pesticide application
- Terbufos [emissions to soil, agricultural]: 2.6953e-6 kg; lognormal SD95 1.3221
  (4,3,1,1,1,4); Calculated from the pesticide application
- Nicosulfuron [emissions to soil, agricultural]: 2.6472e-7 kg; lognormal SD95 1.3221
  (4,3,1,1,1,4); Calculated from the pesticide application
- Tefluthrin [emissions to soil, agricultural]: 7.9416e-7 kg; lognormal SD95 1.3221
  (4,3,1,1,1,4); Calculated from the pesticide application
- Phosphorus [emissions to water, river]: 9.7542e-5 kg; lognormal SD95 1.5798
  (4,3,1,1,1,4); Calculated with standard method
- Imazethapyr [emissions to soil, agricultural]: 1.6846e-8 kg; lognormal SD95 1.3221
  (4,3,1,1,1,4); Calculated from the pesticide application
- Imazapyr [emissions to soil, agricultural]: 4.8131e-9 kg; lognormal SD95 1.3221
  (4,3,1,1,1,4); Calculated from the pesticide application
- Flumetsulam [emissions to soil, agricultural]: 3.3692e-7 kg; lognormal SD95 1.3221
  (4,3,1,1,1,4); Calculated from the pesticide application
- Paraquat [emissions to soil, agricultural]: 6.1367e-7 kg; lognormal SD95 1.3221
  (4,3,1,1,1,4); Calculated from the pesticide application
- Dicamba [emissions to soil, agricultural]: 1.7327e-6 kg; lognormal SD95 1.3221
  (4,3,1,1,1,4); Calculated from the pesticide application
- Cyfluthrin [emissions to soil, agricultural]: 5.0538e-8 kg; lognormal SD95 1.3221
  (4,3,1,1,1,4); Calculated from the pesticide application
- Diflufenzopyr-sodium [emissions to soil, agricultural]: 1.9252e-7 kg; lognormal SD95 1.3221
  (4,3,1,1,1,4); Calculated from the pesticide application
- Primisulfuron [emissions to soil, agricultural]: 1.2033e-7 kg; lognormal SD95 1.3221
  (4,3,1,1,1,4); Calculated from the pesticide application
- Acetamide [emissions to soil, agricultural]: 1.0108e-6 kg; lognormal SD95 1.3221
  (4,3,1,1,1,4); Calculated from the pesticide application
- Bromoxynil [emissions to soil, agricultural]: 6.4977e-7 kg; lognormal SD95 1.3221
  (4,3,1,1,1,4); Calculated from the pesticide application
- Pendimethalin [emissions to soil, agricultural]: 2.4787e-6 kg; lognormal SD95 1.3221
  (4,3,1,1,1,4); Calculated from the pesticide application
- Dimethenamid [emissions to soil, agricultural]: 5.0297e-6 kg; lognormal SD95 1.3221
  (4,3,1,1,1,4); Calculated from the pesticide application
- Prosulfuron [emissions to soil, agricultural]: 2.1659e-8 kg; lognormal SD95 1.3221
  (4,3,1,1,1,4); Calculated from the pesticide application
- Lead [emissions to soil, agricultural]: 2.6437e-7 kg; lognormal SD95 1.5798
  (4,3,1,1,1,4); Calculated from the fertilizer application
- Simazine [emissions to soil, agricultural]: 2.4306e-6 kg; lognormal SD95 1.3221
  (4,3,1,1,1,4); Calculated from the pesticide application
- Fipronil [emissions to soil, agricultural]: 2.8879e-7 kg; lognormal SD95 1.3221
  (4,3,1,1,1,4); Calculated from the pesticide application
- Phosphorus [emissions to water, groundwater]: 7.5148e-6 kg; lognormal SD95 1.5798
  (4,3,1,1,1,4); Calculated with standard method
- Chromium [emissions to soil, agricultural]: 4.4455e-8 kg; lognormal SD95 1.5798
  (4,3,1,1,1,4); Calculated from the fertilizer application

## Sampling procedure
Literature data

## Extrapolations
Transports are modelled with standard distances. Machine usage is modelled with US diesel consumptions, German field works and Swiss machines. Emissions are calculated with standard methods.

## Sources
- Jungbluth N., Chudacoff M., Dauriat A., Dinkel F., Doka G., Faist Emmenegger M., Gnansounou E., Kljun N., Spielmann M., Stettler C., Sutter J., 2007, 2007 - LCI bioenergy - Jungbluth, Final report ecoinvent data v2.0, 17, Swiss Centre for LCI, ESU-services Ltd., Duebendorf and Uster, CH
Jungbluth N., Chudacoff M., Dauriat A., Dinkel F., Doka G., Faist Emmenegger M., Gnansounou E., Kljun N., Spielmann M., Stettler C., Sutter J. (2007) Life Cycle Inventories of Bioenergy. Final report ecoinvent data v2.0. Volume: 17. Swiss Centre for LCI, ESU. Duebendorf and Uster, CH.
Type: Measurement on site
Source: CD-ROM
First author: Jungbluth N.
Other authors: Chudacoff M., Dauriat A., Dinkel F., Doka G., Faist Emmenegger M., Gnansounou E., Kljun N., Spielmann M., Stettler C., Sutter J.
Year: 2007
Title of anthology: Final report ecoinvent data v2.0
Place of publication: Duebendorf and Uster, CH
Publisher: Swiss Centre for LCI, ESU
Volume No: 17

## Validation
Proof reading validation: Passed.; Other validation: none;
