# Disposal, polyurethane, 0.2% water, to municipal incineration

Dataset: EcoSpold 1, unit process
Functional unit: 1 kg
Category: waste management / municipal incineration
Geography: CH
Time period: 2000-01 to 2000-12
Generated by: Gabor Doka
accessRestrictedTo: 0
copyright: true

## General comment
This dataset represents the activity of waste disposal of waste polyurethane in a municipal solid waste incinerator (MSWI) Recommended use of this dataset: For PU, which goes to disposal as part of communal waste mixture. Waste composition (wet, in ppm): upper heating value 30.9 MJ/kg; lower heating value 30.67 MJ/kg; H2O 2000; O 178700; H 84276; C 640700; S 203.07; N 60922; P n.a.; B n.a.; Cl 24369; Br 70.934; F 14.896; I n.a.; Ag n.a.; As 1.9253; Ba 188.99; Cd 82.301; Co 32.011; Cr 41.41; Cu 321.89; Hg 0.86045; Mn 80.984; Mo n.a.; Ni 20.874; Pb 473.27; Sb 43.54; Se 2.128; Sn 26.555; V 291.99; Zn 566.54; Be 0.50667; Sc n.a.; Sr 89.68; Ti 1013.3; Tl 0.40534; W n.a.; Si n.a.; Fe 3775.4; Ca n.a.; Al 202.67; K n.a.; Mg n.a.; Na 1485; Share of carbon in waste that is biogenic 0%. Share of metals in waste not oxidised and bulk-recyclable (exclude very small or thin parts) Iron: 0%; Alu: 0%; Copper: 0%. One kg of this waste produces 0.02431 kg of slag and 0.01773 kg of residues, which are landfilled. Additional solidification with 0.007092 kg of cement. Net energy production: 3.93MJ/kg electric energy and 7.68MJ/kg thermal energy. Recovery of metal scrap to recycling: 0g iron scrap, 0g aluminium scrap, 0g copper scrap.;;

## Included processes
Waste incineration from waste reception gate further downstream (excluding transport to the MSWI plant). Waste-specific air and water emisions from incineration, auxiliary material consumption for flue gas cleaning. Short-term emissions to river water and long-term emisisons to ground water from slag compartment (from bottom ash) and residual material landfill (from solidified fly ashes and scrubber slugde). Waste-specific process energy demands for MSWI and net energy generation.

## Geography
Specific to the technology mix encountered in Switzerland in 2010. Well applicable to modern incineration practices in Europe, North America or Japan.

## Technology
average Swiss MSWI plants in 2010 (grate incinerators) with electrostatic precipitator for fly ash (ESP), wet flue gas scrubber and 25% SNCR , 42.77% SCR-high dust , 32.68% SCR-low dust -DeNOx facilities and 0% without Denox (weighted according to mass of burnt waste, representing Swiss average). Efficiency of iron scrap separation from slag : 58%. Efficiency of non-ferrous scrap separation from slag : 31%. Gross electric efficiency technology mix 15.84% and Gross thermal efficiency technology mix 28.51%

## Time period
Waste composition as given in literature reference, theoretical data or other source. Transfer coefficients for modern MSWI.

## Reference product
- Disposal, polyurethane, 0.2% water, to municipal incineration [CH]: 1 kg
  SWITZERLAND

## Inputs from technosphere
- Iron (III) chloride, 40% in H2O, at plant [CH]: 9.823e-5 kg; lognormal SD95 2.664
  auxilliary inputs for the wastewater treatment stage of the incinerator plant. uncertainty calculated from uncertainty in average FeCl3 input, of transfer coefficients in the incinerator, and the uncertainty of the waste composition of this waste
- Municipal waste incineration plant [CH]: 2.5e-10 p; lognormal SD95 1
  demands per kilogram waste. uncertainty is heeded in the module
- Process-specific burdens, residual material landfill [CH]: 0.017729 kg; lognormal SD95 1.6856
  mass-specific expenditures required for landfilling of incineration residues. uncertainty is calculated from uncertainties in waste composition and transfer coefficients in incinerator
- Disposal, cement, hydrated, 0% water, to residual material landfill [CH]: 0.017729 kg; lognormal SD95 1.7434
  Hydrated cement output for solidification of landfilled residual material. Uncertainty calculated from uncertainty of the waste composition of this waste and transfer coefficients in the incinerator and of the solidification recipe.
- Transport, freight, lorry, 16t-32t gross weight, fleet average [CH]: 0.011667 tkm; lognormal SD95 1.5436
  Transport services to transport incineration residues to landfills and to transport auxilliary inputs of the incinerator plant. uncertainty calculated from uncertainty in average auxiliary material input, the uncertainty of the waste composition of this waste and the uncertainty in generic transportation distances
- Chemicals organic, at plant [GLO]: 3.5906e-5 kg; lognormal SD95 6.3087
  auxilliary inputs for the wastewater treatment stage of the incinerator plant. Proxy for (pure) Trisodium-trimercapto-s-triazine (CAS 17766-26-6), used as 15% diluted solution, aka TMT15. uncertainty calculated from uncertainty in average TMT15 input, of transfer coefficients in the incinerator, and the uncertainty of the waste composition of this waste
- Chemicals inorganic, at plant [GLO]: 0.00075645 kg; lognormal SD95 2.6607
  auxilliary inputs for the wastewater treatment stage of the incinerator plant. Proxy for Polyelectrolyte. uncertainty calculated from uncertainty in average Polyelectrolyte input, of transfer coefficients in the incinerator, and the uncertainty of the waste composition of this waste
- Cement, unspecified, at plant [CH]: 0.0070918 kg; lognormal SD95 1.7434
  Cement required for solidification of landfilled residual material. Uncertainty calculated from uncertainty of the waste composition of this waste, of transfer coefficients in the incinerator and of the solidification recipe.
- Process-specific burdens, slag compartment [CH]: 0.023029 kg; lognormal SD95 1.4941
  mass-specific expenditures required for landfilling of bottom ash. uncertainty is calculated from uncertainties in waste composition and transfer coefficients in incinerator
- Transport, freight, rail [RER]: 0.027818 tkm; lognormal SD95 1.6547
  (same comment as for Transport, freight, lorry, 16t-32t gross weight, fleet average)
- Chromium oxide, flakes, at plant [RER]: 9.4673e-6 kg; lognormal SD95 8.8826
  Input to DeNOx stage. uncertainty calculated from uncertainty in average DeNOx input, uncertainty in the share of thermal NOx, uncertainty of nitrogen content in average municipal waste and the uncertainty in nitrogen content in *this* waste.
- Sodium hydroxide, 50% in H2O, production mix, at plant [RER]: 0.0025736 kg; lognormal SD95 2.7013
  auxilliary inputs for the flue gas treatment stage of the incinerator plant. uncertainty calculated from uncertainty in average NaOH input, of transfer coefficients in the incinerator, and the uncertainty of the waste composition of this waste
- Hydrochloric acid, 30% in H2O, at plant [RER]: 0.00019883 kg; lognormal SD95 2.6607
  auxilliary inputs for the wastewater treatment stage of the incinerator plant. uncertainty calculated from uncertainty in average HCl input, of transfer coefficients in the incinerator, and the uncertainty of the waste composition of this waste
- Residual material landfill facility [CH]: 3.6936e-11 p; lognormal SD95 1.6856
  landfill infrastructure required for landfilling of incineration residues. uncertainty is calculated from uncertainties in waste composition and transfer coefficients in incinerator
- Natural gas, burned in industrial furnace 1MW [CH]: 1.3846 MJ; lognormal SD95 5.8945
  Input to DeNOx stage, to heat up flue gas in low-dust SCR. uncertainty calculated from uncertainty in average DeNOx input, uncertainty in the share of thermal NOx, uncertainty of nitrogen content in average municipal waste and the uncertainty in nitrogen content in *this* waste.
- Ammonia, liquid, at regional storehouse [CH]: 0.0074043 kg; lognormal SD95 5.8945
  Input to DeNOx stage (100% NH3). uncertainty calculated from uncertainty in average DeNOx input, uncertainty in the share of thermal NOx, uncertainty of nitrogen content in average municipal waste and the uncertainty in nitrogen content in *this* waste.
- Quicklime, milled, packed, at plant [CH]: 0.013097 kg; lognormal SD95 2.7753
  auxilliary inputs for the flue gas treatment stage of the incinerator plant. uncertainty calculated from uncertainty in average CaO input, of transfer coefficients in the incinerator, and the uncertainty of the waste composition of this waste
- Titanium dioxide, production mix, at plant [RER]: 0.0004639 kg; lognormal SD95 8.8826
  Input to DeNOx stage (TiO2 catalyst carrier) uncertainty calculated from uncertainty in average DeNOx input, uncertainty in the share of thermal NOx, uncertainty of nitrogen content in average municipal waste and the uncertainty in nitrogen content in *this* waste.
- Water, decarbonised, at plant [RER]: 4.8232 kg; lognormal SD95 2.664
  Incinerator process water used in flue gas scrubber stage. uncertainty calculated from uncertainty in average water input, and the uncertainty of the waste composition of this waste
- Slag compartment [CH]: 4.094e-11 p; lognormal SD95 1.4941
  landfill infrastructure required for landfilling of bottom ash. uncertainty is calculated from uncertainties in waste composition and transfer coefficients in incinerator

## Emissions to nature
- Manganese [emissions to water, river]: 1.2606e-8 kg; lognormal SD95 6.3547
  Emissions to water from waste composition and transfer coefficients in incinerator and landfills. uncertainty is calculated from uncertainties in waste composition and transfer coefficients in incinerator and landfills
- Mercury [emissions to air, high. pop.]: 2.4397e-8 kg; lognormal SD95 12.532
  Emission to air from waste composition and transfer coefficients. uncertainty is calculated from uncertainties in waste composition and transfer coefficients in incinerator
- Mercury [emissions to water, groundwater, long-term]: 5.4803e-8 kg; lognormal SD95 34.745
  Long-term emissions from landfilling of incineration residues. uncertainty is calculated from uncertainties in waste composition and transfer coefficients in incinerator and landfills.
- Arsenic [emissions to air, high. pop.]: 1.5082e-8 kg; lognormal SD95 11.56
  (same comment as for Mercury)
- Dinitrogen monoxide [emissions to air, high. pop.]: 0.00090863 kg; lognormal SD95 6.9657
  Nitrogen species emitted to air after DeNOx stage. uncertainty calculated from uncertainty in average N-emissions and uncertainty in the share of thermal NOx and the uncertainty in nitrogen content in *this* waste.
- Chromium VI [emissions to water, river]: 1.1573e-6 kg; lognormal SD95 8.6099
  (same comment as for Manganese)
- Hydrogen chloride [emissions to air, high. pop.]: 1.3906e-5 kg; lognormal SD95 2.923
  (same comment as for Mercury)
- Nitrate [emissions to water, river]: 0.0007766 kg; lognormal SD95 2.0859
  (same comment as for Manganese)
- Iron [emissions to air, high. pop.]: 6.766e-9 kg; lognormal SD95 4.41
  (same comment as for Mercury)
- Titanium [emissions to water, groundwater, long-term]: 0.00030293 kg; lognormal SD95 5.8871
  (same comment as for Mercury)
- Arsenic [emissions to water, groundwater, long-term]: 5.7655e-7 kg; lognormal SD95 11.441
  (same comment as for Mercury)
- Antimony [emissions to water, river]: 1.5007e-5 kg; lognormal SD95 7.9444
  (same comment as for Manganese)
- Manganese [emissions to water, groundwater, long-term]: 4.996e-5 kg; lognormal SD95 16.656
  (same comment as for Mercury)
- COD, Chemical Oxygen Demand [emissions to water, groundwater, long-term]: 0.0048114 kg; lognormal SD95 1.284
  (same comment as for Mercury)
- Bromine [emissions to air, high. pop.]: 3.5431e-8 kg; lognormal SD95 7.6176
  (same comment as for Mercury)
- Aluminium [emissions to water, groundwater, long-term]: 0.00014656 kg; lognormal SD95 5.9252
  (same comment as for Mercury)
- Heat, waste [emissions to water, river]: 5.1954 MJ; lognormal SD95 1.3717
  Waste heat generated from heating value of this waste plus any electricity required to process it. uncertainty is calculated from uncertainties in waste composition and uncertainties in energy efficiency and the uncertainty in internal energy demand
- Nickel [emissions to air, high. pop.]: 2.6222e-8 kg; lognormal SD95 8.8804
  (same comment as for Mercury)
- Fluoride [emissions to water, groundwater, long-term]: 1.3355e-5 kg; lognormal SD95 5.4958
  (same comment as for Mercury)
- Carbon monoxide, fossil [emissions to air, high. pop.]: 2.9324e-5 kg; lognormal SD95 5.9116
  Incomplete combustion product emitted to air. uncertainty calculated from uncertainty in average operation emissions, and the uncertainty of the flue gas volume from this waste.
- Thallium [emissions to water, groundwater, long-term]: 2.3652e-7 kg; lognormal SD95 9.4605
  (same comment as for Mercury)
- Benzene, pentachloro- [emissions to air, high. pop.]: 9.1139e-11 kg; lognormal SD95 1.7735
  (same comment as for Carbon monoxide, fossil)
- BOD5, Biological Oxygen Demand [emissions to water, groundwater, long-term]: 0.0015738 kg; lognormal SD95 1.284
  (same comment as for Mercury)
- Phenol, pentachloro- [emissions to air, high. pop.]: 7.5123e-12 kg; lognormal SD95 1.7735
  (same comment as for Carbon monoxide, fossil)
- Titanium [emissions to water, river]: 3.7782e-7 kg; lognormal SD95 4.1625
  (same comment as for Manganese)
- Vanadium [emissions to water, groundwater, long-term]: 0.00013611 kg; lognormal SD95 4.7705
  (same comment as for Mercury)
- Benzo(a)pyrene [emissions to air, high. pop.]: 3.8388e-13 kg; lognormal SD95 3.547
  (same comment as for Carbon monoxide, fossil)
- TOC, Total Organic Carbon [emissions to water, river]: 0.0003273 kg; lognormal SD95 1.4043
  (same comment as for Manganese)
- Heat, waste [emissions to air, high. pop.]: 22.69 MJ; lognormal SD95 1.3717
  (same comment as for Heat, waste)
- Toluene [emissions to air, high. pop.]: 3.4501e-8 kg; lognormal SD95 1.7735
  (same comment as for Carbon monoxide, fossil)
- Cadmium [emissions to water, groundwater, long-term]: 6.0055e-6 kg; lognormal SD95 160.3
  (same comment as for Mercury)
- Arsenic [emissions to water, river]: 1.3337e-6 kg; lognormal SD95 10.397
  (same comment as for Manganese)
- Benzene [emissions to air, high. pop.]: 1.725e-8 kg; lognormal SD95 1.7735
  (same comment as for Carbon monoxide, fossil)
- Methane, fossil [emissions to air, high. pop.]: 2.5876e-7 kg; lognormal SD95 1.7735
  (same comment as for Carbon monoxide, fossil)
- Zinc [emissions to water, groundwater, long-term]: 0.00017228 kg; lognormal SD95 29.417
  (same comment as for Mercury)
- Chromium [emissions to air, high. pop.]: 3.616e-8 kg; lognormal SD95 8.1225
  (same comment as for Mercury)
- Vanadium [emissions to air, high. pop.]: 6.1929e-6 kg; lognormal SD95 6.1504
  (same comment as for Mercury)
- Strontium [emissions to water, groundwater, long-term]: 8.9564e-5 kg; lognormal SD95 7.2132
  (same comment as for Mercury)
- Beryllium [emissions to water, river]: 3.1734e-10 kg; lognormal SD95 19.048
  (same comment as for Manganese)
- Cobalt [emissions to water, groundwater, long-term]: 2.6076e-5 kg; lognormal SD95 7.6818
  (same comment as for Mercury)
- Chromium [emissions to water, river]: 3.2154e-9 kg; lognormal SD95 8.2649
  (same comment as for Manganese)
- Thallium [emissions to air, high. pop.]: 4.0534e-10 kg; lognormal SD95 13.616
  (same comment as for Mercury)
- Selenium [emissions to water, river]: 7.1888e-7 kg; lognormal SD95 8.6892
  (same comment as for Manganese)
- Carbon dioxide, fossil [emissions to air, high. pop.]: 2.335 kg; lognormal SD95 1.1676
  (same comment as for Mercury)
- Cadmium [emissions to air, high. pop.]: 4.1949e-8 kg; lognormal SD95 7.4529
  (same comment as for Mercury)
- Lead [emissions to water, groundwater, long-term]: 0.00022882 kg; lognormal SD95 52.065
  (same comment as for Mercury)
- Strontium [emissions to air, high. pop.]: 8.968e-9 kg; lognormal SD95 7.4529
  (same comment as for Mercury)
- Selenium [emissions to air, high. pop.]: 2.5387e-8 kg; lognormal SD95 11.424
  (same comment as for Mercury)
- Tin [emissions to water, groundwater, long-term]: 1.0163e-5 kg; lognormal SD95 16.891
  (same comment as for Mercury)
- TOC, Total Organic Carbon [emissions to water, groundwater, long-term]: 0.0019039 kg; lognormal SD95 1.284
  (same comment as for Mercury)
- Zinc [emissions to water, river]: 5.1114e-8 kg; lognormal SD95 4.8539
  (same comment as for Manganese)
- Aluminium [emissions to air, high. pop.]: 1.6524e-10 kg; lognormal SD95 6.9696
  (same comment as for Mercury)
- Sodium [emissions to water, groundwater, long-term]: 0.0010694 kg; lognormal SD95 2.9899
  (same comment as for Mercury)
- Titanium [emissions to air, high. pop.]: 8.4072e-7 kg; lognormal SD95 5.1984
  (same comment as for Mercury)
- Hydrogen fluoride [emissions to air, high. pop.]: 1.005e-7 kg; lognormal SD95 9.159
  (same comment as for Mercury)
- Sodium [emissions to water, river]: 0.00040349 kg; lognormal SD95 3.0361
  (same comment as for Manganese)
- Chloride [emissions to water, river]: 0.018708 kg; lognormal SD95 2.4931
  (same comment as for Manganese)
- Particulates, > 2.5 um, and < 10um [emissions to air, high. pop.]: 1.0349e-8 kg; lognormal SD95 2.3647
  (same comment as for Carbon monoxide, fossil)
- Copper [emissions to water, river]: 4.171e-8 kg; lognormal SD95 5.7023
  (same comment as for Manganese)
- Particulates, < 2.5 um [emissions to air, high. pop.]: 2.0596e-6 kg; lognormal SD95 3.547
  (same comment as for Carbon monoxide, fossil)
- Benzene, hexachloro- [emissions to air, high. pop.]: 3.607e-11 kg; lognormal SD95 1.7735
  (same comment as for Carbon monoxide, fossil)
- NMVOC, non-methane volatile organic compounds, unspecified origin [emissions to air, high. pop.]: 7.8506e-7 kg; lognormal SD95 1.7735
  (same comment as for Carbon monoxide, fossil)
- Dioxin, 2,3,7,8 Tetrachlorodibenzo-p- [emissions to air, high. pop.]: 3.4498e-14 kg; lognormal SD95 3.547
  (same comment as for Carbon monoxide, fossil)
- Chloride [emissions to water, groundwater, long-term]: 0.0056469 kg; lognormal SD95 2.7998
  (same comment as for Mercury)
- Lead [emissions to air, high. pop.]: 3.8991e-8 kg; lognormal SD95 5.9049
  (same comment as for Mercury)
- Copper [emissions to air, high. pop.]: 2.9482e-8 kg; lognormal SD95 6.25
  (same comment as for Mercury)
- Beryllium [emissions to water, groundwater, long-term]: 4.6306e-7 kg; lognormal SD95 12.323
  (same comment as for Mercury)
- Lead [emissions to water, river]: 4.5272e-8 kg; lognormal SD95 4.9391
  (same comment as for Manganese)
- Barium [emissions to water, river]: 2.5436e-8 kg; lognormal SD95 8.7664
  (same comment as for Manganese)
- Copper [emissions to water, groundwater, long-term]: 0.00028752 kg; lognormal SD95 5.9256
  (same comment as for Mercury)
- Nitrate [emissions to water, groundwater, long-term]: 0.0021912 kg; lognormal SD95 2.321
  (same comment as for Mercury)
- Thallium [emissions to water, river]: 2.4831e-10 kg; lognormal SD95 15.3
  (same comment as for Manganese)
- Aluminium [emissions to water, river]: 2.1933e-8 kg; lognormal SD95 8.1948
  (same comment as for Manganese)
- BOD5, Biological Oxygen Demand [emissions to water, river]: 0.00073985 kg; lognormal SD95 1.4094
  (same comment as for Manganese)
- Fluoride [emissions to water, river]: 1.139e-6 kg; lognormal SD95 5.8671
  (same comment as for Manganese)
- Sulfate [emissions to water, groundwater, long-term]: 0.00050296 kg; lognormal SD95 4.2278
  (same comment as for Mercury)
- Cyanide [emissions to air, high. pop.]: 0.00019521 kg; lognormal SD95 6.9657
  (same comment as for Dinitrogen monoxide)
- Sulfate [emissions to water, river]: 0.00010302 kg; lognormal SD95 3.6813
  (same comment as for Manganese)
- DOC, Dissolved Organic Carbon [emissions to water, river]: 0.0003273 kg; lognormal SD95 1.4043
  (same comment as for Manganese)
- Nickel [emissions to water, river]: 1.4025e-8 kg; lognormal SD95 13.775
  (same comment as for Manganese)
- Mercury [emissions to water, river]: 9.3447e-10 kg; lognormal SD95 8.3
  (same comment as for Manganese)
- Sodium [emissions to air, high. pop.]: 1.2192e-5 kg; lognormal SD95 4.7961
  (same comment as for Mercury)
- Chromium VI [emissions to water, groundwater, long-term]: 3.7987e-6 kg; lognormal SD95 12.048
  (same comment as for Mercury)
- DOC, Dissolved Organic Carbon [emissions to water, groundwater, long-term]: 0.0019039 kg; lognormal SD95 1.284
  (same comment as for Mercury)
- Antimony [emissions to air, high. pop.]: 3.4878e-11 kg; lognormal SD95 8.5264
  (same comment as for Mercury)
- Zinc [emissions to air, high. pop.]: 3.7973e-7 kg; lognormal SD95 5.6644
  (same comment as for Mercury)
- Tin [emissions to water, river]: 7.0253e-10 kg; lognormal SD95 14.426
  (same comment as for Manganese)
- Cadmium [emissions to water, river]: 7.8881e-9 kg; lognormal SD95 6.2784
  (same comment as for Manganese)
- Bromine [emissions to water, groundwater, long-term]: 6.8369e-6 kg; lognormal SD95 7.4629
  (same comment as for Mercury)
- Antimony [emissions to water, groundwater, long-term]: 2.7688e-5 kg; lognormal SD95 7.6802
  (same comment as for Mercury)
- Nickel [emissions to water, groundwater, long-term]: 2.0036e-5 kg; lognormal SD95 8.4702
  (same comment as for Mercury)
- Cobalt [emissions to water, river]: 5.7997e-9 kg; lognormal SD95 10.931
  (same comment as for Manganese)
- Cobalt [emissions to air, high. pop.]: 5.8218e-8 kg; lognormal SD95 8.41
  (same comment as for Mercury)
- Barium [emissions to water, groundwater, long-term]: 9.5178e-5 kg; lognormal SD95 19.973
  (same comment as for Mercury)
- Iron [emissions to water, groundwater, long-term]: 0.0019046 kg; lognormal SD95 5.1134
  (same comment as for Mercury)
- Iron [emissions to water, river]: 9.9249e-8 kg; lognormal SD95 5.8788
  (same comment as for Manganese)
- Bromine [emissions to water, river]: 6.4061e-5 kg; lognormal SD95 4.0028
  (same comment as for Manganese)
- Selenium [emissions to water, groundwater, long-term]: 1.3821e-6 kg; lognormal SD95 7.9575
  (same comment as for Mercury)
- Manganese [emissions to air, high. pop.]: 1.5466e-8 kg; lognormal SD95 7.5625
  (same comment as for Mercury)
- Nitrogen oxides [emissions to air, high. pop.]: 0.0027568 kg; lognormal SD95 6.3253
  sum of fuel-Nox and thermal-NOx emitted to air after DeNOx stage. uncertainty calculated from uncertainty in average N-emissions and uncertainty in the share of thermal NOx and the uncertainty in nitrogen content in *this* waste.
- Sulfur dioxide [emissions to air, high. pop.]: 2.1596e-6 kg; lognormal SD95 6.5264
  (same comment as for Mercury)
- Strontium [emissions to water, river]: 5.6466e-8 kg; lognormal SD95 13.445
  (same comment as for Manganese)
- COD, Chemical Oxygen Demand [emissions to water, river]: 0.00074948 kg; lognormal SD95 1.4036
  (same comment as for Manganese)
- Barium [emissions to air, high. pop.]: 7.4179e-7 kg; lognormal SD95 6.6049
  (same comment as for Mercury)
- Vanadium [emissions to water, river]: 4.662e-7 kg; lognormal SD95 6.9955
  (same comment as for Manganese)
- Tin [emissions to air, high. pop.]: 1.7346e-11 kg; lognormal SD95 9.0601
  (same comment as for Mercury)
- Ammonia [emissions to air, high. pop.]: 8.7056e-6 kg; lognormal SD95 6.3253
  (same comment as for Dinitrogen monoxide)

## Sampling procedure
fully waste-specific calculation based on literature data for average MSWI operation performance

## Extrapolations
Typical elemental transfer coefficients from current studies for modern MSWI, completed with data from coal power plants and estimates, adapted for inert/burnable waste.

## Uncertainty adjustments
uncertainty of waste input composition data derived from generic formula GSD(c) = N*ln(c)+1

## Sources
- Doka G., 2013, 2013 - Updates LCI waste treatment services - Doka, -, Doka LCA, Zuerich, CH
Doka G. (2013) Updates to Life Cycle Inventories of Waste Treatment Services - part II: waste incineration. Doka LCA. Zurich.
Type: Separate publication
Source: Report to document the 2013 changes to the MSWI incinerator model and datasets (URL: http://www.doka.ch/ecoinventMSWIupdateLCI2013.pdf). To be read with the ecoinvent Nr 13 report (Doka 2009, Life Cycle Inventories of Waste Treatment Services) for ecoinvent v2.2.
First author: Doka G.
Year: 2013
Place of publication: Zurich
Publisher: Doka LCA
Original title: Updates to Life Cycle Inventories of Waste Treatment Services - part II: waste incineration

## Validation
Proof reading validation: Passed.; Other validation: none;
