# Hydrogen sulphide, H2S, at plant

Dataset: EcoSpold 1, unit process
Functional unit: 1 kg
Category: chemicals / gases
Geography: RER
Time period: 2004-01 to 2004-12
Generated by: Roland Hischier
accessRestrictedTo: 0
copyright: true

## General comment
The functional unit represent 1 kg of gaseous hydrogen sulphide. Large uncertainty of the process data due to weak data on the production process and missing data on process emissions.;
CAS number: 007783-06-4;
Formula: H2S;
Synonyms: monosulfane;

## Included processes
Raw materials and chemicals used for production, transport of materials to manufacturing plant, estimation of energy demand and infrastructure of the plant (approximation). Solid wastes and emissions to air/water (except waste heat) omitted.

## Geography
Data used has no specific geographical origin. Average European processes for raw materials, transport requirements and electricity mix used.

## Technology
Production from sulphur and hydrogen. Inventory bases on literature values.

## Time period
data of published literature

## Reference product
- Hydrogen sulphide, H2S, at plant [RER]: 1 kg
  Europe

## Inputs from technosphere
- Transport, freight, rail [RER]: 0.71558 tkm; lognormal SD95 2.095
  (4,5,na,na,na,na,5); standard values
- Transport, freight, lorry, fleet average [RER]: 0.11926 tkm; lognormal SD95 2.095
  (4,5,na,na,na,na,5); standard values
- Chemical plant, organics [RER]: 4e-10 p; lognormal SD95 3.1827
  (4,5,4,3,1,5,9); Estimation, based on chemical production site
- Electricity, medium voltage, production ENTSO-E, at grid: 0.28 kWh; lognormal SD95 1.6764
  (4,5,1,3,4,5,2); data from Ullmann's
- Hydrogen, liquid, at plant [RER]: 0.070526 kg; lognormal SD95 1.6764
  (4,5,1,3,4,5,3); data from Ullmann's

## Inputs from nature
- Sulfur [resources, in ground]: 1.1221 kg; lognormal SD95 1.6764
  (4,5,1,3,4,5,12); data from Ullmann's
- Water, cooling, unspecified natural origin/m3 [resources, in water]: 0.024 m3; lognormal SD95 1.8788
  (5,5,1,1,4,5,12); estimated with data from a large chem. Plant

## Emissions to nature
- Heat, waste [emissions to air, high. pop.]: 1.008 MJ; lognormal SD95 1.6764
  (4,5,1,3,4,5,13); calculated from electricity input
- Water [emissions to water, unspecified]: 22.8 kg; lognormal SD95 2.5196
  (5,5,5,5,5,BU:1.05); All uncertainty-values set to 5.0 by default. Balance of input water

## Sampling procedure
literature. Energy demand based on approximation from large chemical plant.

## Extrapolations
see generalComment

## Sources
- Hischier R., Classen M., Lehmann M., Scharnhorst W., 2007, 2007 - LCI electric and electronic equipment - Hischier, Final report ecoinvent Data v2.0, 18, Swiss Centre for LCI, Empa - TSL, Duebendorf and St. Gallen, CH
Hischier R., Classen M., Lehmann M., Scharnhorst W. (2007) Life Cycle Inventories of Electric and Electronic Equipment - Production, Use & Disposal. Final report ecoinvent Data v2.0. Volume: 18. Swiss Centre for LCI, Empa - TSL. Duebendorf and St. Gallen, CH.
Type: Measurement on site
Source: CD-ROM
First author: Hischier R.
Other authors: Classen M., Lehmann M., Scharnhorst W.
Year: 2007
Title of anthology: Final report ecoinvent Data v2.0
Place of publication: Duebendorf and St. Gallen, CH
Publisher: Swiss Centre for LCI, Empa - TSL
Volume No: 18
Original title: Life Cycle Inventories of Electric and Electronic Equipment - Production, Use & Disposal

## Validation
Proof reading validation: passed.; Other validation: none;
