# Quarrying of olivine

Dataset: EcoSpold 1, unit process
Functional unit: 1 kg
Category: chemicals / inorganic
Geography: CH
Time period: 2024 to 2024
Generated by: Romain Sacchi
accessRestrictedTo: 0
copyright: true

## General comment
"This dataset represents the supply of 1 kg of olivine. The authors assumed that an area of 200,000m2 will be mined over 50 years, with an annual capacity of 500 kt, i.e., 0.5 m2 for land use and 0.01 m2 per year for land use change are ascribed per FU. An average topsoil thickness of 0.2 m, with a bulk density of 1.3 t m−3, is considered, suggesting that 1.04 kt of overburden is produced year-round. For overburden handling, a bulldozer and a hydraulic shovel is considered, with the energy input taken from US Department of Energy, corresponding to activities in a surface limestone mine, whereas 200 km was ascribed for overburden transportation, used for backfilling. The quarry infrastructure was assumed to be similar to that of a gravel/sand quarry, as described in Kellenberger et al.
Source: Foteinis, S., Campbell, J. S., & Renforth, P. (2023). Life Cycle Assessment of Coastal Enhanced Weathering for Carbon Dioxide Removal from Air. Environmental Science and Technology, 57(15), 6169–6178. https://doi.org/10.1021/acs.est.2c08633

****Additional comments****
Diesel, represents the diesel amount used for bulldozers and hydraulic shovel for overburden handling, for drilling, the diesel used for trucks, graders and lighting for mining operations and the energy input for loading. For the machinery used in quarrying (drill, service trucks, bulk trucks, and graders), Ecoinvent’s data for diesel burned in agricultural machinery, i.e., for running a tractor with a trailer, was used as a proxy.
The quarry infrastructure was assumed to be similar to that of a gravel/sand quarry, as described in Kellenberger et al.
For blasting, explosives consumption ranges from 0.145 kg (basalt) to 0.374 kg (granite) per extracted t, with the higher value considered herein since this leads to better fragmentation, which is beneficial for comminution.
Lubricating oil used for drilling and loading. For rock drilling, the lubricating oil consumption is considered as described in Rosado et al.
For water pumping, a mean energy of 0.45 kWh per m3 was ascribed for (borehole) water pumping (diesel-powered).

## Reference product
- Quarrying of olivine [CH]: 1 kg

## Inputs from technosphere
- Diesel, burned in building machine, average [CH]: 0.0139468 MJ; lognormal SD95 2
- Mine, gravel/sand [CH]: 4e-11 p; lognormal SD95 3.05
  (1,3,1,1,1,5);
- Explosives, tovex, at plant [CH]: 0.0001448 kg; lognormal SD95 1.05
- Lubricating oil, at plant [RER]: 1.752e-6 kg; lognormal SD95 1.261
  (3,4,1,1,1,5,BU:1.05)
- Transport, freight, lorry, 16t-32t gross weight, fleet average [CH]: 0.000824 tkm; lognormal SD95 2.208
- Electricity, medium voltage, at grid [CH]: 4.0484e-5 kWh; lognormal SD95 1.1
  (1,2,1,1,1,1);

## Inputs from nature
- Water, well [resources, in water]: 7.1296e-5 m3
- Occupation, mineral extraction site [resources, land]: 8e-6 m2a
- Transformation, to mineral extraction site [resources, land]: 0.0004 m2
- Olivine [resources, in ground]: 1 kg
- Transformation, from forest, unspecified [resources, land]: 0.0002 m2
- Transformation, from unspecified, natural (non-use) [resources, unspecified]: 0.0002 m2

## Emissions to nature
- Water [emissions to water, unspecified]: 0.0641664 kg; lognormal SD95 2.5196
  (5,5,5,5,5,BU:1.05); All uncertainty-values set to 5.0 by default. Balance of input water

## Sampling procedure
Sampling procedure: Literature data

## Sources
- Sacchi R., Bauer C., 2024, 2024 - LCA power-to-X in residential sector - Sacchi, Project report, PSI, Villigen, CH

## Validation
Proof reading validation: Passed, Other validation: none, Validator: Pierryves Padey, Telephone: +41 58 462 93 11, E-mail: pierryves.padey@bafu.admin.ch, Company: Federal Office for the Environment, Country: CH
