# Ventilation system, Altersheim Dorflinde, various components

Dataset: EcoSpold 1, unit process
Functional unit: 1 p
Category: ventilation / production of components
Geography: CH
Time period: 2014-01 to 2014-12
Generated by: Alex Primas
accessRestrictedTo: 0
copyright: true

## General comment
Production of various components for a ventilation system for a residential care home with apartments, kitchen, cafe/restaurant, multi-purpose hall, wellness area and laundry. The inventory is based on a building with a total heated gross floor area of 34460 m2 and a total nominal air flow of m3/h, total weight of the components: 10195 kg/Unit m3/h per m2 heated gross floor area. Data from call of bid including components for air valves, air intake, roof-hoods, dampers, fire dampers, silencers and sensors.;

## Included processes
Materials used for the production. Energy use for the different production steps and for heating the production building. Transport of raw materials to the plant. Estimation for infrastructure of the production site included.

## Technology
Technology, materials and components used for ventilation systems in commercial and public buildings

## Time period
Amount of material investigated in 2013. Process information partly from 2003 to 2012

## Reference product
- Ventilation system, Altersheim Dorflinde, various components [CH]: 1 p
  SWITZERLAND

## Inputs from technosphere
- Zinc, primary, at regional storage [RER]: 4.026 kg; lognormal SD95 1.26
  (3,4,1,1,1,5); Data from building considered, estimations
- Synthetic rubber, at plant [RER]: 22.734 kg; lognormal SD95 1.26
  (3,4,1,1,1,5); Data from building considered, estimations
- Metal working factory [RER]: 4.6693e-6 p; lognormal SD95 3.07
  (2,4,2,1,3,4); Avarage value for similar production
- Printed wiring board, through-hole mounted, unspec., solder mix, at plant [GLO]: 3.9309 kg; lognormal SD95 1.26
  (3,4,1,1,1,5); Data from building considered, estimations
- Polycarbonate, at plant [RER]: 58.685 kg; lognormal SD95 1.26
  (3,4,1,1,1,5); Data from building considered, estimations
- Autoclaved aerated concrete block, at plant [CH]: 248.08 kg; lognormal SD95 1.34
  (3,4,1,1,3,5); Data for similar product, estimations
- Powder coating, steel [RER]: 1.6331 m2; lognormal SD95 1.32
  (4,4,1,1,1,5); Data estimated from material input
- Steel, converter, unalloyed, at plant [RER]: 3935.8 kg; lognormal SD95 1.26
  (3,4,1,1,1,5); Data from building considered, estimations
- Wire drawing, copper [RER]: 31.002 kg; lognormal SD95 1.26
  (3,4,1,1,1,5); Data related to material input
- Sheet rolling, aluminium [RER]: 107.08 kg; lognormal SD95 1.26
  (3,4,1,1,1,5); Data related to material input
- Injection moulding [RER]: 61.127 kg; lognormal SD95 1.26
  (3,4,1,1,1,5); Data related to material input
- Polyvinylchloride, at regional storage [RER]: 2.442 kg; lognormal SD95 1.26
  (3,4,1,1,1,5); Data from building considered, estimations
- Brass, at plant [CH]: 28.758 kg; lognormal SD95 1.26
  (3,4,1,1,1,5); Data from building considered, estimations
- Sheet rolling, chromium steel [RER]: 2894.1 kg; lognormal SD95 1.26
  (3,4,1,1,1,5); Data related to material input
- Transport, freight, lorry, 16t-32t gross weight, fleet average [CH]: 509.75 tkm; lognormal SD95 2.14
  (4,5,1,1,1,5); Standard distance of ecoinvent used
- Electricity, medium voltage, production ENTSO-E, at grid: 6117 kWh; lognormal SD95 1.26
  (3,4,1,1,1,5); Data from companies, estimations
- Metal working factory operation, average heat energy [RER]: 10195 kg; lognormal SD95 1.27
  (2,4,2,1,3,4); Avarage value for similar production
- Aluminium, production mix, wrought alloy, at plant [RER]: 107.08 kg; lognormal SD95 1.26
  (3,4,1,1,1,5); Data from building considered, estimations
- Zinc coating, coils [RER]: 638.43 m2; lognormal SD95 1.26
  (3,4,1,1,1,5); Data related to material input
- Transport, freight, rail [RER]: 5711.1 tkm; lognormal SD95 2.14
  (4,5,1,1,1,5); Standard distance of ecoinvent used
- Chromium steel 18/8, at plant [RER]: 2894.1 kg; lognormal SD95 1.26
  (3,4,1,1,1,5); Data from building considered, estimations
- Copper, at regional storage [RER]: 2.244 kg; lognormal SD95 1.26
  (3,4,1,1,1,5); Data from building considered, estimations
- Steel, electric, un- and low-alloyed, at plant [RER]: 2311.5 kg; lognormal SD95 1.26
  (3,4,1,1,1,5); Data from building considered, estimations
- Rock wool, at plant [CH]: 575.68 kg; lognormal SD95 1.26
  (3,4,1,1,1,5); Data from building considered, estimations
- Sheet rolling, steel [RER]: 6247.3 kg; lognormal SD95 1.26
  (3,4,1,1,1,5); Data related to material input
- Powder coating, aluminium sheet [RER]: 0.24125 m2; lognormal SD95 1.32
  (4,4,1,1,1,5); Data estimated from material input
- Casting, bronze [CH]: 4.026 kg; lognormal SD95 1.34
  (3,4,1,1,3,5); Data for similar process, estimations

## Emissions to nature
- Heat, waste [emissions to air, high. pop.]: 22021 MJ; lognormal SD95 1.26
  (3,4,1,1,1,5); Calculated from electricity use

## Sampling procedure
Data from call of bids for a ventilation system of a specific building used. Data completed with information from literature and from manufacturers

## Sources
- Klingler M., Kasser U., Savi D., Primas A., Stettler Y., Gujer P., 2014, 2014 - LCA ventilation and heating systems - Klingler, Schlussbericht, BFE, Buero fuer Umweltchemie, B&H AG, Zuerich, CH
Klingler M., Kasser U., Savi D., Primas A., Stettler Y., Gujer P. (2014) Ökobilanzdaten für Lüftungs- und Wärmeanlagen. Schlussbericht, BFE. Bundesamt für Energie (BFE). Bern.
Type: Separate publication
Source: Report
First author: Klingler M.
Other authors: Kasser U., Savi D., Primas A., Stettler Y., Gujer P.
Year: 2014
Title of anthology: Schlussbericht, BFE
Place of publication: Bern
Publisher: Bundesamt für Energie (BFE)
