# xx Electricity, at cogen 160kWe lambda=1, allocation electricity

Dataset: EcoSpold 1, unit process
Functional unit: 1 kWh
Category: energy, obsolete / cogeneration, obsolete\gas, obsolete
Geography: CH
Time period: 2000-01 to 2000-12
Generated by: Thomas Heck
accessRestrictedTo: 0
copyright: true

## General comment
The multioutput-process 'natural gas, burned in cogen 160kWe lambda=1, allocation electricity' delivers the coproducts 'heat, at cogen 160kWe lambda=1, allocation electricity' and 'electricity, at cogen 160kWe lambda=1, allocation electricity'.;

## Included processes
The module includes fuel input, infrastructure, emissions to air, and substances needed for operation.

## Geography
Could be used for central European conditions.

## Technology
Average technology available on market.

## Reference product
- xx Electricity, at cogen 160kWe lambda=1, allocation electricity [CH]: 1 kWh
  SWITZERLAND

## Inputs from technosphere
- Natural gas, low pressure, at consumer [CH]: 11.2486 MJ; lognormal SD95 1
- Cogen unit 160kWe, components for electricity only [RER]: 5.6243e-8 p; lognormal SD95 1
- Cogen unit 160kWe, common components for heat+electricity [RER]: 5.6243e-8 p; lognormal SD95 1
- Lubricating oil, at plant [RER]: 0.00033746 kg; lognormal SD95 1.2
  vender information
- Disposal, used mineral oil, 10% water, to hazardous waste incineration [CH]: 0.00033746 kg; lognormal SD95 2
  rough estimate

## Emissions to nature
- NMVOC, non-methane volatile organic compounds, unspecified origin [emissions to air, high. pop.]: 2.2497e-5 kg; lognormal SD95 3
  estimate based on different references
- Particulates, < 2.5 um [emissions to air, high. pop.]: 1.6873e-6 kg; lognormal SD95 2
  estimate based on different references
- Carbon dioxide, fossil [emissions to air, high. pop.]: 0.62992 kg; lognormal SD95 1.1
  composition of natural gas
- Nitrogen oxides [emissions to air, high. pop.]: 0.00016873 kg; lognormal SD95 2
  estimate based on different references
- Carbon monoxide, fossil [emissions to air, high. pop.]: 0.00053993 kg; lognormal SD95 2
  estimate based on different references
- Heat, waste [emissions to air, high. pop.]: 8.7739 MJ; lognormal SD95 1.1
  uncertainty of heating value and electric efficiency
- Sulfur dioxide [emissions to air, high. pop.]: 6.1867e-6 kg; lognormal SD95 1.1
  composition of natural gas
- Platinum [emissions to air, high. pop.]: 7.874e-11 kg; lognormal SD95 10
  (Artelt et al. 2000)
- Dinitrogen monoxide [emissions to air, high. pop.]: 2.8121e-5 kg; lognormal SD95 3
  rough estimate
- Methane, fossil [emissions to air, high. pop.]: 0.00025872 kg; lognormal SD95 3
  estimate based on different references

## Sampling procedure
Literature. Manufacturer information.

## Sources
- Heck T., 2007, 2007 - Combined heat power generation - Heck, Sachbilanzen von Energiesystemen. Final report No. 6 ecoinvent data v2.0, 6, Swiss Centre for LCI, PSI, Duebendorf and Villigen, CH
Heck, T. (2007) Wärme-Kraft-Kopplung. Sachbilanzen von Energiesystemen. Final report No. 6 ecoinvent data v2.0. Editors: Dones R.. Volume: 6. Swiss Centre for LCI, PSI. Dübendorf and Villigen, CH.
Type: Measurement on site
Source: CD-ROM
First author: Heck, T.
Year: 2007
Name of editors: Dones R.
Title of anthology: Sachbilanzen von Energiesystemen. Final report No. 6 ecoinvent data v2.0
Place of publication: Dübendorf and Villigen, CH
Publisher: Swiss Centre for LCI, PSI
Volume No: 6

## Validation
Proof reading validation: passed; Other validation: none;
