# Concrete for building construction, unspecific, at plant, with resource correction

Dataset: EcoSpold 1, unit process
Functional unit: 1 m3
Category: construction materials / concrete
Geography: CH
Time period: 2015-01 to 2015-12
Generated by: Laura Tschuemperlin
accessRestrictedTo: 0
copyright: true

## General comment
based on ecoinvent 3.2 dataset including data on the composition of the unspecific concrete from Philipp Hubler, Amt für Hochbauten Stadt Zürich
Technology: Data from the Amt für Hochbauten, Stadt Zürich. Data approximates average swiss production
Time period: Time of publications.
Version: 1

Local category: Mineralische Baustoffe
Local subcategory: Beton und Betonwaren

## Included processes
The activity starts with the ingredients for the concrete at the factory gate. Includes the whole manufacturing processes to produce ready-mixed concrete, internal processes (transport, etc.) and infrastructure. No administration is included.

## Time period
Time of publications.

## Reference product
- Concrete for building construction, unspecific, at plant, with resource correction [CH]: 1 m3
  SWITZERLAND

## Inputs from technosphere
- CEM I cement, at plant [CH]: 30 kg; lognormal SD95 1.2152
  (2,1,1,1,1,5,BU:1.05); ; Betonzusammensetzung gemäss persönlicher Mitteilung, Philipp Hubler, 16. Juni 2016
- Electricity, medium voltage, at grid [CH]: 4.3 kWh; lognormal SD95 1.1639
  (3,3,3,2,1,1,BU:1.05); ;
- Sand, at mine [CH]: 605.13 kg; lognormal SD95 1.2152
  (same comment as for CEM I cement, at plant)
- Lubricating oil, at plant [RER]: 0.02 kg; lognormal SD95 1.2152
  (2,1,1,1,1,5,BU:1.05); ;
- Natural gas, burned in industrial furnace 1MW [CH]: 5.7 MJ; lognormal SD95 1.2152
  (2,1,1,1,1,5,BU:1.05); ;
- Disposal, concrete, 5% water, to construction waste landfill [CH]: 5.38 kg; lognormal SD95 1.218
  (2,1,2,1,1,5,BU:1.05); ;
- Recycling aggregate from concrete demolition, dry, at plant [CH]: 93.225 kg; lognormal SD95 1.2152
  (same comment as for CEM I cement, at plant)
- Disposal, municipal solid waste, 22.9% water, to municipal incineration [CH]: 0.05 kg; lognormal SD95 1.218
  (2,1,2,1,1,5,BU:1.05); ;
- Gravel, round, at mine [CH]: 1072.9 kg; lognormal SD95 1.2183
  (2,1,2,2,1,5,BU:1.05); ; Betonzusammensetzung gemäss persönlicher Mitteilung, Philipp Hubler, 16. Juni 2016
- Diesel, burned in building machine, average [CH]: 0.4 MJ; lognormal SD95 1.3059
  (1,3,3,3,1,1,BU:1.05); ;
- Tap water, at user [CH]: 145 kg; lognormal SD95 1.3059
  (4,2,2,1,1,5,BU:1.05); ; w/z Wert = 0.5 (Zementgehalt*0.5=Wassergehalt), gemäss Herrn Pöll, AHB, Persönliche Mitteilung vom 27.06.2016
- CEM II, B cement, at plant [CH]: 130 kg; lognormal SD95 1.2152
  (same comment as for CEM I cement, at plant)
- Transport, freight, rail, electricity with shunting [CH]: 29.336 tkm; lognormal SD95 2.0511
  (2,1,1,1,1,5,BU:2); 36.006;
- Recycling aggregate from mixed demolition, dry, at plant [CH]: 93.225 kg; lognormal SD95 1.2152
  (same comment as for CEM I cement, at plant)
- Concrete mixing plant [CH]: 4.17e-7 p; lognormal SD95 3.0499
  (2,1,2,1,1,5,BU:3); Menge auf aktive Substanz angepasst;
- Light fuel oil, burned in boiler 10kW condensing, non-modulating [CH]: 8.2 MJ; lognormal SD95 1.5798
  (5,1,3,1,1,5,BU:1.05); ;
- Transport, freight, lorry, 32t-40t gross weight, fleet average [CH]: 43.122 tkm; lognormal SD95 2.0525
  (2,1,2,2,1,5,BU:2); 43.0545;
- Synthetic rubber, at plant [RER]: 0.12 kg; lognormal SD95 1.2152
  (2,1,1,1,1,5,BU:1.05); ;
- CEM II, A cement, at plant [CH]: 130 kg; lognormal SD95 1.2152
  (same comment as for CEM I cement, at plant)
- Polycarboxylates, 40% active substance, at plant [RER]: 0.2 kg; lognormal SD95 1.2152
  (same comment as for CEM I cement, at plant)

## Inputs from nature
- Sand, resource correction [resources, in ground]: -406.6 kg
  (5,1,3,1,1,5,BU:1.05); ; Ressourcenkorrektur
- Gravel, resource correction [resources, in ground]: -721 kg
  (4,2,2,1,1,5,BU:1.05); ; Ressourcenkorrektur

## Sampling procedure
Measured data of several Swiss plants, intended to be representative for the Swiss production volume

## Sources
- Tschuemperlin L., Ramseier L., Frischknecht R., 2020, 2020 - LCA selected types of concrete - Tschuemperlin, Project Report, 0, treeze Ltd., Zuerich, CH

## Validation
Proof reading validation: 27.06.2016; Other validation: G:\Projekte laufend\551 CEM IIIA Beton und Fertigbetonteile\EcoSpold\[551-Zement-Klinker_v0.9.xlsx]X-Process;
