# Electricity, medium voltage, production from hydro power, run-of-river RER, at grid

Dataset: EcoSpold 1, unit process
Functional unit: 1 kWh
Category: energy supply, kbob recommendation / electricity, delivered via network
Geography: CH
Time period: 2009-01 to 2009-12
Production volume: total electricity in Switzerland: 60 TWh
Share of production covered: 100 %
Generated by: René Itten
accessRestrictedTo: 0
copyright: true

## General comment
This dataset describes the transformation from high to medium voltage as well as the transmission of electricity at medium voltage.;

## Included processes
Included are the electricity production in 0, the transmission network and direct SF6-emissions to air. Electricity losses during medium-voltage transmission and transformation from high-voltage are accounted for.

## Geography
Data apply to public and self producers. Geographical classification according to IEA. Assumptions for transmission network, losses and emissions are based on Swiss data.

## Technology
Average technology used to transmit and distribute electricity. Includes underground and overhead lines, as well as air-, vacuum- and SF6-insulated high-to-medium voltage switching stations. Electricity production according to related datasets

## Time period
Time of publications.

## Reference product
- Electricity, medium voltage, production from hydro power, run-of-river RER, at grid [CH]: 1 kWh
  SWITZERLAND

## Inputs from technosphere
- Sulphur hexafluoride, liquid, at plant [RER]: 5.0604e-8 kg; lognormal SD95 1.078
  (1,1,2,1,1,3); based on emission data
- Transmission network, electricity, medium voltage [CH]: 1.8628e-8 km; lognormal SD95 3.1614
  (3,1,4,5,3,5); based on consumption statistics
- Electricity, high voltage, production from hydro power, run-of-river RER, at grid [CH]: 1.0098 kWh; lognormal SD95 1.2355
  (3,1,1,1,3,1); specific losses of network estimated based on statistics

## Emissions to nature
- Heat, waste [emissions to air, unspecified]: 0.019417 MJ; lognormal SD95 1.3221
  (4,1,3,1,1,5); estimations based on losses
- Heat, waste [emissions to soil, unspecified]: 0.015887 MJ; lognormal SD95 1.3221
  (4,1,3,1,1,5); estimations based on losses
- Sulfur hexafluoride [emissions to air, unspecified]: 5.0604e-8 kg; lognormal SD95 1.506
  (1,1,2,1,1,3); national statistics

## Sampling procedure
statistics

## Sources
- Frischknecht R., Tuchschmid M., 2008, 2008 - Prim. energy fact. of energy systems - Frischknecht, Project reports, 387, ESU-services Ltd., Uster, CH
Frischknecht R., Itten R., Tuchschmid M., (2010) Primärenergiefaktoren von Energiesystemen. Project reports. Volume: 387. ESU-services Ltd.. Uster, CH.

## Validation
Proof reading validation: 08.05.2014; Other validation: G:\Projekte laufend\388 Aktualisierung PEF Energie\EcoSpold\[388_60_electricity_from_grid-v0.3.xlsx]X-Process;
