# Palm oil, at oil mill

Dataset: EcoSpold 1, unit process
Functional unit: 1 kg
Category: agricultural / plant oils
Geography: MY
Time period: 2000-01 to 2000-12
Production volume: Processing of fresh palm fruit bunches was 76 Mt in 2005 in MY
Share of production covered: 0 %
Generated by: Edgard Gnansounou
accessRestrictedTo: 0
copyright: true

## General comment
Inventory refers to the production of 1 kg palm oil, respectively palm kernel oil and palm kernel meal, from palm oil. The multioutput-process 'palm fruit bunches, in oil mill' delivers the co-products 'palm oil, at oil mill', 'palm kernel oil, at oil mill' and 'palm kernel meal, at oil mill'. Economic allocation with allocation factor of 81.3% to palm oil, 17.3% to palm kernel oil, and 1.4% to palm kernel meal. Allocation of CO2 emissions is done according to carbon balance.;

## Included processes
This process includes the extraction of palm oil, palm kernel oil and palm kernel meal, from palm fruit bunches. Energy supply from extracted solids (fibres, shells, digester solids and empty fruit bunches) and treatment of specific wastewater effluents are taken into account. System boundary is at the oil mill.

## Geography
Data from various literature references (incl. specific Malaysian and Indonesian industrial data)

## Technology
Typical palm oil mill designed for palm oil and palm kernel oil extraction, Malaysian context. Palm fuit bunches undergo sterilization, stripping, digestion, oil extraction, screening, settling and refining.

## Time period
Data from 1995 to 2006, current technology for palm oil mills in MY

## Reference product
- Palm oil, at oil mill [MY]: 1 kg
  MALAYSIA

## Inputs from technosphere
- Cogen unit 6400kWth, wood burning, common components for heat+electricity [CH]: 1.3078e-8 p; lognormal SD95 3.1045
  (4,4,2,1,1,5); Adapted from the dataset 'wood chips, in cogen 6400kWth, wood', according to actual water, carbon and energy content of the fuel (fibres, empty fruit bunch, shell, digester solids)
- Lubricating oil, at plant [RER]: 4.445e-5 kg; lognormal SD95 1.3241
  (same comment as for Cogen unit 6400kWth, wood burning, common components for heat+electric)
- Transport, freight, lorry, 7.5t-16t gross weight, fleet average [RER]: 0.37688 tkm; lognormal SD95 2.095
  (4,5,na,na,na,na); Based on ecoinvent Guidelines, standard distances
- Disposal, wood ash mixture, pure, 0% water, to sanitary landfill [CH]: 0.0035913 kg; lognormal SD95 1.3241
  (same comment as for Cogen unit 6400kWth, wood burning, common components for heat+electric)
- Tap water, at user [RER]: 2.2142 kg; lognormal SD95 1.1635
  (1,3,3,1,1,4); Literature and industrial data
- Treatment, sewage, to wastewater treatment, class 2 [CH]: 1.0665e-5 m3; lognormal SD95 1.3241
  (same comment as for Cogen unit 6400kWth, wood burning, common components for heat+electric)
- Treatment, sewage, from residence, to wastewater treatment, class 2 [CH]: 0.0030823 m3; lognormal SD95 1.1635
  (1,3,3,1,1,4); Calculation, to close mass balance of process
- Disposal, wood ash mixture, pure, 0% water, to municipal incineration [CH]: 0.0017889 kg; lognormal SD95 1.3241
  (same comment as for Cogen unit 6400kWth, wood burning, common components for heat+electric)
- Phosphoric acid, industrial grade, 85% in H2O, at plant [RER]: 0.00072931 kg; lognormal SD95 1.1031
  (2,3,1,2,1,3); Literature data & biodiesel producer
- Ammonia, liquid, at regional storehouse [RER]: 1.1113e-7 kg; lognormal SD95 1.3241
  (same comment as for Cogen unit 6400kWth, wood burning, common components for heat+electric)
- Disposal, wood ash mixture, pure, 0% water, to landfarming [CH]: 0.0017889 kg; lognormal SD95 1.3241
  (same comment as for Cogen unit 6400kWth, wood burning, common components for heat+electric)
- Disposal, used mineral oil, 10% water, to hazardous waste incineration [CH]: 4.445e-5 kg; lognormal SD95 1.3241
  (same comment as for Cogen unit 6400kWth, wood burning, common components for heat+electric)
- Cogen unit 6400kWth, wood burning, building [CH]: 3.266e-9 p; lognormal SD95 3.1045
  (same comment as for Cogen unit 6400kWth, wood burning, common components for heat+electric)
- Cogen unit 6400kWth, wood burning, components for electricity only [CH]: 1.3078e-8 p; lognormal SD95 3.1045
  (same comment as for Cogen unit 6400kWth, wood burning, common components for heat+electric)
- Chemicals organic, at plant [GLO]: 7.7789e-5 kg; lognormal SD95 1.3241
  (same comment as for Cogen unit 6400kWth, wood burning, common components for heat+electric)
- Transport, freight, rail [RER]: 0.0019583 tkm; lognormal SD95 2.095
  (4,5,na,na,na,na); Based on ecoinvent Guidelines, standard distances
- Transport, freight, lorry, fleet average [RER]: 0.00032638 tkm; lognormal SD95 2.095
  (4,5,na,na,na,na); Based on ecoinvent Guidelines, standard distances
- Palm fruit bunches, at farm [MY]: 3.76885 kg; lognormal SD95 1.209
  (1,2,1,1,1,5); Literature and industrial data, cross-checking of various references
- Hexane, at plant [RER]: 0.0025345 kg; lognormal SD95 1.1461
  (2,3,1,5,1,3); Literature and industrial data
- Water, decarbonised, at plant [RER]: 0.010665 kg; lognormal SD95 1.3241
  (same comment as for Cogen unit 6400kWth, wood burning, common components for heat+electric)
- Oil mill [CH]: 8.3058e-10 p; lognormal SD95 3.2843
  (1,4,1,3,4,5); Calculation, according to production capacity and lifetime of the plant
- Chlorine, liquid, production mix, at plant [RER]: 4.445e-6 kg; lognormal SD95 1.3241
  (same comment as for Cogen unit 6400kWth, wood burning, common components for heat+electric)
- Disposal, municipal solid waste, 22.9% water, to municipal incineration [CH]: 4.445e-5 kg; lognormal SD95 1.3241
  (same comment as for Cogen unit 6400kWth, wood burning, common components for heat+electric)
- Sodium chloride, powder, at plant [RER]: 5.5564e-5 kg; lognormal SD95 1.3241
  (same comment as for Cogen unit 6400kWth, wood burning, common components for heat+electric)

## Emissions to nature
- Ammonia [emissions to air, high. pop.]: 2.3581e-5 kg; lognormal SD95 1.3926
  (same comment as for Cogen unit 6400kWth, wood burning, common components for heat+electric)
- Bromine [emissions to air, high. pop.]: 8.1313e-7 kg; lognormal SD95 5.1193
  (same comment as for Cogen unit 6400kWth, wood burning, common components for heat+electric)
- Lead [emissions to air, high. pop.]: 3.3745e-7 kg; lognormal SD95 5.1193
  (same comment as for Cogen unit 6400kWth, wood burning, common components for heat+electric)
- Benzo(a)pyrene [emissions to air, high. pop.]: 6.5427e-9 kg; lognormal SD95 3.1045
  (same comment as for Cogen unit 6400kWth, wood burning, common components for heat+electric)
- Benzene [emissions to air, high. pop.]: 1.1908e-5 kg; lognormal SD95 1.6336
  (same comment as for Cogen unit 6400kWth, wood burning, common components for heat+electric)
- Dioxin, 2,3,7,8 Tetrachlorodibenzo-p- [emissions to air, high. pop.]: 4.0564e-13 kg; lognormal SD95 3.1045
  (same comment as for Cogen unit 6400kWth, wood burning, common components for heat+electric)
- Zinc [emissions to air, high. pop.]: 4.0655e-6 kg; lognormal SD95 5.1193
  (same comment as for Cogen unit 6400kWth, wood burning, common components for heat+electric)
- Nickel [emissions to air, high. pop.]: 8.1313e-8 kg; lognormal SD95 5.1193
  (same comment as for Cogen unit 6400kWth, wood burning, common components for heat+electric)
- Phosphorus [emissions to air, high. pop.]: 4.0655e-6 kg; lognormal SD95 1.6336
  (same comment as for Cogen unit 6400kWth, wood burning, common components for heat+electric)
- Benzene, ethyl- [emissions to air, high. pop.]: 3.9256e-7 kg; lognormal SD95 1.6336
  (same comment as for Cogen unit 6400kWth, wood burning, common components for heat+electric)
- Dinitrogen monoxide [emissions to air, high. pop.]: 3.117e-5 kg; lognormal SD95 1.6336
  (same comment as for Cogen unit 6400kWth, wood burning, common components for heat+electric)
- Sulfur dioxide [emissions to air, high. pop.]: 3.3745e-5 kg; lognormal SD95 1.3241
  (same comment as for Cogen unit 6400kWth, wood burning, common components for heat+electric)
- Particulates, < 2.5 um [emissions to air, high. pop.]: 0.00058756 kg; lognormal SD95 3.1045
  (same comment as for Cogen unit 6400kWth, wood burning, common components for heat+electric)
- Carbon monoxide, biogenic [emissions to air, high. pop.]: 9.1602e-5 kg; lognormal SD95 5.1193
  (same comment as for Cogen unit 6400kWth, wood burning, common components for heat+electric)
- PAH, polycyclic aromatic hydrocarbons [emissions to air, high. pop.]: 1.4394e-7 kg; lognormal SD95 3.1045
  (same comment as for Cogen unit 6400kWth, wood burning, common components for heat+electric)
- Methane, biogenic [emissions to air, high. pop.]: 5.6793e-6 kg; lognormal SD95 1.6336
  (same comment as for Cogen unit 6400kWth, wood burning, common components for heat+electric)
- Hydrocarbons, aliphatic, unsaturated [emissions to air, high. pop.]: 4.0564e-5 kg; lognormal SD95 1.6336
  (same comment as for Cogen unit 6400kWth, wood burning, common components for heat+electric)
- m-Xylene [emissions to air, high. pop.]: 1.5703e-6 kg; lognormal SD95 1.6336
  (same comment as for Cogen unit 6400kWth, wood burning, common components for heat+electric)
- Phenol, pentachloro- [emissions to air, high. pop.]: 1.06e-10 kg; lognormal SD95 1.6336
  (same comment as for Cogen unit 6400kWth, wood burning, common components for heat+electric)
- Hydrocarbons, aliphatic, alkanes, unspecified [emissions to air, high. pop.]: 1.1908e-5 kg; lognormal SD95 1.6336
  (same comment as for Cogen unit 6400kWth, wood burning, common components for heat+electric)
- Nitrogen oxides [emissions to air, high. pop.]: 0.0011926 kg; lognormal SD95 1.6336
  (same comment as for Cogen unit 6400kWth, wood burning, common components for heat+electric)
- Chlorine [emissions to air, high. pop.]: 2.4394e-6 kg; lognormal SD95 1.6336
  (same comment as for Cogen unit 6400kWth, wood burning, common components for heat+electric)
- Potassium [emissions to air, high. pop.]: 0.00031712 kg; lognormal SD95 5.1193
  (same comment as for Cogen unit 6400kWth, wood burning, common components for heat+electric)
- Chromium [emissions to air, high. pop.]: 5.3665e-8 kg; lognormal SD95 5.1193
  (same comment as for Cogen unit 6400kWth, wood burning, common components for heat+electric)
- Formaldehyde [emissions to air, high. pop.]: 1.7011e-6 kg; lognormal SD95 1.6336
  (same comment as for Cogen unit 6400kWth, wood burning, common components for heat+electric)
- Copper [emissions to air, high. pop.]: 2.9815e-7 kg; lognormal SD95 5.1193
  (same comment as for Cogen unit 6400kWth, wood burning, common components for heat+electric)
- Benzene, hexachloro- [emissions to air, high. pop.]: 9.4217e-14 kg; lognormal SD95 3.1045
  (same comment as for Cogen unit 6400kWth, wood burning, common components for heat+electric)
- Mercury [emissions to air, high. pop.]: 4.0655e-9 kg; lognormal SD95 5.1193
  (same comment as for Cogen unit 6400kWth, wood burning, common components for heat+electric)
- Cadmium [emissions to air, high. pop.]: 9.4866e-9 kg; lognormal SD95 5.1193
  (same comment as for Cogen unit 6400kWth, wood burning, common components for heat+electric)
- Arsenic [emissions to air, high. pop.]: 1.3552e-8 kg; lognormal SD95 5.1193
  (same comment as for Cogen unit 6400kWth, wood burning, common components for heat+electric)
- Magnesium [emissions to air, high. pop.]: 4.8923e-6 kg; lognormal SD95 5.1193
  (same comment as for Cogen unit 6400kWth, wood burning, common components for heat+electric)
- Manganese [emissions to air, high. pop.]: 2.3174e-6 kg; lognormal SD95 5.1193
  (same comment as for Cogen unit 6400kWth, wood burning, common components for heat+electric)
- Fluorine [emissions to air, high. pop.]: 6.776e-7 kg; lognormal SD95 1.6336
  (same comment as for Cogen unit 6400kWth, wood burning, common components for heat+electric)
- Sodium [emissions to air, high. pop.]: 1.7618e-5 kg; lognormal SD95 5.1193
  (same comment as for Cogen unit 6400kWth, wood burning, common components for heat+electric)
- Carbon dioxide, biogenic [emissions to air, high. pop.]: 1.56066 kg; lognormal SD95 1.05
  (1,1,1,1,1,1); Calculation, to close carbon balance
- NMVOC, non-methane volatile organic compounds, unspecified origin [emissions to air, high. pop.]: 7.9824e-6 kg; lognormal SD95 1.6336
  (same comment as for Cogen unit 6400kWth, wood burning, common components for heat+electric)
- Acetaldehyde [emissions to air, high. pop.]: 8.2666e-7 kg; lognormal SD95 1.6336
  (same comment as for Cogen unit 6400kWth, wood burning, common components for heat+electric)
- Toluene [emissions to air, high. pop.]: 3.9256e-6 kg; lognormal SD95 1.6336
  (same comment as for Cogen unit 6400kWth, wood burning, common components for heat+electric)
- Calcium [emissions to air, high. pop.]: 7.9282e-5 kg; lognormal SD95 5.1193
  (same comment as for Cogen unit 6400kWth, wood burning, common components for heat+electric)
- Chromium VI [emissions to air, high. pop.]: 5.4207e-10 kg; lognormal SD95 5.1193
  (same comment as for Cogen unit 6400kWth, wood burning, common components for heat+electric)
- Heat, waste [emissions to air, high. pop.]: 17.504 MJ; lognormal SD95 1.1376
  (2,4,1,3,1,3); ecoinvent guidelines, calculation from electricity consumption and energy balance
- Hexane [emissions to air, high. pop.]: 0.0025345 kg; lognormal SD95 1.5
  (1,1,1,1,1,1); Calculation, based on hexane input

## Sampling procedure
Cross-checking of various literature sources from 1998 to 2006

## Extrapolations
Direct emissions (resulting from the combustion of sorghum bagasse) are based on the the combustion of wood chips (without emission control), according to the corresponding dry matter content, carbon content and energy content.

## Sources
- Jungbluth N., Chudacoff M., Dauriat A., Dinkel F., Doka G., Faist Emmenegger M., Gnansounou E., Kljun N., Spielmann M., Stettler C., Sutter J., 2007, 2007 - LCI bioenergy - Jungbluth, Final report ecoinvent data v2.0, 17, Swiss Centre for LCI, ESU-services Ltd., Duebendorf and Uster, CH
Jungbluth N., Chudacoff M., Dauriat A., Dinkel F., Doka G., Faist Emmenegger M., Gnansounou E., Kljun N., Spielmann M., Stettler C., Sutter J. (2007) Life Cycle Inventories of Bioenergy. Final report ecoinvent data v2.0. Volume: 17. Swiss Centre for LCI, ESU. Duebendorf and Uster, CH.
Type: Measurement on site
Source: CD-ROM
First author: Jungbluth N.
Other authors: Chudacoff M., Dauriat A., Dinkel F., Doka G., Faist Emmenegger M., Gnansounou E., Kljun N., Spielmann M., Stettler C., Sutter J.
Year: 2007
Title of anthology: Final report ecoinvent data v2.0
Place of publication: Duebendorf and Uster, CH
Publisher: Swiss Centre for LCI, ESU
Volume No: 17

## Validation
Proof reading validation: Passed.; Other validation: none;
