# Electricity mix, ÖBB

Dataset: EcoSpold 1, unit process
Functional unit: 1 kWh
Category: electricity / supply mix
Geography: AT
Time period: 2014-01 to 2014-12
Production volume: GWh
Share of production covered: 100 %
Generated by: Luana Krebs
accessRestrictedTo: 0
copyright: true

## General comment
Technology shares determined based on information from ÖBB and information on gross electricity generation in Austria;

## Included processes
This dataset includes the shares of different technologies of the ÖBB production mix in Austria.

## Geography
Austria

## Technology
Average technology

## Time period
Time of publications

## Reference product
- Electricity mix, ÖBB [AT]: 1 kWh
  AUSTRIA

## Inputs from technosphere
- Electricity, production mix photovoltaic, at plant [AT]: 0.013245 kWh; lognormal SD95 1.05
  (1,1,1,1,1,1,BU:1,05); ; personal communication SBB (2020), gross electricity generation AT
- Electricity, hydropower, at power plant [AT]: 0.80132 kWh; lognormal SD95 1.05
  (same comment as for Electricity, production mix photovoltaic, at plant)
- Electricity, at wind farm [RER]: 0.11921 kWh; lognormal SD95 1.05
  (same comment as for Electricity, production mix photovoltaic, at plant)
- Electricity, at cogen with biogas engine, allocation exergy [CH]: 0.066225 kWh; lognormal SD95 1.05
  (1,1,1,1,1,1,BU:1,05); ; personal communication SBB (2020), gross electricity generation DE

## Sampling procedure
Statistics

## Sources
- Krebs L., Frischknecht R., 2020, 2020 - Update Mobitool 2020 - Krebs, Project report, 713, treeze Ltd., Uster, CH
L. Krebs, R. Frischknecht (2020) Aktualisierung Ökobilanzdaten mobitool 2020, Teil 1. Project report. Volume: 713. treeze Ltd.. Uster, CH.
Type: Separate publication
Source: Report
First author: L. Krebs
Other authors: R. Frischknecht
Year: 2020
Title of anthology: Project report
Place of publication: Uster, CH
Publisher: treeze Ltd.
Volume No: 713

## Validation
Proof reading validation: 02.11.2020; Other validation: G:\Projekte laufend\713 Aktualisierung mobitool 2020\EcoSpold\[713-Strommix-Übertragung-Verteilung-Bahnstrom-EIv2-v0.4.xlsx]X-Process;
