# Transport, freight, rail

Dataset: EcoSpold 1, unit process
Functional unit: 1 tkm
Category: transport systems / train
Geography: FR
Time period: 2009-01 to 2015-12
Production volume: 24985 Mio tkm
Share of production covered: 100 %
Generated by: Luana Krebs
accessRestrictedTo: 0
copyright: true

## General comment
Inventory refers to the entire transport life cycle. For rail infrastructure, expenditures and environmental interventions due to construction, renewal and disposal of rail tracks have been allocated based on the Gross tonne kilometre performance (48165 Mio. Gtkm). Expenditures due to operation of the rail infrastructure, as well as land use have been allocated based on the yearly train kilometre performance (24985 Mio. tkm). For the operation of goods transportation average data by rail in France were used. The data has been determined top down, by combining the total yearly energy consumption and the yearly performance of goods transportation.;

## Included processes
The inventory includes the actual energy consumption for an average goods train in France using electro and diesel energy. In addition the diesel consumption and emissions of shunting processes are accounted for as well as the production and maintenance of vehicles and railyway tracks.

## Technology
Average technology

## Time period
Time of publications

## Reference product
- Transport, freight, rail [FR]: 1 tkm
  FRANCE

## Inputs from technosphere
- Maintenance, locomotive [RER]: 4.3711e-10 p; lognormal SD95 3.2876
  (2,4,1,3,4,5,BU:3); same demand as for locomotive; SBB Zahlen und Fakten 2014, UIC Statistic 2012
- Disposal, locomotive [RER]: 4.3711e-10 p; lognormal SD95 3.2876
  (same comment as for Maintenance, locomotive)
- Diesel, at regional storage [RER]: 0.0011067 kg; lognormal SD95 1.5846
  (2,4,1,3,4,5,BU:1.05); specific diesel consumption of the country; UIC Statistik 2016 & 2018, SBB pers. Correspondence, Okt. 2020
- Goods wagon [RER]: 3.7456e-9 p; lognormal SD95 3.2876
  (2,4,1,3,4,5,BU:3); estimation based on the demand per vkm from CH (2,08E-6unit/vkm)) and the average load; SBB Zahlen und Fakten 2014, UIC Statistic 2012
- Railway track [CH]: 6.3738e-5 my; lognormal SD95 3.2876
  (2,4,1,3,4,5,BU:3); estimation based on track demand per Gtkm for CH (3,31E-8km/Gtkm) and the specific gross transport performance per tkm (Gtkm/tkm)); SBB Zahlen und Fakten 2014, UIC Statistic 2012
- Operation, maintenance, railway track [CH]: 6.3738e-5 my; lognormal SD95 3.2876
  (2,4,1,3,4,5,BU:3); same demand as for rail track; SBB Zahlen und Fakten 2014, UIC Statistic 2012
- Electricity, medium voltage, railway, at grid [FR]: 0.042249 kWh; lognormal SD95 1.2077
  (1,1,1,1,1,5,BU:1.05); electricity consumption 0,00kWh/tkm, assumed losses 8,50%; UIC Statistik 2016 & 2018, SBB pers. Correspondence, Okt. 2020
- Disposal, railway track [CH]: 6.3738e-5 my; lognormal SD95 3.2876
  (same comment as for Operation, maintenance, railway track)
- Locomotive [RER]: 4.3711e-10 p; lognormal SD95 3.2876
  (2,4,1,3,4,5,BU:3); estimation based on the demand per vkm from CH (2,43E-7unit/vkm)) and the average load; SBB Zahlen und Fakten 2014, UIC Statistic 2012
- Maintenance, goods wagon [RER]: 3.7456e-9 p; lognormal SD95 3.2876
  (2,4,1,3,4,5,BU:3); same demand as for goods wagon; SBB Zahlen und Fakten 2014, UIC Statistic 2012

## Emissions to nature
- Methane, fossil [emissions to air, unspecified]: 6.2667e-8 kg; lognormal SD95 2.308
  (3,3,2,5,5,5,BU:1.5); emission factor of diesel: 5,66E-2 g/kg diesel, assuming no use of particle filters; BAFU 2015: non road emission factor database
- Sulfur dioxide [emissions to air, unspecified]: 2.2134e-8 kg; lognormal SD95 2.0816
  (3,3,2,5,5,5,BU:1.05); emission factor of diesel: 2,00E-2 g/kg diesel, assuming no use of particle filters; HBEFA 3.1., CH
- Chromium [emissions to soil, industrial]: 1.4871e-11 kg; lognormal SD95 1.5217
  (3,3,1,3,1,1,BU:1.5); estimation based on the emission per Gkm from CH (kg/pkmunit/vkm)) and the average load; Data from ANABEL; Personal correspondence Gunter Adolf, SBB, June 2016; UIC Statistic 2012
- Ethane [emissions to air, unspecified]: 1.7473e-9 kg; lognormal SD95 2.308
  (3,3,2,5,5,5,BU:1.5); emission factor of diesel: 1,58E-3 g/kg diesel, assuming no use of particle filters; BAFU 2015: Non-road database; EMEP/EEA guidebook 2013, Tab. 3-112
- Copper [emissions to soil, industrial]: 9.365e-11 kg; lognormal SD95 1.5217
  (3,3,1,3,1,1,BU:1.5); estimation based on the emission per Gkm from CH (0,00E+0unit/vkm)) and the average load; Data from ANABEL; Personal correspondence Gunter Adolf, SBB, June 2016; UIC Statistic 2012
- Copper [emissions to air, unspecified]: 1.8814e-9 kg; lognormal SD95 5.8584
  (3,3,2,5,5,5,BU:5); emission factor of diesel: 1,70E-3 g/kg diesel, assuming no use of particle filters; EMEP/EEA guidebook 2013, 1.A.2.f.ii, Tab. 3-1
- Manganese [emissions to air, unspecified]: 1.0303e-10 kg; lognormal SD95 5.0184
  (3,3,1,3,1,1,BU:5); estimation based on the emission per Gkm from CH (kg/pkmunit/vkm)) and the average load; Data from ANABEL; Personal correspondence Gunter Adolf, SBB, June 2016; UIC Statistic 2012
- Cadmium [emissions to air, unspecified]: 1.1067e-11 kg; lognormal SD95 5.8584
  (3,3,2,5,5,5,BU:5); emission factor of diesel: 1,00E-5 g/kg diesel, assuming no use of particle filters; EMEP/EEA guidebook 2013, 1.A.2.f.ii, Tab. 3-1
- m-Xylene [emissions to air, unspecified]: 5.7078e-8 kg; lognormal SD95 2.308
  (3,3,2,5,5,5,BU:1.5); emission factor of diesel: 5,16E-2 g/kg diesel, assuming no use of particle filters; BAFU 2015: Non-road database; EMEP/EEA guidebook 2013, Tab. 3-119
- Particulates, < 2.5 um [emissions to air, unspecified]: 1.9196e-6 kg; lognormal SD95 3.7429
  (3,3,2,5,5,5,BU:3); emission factor of diesel: 1,73E+0 g/kg diesel, assuming no use of particle filters; BAFU 2015: non road emission factor database
- Pentane [emissions to air, unspecified]: 3.4946e-9 kg; lognormal SD95 2.308
  (3,3,2,5,5,5,BU:1.5); emission factor of diesel: 3,16E-3 g/kg diesel, assuming no use of particle filters; BAFU 2015: Non-road database; EMEP/EEA guidebook 2013, Tab. 3-115
- Chromium VI [emissions to air, unspecified]: 1.1067e-13 kg; lognormal SD95 5.8584
  (3,3,2,5,5,5,BU:5); emission factor of diesel: 1,00E-7 g/kg diesel, assuming no use of particle filters; EMEP/EEA guidebook 2013, 1.A.2.f.ii, Tab. 3-1
- Oils, unspecified [emissions to soil, industrial]: 2.7854e-9 kg; lognormal SD95 1.5217
  (3,3,1,3,1,1,BU:1.5); hydro carbon emissions assumed as oil emission; Data from ANABEL; Personal correspondence Gunter Adolf, SBB, June 2016; UIC Statistic 2012
- Lead [emissions to air, unspecified]: 4.3985e-12 kg; lognormal SD95 5.0184
  (same comment as for Manganese)
- Zinc [emissions to air, unspecified]: 2.6001e-11 kg; lognormal SD95 5.0184
  (3,3,1,3,1,1,BU:5); estimation based on the emission per Gkm from CH (0,00E+0unit/vkm)) and the average load; Data from ANABEL; Personal correspondence Gunter Adolf, SBB, June 2016; UIC Statistic 2012
- Benzo(a)pyrene [emissions to air, unspecified]: 3.3202e-11 kg; lognormal SD95 3.7429
  (3,3,2,5,5,5,BU:3); emission factor of diesel: 3,00E-5 g/kg diesel, assuming no use of particle filters; EMEP/EEA guidebook 2013, 1.A.2.f.ii, Tab. 3-1
- Acetaldehyde [emissions to air, unspecified]: 2.6617e-7 kg; lognormal SD95 2.308
  (3,3,2,5,5,5,BU:1.5); emission factor of diesel: 2,41E-1 g/kg diesel, assuming no use of particle filters; BAFU 2015: Non-road database; EMEP/EEA guidebook 2013, Tab. 3-122
- Iron [emissions to air, unspecified]: 2.3949e-8 kg; lognormal SD95 5.0184
  (3,3,1,3,1,1,BU:5); estimation based on the emission factors per Gkm of freight transport in Switzerland and specific gross ton kilometric performance per tkm (Gtkm/tkm); Data from ANABEL; Personal correspondence Gunter Adolf, SBB, June 2016; UIC Statistic 2012
- Lead [emissions to air, unspecified]: 5.755e-11 kg; lognormal SD95 5.8584
  (3,3,2,5,5,5,BU:5); emission factor of diesel: 5,20E-5 g/kg diesel, assuming no use of particle filters; EMEP/EEA guidebook 2013, 1.A.2.f.ii, Tab. 3-12
- Antimony [emissions to soil, industrial]: 4.6802e-12 kg; lognormal SD95 1.5217
  (same comment as for Chromium)
- Formaldehyde [emissions to air, unspecified]: 4.8924e-7 kg; lognormal SD95 2.308
  (3,3,2,5,5,5,BU:1.5); emission factor of diesel: 4,42E-1 g/kg diesel, assuming no use of particle filters; BAFU 2015: Non-road database; EMEP/EEA guidebook 2013, Tab. 3-121
- Propane [emissions to air, unspecified]: 5.8243e-9 kg; lognormal SD95 2.308
  (3,3,2,5,5,5,BU:1.5); emission factor of diesel: 5,26E-3 g/kg diesel, assuming no use of particle filters; BAFU 2015: Non-road database; EMEP/EEA guidebook 2013, Tab. 3-113
- Chromium [emissions to air, unspecified]: 5.5336e-11 kg; lognormal SD95 5.8584
  (3,3,2,5,5,5,BU:5); emission factor of diesel: 5,00E-5 g/kg diesel, assuming no use of particle filters; EMEP/EEA guidebook 2013, 1.A.2.f.ii, Tab. 3-1
- Styrene [emissions to air, unspecified]: 3.2616e-8 kg; lognormal SD95 2.308
  (3,3,2,5,5,5,BU:1.5); emission factor of diesel: 2,95E-2 g/kg diesel, assuming no use of particle filters; BAFU 2015: Non-road database; EMEP/EEA guidebook 2013, Tab. 3-125
- Zinc [emissions to water, unspecified]: 2.5262e-10 kg; lognormal SD95 5.0184
  (same comment as for Zinc)
- Zinc [emissions to soil, industrial]: 9.229e-12 kg; lognormal SD95 1.5217
  (same comment as for Copper)
- Antimony [emissions to air, unspecified]: 1.3186e-11 kg; lognormal SD95 5.0184
  (same comment as for Manganese)
- Particulates, > 10 um [emissions to air, unspecified]: 8.1111e-8 kg; lognormal SD95 2.308
  (3,3,2,5,5,5,BU:1.5); emission factor of diesel: 7,33E-2 g/kg diesel, assuming no use of particle filters; BAFU 2015: non road emission factor database
- Mercury [emissions to air, unspecified]: 5.8656e-12 kg; lognormal SD95 5.8584
  (3,3,2,5,5,5,BU:5); emission factor of diesel: 5,30E-6 g/kg diesel, assuming no use of particle filters; EMEP/EEA guidebook 2013, 1.A.2.f.ii, Tab. 3-1
- NMVOC, non-methane volatile organic compounds, unspecified origin [emissions to air, unspecified]: 4.7311e-6 kg; lognormal SD95 2.308
  (3,3,2,5,5,5,BU:1.5); emission factor of diesel: 4,27E+0 g/kg diesel, assuming no use of particle filters; non road emission factor
- Copper [emissions to air, unspecified]: 2.6384e-10 kg; lognormal SD95 5.0184
  (same comment as for Zinc)
- Manganese [emissions to soil, industrial]: 3.6572e-11 kg; lognormal SD95 1.5217
  (same comment as for Chromium)
- Arsenic [emissions to air, unspecified]: 1.1067e-13 kg; lognormal SD95 5.8584
  (same comment as for Chromium VI)
- Iron [emissions to soil, industrial]: 8.5008e-9 kg; lognormal SD95 1.5217
  (3,3,1,3,1,1,BU:1.5); estimation based on the emission per Gkm from CH (4,41E-9unit/vkm)) and the average load; Data from ANABEL; Personal correspondence Gunter Adolf, SBB, June 2016; UIC Statistic 2012
- Heptane [emissions to air, unspecified]: 1.7473e-8 kg; lognormal SD95 2.308
  (3,3,2,5,5,5,BU:1.5); emission factor of diesel: 1,58E-2 g/kg diesel, assuming no use of particle filters; BAFU 2015: Non-road database; EMEP/EEA guidebook 2013, Tab. 3-116
- Acrolein [emissions to air, unspecified]: 1.0309e-7 kg; lognormal SD95 2.308
  (3,3,2,5,5,5,BU:1.5); emission factor of diesel: 9,31E-2 g/kg diesel, assuming no use of particle filters; BAFU 2015: Non-road database; EMEP/EEA guidebook 2013, Tab. 3-124
- Benzaldehyde [emissions to air, unspecified]: 7.9793e-8 kg; lognormal SD95 2.308
  (3,3,2,5,5,5,BU:1.5); emission factor of diesel: 7,21E-2 g/kg diesel, assuming no use of particle filters; BAFU 2015: Non-road database; EMEP/EEA guidebook 2013, Tab. 3-123
- Chromium [emissions to air, unspecified]: 4.1897e-11 kg; lognormal SD95 5.0184
  (same comment as for Manganese)
- Nitrogen oxides [emissions to air, unspecified]: 5.1387e-5 kg; lognormal SD95 2.308
  (3,3,2,5,5,5,BU:1.5); emission factor of diesel: 4,64E+1 g/kg diesel, assuming no use of particle filters; BAFU 2015: non road emission factor database
- Carbon monoxide, fossil [emissions to air, unspecified]: 2.8424e-5 kg; lognormal SD95 5.8584
  (3,3,2,5,5,5,BU:5); emission factor of diesel: 2,57E+1 g/kg diesel, assuming no use of particle filters; BAFU 2015: non road emission factor database
- Noise, rail, freight train [non material emissions, unspecified]: 1 tkm; lognormal SD95 2.532
  (3,3,5,5,5,5,BU:1.5); ; Ecological Scarcity method 2013; Frischknecht & Büsser Knöpfel 2013
- Lead [emissions to soil, industrial]: 1.5612e-12 kg; lognormal SD95 1.5217
  (same comment as for Chromium)
- Carbon dioxide, fossil [emissions to air, unspecified]: 0.0034863 kg; lognormal SD95 2.0816
  (3,3,2,5,5,5,BU:1.05); emission factor of diesel: 3,15E+3 g/kg diesel, assuming no use of particle filters; BAFU 2015: non road emission factor database
- o-Xylene [emissions to air, unspecified]: 2.3297e-8 kg; lognormal SD95 2.308
  (3,3,2,5,5,5,BU:1.5); emission factor of diesel: 2,11E-2 g/kg diesel, assuming no use of particle filters; BAFU 2015: Non-road database; EMEP/EEA guidebook 2013, Tab. 3-120
- Toluene [emissions to air, unspecified]: 5.8243e-10 kg; lognormal SD95 2.308
  (3,3,2,5,5,5,BU:1.5); emission factor of diesel: 5,26E-4 g/kg diesel, assuming no use of particle filters; BAFU 2015: Non-road database; EMEP/EEA guidebook 2013, Tab. 3-118
- Particulates, > 2.5 um, and < 10um [emissions to air, unspecified]: 7.9031e-8 kg; lognormal SD95 2.7394
  (3,3,2,5,5,5,BU:2); emission factor of diesel: 7,14E-2 g/kg diesel, assuming no use of particle filters; BAFU 2015: non road emission factor database
- Heat, waste [emissions to air, unspecified]: 0.1521, 0.047368 MJ (2 entries); lognormal SD95 1.0907
  (2,3,1,3,1,1,BU:1.05); default value;
- Butane [emissions to air, unspecified]: 8.7364e-9 kg; lognormal SD95 2.308
  (3,3,2,5,5,5,BU:1.5); emission factor of diesel: 7,89E-3 g/kg diesel, assuming no use of particle filters; BAFU 2015: Non-road database; EMEP/EEA guidebook 2013, Tab. 3-114
- Selenium [emissions to air, unspecified]: 1.1067e-11 kg; lognormal SD95 5.8584
  (same comment as for Cadmium)
- Copper [emissions to water, unspecified]: 2.6478e-11 kg; lognormal SD95 3.0162
  (3,3,1,3,1,1,BU:3); estimation based on the emission per Gkm from CH (0,00E+0unit/vkm)) and the average load; Data from ANABEL; Personal correspondence Gunter Adolf, SBB, June 2016; UIC Statistic 2012
- Dinitrogen monoxide [emissions to air, unspecified]: 1.7233e-7 kg; lognormal SD95 2.308
  (3,3,2,5,5,5,BU:1.5); emission factor of diesel: 1,56E-1 g/kg diesel, assuming no use of particle filters; BAFU 2015: non road emission factor database
- PAH, polycyclic aromatic hydrocarbons [emissions to air, unspecified]: 3.6411e-9 kg; lognormal SD95 3.7429
  (3,3,2,5,5,5,BU:3); emission factor of diesel: 3,29E-3 g/kg diesel, assuming no use of particle filters; EMEP/EEA guidebook 2013, 1.A.2.f.ii, Tab. 3-1
- Benzene [emissions to air, unspecified]: 7.8334e-9 kg; lognormal SD95 3.7429
  (3,3,2,5,5,5,BU:3); emission factor of diesel: 7,08E-3 g/kg diesel, assuming no use of particle filters; BAFU 2015: non road emission factor database
- Nickel [emissions to air, unspecified]: 7.7471e-11 kg; lognormal SD95 5.8584
  (3,3,2,5,5,5,BU:5); emission factor of diesel: 7,00E-5 g/kg diesel, assuming no use of particle filters; EMEP/EEA guidebook 2013, 1.A.2.f.ii, Tab. 3-1
- Zinc [emissions to air, unspecified]: 1.1067e-9 kg; lognormal SD95 5.8584
  (3,3,2,5,5,5,BU:5); emission factor of diesel: 1,00E-3 g/kg diesel, assuming no use of particle filters; EMEP/EEA guidebook 2013, 1.A.2.f.ii, Tab. 3-1
- Ammonia [emissions to air, unspecified]: 1.1067e-8 kg; lognormal SD95 2.1253
  (3,3,2,5,5,5,BU:1.2); emission factor of diesel: 1,00E-2 g/kg diesel, assuming no use of particle filters; EMEP/EEA guidebook 2013, 1.A.3.c, Tab. 3-3

## Sampling procedure
Statistics

## Extrapolations
For the determination of the train and rail track demand per tkm date of Switzerland was used and extrapolated with the tkm of FR

## Sources
- Krebs L., Frischknecht R., 2020, 2020 - Update Mobitool 2020 - Krebs, Project report, 713, treeze Ltd., Uster, CH
L. Krebs, R. Frischknecht (2020) Aktualisierung Ökobilanzdaten mobitool 2020, Teil 1. Project report. Volume: 713. treeze Ltd.. Uster, CH.
Type: Separate publication
Source: Report
First author: L. Krebs
Other authors: R. Frischknecht
Year: 2020
Title of anthology: Project report
Place of publication: Uster, CH
Publisher: treeze Ltd.
Volume No: 713

## Validation
Proof reading validation: 13.11.2020; Other validation: G:\Projekte laufend\713 Aktualisierung mobitool 2020\EcoSpold\[713_Transport-Train-freight-average (electricity & diesel)_IT,AT,FR,DE_EIV2_v0.2.xlsx]X-Process;
