# Disposal, lignite ash, 0% water, to opencast refill

Dataset: EcoSpold 1, unit process
Functional unit: 1 kg
Category: Others / unspecified
Geography: CS
Time period: 2000-01 to 2000-12
Generated by: Gabor Doka
accessRestrictedTo: 0
copyright: true

## General comment
backfilled waste composition is (in ppm): H2O n.a.;
Synonyms: ashes form lignite incineration disposed as backfill in opencast lignite mines;

## Included processes
This module contains only direct emissions from lignite ash used as backfill in opencast lignite mines: short-term emissions (0-100a) and long-term emissions (>100a) both to ground water. E.g. land-use and energy consumption is *not* included.

## Geography
Ash composition calculated from country-specific coal composition (YU) and technology-specific transfer coefficients in power plant.

## Technology
Lignite ash as backfill in lignite opencast mine (together with tailings)

## Reference product
- Disposal, lignite ash, 0% water, to opencast refill [CS]: 1 kg
  SERBIA

## Emissions to nature
- Sodium [emissions to water, groundwater, long-term]: 0.00069114 kg; lognormal SD95 4.5094
  Long-term emission from lignite ash backfill. Uncertainty derived from uncertainty in ash composition and uncertainty in transfer coefficients.
- Titanium [emissions to water, groundwater, long-term]: 0.00024969 kg; lognormal SD95 6.2543
  (same comment as for Sodium)
- Manganese [emissions to water, groundwater]: 1.73e-9 kg; lognormal SD95 18.781
  Short-term emission from lignite ash backfill. Uncertainty derived from uncertainty in ash composition and uncertainty in transfer coefficients.
- Lead [emissions to water, groundwater, long-term]: 1.1953e-5 kg; lognormal SD95 9.3089
  (same comment as for Sodium)
- Chromium VI [emissions to water, groundwater]: 5.2787e-6 kg; lognormal SD95 8.8425
  (same comment as for Manganese)
- Magnesium [emissions to water, groundwater]: 3.5694e-6 kg; lognormal SD95 8.5547
  (same comment as for Manganese)
- Tin [emissions to water, groundwater]: 3.1748e-10 kg; lognormal SD95 21.803
  (same comment as for Manganese)
- Lead [emissions to water, groundwater]: 2.597e-10 kg; lognormal SD95 22.189
  (same comment as for Manganese)
- Selenium [emissions to water, groundwater]: 1.5268e-6 kg; lognormal SD95 10.795
  (same comment as for Manganese)
- Chromium VI [emissions to water, groundwater, long-term]: 3.4713e-6 kg; lognormal SD95 8.6855
  (same comment as for Sodium)
- Strontium [emissions to water, groundwater]: 2.6421e-7 kg; lognormal SD95 11.462
  (same comment as for Manganese)
- Thallium [emissions to water, groundwater]: 7.4495e-11 kg; lognormal SD95 24.414
  (same comment as for Manganese)
- Sulfate [emissions to water, groundwater, long-term]: 0.038587 kg; lognormal SD95 3.0161
  (same comment as for Sodium)
- Molybdenum [emissions to water, groundwater, long-term]: 2.3605e-11 kg; lognormal SD95 9.0958
  (same comment as for Sodium)
- Boron [emissions to water, groundwater]: 4.1494e-6 kg; lognormal SD95 8.4183
  (same comment as for Manganese)
- Nickel [emissions to water, groundwater, long-term]: 3.6689e-5 kg; lognormal SD95 8.1102
  (same comment as for Sodium)
- Iron [emissions to water, groundwater]: 1.1296e-7 kg; lognormal SD95 12.702
  (same comment as for Manganese)
- Mercury [emissions to water, groundwater]: 4.986e-12 kg; lognormal SD95 30.168
  (same comment as for Manganese)
- Iodide [emissions to water, groundwater, long-term]: 5e-14 kg; lognormal SD95 13.386
  (same comment as for Sodium)
- Strontium [emissions to water, groundwater, long-term]: 0.00017397 kg; lognormal SD95 6.5854
  (same comment as for Sodium)
- Beryllium [emissions to water, groundwater]: 3.7911e-9 kg; lognormal SD95 17.515
  (same comment as for Manganese)
- Barium [emissions to water, groundwater, long-term]: 0.00024999 kg; lognormal SD95 6.2543
  (same comment as for Sodium)
- Cadmium [emissions to water, groundwater, long-term]: 1.4449e-6 kg; lognormal SD95 11.788
  (same comment as for Sodium)
- Fluoride [emissions to water, groundwater]: 1.6307e-6 kg; lognormal SD95 10.091
  (same comment as for Manganese)
- Cobalt [emissions to water, groundwater]: 2.6854e-8 kg; lognormal SD95 14.512
  (same comment as for Manganese)
- Beryllium [emissions to water, groundwater, long-term]: 2.4962e-6 kg; lognormal SD95 11.117
  (same comment as for Sodium)
- Selenium [emissions to water, groundwater, long-term]: 2.4322e-6 kg; lognormal SD95 10.625
  (same comment as for Sodium)
- Barium [emissions to water, groundwater]: 8.6498e-9 kg; lognormal SD95 16.168
  (same comment as for Manganese)
- Boron [emissions to water, groundwater, long-term]: 0.00033099 kg; lognormal SD95 5.9536
  (same comment as for Sodium)
- Titanium [emissions to water, groundwater]: 3.1085e-7 kg; lognormal SD95 11.253
  (same comment as for Manganese)
- Phosphate [emissions to water, groundwater]: 2.8441e-7 kg; lognormal SD95 12.797
  (same comment as for Manganese)
- Antimony [emissions to water, groundwater, long-term]: 5.9822e-6 kg; lognormal SD95 9.5891
  (same comment as for Sodium)
- Vanadium [emissions to water, groundwater, long-term]: 4.6651e-5 kg; lognormal SD95 7.9661
  (same comment as for Sodium)
- Chloride [emissions to water, groundwater]: 2.1395e-6 kg; lognormal SD95 10.716
  (same comment as for Manganese)
- Silicon [emissions to water, groundwater, long-term]: 0.085569 kg; lognormal SD95 2.0783
  (same comment as for Sodium)
- Bromine [emissions to water, groundwater, long-term]: 6.7643e-8 kg; lognormal SD95 10.765
  (same comment as for Sodium)
- Tin [emissions to water, groundwater, long-term]: 3.9997e-6 kg; lognormal SD95 10.557
  (same comment as for Sodium)
- Copper [emissions to water, groundwater, long-term]: 1.4827e-5 kg; lognormal SD95 9.0723
  (same comment as for Sodium)
- Bromine [emissions to water, groundwater]: 3.9324e-6 kg; lognormal SD95 10.557
  (same comment as for Manganese)
- Sulfate [emissions to water, groundwater]: 0.014213 kg; lognormal SD95 3.2431
  (same comment as for Manganese)
- Vanadium [emissions to water, groundwater]: 5.3308e-7 kg; lognormal SD95 10.697
  (same comment as for Manganese)
- Iodide [emissions to water, groundwater]: 5e-7 kg; lognormal SD95 13.144
  (same comment as for Manganese)
- Silicon [emissions to water, groundwater]: 0.00067711 kg; lognormal SD95 4.3426
  (same comment as for Manganese)
- Zinc [emissions to water, groundwater, long-term]: 6.6321e-5 kg; lognormal SD95 7.5129
  (same comment as for Sodium)
- Scandium [emissions to water, groundwater, long-term]: 8.9673e-7 kg; lognormal SD95 12.006
  (same comment as for Sodium)
- Arsenic [emissions to water, groundwater]: 1.1945e-5 kg; lognormal SD95 9.3097
  (same comment as for Manganese)
- Phosphate [emissions to water, groundwater, long-term]: 0.00017036 kg; lognormal SD95 7.7386
  (same comment as for Sodium)
- Potassium [emissions to water, groundwater]: 0.00084644 kg; lognormal SD95 4.7964
  (same comment as for Manganese)
- Cobalt [emissions to water, groundwater, long-term]: 3.7473e-5 kg; lognormal SD95 8.0892
  (same comment as for Sodium)
- Potassium [emissions to water, groundwater, long-term]: 0.00065356 kg; lognormal SD95 4.8034
  (same comment as for Sodium)
- Aluminium [emissions to water, groundwater, long-term]: 0.011735 kg; lognormal SD95 3.255
  (same comment as for Sodium)
- Chloride [emissions to water, groundwater, long-term]: 1.6105e-6 kg; lognormal SD95 10.732
  (same comment as for Sodium)
- Zinc [emissions to water, groundwater]: 3.4048e-9 kg; lognormal SD95 17.653
  (same comment as for Manganese)
- Thallium [emissions to water, groundwater, long-term]: 4.905e-8 kg; lognormal SD95 16.364
  (same comment as for Sodium)
- Copper [emissions to water, groundwater]: 2.3911e-9 kg; lognormal SD95 18.244
  (same comment as for Manganese)
- Scandium [emissions to water, groundwater]: 3.5327e-7 kg; lognormal SD95 12.378
  (same comment as for Manganese)
- Molybdenum [emissions to water, groundwater]: 1.7347e-5 kg; lognormal SD95 8.9022
  (same comment as for Manganese)
- Iron [emissions to water, groundwater, long-term]: 0.0090216 kg; lognormal SD95 3.3892
  (same comment as for Sodium)
- Manganese [emissions to water, groundwater, long-term]: 4.9998e-5 kg; lognormal SD95 7.7958
  (same comment as for Sodium)
- Tungsten [emissions to water, groundwater, long-term]: 1.5359e-6 kg; lognormal SD95 11.174
  (same comment as for Sodium)
- Antimony [emissions to water, groundwater]: 3.7553e-6 kg; lognormal SD95 9.7499
  (same comment as for Manganese)
- Calcium [emissions to water, groundwater, long-term]: 0.049981 kg; lognormal SD95 2.3781
  (same comment as for Sodium)
- Arsenic [emissions to water, groundwater, long-term]: 1.1945e-14 kg; lognormal SD95 9.5081
  (same comment as for Sodium)
- Aluminium [emissions to water, groundwater]: 1.461e-5 kg; lognormal SD95 7.1899
  (same comment as for Manganese)
- Tungsten [emissions to water, groundwater]: 9.6414e-7 kg; lognormal SD95 11.35
  (same comment as for Manganese)
- Fluoride [emissions to water, groundwater, long-term]: 1.0869e-5 kg; lognormal SD95 9.269
  (same comment as for Sodium)
- Calcium [emissions to water, groundwater]: 1.8924e-5 kg; lognormal SD95 7.1502
  (same comment as for Manganese)
- Mercury [emissions to water, groundwater, long-term]: 2.5214e-8 kg; lognormal SD95 17.355
  (same comment as for Sodium)
- Cadmium [emissions to water, groundwater]: 4.1088e-11 kg; lognormal SD95 25.839
  (same comment as for Manganese)
- Sodium [emissions to water, groundwater]: 0.0015589 kg; lognormal SD95 4.4481
  (same comment as for Manganese)
- Magnesium [emissions to water, groundwater, long-term]: 0.0074964 kg; lognormal SD95 3.5547
  (same comment as for Sodium)
- Nickel [emissions to water, groundwater]: 5.5722e-8 kg; lognormal SD95 13.509
  (same comment as for Manganese)

## Sampling procedure
country-specific calculation based on literature data

## Extrapolations
Ash composition calculated from coal composition and transfer coefficients in power plant (cf. ecoinvent coal report Röder 2003). Transfer coefficients in backfill estimated from data of residual material landfills and estimated carbonate phase of lignite ashes

## Uncertainty adjustments
uncertainty of waste input composition data derived from generic formula GSD(c) = N*ln(c)+1. Mean long-term emissions are the emissions until the next glacial period occurs (in 60'000a) and the landfill is eroded. Maximal long-term emissions are the complete emissions of all landfilled material (except Cr). Minimal long-term emissions are derived implicitly from the mean and maximal values assuming a lognormal distribution.

## Sources
- Doka G., 2009, 2009 - LCI waste treatment services - Doka, Final report ecoinvent data v2.1, 13, Swiss Centre for LCI, Doka LCA, Duebendorf and St. Gallen, CH
Doka G. (2008) Life Cycle Inventories of Waste Treatment Services. Final report ecoinvent data v2.1. Volume: 13. Issue: 0. Swiss Centre for LCI, Empa - TSL. Dübendorf, CH.
Type: Measurement on site
Source: CD-ROM
First author: Doka G.
Year: 2008
Title of anthology: Final report ecoinvent data v2.1
Place of publication: Dübendorf, CH
Publisher: Swiss Centre for LCI, Empa - TSL
Volume No: 13
Issue No: 0

## Validation
Proof reading validation: passed.; Other validation: none;
