# Sawnwood, production mix, softwood, raw, dried (u=10%), at sawmill

Dataset: EcoSpold 1, unit process
Functional unit: 1 m3
Category: wood / wooden materials\new processes\other material
Geography: CH
Time period: 2000-01 to 2016-12
Generated by: default
accessRestrictedTo: 0
copyright: true

## Reference product
- Sawnwood, production mix, softwood, raw, dried (u=10%), at sawmill [CH]: 1 m3

## Inputs from technosphere
- Sawnwood, beam, softwood, raw, kiln dried (u=10%), at sawmill [CH]: 0.39 m3; lognormal SD95 1.02869
  Pedigree: (1,1,2,1,1).
- Sawnwood, lath, softwood, raw, kiln dried (u=10%), at sawmill [CH]: 0.16 m3; lognormal SD95 1.02869
  Pedigree: (1,1,2,1,1).
- Sawnwood, board, softwood, raw, kiln dried (u=10%), at sawmill [CH]: 0.45 m3; lognormal SD95 1.02869
  Pedigree: (1,1,2,1,1).

## Sources
- Werner F., 2017, 2017 - LCI wood and wood based products - Werner, Project Report, 0, Environment & Development, Zuerich, CH
