# Cathode, lithium-ion battery, LiFePO4

Dataset: EcoSpold 1, unit process
Functional unit: 1 kg
Category: electronics / component
Geography: CH
Time period: 2000-01 to 2014-12
Production volume: In 2008 there were 3'875 PV-plants with an annual production of 33'400 MWh
Share of production covered: 100 %
Generated by: Annika Messmer
accessRestrictedTo: 0
copyright: true

## Included processes
All material, electricity, transport and facilities required for the production of the LiFePO4 cathode.; Geography: Use in CH

## Geography
Use in CH

## Technology
Electricity production for own consumption with battery-connected photovoltaic power plants mounted on buildings slanted roof. 922 kWh/kWp annual electricity output, 1117 kWh/m2 irradiation, 0.75 performance ratio, 13.2% module efficiency.

## Time period
Calculation of yield based on production with a state of the art plant.

## Reference product
- Cathode, lithium-ion battery, LiFePO4 [CH]: 1 kg
  SWITZERLAND

## Inputs from technosphere
All rows: lognormal SD95 1
- Transport, freight, lorry, fleet average [RER]: 0.87995 tkm
- Aluminium casting, plant [RER]: 5.52e-11 p
- Water, deionised, at plant [CH]: 0.034817 kg
- Lithium hydroxide, at plant [GLO]: 0.34817 kg
- Phosphoric acid, fertiliser grade, 70% in H2O, at plant [MA]: 0.49198 kg
- Sheet rolling, aluminium [RER]: 0.12 kg
- Aluminium, production mix, at plant [RER]: 0.12 kg
- Transport, freight, rail [RER]: 4.8682 tkm
- Carbon black, at plant [GLO]: 0.0435 kg
- N-methyl-2-pyrrolidone, at plant [RER]: 0.2436 kg
- Tetrafluoroethylene, at plant [RER]: 0.00696 kg
- Heat, unspecific, in chemical plant [RER]: 11.354 MJ
- Iron sulphate, at plant [RER]: 0.7569 kg
- Chemical plant, organics [RER]: 3.0276e-10 p

## Emissions to nature
- Heat, waste [emissions to air, unspecified]: 1.1354 MJ; lognormal SD95 1
- Lithium [emissions to water, unspecified]: 0.07569 kg; lognormal SD95 1
- Iron [emissions to water, unspecified]: 0.014381 kg; lognormal SD95 1
- Phosphate [emissions to water, unspecified]: 0.024221 kg; lognormal SD95 1

## Sampling procedure
Statistical data for CH

## Sources
- Stolz P., Messmer A., Frischknecht R., 2016, 2016 - LCI road and non-road transport services - Stolz, Project report, 544, treeze Ltd., Uster, CH
Stolz P., Frischknecht R. (2016) Life Cycle Inventories of Road and Non-Road Transport Services. Project report. Volume: 544. treeze Ltd.. Uster, CH.
Type: Separate publication
Source: Report
First author: Stolz P.
Other authors: Frischknecht R.
Year: 2016
Title of anthology: Project report
Place of publication: Uster, CH
Publisher: treeze Ltd.
Volume No: 544

## Validation
Proof reading validation: 06.05.2017; Other validation: \\SRV01\ESU-Docs\Projektablage\536 PV-Batterie-Systeme ewz\EcoSpold\[536-Batterie_v0.2.xlsx]X-Process;
