# Treatment of heat pump 10 kW production for air source heat pump system

Dataset: EcoSpold 1, unit process
Functional unit: 1 unit
Category: Others / unspecified
Geography: CH
Time period: 2024-01 to 2024-01
Generated by: Romain Sacchi
accessRestrictedTo: 0
copyright: true

## General comment
10.55 kW GSHP system operating in New Jersey, US. The system boundary spans the entire lifetime of a GSHP system, including: borehole drilling and heat exchanger installation, heat pump production and installation, system operation and maintenance, and end-of-life. The overall efficiency of the system was assumed to have a heating coefficient of performance (COPheating) of 3.5. The system life is assumed to be 25 years. For the ground loop installation, we assume two boreholes each drilled at a depth of 80 m to represent a vertical closed-loop system. Source: Meghann Smith, Anthony Bevacqua, Sheryl Tembe, Pankaj Lal. Life cycle analysis (LCA) of residential ground source heat pump systems: A comparative analysis of energy efficiency in New Jersey, Sustainable Energy Technologies and Assessments, Volume 47, 2021, https://doi.org/10.1016/j.seta.2021.101364.

## Reference product
- Treatment of heat pump 10 kW production for air source heat pump system [CH]: 1 p
  Others

## Inputs from technosphere
All rows: lognormal SD95 2.565
- Disposal, polyethylene, 0.4% water, to municipal incineration [CH]: 0.5 kg
  {5;5;5;5;5;5;1.05;}
- Disposal, copper in car shredder residue, 0% water, to municipal incineration [CH]: 36.6 kg
  {5;5;5;5;5;5;1.05;}
- Disposal, polyvinylchloride, 0.2% water, to municipal incineration [CH]: 1.6 kg
  {5;5;5;5;5;5;1.05;}
- Disposal, hazardous waste, 25% water, to hazardous waste incineration [CH]: 4.459 kg
  {5;5;5;5;5;5;1.05;}
- Disposal, building, reinforcement steel, to sorting plant [CH]: 120 kg
  {5;5;5;5;5;5;1.05;}
- Recycling steel and iron [RER]: 32 kg
  {5;5;5;5;5;5;1.05;}
- Disposal, polyurethane, 0.2% water, to municipal incineration [CH]: 16 kg
  {5;5;5;5;5;5;1.05;}
- Disposal, air filter, in exhaust air valve [CH]: 20 p
  {5;5;5;5;5;5;1.05;}

## Sampling procedure
Sampling procedure: Literature data

## Sources
- Sacchi R., Bauer C., 2024, 2024 - LCA power-to-X in residential sector - Sacchi, Project report, PSI, Villigen, CH

## Validation
Proof reading validation: Passed, Other validation: none, Validator: Rolf Frischknecht, Telephone: 0041 44 940 61 91, E-mail: frischknecht@treeze.ch, Company: treeze, Country: CH
