# Heat pump, brine-water, 10kW

Dataset: EcoSpold 1, unit process, infrastructure
Functional unit: 1 p
Category: energy, obsolete / heat, obsolete\heat pumps, obsolete\infrastructure
Geography: CH
Time period: 2000-01 to 2000-12
Share of production covered: 0 %
Generated by: Thomas Heck
accessRestrictedTo: 0
copyright: true

## General comment
Average infrastructure of a 10 kW brain-water heat pump.;

## Included processes
The module includes the most important materials used for production. It includes also the transport of these materials, energy and water needed for production. It includes emissions of refrigerant (R134a) during production and scrapping. It does not include emissions during operation. It does not include the borehole heat exchanger. A buffer heat storage is not included.

## Geography
Could be used for European conditions.

## Technology
Brine-water heat pump, 10kW output. Refrigerant R134a.

## Reference product
- Heat pump, brine-water, 10kW [CH]: 1 p
  SWITZERLAND

## Inputs from technosphere
- Transport, freight, lorry, 16t-32t gross weight, fleet average [CH]: 6.5 tkm; lognormal SD95 2.49
  uncertainty of transport distance and of amount of material
- Refrigerant R134a, at plant [RER]: 3.09 kg; lognormal SD95 1.7
  estimated from range of values
- Copper, at regional storage [RER]: 22 kg; lognormal SD95 2.06
  basic uncertainty:2;(4,na,3,1,1,na);
- Disposal, plastics, mixture, 15.3% water, to municipal incineration [CH]: 11 kg; lognormal SD95 2.06
  basic uncertainty:2;(4,na,3,1,1,na);
- Natural gas, burned in industrial furnace 1MWth [CH]: 1400 MJ; lognormal SD95 1.55
  basic uncertainty:1.05;(3,3,3,3,4,3);
- Reinforcing steel, at plant [RER]: 75 kg; lognormal SD95 2.06
  basic uncertainty:2;(4,na,3,1,1,na);
- Steel, low-alloyed, at plant [RER]: 20 kg; lognormal SD95 2.06
  basic uncertainty:2;(4,na,3,1,1,na);
- Transport, freight, rail [RER]: 78 tkm; lognormal SD95 2.49
  uncertainty of transport distance and of amount of material
- Polyvinylchloride, bulk polymerised, at plant [RER]: 1 kg; lognormal SD95 2.06
  basic uncertainty:2;(4,na,3,1,1,na);
- Lubricating oil, at plant [RER]: 1.7 kg; lognormal SD95 1.55
  basic uncertainty:1.05;(3,3,3,3,4,3);
- Electricity, medium voltage, at grid [CH]: 140 kWh; lognormal SD95 1.55
  basic uncertainty:1.05;(3,3,3,3,4,3);
- Tube insulation, elastomere, at plant [DE]: 10 kg; lognormal SD95 2.06
  basic uncertainty:2;(4,na,3,1,1,na);

## Inputs from nature
- Water, unspecified natural origin/m3 [resources, in water]: 0.708 m3; lognormal SD95 2.06
  basic uncertainty:2;(4,na,3,1,1,na);

## Emissions to nature
- Heat, waste [emissions to air, high. pop.]: 504 MJ; lognormal SD95 2.06
  basic uncertainty:2;(4,na,3,1,1,na);
- Ethane, 1,1,1,2-tetrafluoro-, HFC-134a [emissions to air, high. pop.]: 0.69 kg
  estimate based on literature values
- Water [emissions to water, unspecified]: 672.6 kg; lognormal SD95 2.5196
  (5,5,5,5,5,BU:1.05); All uncertainty-values set to 5.0 by default. Balance of input water

## Sampling procedure
Literature, manufacturer information

## Sources
- Heck T., 2007, 2007 - Heat pumps - Heck, Sachbilanzen von Energiesystemen. Final report No. 6 ecoinvent data v2.0, 6, Swiss Centre for LCI, PSI, Duebendorf and Villigen, CH
Heck, T. (2007) Wärmepumpen. Sachbilanzen von Energiesystemen. Final report No. 6 ecoinvent data v2.0. Editors: Dones R.. Volume: 6. Swiss Centre for LCI, PSI. Dübendorf and Villigen, CH.
Type: Measurement on site
Source: CD-ROM
First author: Heck, T.
Year: 2007
Name of editors: Dones R.
Title of anthology: Sachbilanzen von Energiesystemen. Final report No. 6 ecoinvent data v2.0
Place of publication: Dübendorf and Villigen, CH
Publisher: Swiss Centre for LCI, PSI
Volume No: 6

## Validation
Proof reading validation: prepared; Other validation: none;
