# xxx Industrial wood, Scandinavian softwood, under bark, u=140%, at forest road

Dataset: EcoSpold 1, unit process
Functional unit: 1 m3
Category: material, obsolete / wood, obsolete\extraction, obsolete
Geography: NORDEL
Generated by: Roland Hischier
accessRestrictedTo: 0
copyright: true

## General comment
The volume does not include the bark. CO2 assimilation is based on 49.4% carbon in the wood. Biomass energy equals gross calorific value including bark.;

## Included processes
This module includes material and energy amounts for stand establishment, tending, site development, thinnings and final cutting of scandinavian industrial softwood (for pulp and paper industry), its transport to the nearest forest road as well as the land and materials use for the forest roads

## Technology
Modern average technology used in Scandinavia

## Reference product
- xxx Industrial wood, Scandinavian softwood, under bark, u=140%, at forest road [NORDEL]: 1 m3
  Nordic countries power association

## Inputs from technosphere
- xxx Softwood, Scandinavian, standing, under bark, in forest [NORDEL]: 1 m3; lognormal SD95 1.33
  (2,5,1,5,1,5); data from European module
- Power sawing, without catalytic converter [RER]: 0.144 hr; lognormal SD95 1.24
  (2,4,1,3,1,5); average data from KCL database
- Diesel, burned in building machine, average [CH]: 111 MJ; lognormal SD95 1.24
  (2,4,1,3,1,5); average data from KCL database
- Transport, freight, lorry, 7.5t-16t gross weight, fleet average [RER]: 15.9 tkm; lognormal SD95 2.11
  (2,5,1,5,1,5); data from European module
- Ammonium sulphate, as N, at regional storehouse [RER]: 1.25 kg; lognormal SD95 1.24
  (2,4,1,3,1,5); average data from KCL database
- Lubricating oil, at plant [RER]: 0.071 kg; lognormal SD95 1.24
  (2,4,1,3,1,5); average data from KCL database
- Gravel, crushed, at mine [CH]: 319 kg; lognormal SD95 3.11
  (2,5,1,5,1,5); data from European module

## Inputs from nature
- Transformation, from forest, extensive [resources, land]: 0.456 m2; lognormal SD95 2.06
  (2,4,1,3,1,5); average data from KCL database
- Occupation, traffic area, road embankment [resources, land]: 68.5 m2a; lognormal SD95 1.58
  (2,4,1,3,1,5); average data from KCL database
- Transformation, to traffic area, road embankment [resources, land]: 0.456 m2; lognormal SD95 2.06
  (2,4,1,3,1,5); average data from KCL database

## Emissions to nature
- Nitrogen [emissions to water, river]: 0.023 kg; lognormal SD95 1.58
  (2,4,1,3,1,5); average data from KCL database

## Sampling procedure
Literature

## Extrapolations
Allocation to roundwood (logs) and industrial wood already made by authors of the finnish LCA database. Allocation factors unknown.

## Sources
- Hischier R., 2007, 2007 - LCI packagings and graphical papers - Hischier, Final report ecoinvent data v2.0, 11, Swiss Centre for LCI, Empa - TSL, Duebendorf and St. Gallen, CH
Hischier R. (2007) Life Cycle Inventories of Packaging and Graphical Paper. Final report ecoinvent data v2.0. Volume: 11. Swiss Centre for LCI, Empa - TSL. Dübendorf, CH.
Type: Measurement on site
Source: CD-ROM
First author: Hischier R.
Year: 2007
Title of anthology: Final report ecoinvent data v2.0
Place of publication: Dübendorf, CH
Publisher: Swiss Centre for LCI, Empa - TSL
Volume No: 11

## Validation
Proof reading validation: Passed; Other validation: none;
