# Magnesium plant

Dataset: EcoSpold 1, unit process, infrastructure
Functional unit: 1 p
Category: metals / non ferro\production\infrastructure
Geography: RER
Time period: 1998-01 to 1998-12
Production volume: 105600 tonnes in 1998
Share of production covered: 30 %
Generated by: Niels Jungbluth
accessRestrictedTo: 0
copyright: true

## General comment
Production plant for magnesium with an annual capacity of 100'000t and a life time of 50 years.;

## Included processes
Building infrastructure and land use, no machinery.

## Geography
Data for 1 producer

## Technology
Infrastructure (land use and buildings) for the production of magnesium not including equipment.

## Time period
Environmental report

## Reference product
- Magnesium plant [RER]: 1 p
  Europe

## Inputs from technosphere
- Building, hall [CH]: 500000 m2; lognormal SD95 1.6
  (4,4,1,3,1,5); Estimatimation that 50% are buildings

## Inputs from nature
- Transformation, from unknown [resources, land]: 1e6 m2; lognormal SD95 2.1
  (4,4,1,3,1,5); Application of standard procedure
- Occupation, industrial area [resources, land]: 5e7 m2a; lognormal SD95 1.6
  (4,4,1,3,1,5); Estimatimation from map and photo
- Transformation, to industrial area [resources, land]: 1e6 m2; lognormal SD95 2.1
  (4,4,1,3,1,5); Application of standard procedure

## Sampling procedure
Estimation with map.

## Extrapolations
From 1 producer to average Europe

## Sources
- Classen M., Althaus H.-J., Blaser S., Scharnhorst W., Tuchschmid M., Jungbluth N., Faist Emmenegger M., 2009, 2009 - LCI metals - Classen, Final report ecoinvent data v2.1, 10, Swiss Centre for LCI, Empa, ESU-services Ltd., Duebendorf, CH
Classen M., Althaus H.-J., Blaser S., Doka G., Jungbluth N., Tuchschmid M. (2008) Life Cycle Inventories of Metals. Final report ecoinvent data v2.1. Volume: 10. Issue: 0. Swiss Centre for LCI, Empa - TSL. Dübendorf, CH.
Type: Measurement on site
Source: CD-ROM
First author: Classen M.
Other authors: Althaus H.-J., Blaser S., Doka G., Jungbluth N., Tuchschmid M.
Year: 2008
Title of anthology: Final report ecoinvent data v2.1
Place of publication: Dübendorf, CH
Publisher: Swiss Centre for LCI, Empa - TSL
Volume No: 10
Issue No: 0

## Validation
Proof reading validation: passed; Other validation: none;
