# xx Wind power plant 150kW, moving parts

Dataset: EcoSpold 1, unit process, infrastructure
Functional unit: 1 p
Category: electricity by fuel / wind\infrastructure
Geography: CH
Time period: 2000-01 to 2000-12
Generated by: Christian Bauer
accessRestrictedTo: 0
copyright: true

## General comment
Lifetime is assumed to be 20 years. Annual electricity production is assumed to be 125 MWh. Most data are from a specific wind power plant, installed 1994 in Grenchenberg, Switzerland, a few are extrapolations from the module "wind power plant 30kW, moving parts".;

## Included processes
Includes materials used for moving parts: rotor, nacelle, electric parts, and their disposal. Also includes the prozessing, the energy requirements for assembling, the transports needed, and the connection to the grid.

## Technology
Data for a specific Swiss 150 kW wind power plant, installed in the year 1994.

## Reference product
- xx Wind power plant 150kW, moving parts [CH]: 1 p
  SWITZERLAND

## Inputs from technosphere
- Sheet rolling, aluminium [RER]: 70.6 kg; lognormal SD95 1.21
  own estimation
- Disposal, polypropylene, 15.9% water, to municipal incineration [CH]: 40 kg; lognormal SD95 3.3
  own estimation
- Section bar rolling, steel [RER]: 1680 kg; lognormal SD95 1.32
  own estimation
- Disposal, plastics, mixture, 15.3% water, to municipal incineration [CH]: 991 kg; lognormal SD95 1.3
  uncertainty of input plus composition of glass fibre reinforced plastic
- Disposal, used mineral oil, 10% water, to hazardous waste incineration [CH]: 57 kg; lognormal SD95 1.15
  own estimation
- Sheet rolling, chromium steel [RER]: 3530 kg; lognormal SD95 1.32
  own estimation
- Electricity, medium voltage, production ENTSO-E, at grid: 3980 kWh; lognormal SD95 2
  own estimation
- Steel, low-alloyed, at plant [RER]: 298 kg; lognormal SD95 1.15
  own estimation
- Lubricating oil, at plant [RER]: 57 kg; lognormal SD95 1.15
  own estimation
- Disposal, polyvinylchloride, 0.2% water, to municipal incineration [CH]: 322 kg; lognormal SD95 3.3
  own estimation
- Aluminium, primary, at plant [RER]: 70.6 kg; lognormal SD95 1.21
  own estimation
- Disposal, polyethylene, 0.4% water, to municipal incineration [CH]: 465 kg; lognormal SD95 3.3
  own estimation
- Polyethylene, HDPE, granulate, at plant [RER]: 465 kg; lognormal SD95 3.3
  own estimation
- Wire drawing, copper [RER]: 481 kg; lognormal SD95 3.3
  own estimation
- Cast iron, at plant [RER]: 1290 kg; lognormal SD95 1.32
  own estimation
- Disposal, glass, 0% water, to municipal incineration [CH]: 1810 kg; lognormal SD95 1.3
  uncertainty of input plus composition of glass fibre reinforced plastic
- Polyvinylchloride, bulk polymerised, at plant [RER]: 322 kg; lognormal SD95 3.3
  own estimation
- Electricity, medium voltage, at grid [CH]: 2 kWh; lognormal SD95 2
  own estimation
- Glass fibre reinforced plastic, polyamide, injection moulding, at plant [RER]: 2790 kg; lognormal SD95 1.21
  own estimation
- Transport, freight, lorry, 16t-32t gross weight, fleet average [CH]: 9850 tkm; lognormal SD95 2.1
  standard for transprts
- Copper, at regional storage [RER]: 484 kg; lognormal SD95 3.3
  own estimation
- Polypropylene, granulate, at plant [RER]: 20 kg; lognormal SD95 3.3
  own estimation
- Chromium steel 18/8, at plant [RER]: 3530 kg; lognormal SD95 1.32
  own estimation
- Synthetic rubber, at plant [RER]: 15 kg; lognormal SD95 1.65
  own estimation
- Lead, at regional storage [RER]: 0.5 kg; lognormal SD95 1.15
  own estimation
- Tin, at regional storage [RER]: 0.5 kg; lognormal SD95 1.15
  own estimation
- Transport, freight, rail, electricity with shunting [CH]: 4130 tkm; lognormal SD95 2.1
  standard for transprts

## Sampling procedure
Literature

## Sources
- Burger B., Bauer C., 2007, 2007 - Windpower - Buger, Sachbilanzen von Energiesystemen. Final report No. 6 ecoinvent data v2.0, 6, Swiss Centre for LCI, PSI, Duebendorf and Villigen, CH
Burger, B., Bauer, Ch. (2007) Windkraft. Sachbilanzen von Energiesystemen. Final report No. 6 ecoinvent data v2.0. Editors: Dones R.. Volume: 6. Swiss Centre for LCI, PSI. Dübendorf and Villigen, CH.
Type: Measurement on site
Source: CD-ROM
First author: Burger, B.
Other authors: Bauer, Ch.
Year: 2007
Name of editors: Dones R.
Title of anthology: Sachbilanzen von Energiesystemen. Final report No. 6 ecoinvent data v2.0
Place of publication: Dübendorf and Villigen, CH
Publisher: Swiss Centre for LCI, PSI
Volume No: 6

## Validation
Proof reading validation: Passed.; Other validation: none;
