# Disposal, long-distance train

Dataset: EcoSpold 1, unit process, infrastructure
Functional unit: 1 p
Category: transport waste / unspecified
Geography: CH
Time period: 2000-01 to 2000-12
Generated by: Michael Spielmann
accessRestrictedTo: 0
copyright: true

## General comment
The data is based on the bulk material composition of the IC 2000, a state of the art Swiss train composition. The life span of the lis assumed to be 40 years resulting in a life time performance of 20 Mio. vkm ;

## Included processes
The inventory includes waste treatment processes for non metal components of a IC 2000 train composition. For the transport of disposed materials standard distances have been applied.

## Geography
Data represents Swiss disposal conditions

## Technology
no technologies are specified

## Reference product
- Disposal, long-distance train [CH]: 1 p
  SWITZERLAND

## Inputs from technosphere
- Disposal, glass, 0% water, to municipal incineration [CH]: 9510 kg; lognormal SD95 1.26
  (3,1,1,3,1,4); derived from the material composition of the modelled IC (unit process IC manufacturing)
- Disposal, plastics, mixture, 15.3% water, to sanitary landfill [CH]: 78200 kg; lognormal SD95 1.26
  (same comment as for Disposal, glass, 0% water, to municipal incineration)
- Transport, freight, lorry, 16t-32t gross weight, fleet average [CH]: 4420 tkm; lognormal SD95 2.28
  (4,5,na,na,na,na); standard distance
- Disposal, emulsion paint, 0% water, to municipal incineration [CH]: 645 kg; lognormal SD95 1.26
  (same comment as for Disposal, glass, 0% water, to municipal incineration)

## Sampling procedure
Data based on the material composition of an IC 2000.

## Sources
- Spielmann M., Bauer C., Dones R., Tuchschmid M., 2007, 2007 - Transport services - Spielmann, Final report ecoinvent Data v2.0, 14, Swiss Centre for LCI, PSI, ESU-services Ltd., Duebendorf, Villigen and Uster, CH
Spielmann M., Dones R; Bauer C. (2007) Life Cycle Inventories of Transport Services. Final report ecoinvent Data v2.0. Volume: 14. Issue: 0. Swiss Centre for LCI, PSI. Dübendorf and Villigen, CH.
Type: Measurement on site
Source: CD-ROM
First author: Spielmann M.
Other authors: Dones R; Bauer C.
Year: 2007
Title of anthology: Final report ecoinvent Data v2.0
Place of publication: Dübendorf and Villigen, CH
Publisher: Swiss Centre for LCI, PSI
Volume No: 14
Issue No: 0

## Validation
Proof reading validation: passed; Other validation: none;
