# Inverter, 500kW, at plant

Dataset: EcoSpold 1, unit process, infrastructure
Functional unit: 1 p
Category: electronics / photovoltaic\infrastructure
Geography: RER
Time period: 1992-01 to 2006-12
Generated by: Matthias Tuchschmid
accessRestrictedTo: 0
copyright: true

## General comment
Production of an inverter (500kW) with an efficiency of 95.4% (total efficiency factor which includes MPP-Tracking) for photovoltaic plant. Total weight about 3000 kg.;
Synonyms: inverse rectifier;

## Included processes
Materials, packaging and electricity use for the production of an inverse rectifier. Disposal of the product after use.

## Geography
Production in RER.

## Technology
Inverter for a photovoltaic grid-connected system with a capacity of 500kWp.

## Reference product
- Inverter, 500kW, at plant [RER]: 1 p
  Europe

## Inputs from technosphere
- Glass fibre reinforced plastic, polyester resin, hand lay-up, at plant [RER]: 44 kg; lognormal SD95 1.3059
  (4,3,1,1,1,5); Literature (de Wild 2006), Calculation
- Capacitor, Tantalum-, through-hole mounting, at plant [GLO]: 0.023 kg; lognormal SD95 1.3059
  (4,3,1,1,1,5); Literature (de Wild 2006), Calculation
- Copper, at regional storage [RER]: 335 kg; lognormal SD95 1.3059
  (4,3,1,1,1,5); Literature (de Wild 2006), recycled after use, Calculation
- Integrated circuit, IC, logic type, at plant [GLO]: 0.028 kg; lognormal SD95 1.3059
  (4,3,1,1,1,5); Literature (de Wild 2006), Calculation
- Printed wiring board, through-hole, at plant [GLO]: 0.2246 m2; lognormal SD95 1.3059
  (4,3,1,1,1,5); Literature (de Wild 2006), Calculation
- Metal working factory [RER]: 1.3555e-6 p; lognormal SD95 3.1033
  (4,4,1,1,1,5); Calculation, based on annual production of electronic component production plant
- Alkyd paint, white, 60% in solvent, at plant [RER]: 22 kg; lognormal SD95 2.1017
  (4,3,1,1,5,5); Literature (de Wild 2006), Calculation
- Lubricating oil, at plant [RER]: 881 kg; lognormal SD95 2.1017
  (4,3,1,1,5,5); Literature (de Wild 2006), Calculation
- Capacitor, film, through-hole mounting, at plant [GLO]: 0.341 kg; lognormal SD95 1.3059
  (4,3,1,1,1,5); Literature (de Wild 2006), Calculation
- Resistor, metal film type, through-hole mounting, at plant [GLO]: 0.005 kg; lognormal SD95 1.3059
  (4,3,1,1,1,5); Literature (de Wild 2006), Calculation
- Corrugated board, mixed fibre, single wall, at plant [RER]: 13.6 kg; lognormal SD95 1.3221
  (4,4,1,1,1,5); Calculation, based on estimated dimension of inverse rectifier
- Injection moulding [RER]: 71 kg; lognormal SD95 1.3059
  (4,3,1,1,1,5); Literature (de Wild 2006), Calculation
- Diode, glass-, through-hole mounting, at plant [GLO]: 0.047 kg; lognormal SD95 1.3059
  (4,3,1,1,1,5); Literature (de Wild 2006), Calculation
- Transistor, wired, small size, through-hole mounting, at plant [GLO]: 0.038 kg; lognormal SD95 1.3059
  (4,3,1,1,1,5); Literature (de Wild 2006), Calculation
- Polyethylene, HDPE, granulate, at plant [RER]: 22 kg; lognormal SD95 1.3059
  (4,3,1,1,1,5); Literature (de Wild 2006), Calculation
- Disposal, polystyrene, 0.2% water, to municipal incineration [CH]: 1.6 kg; lognormal SD95 1.3277
  (4,3,1,5,1,5); Calculation, different geographical location
- Polystyrene foam slab, at plant [RER]: 1.6 kg; lognormal SD95 1.3816
  (4,3,4,1,1,5); Literature (Schwarz 1992)
- Glass fibre reinforced plastic, polyamide, injection moulding, at plant [RER]: 71 kg; lognormal SD95 1.3059
  (4,3,1,1,1,5); Literature (de Wild 2006), Calculation
- Steel, low-alloyed, at plant [RER]: 1438 kg; lognormal SD95 1.3059
  (4,3,1,1,1,5); Literature (de Wild 2006), recycled after use, Calculation
- Disposal, plastic, industr. electronics, 15.3% water, to municipal incineration [CH]: 230 kg; lognormal SD95 1.3277
  (4,3,1,5,1,5); Calculation, different geographical location
- Inductor, ring core choke type, at plant [GLO]: 0.351 kg; lognormal SD95 1.3059
  (4,3,1,1,1,5); Literature (de Wild 2006), Calculation
- Electricity, medium voltage, production ENTSO-E, at grid: 4577.8 kWh; lognormal SD95 1.3816
  (4,3,4,1,1,5); Literature (Schwarz 1992)
- Connector, clamp connection, at plant [GLO]: 47.4 kg; lognormal SD95 1.3059
  (4,3,1,1,1,5); Literature (de Wild 2006), Calculation
- Section bar extrusion, aluminium [RER]: 131 kg; lognormal SD95 1.3059
  (4,3,1,1,1,5); Literature (de Wild 2006), Calculation
- Aluminium, production mix, cast alloy, at plant [RER]: 131 kg; lognormal SD95 1.3059
  (4,3,1,1,1,5); Literature (de Wild 2006), recycled after use, Calculation
- Transport, freight, rail [RER]: 1072.7 tkm; lognormal SD95 2.095
  (4,5,na,na,na,na); Standard distances 200km
- Transport, transoceanic freight ship [OCE]: 1040.8 tkm; lognormal SD95 2.095
  (4,5,na,na,na,na); Estimation: 18000km
- Transport, freight, lorry, fleet average [RER]: 305.72 tkm; lognormal SD95 2.095
  (4,5,na,na,na,na); Standard distance 60km incl. disposal
- Disposal, packaging cardboard, 19.6% water, to municipal incineration [CH]: 13.6 kg; lognormal SD95 1.3277
  (4,3,1,5,1,5); Calculation, different geographical location
- Capacitor, electrolyte type, > 2cm height, at plant [GLO]: 0.256 kg; lognormal SD95 1.3059
  (4,3,1,1,1,5); Literature (de Wild 2006), Calculation
- Disposal, used mineral oil, 10% water, to hazardous waste incineration [CH]: 881 kg; lognormal SD95 1.3277
  (4,3,1,5,1,5); Calculation, different geographical location
- Disposal, polyethylene, 0.4% water, to municipal incineration [CH]: 1.6 kg; lognormal SD95 1.3277
  (4,3,1,5,1,5); Calculation, different geographical location
- Wire drawing, copper [RER]: 335 kg; lognormal SD95 1.3059
  (4,3,1,1,1,5); Literature (de Wild 2006), Calculation
- Disposal, treatment of printed wiring boards [GLO]: 48.866 kg; lognormal SD95 1.3277
  (4,3,1,5,1,5); Calculation, different geographical location
- Sheet rolling, steel [RER]: 1438 kg; lognormal SD95 1.3059
  (4,3,1,1,1,5); Literature (de Wild 2006), Calculation
- Fleece, polyethylene, at plant [RER]: 0.3 kg; lognormal SD95 1.3816
  (4,3,4,1,1,5); Literature (Schwarz 1992)

## Emissions to nature
- Heat, waste [emissions to air, high. pop.]: 16480 MJ; lognormal SD95 1.3059
  (4,3,1,1,1,5); Calculation

## Sampling procedure
Detailed analysis of materials for one product

## Sources
- Jungbluth N., Stucki M., Frischknecht R., 2009, 2009 - Photovoltaics - Jungbluth, Sachbilanzen von Energiesystemen. Final report No. 6 ecoinvent v2.1, 6, Swiss Centre for LCI, ESU-services Ltd., Duebendorf, CH
Jungbluth, N., Stucki, M., Frischknecht, R. (2009) Photovoltaics. Sachbilanzen von Energiesystemen. Final report No. 6 ecoinvent v2.1. Editors: Bauer C.. Volume: 6. Swiss Centre for LCI, PSI. Dübendorf and Villigen, CH.
Type: Measurement on site
Source: CD-ROM
First author: Jungbluth, N.
Other authors: Stucki, M., Frischknecht, R.
Year: 2009
Name of editors: Bauer C.
Title of anthology: Sachbilanzen von Energiesystemen. Final report No. 6 ecoinvent v2.1
Place of publication: Dübendorf and Villigen, CH
Publisher: Swiss Centre for LCI, PSI
Volume No: 6

## Validation
Proof reading validation: passed; Other validation: none;
