# Sugar beets IP, crown and leaf harvested, at farm

Dataset: EcoSpold 1, unit process
Functional unit: 1 kg
Category: agricultural / plant production
Geography: CH
Time period: 2000-01 to 2000-12
Production volume: 7279000
Generated by: Thomas Nemecek
accessRestrictedTo: 0
copyright: true

## General comment
This dataset represents the cultivation of sugar beet on 1 ha. Sugar beet roots and sugar beet crown and leaf are both harvested. The yield of sugar beet root is 77640 kg/ha at a moisture content at storage of 77%, the yield of sugar beet crown and leaf is 51760 kg/ha at a moisture content of 86%.;

## Included processes
This activity starts after the harvest of the previous crop. The inputs of seeds, mineral fertilisers and pesticides are considered. Farm manure as an organic fertiliser is only accounted for in terms of direct field emissions; all pre-processes are included in the animal production systems. The transport of seeds, pesticides and fertilisers from the regional storehouse to the farm is also included. The dataset includes all machine operations and corresponding machine infrastructure and sheds. Machine operations are: soil cultivation, sowing, fertilisation, weed control, pest management, harvest and transport from field to farm (1 km). Further, direct field emissions are included. The cultivation of green manure during winter before sowing beets is also included. This activity ends after harvest at the farm gate.

## Technology
Swiss integrated production (SIP)

## Time period
The yield data have been updated to an average of the years 2000, 2005 & 2008. (Schweizerischer Bauernverband: Statistische Erhebungen und Schätzungen über Landwirtschaft und Ernährung 2009)

## Reference product
- Sugar beets IP, crown and leaf harvested, at farm [CH]: 1 kg

## Inputs from technosphere
- [thio]carbamate-compounds, at regional storehouse [CH]: 4.3548e-6 kg; lognormal SD95 1.0744
  (2,2,1,1,1,na)
- Slurry spreading, by vacuum tanker [CH]: 0.00015461 m3; lognormal SD95 1.0714
  (2,1,1,1,1,na)
- Ammonium nitrate, as N, at regional storehouse [RER]: 0.00025435 kg; lognormal SD95 1.0714
  (2,1,1,1,1,na)
- Solid manure loading and spreading, by hydraulic loader and spreader [CH]: 0.10581 kg; lognormal SD95 1.0714
  (2,1,1,1,1,na)
- Tillage, ploughing [CH]: 1.177e-5 ha; lognormal SD95 1.0714
  (2,1,1,1,1,na)
- Transport, freight, lorry, 3.5t gross weight, fleet average [CH]: 1.5516e-6 tkm; lognormal SD95 2.0477
  (4,1,1,1,1,na)
- Application of plant protection products, by field sprayer [CH]: 5.1786e-5 ha; lognormal SD95 1.0744
  (2,2,1,1,1,na)
- Harvesting, by complete harvester, beets [CH]: 1.177e-5 ha; lognormal SD95 1.0714
  (2,1,1,1,1,na)
- Thomas meal, as P2O5, at regional storehouse [RER]: 5.0624e-6 kg; lognormal SD95 1.0714
  (2,1,1,1,1,na)
- Pesticide unspecified, at regional storehouse [CH]: 2.4045e-6 kg; lognormal SD95 1.0744
  (2,2,1,1,1,na)
- Diammonium phosphate, as N, at regional storehouse [RER]: 1.067e-5 kg; lognormal SD95 1.0714
  (2,1,1,1,1,na)
- Phosphate rock, as P2O5, beneficiated, dry, at plant [MA]: 2.3433e-5 kg; lognormal SD95 1.0714
  (2,1,1,1,1,na)
- Urea, as N, at regional storehouse [RER]: 8.9323e-5 kg; lognormal SD95 1.0714
  (2,1,1,1,1,na)
- Transport, freight, lorry, 16t-32t gross weight, fleet average [RER]: 0.00027688 tkm; lognormal SD95 2.0477
  (4,1,1,1,1,na)
- Tillage, harrowing, by spring tine harrow [CH]: 2.3539e-5 ha; lognormal SD95 1.0714
  (2,1,1,1,1,na)
- Transport, freight, rail, electricity with shunting [CH]: 0.00027688 tkm; lognormal SD95 2.0477
  (4,1,1,1,1,na)
- Triazine-compounds, at regional storehouse [CH]: 2.3775e-5 kg; lognormal SD95 1.0744
  (2,2,1,1,1,na)
- Calcium ammonium nitrate, as N, at regional storehouse [RER]: 0.00012757 kg; lognormal SD95 1.0714
  (2,1,1,1,1,na)
- Potassium sulphate, as K2O, at regional storehouse [RER]: 3.8548e-5 kg; lognormal SD95 1.0714
  (2,1,1,1,1,na)
- Green manure IP, until February [CH]: 1.177e-5 ha; lognormal SD95 1.0714
  (2,1,1,1,1,na)
- Ammonium sulphate, as N, at regional storehouse [RER]: 1.9247e-5 kg; lognormal SD95 1.0714
  (2,1,1,1,1,na)
- Transport, barge [RER]: 0.0015414 tkm; lognormal SD95 2.0477
  (4,1,1,1,1,na)
- Cyclic N-compounds, at regional storehouse [CH]: 1.7654e-6 kg; lognormal SD95 1.0744
  (2,2,1,1,1,na)
- Single superphosphate, as P2O5, at regional storehouse [RER]: 1.614e-6 kg; lognormal SD95 1.0714
  (2,1,1,1,1,na)
- Sowing [CH]: 1.177e-5 ha; lognormal SD95 1.0714
  (2,1,1,1,1,na)
- Triple superphosphate, as P2O5, at regional storehouse [RER]: 4.0039e-5 kg; lognormal SD95 1.0714
  (2,1,1,1,1,na)
- Transport, freight, lorry, fleet average [CH]: 0.00091379 tkm; lognormal SD95 2.0477
  (4,1,1,1,1,na)
- Fertilising, by broadcaster [CH]: 4.7078e-5 ha; lognormal SD95 1.0714
  (2,1,1,1,1,na)
- Benzimidazole-compounds, at regional storehouse [CH]: 7.0618e-6 kg; lognormal SD95 1.0744
  (2,2,1,1,1,na)
- Potassium chloride, as K2O, at regional storehouse [RER]: 0.00058768 kg; lognormal SD95 1.0714
  (2,1,1,1,1,na)
- Sugar beet seed IP, at regional storehouse [CH]: 2.4716e-5 kg; lognormal SD95 1.0714
  (2,1,1,1,1,na)
- Diammonium phosphate, as P2O5, at regional storehouse [RER]: 2.7269e-5 kg; lognormal SD95 1.0714
  (2,1,1,1,1,na)
- Hoeing [CH]: 2.3539e-5 ha; lognormal SD95 1.0714
  (2,1,1,1,1,na)

## Inputs from nature
- Energy, gross calorific value, in biomass [resources, biotic]: 3.454 MJ; lognormal SD95 1.5051
  (2,2,1,1,1,na)
- Transformation, from annual crop, non-irrigated [resources, land]: 0.1177 m2; lognormal SD95 1.2077
  (2,1,1,1,1,na)
- Occupation, annual crop, non-irrigated [resources, land]: 0.069328 m2a; lognormal SD95 1.113
  (2,1,1,1,1,na)
- Transformation, to annual crop, non-irrigated [resources, land]: 0.1177 m2; lognormal SD95 1.2077
  (2,1,1,1,1,na)
- Carbon dioxide, in air [resources, in air]: 0.35216 kg; lognormal SD95 1.5051
  (2,2,1,1,1,na)

## Emissions to nature
- Phosphate [emissions to water, groundwater]: 1.5224e-6 kg; lognormal SD95 1.5051
  (2,2,1,1,1,na)
- Mercury [emissions to water, groundwater]: 1.2678e-10 kg; lognormal SD95 1.8042
  (2,2,1,1,1,na)
- Zinc [emissions to water, groundwater]: 3.0909e-7 kg; lognormal SD95 1.8042
  (2,2,1,1,1,na)
- Fenpropimorph [emissions to soil, agricultural]: 1.7654e-6 kg; lognormal SD95 1.209
  (2,2,1,1,1,na)
- Pesticides, unspecified [emissions to soil, agricultural]: 1.1652e-6 kg; lognormal SD95 1.209
  (2,2,1,1,1,na)
- Ammonia [emissions to air, low. pop.]: 0.00018705 kg; lognormal SD95 1.209
  (2,2,1,1,1,na)
- Lead [emissions to soil, agricultural]: 1.6278e-8 kg; lognormal SD95 1.5051
  (2,2,1,1,1,na)
- Mercury [emissions to soil, agricultural]: -8.7035e-9 kg; lognormal SD95 1.5051
  (2,2,1,1,1,na)
- Zinc [emissions to water, river]: 7.0199e-8 kg; lognormal SD95 1.8042
  (2,2,1,1,1,na)
- Zinc [emissions to soil, agricultural]: -2.3204e-6 kg; lognormal SD95 1.5051
  (2,2,1,1,1,na)
- Lead [emissions to water, river]: 1.1785e-8 kg; lognormal SD95 1.8042
  (2,2,1,1,1,na)
- Metaldehyde (tetramer) [emissions to soil, agricultural]: 9.4157e-7 kg; lognormal SD95 1.209
  (2,2,1,1,1,na)
- Copper [emissions to water, river]: 3.4523e-8 kg; lognormal SD95 1.8042
  (2,2,1,1,1,na)
- Cadmium [emissions to water, groundwater]: 3.5867e-10 kg; lognormal SD95 1.8042
  (2,2,1,1,1,na)
- Nitrogen oxides [emissions to air, low. pop.]: 7.5197e-6 kg; lognormal SD95 1.5051
  (2,2,1,1,1,na)
- Nickel [emissions to soil, agricultural]: 1.3306e-8 kg; lognormal SD95 1.5051
  (2,2,1,1,1,na)
- Ethofumesate [emissions to soil, agricultural]: 6.2379e-6 kg; lognormal SD95 1.209
  (2,2,1,1,1,na)
- Nitrate [emissions to water, groundwater]: 0.0020311 kg; lognormal SD95 1.5051
  (2,2,1,1,1,na)
- Metamitron [emissions to soil, agricultural]: 2.3775e-5 kg; lognormal SD95 1.209
  (2,2,1,1,1,na)
- Dinitrogen monoxide [emissions to air, low. pop.]: 3.5808e-5 kg; lognormal SD95 1.5051
  (2,2,1,1,1,na)
- Chromium [emissions to soil, agricultural]: -3.1347e-7 kg; lognormal SD95 1.5051
  (2,2,1,1,1,na)
- Phosphate [emissions to water, river]: 4.7199e-6 kg; lognormal SD95 1.5051
  (2,2,1,1,1,na)
- Mercury [emissions to water, river]: 1.2287e-10 kg; lognormal SD95 1.8042
  (2,2,1,1,1,na)
- Carbon dioxide, fossil [emissions to air, low. pop.]: 0.00014024 kg; lognormal SD95 1.0744
  (2,2,1,1,1,na)
- Nickel [emissions to water, river]: 3.1651e-8 kg; lognormal SD95 1.8042
  (2,2,1,1,1,na)
- Phosphorus [emissions to water, river]: 9.95e-7 kg; lognormal SD95 1.5051
  (2,2,1,1,1,na)
- Copper [emissions to soil, agricultural]: -1.7102e-6 kg; lognormal SD95 1.5051
  (2,2,1,1,1,na)
- Lead [emissions to water, groundwater]: 2.4002e-9 kg; lognormal SD95 1.8042
  (2,2,1,1,1,na)
- Chlorothalonil [emissions to soil, agricultural]: 8.2387e-7 kg; lognormal SD95 1.209
  (2,2,1,1,1,na)
- Copper [emissions to water, groundwater]: 4.0927e-8 kg; lognormal SD95 1.8042
  (2,2,1,1,1,na)
- Fungicides, unspecified [emissions to soil, agricultural]: 2.9777e-7 kg; lognormal SD95 1.209
  (2,2,1,1,1,na)
- Chromium [emissions to water, river]: 3.6711e-8 kg; lognormal SD95 1.8042
  (2,2,1,1,1,na)
- Phenmedipham [emissions to soil, agricultural]: 4.3548e-6 kg; lognormal SD95 1.209
  (2,2,1,1,1,na)
- Cadmium [emissions to soil, agricultural]: -3.9e-8 kg; lognormal SD95 1.5051
  (2,2,1,1,1,na)
- Cadmium [emissions to water, river]: 2.6012e-10 kg; lognormal SD95 1.8042
  (2,2,1,1,1,na)
- Chromium [emissions to water, groundwater]: 2.1371e-7 kg; lognormal SD95 1.8042
  (2,2,1,1,1,na)
- Nickel [emissions to water, groundwater]: 6.8574e-13 kg; lognormal SD95 1.8042
  (2,2,1,1,1,na)

## Sampling procedure
Data were compiled from statistics, pilot network, fertilising recommendations, documents from extension services, information provided by retailers and expert knowledge. The production data were verified and adjusted by a group of experts.

## Sources
- Created for EcoSpold 1 compatibility, Ecoinvent report version 2.0, 15
Nemecek, T., Kägi, T., Blaser, S. (2007) Life Cycle Inventories of Agricultural Production Systems. Ecoinvent report version 2.0. Editors: 0. Volume: 15. Swiss Centre for LCI, ART. Duebendorf and Zurich, CH.
Type: Measurement on site
Source: CD-ROM
First author: Nemecek, T.
Other authors: Kägi, T., Blaser, S.
Year: 2007
Name of editors: 0
Title of anthology: Ecoinvent report version 2.0
Place of publication: Duebendorf and Zurich, CH
Publisher: Swiss Centre for LCI, ART
Volume No: 15

## Validation
Proof reading validation: Passed internally.; Other validation: \\Server\e\ESU-Docs\Projektablage\320_FP Biomasse Biogas_Substrate\Ecospold\Veröffentlicht\[stucki-2011-sugar-beets.xlsx]X-Process;
