# Iron ore, 65% Fe, at beneficiation

Dataset: EcoSpold 1, unit process
Functional unit: 1 kg
Category: minerals / unspecified
Geography: GLO
Time period: 2000-01 to 2000-12
Production volume: 6.14E11 kg/a
Share of production covered: 65 %
Generated by: Hans-Joerg Althaus
accessRestrictedTo: 0
copyright: true

## General comment
This ore has different grain sizes. It can be lump ore that can be used directly in the blast furnace or it can be ore of smaller grain size that is used for sinter and pellet production. Water emissions are estimated according to the maximal levels for financial support of mining activities by the world bank.;

## Included processes
Milling and sorting of crude ore.

## Geography
Data relate to the global average

## Technology
Milling and mechanical sorting. Average iron yield is 84%.

## Reference product
- Iron ore, 65% Fe, at beneficiation [GLO]: 1 kg
  Global

## Inputs from technosphere
- Iron ore, 46% Fe, at mine [GLO]: 1.6582 kg; lognormal SD95 1.0541
  (1,2,1,1,1,1,3)
- Electricity, medium voltage, production ENTSO-E, at grid: 0.018715 kWh; lognormal SD95 1.0579
  (1,2,1,3,1,1,2)

## Inputs from nature
- Water, unspecified natural origin/m3 [resources, in water]: 0.001519 m3; lognormal SD95 1.0541
  (1,2,1,1,1,1,12)

## Emissions to nature
- Cadmium [emissions to water, unspecified]: 5.7911e-8 kg; lognormal SD95 5.2088
  (4,5,1,3,3,5,35)
- DOC, Dissolved Organic Carbon [emissions to water, unspecified]: 3.136e-6 kg; lognormal SD95 1.7258
  (4,5,1,3,3,5,32)
- Iron [emissions to water, unspecified]: 2.0269e-6 kg; lognormal SD95 5.2088
  (4,5,1,3,3,5,35)
- Mercury [emissions to water, unspecified]: 5.7911e-9 kg; lognormal SD95 5.2088
  (4,5,1,3,3,5,35)
- Oils, unspecified [emissions to water, unspecified]: 5.7911e-6 kg; lognormal SD95 3.1827
  (4,5,1,3,3,5,34)
- COD, Chemical Oxygen Demand [emissions to water, unspecified]: 8.6867e-5 kg; lognormal SD95 1.7258
  (4,5,1,3,3,5,32)
- Heat, waste [emissions to air, low. pop.]: 0.067375 MJ; lognormal SD95 1.0579
  (1,2,1,3,1,1,13)
- Copper [emissions to water, unspecified]: 2.8956e-7 kg; lognormal SD95 5.2088
  (4,5,1,3,3,5,35)
- Arsenic [emissions to water, unspecified]: 5.7911e-8 kg; lognormal SD95 1.7258
  (4,5,1,3,3,5,33)
- Lead [emissions to water, unspecified]: 1.1582e-7 kg; lognormal SD95 5.2088
  (4,5,1,3,3,5,35)
- TOC, Total Organic Carbon [emissions to water, unspecified]: 3.136e-6 kg; lognormal SD95 1.7258
  (4,5,1,3,3,5,32)
- Chromium VI [emissions to water, unspecified]: 5.7911e-8 kg; lognormal SD95 5.2088
  (4,5,1,3,3,5,35)
- BOD5, Biological Oxygen Demand [emissions to water, unspecified]: 8.6867e-5 kg; lognormal SD95 1.7258
  (4,5,1,3,3,5,32)
- Nickel [emissions to water, unspecified]: 2.8956e-7 kg; lognormal SD95 5.2088
  (4,5,1,3,3,5,35)
- Cyanide [emissions to water, unspecified]: 5.7911e-7 kg; lognormal SD95 1.7258
  (4,5,1,3,3,5,33)
- Zinc [emissions to water, unspecified]: 1.1582e-6 kg; lognormal SD95 5.2088
  (4,5,1,3,3,5,35)
- Water [emissions to water, unspecified]: 1.44305 kg; lognormal SD95 2.5196
  (5,5,5,5,5,BU:1.05); All uncertainty-values set to 5.0 by default. Balance of input water

## Sampling procedure
based on literature

## Sources
- Classen M., Althaus H.-J., Blaser S., Scharnhorst W., Tuchschmid M., Jungbluth N., Faist Emmenegger M., 2009, 2009 - LCI metals - Classen, Final report ecoinvent data v2.1, 10, Swiss Centre for LCI, Empa, ESU-services Ltd., Duebendorf, CH
Classen M., Althaus H.-J., Blaser S., Doka G., Jungbluth N., Tuchschmid M. (2008) Life Cycle Inventories of Metals. Final report ecoinvent data v2.1. Volume: 10. Issue: 0. Swiss Centre for LCI, Empa - TSL. Dübendorf, CH.
Type: Measurement on site
Source: CD-ROM
First author: Classen M.
Other authors: Althaus H.-J., Blaser S., Doka G., Jungbluth N., Tuchschmid M.
Year: 2008
Title of anthology: Final report ecoinvent data v2.1
Place of publication: Dübendorf, CH
Publisher: Swiss Centre for LCI, Empa - TSL
Volume No: 10
Issue No: 0

## Validation
Proof reading validation: passed; Other validation: none;
