# Cement floor screed, per m2

Dataset: EcoSpold 1, unit process
Functional unit: 1 m2
Category: construction materials / subfloors
Geography: CH
Time period: 2000-01 to 2016-12
Generated by: Daniel Savi
accessRestrictedTo: 0
copyright: true

## General comment
Zement-UB, pro m2\nDicke 85 mm. Flächengewicht mit Anmachwasser 180.9. Trockenrohdichte nach Aushärtung ca. 2100 kg/m3;

## Reference product
- Cement floor screed, per m2 [CH]: 1 m2
  SWITZERLAND

## Inputs from technosphere
- Cement floor screed, ready for processing [CH]: 180.9 kg; lognormal SD95 1.20898
  (4;2;1;1;1)

## Sources
- Kasser U., R. Frischknecht, M. Klingler, D. Savi, R. Itten, F. Wyss,P. Stolz, L. Tschuemperlin, 2016, 2016 - Renewal and exp. of LCA data in KBOB - Kasser, -, Buero fuer Umweltchemie, treeze Ltd., Zuerich and Uster, CH
U. Kasser, R. Frischknecht, M. Klingler, D. Savi, R. Itten, F. Wyss,P. Stolz, L. Tschümperlin 2016 (2015Z) Erneuerung und Erweiterung der Ökobilanzdaten in der KBOB-Liste "Ökobilanzdaten im Baubereich", Projekt QualiBOB. unknown.

First author: U. Kasser, R. Frischknecht, M. Klingler, D. Savi, R. Itten, F. Wyss,P. Stolz, L. Tschümperlin 2016
Year: 2015Z
Place of publication: unknown
Original title: Erneuerung und Erweiterung der Ökobilanzdaten in der KBOB-Liste "Ökobilanzdaten im Baubereich", Projekt QualiBOB
