# Photovoltaic laminate, CdTe, at plant

Dataset: EcoSpold 1, unit process, infrastructure
Functional unit: 1 m2
Category: photovoltaic / production of components
Geography: US
Time period: 2010-01 to 2010-12
Production volume: 1'963'079 m2 in 2010
Share of production covered: 0 %
Generated by: Matthias Stucki
accessRestrictedTo: 0
copyright: true

## General comment
Production of photovoltaic thin film modules by vapour deposition. The modules produced at First Solar have a size of 1.2m by 0.6 m. The weight is 16.7kg/m2. The average efficiency in 2011 is 11.7%. The rated nominal power is about 84Wp per module.;
Synonyms: Solarmodul, PV-module, cadmium telluride, thin film;

## Included processes
Electricity including overhead operations and office use, materials, transport of materials, infrastructure. Module processing includes film deposition, etching, cleaning and module assembly. Process emissions not known (except Cd).

## Technology
Production technology of thin film cells. Sublimation of the powders and condensation of the vapours on a glass substrate by vapour transport deposition (VTD).

## Time period
Data refer to production in 2010

## Reference product
- Photovoltaic laminate, CdTe, at plant [US]: 1 m2
  UNITED STATES

## Inputs from technosphere
- Copper, at regional storage [RER]: 0.010995 kg; lognormal SD95 1.0714
  (1,1,1,1,1,3,BU:1.05); 2010 data for First Solar in US
- Chemicals inorganic, at plant [GLO]: 0.037581 kg; lognormal SD95 1.0714
  (1,1,1,1,1,3,BU:1.05); 2010 data for First Solar in US
- Disposal, plastics, mixture, 15.3% water, to municipal incineration [CH]: 0.70776 kg; lognormal SD95 1.165
  (1,4,3,3,1,3,BU:1.05); Calculation
- Natural gas, burned in boiler modulating >100kW [RER]: 11.553 MJ; lognormal SD95 1.0714
  (1,1,1,1,1,3,BU:1.05); 2010 data for First Solar in US
- Silica sand, at plant [DE]: 0.0468 kg; lognormal SD95 1.165
  (1,4,3,3,1,3,BU:1.05); Fthenakis, literature
- Isopropanol, at plant [RER]: 0.00208 kg; lognormal SD95 1.165
  (1,4,3,3,1,3,BU:1.05); Fthenakis, literature
- Ethylvinylacetate, foil, at plant [RER]: 0.48595 kg; lognormal SD95 1.0714
  (1,1,1,1,1,3,BU:1.05); 2010 data for First Solar in US
- Photovoltaic panel factory CdTe [US]: 4e-6 p; lognormal SD95 3.0405
  (3,4,3,1,1,3,BU:3); Assumption
- Chemicals organic, at plant [GLO]: 0.0097419 kg; lognormal SD95 1.165
  (1,4,3,3,1,3,BU:1.05); Fthenakis, literature, sum up of several chemicals
- Transport, freight, lorry, fleet average [RER]: 7.7531 tkm; lognormal SD95 2.0034
  (1,1,1,1,1,3,BU:2); 2010 data for First Solar in US
- Silicone product, at plant [RER]: 0.00307 kg; lognormal SD95 1.0834
  (1,2,2,3,1,3,BU:1.05); Fthenakis, literature
- Tap water, at user [RER]: 131.69 kg; lognormal SD95 1.0714
  (1,1,1,1,1,3,BU:1.05); 2010 data for First Solar in US
- Sodium hydroxide, 50% in H2O, production mix, at plant [RER]: 0.0493 kg; lognormal SD95 1.165
  (1,4,3,3,1,3,BU:1.05); Fthenakis, literature
- Nitrogen, liquid, at plant [RER]: 0.0732 kg; lognormal SD95 1.165
  (1,4,3,3,1,3,BU:1.05); Fthenakis, literature
- Helium, at plant [GLO]: 0.0364 kg; lognormal SD95 1.165
  (1,4,3,3,1,3,BU:1.05); Fthenakis, literature
- Solar glass, low-iron, at regional storage [RER]: 8.4672 kg; lognormal SD95 1.0714
  (1,1,1,1,1,3,BU:1.05); 2010 data for First Solar in US
- Treatment, sewage, unpolluted, to wastewater treatment, class 3 [CH]: 0.061561 m3; lognormal SD95 1.0714
  (1,1,1,1,1,3,BU:1.05); 2010 data for First Solar in US
- Sulphuric acid, liquid, at plant [RER]: 0.0393 kg; lognormal SD95 1.165
  (1,4,3,3,1,3,BU:1.05); Fthenakis, literature
- Cadmium sulphide, semiconductor-grade, at plant [US]: 0.003516 kg; lognormal SD95 1.165
  (1,4,3,3,1,3,BU:1.05); Fthenakis, literature, incl. Part of Cd compound powder
- Corrugated board, mixed fibre, single wall, at plant [RER]: 0.52222 kg; lognormal SD95 1.0714
  (1,1,1,1,1,3,BU:1.05); 2010 data for First Solar in US
- Electricity, medium voltage, at grid [US]: 29.541 kWh; lognormal SD95 1.0714
  (1,1,1,1,1,3,BU:1.05); 2011 data for First Solar in US
- Nitric acid, 50% in H2O, at plant [RER]: 0.0572 kg; lognormal SD95 1.165
  (1,4,3,3,1,3,BU:1.05); Fthenakis, literature
- Disposal, municipal solid waste, 22.9% water, to municipal incineration [CH]: 0.03 kg; lognormal SD95 1.165
  (1,4,3,3,1,3,BU:1.05); Alsema (personal communication) 2007, production waste
- Glass fibre reinforced plastic, polyamide, injection moulding, at plant [RER]: 0.10776 kg; lognormal SD95 1.165
  (1,4,3,3,1,3,BU:1.05); Fthenakis, literature, sum up of several materials
- Flat glass, uncoated, at plant [RER]: 8.2504 kg; lognormal SD95 1.0714
  (1,1,1,1,1,3,BU:1.05); 2010 data for First Solar in US
- Sodium chloride, powder, at plant [RER]: 0.0453 kg; lognormal SD95 1.165
  (1,4,3,3,1,3,BU:1.05); Fthenakis, literature
- Tempering, flat glass [RER]: 8.4672 kg; lognormal SD95 1.0714
  (1,1,1,1,1,3,BU:1.05); 2010 data for First Solar in US
- Hydrogen peroxide, 50% in H2O, at plant [RER]: 0.0167 kg; lognormal SD95 1.165
  (1,4,3,3,1,3,BU:1.05); Fthenakis, literature
- Cadmium telluride, semiconductor-grade, at plant [US]: 0.025842 kg; lognormal SD95 1.0714
  (1,1,1,1,1,3,BU:1.05); 2010 data for First Solar in US

## Emissions to nature
- Nitrate [emissions to water, unspecified]: 0.015 kg; lognormal SD95 3.0033
  (1,1,1,1,1,3,BU:3); 2010 data for First Solar in US
- Cadmium [emissions to water, unspecified]: 4.4308e-7 kg; lognormal SD95 3.0033
  (1,1,1,1,1,3,BU:3); 2010 data for First Solar in US
- Heat, waste [emissions to air, high. pop.]: 209.23 MJ; lognormal SD95 1.286
  (3,4,3,3,1,5,BU:1.05); Calculation
- Copper [emissions to air, high. pop.]: 7.5555e-9 kg; lognormal SD95 5.0037
  (1,1,1,1,1,3,BU:5); 2010 data for First Solar in US
- Nitric acid [emissions to air, high. pop.]: 4.2966e-5 kg; lognormal SD95 5.0037
  (1,1,1,1,1,3,BU:5); 2010 data for First Solar in US
- Lead [emissions to air, high. pop.]: 4.4444e-9 kg; lognormal SD95 5.0037
  (1,1,1,1,1,3,BU:5); 2010 data for First Solar in US
- Copper [emissions to water, unspecified]: 1.9226e-6 kg; lognormal SD95 3.0033
  (1,1,1,1,1,3,BU:3); 2010 data for First Solar in US
- Lead [emissions to water, unspecified]: 1.7166e-7 kg; lognormal SD95 3.0033
  (1,1,1,1,1,3,BU:3); 2010 data for First Solar in US
- Cadmium [emissions to air, high. pop.]: 5.341e-9 kg; lognormal SD95 5.0037
  (1,1,1,1,1,3,BU:5); 2010 data for First Solar in US

## Sampling procedure
Producer information

## Extrapolations
Waste disposal from factory approximated with data for crystalline modules. The quantity of several small material uses (about 700 items) has been summarized for some main materials.

## Sources
- Itten R., Frischknecht R., 2014, 2014 - LCI global PV supply chain - Itten, Project report, 174, treeze Ltd., Uster, CH
Itten R.,, Frischknecht R., (2013) LCI of global PV supply chain. Project report. Volume: 174. treeze Ltd.. Uster, CH.
Type: Separate publication
Source: Report
First author: Itten R.,
Other authors: Frischknecht R.,
Year: 2013
Title of anthology: Project report
Place of publication: Uster, CH
Publisher: treeze Ltd.
Volume No: 174

## Validation
Proof reading validation: 27.04.2016; Other validation: \\SRV01\ESU-Docs\Projekte laufend\174 Photovoltaic, IEA Task 12\2013 Global supply chain\EcoSpold\[174-photovoltaics-global-supply-chain-v1.13.xlsx]X-Process;
