# xx Electrode, negative, LiC6, at plant

Dataset: EcoSpold 1, unit process
Functional unit: 1 kg
Category: material, obsolete / electronics, obsolete\devices, obsolete\module, obsolete
Geography: GLO
Time period: 2004-01 to 2004-12
Generated by: Wolfram Scharnhorst
accessRestrictedTo: 0
copyright: true

## General comment
The functional unit represents 1 kg of the negative LiC6 electrode material for the production of LiIo rechargable batteries. Process data is taken mainly from an environmental report of a battery producer as well as from literature. In addition own measurements of sizes and weights of batteries were used.;

## Included processes
(Raw) materials, transport and production efforts of the negative electrode of LiIo rechargable batteries. Neither waste nor emissions to air or water are taken into account.

## Geography
This module relates to the global situation.

## Technology
Construction details as described for LiIo rechargable batteries and manufacturing conditions as documented in the environmental report were adopted.

## Reference product
- xx Electrode, negative, LiC6, at plant [GLO]: 1 kg
  Global

## Inputs from technosphere
- Sheet rolling, aluminium [RER]: 0.24 kg; lognormal SD95 1.5079
  (4,5,4,2,3,5,4)
- Lithium, at plant [GLO]: 0.066765 kg; lognormal SD95 1.5079
  (4,5,4,2,3,5,4)
- Aluminium, production mix, at plant [RER]: 0.24 kg; lognormal SD95 1.5079
  (4,5,4,2,3,5,4)
- Transport, freight, lorry, fleet average [RER]: 0.1 tkm; lognormal SD95 2.095
  (4,5,na,na,na,na,5)
- Graphite, at plant [RER]: 0.69324 kg; lognormal SD95 1.5079
  (4,5,4,2,3,5,4)
- Transport, freight, rail [RER]: 0.2 tkm; lognormal SD95 2.095
  (4,5,na,na,na,na,5)

## Sampling procedure
Literature, measurements

## Extrapolations
see technology & general comments

## Sources
- Hischier R., Classen M., Lehmann M., Scharnhorst W., 2007, 2007 - LCI electric and electronic equipment - Hischier, Final report ecoinvent Data v2.0, 18, Swiss Centre for LCI, Empa - TSL, Duebendorf and St. Gallen, CH
Hischier R., Classen M., Lehmann M., Scharnhorst W. (2007) Life Cycle Inventories of Electric and Electronic Equipment - Production, Use & Disposal. Final report ecoinvent Data v2.0. Volume: 18. Swiss Centre for LCI, Empa - TSL. Duebendorf and St. Gallen, CH.
Type: Measurement on site
Source: CD-ROM
First author: Hischier R.
Other authors: Classen M., Lehmann M., Scharnhorst W.
Year: 2007
Title of anthology: Final report ecoinvent Data v2.0
Place of publication: Duebendorf and St. Gallen, CH
Publisher: Swiss Centre for LCI, Empa - TSL
Volume No: 18
Original title: Life Cycle Inventories of Electric and Electronic Equipment - Production, Use & Disposal

## Validation
Proof reading validation: passed.; Other validation: none;
