# Iron ore, 46% Fe, at mine

Dataset: EcoSpold 1, unit process
Functional unit: 1 kg
Category: minerals / unspecified
Geography: GLO
Time period: 2000-01 to 2000-12
Production volume: 1.02E12 kg/a
Share of production covered: 65 %
Generated by: Hans-Joerg Althaus
accessRestrictedTo: 0
copyright: true

## General comment
The dust emissions are estimated to be the same as in bauxite mining.;

## Included processes
Mining with its direct land use and transport of the crude ore to the enrichment plant.

## Geography
Data relate to the global average

## Technology
Data relate to open mining

## Reference product
- Iron ore, 46% Fe, at mine [GLO]: 1 kg
  Global

## Inputs from technosphere
- Mine, iron [GLO]: 8.3333e-13 p; lognormal SD95 3.0454
  (4,nA,1,1,1,nA,9)
- Recultivation, iron mine [GLO]: 1.7006e-6 m2; lognormal SD95 3.0454
  (4,nA,1,1,1,nA,9)
- Diesel, burned in building machine, average [CH]: 0.025523 MJ; lognormal SD95 2.0006
  (1,2,1,1,1,1,5)
- Electricity, medium voltage, production ENTSO-E, at grid: 0.0014237 kWh; lognormal SD95 1.0579
  (1,2,1,3,1,1,2)
- Blasting [RER]: 0.00027099 kg; lognormal SD95 1.0579
  (1,2,1,3,1,1,1)

## Inputs from nature
- Transformation, from unknown [resources, land]: 2.1258e-6 m2; lognormal SD95 2.0296
  (2,4,1,1,1,4,8)
- Occupation, mineral extraction site [resources, land]: 0.00012 m2a; lognormal SD95 1.5373
  (2,4,1,1,1,4,7)
- Transformation, to mineral extraction site [resources, land]: 2.1258e-6 m2; lognormal SD95 2.0296
  (2,4,1,1,1,4,8)
- Iron [resources, in ground]: 0.4619 kg; lognormal SD95 1.0541
  (1,2,1,1,1,1,12)

## Emissions to nature
- Particulates, < 2.5 um [emissions to air, low. pop.]: 0.00014415 kg; lognormal SD95 3.098
  (2,5,1,3,3,3,27)
- Particulates, > 10 um [emissions to air, low. pop.]: 0.0014415 kg; lognormal SD95 1.6255
  (2,5,1,3,3,3,25)
- Heat, waste [emissions to air, low. pop.]: 0.0051252 MJ; lognormal SD95 1.0579
  (1,2,1,3,1,1,13)
- Particulates, > 2.5 um, and < 10um [emissions to air, low. pop.]: 0.0012973 kg; lognormal SD95 2.1023
  (2,5,1,3,3,3,26)

## Sampling procedure
based on literature

## Sources
- Classen M., Althaus H.-J., Blaser S., Scharnhorst W., Tuchschmid M., Jungbluth N., Faist Emmenegger M., 2009, 2009 - LCI metals - Classen, Final report ecoinvent data v2.1, 10, Swiss Centre for LCI, Empa, ESU-services Ltd., Duebendorf, CH
Classen M., Althaus H.-J., Blaser S., Doka G., Jungbluth N., Tuchschmid M. (2008) Life Cycle Inventories of Metals. Final report ecoinvent data v2.1. Volume: 10. Issue: 0. Swiss Centre for LCI, Empa - TSL. Dübendorf, CH.
Type: Measurement on site
Source: CD-ROM
First author: Classen M.
Other authors: Althaus H.-J., Blaser S., Doka G., Jungbluth N., Tuchschmid M.
Year: 2008
Title of anthology: Final report ecoinvent data v2.1
Place of publication: Dübendorf, CH
Publisher: Swiss Centre for LCI, Empa - TSL
Volume No: 10
Issue No: 0

## Validation
Proof reading validation: passed; Other validation: none;
