# Facility of data center

Dataset: EcoSpold 1, unit process, infrastructure
Functional unit: 1 p
Category: electronics / internet network
Geography: GLO
Time period: 2023-01 to 2029-12
Synonyms: Rechenzentrum; Anlage
Generated by: Lugas Raka Adrianto, Maulana Permana Ajie, Didier Beloin-Saint-Pierre
accessRestrictedTo: 0
copyright: false

## General comment
The data center is constructed using typical materials found for the building of large IT facilities;

## Included processes
The dataset is based on a description of a data center from a UK source from Whitehead et al 2015. Inputs are described with the unit kg/kW/year. To obtain the values in kg, the original input value needs to be multiplied with the IT power of the data centre, which is 12895 kW. Inputs described with Input-Output databases are not considered. The data center facility is based on a lifetime of 60 years. The amount of materials are based on the assumption that they should be replaced after 20 years.

## Geography
Global average data centers, though the source is based in the UK

## Technology
Various construction materials are included in the inventory.

## Reference product
- Facility of data center [GLO]: 1 p
  Reference flow is 1 facility with 60 years lifetime

## Inputs from technosphere
All rows: lognormal SD95 1.26
- Acrylonitrile-butadiene-styrene copolymer, ABS, at plant [RER]: 35 kg
  (2,3,3,3,2,5,BU:1.06)
- Alkyd paint, white, 60% in H2O, at plant [RER]: 2424 kg
  (2,3,3,3,2,5,BU:1.06)
- Aluminium, production mix, wrought alloy, at plant [RER]: 3843 kg
  (2,3,3,3,2,5,BU:1.06)
- Cable, network cable, category 5, without plugs, at plant [GLO]: 472 m
  (2,3,3,3,2,5,BU:1.06); Assuming 0.036 kg/m (UVEK)
- Cable, three-conductor cable, at plant [GLO]: 4760 m
  (2,3,3,3,2,5,BU:1.06); Assuming 1.04 kg/m (UVEK)
- xx Cathode, copper, primary copper production [GLO]: 311 kg
  (2,3,3,3,2,5,BU:1.06)
- Cement mortar, at plant [CH]: 32753 kg
  (2,3,3,3,2,5,BU:1.06)
- xx Concrete block, at plant [DE]: 141845 kg
  (2,3,3,3,2,5,BU:1.06)
- Concrete, normal, at plant [CH]: 179 m3
  (2,3,3,3,2,5,BU:1.06); Assuming a density of 2300 kg/m3, including precast concrete
- Natural stone plate, cut, at regional storage [CH]: 13540 kg
  (2,3,3,3,2,5,BU:1.06)
- xxx Door, inner, wood, at plant [RER]: 31.1 m2
  (2,3,3,3,2,5,BU:1.06)
- Glass wool mat, at plant [CH]: 8948 kg
  (2,3,3,3,2,5,BU:1.06)
- xx Gypsum plaster board, at plant [CH]: 13798 kg
  (2,3,3,3,2,5,BU:1.06)
- xx Cement cast plaster floor, at plant [CH]: 331 kg
  (2,3,3,3,2,5,BU:1.06)
- Polyethylene, HDPE, granulate, at plant [RER]: 887 kg
  (2,3,3,3,2,5,BU:1.06)
- Polyethylene, LDPE, granulate, at plant [RER]: 565 kg
  (2,3,3,3,2,5,BU:1.06)
- Limestone, crushed, for mill [CH]: 694 kg
  (2,3,3,3,2,5,BU:1.06)
- Particleboard, average glue mix, uncoated, at plant [RER]: 20.8 m3
  (2,3,3,3,2,5,BU:1.06); Assuming a density of 750 kg/m3
- Plywood, hardwood veneer, UF-bonded, at plant [RER]: 0.353 m3
  (2,3,3,3,2,5,BU:1.06); Assuming a density of 750 kg/m3
- Concrete, normal, at plant [CH]: 4 m3
  (2,3,3,3,2,5,BU:1.06)
- Polyvinylchloride, at regional storage [RER]: 2890 kg
  (2,3,3,3,2,5,BU:1.06)
- Rock wool, at plant [CH]: 1715 kg
  (2,3,3,3,2,5,BU:1.06)
- Sand, at mine [CH]: 447 kg
  (2,3,3,3,2,5,BU:1.06)
- Steel, low-alloyed, at plant [RER]: 182080 kg
  (2,3,3,3,2,5,BU:1.06)
- Sheet rolling, steel [RER]: 182080 kg
  (2,3,3,3,2,5,BU:1.06)
- Tap water, unspecified natural origin RER, at user [RER]: 11902 kg
  (2,3,3,3,2,5,BU:1.06)
- xx Thermal plaster, at plant [CH]: 15990 kg
  (2,3,3,3,2,5,BU:1.06)

## Sampling procedure
Literature & own estimations

## Sources
- Raka Adrianto L., Permana Ajie M., Beloin-Saint-Pierre D., 2024, 2024 - LCI ICT sector - Raka Adrianto, Empa, St. Gallen, CH

## Validation
Proof reading validation: Passed, Other validation: none, Validator: Mischa Zschokke, Company: Carbotech, Country: CH
