# Carbon fiber production, fiber coagulation, stretching, washing, sizing and drying

Dataset: EcoSpold 1, unit process
Functional unit: 1 kg
Category: chemicals / organic
Geography: RER
Time period: 2024-01 to 2024-01
Generated by: Romain Sacchi
accessRestrictedTo: 0
copyright: true

## General comment
1 kg of finished carbon fiber Toray T700 G. Carbon fiber manufacturing. Source: based on Ellringmann et al. (2016), Gill et al. (2016), Mützel (2012). Source: Benitez A, Wulf C, de Palmenaer A, Lengersdorf M, Röding T, Grube T, et al. Ecological assessment of fuel cell electric vehicles with special focus on type IV carbon fiber hydrogen tank. J Clean Prod 2021;278:123277. https://doi.org/10.1016/j.jclepro.2020.123277.

## Reference product
- Carbon fiber production, fiber coagulation, stretching, washing, sizing and drying [RER]: 1 kg
  not defined

## Inputs from technosphere
- Electricity, low voltage, production ENTSO-E, at grid: 0.06364, 0.05815, 0.6639, 0.05139, 0.1922 kWh (5 entries); lognormal SD95 2.565
  {5;5;5;5;5;5;1.05;}
- Steam, for chemical processes, at plant [RER]: 0.7442, 1.052, 1.169 kg (3 entries); lognormal SD95 2.565
  {5;5;5;5;5;5;1.05;}
- Compressed air, average generation, <30kW, 10 bar gauge, at compressor [RER]: 0.0005269, 0.0002536, 0.01141, 0.006252 m3 (4 entries); lognormal SD95 2.565
  {5;5;5;5;5;5;1.05;}
- Potassium permanganate, at plant [RER]: 0.04059 kg; lognormal SD95 2.565
  {5;5;5;5;5;5;1.05;}
- Water, deionised, at plant [CH]: 0.237, 0.0006325 kg (2 entries); lognormal SD95 2.565
  {5;5;5;5;5;5;1.05;}
- Ethylene glycol, at plant [RER]: 0.0002945, 6.527e-7 kg (2 entries); lognormal SD95 2.565
  {5;5;5;5;5;5;1.05;}
- Dimethyl sulfoxide, at plant [RER]: 0.01084 kg; lognormal SD95 2.565
  {5;5;5;5;5;5;1.05;}
- Methyl acrylate, at plant [GLO]: 0.04095 kg; lognormal SD95 2.565
  {5;5;5;5;5;5;1.05;}
- Nitrogen, liquid, at plant [RER]: 0.0161 kg; lognormal SD95 2.565
  {5;5;5;5;5;5;1.05;}
- Polyacrylonitrile production (PAN), by polymerisation [RER]: 1.023 kg; lognormal SD95 2.565
  {5;5;5;5;5;5;1.05;}
- Transport, freight, rail [RER]: 0.05721 tkm; lognormal SD95 2.208
  Generic transport distances calculated based on Table 4.2 of the ecoinvent v.2 Methodology report. Distribution: 0.02 kg over 3100.0 km.
- Transport, freight, lorry, 16t-32t gross weight, fleet average [RER]: 0.01007 tkm; lognormal SD95 2.208
  Generic transport distances calculated based on Table 4.2 of the ecoinvent v.2 Methodology report. Distribution: 0.02 kg over 550.0 km.
- Treatment, sewage, to wastewater treatment, class 1 [CH]: 0.001138 m3; lognormal SD95 2.565
  {5;5;5;5;5;5;1.05;}

## Emissions to nature
- Water [emissions to air, stratosphere + troposphere]: 0.6234 kg; lognormal SD95 2.565
  {5;5;5;5;5;5;1.05;}

## Sampling procedure
Sampling procedure: Literature data

## Sources
- Sacchi R., Bauer C., 2024, 2024 - LCA power-to-X in residential sector - Sacchi, Project report, PSI, Villigen, CH

## Validation
Proof reading validation: Passed, Other validation: none, Validator: Rolf Frischknecht, Telephone: 0041 44 940 61 91, E-mail: frischknecht@treeze.ch, Company: treeze, Country: CH
