# Connector, clamp connection, at plant

Dataset: EcoSpold 1, unit process
Functional unit: 1 kg
Category: electronics / devices\module\component
Geography: GLO
Time period: 2004-01 to 2004-12
Generated by: Roland Hischier
accessRestrictedTo: 0
copyright: true

## General comment
The data represent a current clamp type connector for three wires used in the electronics industry in general. Material data are taken from product sheets of a producer. The energy demand for the production is from literature. Infrastructure and transport efforts rough estimations. The dataset represents 1 kg of clamp type connectors with a weight of 9 gram/unit.;

## Included processes
This dataset covers raw material input, energy consumption, infrastructure and transport efforts for the production of clamp type connectors.

## Geography
Data represent a global valuable composition of 3-wired clamp type connectors.

## Technology
average connector production technology, based on literature and assumptions

## Reference product
- Connector, clamp connection, at plant [GLO]: 1 kg
  Global

## Inputs from technosphere
- Transport, freight, rail [RER]: 0.6 tkm; lognormal SD95 2.095
  (4,5,na,na,na,na,5); standard distances
- Epoxy resin, liquid, at plant [RER]: 0.16667 kg; lognormal SD95 1.3773
  (4,5,1,3,1,5,3); estimation, based on total weight & qualitative information
- Transport, freight, lorry, fleet average [RER]: 0.1 tkm; lognormal SD95 2.095
  (4,5,na,na,na,na,5); standard distances
- Printed wiring board mounting plant [GLO]: 2.08e-7 p; lognormal SD95 3.7732
  (4,5,1,3,5,4,9); rough estimation of infrastructure
- Copper, primary, at refinery [RER]: 0.66667 kg; lognormal SD95 1.3773
  (4,5,1,3,1,5,3); estimation, based on total weight & qualitative information
- Electricity, medium voltage, production ENTSO-E, at grid: 6.51 kWh; lognormal SD95 1.6115
  (3,4,3,3,4,5,11); literature value as first approximation used
- Polycarbonate, at plant [RER]: 0.16667 kg; lognormal SD95 1.3773
  (4,5,1,3,1,5,3); estimation, based on total weight & qualitative information

## Emissions to nature
- Heat, waste [emissions to air, high. pop.]: 23.436 MJ; lognormal SD95 2.1425
  (4,5,1,3,1,5,23); calculated from electricity input

## Sampling procedure
literature

## Extrapolations
see Geography & Technology

## Sources
- Hischier R., Classen M., Lehmann M., Scharnhorst W., 2007, 2007 - LCI electric and electronic equipment - Hischier, Final report ecoinvent Data v2.0, 18, Swiss Centre for LCI, Empa - TSL, Duebendorf and St. Gallen, CH
Hischier R., Classen M., Lehmann M., Scharnhorst W. (2007) Life Cycle Inventories of Electric and Electronic Equipment - Production, Use & Disposal. Final report ecoinvent Data v2.0. Volume: 18. Swiss Centre for LCI, Empa - TSL. Duebendorf and St. Gallen, CH.
Type: Measurement on site
Source: CD-ROM
First author: Hischier R.
Other authors: Classen M., Lehmann M., Scharnhorst W.
Year: 2007
Title of anthology: Final report ecoinvent Data v2.0
Place of publication: Duebendorf and St. Gallen, CH
Publisher: Swiss Centre for LCI, Empa - TSL
Volume No: 18
Original title: Life Cycle Inventories of Electric and Electronic Equipment - Production, Use & Disposal

## Validation
Proof reading validation: passed.; Other validation: none;
