# Structural timber production, at regional storage, with resource correction

Dataset: EcoSpold 1, unit process
Functional unit: 1 m3
Category: wood / wooden materials\new processes\other material
Geography: CH
Generated by: default
accessRestrictedTo: 0
copyright: true

## Reference product
- Structural timber production, at regional storage, with resource correction [CH]: 1 m3

## Inputs from technosphere
- Transport, freight, rail [RER]: 87.1 tkm
- Transport, freight, lorry, 32t-40t gross weight, fleet average [CH]: 21.8 tkm
- Structural timber, average glue mix, at plant [RER]: 1 m3
  437.7 kg/m3

## Inputs from nature
- Energy, gross calorific value, in biomass, resource correction [resources, biotic]: -2972.87 MJ
  684-Holzdaten-Ressourcenkorrektur-v0.4

## Sources
- Created for EcoSpold 1 compatibility, Final report ecoinvent data v2.0, 11
Hischier R. (2007) Life Cycle Inventories of Packaging and Graphical Paper. Final report ecoinvent data v2.0. Volume: 11. Swiss Centre for LCI, Empa - TSL. Dübendorf, CH.
Type: Measurement on site
Source: CD-ROM
First author: Hischier R.
Year: 2007
Title of anthology: Final report ecoinvent data v2.0
Place of publication: Dübendorf, CH
Publisher: Swiss Centre for LCI, Empa - TSL
Volume No: 11
