# LCD glass, at plant

Dataset: EcoSpold 1, unit process
Functional unit: 1 kg
Category: electronics / devices
Geography: GLO
Time period: 2023-01 to 2029-12
Production volume: 525'000 t (CRT total, 1997)
Generated by: Lugas Raka Adrianto, Maulana Permana Ajie, Didier Beloin-Saint-Pierre
accessRestrictedTo: 0
copyright: false

## General comment
Data are based on information in a US-EPA LCA study about LCD and CRT production. The data represent an estimated LCD glass production – based on data for the CRT production. No major updates were found from the available public literature except for reduced energy intensity according to Cantini te al 2022. Energy consumption is also represented as global LCD glass production. 2023 updates are related to global material input and new background datasets at the inventory level.;

## Included processes
This module includes the following production steps: preparation and sorting of cullet, melting, forming of LCD flat glass parts, cooling down and palletisting until the glass parts are ready for the next process step. Included are as well direct emissions to air, waste water, and waste. Infrastructure and transport efforts of the input materials are estimated based on packaging glass production.

## Geography
Data from literature – used as data for a global production

## Technology
Estimation based on current production technologies for the CRT glass production.

## Reference product
- LCD glass, at plant [GLO]: 1 kg
  Global

## Inputs from technosphere
- Aluminium oxide, at plant [RER]: 0.005951 kg; lognormal SD95 1.31
  (1,3,4,3,1,5,BU:1.06); data from an US-EPA LCA study
- Ammonia, liquid, at regional storehouse [RER]: 0.002 kg; lognormal SD95 1.68
  (4,3,4,3,4,5,BU:1.06); estimation, based on CRT panel glass production
- Barite, at plant [RER]: 0.052585 kg; lognormal SD95 1.31
  (1,3,4,3,1,5,BU:1.06); data from an US-EPA LCA study
- Cerium concentrate, 60% cerium oxide, at plant [CN]: 0.00058428 kg; lognormal SD95 1.31
  (1,3,4,3,1,5,BU:1.06); data from an US-EPA LCA study
- Chemicals organic, at plant [GLO]: 0.00297 kg; lognormal SD95 1.31
  (1,3,4,3,1,5,BU:1.06); data from an US-EPA LCA study
- Chromium oxide, flakes, at plant [RER]: 1.082e-5 kg; lognormal SD95 1.31
  (1,3,4,3,1,5,BU:1.06); data from an US-EPA LCA study
- Copper carbonate, at plant [RER]: 0.058753 kg; lognormal SD95 1.31
  (1,3,4,3,1,5,BU:1.06); data from an US-EPA LCA study
- Electricity, medium voltage, production GLO, at grid [GLO]: 2.193 kWh; lognormal SD95 1.31
  (1,3,4,3,1,5,BU:1.06); data from an US-EPA LCA study, sum of electricity consumption in CN, JP, and US
- Glass production site [RER]: 1.25e-10 p; lognormal SD95 3.36
  (1,5,4,3,4,5,BU:3.00); Estimation from packaging glass production
- Glass, from public collection, unsorted [RER]: 0.0087642 kg; lognormal SD95 1.31
  (1,3,4,3,1,5,BU:1.06); data from an US-EPA LCA study
- Heat, light fuel oil, at industrial furnace 1MW [RER]: 8.223 MJ; lognormal SD95 1.31
  (1,3,4,3,1,5,BU:1.06); data from an US-EPA LCA study
- Heat, natural gas, at industrial furnace 1MW [CH]: 7.75 MJ; lognormal SD95 2.12
  (3,3,4,3,5,5,BU:1.06); analogy conclusion - from CRT glass production data
- Hydrogen fluoride, at plant [GLO]: 0.016944 kg; lognormal SD95 1.31
  (1,3,4,3,1,5,BU:1.06); data from an US-EPA LCA study
- Oxygen, liquid, at plant [RER]: 0.0020055 kg; lognormal SD95 1.68
  (4,3,4,3,4,5,BU:1.06); estimation, based on CRT panel glass production
- Potassium carbonate, at plant [GLO]: 0.067192 kg; lognormal SD95 1.31
  (1,3,4,3,1,5,BU:1.06); data from an US-EPA LCA study
- Silica sand, at plant [DE]: 0.44273 kg; lognormal SD95 1.31
  (1,3,4,3,1,5,BU:1.06); data from an US-EPA LCA study
- Soda, powder, at plant [RER]: 0.086668 kg; lognormal SD95 1.31
  (1,3,4,3,1,5,BU:1.06); data from an US-EPA LCA study
- Solvents, organic, unspecified, at plant [GLO]: 0.00021 kg; lognormal SD95 1.68
  (4,3,4,3,4,5,BU:1.06); estimation, based on CRT panel glass production
- Transport, freight, lorry, fleet average [RER]: 0.131 tkm; lognormal SD95 2.37
  (1,5,4,3,4,5,BU:2.00); Estimation from packaging glass production
- Transport, freight, lorry, 7.5t-16t gross weight, fleet average [RER]: 0.000147 tkm; lognormal SD95 2.37
  (1,5,4,3,4,5,BU:2.00); Estimation from packaging glass production
- Zirconium oxide, at plant [AU]: 0.0096298 kg; lognormal SD95 1.31
  (1,3,4,3,1,5,BU:1.06); data from an US-EPA LCA study
- Disposal, glass, 0% water, to construction waste landfill [CH]: 0.0058551 kg; lognormal SD95 1.63
  (1,3,4,3,4,5,BU:1.06); data from an US-EPA LCA study - approximated with existing waste process
- Disposal, inert waste, 5% water, to construction waste landfill [CH]: 7.75e-5 kg; lognormal SD95 1.63
  (same comment as for Disposal, glass, 0% water, to construction waste landfill)
- Disposal, lead in car shredder residue, 0% water, to municipal incineration [CH]: 0.00030324 kg; lognormal SD95 1.63
  (same comment as for Disposal, glass, 0% water, to construction waste landfill)
- Disposal, municipal solid waste, 22.9% water, to sanitary landfill [CH]: 0.0061883 kg; lognormal SD95 1.63
  (same comment as for Disposal, glass, 0% water, to construction waste landfill)
- Disposal, solvents mixture, 16.5% water, to hazardous waste incineration [CH]: 0.0018192 kg; lognormal SD95 1.63
  (1,3,4,3,4,5,BU:1.06); data from an US-EPA LCA study

## Inputs from nature
- Water, unspecified natural origin/m3 [resources, in water]: 0.0075 m3; lognormal SD95 1.31
  (1,3,4,3,1,5,BU:1.06); data from an US-EPA LCA study

## Emissions to nature
- Chromium [emissions to air, high. pop.]: 2.963e-8 kg; lognormal SD95 1.62
  (1,3,4,3,1,5,BU:1.50); data from an US-EPA LCA study
- Heat, waste [emissions to air, high. pop.]: 10.185 MJ; lognormal SD95 1.93
  (4,3,4,3,4,5,BU:1.50); Calculated from electricity input
- BOD5, Biological Oxygen Demand [emissions to water, unspecified]: 1.7593e-6 kg; lognormal SD95 1.62
  (1,3,4,3,1,5,BU:1.50); data from an US-EPA LCA study
- Chloride [emissions to water, unspecified]: 0.21667 kg; lognormal SD95 1.62
  (1,3,4,3,1,5,BU:1.50); data from an US-EPA LCA study
- Chromium [emissions to water, unspecified]: 1.7593e-8 kg; lognormal SD95 1.62
  (1,3,4,3,1,5,BU:1.50); data from an US-EPA LCA study
- COD, Chemical Oxygen Demand [emissions to water, unspecified]: 1.7593e-6 kg; lognormal SD95 1.62
  (1,3,4,3,1,5,BU:1.50); data from an US-EPA LCA study
- Fluoride [emissions to water, unspecified]: 0.00062963 kg; lognormal SD95 1.62
  (1,3,4,3,1,5,BU:1.50); data from an US-EPA LCA study
- Iron [emissions to water, unspecified]: 0.00059259 kg; lognormal SD95 1.62
  (1,3,4,3,1,5,BU:1.50); data from an US-EPA LCA study
- Lead [emissions to water, unspecified]: 9.3056e-6 kg; lognormal SD95 1.62
  (1,3,4,3,1,5,BU:1.50); data from an US-EPA LCA study
- Nickel [emissions to water, unspecified]: 1.7593e-8 kg; lognormal SD95 1.62
  (1,3,4,3,1,5,BU:1.50); data from an US-EPA LCA study
- Nitrate [emissions to water, unspecified]: 8.4722e-7 kg; lognormal SD95 1.62
  (1,3,4,3,1,5,BU:1.50); data from an US-EPA LCA study
- Oils, unspecified [emissions to water, unspecified]: 0.0015463 kg; lognormal SD95 3.09
  (1,3,4,3,1,5,BU:3.00); data from an US-EPA LCA study
- Solids, inorganic [emissions to water, unspecified]: 0.77778 kg; lognormal SD95 1.62
  (1,3,4,3,1,5,BU:1.50); data from an US-EPA LCA study
- Suspended solids, unspecified [emissions to water, unspecified]: 0.0015509 kg; lognormal SD95 1.62
  (1,3,4,3,1,5,BU:1.50); data from an US-EPA LCA study
- Water [emissions to water, unspecified]: 7.125 kg; lognormal SD95 2.5196
  (5,5,5,5,5,BU:1.05); All uncertainty-values set to 5.0 by default. Balance of input water

## Sampling procedure
literature

## Extrapolations
see GeneralComments, Geography & Technology

## Sources
- Raka Adrianto L., Permana Ajie M., Beloin-Saint-Pierre D., 2024, 2024 - LCI ICT sector - Raka Adrianto, Empa, St. Gallen, CH

## Validation
Proof reading validation: Passed, Other validation: none, Validator: Mischa Zschokke, Company: Carbotech, Country: CH
