# Heat, residential, by transfer of geothermal heat using ground source heat pump using electricity from Solar PV (CH)

Dataset: EcoSpold 1, unit process
Functional unit: 1 MJ
Category: energy, obsolete / heat, obsolete\heat pumps, obsolete\transformation
Geography: CH
Time period: 2024-01 to 2024-01
Generated by: Romain Sacchi
accessRestrictedTo: 0
copyright: true

## General comment
This dataset represents the supply of 1 megajoule of heat in a residence, by transfer of geothermal heat in a ground source heat pump. The electricity is from Solar PV (CH). Heat conversion efficiency [% LHV input]: 390%. LHV [MJ/kg]: 3.6. Market price [Euro/MJ]: 0.03. Distribution loss [% output]: 0%. Storage loss [% output]: 0%. Synthesis efficiency [% LHV input]: 0%. Hydrogen production efficiency [% LHV input]: 0. Grid loss [%]: 0.06. CO2 biogenic share [%]: 0%. Power [kW]: 10. Lifetime [years]: 20. Annual operation [hours]: 2100. : . For more information, refer to: Sacchi, R., Bauer, C. LCA of Power-to-X processes and applications in the residential sector. Paul Scherrer Institut, 2023. Source: Sacchi, R., Bauer, C. LCA of Power-to-X processes and applications in the residential sector. Paul Scherrer Institut, 2023.

## Reference product
- Heat, residential, by transfer of geothermal heat using ground source heat pump using electricity from Solar PV (CH) [CH]: 1 MJ
  not defined

## Inputs from technosphere
- 1,1-difluoroethane, HFC-152a, at plant [US]: 2.513e-7 kg; lognormal SD95 2.565
  Proxy for refrigerant R404a {5;5;5;5;5;5;1.05;}
- Transport, freight, lorry, 16t-32t gross weight, fleet average [CH]: 3.823e-8 tkm; lognormal SD95 2.208
  Generic transport distances calculated based on Table 4.2 of the ecoinvent v.2 Methodology report. Distribution: 0.0 kg over 133.0 km.
- Electricity, production mix photovoltaic, at plant [CH]: 0.07123 kWh; lognormal SD95 2.565
  COP of 3.9 for heating. 1 [MJ]/CoP/3.6 [MJ/kWh] {5;5;5;5;5;5;1.05;}
- Transport, freight, rail, electricity with shunting [CH]: 3.147e-7 tkm; lognormal SD95 2.208
  Generic transport distances calculated based on Table 4.2 of the ecoinvent v.2 Methodology report. Distribution: 0.0 kg over 1233.0 km.
- Trifluoromethane, at plant [GLO]: 2.513e-7 kg; lognormal SD95 2.565
  Proxy for refrigerant R404a {5;5;5;5;5;5;1.05;}
- Air filter, in exhaust air valve, at plant [RER]: 1.323e-5 p; lognormal SD95 2.565
  {5;5;5;5;5;5;1.05;}
- Treatment of heat pump 10 kW production for air source heat pump system [CH]: 6.614e-7 p; lognormal SD95 4.247
  {5;5;5;5;5;5;3;}
- Lubricating oil, at plant [RER]: 3.968e-7 kg; lognormal SD95 2.565
  {5;5;5;5;5;5;1.05;}
- Heat pump 10 kW production for ground source heat pump system [CH]: 6.614e-7 p; lognormal SD95 4.247
  1/(Cap. [kW] * lifetime [y] * annual operation [h] * 3.6 [MJ/kWh]) {5;5;5;5;5;5;3;}

## Inputs from nature
- Energy, geothermal, converted [resources, in ground]: 1 MJ; lognormal SD95 2.565
  {5;5;5;5;5;5;1.05;}

## Emissions to nature
- Methane, trifluoro-, HFC-23 [emissions to air, unspecified]: 2.513e-7 kg; lognormal SD95 2.785
  Proxy for refrigerant R404a {5;5;5;5;5;5;1.5;}
- Ethane, 1,1-difluoro-, HFC-152a [emissions to air, unspecified]: 2.513e-7 kg; lognormal SD95 2.785
  Proxy for refrigerant R404a {5;5;5;5;5;5;1.5;}

## Sampling procedure
Sampling procedure: Literature data

## Sources
- Sacchi R., Bauer C., 2024, 2024 - LCA power-to-X in residential sector - Sacchi, Project report, PSI, Villigen, CH

## Validation
Proof reading validation: Passed, Other validation: none, Validator: Rolf Frischknecht, Telephone: 0041 44 940 61 91, E-mail: frischknecht@treeze.ch, Company: treeze, Country: CH
