# Treatment of fuel cell stack, 1MWe, PEM

Dataset: EcoSpold 1, unit process
Functional unit: 1 p
Category: Others / unspecified
Geography: RER
Time period: 2024-01 to 2024-01
Generated by: Romain Sacchi
accessRestrictedTo: 0
copyright: true

## General comment
1 MW PEM electrolyzer stack end-of-life treatment, based on Niklas Gerloff, Comparative Life-Cycle-Assessment analysis of three major water electrolysis technologies while applying various energy scenarios for a greener hydrogen production, Journal of Energy Storage, Volume 43, 2021, https://doi.org/10.1/j.est0.20.1.

## Reference product
- Treatment of fuel cell stack, 1MWe, PEM [RER]: 1 p
  Others

## Inputs from technosphere
All rows: lognormal SD95 1.329
- Disposal, rubber, unspecified, 0% water, to municipal incineration [CH]: 4.8 kg
  {2;4;1;3;3;5;1.05;}
- Disposal, copper, 0% water, to municipal incineration [CH]: 4.5 kg
  {2;4;1;3;3;5;1.05;}
- Disposal, plastics, mixture, 15.3% water, to municipal incineration [CH]: 16 kg
  {2;4;1;3;3;5;1.05;}
- Recycling steel and iron [RER]: 100 kg
  {2;4;1;3;3;5;1.05;}
- xx Recycling aluminium [RER]: 27 kg
  {2;4;1;3;3;5;1.05;}

## Sampling procedure
Sampling procedure: Literature data

## Sources
- Sacchi R., Bauer C., 2024, 2024 - LCA power-to-X in residential sector - Sacchi, Project report, PSI, Villigen, CH

## Validation
Proof reading validation: Passed, Other validation: none, Validator: Rolf Frischknecht, Telephone: 0041 44 940 61 91, E-mail: frischknecht@treeze.ch, Company: treeze, Country: CH
