# Saw dust, production mix, wet, measured as dry mass, at sawmill

Dataset: EcoSpold 1, unit process
Functional unit: 1 kg
Category: wood / wooden materials\new processes\other material
Geography: RER
Time period: 2000-01 to 2016-12
Generated by: Frank Werner
accessRestrictedTo: 0
copyright: true

## Reference product
- Saw dust, production mix, wet, measured as dry mass, at sawmill [RER]: 1 kg

## Inputs from technosphere
- Electricity, medium voltage, production ENTSO-E, at grid: 0.03 kWh; lognormal SD95 1.08192
  Pedigree: (1,1,2,1,1).
- Saw dust, loose, softwood, wet, measured as dry mass, at saw [RER]: 0.635 kg
  Pedigree: (1,1,2,1,1).
- Saw dust, loose, hardwood, wet, measured as dry mass, at saw [RER]: 0.365 kg

## Sources
- Werner F., 2017, 2017 - LCI wood and wood based products - Werner, Project Report, 0, Environment & Development, Zuerich, CH
