# Steam, for chemical processes, at plant

Dataset: EcoSpold 1, unit process
Functional unit: 1 kg
Category: heat / steam
Geography: RER
Time period: 2000-01 to 2000-12
Generated by: Rainer Zah
accessRestrictedTo: 0
copyright: true

## Included processes
Input of water and energy for the production of steam. No further infrastructure is included, as the heating infrastructure is part of the respective heating modules used.; Geography: value represents average steam production of 11 European chemical sites

## Technology
average steam production out of gas and heavy fuel oil by 11 European chemical producers

## Reference product
- Steam, for chemical processes, at plant [RER]: 1 kg
  Europe

## Inputs from technosphere
- Tap water, at user [RER]: 1.17 kg; lognormal SD95 1.2
  (2,3,3,2,1,4); average from 11 data sets
- Heavy fuel oil, burned in industrial furnace 1MW, non-modulating [RER]: 0.628 MJ; lognormal SD95 1.2
  (2,3,3,2,1,4); 24% of heat generation
- Natural gas, burned in industrial furnace 1MWth [CH]: 2.6 MJ; lognormal SD95 1.2
  (2,3,3,2,1,4); 76% of heat generation

## Sampling procedure
see technology

## Sources
- Zah R., Hischier R., 2007, 2007 - LCI detergents - Zah, Final report ecoinvent data v2.0, 12, Swiss Centre for LCI, Empa - TSL, Duebendorf and St. Gallen, CH
Zah R., Hischier R. (2007) Life Cycle Inventories of Detergents. Final report ecoinvent data v2.0. Volume: 12. Swiss Centre for LCI, Empa - TSL. Dübendorf, CH.
Type: Measurement on site
Source: CD-ROM
First author: Zah R.
Other authors: Hischier R.
Year: 2007
Title of anthology: Final report ecoinvent data v2.0
Place of publication: Dübendorf, CH
Publisher: Swiss Centre for LCI, Empa - TSL
Volume No: 12

## Validation
Proof reading validation: Passed.; Other validation: none;
