# xx Grass silage IP, at farm

Dataset: EcoSpold 1, unit process
Functional unit: 1 kg
Category: material, obsolete / agricultural, obsolete\animal production, obsolete\animal foods, obsolete
Geography: CH
Time period: 2000-01 to 2004-12
Generated by: Fredy Dinkel
accessRestrictedTo: 0
copyright: true

## General comment
Refers to 1 kg dry matter of grass silage from intensive IP production with 1.65 kg CO2 and 17.9 MJ per kg dry matter. The dry matter content of grass silage is about 35% ;

## Included processes
The inventories include the production of grass for silage from 65% natural and 35% temporary meadows. Included steps are soil cultivation, pestizides against Rumex, fertilisation (slurry and mineral fertilizer), harvest, baling, loading and transport.

## Geography
Refers to a production in the Swiss plateau (lowlands <700m).

## Technology
Intensive IP production.

## Reference product
- xx Grass silage IP, at farm [CH]: 1 kg
  SWITZERLAND

## Inputs from technosphere
- Tillage, harrowing, by rotary harrow [CH]: 9.6022e-6 ha; lognormal SD95 1.2165
  (2,2,1,1,3,1); Calculated from inventories of intensive natural meadows (portion 65%) and intensive temporary meadows (portion 35%)
- Grass seed IP, at regional storehouse [CH]: 0.00037449 kg; lognormal SD95 1.2165
  (2,2,1,1,1,5); Calculated from inventories of intensive natural meadows (portion 65%) and intensive temporary meadows (portion 35%)
- Transport, freight, lorry, fleet average [CH]: 0.0015 tkm; lognormal SD95 1.2165
  (2,2,1,1,1,5); Transport of bales to the farm, about 1.5 km.
- Fertilising, by broadcaster [CH]: 8.2305e-5 ha; lognormal SD95 1.2165
  (same comment as for Tillage, harrowing, by rotary harrow)
- Sowing [CH]: 9.6022e-6 ha; lognormal SD95 1.2165
  (same comment as for Tillage, harrowing, by rotary harrow)
- [thio]carbamate-compounds, at regional storehouse [CH]: 1.07e-5 kg; lognormal SD95 1.2165
  (same comment as for Tillage, harrowing, by rotary harrow)
- Transport, barge [RER]: 0.0069444 tkm; lognormal SD95 2.0517
  (same comment as for Grass seed IP, at regional storehouse)
- Swath, by rotary windrower [CH]: 0.00041152 ha; lognormal SD95 1.2152
  (2,1,1,1,1,5); Short drying to reduce water content from 85% to 65% for silage production (4-5 harvest for intensive meadows, 1 harvest for extensive meadows)
- Application of plant protection products, by field sprayer [CH]: 2.8807e-5 ha; lognormal SD95 1.2165
  (same comment as for Tillage, harrowing, by rotary harrow)
- Transport, freight, rail [RER]: 0.0007716 tkm; lognormal SD95 2.0517
  (same comment as for Grass seed IP, at regional storehouse)
- Baling [CH]: 0.0057143 p; lognormal SD95 1.3127
  (2,3,1,3,3,5); Calculation with 175 kg DM/m3
- MCPA, at regional storehouse [CH]: 4.8011e-5 kg; lognormal SD95 1.2165
  (same comment as for Tillage, harrowing, by rotary harrow)
- Loading bales [CH]: 0.0057143 p; lognormal SD95 1.3127
  (2,3,1,3,3,5); Amount of bales calculated per ha with 12000-13000 kg DM/ha and 175kg DM/m3
- Tillage, rolling [CH]: 9.6022e-6 ha; lognormal SD95 1.2165
  (same comment as for Tillage, harrowing, by rotary harrow)
- Slurry spreading, by vacuum tanker [CH]: 0.0068724 m3; lognormal SD95 1.2165
  (same comment as for Tillage, harrowing, by rotary harrow)
- Mowing, by rotary mower [CH]: 0.00041152 ha; lognormal SD95 1.2165
  (same comment as for Tillage, harrowing, by rotary harrow)
- Haying, by rotary tedder [CH]: 0.00041152 ha; lognormal SD95 1.2152
  (same comment as for Swath, by rotary windrower)
- Ammonium nitrate, as N, at regional storehouse [RER]: 0.0024691 kg; lognormal SD95 1.2165
  (same comment as for Tillage, harrowing, by rotary harrow)
- Tillage, cultivating, chiselling [CH]: 9.6022e-6 ha; lognormal SD95 1.2165
  (same comment as for Tillage, harrowing, by rotary harrow)
- Transport, freight, lorry, 16t-32t gross weight, fleet average [CH]: 0.0007716 tkm; lognormal SD95 2.0517
  (same comment as for Grass seed IP, at regional storehouse)
- Transport, freight, lorry, 3.5t gross weight, fleet average [CH]: 6.8827e-6 tkm; lognormal SD95 2.0517
  (same comment as for Grass seed IP, at regional storehouse)

## Inputs from nature
- Transformation, to annual crop, non-irrigated [resources, land]: 0.096022 m2; lognormal SD95 2.0483
  (4,2,1,1,1,1); Calculated from inventories of intensive natural meadows (portion 65%) and intensive temporary meadows (portion 35%)
- Transformation, from annual crop, non-irrigated [resources, land]: 0.067215 m2; lognormal SD95 2.0483
  (same comment as for Transformation, to annual crop, non-irrigated)
- Carbon dioxide, in air [resources, in air]: 1.661 kg; lognormal SD95 1.0931
  (2,2,1,3,1,3); Calculated from inventories of intensive natural meadows (portion 65%) and intensive temporary meadows (portion 35%)
- Transformation, to pasture, man made, intensive [resources, land]: 0.026749 m2; lognormal SD95 2.0483
  (same comment as for Transformation, to annual crop, non-irrigated)
- Energy, gross calorific value, in biomass [resources, biotic]: 17.9 MJ; lognormal SD95 1.0931
  (same comment as for Carbon dioxide, in air)
- Occupation, pasture, man made, intensive [resources, land]: 0.82305 m2a; lognormal SD95 1.5051
  (2,2,1,1,1,1); Calculated from inventories of intensive natural meadows (portion 65%) and intensive temporary meadows (portion 35%)
- Transformation, from pasture, man made, intensive [resources, land]: 0.055556 m2; lognormal SD95 2.0483
  (same comment as for Transformation, to annual crop, non-irrigated)

## Emissions to nature
- Lead [emissions to soil, agricultural]: -2.4835e-6 kg; lognormal SD95 1.6367
  (2,1,4,3,3,4); Calculated from inventories of intensive natural meadows (portion 65%) and intensive temporary meadows (portion 35%)
- Dinitrogen monoxide [emissions to air, low. pop.]: 0.00041986 kg; lognormal SD95 1.8071
  (2,2,3,3,4,4); Calculated from inventories of intensive natural meadows (portion 65%) and intensive temporary meadows (portion 35%)
- Copper [emissions to soil, agricultural]: 1.9877e-6 kg; lognormal SD95 1.6367
  (same comment as for Lead)
- Nitrate [emissions to water, groundwater]: 0.0035106 kg; lognormal SD95 1.8071
  (same comment as for Dinitrogen monoxide)
- Mercury [emissions to soil, agricultural]: -4.2905e-8 kg; lognormal SD95 1.6367
  (same comment as for Lead)
- Phosphate [emissions to water, river]: 7.2822e-5 kg; lognormal SD95 1.8071
  (same comment as for Dinitrogen monoxide)
- Asulam [emissions to soil, agricultural]: 1.07e-5 kg; lognormal SD95 1.302
  (2,2,1,3,1,5); Calculated from inventories of intensive natural meadows (portion 65%) and intensive temporary meadows (portion 35%)
- Zinc [emissions to soil, agricultural]: 6.189e-6 kg; lognormal SD95 1.6367
  (same comment as for Lead)
- Phosphorus [emissions to water, river]: 9.1419e-6 kg; lognormal SD95 1.8071
  (same comment as for Dinitrogen monoxide)
- MCPB [emissions to soil, agricultural]: 4.8011e-5 kg; lognormal SD95 1.3069
  (2,3,1,3,1,5); Calculated from inventories of intensive natural meadows (portion 65%) and intensive temporary meadows (portion 35%)
- Cadmium [emissions to soil, agricultural]: -8.8971e-8 kg; lognormal SD95 1.6367
  (same comment as for Lead)
- Phosphate [emissions to water, groundwater]: 1.4229e-5 kg; lognormal SD95 1.8071
  (same comment as for Dinitrogen monoxide)
- Nickel [emissions to soil, agricultural]: -4.1942e-7 kg; lognormal SD95 1.6367
  (same comment as for Lead)
- Ammonia [emissions to air, low. pop.]: 0.0057508 kg; lognormal SD95 1.5967
  (same comment as for Dinitrogen monoxide)
- Chromium [emissions to soil, agricultural]: 3.1221e-8 kg; lognormal SD95 1.6367
  (same comment as for Lead)
- Nitrogen oxides [emissions to air, low. pop.]: 8.8171e-5 kg; lognormal SD95 1.8071
  (same comment as for Dinitrogen monoxide)

## Sampling procedure
Data were compiled from statistics, fertilising recommendations, documents from extension services and expert knowledge.

## Sources
- Jungbluth N., Chudacoff M., Dauriat A., Dinkel F., Doka G., Faist Emmenegger M., Gnansounou E., Kljun N., Spielmann M., Stettler C., Sutter J., 2007, 2007 - LCI bioenergy - Jungbluth, Final report ecoinvent data v2.0, 17, Swiss Centre for LCI, ESU-services Ltd., Duebendorf and Uster, CH
Jungbluth N., Chudacoff M., Dauriat A., Dinkel F., Doka G., Faist Emmenegger M., Gnansounou E., Kljun N., Spielmann M., Stettler C., Sutter J. (2007) Life Cycle Inventories of Bioenergy. Final report ecoinvent data v2.0. Volume: 17. Swiss Centre for LCI, ESU. Duebendorf and Uster, CH.
Type: Measurement on site
Source: CD-ROM
First author: Jungbluth N.
Other authors: Chudacoff M., Dauriat A., Dinkel F., Doka G., Faist Emmenegger M., Gnansounou E., Kljun N., Spielmann M., Stettler C., Sutter J.
Year: 2007
Title of anthology: Final report ecoinvent data v2.0
Place of publication: Duebendorf and Uster, CH
Publisher: Swiss Centre for LCI, ESU
Volume No: 17

## Validation
Proof reading validation: Passed.; Other validation: none;
