# xx Electricity, wood, at distillery

Dataset: EcoSpold 1, unit process
Functional unit: 1 kg
Category: energy, obsolete / electricity by fuel, obsolete\wood, obsolete
Geography: SE
Time period: 2000-01 to 2008-12
Share of production covered: 0 %
Generated by: Sybille Buesser
accessRestrictedTo: 0
copyright: true

## General comment
Inventory refers to the production of 1 kg hydrated ethanol 95% (dry basis, i.e. 1.05 kg hydrated ethanol 95% wet basis), respectively 1 kWh of electricity from wood (u=70%, i.e. 59% dry matter). The multioutput-process 'wood, in distillery' delivers the co-products 'ethanol, 95% in H2O, from wood, at distillery' and 'electricity, from wood, at distillery'. Economic allocation with allocation factor for common stages of 99.7% to ethanol.;

## Included processes
This dataset includes the transport of wood from the forest to the distillery, and the processing of wood (u=70%) to hydrated ethanol (95%) and electricity. System boundary is at the distillery. Dehydration to anhydrous ethanol is not included. Process heat and power supply is ensured by the combustion of unconverted solids.

## Geography
Data is adapted to Swedish conditions from NREL ethanol process design from yellow poplar (1999) and information from alcosuisse

## Technology
Ethanol is produced by dilute acid pre-hydrolysis and simultaneous saccharification and co-fermentation (SSCF) of lignocellulosic biomass. Process heat and power supply is ensured by the combustion of unconverted solids. Excess electricity is exported to the power grid.

## Reference product
- xx Electricity, wood, at distillery [SE]: 1 kg
  SWEDEN

## Inputs from technosphere
- Disposal, used mineral oil, 10% water, to hazardous waste incineration [CH]: 4.3823e-6 kg; lognormal SD95 1.3241
  (4,4,2,1,1,5,BU:1.05); adapted from the dataset 'wood chips, in cogen 6400kWth, wood, emission control', according to actual water, carbon and energy content of the fuel (unconverted solids, mainly lignin)
- Disposal, municipal solid waste, 22.9% water, to municipal incineration [CH]: 4.3823e-6 kg; lognormal SD95 1.3241
  (same comment as for Disposal, used mineral oil, 10% water, to hazardous waste incineration)
- Lubricating oil, at plant [RER]: 4.3823e-6 kg; lognormal SD95 1.3241
  (same comment as for Disposal, used mineral oil, 10% water, to hazardous waste incineration)
- Cogen unit 6400kWth, wood burning, common components for heat+electricity [CH]: 1.2933e-9 p; lognormal SD95 3.1045
  (4,4,2,1,1,5,BU:3); adapted from the dataset 'wood chips, in cogen 6400kWth, wood, emission control', according to actual water, carbon and energy content of the fuel (unconverted solids, mainly lignin)
- Water, decarbonised, at plant [RER]: 0.0010515 kg; lognormal SD95 1.3241
  (same comment as for Disposal, used mineral oil, 10% water, to hazardous waste incineration)
- Disposal, gypsum, 19.4% water, to construction waste landfill [CH]: 0.0077396 kg; lognormal SD95 1.2229
  (2,3,1,2,1,5,BU:1.05); etha+ project Alcosuisse, SSCF technology from NREL
- Ammonia, liquid, at regional storehouse [CH]: 0.0046987 kg; lognormal SD95 1.2229
  (2,3,1,2,1,5,BU:1.05); etha+ project Alcosuisse, SSCF technology from NREL
- Transport, freight, lorry, fleet average [CH]: 0.0024672 tkm; lognormal SD95 2.0547
  (2,3,1,2,1,5,BU:2); etha+ project Alcosuisse, SSCF technology from NREL
- Treatment, sewage, to wastewater treatment, class 2 [CH]: 1.0515e-6 m3; lognormal SD95 1.3241
  (same comment as for Disposal, used mineral oil, 10% water, to hazardous waste incineration)
- Sulphuric acid, liquid, at plant [RER]: 0.0058907 kg; lognormal SD95 1.2229
  (2,3,1,2,1,5,BU:1.05); etha+ project Alcosuisse, SSCF technology from NREL
- Disposal, wood ash mixture, pure, 0% water, to sanitary landfill [CH]: 0.00035406 kg; lognormal SD95 1.3241
  (same comment as for Disposal, used mineral oil, 10% water, to hazardous waste incineration)
- Magnesium sulphate, at plant [RER]: 3.8733e-5 kg; lognormal SD95 1.2229
  (2,3,1,2,1,5,BU:1.05); etha+ project Alcosuisse, SSCF technology from NREL
- Cogen unit 6400kWth, wood burning, building [CH]: 3.2333e-10 p; lognormal SD95 3.1045
  (same comment as for Cogen unit 6400kWth, wood burning, common components for heat+electric)
- Quicklime, in pieces, loose, at plant [CH]: 0.0022875 kg; lognormal SD95 1.2229
  (2,3,1,2,1,5,BU:1.05); etha+ project Alcosuisse, SSCF technology from NREL
- Tap water, at user [RER]: 0.57244 kg; lognormal SD95 1.2229
  (2,3,1,2,1,5,BU:1.05); etha+ project Alcosuisse, SSCF technology from NREL
- Disposal, wood ash mixture, pure, 0% water, to landfarming [CH]: 0.00017636 kg; lognormal SD95 1.3241
  (same comment as for Disposal, used mineral oil, 10% water, to hazardous waste incineration)
- Ethanol fermentation plant [CH]: 2.9416e-11 p; lognormal SD95 3.0521
  (2,3,1,2,1,5,BU:3); etha+ project Alcosuisse, SSCF technology from NREL
- Transport, freight, rail [RER]: 0.0094523 tkm; lognormal SD95 2.0547
  (2,3,1,2,1,5,BU:2); etha+ project Alcosuisse, SSCF technology from NREL
- Disposal, wood ash mixture, pure, 0% water, to municipal incineration [CH]: 0.00017636 kg; lognormal SD95 1.3241
  (same comment as for Disposal, used mineral oil, 10% water, to hazardous waste incineration)
- Chlorine, liquid, production mix, at plant [RER]: 4.3823e-7 kg; lognormal SD95 1.3241
  (same comment as for Disposal, used mineral oil, 10% water, to hazardous waste incineration)
- Diammonium phosphate, as N, at regional storehouse [RER]: 0.0001188 kg; lognormal SD95 1.2229
  (2,3,1,2,1,5,BU:1.05); etha+ project Alcosuisse, SSCF technology from NREL
- Chemicals organic, at plant [GLO]: 1.7022e-5 kg; lognormal SD95 1.2229
  (2,3,1,2,1,5,BU:1.05); etha+ project Alcosuisse, SSCF technology from NREL
- Transport, freight, lorry, fleet average [RER]: 0.032861 tkm; lognormal SD95 2.0547
  (2,3,1,2,1,5,BU:2); etha+ project Alcosuisse, SSCF technology from NREL
- Sodium chloride, powder, at plant [RER]: 5.4777e-6 kg; lognormal SD95 1.3241
  (same comment as for Disposal, used mineral oil, 10% water, to hazardous waste incineration)
- Maize starch, at plant [DE]: 0.0018819 kg; lognormal SD95 1.2229
  (2,3,1,2,1,5,BU:1.05); etha+ project Alcosuisse, SSCF technology from NREL
- Cogen unit 6400kWth, wood burning, components for electricity only [CH]: 1.2933e-9 p; lognormal SD95 3.1045
  (same comment as for Cogen unit 6400kWth, wood burning, common components for heat+electric)
- Ammonium sulphate, as N, at regional storehouse [RER]: 8.4215e-5 kg; lognormal SD95 1.2229
  (2,3,1,2,1,5,BU:1.05); etha+ project Alcosuisse, SSCF technology from NREL
- Urea, as N, at regional storehouse [RER]: 3.5806e-5 kg; lognormal SD95 1.3241
  (same comment as for Disposal, used mineral oil, 10% water, to hazardous waste incineration)
- Calcium chloride, CaCl2, at regional storage [CH]: 8.5464e-5 kg; lognormal SD95 1.2229
  (2,3,1,2,1,5,BU:1.05); etha+ project Alcosuisse, SSCF technology from NREL
- Wood chips, softwood, wet, measured as dry mass, at sawmill [RER]: 0.2909 kg

## Emissions to nature
- Bromine [emissions to air, high. pop.]: 8.0164e-8 kg; lognormal SD95 5.1193
  (4,4,2,1,1,5,BU:5); adapted from the dataset 'wood chips, in cogen 6400kWth, wood, emission control', according to actual water, carbon and energy content of the fuel (unconverted solids, mainly lignin)
- Benzene, hexachloro- [emissions to air, high. pop.]: 1.0418e-14 kg; lognormal SD95 3.1045
  (same comment as for Cogen unit 6400kWth, wood burning, common components for heat+electric)
- Benzene [emissions to air, high. pop.]: 1.3167e-6 kg; lognormal SD95 1.6336
  (4,4,2,1,1,5,BU:1.5); adapted from the dataset 'wood chips, in cogen 6400kWth, wood, emission control', according to actual water, carbon and energy content of the fuel (unconverted solids, mainly lignin)
- Fluorine [emissions to air, high. pop.]: 6.6802e-8 kg; lognormal SD95 1.6336
  (same comment as for Benzene)
- Nickel [emissions to air, high. pop.]: 8.0164e-9 kg; lognormal SD95 5.1193
  (same comment as for Bromine)
- Formaldehyde [emissions to air, high. pop.]: 1.881e-7 kg; lognormal SD95 1.6336
  (same comment as for Benzene)
- Benzene, ethyl- [emissions to air, high. pop.]: 4.3408e-8 kg; lognormal SD95 1.6336
  (same comment as for Benzene)
- Phosphorus [emissions to air, high. pop.]: 4.0082e-7 kg; lognormal SD95 1.6336
  (same comment as for Benzene)
- Nitrogen oxides [emissions to air, high. pop.]: 5.8788e-5 kg; lognormal SD95 1.6336
  (same comment as for Benzene)
- Sodium [emissions to air, high. pop.]: 1.7369e-6 kg; lognormal SD95 5.1193
  (same comment as for Bromine)
- Acetaldehyde [emissions to air, high. pop.]: 8.1501e-8 kg; lognormal SD95 1.6336
  (same comment as for Benzene)
- Methane, biogenic [emissions to air, high. pop.]: 6.2795e-7 kg; lognormal SD95 1.6336
  (same comment as for Benzene)
- m-Xylene [emissions to air, high. pop.]: 1.7363e-7 kg; lognormal SD95 1.6336
  (same comment as for Benzene)
- Carbon dioxide, biogenic [emissions to air, high. pop.]: 0.3664 kg; lognormal SD95 1.05
  (1,1,1,1,1,1,BU:1.05); to close carbon cycle
- Sulfur dioxide [emissions to air, high. pop.]: 3.3268e-6 kg; lognormal SD95 1.3241
  (same comment as for Disposal, used mineral oil, 10% water, to hazardous waste incineration)
- Chromium [emissions to air, high. pop.]: 5.2911e-9 kg; lognormal SD95 5.1193
  (same comment as for Bromine)
- Hydrocarbons, aliphatic, alkanes, unspecified [emissions to air, high. pop.]: 1.3167e-6 kg; lognormal SD95 1.6336
  (same comment as for Benzene)
- Carbon monoxide, biogenic [emissions to air, high. pop.]: 1.0129e-5 kg; lognormal SD95 5.1193
  (same comment as for Bromine)
- Chlorine [emissions to air, high. pop.]: 2.4049e-7 kg; lognormal SD95 1.6336
  (same comment as for Benzene)
- Heat, waste [emissions to air, high. pop.]: 1.43808 MJ; lognormal SD95 1.1376
  (2,4,1,3,1,3,BU:1.05); calculation from electricity consumption and energy balance
- Magnesium [emissions to air, high. pop.]: 4.8232e-7 kg; lognormal SD95 5.1193
  (same comment as for Bromine)
- Copper [emissions to air, high. pop.]: 2.9393e-8 kg; lognormal SD95 5.1193
  (same comment as for Bromine)
- Calcium [emissions to air, high. pop.]: 7.8161e-6 kg; lognormal SD95 5.1193
  (same comment as for Bromine)
- NMVOC, non-methane volatile organic compounds, unspecified origin [emissions to air, high. pop.]: 8.8261e-7 kg; lognormal SD95 1.6336
  (same comment as for Benzene)
- Chromium VI [emissions to air, high. pop.]: 5.3444e-11 kg; lognormal SD95 5.1193
  (same comment as for Bromine)
- Potassium [emissions to air, high. pop.]: 3.1264e-5 kg; lognormal SD95 5.1193
  (same comment as for Bromine)
- Particulates, < 2.5 um [emissions to air, high. pop.]: 7.2343e-6 kg; lognormal SD95 3.1045
  (same comment as for Cogen unit 6400kWth, wood burning, common components for heat+electric)
- Hydrocarbons, aliphatic, unsaturated [emissions to air, high. pop.]: 4.4856e-6 kg; lognormal SD95 1.6336
  (same comment as for Benzene)
- Arsenic [emissions to air, high. pop.]: 1.3361e-9 kg; lognormal SD95 5.1193
  (same comment as for Bromine)
- Benzo(a)pyrene [emissions to air, high. pop.]: 7.2343e-10 kg; lognormal SD95 3.1045
  (same comment as for Cogen unit 6400kWth, wood burning, common components for heat+electric)
- Ammonia [emissions to air, high. pop.]: 2.2713e-5 kg; lognormal SD95 1.3926
  (4,4,2,1,1,5,BU:1.2); adapted from the dataset 'wood chips, in cogen 6400kWth, wood, emission control', according to actual water, carbon and energy content of the fuel (unconverted solids, mainly lignin)
- Dioxin, 2,3,7,8 Tetrachlorodibenzo-p- [emissions to air, high. pop.]: 4.4856e-14 kg; lognormal SD95 3.1045
  (same comment as for Cogen unit 6400kWth, wood burning, common components for heat+electric)
- PAH, polycyclic aromatic hydrocarbons [emissions to air, high. pop.]: 1.5916e-8 kg; lognormal SD95 3.1045
  (same comment as for Cogen unit 6400kWth, wood burning, common components for heat+electric)
- Manganese [emissions to air, high. pop.]: 2.2846e-7 kg; lognormal SD95 5.1193
  (same comment as for Bromine)
- Mercury [emissions to air, high. pop.]: 4.0082e-10 kg; lognormal SD95 5.1193
  (same comment as for Bromine)
- Toluene [emissions to air, high. pop.]: 4.3408e-7 kg; lognormal SD95 1.6336
  (same comment as for Benzene)
- Phenol, pentachloro- [emissions to air, high. pop.]: 1.1721e-11 kg; lognormal SD95 1.6336
  (same comment as for Benzene)
- Zinc [emissions to air, high. pop.]: 4.0082e-7 kg; lognormal SD95 5.1193
  (same comment as for Bromine)
- Lead [emissions to air, high. pop.]: 3.3268e-8 kg; lognormal SD95 5.1193
  (same comment as for Bromine)
- Cadmium [emissions to air, high. pop.]: 9.3526e-10 kg; lognormal SD95 5.1193
  (same comment as for Bromine)
- Dinitrogen monoxide [emissions to air, high. pop.]: 2.9393e-5 kg; lognormal SD95 1.6336
  (same comment as for Benzene)

## Extrapolations
Literature data.

## Sources
- Althaus H.-J., Bauer C., Doka G., Frischknecht R., Jungbluth N., Nemecek T., Simons A., Stucki M., Sutter J., Tuchschmid M., 2010, 2010 - Changes in ecoinvent v2.1 and v2.2 - Althaus, Final report ecoinvent data v2.2, 16, Swiss Centre for LCI, Duebendorf and St. Gallen, CH
Hischier, R., Althaus H.-J., Bauer, Chr., Büsser S., Doka, G., Frischknecht R., Kleijer A., Leuenberger M., Nemecek, T., Simons A. (2010) Documentation of changes implemented in ecoinvent Data v2.2. Final report ecoinvent data v2.2. Volume: 16. Swiss Centre for LCI. Dübendorf. CH.
Type: Measurement on site
Source: CD-ROM
First author: Hischier, R.
Other authors: Althaus H.-J., Bauer, Chr., Büsser S., Doka, G., Frischknecht R., Kleijer A., Leuenberger M., Nemecek, T., Simons A.
Year: 2010
Title of anthology: Final report ecoinvent data v2.2
Place of publication: Dübendorf. CH
Publisher: Swiss Centre for LCI
Volume No: 16

## Validation
Proof reading validation: passed.; Other validation: none;
