# Rape seed conventional, at farm

Dataset: EcoSpold 1, unit process
Functional unit: 1 kg
Category: agricultural / plant production
Geography: DE
Time period: 2000-01 to 2000-12
Production volume: Total production in Germany is around 416000 tons.
Share of production covered: 100 %
Generated by: Juergen Sutter
accessRestrictedTo: 0
copyright: true

## General comment
The inventory for the cultivation of rape in Germany is modelled with data from literature.;

## Included processes
Cultivation of rape in Germany including use of diesel, machines, fertilizers, and pesticides.

## Technology
Conventional production

## Time period
Time of publications. Data for the fertilizers products and the transport distance to the farm are from 1996. Data for the pesticide use are from 2001. Data for the yield and lkand use are from 2006.

## Reference product
- Rape seed conventional, at farm [DE]: 1 kg
  GERMANY

## Inputs from technosphere
- Grain drying, low temperature [CH]: 0.068182 kg; lognormal SD95 1.0907
  (1,3,1,3,1,3); Nemecel 2004
- Ammonium nitrate phosphate, as N, at regional storehouse [RER]: 0.0045852 kg; lognormal SD95 1.0744
  (1,3,1,1,1,2); KTBL 2004
- Pyretroid-compounds, at regional storehouse [CH]: 2.4666e-5 kg; lognormal SD95 1.0714
  (1,3,1,1,1,1); Rossberg 2003
- Calcium ammonium nitrate, as N, at regional storehouse [RER]: 0.041732 kg; lognormal SD95 1.0744
  (1,3,1,1,1,2); KTBL 2004
- Triple superphosphate, as P2O5, at regional storehouse [RER]: 0.015165 kg; lognormal SD95 1.0744
  (1,3,1,1,1,2); KTBL 2004
- Sowing [CH]: 0.00021829 ha; lognormal SD95 1.0744
  (1,3,1,1,1,2); KTBL 2004
- Single superphosphate, as P2O5, at regional storehouse [RER]: 0.0050551 kg; lognormal SD95 1.0744
  (1,3,1,1,1,2); KTBL 2004
- Transport, freight, lorry, 16t-32t gross weight, fleet average [CH]: 0.05053 tkm; lognormal SD95 2.095
  (4,5,na,na,na,na); Nemecel 2004
- Pesticide unspecified, at regional storehouse [RER]: 0.00021202 kg; lognormal SD95 1.0714
  (1,3,1,1,1,1); Rossberg 2003
- Fertilising, by broadcaster [CH]: 0.00031765 ha; lognormal SD95 1.0744
  (1,3,1,1,1,2); KTBL 2004
- Combine harvesting [CH]: 0.00014514 ha; lognormal SD95 1.0744
  (1,3,1,1,1,2); KTBL 2004
- Potassium nitrate, as K2O, at regional storehouse [RER]: 0.041122 kg; lognormal SD95 1.0744
  (1,3,1,1,1,2); KTBL 2004
- Tillage, cultivating, chiselling [CH]: 0.00026362 ha; lognormal SD95 1.0744
  (1,3,1,1,1,2); KTBL 2004
- Application of plant protection products, by field sprayer [CH]: 0.00063276 ha; lognormal SD95 1.0744
  (1,3,1,1,1,2); KTBL 2004
- Dinitroaniline-compounds, at regional storehouse [RER]: 3.433e-5 kg; lognormal SD95 1.0714
  (1,3,1,1,1,1); Rossberg 2003
- Transport, barge [RER]: 0.28581 tkm; lognormal SD95 2.095
  (4,5,na,na,na,na); Standard Distances
- Benzimidazole-compounds, at regional storehouse [RER]: 9.0776e-6 kg; lognormal SD95 1.0714
  (1,3,1,1,1,1); Rossberg 2003
- Lime, from carbonation, at regional storehouse [CH]: 0.293 kg; lognormal SD95 1.0744
  (1,3,1,1,1,2); KTBL 2004
- Transport, freight, lorry, fleet average [CH]: 0.015025 tkm; lognormal SD95 2.095
  (4,5,na,na,na,na); Standard Distances
- Diammonium phosphate, as N, at regional storehouse [RER]: 0.0045852 kg; lognormal SD95 1.0744
  (1,3,1,1,1,2); KTBL 2004
- Rape seed IP, at regional storehouse [CH]: 0.0010255 kg; lognormal SD95 1.0752
  (1,3,1,2,1,2); Nemecek 2004
- Transport, freight, rail [RER]: 0.05053 tkm; lognormal SD95 2.095
  (4,5,na,na,na,na); Standard Distances
- Ammonium nitrate phosphate, as P2O5, at regional storehouse [RER]: 0.0076894 kg; lognormal SD95 1.0744
  (1,3,1,1,1,2); KTBL 2004
- Glyphosate, at regional storehouse [RER]: 8.1158e-6 kg; lognormal SD95 1.0714
  (1,3,1,1,1,1); Rossberg 2003
- Urea, as N, at regional storehouse [RER]: 0.0068445 kg; lognormal SD95 1.0744
  (1,3,1,1,1,2); KTBL 2004
- Tillage, ploughing [CH]: 0.00022896 ha; lognormal SD95 1.0744
  (1,3,1,1,1,2); KTBL 2004
- Ammonium nitrate, as N, at regional storehouse [RER]: 0.0086387 kg; lognormal SD95 1.0744
  (1,3,1,1,1,2); KTBL 2004
- Tillage, harrowing, by spring tine harrow [CH]: 0.00066282 ha; lognormal SD95 1.0744
  (1,3,1,1,1,2); KTBL 2004
- Cyclic N-compounds, at regional storehouse [RER]: 2.3088e-5 kg; lognormal SD95 1.0714
  (1,3,1,1,1,1); Rossberg 2003
- Diammonium phosphate, as P2O5, at regional storehouse [RER]: 0.0076894 kg; lognormal SD95 1.0744
  (1,3,1,1,1,2); KTBL 2004
- Phenoxy-compounds, at regional storehouse [RER]: 5.0806e-6 kg; lognormal SD95 1.0714
  (1,3,1,1,1,1); Rossberg 2003
- Diphenylether-compounds, at regional storehouse [RER]: 1.0761e-5 kg; lognormal SD95 1.0714
  (1,3,1,1,1,1); Rossberg 2003
- Potassium chloride, as K2O, at regional storehouse [RER]: 0.037958 kg; lognormal SD95 1.0744
  (1,3,1,1,1,2); KTBL 2004

## Inputs from nature
- Energy, gross calorific value, in biomass [resources, biotic]: 27.824 MJ; lognormal SD95 1.2423
  (4,3,1,1,1,4); calculated from the energy balance
- Transformation, from pasture, man made [resources, land]: 0.84969 m2; lognormal SD95 1.2
  (1,1,1,1,1,1); Statistics 2001-2005
- Transformation, from arable, non-irrigated, diverse-intensive [resources, land]: 2.0803 m2; lognormal SD95 1.2
  (1,1,1,1,1,1); Statistics 2001-2005
- Occupation, annual crop, non-irrigated, diverse-intensive [resources, land]: 2.6858 m2a; lognormal SD95 1.1
  (1,1,1,1,1,1); Statistics 2001-2005
- Transformation, to arable, non-irrigated, diverse-intensive [resources, land]: 2.93 m2; lognormal SD95 1.2
  (1,1,1,1,1,1); Statistics 2001-2005
- Carbon dioxide, in air [resources, in air]: 2.6856 kg; lognormal SD95 1.2423
  (4,3,1,1,1,4); calculated from the carbon balance

## Emissions to nature
- Ammonia [emissions to air, low. pop.]: 0.0024009 kg; lognormal SD95 1.3221
  (4,3,1,1,1,4); Calculated with standard method
- 2,4-D [emissions to soil, agricultural]: 5.0806e-6 kg; lognormal SD95 1.3221
  (4,3,1,1,1,4); Calculated from the pesticide application
- Metazachlor [emissions to soil, agricultural]: 0.00013916 kg; lognormal SD95 1.3221
  (4,3,1,1,1,4); Calculated from the pesticide application
- Trinexapac-ethyl [emissions to soil, agricultural]: 1.8733e-7 kg; lognormal SD95 1.3221
  (4,3,1,1,1,4); Calculated from the pesticide application
- Lead [emissions to soil, agricultural]: 2.7818e-6 kg; lognormal SD95 1.5798
  (4,3,1,1,1,4); Calculated from the fertilizer input
- Tebuconazole [emissions to soil, agricultural]: 1.6298e-5 kg; lognormal SD95 1.3221
  (4,3,1,1,1,4); Calculated from the pesticide application
- Trifluralin [emissions to soil, agricultural]: 2.3897e-5 kg; lognormal SD95 1.3221
  (4,3,1,1,1,4); Calculated from the pesticide application
- Copper [emissions to soil, agricultural]: 3.1003e-6 kg; lognormal SD95 1.5798
  (4,3,1,1,1,4); Calculated from the fertilizer input
- Glyphosate [emissions to soil, agricultural]: 4.1128e-5 kg; lognormal SD95 1.3221
  (4,3,1,1,1,4); Calculated from the pesticide application
- Prochloraz [emissions to soil, agricultural]: 1.3987e-6 kg; lognormal SD95 1.3221
  (4,3,1,1,1,4); Calculated from the pesticide application
- Lambda-cyhalothrin [emissions to soil, agricultural]: 3.7656e-7 kg; lognormal SD95 1.3221
  (4,3,1,1,1,4); Calculated from the pesticide application
- Nickel [emissions to soil, agricultural]: 2.9106e-6 kg; lognormal SD95 1.5798
  (4,3,1,1,1,4); Calculated from the fertilizer input
- Zinc [emissions to soil, agricultural]: 6.8651e-5 kg; lognormal SD95 1.5798
  (4,3,1,1,1,4); Calculated from the fertilizer input
- Phosphorus [emissions to water, groundwater]: 2.051e-5 kg; lognormal SD95 1.5798
  (4,3,1,1,1,4); Calculated with standard method
- Propaquizafop [emissions to soil, agricultural]: 7.5198e-6 kg; lognormal SD95 1.3221
  (4,3,1,1,1,4); Calculated from the pesticide application
- Phosphorus [emissions to water, river]: 0.00011916 kg; lognormal SD95 1.5798
  (4,3,1,1,1,4); Calculated with standard method
- Napropamide [emissions to soil, agricultural]: 1.0433e-5 kg; lognormal SD95 1.3221
  (4,3,1,1,1,4); Calculated from the pesticide application
- Chromium [emissions to soil, agricultural]: 1.1954e-5 kg; lognormal SD95 1.5798
  (4,3,1,1,1,4); Calculated from the fertilizer input
- Dinitrogen monoxide [emissions to air, low. pop.]: 0.0016932 kg; lognormal SD95 1.5798
  (4,3,1,1,1,4); Calculated with standard method
- Chlormequat [emissions to soil, agricultural]: 3.7669e-5 kg; lognormal SD95 1.3221
  (4,3,1,1,1,4); Calculated from the pesticide application
- Fluazifop-P-butyl [emissions to soil, agricultural]: 3.2413e-6 kg; lognormal SD95 1.3221
  (4,3,1,1,1,4); Calculated from the pesticide application
- Deltamethrin [emissions to soil, agricultural]: 5.3794e-7 kg; lognormal SD95 1.3221
  (4,3,1,1,1,4); Calculated from the pesticide application
- Cypermethrin [emissions to soil, agricultural]: 2.5744e-5 kg; lognormal SD95 1.3221
  (4,3,1,1,1,4); Calculated from the pesticide application
- Carbendazim [emissions to soil, agricultural]: 9.0776e-6 kg; lognormal SD95 1.3221
  (4,3,1,1,1,4); Calculated from the pesticide application
- Nitrate [emissions to water, groundwater]: 0.034535 kg; lognormal SD95 1.5798
  (4,3,1,1,1,4); Calculated with standard method
- Cadmium [emissions to soil, agricultural]: 5.2941e-7 kg; lognormal SD95 1.5798
  (4,3,1,1,1,4); Calculated from the fertilizer input
- Nitrogen oxides [emissions to air, low. pop.]: 0.00035557 kg; lognormal SD95 1.5798
  (4,3,1,1,1,4); Calculated with standard method
- Clomazone [emissions to soil, agricultural]: 3.1739e-7 kg; lognormal SD95 1.3221
  (4,3,1,1,1,4); Calculated from the pesticide application
- Metconazole [emissions to soil, agricultural]: 5.0746e-6 kg; lognormal SD95 1.3221
  (4,3,1,1,1,4); Calculated from the pesticide application
- Carbon dioxide, fossil [emissions to air, low. pop.]: 0.010746 kg; lognormal SD95 1.2423
  (4,3,1,1,1,4); Calculated with standard method

## Sampling procedure
Literature data

## Extrapolations
Transports are modelled with standard distances. Emissions are calculated with standard methods.

## Sources
- Jungbluth N., Chudacoff M., Dauriat A., Dinkel F., Doka G., Faist Emmenegger M., Gnansounou E., Kljun N., Spielmann M., Stettler C., Sutter J., 2007, 2007 - LCI bioenergy - Jungbluth, Final report ecoinvent data v2.0, 17, Swiss Centre for LCI, ESU-services Ltd., Duebendorf and Uster, CH
Jungbluth N., Chudacoff M., Dauriat A., Dinkel F., Doka G., Faist Emmenegger M., Gnansounou E., Kljun N., Spielmann M., Stettler C., Sutter J. (2007) Life Cycle Inventories of Bioenergy. Final report ecoinvent data v2.0. Volume: 17. Swiss Centre for LCI, ESU. Duebendorf and Uster, CH.
Type: Measurement on site
Source: CD-ROM
First author: Jungbluth N.
Other authors: Chudacoff M., Dauriat A., Dinkel F., Doka G., Faist Emmenegger M., Gnansounou E., Kljun N., Spielmann M., Stettler C., Sutter J.
Year: 2007
Title of anthology: Final report ecoinvent data v2.0
Place of publication: Duebendorf and Uster, CH
Publisher: Swiss Centre for LCI, ESU
Volume No: 17

## Validation
Proof reading validation: passed.; Other validation: none;
