# xx Copper, from combined metal production, at refinery

Dataset: EcoSpold 1, unit process
Functional unit: 1 kg
Category: material, obsolete / metals, obsolete\non ferro, obsolete
Geography: SE
Time period: 2002-01 to 2006-12
Production volume: >2.36E+5 t of metals
Generated by: Mireille Faist Emmenegger
accessRestrictedTo: 0
copyright: true

## General comment
The multi-output process "refining, copper-zinc-lead-gold-silver in smelter" delivers the five co-products "copper/zinc/lead/gold/silver from combined metal production, at refinery". This data set describes the raffination of gold and silver in a Swedish smelter. Allocation is based on economic value.;

## Included processes
This data set includes the extraction of metals and by products from concentrates and recycled raw materials. It includes energy and water consumption, concentrate inputs, transports, waste disposal, infrastructure use as well as emissions into air and water.

## Geography
Energy use and emissions are from Swedish mines.

## Technology
modern swedish refinement plant

## Time period
Period of public environmental report

## Reference product
- xx Copper, from combined metal production, at refinery [SE]: 1 kg
  SWEDEN

## Inputs from technosphere
- Charcoal, at plant [GLO]: 0.22243 kg; lognormal SD95 1.1267
  (1,4,1,3,1,3); Environmental report, Boliden 2006
- Disposal, sulfidic tailings, off-site [GLO]: 0.00090514 kg; lognormal SD95 1.1267
  (1,4,1,3,1,3); Environmental report, Boliden 2006
- Disposal, paper, 11.2% water, to municipal incineration [CH]: 2.4945e-5 kg; lognormal SD95 1.1267
  (1,4,1,3,1,3); Environmental report, Boliden 2006
- Heavy fuel oil, burned in industrial furnace 1MW, non-modulating [RER]: 1.86147 MJ; lognormal SD95 1.1267
  (1,4,1,3,1,3); Environmental report, Boliden 2004 / 2006
- Limestone, milled, packed, at plant [CH]: 0.0093871 kg; lognormal SD95 1.1267
  (1,4,1,3,1,3); Environmental report, Boliden 2006
- Disposal, municipal solid waste, 22.9% water, to municipal incineration [CH]: 0.00074834 kg; lognormal SD95 1.1267
  (1,4,1,3,1,3); Environmental report, Boliden 2006
- Facilities precious metal refinery [SE]: 3.2615e-10 p; lognormal SD95 3.5473
  (5,5,2,2,4,5); Rough Estimation
- Transport, freight, rail [RER]: 0.11343 tkm; lognormal SD95 2.095
  (4,5,na,na,na,na); Estimation
- Disposal, wood untreated, 20% water, to municipal incineration [CH]: 0.0016927 kg; lognormal SD95 1.1267
  (1,4,1,3,1,3); Environmental report, Boliden 2006
- Transport, freight, lorry, fleet average [RER]: 0.11343 tkm; lognormal SD95 2.095
  (4,5,na,na,na,na); Estimation
- Facilities anode refinery, secondary copper [SE]: 1.1566e-10 p; lognormal SD95 3.5473
  (5,5,2,2,4,5); Rough Estimation
- Sodium hydroxide, 50% in H2O, production mix, at plant [RER]: 0.093871 kg; lognormal SD95 1.1267
  (1,4,1,3,1,3); Environmental report, Boliden 2006
- Disposal, refinery sludge, 89.5% water, to hazardous waste incineration [CH]: 0.00080179 kg; lognormal SD95 1.1267
  (1,4,1,3,1,3); Environmental report, Boliden 2006
- Natural gas, burned in industrial furnace 1MWth [CH]: 0.073436 MJ; lognormal SD95 1.1267
  (1,4,1,3,1,3); Environmental report, Boliden 2004 / 2006
- Copper, from combined metal production, at beneficiation [SE]: 1 kg; lognormal SD95 1.1267
  (1,4,1,3,1,3); Environmental report
- Disposal, packaging cardboard, 19.6% water, to municipal incineration [CH]: 0.0001568 kg; lognormal SD95 1.1267
  (1,4,1,3,1,3); Environmental report, Boliden 2006
- Electricity, medium voltage, at grid [SE]: 2.45302 kWh; lognormal SD95 1.1267
  (1,4,1,3,1,3); Environmental report, Boliden 2004 / 2006
- Oxygen, liquid, at plant [RER]: 0.40411 kg; lognormal SD95 1.1267
  (1,4,1,3,1,3); Environmental report, Boliden 2004 / 2006
- Ammonia, liquid, at regional storehouse [RER]: 0.0069385 kg; lognormal SD95 1.1267
  (1,4,1,3,1,3); Environmental report, Boliden 2006

## Emissions to nature
- Particulates, > 10 um [emissions to air, low. pop.]: 1.0423e-5 kg; lognormal SD95 1.5217
  (1,4,1,3,1,3); Calculation based on environmental report, Boliden 2004
- Particulates, > 2.5 um, and < 10um [emissions to air, low. pop.]: 1.3028e-5 kg; lognormal SD95 2.0171
  (1,4,1,3,1,3); Calculation based on environmental report, Boliden 2004
- Nickel [emissions to water, ocean]: 6.7706e-7 kg; lognormal SD95 5.0184
  (1,4,1,3,1,3); Environmental report, Boliden 2006
- Arsenic [emissions to air, low. pop.]: 8.1962e-7 kg; lognormal SD95 5.0184
  (1,4,1,3,1,3); Environmental report, Boliden 2006
- Copper [emissions to air, low. pop.]: 4.9888e-6 kg; lognormal SD95 5.0184
  (1,4,1,3,1,3); Environmental report, Boliden 2006
- Copper [emissions to water, ocean]: 1.6749e-6 kg; lognormal SD95 3.0162
  (1,4,1,3,1,3); Environmental report, Boliden 2006
- Mercury [emissions to air, low. pop.]: 4.6326e-7 kg; lognormal SD95 5.0184
  (1,4,1,3,1,3); Environmental report, Boliden 2006
- Arsenic [emissions to water, ocean]: 4.2763e-6 kg; lognormal SD95 5.0184
  (1,4,1,3,1,3); Environmental report, Boliden 2006
- Particulates, < 2.5 um [emissions to air, low. pop.]: 0.00010683 kg; lognormal SD95 3.0162
  (1,4,1,3,1,3); Calculation based on environmental report, Boliden 2004
- Lead [emissions to water, ocean]: 1.8174e-6 kg; lognormal SD95 5.0184
  (1,4,1,3,1,3); Environmental report, Boliden 2006
- Dioxin, 2,3,7,8 Tetrachlorodibenzo-p- [emissions to air, low. pop.]: 7.8401e-12 kg; lognormal SD95 3.0162
  (1,4,1,3,1,3); Environmental report, Boliden 2006
- Lead [emissions to air, low. pop.]: 0.00012116 kg; lognormal SD95 5.0184
  (1,4,1,3,1,3); Environmental report, Boliden 2006
- Cadmium [emissions to air, low. pop.]: 2.4945e-7 kg; lognormal SD95 5.0184
  (1,4,1,3,1,3); Environmental report, Boliden 2006
- Zinc [emissions to water, ocean]: 8.5524e-6 kg; lognormal SD95 5.0184
  (1,4,1,3,1,3); Environmental report, Boliden 2006
- Mercury [emissions to water, ocean]: 4.9888e-7 kg; lognormal SD95 5.0184
  (1,4,1,3,1,3); Environmental report, Boliden 2006
- Zinc [emissions to air, low. pop.]: 1.8174e-5 kg; lognormal SD95 5.0184
  (1,4,1,3,1,3); Environmental report, Boliden 2006
- Heat, waste [emissions to air, low. pop.]: 7.73593 MJ; lognormal SD95 1.1267
  (1,4,1,3,1,3); Calculation
- Cadmium [emissions to water, ocean]: 2.1382e-7 kg; lognormal SD95 3.0162
  (1,4,1,3,1,3); Environmental report, Boliden 2006

## Sampling procedure
environmental report

## Sources
- Classen M., Althaus H.-J., Blaser S., Scharnhorst W., Tuchschmid M., Jungbluth N., Faist Emmenegger M., 2009, 2009 - LCI metals - Classen, Final report ecoinvent data v2.1, 10, Swiss Centre for LCI, Empa, ESU-services Ltd., Duebendorf, CH
Classen M., Althaus H.-J., Blaser S., Doka G., Jungbluth N., Tuchschmid M. (2008) Life Cycle Inventories of Metals. Final report ecoinvent data v2.1. Volume: 10. Issue: 0. Swiss Centre for LCI, Empa - TSL. Dübendorf, CH.
Type: Measurement on site
Source: CD-ROM
First author: Classen M.
Other authors: Althaus H.-J., Blaser S., Doka G., Jungbluth N., Tuchschmid M.
Year: 2008
Title of anthology: Final report ecoinvent data v2.1
Place of publication: Dübendorf, CH
Publisher: Swiss Centre for LCI, Empa - TSL
Volume No: 10
Issue No: 0

## Validation
Proof reading validation: passed; Other validation: none;
