# Photovoltaic panel, CIS, Sto, Ventec Artline invisible, at plant

Dataset: EcoSpold 1, unit process, infrastructure
Functional unit: 1 m2
Category: photovoltaic / production of components
Geography: DE
Time period: 2018-01 to 2020-12
Generated by: Luana Krebs
accessRestrictedTo: 0
copyright: true

## General comment
Production of photovoltaic thin film modules by thermal vaporization in vacuum. The modules produced at NICE Solar Energy have a size of 0.72m2. The weight is 18.5kg/m2. The specific maximum power is 95 Wp/m2.;
Synonyms: Solarmodul, PV-module, copper indium selenide, thin film, CIGS;

## Included processes
Electricity use, materials, transport of materials, treatment of production wastes. Disposal after end of life.

## Time period
Time of publication.

## Reference product
- Photovoltaic panel, CIS, Sto, Ventec Artline invisible, at plant [DE]: 1 m2
  GERMANY

## Inputs from technosphere
- Photovoltaic panel factory [GLO]: 4e-6 p; lognormal SD95 3.0162
  (1,4,1,3,1,3); Assumption
- Disposal, waste, Si waferprod., inorg, 9.4% water, to residual material landfill [CH]: 0.0202 kg; lognormal SD95 1.2423
  (3,1,1,1,3,3); company information, amount of deposited waste, own estimation for type
- Aluminium, production mix, at plant [RER]: 0.0444 kg; lognormal SD95 1.0714
  (1,1,1,1,1,3); de Wild-Scholten (2014) Life Cycle Assessment of Photovoltaics Status 2011, Part 1 Data Collection (Table 46)
- Tempering, flat glass [RER]: 10 kg; lognormal SD95 1.0714
  (1,1,1,1,1,3); Assumption
- Disposal, glass, 0% water, to municipal incineration [CH]: 4.6415 kg; lognormal SD95 1.0714
  (same comment as for Aluminium, production mix, at plant)
- Polyvinylbutyral foil, at plant [RER]: 1.025 kg; lognormal SD95 1.0714
  (1,1,1,1,1,3); data provided by Sto, 2019
- Sulphuric acid, liquid, at plant [RER]: 0.0331 kg; lognormal SD95 1.0714
  (same comment as for Aluminium, production mix, at plant)
- Polyethylene terephthalate, granulate, amorphous, at plant [RER]: 0.336 kg; lognormal SD95 1.0714
  (same comment as for Aluminium, production mix, at plant)
- Hydrogen peroxide, 50% in H2O, at plant [RER]: 0.0231 kg; lognormal SD95 1.0714
  (same comment as for Aluminium, production mix, at plant)
- Transport, freight, lorry, fleet average [RER]: 3.6151 tkm; lognormal SD95 2.095
  (4,5,na,na,na,na); Standard distance 100km
- Cadmium sulphide, semiconductor-grade, at plant [US]: 0.000269 kg; lognormal SD95 1.0714
  (same comment as for Aluminium, production mix, at plant)
- Flat glass, uncoated, at plant [RER]: 7.5 kg; lognormal SD95 1.0714
  (1,1,1,1,1,3); data provided by Sto, 2019
- Selenium, at plant [RER]: 0.0056 kg; lognormal SD95 1.1308
  (3,2,2,1,1,3); company information and assumption for share of metals
- Flux, wave soldering, at plant [GLO]: 0.0123 kg; lognormal SD95 1.0714
  (same comment as for Aluminium, production mix, at plant)
- Tin, at regional storage [RER]: 0.0123 kg; lognormal SD95 1.1308
  (3,2,2,1,1,3); company information and assumption for share of metals
- Indium, at regional storage [RER]: 0.00282 kg; lognormal SD95 1.1308
  (3,2,2,1,1,3); company information and assumption for share of metals
- Nitrogen, liquid, at plant [RER]: 15.7 kg; lognormal SD95 1.0714
  (1,1,1,1,1,3); protection gas, company information
- EUR-flat pallet [RER]: 0.05 p; lognormal SD95 1.0714
  (same comment as for Aluminium, production mix, at plant)
- Diode, unspecified, at plant [GLO]: 0.00144 kg; lognormal SD95 1.0714
  (same comment as for Aluminium, production mix, at plant)
- Silicone product, at plant [RER]: 0.404 kg; lognormal SD95 1.0714
  (1,1,1,1,1,3); company information; Kleber
- Ammonia, liquid, at regional storehouse [RER]: 0.0929 kg; lognormal SD95 1.0714
  (1,1,1,1,1,3); dip coating for CdS, company information
- Argon, liquid, at plant [RER]: 0.019 kg; lognormal SD95 1.0714
  (1,1,1,1,1,3); protection gas, company information
- Urea, as N, at regional storehouse [RER]: 0.00115 kg; lognormal SD95 1.1635
  (3,1,3,1,1,3); dip coating for CdS, Ampenberg 1998
- Copper, at regional storage [RER]: 0.00977 kg; lognormal SD95 1.0714
  (1,1,1,1,1,3); company information
- Zinc oxide, at plant [RER]: 0.00909 kg; lognormal SD95 1.0714
  (same comment as for Aluminium, production mix, at plant)
- Wire drawing, copper [RER]: 0.00977 kg; lognormal SD95 1.0714
  (same comment as for Aluminium, production mix, at plant)
- Polyethylene, HDPE, granulate, at plant [RER]: 0.0484 kg; lognormal SD95 1.0714
  (same comment as for Aluminium, production mix, at plant)
- Disposal, plastics, mixture, 15.3% water, to municipal incineration [CH]: 1.8126 kg; lognormal SD95 1.0714
  (1,1,1,1,1,3); Calculation for plastic parts burned after recycling
- Glass fibre reinforced plastic, polyamide, injection moulding, at plant [RER]: 0.04 kg; lognormal SD95 1.0714
  (1,1,1,1,1,3); Raugei, literature
- Hydrogen sulphide, H2S, at plant [RER]: 0.191 kg; lognormal SD95 1.0714
  (same comment as for Aluminium, production mix, at plant)
- Sodium hydroxide, 50% in H2O, production mix, at plant [RER]: 0.0334 kg; lognormal SD95 1.0714
  (same comment as for Aluminium, production mix, at plant)
- Molybdenum, at regional storage [RER]: 0.00606 kg; lognormal SD95 1.1308
  (3,2,2,1,1,3); company information and assumption for share of metals
- Diborane, at plant [GLO]: 0.000201 kg; lognormal SD95 1.0714
  (same comment as for Aluminium, production mix, at plant)
- Tap water, at user [RER]: 131 kg; lognormal SD95 1.0714
  (1,1,1,1,1,3); company information
- Butyl acrylate, at plant [RER]: 0.101 kg; lognormal SD95 1.0714
  (same comment as for Aluminium, production mix, at plant)
- Electricity, medium voltage, at grid [DE]: 44.7 kWh; lognormal SD95 1.0714
  (1,1,1,1,1,3); company information, coating, air-conditioning, water purification, etc.
- Treatment, sewage, unpolluted, to wastewater treatment, class 3 [CH]: 0.131 m3; lognormal SD95 1.0714
  (same comment as for Aluminium, production mix, at plant)
- Light fuel oil, burned in industrial furnace 1MW, non-modulating [RER]: 15.5 MJ; lognormal SD95 1.0714
  (1,1,1,1,1,3); Raugei, literature
- Disposal, inert waste, 5% water, to construction waste landfill [CH]: 0.65 kg; lognormal SD95 1.0714
  (same comment as for Aluminium, production mix, at plant)
- Gallium, semiconductor-grade, at regional storage [RER]: 0.000899 kg; lognormal SD95 1.1308
  (3,2,2,1,1,3); company information and assumption for share of metals
- Hydrochloric acid, 30% in H2O, at plant [RER]: 0.0994 kg; lognormal SD95 1.0714
  (same comment as for Aluminium, production mix, at plant)
- Transport, freight, rail [RER]: 21.526 tkm; lognormal SD95 2.095
  (4,5,na,na,na,na); Standard distance 600km
- Polyphenylene sulfide, at plant [GLO]: 0.0859 kg; lognormal SD95 1.0714
  (same comment as for Aluminium, production mix, at plant)
- Solar glass, low-iron, at regional storage [RER]: 10 kg; lognormal SD95 1.0714
  (1,1,1,1,1,3);

## Emissions to nature
- Heat, waste [emissions to air, high. pop.]: 160.92 MJ; lognormal SD95 1.0714
  (1,1,1,1,1,3); Calculation
- Cadmium [emissions to air, high. pop.]: 2.1e-8 kg; lognormal SD95 5.0949
  (3,4,3,3,1,5); Rough estimation

## Sampling procedure
Based on literature data and producer information

## Sources
- Created for EcoSpold 1 compatibility, Project report, 174
Frischknecht R.,, Stolz P., Sinha P., de Wild-Scholten M. (2020) Life Cycle Inventories and Life Cycle Assessments of Photovoltaic Systems. Project report. Volume: 174. IEA PVPS Task 12.
Type: Separate publication
Source: Report
First author: Frischknecht R.,
Other authors: Stolz P., Sinha P., de Wild-Scholten M.
Year: 2020
Title of anthology: Project report
Publisher: IEA PVPS Task 12
Volume No: 174
Original title: Life Cycle Inventories and Life Cycle Assessments of Photovoltaic Systems
