# Inkjet cartridge, at plant

Dataset: EcoSpold 1, unit process
Functional unit: 1 p
Category: electronics / devices
Geography: GLO
Time period: 2023-01 to 2029-12
Synonyms: Zusatzgeräte; Tintenpatronen
Generated by: Lugas Raka Adrianto, Maulana Permana Ajie, Didier Beloin-Saint-Pierre
accessRestrictedTo: 0
copyright: false

## General comment
The dataset is taken from the LCA study of typical inkjet cartridges;

## Included processes
The dataset for inkjet cartridge is built fromfrom the detailed LCA study of Krystofik et al., 2014, in which the authors break down the assembly of cartridge components at the material level. The cartridge assembly is categorized into several subparts, namely housing, circuitry/flexible printed circuit board, cartridge label, ink/solvent-based ink, and other materials. The production is assumed to occur globally as the production origin of each material/component location could not be identified as described in the original study.

## Geography
Data for global average inkjet cartridges

## Technology
Inkjet cartridges for typical inkjet printers (recent all in one printers).

## Reference product
- Inkjet cartridge, at plant [GLO]: 1 p
  Global

## Inputs from technosphere
All rows: lognormal SD95 1.26
- Adhesive for metals, at plant [DE]: 5e-6 kg
  (2,3,3,3,2,5,BU:1.06); Cartridge label. Literature: Krystofik et al 2014.
- Butane-1,4-diol, at plant [RER]: 0.00015 kg
  (2,3,3,3,2,5,BU:1.06); Ink/solvent-based ink. Literature: Krystofik et al 2014.
- Cable, ribbon cable, 20-pin, with plugs, at plant [GLO]: 2e-5 kg
  (2,3,3,3,2,5,BU:1.06); Inkjet circuitry. Literature: Krystofik et al 2014.
- Carbon black, at plant [GLO]: 0.00105 kg
  (2,3,3,3,2,5,BU:1.06); Ink/solvent-based ink. Literature: Krystofik et al 2014.
- Copper, secondary, at refinery [RER]: 1.5e-5 kg
  (2,3,3,3,2,5,BU:1.06); Inkjet circuitry. Literature: Krystofik et al 2014.
- Corrugated board base paper, wellenstoff, at plant [RER]: 0.02458 kg
  (2,3,3,3,2,5,BU:1.06); Inkjet packaging/multiple materials. Literature: Krystofik et al 2014.
- Corrugated board, recycling fibre, double wall, at plant [RER]: 0.00176 kg
  (same comment as for Corrugated board base paper, wellenstoff, at plant)
- Ethylvinylacetate, foil, at plant [RER]: 3e-5 kg
  (2,3,3,3,2,5,BU:1.06); Inkjet circuitry. Literature: Krystofik et al 2014.
- Glass fibre, at plant [RER]: 0.00355 kg
  (2,3,3,3,2,5,BU:1.06); Housing. Literature: Krystofik et al 2014.
- Gold, secondary, at precious metal refinery [SE]: 1e-6 kg
  (2,3,3,3,2,5,BU:1.06); Inkjet circuitry. Literature: Krystofik et al 2014.
- Injection moulding [RER]: 0.02364 kg
  (2,3,3,3,2,5,BU:1.06); Housing. Literature: Krystofik et al 2014.
- Integrated circuit, IC, logic type, at plant [GLO]: 0.000114 kg
  (2,3,3,3,2,5,BU:1.06); Inkjet circuitry. Literature: Krystofik et al 2014.
- N-methyl-2-pyrrolidone, at plant [RER]: 0.00105 kg
  (2,3,3,3,2,5,BU:1.06); Ink/solvent-based ink. Literature: Krystofik et al 2014.
- Packaging film, LDPE, at plant [RER]: 4.5e-5 kg
  (2,3,3,3,2,5,BU:1.06); Cartridge label. Literature: Krystofik et al 2014.
- Packaging film, LDPE, at plant [RER]: 0.00019 kg
  (same comment as for Corrugated board base paper, wellenstoff, at plant)
- Paper, woodfree, coated, at integrated mill [RER]: 0.00563 kg
  (same comment as for Corrugated board base paper, wellenstoff, at plant)
- Pentane, at plant [RER]: 0.00105 kg
  (2,3,3,3,2,5,BU:1.06); Ink/solvent-based ink. Literature: Krystofik et al 2014.
- Pigments, paper production, unspecified, at plant [RER]: 0.0018 kg
  (same comment as for Corrugated board base paper, wellenstoff, at plant)
- Polyethylene terephthalate, granulate, bottle grade, at plant [RER]: 0.02009 kg
  (2,3,3,3,2,5,BU:1.06); Housing. Literature: Krystofik et al 2014.
- Polyurethane, rigid foam, at plant [RER]: 0.00134 kg
  (2,3,3,3,2,5,BU:1.06); Ink delivery system. Literature: Krystofik et al 2014.
- Production efforts, transistors [GLO]: 0.0001 kg
  (2,3,3,3,2,5,BU:1.06); Inkjet circuitry. Literature: Krystofik et al 2014.
- xx Production of carton board boxes, offset printing, at plant [CH]: 5e-5 kg
  (2,3,3,3,2,5,BU:1.06); Cartridge label. Literature: Krystofik et al 2014.
- Sealing tape, aluminum/PE, 50 mm wide, at plant [RER]: 1.16 m
  (same comment as for Corrugated board base paper, wellenstoff, at plant)
- Steel product manufacturing, average metal working [RER]: 0.07536 kg
  (same comment as for Corrugated board base paper, wellenstoff, at plant)
- Water, deionised, at plant [CH]: 0.0117 kg
  (2,3,3,3,2,5,BU:1.06); Ink/solvent-based ink. Literature: Krystofik et al 2014.

## Sampling procedure
Literature & own estimations

## Extrapolations
Average technology

## Sources
- Raka Adrianto L., Permana Ajie M., Beloin-Saint-Pierre D., 2024, 2024 - LCI ICT sector - Raka Adrianto, Empa, St. Gallen, CH

## Validation
Proof reading validation: Passed, Other validation: none, Validator: Mischa Zschokke, Company: Carbotech, Country: CH
