# Viscose fibres, at plant

Dataset: EcoSpold 1, unit process
Functional unit: 1 kg
Category: textiles / unspecified
Geography: GLO
Time period: 1997-01 to 2007-12
Production volume: World production about 1.8 million tons
Share of production covered: 0.1 %
Generated by: Cornelia Stettler
accessRestrictedTo: 0
copyright: true

## General comment
The multioutput-process "viscose fibres" delivers the co-products "viscose fibres, at plant", "sodium sulphate from viscose production, at plant" and "sulphuric acid from viscose production, at plant". The allocation is based on economic criteria and was applied except for the used sulphate pulp.;

## Included processes
This data includes the transformation of sulphate pulp to spinnable viscose using CS2

## Technology
Transformation of sulfat pulp by CS2 to spinnable viscose

## Time period
Time of publications.

## Reference product
- Viscose fibres, at plant [GLO]: 1 kg
  Global

## Inputs from technosphere
- Disposal, municipal solid waste, 22.9% water, to sanitary landfill [CH]: 0.0093479 kg; lognormal SD95 1.2502
  (2,3,3,3,1,5); Assumption Carbotech AG, 1/3 of Lenzing waste materials from fibres production, delivery non-hazardous waste Lenzing AG in depostion site
- Transport, transoceanic freight ship [OCE]: 5.60938 tkm; lognormal SD95 2.0563
  (2,3,2,3,1,5); Assumption Carbotech AG 50% of fibres purchased from oversea, 50% produced on site. Estimations oversea transport distance about 15000 to 20000 km for transport from USA, Brasil and South Africa to Asia.
- Sodium hydroxide, 50% in H2O, production mix, at plant [RER]: 0.92071 kg; lognormal SD95 1.2502
  (2,3,3,3,1,5); Data 2001 for fibre production Lenzing AG (Federal Environment Agency- Austria, 2004)
- Pulp plant [RER]: 7.4013e-11 p; lognormal SD95 3.0537
  (2,3,2,3,1,5); Assumption Carbotech AG, infrastructure similar than pulp plant with comparable output fibres respectively pulp
- Heat, digester sludge, at incineration plant, future, allocation price [CH]: 1.17412 MJ; lognormal SD95 1.2502
  (2,3,3,3,1,5); Sludge and others for heat production from Lenzing AG 2001 (Federal Environment Agency- Austria, 2004)
- Sulphate pulp, TCF bleached, at plant [RER]: 1.50838 kg; lognormal SD95 1.2264
  (2,3,2,3,1,5); Pulp amount and type from fibres production Lenzing AG 2001 (Federal Environment Agency- Austria, 2004). Use of existing data inventory 'sulphate pulp, TCF bleached, at plant'
- Sulphur dioxide, liquid, at plant [RER]: 0.25982 kg; lognormal SD95 1.2502
  (same comment as for Sodium hydroxide, 50% in H2O, production mix, at plant)
- Chemicals inorganic, at plant [GLO]: 0.019555 kg; lognormal SD95 1.2502
  (2,3,3,3,1,5); Data 2001 for fibre production Lenzing AG (Federal Environment Agency- Austria, 2004), no specific data about used auxiliaries, assupmtion Carbotehc AG 50% organic and 50% anorganic
- Heat, light fuel oil, at industrial furnace 1MW [RER]: 0.21885 MJ; lognormal SD95 1.2502
  (2,3,3,3,1,5); Oil consumption for heat production from Lenzing AG 2001 (Federal Environment Agency- Austria, 2004)
- Carbon disulfide, at plant [GLO]: 0.11468 kg; lognormal SD95 1.2502
  (same comment as for Sodium hydroxide, 50% in H2O, production mix, at plant)
- Heat, at hard coal industrial furnace 1-10MW [RER]: 8.34864 MJ; lognormal SD95 1.2502
  (2,3,3,3,1,5); Coal consumption for heat production from Lenzing AG 2001 (Federal Environment Agency- Austria, 2004)
- Treatment, sewage, to wastewater treatment, class 3 [CH]: 0.00012848 m3; lognormal SD95 1.2502
  (2,3,3,3,1,5); Assumption Carbotech AG, 50% of total water consumed to waste water treatment ARA (in Lenzing total waste water treatment about 35% of total water consumption of company)
- Transport, freight, lorry, 16t-32t gross weight, fleet average [RER]: 0.44399 tkm; lognormal SD95 2.0563
  (2,3,2,3,1,5); Transport distance of chemicals 100 km Lkw 32t as in guidelines eco-invent, sulfat pulp about 200 km considered twice as in guidelines ecoinvent for oversea purchased goods. Assumption Carbotech AG 50% of fibres from oversea.
- Oxygen, liquid, at plant [RER]: 0.02342 kg; lognormal SD95 1.2502
  (same comment as for Sodium hydroxide, 50% in H2O, production mix, at plant)
- Zinc monosulphate, ZnSO4.H2O, at plant [RER]: 0.018594 kg; lognormal SD95 1.2502
  (same comment as for Sodium hydroxide, 50% in H2O, production mix, at plant)
- Disposal, hazardous waste, 25% water, to hazardous waste incineration [CH]: 2.2424e-5 kg; lognormal SD95 1.2502
  (2,3,3,3,1,5); Mainly batteries and accumaltors, assumption Carbotech AG 1/3 of Lenzing waste materials from fibres production, 50% in recycling and 50% as hazardous waste Lenzing AG icineration of hazardous waste
- Sulphuric acid, liquid, at plant [RER]: 0.088055 kg; lognormal SD95 1.2502
  (same comment as for Sodium hydroxide, 50% in H2O, production mix, at plant)
- Electricity, low voltage, production ENTSO-E, at grid: 1.28615 kWh; lognormal SD95 1.2502
  (2,3,3,3,1,5); Electricity amount for fibre production from Lenzing AG 2001 (Federal Environment Agency- Austria, 2004), general electricity mix UCTE
- Heat, natural gas, at industrial furnace 1MW [CH]: 5.00933 MJ; lognormal SD95 1.2502
  (2,3,3,3,1,5); Gas consumption for heat production from Lenzing AG 2001 (Federal Environment Agency- Austria, 2004)
- Wood chips, from industry, hardwood, burned in furnace 1000kW [CH]: 8.81518 MJ; lognormal SD95 1.2502
  (2,3,3,3,1,5); Wood consumption for heat production from Lenzing AG 2001 (Federal Environment Agency- Austria, 2004)
- Nitrogen, liquid, at plant [RER]: 0.059004 kg; lognormal SD95 1.2502
  (same comment as for Sodium hydroxide, 50% in H2O, production mix, at plant)
- Heat, unspecific, in chemical plant [RER]: 0.97095 MJ; lognormal SD95 1.2502
  (2,3,3,3,1,5); Heat unspecific assumed for not specified energy in fibres production Lenzing AG 2001 (Federal Environment Agency- Austria, 2004)
- Transport, freight, rail [RER]: 1.11362 tkm; lognormal SD95 2.0563
  (same comment as for Transport, transoceanic freight ship)
- Chemicals organic, at plant [GLO]: 0.019555 kg; lognormal SD95 1.2502
  (same comment as for Chemicals inorganic, at plant)
- Sodium hypochlorite, 15% in H2O, at plant [RER]: 0.19643 kg; lognormal SD95 1.2502
  (same comment as for Sodium hydroxide, 50% in H2O, production mix, at plant)
- Sodium chloride, powder, at plant [RER]: 0.15578 kg; lognormal SD95 1.2502
  (same comment as for Sodium hydroxide, 50% in H2O, production mix, at plant)

## Inputs from nature
- Water, river [resources, in water]: 0.25695 m3; lognormal SD95 1.2502
  (2,3,3,3,1,5); Water consumption for fibre production Lenzing AG 2001 (Federal Environment Agency- Austria, 2004)

## Emissions to nature
- Heat, waste [emissions to air, unspecified]: 4.63011 MJ; lognormal SD95 1.2502
  (2,3,3,3,1,5); Heat waste derived from electricity consumption
- Water [emissions to water, unspecified]: 244.102 kg; lognormal SD95 2.5196
  (5,5,5,5,5,BU:1.05); All uncertainty-values set to 5.0 by default. Balance of input water

## Sampling procedure
Literature data.

## Extrapolations
Some data are derived from other technologies.

## Sources
- Althaus H.-J., Werner F., Stettler C., Dinkel F., 2007, 2007 - LCI renewable materials - Althaus, Final report ecoinvent Data v2.0, 21, Swiss Centre for LCI, Empa - TSL, Umwelt & Entwicklung, Carbotech AG, Duebendorf, CH
Althaus H.J., Dinkel F., Werner F. (2007) Life Cycle Inventories of Renewable Materials. Final report ecoinvent Data v2.0. Editors: 0. 0. Volume: 21. Issue: 0. Swiss Centre for LCI, Empa - TSL. Duebendorf, CH.
Type: Measurement on site
Source: CD-ROM
First author: Althaus H.J.
Other authors: Dinkel F., Werner F.
Year: 2007
Name of editors: 0
Title of anthology: Final report ecoinvent Data v2.0
Place of publication: Duebendorf, CH
Publisher: Swiss Centre for LCI, Empa - TSL
Journal: 0
Volume No: 21
Issue No: 0

## Validation
Proof reading validation: passed; Other validation: none;
