# xx Cyclohexanone, at plant

Dataset: EcoSpold 1, unit process
Functional unit: 1 kg
Category: material, obsolete / chemicals, obsolete\organic, obsolete
Geography: RER
Time period: 2000-01 to 2005-12
Share of production covered: 100 %
Generated by: Juergen Sutter
accessRestrictedTo: 0
copyright: true

## General comment
The process "cyclohexanone, at plant, RER" is modelled for the production of cyclohexanone from cyclohexane in Europe. Raw materials and energy consumptions are modelled with literature data. The emissions are estimated. Infrastructure and transports are calculated with standard values.;
CAS number: 000108-94-1;
Formula: C6H10O;

## Included processes
Production of cyclohexanone including materials, energy uses, infrastructure and emissions.

## Geography
The inventory is modelled for Europe.

## Technology
Oxidation of cyclohexane

## Time period
Time of publications

## Reference product
- xx Cyclohexanone, at plant [RER]: 1 kg
  Europe

## Inputs from technosphere
- Boric acid, anhydrous, powder, at plant [RER]: 0.005 kg; lognormal SD95 1.5138
  (1,3,5,3,1,3); Wells 1991
- Transport, freight, rail [RER]: 0.59796 tkm; lognormal SD95 2.095
  (4,5,na,na,na,na); Standard distances
- Heat, unspecific, in chemical plant [RER]: 20.3 MJ; lognormal SD95 1.0907
  (1,3,1,3,1,3); DOE 2001
- Zinc, primary, at regional storage [RER]: 0.00060185 kg; lognormal SD95 1.5138
  (1,3,5,3,1,3); Wells 1991
- Electricity, medium voltage, production ENTSO-E, at grid: 0.176 kWh; lognormal SD95 1.0907
  (1,3,1,3,1,3); DOE 2001
- Transport, freight, lorry, fleet average [RER]: 0.09966 tkm; lognormal SD95 2.095
  (4,5,na,na,na,na); Standard distances
- Chemical plant, organics [RER]: 4e-10 p; lognormal SD95 3.0909
  (4,5,na,na,na,na); Estimation
- Cyclohexane, at plant [RER]: 0.925 kg; lognormal SD95 1.5138
  (1,3,5,3,1,3); Wells 1991
- Sodium hydroxide, 50% in H2O, production mix, at plant [RER]: 0.033 kg; lognormal SD95 1.5138
  (1,3,5,3,1,3); Wells 1991
- Light fuel oil, burned in industrial furnace 1MW, non-modulating [RER]: 0.017 MJ; lognormal SD95 1.0907
  (1,3,1,3,1,3); DOE 2001

## Inputs from nature
- Water, cooling, unspecified natural origin/m3 [resources, in water]: 0.024 m3; lognormal SD95 1.3001
  (4,5,na,na,na,na); Estimation

## Emissions to nature
- Cyclohexane [emissions to water, river]: 0.0074 kg; lognormal SD95 1.3001
  (4,5,na,na,na,na); Estimation
- Heat, waste [emissions to air, high. pop.]: 0.6336 MJ; lognormal SD95 1.0907
  (1,3,1,3,1,3); Calculated from the electricity input
- Sodium [emissions to water, river]: 0.018975 kg; lognormal SD95 5.1037
  (4,5,na,na,na,na); Estimation
- COD, Chemical Oxygen Demand [emissions to water, river]: 0.0243 kg; lognormal SD95 1.6169
  (4,5,na,na,na,na); Calculated from the water emissions
- TOC, Total Organic Carbon [emissions to water, river]: 0.00634 kg; lognormal SD95 1.6169
  (4,5,na,na,na,na); Calculated from the water emissions
- Zinc [emissions to water, river]: 0.00060185 kg; lognormal SD95 5.1037
  (4,5,na,na,na,na); Estimation
- Boron [emissions to water, river]: 0.0008871 kg; lognormal SD95 5.1037
  (4,5,na,na,na,na); Estimation
- DOC, Dissolved Organic Carbon [emissions to water, river]: 0.00634 kg; lognormal SD95 1.6169
  (4,5,na,na,na,na); Calculated from the water emissions
- BOD5, Biological Oxygen Demand [emissions to water, river]: 0.0243 kg; lognormal SD95 1.6169
  (4,5,na,na,na,na); Calculated from the water emissions
- Cyclohexane [emissions to air, high. pop.]: 0.00185 kg; lognormal SD95 1.3001
  (4,5,na,na,na,na); Estimation
- Carbon dioxide, fossil [emissions to air, high. pop.]: 0.020931 kg; lognormal SD95 1.3001
  (4,5,na,na,na,na); Calculated from the water treatment
- Water [emissions to water, unspecified]: 22.8 kg; lognormal SD95 2.5196
  (5,5,5,5,5,BU:1.05); All uncertainty-values set to 5.0 by default. Balance of input water

## Sampling procedure
Literature data

## Extrapolations
Transports and emissions are modelled with standard methods.

## Sources
- Sutter J., 2007, 2007 - LCI petrochemical solvents - Sutter, Final report ecoinvent Data v2.0, 22, Swiss Centre for LCI, ETH, Duebendorf and Uster, CH
Sutter, J., 0 (2007) Life Cycle Inventories of Petrochemical Solvents. Final report ecoinvent Data v2.0. Editors: 0. 0. Volume: 22. Issue: 0. Swiss Centre for LCI, ETHZ. Duebendorf and St. Gallen, CH.
Type: Measurement on site
Source: CD-ROM
First author: Sutter, J.
Other authors: 0
Year: 2007
Name of editors: 0
Title of anthology: Final report ecoinvent Data v2.0
Place of publication: Duebendorf and St. Gallen, CH
Publisher: Swiss Centre for LCI, ETHZ
Journal: 0
Volume No: 22
Issue No: 0

## Validation
Proof reading validation: passed.; Other validation: none;
