# Transport, freight, rail, electricity with shunting, Fahrzeug

Dataset: EcoSpold 1, unit process
Functional unit: 1 tkm
Category: transport systems / train
Geography: CH
Time period: 2009-01 to 2015-12
Production volume: 8738.193775 Mio tkm/a
Share of production covered: 100 %
Generated by: Luana Krebs
accessRestrictedTo: 0
copyright: true

## General comment
Inventory refers to the entire transport life cycle. For rail infrastructure, expenditures and environmental interventions due to construction, renewal and disposal of railway tracks have been allocated based on the Gross tonne kilometre performance of freight transport on SBB railway tracks in 2014 ( 20260 Mio. Gtkm). Expenditures due to operation of the rail infrastructure, as well as land use have been allocated based on the yearly train kilometre performance (8615 Mio tkm). For the operation of goods transportation average data for by rail in Switzerland were used. The data has been determined top down, by combining the total yearly energy consumption and the yearly tkm-performance of goods transportation. Electricity and diesel consumption have been updated based on SBB data for the year 2019.;

## Included processes
The inventory includes the actual energy consumption of a goods train in Switzerland using electro energy. In addition also the diesel consumption and emissions of shunting processes, the production and maintenance of vehicles as well as the construction and maintenance of the rail way tracks are accounted for.

## Technology
Average technology

## Time period
Time of publications

## Reference product
- Transport, freight, rail, electricity with shunting, Fahrzeug [CH]: 1 tkm
  SWITZERLAND

## Inputs from technosphere
All rows: lognormal SD95 3.0942
- Disposal, locomotive [RER]: 5.6465e-10 p
  (2,1,1,1,3,5,BU:3); ;
- Maintenance, goods wagon [RER]: 4.0795e-8 p
  (2,1,1,1,3,5,BU:3); ;
- Goods wagon [RER]: 4.0795e-8 p
  (2,1,1,1,3,5,BU:3); calculation based on the number of wagons of SBB in 2014, an assumed constant yearly performance of 12300000000 vkm/a and a life time of 40 years; pers. correspondence SBB, June. 2015
- Maintenance, locomotive [RER]: 5.6465e-10 p
  (2,1,1,1,3,5,BU:3); ;
- Locomotive [RER]: 5.6465e-10 p
  (2,1,1,1,3,5,BU:3); calculation based on the number of locomotives of SBB in 2014, an assumed constant yearly performance of 14478000000 vkm/a and a life time of 40 years; pers. correspondence SBB, June. 2015

## Sampling procedure
Statistics

## Extrapolations
Some generic datasets from ecoinvent have been used.

## Sources
- Krebs L., Frischknecht R., 2020, 2020 - Update Mobitool 2020 - Krebs, Project report, 713, treeze Ltd., Uster, CH
L. Krebs, R. Frischknecht (2020) Aktualisierung Ökobilanzdaten mobitool 2020, Teil 1. Project report. Volume: 713. treeze Ltd.. Uster, CH.
Type: Separate publication
Source: Report
First author: L. Krebs
Other authors: R. Frischknecht
Year: 2020
Title of anthology: Project report
Place of publication: Uster, CH
Publisher: treeze Ltd.
Volume No: 713

## Validation
Proof reading validation: 10.11.2020; Other validation: G:\Projekte laufend\713 Aktualisierung mobitool 2020\EcoSpold\[713_Transport-Train-freight-CH_EIV2_v0.3.xlsx]X-Process;
