# Asparagus seedling, open field, at production site

Dataset: EcoSpold 1, unit process
Functional unit: 1 p
Category: agricultural / agricultural means of production\seed
Geography: GLO
Time period: 2015-01 to 2022-12
Generated by: Tanja Laube
accessRestrictedTo: 0
copyright: true

## General comment
This inventory refers to 1 asparagus seedling.

## Geography
The inventory is globally modelled.

## Reference product
- Asparagus seedling, open field, at production site [GLO]: 1 p

## Inputs from technosphere
- Pesticide unspecified, at regional storehouse [RER]: 0.04 kg; lognormal SD95 1.33791
  (4,1,3,2,1,5,BU:1.1);
- Tap water, unspecified natural origin OECD, at user [RER]: 0.00016 kg; lognormal SD95 1.2377
  (1,2,3,3,1,5,BU:1.05); ;
- Magnesium sulphate, at plant [RER]: 8e-6 kg; lognormal SD95 1.2377
  (1,2,3,3,1,5,BU:1.05); ;
- Transport, transoceanic freight ship [OCE]: 0.01542 tkm; lognormal SD95 2.109
  (4,2,3,3,1,5,BU:2); ;
- Potassium sulphate, as K2O, at regional storehouse [RER]: 0.00012 kg; lognormal SD95 1.2377
  (1,2,3,3,1,5,BU:1.05); ;
- Electricity, low voltage, production GLO, at grid [GLO]: 0.0064 kWh; lognormal SD95 1.2377
  (1,2,3,3,1,5,BU:1.05); ;
- Transport, freight, lorry, 32t-40t gross weight, fleet average [RER]: 0.04, 0.04 tkm (2 entries); lognormal SD95 1.33791
  (4,1,3,2,1,5,BU:1.1);
- Calcium nitrate, as N, at regional storehouse [RER]: 8e-6 kg; lognormal SD95 1.2377
  (1,2,3,3,1,5,BU:1.05); ;
- Potassium nitrate, as N, at regional storehouse [RER]: 0.0004388 kg; lognormal SD95 1.2377
  (1,2,3,3,1,5,BU:1.05); ;
- Diesel, burned in agricultural machine [CH]: 8.24e-5 kg; lognormal SD95 1.2377
  (1,2,3,3,1,5,BU:1.05); ;
- Poultry manure, dried, at regional storehouse [CH]: 0.000232 kg; lognormal SD95 1.2377
  (1,2,3,3,1,5,BU:1.05); ;
- Ammonium nitrate, as N, at regional storehouse [RER]: 0.000348 kg; lognormal SD95 1.2377
  (1,2,3,3,1,5,BU:1.05); ;
- Installation for drip irrigation [CH]: 0.013428 m3; lognormal SD95 3.0589
  (1,2,3,3,1,5,BU:3); ;
- Transport, freight, lorry, fleet average [CH]: 0.00921 tkm; lognormal SD95 2.109
  (4,2,3,3,1,5,BU:2); ;
- Phosphoric acid, fertiliser grade, 70% in H2O, at plant [GLO]: 3.3536e-6 kg; lognormal SD95 1.2377
  (1,2,3,3,1,5,BU:1.05); ;
- Transport, aircraft, freight, long-haul [RER]: 0.013428 tkm; lognormal SD95 1.2377
  (1,2,3,3,1,5,BU:1.05); ;

## Inputs from nature
- Transformation, to annual crop, non-irrigated [resources, land]: 0.0025406 m2; lognormal SD95 2.109
  (4,2,3,3,1,5,BU:2); ;
- Transformation, from annual crop, non-irrigated [resources, land]: 0.00085236 m2; lognormal SD95 2.109
  (4,2,3,3,1,5,BU:2); ;
- Occupation, annual crop [resources, land]: 0.0014546 m2a; lognormal SD95 2.109
  (4,2,3,3,1,5,BU:2); ;

## Emissions to nature
- Difenoconazole [emissions to soil, agricultural]: 4.8e-7 kg; lognormal SD95 1.31829
  (1,2,3,3,1,5,BU:1.2); ;
- Methomyl [emissions to soil, agricultural]: 2.16e-6 kg; lognormal SD95 1.31829
  (1,2,3,3,1,5,BU:1.2); ;
- Mercury [emissions to water, river]: 3.64e-13 kg; lognormal SD95 5.10371
  (4,1,1,1,1,5,BU:5); ;
- Lead [emissions to water, river]: 1.44e-10 kg; lognormal SD95 5.10371
  (4,1,1,1,1,5,BU:5); ;
- Zinc [emissions to water, river]: 3.36e-8 kg; lognormal SD95 5.10371
  (4,1,1,1,1,5,BU:5); ;
- Chromium [emissions to water, river]: 2.88e-8 kg; lognormal SD95 3.09092
  (4,1,1,1,1,5,BU:3); ;
- Mercury [emissions to soil, agricultural]: 1.44e-11 kg; lognormal SD95 1.31639
  (4,1,1,1,1,5,BU:1.1); ;
- Water, OECD [emissions to air, unspecified]: 0.00726 kg; lognormal SD95 1.61689
  (4,1,1,1,1,5,BU:1.5); ;
- Dinitrogen monoxide [emissions to air, low. pop.]: 9.2e-6 kg; lognormal SD95 1.61689
  (4,1,1,1,1,5,BU:1.5); ;
- Nitrate [emissions to water, groundwater]: 0.00616 kg; lognormal SD95 1.61689
  (4,1,1,1,1,5,BU:1.5); ;
- Water [emissions to water, river]: 0.00726 kg; lognormal SD95 1.61689
  (4,1,1,1,1,5,BU:1.5); ;
- Phosphorus [emissions to water, groundwater]: 2.8e-7 kg; lognormal SD95 1.61689
  (4,1,1,1,1,5,BU:1.5); ;
- Deltamethrin [emissions to soil, agricultural]: 0.0003 kg; lognormal SD95 1.37131
  (4,1,1,1,1,5,BU:1.2); ;
- Sulfur [emissions to soil, agricultural]: 7.6e-8 kg; lognormal SD95 1.57701
  (1,2,3,3,1,5,BU:1.5); ;
- Nickel [emissions to water, river]: 2.8e-11 kg; lognormal SD95 5.10371
  (4,1,1,1,1,5,BU:5); ;
- Cadmium [emissions to water, ocean]: 8.8e-12 kg; lognormal SD95 3.09092
  (4,1,1,1,1,5,BU:3); ;
- Phosphorus [emissions to water, river]: 2.96e-6 kg; lognormal SD95 1.61689
  (4,1,1,1,1,5,BU:1.5); ;
- Nitrogen oxides [emissions to air, low. pop.]: 1.92e-6 kg; lognormal SD95 1.61689
  (4,1,1,1,1,5,BU:1.5); ;
- Ammonia [emissions to air, low. pop.]: 1.696e-5 kg; lognormal SD95 1.37131
  (4,1,1,1,1,5,BU:1.2); ;
- Copper [emissions to water, river]: 8.8e-9 kg; lognormal SD95 3.09092
  (4,1,1,1,1,5,BU:3); ;
- Imidacloprid [emissions to soil, agricultural]: 3.376e-7 kg; lognormal SD95 1.31829
  (1,2,3,3,1,5,BU:1.2); ;

## Sampling procedure
The data is based on literature and expert judgements.

## Sources
- Kaegi T., Conte F., Laube T., Roberts G., 2022, 2022 - LCA strawberry and asparagus production - Kaegi, Carbotech on behalf of BAFU, Carbotech AG, Zuerich, CH

## Validation
15.08.2022 \\tsclient\Schreibtisch\WinShare\BAFU Gemuese\Spargeln und Erdbeeren\[EcoSpold_Bafu_Gemuese_Asparagus seedling_GLO v1.xlsx]X-Process
