# Disposal, aluminiumtrihydroxide-acrylic glass, to municipal incineration

Dataset: EcoSpold 1, unit process
Functional unit: 1 kg
Category: waste management / municipal incineration
Geography: CH
Time period: 2015-01 to 2015-12
Generated by: Philippe Stolz
accessRestrictedTo: 0
copyright: true

## General comment
Inventoried waste contains 12.8% PP; 23.8% PET; 63.3% inert material (as cement); . waste composition (wet, in ppm): upper heating value 10.15 MJ/kg; lower heating value 9.676 MJ/kg; H2O 24662; O 518140; H 70601; C 221030; S 3209.2; N 1679.4; P 146.9; B n.a.; Cl 346.33; Br 17.485; F 4.378; I n.a.; Ag n.a.; As 2.7944; Ba 37.726; Cd 4.8381; Co 8.6944; Cr 16.187; Cu 9.7475; Hg 0.03718; Mn 127.66; Mo n.a.; Ni 11.471; Pb 22.366; Sb 39.09; Se 0.7116; Sn 1.4901; V 559.08; Zn 104.43; Be 0.16943; Sc n.a.; Sr 29.989; Ti 338.86; Tl 0.2575; W n.a.; Si 24337; Fe 6552; Ca 116290; Al 8559.6; K n.a.; Mg 10.391; Na 3103; Share of carbon in waste that is biogenic 0%. Share of iron in waste that is metallic/recyclable 0%. Net energy produced in MSWI: 0.74MJ/kg waste electric energy and 1.64MJ/kg waste thermal energy Allocation of energy production: no substitution or expansion. Total burden allocated to waste disposal function of MSWI. One kg of this waste produces 0.2979 kg of slag and 0.001859 kg of residues, which are landfilled. Additional solidification with 0.0007438 kg of cement.;;

## Included processes
waste-specific air and water emisions from incineration, auxiliary material consumption for flue gas cleaning. Short-term emissions to river water and long-term emisisons to ground water from slag compartment (from bottom slag) and residual material landfill (from solidified fly ashes and scrubber slugde). Process energy demands for MSWI.

## Geography
Specific to the technology mix encountered in Switzerland in 2000. Well applicable to modern incineration practices in Europe, North America or Japan.

## Technology
average Swiss MSWI plants in 2000 (grate incinerators) with electrostatic precipitator for fly ash (ESP), wet flue gas scrubber and 29.4% SNCR , 32.2% SCR-high dust , 24.6% SCR-low dust -DeNOx facilities and 13.8% without Denox (by burnt waste, according to Swiss average). Share of waste incinerated in plants with magnetic scrap separation from slag : 50%. Gross electric efficiency technology mix 12.997% and Gross thermal efficiency technology mix 25.57%

## Time period
Waste composition as given in literature reference, theoretical data or other source. Transfer coefficients for modern Swiss MSWI. Emission speciation based on early 90ies data.

## Reference product
- Disposal, aluminiumtrihydroxide-acrylic glass, to municipal incineration [CH]: 1 kg
  SWITZERLAND

## Inputs from technosphere
- Transport, freight, lorry, 16t-32t gross weight, fleet average [CH]: 0.012095 tkm; lognormal SD95 1.3611
  uncertainty calculated from calculated from uncertainties in waste composition, in transfer coefficients in incinerator, uncertainty in average auxiliary material input, the unertainty of the waste composition of this waste and the uncertainty in generic transportation distances
- Hydrochloric acid, 30% in H2O, at plant [RER]: 1.1782e-6 kg; lognormal SD95 2.6365
  uncertainty calculated from uncertainty in average auxiliary material input, and the unertainty of the waste composition of this waste
- Municipal waste incineration plant [CH]: 2.5e-10 p; lognormal SD95 1
  demands per kilogram waste. uncertainty is heeded in the module
- Residual material landfill facility [CH]: 3.8739e-12 p; lognormal SD95 1.5373
  uncertainty is calculated from uncertainties in waste composition and transfer coefficients in incinerator
- Transport, freight, rail [RER]: 0.00088011 tkm; lognormal SD95 4.1601
  uncertainty calculated from uncertainty in average auxiliary material input, the unertainty of the waste composition of this waste and the uncertainty in generic transportation distances
- Ammonia, liquid, at regional storehouse [CH]: 8.4728e-5 kg; lognormal SD95 11.66
  uncertainty calculated from uncertainty in average DeNOx input, uncertainty in the share of thermal NOx, uncertainty of nitrogen content in average municipal waste and the unertainty in nitrogen content in *this* waste.
- Titanium dioxide, production mix, at plant [RER]: 2.4253e-6 kg; lognormal SD95 19.624
  (same comment as for Ammonia, liquid, at regional storehouse)
- Chemicals inorganic, at plant [GLO]: 1.9636e-6 kg; lognormal SD95 2.6365
  Proxy for Polyelectrolyte. uncertainty calculated from uncertainty in average auxiliary material input, and the unertainty of the waste composition of this waste
- Chromium oxide, flakes, at plant [RER]: 4.9496e-8 kg; lognormal SD95 19.624
  Proxy for vanadium pentoxide V2O5 in SCR catalyst, uncertainty calculated from uncertainty in average DeNOx input, uncertainty in the share of thermal NOx, uncertainty of nitrogen content in average municipal waste and the unertainty in nitrogen content in *this* waste.
- Disposal, cement, hydrated, 0% water, to residual material landfill [CH]: 0.0018595 kg; lognormal SD95 1.6006
  Hydrated cement for solidification of landfilled residual material. Uncertainty calculated from unertainty of the waste composition of this waste and transfer coefficients in the incinerator and of the solidification recipe.
- Sodium hydroxide, 50% in H2O, production mix, at plant [RER]: 0.00028153 kg; lognormal SD95 5.247
  (same comment as for Hydrochloric acid, 30% in H2O, at plant)
- Chemicals organic, at plant [GLO]: 1.9937e-7 kg; lognormal SD95 8.0463
  Proxy for TMT15. uncertainty calculated from uncertainty in average auxiliary material input, and the unertainty of the waste composition of this waste
- Cement, unspecified, at plant [CH]: 0.00074379 kg; lognormal SD95 1.6006
  Cement for solidification of landfilled residual material. Uncertainty calculated from unertainty of the waste composition of this waste, of transfer coefficients in the incinerator and of the solidification recipe.
- Slag compartment [CH]: 5.2957e-10 p; lognormal SD95 1.3677
  (same comment as for Residual material landfill facility)
- Quicklime, milled, packed, at plant [CH]: 4.488e-5 kg; lognormal SD95 5.7971
  (same comment as for Hydrochloric acid, 30% in H2O, at plant)
- Process-specific burdens, municipal waste incineration [CH]: 1 kg; lognormal SD95 1
  demands per kilogram waste. uncertainty is heeded in the module
- Natural gas, burned in industrial furnace 1MW [CH]: 0.0082628 MJ; lognormal SD95 11.66
  (same comment as for Ammonia, liquid, at regional storehouse)
- Process-specific burdens, slag compartment [CH]: 0.29788 kg; lognormal SD95 1.3677
  (same comment as for Residual material landfill facility)
- Process-specific burdens, residual material landfill [CH]: 0.0018595 kg; lognormal SD95 1.5373
  (same comment as for Residual material landfill facility)
- Iron (III) chloride, 40% in H2O, at plant [CH]: 2.0902e-5 kg; lognormal SD95 4.5907
  (same comment as for Hydrochloric acid, 30% in H2O, at plant)

## Emissions to nature
- Tin [emissions to air, high. pop.]: 4.233e-13 kg; lognormal SD95 12.532
  (same comment as for Residual material landfill facility)
- TOC, Total Organic Carbon [emissions to water, river]: 0.00011291 kg; lognormal SD95 1.754
  uncertainty is calculated from uncertainties in waste composition and transfer coefficients in incinerator and landfills
- Mercury [emissions to water, groundwater, long-term]: 1.2235e-8 kg; lognormal SD95 15.295
  Long-term emissions from landfilling of incineration residues. uncertainty is calculated from uncertainties in waste composition and transfer coefficients in incinerator and landfills.
- Chloride [emissions to water, river]: 0.0002659 kg; lognormal SD95 5.0704
  (same comment as for TOC, Total Organic Carbon)
- COD, Chemical Oxygen Demand [emissions to water, groundwater, long-term]: 0.0027781 kg; lognormal SD95 1.5656
  (same comment as for Mercury)
- Nickel [emissions to air, high. pop.]: 1.315e-9 kg; lognormal SD95 9.61
  (same comment as for Residual material landfill facility)
- Cadmium [emissions to water, groundwater, long-term]: 7.0928e-7 kg; lognormal SD95 141.38
  (same comment as for Mercury)
- Barium [emissions to air, high. pop.]: 1.4826e-7 kg; lognormal SD95 8.1796
  (same comment as for Residual material landfill facility)
- Nickel [emissions to water, river]: 7.2674e-9 kg; lognormal SD95 16.298
  (same comment as for TOC, Total Organic Carbon)
- Silicon [emissions to water, river]: 8.9798e-7 kg; lognormal SD95 10.232
  (same comment as for TOC, Total Organic Carbon)
- Chromium [emissions to air, high. pop.]: 2.3074e-9 kg; lognormal SD95 9.2416
  (same comment as for Residual material landfill facility)
- Manganese [emissions to air, high. pop.]: 1.4296e-9 kg; lognormal SD95 7.2361
  (same comment as for Residual material landfill facility)
- Ammonia [emissions to air, high. pop.]: 1.3307e-6 kg; lognormal SD95 12.735
  uncertainty calculated from uncertainty in average N-emissions, uncertainty in the share of thermal NOx, uncertainty of nitrogen content in average municipal waste and the unertainty in nitrogen content in *this* waste.
- Nickel [emissions to water, groundwater, long-term]: 1.1422e-5 kg; lognormal SD95 9.3323
  (same comment as for Mercury)
- Nitrogen oxides [emissions to air, high. pop.]: 5.3433e-5 kg; lognormal SD95 12.735
  (same comment as for Ammonia)
- Methane, fossil [emissions to air, high. pop.]: 6.3821e-6 kg; lognormal SD95 1.57
  (2,3,4,2,1,2) & basic uncertainty of 1.5; confidential data from 5 plants in Switzerland and Germany
- Cobalt [emissions to air, high. pop.]: 1.38e-8 kg; lognormal SD95 9.7969
  (same comment as for Residual material landfill facility)
- Thallium [emissions to air, high. pop.]: 1.3554e-10 kg; lognormal SD95 14.288
  (same comment as for Residual material landfill facility)
- Lead [emissions to water, river]: 6.9969e-10 kg; lognormal SD95 13.247
  (same comment as for TOC, Total Organic Carbon)
- Chromium [emissions to water, river]: 2.051e-10 kg; lognormal SD95 9.3837
  (same comment as for TOC, Total Organic Carbon)
- Calcium [emissions to water, river]: 0.00050977 kg; lognormal SD95 4.5246
  (same comment as for TOC, Total Organic Carbon)
- Sulfate [emissions to water, groundwater, long-term]: 0.008729 kg; lognormal SD95 4.1209
  (same comment as for Mercury)
- Cobalt [emissions to water, groundwater, long-term]: 7.2897e-6 kg; lognormal SD95 9.0914
  (same comment as for Mercury)
- Aluminium [emissions to water, river]: 1.1891e-7 kg; lognormal SD95 12.003
  (same comment as for TOC, Total Organic Carbon)
- Strontium [emissions to air, high. pop.]: 2.9989e-9 kg; lognormal SD95 8.5849
  (same comment as for Residual material landfill facility)
- Manganese [emissions to water, groundwater, long-term]: 0.00012479 kg; lognormal SD95 6.8704
  (same comment as for Mercury)
- Fluoride [emissions to water, river]: 3.3467e-7 kg; lognormal SD95 6.7177
  (same comment as for TOC, Total Organic Carbon)
- Carbon monoxide, fossil [emissions to air, high. pop.]: 0.0002229 kg; lognormal SD95 5.01
  (1,3,2,2,1,2) & basic uncertainty of 5; literature data from switzerland and germany adapted to plant age distribution in switzerland
- Cadmium [emissions to air, high. pop.]: 2.2714e-9 kg; lognormal SD95 10.562
  (same comment as for Residual material landfill facility)
- Barium [emissions to water, river]: 5.0811e-9 kg; lognormal SD95 10.346
  (same comment as for TOC, Total Organic Carbon)
- Vanadium [emissions to water, river]: 8.7592e-7 kg; lognormal SD95 6.5163
  (same comment as for TOC, Total Organic Carbon)
- Thallium [emissions to water, river]: 1.5983e-10 kg; lognormal SD95 16.158
  (same comment as for TOC, Total Organic Carbon)
- Iron [emissions to water, groundwater, long-term]: 0.0034054 kg; lognormal SD95 4.261
  (same comment as for Mercury)
- Thallium [emissions to water, groundwater, long-term]: 2.0096e-7 kg; lognormal SD95 11.405
  (same comment as for Mercury)
- Vanadium [emissions to water, groundwater, long-term]: 0.0002553 kg; lognormal SD95 4.4369
  (same comment as for Mercury)
- Zinc [emissions to water, river]: 6.3364e-9 kg; lognormal SD95 7.243
  (same comment as for TOC, Total Organic Carbon)
- BOD5, Biological Oxygen Demand [emissions to water, groundwater, long-term]: 0.00090869 kg; lognormal SD95 1.5656
  (same comment as for Mercury)
- Nitrate [emissions to water, groundwater, long-term]: 6.0393e-5 kg; lognormal SD95 4.6847
  (same comment as for Mercury)
- Titanium [emissions to water, river]: 1.2634e-7 kg; lognormal SD95 4.741
  (same comment as for TOC, Total Organic Carbon)
- Strontium [emissions to water, groundwater, long-term]: 2.995e-5 kg; lognormal SD95 8.3169
  (same comment as for Mercury)
- Iron [emissions to air, high. pop.]: 3.3967e-10 kg; lognormal SD95 4.2025
  (same comment as for Residual material landfill facility)
- Phosphate [emissions to water, groundwater, long-term]: 5.9428e-6 kg; lognormal SD95 113.27
  (same comment as for Mercury)
- Titanium [emissions to water, groundwater, long-term]: 0.00010131 kg; lognormal SD95 6.7552
  (same comment as for Mercury)
- Aluminium [emissions to air, high. pop.]: 5.5234e-11 kg; lognormal SD95 4.1616
  (same comment as for Residual material landfill facility)
- Mercury [emissions to water, river]: 3.126e-10 kg; lognormal SD95 18.095
  (same comment as for TOC, Total Organic Carbon)
- DOC, Dissolved Organic Carbon [emissions to water, river]: 0.00011291 kg; lognormal SD95 1.754
  (same comment as for TOC, Total Organic Carbon)
- Tin [emissions to water, groundwater, long-term]: 1.0853e-6 kg; lognormal SD95 12.071
  (same comment as for Mercury)
- Lead [emissions to water, groundwater, long-term]: 2.0422e-5 kg; lognormal SD95 10.269
  (same comment as for Mercury)
- Cobalt [emissions to water, river]: 1.5292e-9 kg; lognormal SD95 13.019
  (same comment as for TOC, Total Organic Carbon)
- Phosphate [emissions to water, river]: 9.9211e-9 kg; lognormal SD95 17.727
  (same comment as for TOC, Total Organic Carbon)
- Magnesium [emissions to air, high. pop.]: 1.0911e-8 kg; lognormal SD95 9.61
  (same comment as for Residual material landfill facility)
- Lead [emissions to air, high. pop.]: 3.1017e-10 kg; lognormal SD95 9
  (same comment as for Residual material landfill facility)
- Copper [emissions to air, high. pop.]: 6.6886e-10 kg; lognormal SD95 9.8596
  (same comment as for Residual material landfill facility)
- Fluoride [emissions to water, groundwater, long-term]: 3.9236e-6 kg; lognormal SD95 6.2998
  (same comment as for Mercury)
- Titanium [emissions to air, high. pop.]: 2.8125e-7 kg; lognormal SD95 6.1009
  (same comment as for Residual material landfill facility)
- Carbon dioxide, fossil [emissions to air, high. pop.]: 0.80523 kg; lognormal SD95 1.6209
  (same comment as for Residual material landfill facility)
- Arsenic [emissions to water, groundwater, long-term]: 2.3402e-6 kg; lognormal SD95 10.983
  (same comment as for Mercury)
- Arsenic [emissions to water, river]: 4.4918e-7 kg; lognormal SD95 9.8692
  (same comment as for TOC, Total Organic Carbon)
- Bromine [emissions to water, groundwater, long-term]: 1.6853e-6 kg; lognormal SD95 8.8991
  (same comment as for Mercury)
- Tin [emissions to water, river]: 3.0625e-11 kg; lognormal SD95 17.617
  (same comment as for TOC, Total Organic Carbon)
- Beryllium [emissions to water, river]: 1.0529e-10 kg; lognormal SD95 17.266
  (same comment as for TOC, Total Organic Carbon)
- Copper [emissions to water, groundwater, long-term]: 8.9678e-6 kg; lognormal SD95 9.3983
  (same comment as for Mercury)
- Heat, waste [emissions to air, high. pop.]: 8.4974 MJ; lognormal SD95 1.9236
  uncertainty is calculated from uncertainties in waste composition and uncertainties in energy efficiency and the uncertainty in internal energy demand
- Barium [emissions to water, groundwater, long-term]: 1.9015e-5 kg; lognormal SD95 21.979
  (same comment as for Mercury)
- Sulfate [emissions to water, river]: 0.00089702 kg; lognormal SD95 4.7526
  (same comment as for TOC, Total Organic Carbon)
- Cyanide [emissions to air, high. pop.]: 1.5115e-6 kg; lognormal SD95 12.735
  (same comment as for Ammonia)
- Antimony [emissions to air, high. pop.]: 3.1267e-11 kg; lognormal SD95 8.6436
  (same comment as for Residual material landfill facility)
- Nitrate [emissions to water, river]: 2.1407e-5 kg; lognormal SD95 3.6064
  (same comment as for TOC, Total Organic Carbon)
- Chloride [emissions to water, groundwater, long-term]: 8.0279e-5 kg; lognormal SD95 5.9324
  (same comment as for Mercury)
- Strontium [emissions to water, river]: 1.8882e-8 kg; lognormal SD95 15.006
  (same comment as for TOC, Total Organic Carbon)
- Zinc [emissions to water, groundwater, long-term]: 6.7224e-5 kg; lognormal SD95 10.666
  (same comment as for Mercury)
- Cadmium [emissions to water, river]: 6.2483e-10 kg; lognormal SD95 10.755
  (same comment as for TOC, Total Organic Carbon)
- Hydrogen fluoride [emissions to air, high. pop.]: 2.954e-8 kg; lognormal SD95 10.55
  (same comment as for Residual material landfill facility)
- Vanadium [emissions to air, high. pop.]: 1.1542e-5 kg; lognormal SD95 5.5696
  (same comment as for Residual material landfill facility)
- Magnesium [emissions to water, groundwater, long-term]: 9.2028e-6 kg; lognormal SD95 9.1856
  (same comment as for Mercury)
- Beryllium [emissions to air, high. pop.]: 1.6943e-10 kg; lognormal SD95 14.823
  (same comment as for Residual material landfill facility)
- Sodium [emissions to water, river]: 0.00045313 kg; lognormal SD95 3.7061
  (same comment as for TOC, Total Organic Carbon)
- Bromine [emissions to water, river]: 1.58e-5 kg; lognormal SD95 4.6881
  (same comment as for TOC, Total Organic Carbon)
- Sodium [emissions to water, groundwater, long-term]: 0.0026461 kg; lognormal SD95 3.9099
  (same comment as for Mercury)
- Calcium [emissions to water, groundwater, long-term]: 0.11569 kg; lognormal SD95 1.9302
  (same comment as for Mercury)
- Manganese [emissions to water, river]: 7.3168e-9 kg; lognormal SD95 14.925
  (same comment as for TOC, Total Organic Carbon)
- Magnesium [emissions to water, river]: 4.8503e-8 kg; lognormal SD95 10.204
  (same comment as for TOC, Total Organic Carbon)
- Arsenic [emissions to air, high. pop.]: 5.0412e-9 kg; lognormal SD95 11.156
  (same comment as for Residual material landfill facility)
- Chromium VI [emissions to water, river]: 7.4219e-8 kg; lognormal SD95 9.5093
  (same comment as for TOC, Total Organic Carbon)
- Aluminium [emissions to water, groundwater, long-term]: 0.0069857 kg; lognormal SD95 3.5201
  (same comment as for Mercury)
- Dinitrogen monoxide [emissions to air, high. pop.]: 7.0919e-6 kg; lognormal SD95 12.735
  (same comment as for Ammonia)
- Zinc [emissions to air, high. pop.]: 3.5797e-8 kg; lognormal SD95 7.2361
  (same comment as for Residual material landfill facility)
- Bromine [emissions to air, high. pop.]: 8.7426e-9 kg; lognormal SD95 9.0601
  (same comment as for Residual material landfill facility)
- Antimony [emissions to water, river]: 1.3453e-5 kg; lognormal SD95 8.053
  (same comment as for TOC, Total Organic Carbon)
- Selenium [emissions to water, river]: 2.4044e-7 kg; lognormal SD95 9.7361
  (same comment as for TOC, Total Organic Carbon)
- Iron [emissions to water, river]: 5.8219e-8 kg; lognormal SD95 13.018
  (same comment as for TOC, Total Organic Carbon)
- BOD5, Biological Oxygen Demand [emissions to water, river]: 0.00025523 kg; lognormal SD95 1.7664
  (same comment as for TOC, Total Organic Carbon)
- Copper [emissions to water, river]: 1.0312e-9 kg; lognormal SD95 9.1665
  (same comment as for TOC, Total Organic Carbon)
- Chromium VI [emissions to water, groundwater, long-term]: 3.3096e-7 kg; lognormal SD95 49.73
  (same comment as for Mercury)
- Hydrogen chloride [emissions to air, high. pop.]: 1.9763e-7 kg; lognormal SD95 6.1193
  (same comment as for Residual material landfill facility)
- Selenium [emissions to air, high. pop.]: 8.468e-9 kg; lognormal SD95 12.745
  (same comment as for Residual material landfill facility)
- Calcium [emissions to air, high. pop.]: 2.7628e-6 kg; lognormal SD95 2.1904
  (same comment as for Residual material landfill facility)
- Mercury [emissions to air, high. pop.]: 7.4807e-10 kg; lognormal SD95 16.08
  (same comment as for Residual material landfill facility)
- Selenium [emissions to water, groundwater, long-term]: 4.6229e-7 kg; lognormal SD95 8.9202
  (same comment as for Mercury)
- TOC, Total Organic Carbon [emissions to water, groundwater, long-term]: 0.0010993 kg; lognormal SD95 1.5656
  (same comment as for Mercury)
- Sodium [emissions to air, high. pop.]: 4.077e-6 kg; lognormal SD95 4.2849
  (same comment as for Residual material landfill facility)
- Silicon [emissions to water, groundwater, long-term]: 0.00020823 kg; lognormal SD95 130.44
  (same comment as for Mercury)
- Beryllium [emissions to water, groundwater, long-term]: 1.3643e-7 kg; lognormal SD95 12.217
  (same comment as for Mercury)
- COD, Chemical Oxygen Demand [emissions to water, river]: 0.00025855 kg; lognormal SD95 1.7521
  (same comment as for TOC, Total Organic Carbon)
- DOC, Dissolved Organic Carbon [emissions to water, groundwater, long-term]: 0.0010993 kg; lognormal SD95 1.5656
  (same comment as for Mercury)
- Antimony [emissions to water, groundwater, long-term]: 2.4829e-5 kg; lognormal SD95 7.7814
  (same comment as for Mercury)
- Heat, waste [emissions to water, river]: 1.4322 MJ; lognormal SD95 1.9236
  (same comment as for Heat, waste)
- Sulfur dioxide [emissions to air, high. pop.]: 8.6717e-7 kg; lognormal SD95 4.3458
  (same comment as for Residual material landfill facility)

## Sampling procedure
waste-specific calculation based on literature data

## Extrapolations
Typical elemental transfer coefficients from current studies for modern MSWI, completed with data from coal power plants and estimates, adapted for inert/burnable waste.

## Uncertainty adjustments
uncertainty of waste input composition data derived from generic formula GSD(c) = N*ln(c)+1

## Sources
- Doka G., 2009, 2009 - LCI waste treatment services - Doka, Final report ecoinvent data v2.0, 13, Swiss Centre for LCI, Doka LCA, Duebendorf and St. Gallen, CH
Doka G. (2007) Life Cycle Inventories of Waste Treatment Services. Final report ecoinvent data v2.0. Volume: 13. Swiss Centre for LCI, Empa - TSL. Dübendorf, CH.
Type: Separate publication
Source: CD-ROM
First author: Doka G.
Year: 2007
Title of anthology: Final report ecoinvent data v2.0
Place of publication: Dübendorf, CH
Publisher: Swiss Centre for LCI, Empa - TSL
Volume No: 13

## Validation
Proof reading validation: automatic validation; Other validation: none;
