# Sodium hypochlorite, 15% in H2O, at plant

Dataset: EcoSpold 1, unit process
Functional unit: 1 kg
Category: chemicals / inorganic
Geography: RER
Time period: 2000-01 to 2000-12
Generated by: Mike Chudacoff
accessRestrictedTo: 0
copyright: true

## General comment
Production of NaOCl from chlorine emissions captured in 50% sodium hydroxide solution.;
CAS number: 007681-52-9;
Formula: NaOCl;

## Included processes
includes all precursor compounds except for chlorine, which is treated as process air emissions, transports and infrastructure

## Technology
based on literature data and plant data in Europe and North America

## Reference product
- Sodium hypochlorite, 15% in H2O, at plant [RER]: 1 kg
  Europe

## Inputs from technosphere
- Chemical plant, organics [RER]: 4e-10 p; lognormal SD95 1.32
  (4,5,1,1,1,4); infrastructure
- Transport, freight, rail [RER]: 1.24 tkm; lognormal SD95 1.24
  (4,3,1,1,1,4); transport
- Transport, freight, lorry, fleet average [RER]: 0.21 tkm; lognormal SD95 1.24
  (4,3,1,1,1,4); transport
- Heat, unspecific, in chemical plant [RER]: 1.38 MJ; lognormal SD95 1.24
  (4,3,1,1,1,4); steam production
- Electricity, medium voltage, production ENTSO-E, at grid: 0.017 kWh; lognormal SD95 1.12
  (1,3,1,1,1,4); power
- Sodium hydroxide, 50% in H2O, production mix, at plant [RER]: 0.56 kg; lognormal SD95 1.12
  (1,3,1,1,1,4); precursor

## Emissions to nature
- Heat, waste [emissions to air, high. pop.]: 0.06 MJ; lognormal SD95 1.12
  (1,3,1,1,1,4); waste heat
- Chloride [emissions to water, river]: 0.48 kg; lognormal SD95 1.24
  (4,3,1,1,1,4); wastewater

## Sampling procedure
see technology

## Extrapolations
see GeneralComment

## Sources
- Althaus H.-J., Chudacoff M., Hellweg S., Hischier R., Jungbluth N., Osses M., Primas A., 2007, 2007 - LCI chemicals - Althaus, Final report ecoinvent data v2.0, 8, Swiss Centre for LCI, Empa - TSL, ETH, ESU-services Ltd., Chudacoff Oekoscience, Duebendorf, CH
Althaus H.-J., Chudacoff M., Hischier R., Jungbluth N., Osses M., Primas A. (2007) Life Cycle Inventories of Chemicals. Final report ecoinvent data v2.0. Volume: 8. Swiss Centre for LCI, Empa - TSL. Dübendorf, CH.
Type: Measurement on site
Source: CD-ROM
First author: Althaus H.-J.
Other authors: Chudacoff M., Hischier R., Jungbluth N., Osses M., Primas A.
Year: 2007
Title of anthology: Final report ecoinvent data v2.0
Place of publication: Dübendorf, CH
Publisher: Swiss Centre for LCI, Empa - TSL
Volume No: 8

## Validation
Proof reading validation: Passed.; Other validation: none;
