# Disposal, powertrain, for electric passenger car

Dataset: EcoSpold 1, unit process, infrastructure
Functional unit: 1 kg
Category: transport systems / road
Geography: RER
Time period: 2014-01 to 2014-12
Production volume: 720000 kg
Generated by: Frank Werner
accessRestrictedTo: 0
copyright: true

## General comment
This dataset describes the treatment of a used electric drivetrain of an electric passenger car. The original dataset has been developed for a 100kW drivetrain comprising an electric motor (53kg), a converter (4.5kg), an inverter (9.5kg), a power distribution unit (3.9kg), a charger and cables (3m). First, the drivetrain is manually dismantled to recover all large metal scrap, especially from the electric motror and from the cases of the electronic devices. The scrap steel, copper and aluminium directly recovered from the components is sent to the respective scrap recycling facilities, while the remaining electronics scrap is sent to a smelter facility. Information on the materialisation of the dismatled components are in F. Habermacher "Modeling material inventories and environmental impacts of electric passenger cars", Matser Thesis, Department of Environmental Sciences, ETH Zurich, 2011.;

## Included processes
The dataset starts with the electric drivetrain which needs to be dismanlted already in the dismantling facility.

## Geography
data of situation in Switzerland

## Technology
current manual dismantling activities in Switzerland.

## Reference product
- Disposal, powertrain, for electric passenger car [RER]: 1 kg
  Europe

## Inputs from technosphere
- Disposal, plastic, industr. electronics, 15.3% water, to municipal incineration [CH]: 0.014 kg; lognormal SD95 1.5765
  (2,4,5,4,3,na)
  Remaining plastic scrap from the electric motor and the different power electronic components. The details concerning the dataset of this devices and of the electric drivetrain it is used with are described in Habermacher 2010.
  Production Volume Amount: 10080
- Manual treatment plant, WEEE scrap [GLO]: 1.6e-8 p; lognormal SD95 4.5746
  (4,5,5,5,5,na)
  Value taken from electronic waste manual treatment. Rough estimation of infrastructure.

## Sampling procedure
Literature

## Sources
- Frischknecht R., Messmer A., Stolz P., 2016, 2016 - Mobitool - Frischknecht, Project Report, 0, treeze Ltd., Bern, CH
