# xx Application, digested matter from biowaste in agricultural co-digestion, covered

Dataset: EcoSpold 1, unit process
Functional unit: 1 kg
Category: processing, obsolete / agricultural, obsolete
Geography: CH
Time period: 2006-01 to 2006-12
Production volume: 12 mio. m3 Biogas
Share of production covered: 50 %
Generated by: Konrad Schleiss
accessRestrictedTo: 0
copyright: true

## General comment
This process can only be used together with the process "biogas, mix, at agricultural co-fermentation, covered" because bio waste is not treated in agricultural biogas plants alone but only together with liquid manure. This process has been generated to give the possibility to model co-fermentation with different inputs. The multioutput-process "bio waste, to agriculture co-fermentation, covered" delivers the co-products "biogas", "application of digested matter" and the service "disposal of bio waste". The functional unit refers to 1 kg fresh matter of vegetable and organic waste and catering waste. The allocation is based on economic criteria. ;

## Included processes
This process contains the infrastructure, the energy used and the emissions of the fermentation process.

## Geography
This dataset is valid for agricultural plants in Switzerland in the year 2006

## Technology
To reduce methane emission the stock container is covered, to reduce NH3 emissions the digested matter will be spread with a trail hose.

## Time period
Time of publications.

## Reference product
- xx Application, digested matter from biowaste in agricultural co-digestion, covered [CH]: 1 kg
  SWITZERLAND

## Inputs from nature
- Carbon dioxide, in air [resources, in air]: 0.37542 kg; lognormal SD95 1.2685
  (3,3,3,3,1,5); The carbon dioxide fixation in the bio waste is accounted for as CO2 as resource. The actual value is based on the bio waste composition.

## Emissions to nature
- Mercury [emissions to soil, agricultural]: 4.9157e-8 kg; lognormal SD95 1.596
  (3,3,3,3,1,5); Literature studies done for the process bio waste to anaerobic digestion
- Molybdenum [emissions to soil, agricultural]: 2.809e-7 kg; lognormal SD95 1.596
  (3,3,3,3,1,5); Literature studies done for the process bio waste to anaerobic digestion
- Sulfur [emissions to soil, agricultural]: 0.0010534 kg; lognormal SD95 1.596
  (3,3,3,3,1,5); Literature studies done for the process bio waste to anaerobic digestion
- Potassium [emissions to soil, agricultural]: 0.0024579 kg; lognormal SD95 1.596
  (3,3,3,3,1,5); Literature studies done for the process bio waste to anaerobic digestion
- Tin [emissions to soil, agricultural]: 5.618e-6 kg; lognormal SD95 1.596
  (3,3,3,3,1,5); Literature studies done for the process bio waste to anaerobic digestion
- Nitrogen [emissions to soil, agricultural]: 0.0025843 kg; lognormal SD95 1.596
  (3,3,3,3,1,5); Literature studies done for the process bio waste to anaerobic digestion
- Dinitrogen monoxide [emissions to air, low. pop.]: 4.1516e-5 kg; lognormal SD95 1.5846
  (2,3,3,3,1,5); Proportional to the ammonia emission
- Arsenic [emissions to soil, agricultural]: 1.4045e-6 kg; lognormal SD95 1.596
  (3,3,3,3,1,5); Literature studies done for the process bio waste to anaerobic digestion
- Ammonia [emissions to air, low. pop.]: 0.0001326 kg; lognormal SD95 1.3286
  (2,3,3,3,1,5); Difference of ammonia emissions compared to the un-fermented manure.
- Calcium [emissions to soil, agricultural]: 0.015309 kg; lognormal SD95 1.596
  (3,3,3,3,1,5); Literature studies done for the process bio waste to anaerobic digestion
- Boron [emissions to soil, agricultural]: 7.1629e-6 kg; lognormal SD95 1.596
  (3,3,3,3,1,5); Literature studies done for the process bio waste to anaerobic digestion
- Manganese [emissions to soil, agricultural]: 3.0197e-6 kg; lognormal SD95 1.596
  (3,3,3,3,1,5); Literature studies done for the process bio waste to anaerobic digestion
- Iron [emissions to soil, agricultural]: 0.00042135 kg; lognormal SD95 1.596
  (3,3,3,3,1,5); Literature studies done for the process bio waste to anaerobic digestion
- Vanadium [emissions to soil, agricultural]: 2.1067e-6 kg; lognormal SD95 1.596
  (3,3,3,3,1,5); Literature studies done for the process bio waste to anaerobic digestion
- Iodide [emissions to soil, agricultural]: 3.8624e-8 kg; lognormal SD95 1.596
  (3,3,3,3,1,5); Literature studies done for the process bio waste to anaerobic digestion
- Aluminium [emissions to soil, agricultural]: 0.0070225 kg; lognormal SD95 1.596
  (3,3,3,3,1,5); Literature studies done for the process bio waste to anaerobic digestion
- Copper [emissions to soil, agricultural]: 1.264e-5 kg; lognormal SD95 1.596
  (3,3,3,3,1,5); Literature studies done for the process bio waste to anaerobic digestion
- Chromium [emissions to soil, agricultural]: 5.618e-6 kg; lognormal SD95 1.596
  (3,3,3,3,1,5); Literature studies done for the process bio waste to anaerobic digestion
- Bromine [emissions to soil, agricultural]: 4.2135e-6 kg; lognormal SD95 1.596
  (3,3,3,3,1,5); Literature studies done for the process bio waste to anaerobic digestion
- Chloride [emissions to soil, agricultural]: 0.002809 kg; lognormal SD95 1.596
  (3,3,3,3,1,5); Literature studies done for the process bio waste to anaerobic digestion
- Magnesium [emissions to soil, agricultural]: 0.0019803 kg; lognormal SD95 1.596
  (3,3,3,3,1,5); Literature studies done for the process bio waste to anaerobic digestion
- Silicon [emissions to soil, agricultural]: 0.02809 kg; lognormal SD95 1.596
  (3,3,3,3,1,5); Literature studies done for the process bio waste to anaerobic digestion
- Selenium [emissions to soil, agricultural]: 3.5112e-7 kg; lognormal SD95 1.596
  (3,3,3,3,1,5); Literature studies done for the process bio waste to anaerobic digestion
- Cobalt [emissions to soil, agricultural]: 3.5112e-6 kg; lognormal SD95 1.596
  (3,3,3,3,1,5); Literature studies done for the process bio waste to anaerobic digestion
- Carbon dioxide, biogenic [emissions to air, low. pop.]: 0.0014216 kg; lognormal SD95 1.2502
  (2,3,3,3,1,5); The stock is covered to avoid methane emissions. So the emission is about 1%.
- Fluoride [emissions to soil, agricultural]: 0.00014045 kg; lognormal SD95 1.596
  (3,3,3,3,1,5); Literature studies done for the process bio waste to anaerobic digestion
- Zinc [emissions to soil, agricultural]: 4.0871e-5 kg; lognormal SD95 1.596
  (3,3,3,3,1,5); Literature studies done for the process bio waste to anaerobic digestion
- Phosphorus [emissions to soil, agricultural]: 0.00079354 kg; lognormal SD95 1.596
  (3,3,3,3,1,5); Literature studies done for the process bio waste to anaerobic digestion
- Nickel [emissions to soil, agricultural]: 3.8062e-6 kg; lognormal SD95 1.596
  (3,3,3,3,1,5); Literature studies done for the process bio waste to anaerobic digestion
- Cadmium [emissions to soil, agricultural]: 9.691e-8 kg; lognormal SD95 1.596
  (3,3,3,3,1,5); Literature studies done for the process bio waste to anaerobic digestion
- Lead [emissions to soil, agricultural]: 1.3062e-5 kg; lognormal SD95 1.596
  (3,3,3,3,1,5); Literature studies done for the process bio waste to anaerobic digestion
- Sodium [emissions to soil, agricultural]: 0.0010534 kg; lognormal SD95 1.596
  (3,3,3,3,1,5); Literature studies done for the process bio waste to anaerobic digestion

## Sampling procedure
field data, The data are the average of 20 plants in Switzerland to produce electricity according the criteria of "naturemade".

## Sources
- Jungbluth N., Chudacoff M., Dauriat A., Dinkel F., Doka G., Faist Emmenegger M., Gnansounou E., Kljun N., Spielmann M., Stettler C., Sutter J., 2007, 2007 - LCI bioenergy - Jungbluth, Final report ecoinvent data v2.0, 17, Swiss Centre for LCI, ESU-services Ltd., Duebendorf and Uster, CH
Jungbluth N., Chudacoff M., Dauriat A., Dinkel F., Doka G., Faist Emmenegger M., Gnansounou E., Kljun N., Spielmann M., Stettler C., Sutter J. (2007) Life Cycle Inventories of Bioenergy. Final report ecoinvent data v2.0. Volume: 17. Swiss Centre for LCI, ESU. Duebendorf and Uster, CH.
Type: Measurement on site
Source: CD-ROM
First author: Jungbluth N.
Other authors: Chudacoff M., Dauriat A., Dinkel F., Doka G., Faist Emmenegger M., Gnansounou E., Kljun N., Spielmann M., Stettler C., Sutter J.
Year: 2007
Title of anthology: Final report ecoinvent data v2.0
Place of publication: Duebendorf and Uster, CH
Publisher: Swiss Centre for LCI, ESU
Volume No: 17

## Validation
Proof reading validation: Passed; Other validation: none;
