# Disposal, NiMH batteries

Dataset: EcoSpold 1, unit process
Functional unit: 1 kg
Category: electronics waste / unspecified
Geography: GLO
Time period: 2004-01 to 2004-12
Generated by: Roland Hischier
accessRestrictedTo: 0
copyright: true

## General comment
The multioutput-process " pyrometallurgical treatment NiMH batteries " delivers the co-products "disposal, NiMH batteries” and " Ni-Co-Fe residues, pyrometallurgical processing NiMH batteries, at plant ". The allocation is done 100% to the disposal process.;

## Included processes
This dataset represents the treatment of NiMH batteries from electric and electronic devices by a pyrometallurgical process.. It includes energy & auxiliary consumption, waste production, emission (to air/to water) production and rough estimations of the efforts for infrastructure & transportation.

## Geography
Data from a European recycling company - used as global average data.

## Technology
Dismantling, separation of plastic covers, treatment in a static pyrolysis oven.

## Reference product
- Disposal, NiMH batteries [GLO]: 1 kg
  Global

## Inputs from technosphere
- Transport, freight, lorry, fleet average [RER]: 0.5 tkm; lognormal SD95 2.0955
  (4,5,1,3,na,na,5); own estimation
- Propane, butane, at refinery [RER]: 0.0947 kg; lognormal SD95 1.2366
  (1,4,1,3,1,5,3); data of 1 European plant - reported in Fisher (2006)
- Disposal, plastics, mixture, 15.3% water, to municipal incineration [CH]: 0.147 kg; lognormal SD95 1.2366
  (1,4,1,3,1,5,6); data of 1 European plant - reported in Fisher (2006)
- Facilities blister-copper conversion, secondary copper [SE]: 5e-10 p; lognormal SD95 3.7732
  (4,5,1,3,5,4,9); rough estimation of infrastructure
- Carbon black, at plant [GLO]: 0.00167 kg; lognormal SD95 1.2366
  (1,4,1,3,1,5,3); data of 1 European plant - reported in Fisher (2006)
- Electricity, medium voltage, production ENTSO-E, at grid: 0.31 kWh; lognormal SD95 1.2366
  (1,4,1,3,1,5,2); data of 1 European plant - reported in Fisher (2006)

## Inputs from nature
- Water, unspecified natural origin/m3 [resources, in water]: 0.00024 m3; lognormal SD95 1.2366
  (1,4,1,3,1,5,11); data of 1 European plant - reported in Fisher (2006)

## Emissions to nature
- Sulfur dioxide [emissions to air, high. pop.]: 1.6e-5 kg; lognormal SD95 1.5763
  (1,4,1,3,1,5,16); data of 1 European plant - reported in Fisher (2006)
- Heat, waste [emissions to air, high. pop.]: 1.116 MJ; lognormal SD95 1.2366
  (1,4,1,3,1,5,13); calculated from electricity input
- Particulates, > 2.5 um, and < 10um [emissions to air, high. pop.]: 2.2005e-6 kg; lognormal SD95 2.0612
  (1,4,1,3,1,5,26); data of 1 European plant - reported in Fisher (2006)
- Particulates, > 10 um [emissions to air, high. pop.]: 2.445e-7 kg; lognormal SD95 2.0612
  (1,4,1,3,1,5,26); data of 1 European plant - reported in Fisher (2006)
- Mercury [emissions to air, high. pop.]: 5.3e-7 kg; lognormal SD95 5.0665
  (1,4,1,3,1,5,22); data of 1 European plant - reported in Fisher (2006)
- Oils, unspecified [emissions to water, river]: 2e-6 kg; lognormal SD95 3.0584
  (1,4,1,3,1,5,34); data of 1 European plant - reported in Fisher (2006)
- Nitrogen oxides [emissions to air, high. pop.]: 0.00047 kg; lognormal SD95 1.5763
  (1,4,1,3,1,5,16); data of 1 European plant - reported in Fisher (2006)
- NMVOC, non-methane volatile organic compounds, unspecified origin [emissions to air, high. pop.]: 0.001003 kg; lognormal SD95 1.5763
  (1,4,1,3,1,5,16); data of 1 European plant - reported in Fisher (2006)
- Particulates, < 2.5 um [emissions to air, high. pop.]: 2.445e-6 kg; lognormal SD95 3.0584
  (1,4,1,3,1,5,27); data of 1 European plant - reported in Fisher (2006)
- Zinc [emissions to water, river]: 1e-8 kg; lognormal SD95 5.0665
  (1,4,1,3,1,5,35); data of 1 European plant - reported in Fisher (2006)
- BOD5, Biological Oxygen Demand [emissions to water, river]: 8.5e-6 kg; lognormal SD95 1.5763
  (1,4,1,3,1,5,32); data of 1 European plant - reported in Fisher (2006)
- Nickel [emissions to water, river]: 6.2e-8 kg; lognormal SD95 5.0665
  (1,4,1,3,1,5,35); data of 1 European plant - reported in Fisher (2006)
- Suspended solids, unspecified [emissions to water, river]: 1.24e-6 kg; lognormal SD95 1.5763
  (1,4,1,3,1,5,33); data of 1 European plant - reported in Fisher (2006)
- COD, Chemical Oxygen Demand [emissions to water, river]: 2.6e-5 kg; lognormal SD95 1.5763
  (1,4,1,3,1,5,32); data of 1 European plant - reported in Fisher (2006)
- Water [emissions to water, unspecified]: 0.228 kg; lognormal SD95 2.5196
  (5,5,5,5,5,BU:1.05); All uncertainty-values set to 5.0 by default. Balance of input water

## Sampling procedure
Company information & own estimation

## Extrapolations
see Geography & Technology

## Sources
- Hischier R., Classen M., Lehmann M., Scharnhorst W., 2007, 2007 - LCI electric and electronic equipment - Hischier, Final report ecoinvent Data v2.0, 18, Swiss Centre for LCI, Empa - TSL, Duebendorf and St. Gallen, CH
Hischier R., Classen M., Lehmann M., Scharnhorst W. (2007) Life Cycle Inventories of Electric and Electronic Equipment - Production, Use & Disposal. Final report ecoinvent Data v2.0. Volume: 18. Swiss Centre for LCI, Empa - TSL. Duebendorf and St. Gallen, CH.
Type: Measurement on site
Source: CD-ROM
First author: Hischier R.
Other authors: Classen M., Lehmann M., Scharnhorst W.
Year: 2007
Title of anthology: Final report ecoinvent Data v2.0
Place of publication: Duebendorf and St. Gallen, CH
Publisher: Swiss Centre for LCI, Empa - TSL
Volume No: 18
Original title: Life Cycle Inventories of Electric and Electronic Equipment - Production, Use & Disposal

## Validation
Proof reading validation: passed.; Other validation: none;
