# xx Laser machining, metal, with CO2-laser, 2000W power

Dataset: EcoSpold 1, unit process
Functional unit: 1 hr
Category: processing, obsolete / metals\chipless shaping
Geography: RER
Time period: 2006-01 to 2007-12
Share of production covered: 0 %
Generated by: Roland Steiner
accessRestrictedTo: 0
copyright: true

## General comment
The reference for laser machining is its operation at 100% power for 1 hour. It does not include the input of the material processed. This need to be added separately. The dataset can be used when metals are treated with a YAG laser of the capacity indicated. Factory infrastructure needs to be added. Data are based on manufacturers' data (weight and power consumption) and literature (air emissions).;

## Included processes
This dataset includes work piece feeder, laser system, cooling and control system. Any additional equipment such as possibly necessary ventilation or additional security installations are not included. It includes the input of process gases, of energy and of the laser equipment. Further factory infrastructure (halls, buildings) are not included. The dataset includes process specific air emissions.

## Geography
Geographical coverage encompasses the industrialised countries.

## Technology
TruFlow series of CO2 lasers and TrueLaser processing machine

## Reference product
- xx Laser machining, metal, with CO2-laser, 2000W power [RER]: 1 hr
  Europe

## Inputs from technosphere
- Transport, freight, lorry, fleet average [RER]: 0.00216 tkm; lognormal SD95 2.33
  (4,3,2,1,4,5); standard distance
- Metal working machine, unspecified, at plant [RER]: 0.246 kg; lognormal SD95 3.32
  (4,3,2,1,4,5); estimated
- Transport, freight, rail [RER]: 0.00108 tkm; lognormal SD95 2.33
  (4,3,2,1,4,5); standard distance
- Nitrogen, liquid, at plant [RER]: 0.00686 kg; lognormal SD95 1.22
  (1,3,1,1,1,5); manufacturer data
- Electricity, low voltage, production ENTSO-E, at grid: 40 kWh; lognormal SD95 1.22
  (1,3,1,1,1,5); manufacturer data
- Carbon dioxide liquid, at plant [RER]: 0.0018 kg; lognormal SD95 1.22
  (1,3,1,1,1,5); manufacturer data
- Helium, at plant [GLO]: 0.00212 kg; lognormal SD95 1.22
  (1,3,1,1,1,5); manufacturer data

## Emissions to nature
- Carbon dioxide, fossil [emissions to air, high. pop.]: 0.0018 kg; lognormal SD95 1.22
  (1,3,1,1,1,5); due to gas input
- Heat, waste [emissions to air, high. pop.]: 144 MJ; lognormal SD95 1.22
  (1,3,1,1,1,5); due to electricity consumption
- Helium [emissions to air, high. pop.]: 0.00212 kg; lognormal SD95 1.56
  (1,3,1,1,1,5); due to gas input
- Ozone [emissions to air, high. pop.]: 0.000282 kg; lognormal SD95 1.64
  (2,3,3,3,3,5); estimated air emissions
- Nitrogen oxides [emissions to air, high. pop.]: 0.000958 kg; lognormal SD95 1.64
  (2,3,3,3,3,5); estimated air emissions
- Particulates, < 2.5 um [emissions to air, high. pop.]: 0.000181 kg; lognormal SD95 3.11
  (2,3,3,3,3,5); estimated air emissions

## Sources
- Steiner R., Frischknecht R., 2007, 2007 - LCI metal proc. and comp. air supply - Steiner, Final report ecoinvent Data v2.0, 23, Swiss Centre for LCI, ESU-services Ltd., Duebendorf and Uster, CH
Steiner, R., Frischknecht, R. (2007) Life Cycle Inventories of Metal Processing and Compressed Air Supply. Final report ecoinvent Data v2.0. Editors: 0. 0. Volume: 23. Issue: 0. Swiss Centre for LCI, ESU. Dübendorf and Uster, CH.
Type: Measurement on site
Source: CD-ROM
First author: Steiner, R.
Other authors: Frischknecht, R.
Year: 2007
Name of editors: 0
Title of anthology: Final report ecoinvent Data v2.0
Place of publication: Dübendorf and Uster, CH
Publisher: Swiss Centre for LCI, ESU
Journal: 0
Volume No: 23
Issue No: 0
Original title: Life Cycle Inventories of Metal Processing and Compressed Air Supply

## Validation
Proof reading validation: passed; Other validation: none;
