# Pedestrian underpass, underneath 2 tracks

Dataset: EcoSpold 1, unit process
Functional unit: 1 m2a
Category: transport systems / train\operations\infrastructure
Geography: CH
Time period: 2017 to 2024
Synonyms: 0
Generated by: Thomas Kaegi
accessRestrictedTo: 0
copyright: true

## General comment
A standard pedestrian underpass was considered, which crosses under a double track. The pedestrian underpass itself is 4 metres wide and 20 metres long. There is a staircase (3 m x 23 m) and a ramp (3 m x 33 m) on both sides. In total (including stairs and ramps), the area of such a pedestrian underpass is 416m2. For larger (under 3 or more tracks) pedestrian underpasses, it is assumed that the materialisation per m2 is similar, as an additional ramp and stairs are normally required even with additional tracks. The data for the material requirements of the pedestrian underpass comes from SBB (pers. comm. SBB, 2019) and was used for an indication of the average material requirements per m2. Offcuts and rejects are not taken into account. It is assumed that the excavated material will be used elsewhere on site and will not be deposited. The energy requirement for the construction work (excluding excavation) was derived from an LCA study by SBB on the construction of a platform per tonne of installed material (Rüegsegger & Schori, 2017). The ecoinvent standard values were used for transport distances for material deliveries by lorry (Frischknecht et al., 2007).

According to SBB, the service life of such a pedestrian underpass is 78 years. Only the surface layer (surfacing) is expected to last 30 years (pers. comm., SBB, 2024). Maintenance work, refurbishment and dismantling of the pedestrian underpass are not taken into account.;

## Included processes
The inventory includes all the materials, energy and transport necessary for constructing a pedestrian underpass underneath 2 railway tracks. Excluded are maintenance and disposal

## Geography
Data apply to construction in Switzerland.

## Technology
Average technology available on the market

## Time period
Time of publications.

## Reference product
- Pedestrian underpass, underneath 2 tracks [CH]: 1 m2a

## Inputs from technosphere
- Steel, low-alloyed, at plant [RER]: 0.14207 kg; lognormal SD95 1.238
  (3,1,2,1,1,5,BU:1.05); Steel railings;
- Iron-nickel-chromium alloy, at plant [RER]: 0.0037019 kg; lognormal SD95 1.238
  (3,1,2,1,1,5,BU:1.05); Chromium steel handrails;
- Mastic asphalt, at plant [CH]: 1.8966 kg; lognormal SD95 1.238
  (3,1,2,1,1,5,BU:1.05); Floor surface sealing, floor covering + asphalt covering;
- Concrete, normal, at plant [CH]: 0.02524 m3; lognormal SD95 1.238
  (3,1,2,1,1,5,BU:1.05); Concrete (foundations, ceilings, walls and stairs);
- Natural stone plate, cut, at regional storage [CH]: 0.33654 kg; lognormal SD95 1.238
  (3,1,2,1,1,5,BU:1.05); Granite (steps and platforms);
- Bitumen sealing, at plant [RER]: 0.35817 kg; lognormal SD95 1.238
  (3,1,2,1,1,5,BU:1.05); Bituminous waterproofing walls/ceilings;
- Excavation, hydraulic digger, with particle filter [CH]: 0.15096 m3; lognormal SD95 2.0619
  (3,1,2,1,1,5,BU:2); Excavation;
- Reinforcing steel, at plant [RER]: 7.5962 kg; lognormal SD95 1.238
  (3,1,2,1,1,5,BU:1.05); Structural steel (foundations, ceilings, walls and stairs);
- Transport, freight, lorry, 16t-32t gross weight, fleet average [RER]: 6.6106 tkm; lognormal SD95 2.0962
  (4,1,2,1,1,5,BU:2); Material transportation to construction site;
- Transport, freight, rail, electricity with shunting [CH]: 4.9038 tkm; lognormal SD95 2.0962
  (4,1,2,1,1,5,BU:2); Material transportation to construction site;
- Diesel, burned in building machine, with particle filter [CH]: 3.15 MJ; lognormal SD95 2.3493
  (5,4,3,1,3,5,BU:2); Energy demand for construction work;

## Inputs from nature
- Occupation, sealed soil [resources, land]: 1 m2a; lognormal SD95 1.5772
  (3,1,2,1,1,5,BU:1.5); ;
- Transformation, to sealed soil [resources, land]: 0.012813 m2; lognormal SD95 2.0619
  (3,1,2,1,1,5,BU:2); ;
- Transformation, from unspecified [resources, land]: 0.012813 m2; lognormal SD95 2.0619
  (3,1,2,1,1,5,BU:2); ;

## Sampling procedure
based on literature

## Sources
- Conrad S., Roberts G., Kaegi T., Stettler C., Frick R., Walther U., Althaus H.-J., 2024, 2024 - LCA railway infrastructure - Kaegi, Carbotech und INFRAS im Auftrag des BAV, Carbotech AG, INFRAS, Basel, CH

## Validation
01.10.2024
\\tsclient\Schreibtisch\WinShare\BAV Gleisinfrastruktur\Ecospold\[EcoSpold_Pedestrian underpass v0.2.xlsx]X-Process
