# Heat, natural gas, at boiler condensing modulating 300kW

Dataset: EcoSpold 1, unit process
Functional unit: 1 MJ
Category: heat / natural gas\heating systems
Geography: CH
Time period: 2016-01 to 2020-12
Generated by: Thomas Kaegi
accessRestrictedTo: 0
copyright: true

## General comment
Inventory for 1 MJ heat from natural gas, burned in a gas boiler condensing modulating with a capacity of 300 kW ifor a area with several houses with 2100 operating hours. Efficiency depends on use patterns such as input and output temperature and is here estimated at partial load (30% load) with efficiency 109.7 % (Hu);

## Included processes
Included are the natural gas burning in a 300kW boiler which in turn includes fuel input, infrastructure (boiler), air and water emissions and electrictiy needed for operation. The inventory uses the average net efficiency for the type of boiler referring to the lower calorific value. The heat distribution ios not included

## Geography
Data apply to the combustion in Switzerland.

## Technology
Industry data.

## Time period
Time of publications.

## Reference product
- Heat, natural gas, at boiler condensing modulating 300kW [CH]: 1 MJ
  SWITZERLAND

## Inputs from technosphere
- Natural gas, burned in boiler condensing modulating 300kW [CH]: 0.91158 MJ; lognormal SD95 1.2077
  (1,1,1,1,1,5,BU:1.05); ;

## Sampling procedure
Data from literature

## Extrapolations
Some generic datasets from ecoinvent have been used.

## Sources
- Kaegi T., Waldburger L., Kern C., Roberts G., Zschokke M., Conte F., Weber L., 2021, 2021 - LCI heating systems - Kaegi, Project report, Carbotech AG, Zuerich, CH
T. Kägi, L. Waldburger, C. Kern (2020) Life cycle inventories of heating systems. Project report. carbotech. Zurich, CH.
Type: Separate publication
Source: Report
First author: T. Kägi
Other authors: L. Waldburger, C. Kern
Year: 2020
Title of anthology: Project report
Place of publication: Zurich, CH
Publisher: carbotech

## Validation
Proof reading validation: 17.08.2020; Other validation: Z:\Schreibtisch\WinShare\BAFU Heizsysteme\[EcoSpold_heat natural gas_v0.3xlsx.xlsx]X-Process;
