# Chromite, ore concentrate, at beneficiation

Dataset: EcoSpold 1, unit process
Functional unit: 1 kg
Category: minerals / unspecified
Geography: GLO
Time period: 2000-01 to 2000-12
Production volume: 9.7 million tonnes in 1994
Share of production covered: 74 %
Generated by: Mischa Classen
accessRestrictedTo: 0
copyright: true

## General comment
The module describes the produc-tion of chromite in 1994 for a world-wide production average. It is de-signed for the use of chromite as intermediary product in the produc-tion of ferrochromium, dichromate and refractories. Process data is taken mainly from d a material flow analysis for the consumption of chromium compounds in Germany. The ore concentrate produced has a content of 30.7% Cr (44.9% Cr2O3) by weight.;
CAS number: 053293-42-8;
Synonyms: chromeisenstein;

## Included processes
The module includes a mining and a beneficiation step with the mining infrastructure and disposal of overburden and tailings (see part II "Auxiliary Processes").

## Geography
This module relates to the global situation. Some agents used like lime originate from data sets valid for Switzerland or Europe. Processes like blasting and transport originate from data sets valid for Switzerland or Europe

## Technology
Mining is done 21% open pit and 79% underground, followed by a benefication of the ore trough classification. Overburden and tailings are disposed near the mining site.

## Reference product
- Chromite, ore concentrate, at beneficiation [GLO]: 1 kg
  Global

## Inputs from technosphere
- Blasting [RER]: 0.00149 kg; lognormal SD95 1.13
  (2,2,3,1,1,2,4)
- Disposal, non-sulfidic overburden, off-site [GLO]: 1.77 kg; lognormal SD95 1.16
  (3,2,3,1,1,2,6)
- Non-ferrous metal mine, surface [GLO]: 2.15e-11 p; lognormal SD95 3.32
  (5,5,1,1,1,5,9); rough estimate
- Non-ferrous metal mine, underground [GLO]: 5.27e-11 p; lognormal SD95 3.32
  (5,5,1,1,1,5,9); rough estimate
- Diesel, burned in building machine, average [CH]: 0.0807 MJ; lognormal SD95 1.13
  (2,2,3,1,1,2,1)
- Conveyor belt, at plant [RER]: 6.42e-8 m; lognormal SD95 3.32
  (5,5,1,1,1,5,9); rough estimate
- Aluminium hydroxide, plant [RER]: 3.12e-15 p; lognormal SD95 3.32
  (5,5,1,1,1,5,9); rough estimate
- Disposal, non-sulfidic tailings, off-site [GLO]: 0.486 kg; lognormal SD95 1.16
  (3,2,3,1,1,2,6); reported values
- Chromium steel 18/8, at plant [RER]: 0.000446 kg; lognormal SD95 1.2
  (2,3,2,3,1,3,4)
- Electricity, medium voltage, production ENTSO-E, at grid: 0.015 kWh; lognormal SD95 1.13
  (2,2,3,1,1,2,2)
- Electricity, hydropower, at run-of-river power plant [RER]: 0.0225 kWh; lognormal SD95 1.16
  (3,2,3,1,1,2,2)

## Inputs from nature
- Transformation, from unknown [resources, land]: 1.08e-6 m2; lognormal SD95 2.03
  (3,2,3,1,1,2,8); calculation based on reported value
- Chromium [resources, in ground]: 0.379 kg; lognormal SD95 1.13
  (2,2,3,1,1,2,12)
- Occupation, mineral extraction site [resources, land]: 3.23e-5 m2a; lognormal SD95 1.53
  (3,2,3,1,1,2,7); calculation based on reported value
- Water, river [resources, in water]: 0.00269 m3; lognormal SD95 1.13
  (2,2,3,1,1,2,12)
- Transformation, to mineral extraction site [resources, land]: 1.08e-6 m2; lognormal SD95 2.03
  (3,2,3,1,1,2,8); calculation based on reported value

## Emissions to nature
- Iron [emissions to air, low. pop.]: 8.13e-6 kg; lognormal SD95 1.83
  (5,2,2,1,1,5,31)
- Particulates, < 2.5 um [emissions to air, low. pop.]: 8.24e-9 kg; lognormal SD95 3.27
  (5,2,2,1,1,5,27)
- Iron [emissions to water, river]: 8.25e-9 kg; lognormal SD95 10
  reported values
- TOC, Total Organic Carbon [emissions to water, river]: 7.04e-8 kg; lognormal SD95 10
  reported values
- BOD5, Biological Oxygen Demand [emissions to water, river]: 1.2e-7 kg; lognormal SD95 10
  reported values
- Aluminium [emissions to air, low. pop.]: 8.57e-9 kg; lognormal SD95 1.83
  (5,2,2,1,1,5,31)
- Silicon [emissions to air, low. pop.]: 5.63e-9 kg; lognormal SD95 1.83
  (5,2,2,1,1,5,31)
- Chromium [emissions to water, river]: 5.93e-11 kg; lognormal SD95 10
  reported values
- Suspended solids, unspecified [emissions to water, river]: 6e-8 kg; lognormal SD95 10
  reported values
- Particulates, > 10 um [emissions to air, low. pop.]: 8.52e-8 kg; lognormal SD95 1.83
  (5,2,2,1,1,5,25)
- Calcium [emissions to water, lake]: 1.43e-7 kg; lognormal SD95 10
  reported values
- COD, Chemical Oxygen Demand [emissions to water, river]: 1.8e-7 kg; lognormal SD95 10
  reported values
- Magnesium [emissions to air, low. pop.]: 1.74e-8 kg; lognormal SD95 1.83
  (5,2,2,1,1,5,31)
- Heat, waste [emissions to air, low. pop.]: 0.135 MJ; lognormal SD95 1.13
  (2,2,3,1,1,2,13)
- DOC, Dissolved Organic Carbon [emissions to water, river]: 7.04e-8 kg; lognormal SD95 10
  reported values
- Particulates, > 2.5 um, and < 10um [emissions to air, low. pop.]: 7.41e-8 kg; lognormal SD95 2.28
  (5,2,2,1,1,5,26)
- Chromium [emissions to air, low. pop.]: 5.36e-8 kg; lognormal SD95 5.31
  (5,2,2,1,1,5,22)
- Oils, unspecified [emissions to water, river]: 1.2e-8 kg; lognormal SD95 10
  reported values
- Water [emissions to water, unspecified]: 2.5555 kg; lognormal SD95 2.5196
  (5,5,5,5,5,BU:1.05); All uncertainty-values set to 5.0 by default. Balance of input water

## Sampling procedure
literature

## Extrapolations
see Geography and Technology

## Sources
- Classen M., Althaus H.-J., Blaser S., Scharnhorst W., Tuchschmid M., Jungbluth N., Faist Emmenegger M., 2009, 2009 - LCI metals - Classen, Final report ecoinvent data v2.1, 10, Swiss Centre for LCI, Empa, ESU-services Ltd., Duebendorf, CH
Classen M., Althaus H.-J., Blaser S., Doka G., Jungbluth N., Tuchschmid M. (2008) Life Cycle Inventories of Metals. Final report ecoinvent data v2.1. Volume: 10. Issue: 0. Swiss Centre for LCI, Empa - TSL. Dübendorf, CH.
Type: Measurement on site
Source: CD-ROM
First author: Classen M.
Other authors: Althaus H.-J., Blaser S., Doka G., Jungbluth N., Tuchschmid M.
Year: 2008
Title of anthology: Final report ecoinvent data v2.1
Place of publication: Dübendorf, CH
Publisher: Swiss Centre for LCI, Empa - TSL
Volume No: 10
Issue No: 0

## Validation
Proof reading validation: Passed.; Other validation: none;
