# Expanded perlite, at plant

Dataset: EcoSpold 1, unit process
Functional unit: 1 kg
Category: minerals / unspecified
Geography: CH
Time period: 2000-01 to 2000-12
Generated by: Daniel Kellenberger
accessRestrictedTo: 0
copyright: true

## General comment
Expanded by shock heating at a temperature of 870 – 1090 °C. It is assumed that light fuel oil is used for heating. Density of expanded perlite: 60 - 300kg/m3 ;

## Included processes
includes the raw material, the transport to the finishing plant and some internal transports, the heating energy carrier, some packaging materials, the infrastructure and the emissions

## Geography
For some exchanges CH, RER and OCE modules have been used as proxy.

## Technology
Basic principle is a heating of the perlite grains to high temperature. The volume increase is 15 – 30 fold

## Reference product
- Expanded perlite, at plant [CH]: 1 kg
  SWITZERLAND

## Inputs from technosphere
- Silicone product, at plant [RER]: 0.05 kg; lognormal SD95 1.68
  (4,5,5,3,1,5);
- Electricity, medium voltage, production ENTSO-E, at grid: 0.065 kWh; lognormal SD95 1.4
  (4,5,3,1,1,5);
- Tap water, at user [RER]: 0.0005 kg; lognormal SD95 1.4
  (4,5,3,1,1,5);
- Perlite, at mine [DE]: 1.02 kg; lognormal SD95 1.4
  (4,5,3,1,1,5);
- Disposal, inert material, 0% water, to sanitary landfill [CH]: 0.0003 kg; lognormal SD95 1
  estimation
- Mine, clay [CH]: 2e-10 p; lognormal SD95 5
- Corrugated board base paper, kraftliner, at plant [RER]: 0.00144 kg; lognormal SD95 1.41
  (4,5,3,5,1,5);
- Transport, transoceanic freight ship [OCE]: 1.35 tkm; lognormal SD95 2.15
  (4,5,3,1,1,5);
- Light fuel oil, burned in industrial furnace 1MW, non-modulating [CH]: 8.5 MJ; lognormal SD95 5
- Packaging film, LDPE, at plant [RER]: 0.0115 kg; lognormal SD95 1.41
  (4,5,3,5,1,5);
- Transport, freight, rail [RER]: 0.45 tkm; lognormal SD95 2.15
  (4,5,3,1,1,5);
- Transport, freight, lorry, fleet average [RER]: 0.0652 tkm; lognormal SD95 2.15
  (4,5,3,1,1,5);

## Emissions to nature
- Heat, waste [emissions to air, unspecified]: 0.234 MJ; lognormal SD95 1.4
  (4,5,3,1,1,5);

## Sampling procedure
Literature

## Extrapolations
See geography

## Sources
- Kellenberger D., Althaus H.-J., Jungbluth N., Kuenniger T., Lehmann M., Thalmann P., 2007, 2007 - LCI building products - Kellenberger, Final report ecoinvent data v2.0, 7, Swiss Centre for LCI, Empa - TSL, ESU-services Ltd., Bau- und Umweltchimie, Duebendorf, CH
Kellenberger D., Althaus H.-J., Jungbluth N., Künniger T. (2007) Life Cycle Inventories of Building Products. Final report ecoinvent data v2.0. Volume: 7. Swiss Centre for LCI, Empa - TSL. Dübendorf, CH.
Type: Measurement on site
Source: CD-ROM
First author: Kellenberger D.
Other authors: Althaus H.-J., Jungbluth N., Künniger T.
Year: 2007
Title of anthology: Final report ecoinvent data v2.0
Place of publication: Dübendorf, CH
Publisher: Swiss Centre for LCI, Empa - TSL
Volume No: 7

## Validation
Proof reading validation: passed; Other validation: none;
