# Sheet rolling, copper

Dataset: EcoSpold 1, unit process
Functional unit: 1 kg
Category: metals / chipless shaping
Geography: RER
Time period: 2000-01 to 2000-12
Generated by: Silvio Blaser
accessRestrictedTo: 0
copyright: true

## General comment
The process of copper sheet rolling is similar to the process of aluminium sheet rolling. Also the final outputs are similar in shape, even if the material properties and thus the applications are very different;

## Included processes
Includes the process-steps: preheating, hot rolling, cold rolling, annealing and finishing. Does not include the material being rolled, only the amount of scrap lost in waste is balanced as primary copper input . Includes the transport of the materials to the plant, but does not include the transport of the product to the customer.

## Technology
Technique describes the avarage of European Union. Data are estimated basing on the data of aluminium sheet rolling, set in relation by mean of the volume of material worked.

## Time period
Data on which assumptions are basing are from 1998

## Reference product
- Sheet rolling, copper [RER]: 1 kg
  Europe

## Inputs from technosphere
- Electricity, medium voltage, production ENTSO-E, at grid: 0.22333 kWh; lognormal SD95 1.4464
  (4,5,2,1,3,5,2)
- Steel, converter, unalloyed, at plant [RER]: 0.0016519 kg; lognormal SD95 1.4464
  (4,5,2,1,3,5,4)
- Rolling mill [RER]: 1.4286e-9 p; lognormal SD95 3.1833
  (4,5,2,1,3,5,9)
- Lubricating oil, at plant [RER]: 0.004 kg; lognormal SD95 1.4464
  (4,5,2,1,3,5,11)
- Disposal, hazardous waste, 0% water, to underground deposit [DE]: 0.015462 kg; lognormal SD95 1.4464
  (4,5,2,1,3,5,6)
- Packaging film, LDPE, at plant [RER]: 0.0013215 kg; lognormal SD95 1.4464
  (4,5,2,1,3,5,4)
- Light fuel oil, burned in industrial furnace 1MW, non-modulating [RER]: 0.80011 MJ; lognormal SD95 1.4464
  (4,5,2,1,3,5,1)
- Sawnwood, production mix, softwood, raw, dried (u=20%), at sawmill [RER]: 6.118e-7 m3; lognormal SD95 1.4464
  (4,5,2,1,3,5,4)
- Sheet rolling, steel [RER]: 0.0016519 kg; lognormal SD95 1.4464
  (4,5,2,1,3,5,4)
- Natural gas, burned in industrial furnace 1MW [CH]: 0.80011 MJ; lognormal SD95 1.4464
  (4,5,2,1,3,5,1)
- Disposal, municipal solid waste, 22.9% water, to municipal incineration [CH]: 0.023192 kg; lognormal SD95 1.4464
  (4,5,2,1,3,5,6)
- Copper, at regional storage [RER]: 0.039644 kg; lognormal SD95 1.4464
  (4,5,2,1,3,5,3)
- Packaging, corrugated board, mixed fibre, single wall, at plant [RER]: 0.00033037 kg; lognormal SD95 1.4464
  (4,5,2,1,3,5,4)
- Transport, freight, lorry, fleet average [RER]: 0.014085 tkm; lognormal SD95 2.095
  (4,5,n.a.,n.a.,n.a.,n.a.,5)
- Disposal, used mineral oil, 10% water, to hazardous waste incineration [CH]: 0.0024 kg; lognormal SD95 1.4464
  (4,5,2,1,3,5,6)

## Inputs from nature
- Water, cooling, unspecified natural origin/m3 [resources, in water]: 0.006 m3; lognormal SD95 1.4464
  (4,5,2,1,3,5,12)

## Emissions to nature
- DOC, Dissolved Organic Carbon [emissions to water, unspecified]: 2.0551e-5 kg; lognormal SD95 2.7852
  (5,5,5,5,5,5,32)
- COD, Chemical Oxygen Demand [emissions to water, unspecified]: 7.9e-5 kg; lognormal SD95 1.7265
  (4,5,2,1,3,5,32)
- NMVOC, non-methane volatile organic compounds, unspecified origin [emissions to air, unspecified]: 0.0004 kg; lognormal SD95 2.1897
  (4,5,2,1,3,5,23)
- Heat, waste [emissions to air, unspecified]: 0.804 MJ; lognormal SD95 1.4464
  (4,5,2,1,3,5,13)
- TOC, Total Organic Carbon [emissions to water, unspecified]: 2.0551e-5 kg; lognormal SD95 2.7852
  (5,5,5,5,5,5,32)
- BOD5, Biological Oxygen Demand [emissions to water, unspecified]: 7.9e-5 kg; lognormal SD95 2.7852
  (5,5,5,5,5,5,32)
- Water [emissions to water, unspecified]: 5.7 kg; lognormal SD95 2.5196
  (5,5,5,5,5,BU:1.05); All uncertainty-values set to 5.0 by default. Balance of input water

## Sampling procedure
Estimation basing on Aluminium data

## Extrapolations
see technology

## Uncertainty adjustments
The fact that no data were available about the percentage of companies represented by the study cited and the asumptions made, are considered in the uncertainties.

## Sources
- Classen M., Althaus H.-J., Blaser S., Scharnhorst W., Tuchschmid M., Jungbluth N., Faist Emmenegger M., 2009, 2009 - LCI metals - Classen, Final report ecoinvent data v2.1, 10, Swiss Centre for LCI, Empa, ESU-services Ltd., Duebendorf, CH
Classen M., Althaus H.-J., Blaser S., Doka G., Jungbluth N., Tuchschmid M. (2008) Life Cycle Inventories of Metals. Final report ecoinvent data v2.1. Volume: 10. Issue: 0. Swiss Centre for LCI, Empa - TSL. Dübendorf, CH.
Type: Measurement on site
Source: CD-ROM
First author: Classen M.
Other authors: Althaus H.-J., Blaser S., Doka G., Jungbluth N., Tuchschmid M.
Year: 2008
Title of anthology: Final report ecoinvent data v2.1
Place of publication: Dübendorf, CH
Publisher: Swiss Centre for LCI, Empa - TSL
Volume No: 10
Issue No: 0

## Validation
Proof reading validation: Validated for v1.01; Other validation: none;
