# Wind turbine 5MW, offshore, tower

Dataset: EcoSpold 1, unit process, infrastructure
Functional unit: 1 unit
Category: wind power / production of components
Geography: RER
Time period: 2024 to 2024
Share of production covered: 100 %
Generated by: Hanna Kroehnert
accessRestrictedTo: 0
copyright: true

## Included processes
Wind turbine tower, at site including manufacturing, transports, installation, replacements, decommission and waste treatement. Calculated for FU of 1p.
Data of material inputs based on the offshore wind turbine REpower 5M, with a nominal capacity of 5 MW, as used in the Ormonde offshore wind farm, UK.
The distance to installation port is assumed to be 187 km.
Assumed lifetime is 25 years.

Main data source regarding material composition:
Kouloumpis, V., & Azapagic, A. (2022). A model for estimating life cycle environmental impacts of offshore wind electricity considering specific characteristics of wind farms. Sustainable Production and Consumption, 29, 495–506. https://doi.org/10.1016/j.spc.2021.10.024

## Reference product
- Wind turbine 5MW, offshore, tower [RER]: 1 unit

## Inputs from technosphere
- Aluminium, production mix, at plant [RER]: 3978 kg; lognormal SD95 1.1728
  (2,4,3,2,1,3,BU:1.05); Input based on Kouloumpis, V., & Azapagic, A. (2022)
- Steel, low-alloyed, at plant [RER]: 217020 kg; lognormal SD95 1.1728
  (2,4,3,2,1,3,BU:1.05); Input based on Kouloumpis, V., & Azapagic, A. (2022)
- Aluminium product manufacturing, average metal working [RER]: 3978 kg; lognormal SD95 1.1728
  (2,4,3,2,1,3,BU:1.05); Input based on Kouloumpis, V., & Azapagic, A. (2022)
- Sheet rolling, steel [RER]: 217022 kg; lognormal SD95 1.1728
  (2,4,3,2,1,3,BU:1.05); Input based on Kouloumpis, V., & Azapagic, A. (2022)
- Welding, arc, steel [RER]: 342 m; lognormal SD95 1.1728
  (2,4,3,2,1,3,BU:1.05); Input based on Kouloumpis, V., & Azapagic, A. (2022)
- Transport, freight, lorry, fleet average [RER]: 44200 tkm; lognormal SD95 2.0675
  (4,3,3,1,1,3,BU:2); Includes the transportation of components to port of installation.
- Transport, freight, lorry, diesel, 26t gross weight, 2010, EURO-V, regional delivery [RER]: 32953 tkm; lognormal SD95 2.0675
  (4,3,3,1,1,3,BU:2); Includes the transportation of materials to component manufacturing site and components to waste treatement site.
- Transport, transoceanic freight ship [OCE]: 2.0654e7 tkm; lognormal SD95 2.2975
  (4,3,3,1,4,3,BU:2); Includes the transportation of components to installation port and vessel activiy for installation, replacements and decommissioning.
- Operation, freight train, diesel [RER]: 44200 tkm; lognormal SD95 2.0675
  (4,3,3,1,1,3,BU:2); Includes the transportation of components to port of installation.
- Diesel, burned in building machine, average [CH]: 5720 MJ; lognormal SD95 2.2975
  (4,3,3,1,4,3,BU:2); Refers to port crane operation during installation and decommissioning.
- Recycling steel and iron [RER]: 206170 kg; lognormal SD95 1.2748
  (2,4,3,3,3,3,BU:1.05); Own calculation; recycling of steel and iron; assumed recycling rate: 95%
- Disposal, steel, 0% water, to construction waste landfill [CH]: 10851 kg; lognormal SD95 1.2748
  (2,4,3,3,3,3,BU:1.05); Own calculation; landfill of steel and iron; assumed landfill rate: 5%
- Disposal, aluminium, 0% water, to sanitary landfill [CH]: 198.9 kg; lognormal SD95 1.2748
  (2,4,3,3,3,3,BU:1.05); Own calculation; landfill of aluminum; assumed landfill rate: 5%

## Sources
- Kroehnert H., Frehner A., Stucki M., 2025, 2025 - LCI wind Energy - Kroehnert, Project report, 0, ZHAW, Waedenswil, CH

## Validation
22.07.2025
"S:\pools\n\N-IUNR-FG-LCA\Projekte\Wind LCA\LCI-Update\Sachbilanz"
