# Single-Si wafer, electronics, at plant

Dataset: EcoSpold 1, unit process
Functional unit: 1 m2
Category: electronics / photovoltaic
Geography: RER
Time period: 1992-01 to 2006-12
Production volume: 3.6E4 m2 in 2005
Generated by: Niels Jungbluth
accessRestrictedTo: 0
copyright: true

## General comment
The reference flow for the life cycle inventory is 1 square metre of wafer surface. The sc-Silicon columns are sawn into square wafers with a size 156x156 mm2 (0.0243 m2) and a thickness of 190 um. The weight is 443 g/m2. The sawing losses are 443g/m2.;
Synonyms: monocrystalline, single crystalline, silicon;

## Included processes
Sawing and cleaning of wafers. The process data include electricity use, water and working material consumption (e.g. stainless steel for saw-blades, argon gas, hydrofluoric and hydrochloric acid). Production wastes to be treated and process-specific NOx- and waterborne pollutants are considered. No data on other process specific air emissions.

## Technology
Use of multi wire saws.

## Time period
Collection of data in 2005. Use of data from an environmental report of a production plant (ca. 3 million wafers per year) and some data from older publications.

## Reference product
- Single-Si wafer, electronics, at plant [RER]: 1 m2
  Europe

## Inputs from technosphere
- Triethylene glycol, recycling, at plant [RER]: 2.6 kg; lognormal SD95 1.0744
  (1,2,1,1,1,3); For sawing slurry, de Wild 2007
- Argon, liquid, at plant [RER]: 0.575 kg; lognormal SD95 1.2645
  (3,4,2,3,1,5); Protection gas sawing, Phylipsen 1995
- Triethylene glycol, at plant [RER]: 0.11 kg; lognormal SD95 1.0744
  (1,2,1,1,1,3); For sawing slurry, de Wild 2007
- Tap water, at user [RER]: 685.09 kg; lognormal SD95 1.0744
  (1,2,1,1,1,3); Wacker 2006
- Brass, at plant [CH]: 0.00745 kg; lognormal SD95 1.0744
  (1,2,1,1,1,3); de Wild 2007, wire saws, high resistance brass-coated steel with carbon content in the range 0.7%-0.9%, 5g/kg brass
- Silicon carbide, at plant [RER]: 0.49 kg; lognormal SD95 1.0744
  (1,2,1,1,1,3); de Wild 2007, SiC use for sawing
- Paper, woodfree, coated, at integrated mill [RER]: 0.19 kg; lognormal SD95 1.286
  (3,4,3,3,1,5); Hagedorn 1992
- Transport, freight, lorry, fleet average [RER]: 1.5123 tkm; lognormal SD95 2.095
  (4,5,na,na,na,na); Standard distance, 200km for silicon input
- Disposal, waste, silicon wafer production, 0% water, to underground deposit [DE]: 0.061681 kg; lognormal SD95 1.0744
  (1,2,1,1,1,3); Environmental report Wacker 2000
- Alkylbenzene sulfonate, linear, petrochemical, at plant [RER]: 0.24 kg; lognormal SD95 1.0744
  (1,2,1,1,1,3); de Wild 2007, for wafer cleaning
- Steel, low-alloyed, at plant [RER]: 1.4825 kg; lognormal SD95 1.0744
  (same comment as for Brass, at plant)
- Wire drawing, steel [RER]: 1.49 kg; lognormal SD95 1.0744
  (1,2,1,1,1,3); de Wild 2007, wire saws
- Disposal, waste, Si waferprod., inorg, 9.4% water, to residual material landfill [CH]: 7.2603 kg; lognormal SD95 1.2435
  (2,4,1,3,1,5); Environmental report Wacker 2000
- Acrylic binder, 34% in H2O, at plant [RER]: 0.002 kg; lognormal SD95 1.0744
  (1,2,1,1,1,3); de Wild 2007, adhesive for temporarily attachment of bricks to wire-sawing equipment
- Silicon carbide, recycling, at plant [RER]: 2.14 kg; lognormal SD95 1.0744
  (1,2,1,1,1,3); de Wild 2007, SiC use for sawing
- Wafer factory [DE]: 4e-6 p; lognormal SD95 3.0038
  (1,2,1,1,1,3); Literature
- Nitric acid, 50% in H2O, at plant [RER]: 0.37037 kg; lognormal SD95 1.5805
  (5,4,1,3,1,5); calculated with NOx emissions, Wacker 2006
- Acetic acid, 98% in H2O, at plant [RER]: 0.039 kg; lognormal SD95 1.0744
  (1,2,1,1,1,3); de Wild 2007, for wafer cleaning
- Hydrochloric acid, 30% in H2O, at plant [RER]: 0.0027 kg; lognormal SD95 1.0744
  (1,2,1,1,1,3); de Wild 2007, for wafer cleaning
- Electricity, medium voltage, production ENTSO-E, at grid: 30 kWh; lognormal SD95 2.0742
  (3,4,1,3,1,5); Estimation based on literature data, high range of literature values
- Disposal, municipal solid waste, 22.9% water, to sanitary landfill [CH]: 1.7116 kg; lognormal SD95 1.2435
  (2,4,1,3,1,5); Environmental report Wacker 2000
- Glass wool mat, at plant [CH]: 0.01 kg; lognormal SD95 1.0744
  (2,2,1,1,1,na); de Wild 2007, for temporarily attachment of bricks to wire sawing equipment
- Polystyrene, high impact, HIPS, at plant [RER]: 0.2 kg; lognormal SD95 1.344
  (4,4,3,3,1,5); estimation packaging
- Dipropylene glycol monomethyl ether, at plant [RER]: 0.3 kg; lognormal SD95 1.0744
  (1,2,1,1,1,3); de Wild 2007, for wafer cleaning
- CZ single crystalline silicon, electronics, at plant [RER]: 0.8854 kg; lognormal SD95 1.0744
  (1,2,1,1,1,3); Own calculation with de Wild 2007 data
- Packaging film, LDPE, at plant [RER]: 0.1 kg; lognormal SD95 1.344
  (4,4,3,3,1,5); estimation packaging
- Sodium hydroxide, 50% in H2O, production mix, at plant [RER]: 0.015 kg; lognormal SD95 1.0744
  (1,2,1,1,1,3); de Wild 2007, for wafer cleaning
- Transport, freight, rail [RER]: 4.4126 tkm; lognormal SD95 2.095
  (4,5,na,na,na,na); Standard distance
- Natural gas, burned in industrial furnace 1MW [CH]: 4 MJ; lognormal SD95 1.0744
  (1,2,1,1,1,3); de Wild 2007, for removing adhesive after sawing

## Emissions to nature
- Nickel [emissions to water, river]: 6.0508e-5 kg; lognormal SD95 5.0716
  (2,4,2,3,1,5); Environmental report Wacker 2000
- TOC, Total Organic Carbon [emissions to water, river]: 0.011083 kg; lognormal SD95 1.5935
  (3,4,2,3,1,5); Extrapolation for sum parameter
- BOD5, Biological Oxygen Demand [emissions to water, river]: 0.029555 kg; lognormal SD95 1.5935
  (3,4,2,3,1,5); Extrapolation for sum parameter
- AOX, Adsorbable Organic Halogen as Cl [emissions to water, river]: 0.00050129 kg; lognormal SD95 1.5805
  (2,4,1,3,1,5); Environmental report Wacker 2006, formed by nitric acid use
- Copper [emissions to water, river]: 6.0508e-5 kg; lognormal SD95 3.0628
  (2,4,2,3,1,5); Environmental report Wacker 2000
- Nitrogen oxides [emissions to air, high. pop.]: 0.37037 kg; lognormal SD95 1.5805
  (2,4,1,3,1,5); Environmental report Wacker 2006
- Mercury [emissions to water, river]: 6.0508e-6 kg; lognormal SD95 5.0716
  (2,4,2,3,1,5); Environmental report Wacker 2000
- Nitrogen [emissions to water, river]: 0.0099449 kg; lognormal SD95 1.5805
  (2,4,1,3,1,5); Environmental report Wacker 2006, 50% of total emissions
- Heat, waste [emissions to air, high. pop.]: 108 MJ; lognormal SD95 1.2621
  (3,4,1,3,1,5); Calculation
- DOC, Dissolved Organic Carbon [emissions to water, river]: 0.011083 kg; lognormal SD95 1.5935
  (3,4,2,3,1,5); Extrapolation for sum parameter
- Chromium [emissions to water, river]: 3.0254e-5 kg; lognormal SD95 3.0628
  (2,4,2,3,1,5); Environmental report Wacker 2000
- Phosphate [emissions to water, river]: 0.00050129 kg; lognormal SD95 1.5805
  (2,4,1,3,1,5); Environmental report Wacker 2006
- COD, Chemical Oxygen Demand [emissions to water, river]: 0.029555 kg; lognormal SD95 1.5805
  (2,4,1,3,1,5); Environmental report Wacker 2000
- Lead [emissions to water, river]: 3.0254e-5 kg; lognormal SD95 5.0716
  (2,4,2,3,1,5); Environmental report Wacker 2000
- Cadmium [emissions to water, river]: 6.0508e-6 kg; lognormal SD95 3.0628
  (2,4,2,3,1,5); Environmental report Wacker 2000

## Sampling procedure
Data collection by factory representatives. Environmental report and LCA studies.

## Extrapolations
own estimation with data for PV wafer

## Sources
- Jungbluth N., Stucki M., Flury K., Frischknecht R., Buesser S., 2012, 2012 - LCI photovoltaics - Jungbluth, 0, 407, ESU-services Ltd., Uster, CH
Jungbluth, N., Stucki M., Fluri K., Frischknecht R., Buesser S. (2012) Life Cycle Inventories of Photovoltaics. 0. Editors: Bauer C.. Volume: 407. ESU-services ltd.. Uster, CH.
Type: Separate publication
Source: www.esu-services.ch
First author: Jungbluth, N.
Other authors: Stucki M., Fluri K., Frischknecht R., Buesser S.
Year: 2012
Name of editors: Bauer C.
Title of anthology: 0
Place of publication: Uster, CH
Publisher: ESU-services ltd.
Volume No: 407

## Validation
Proof reading validation: 04.04.2012; Other validation: \\server\e\ESU-Docs\Projekte laufend\407 Update LCI Energiesysteme\EcoSpold\Fotovoltaik\[407_photovoltaics-v1.0.xlsx]X-Process;
