# Disposal, separator sludge, 90% water, to hazardous waste incineration

Dataset: EcoSpold 1, unit process
Functional unit: 1 kg
Category: incineration / hazardous waste incineration
Geography: CH
Time period: 2000-01 to 2000-12
Production volume: 2 Swiss HWI plants with a total capacity of 53'000 t/a.
Share of production covered: 39 %
Generated by: Gabor Doka
accessRestrictedTo: 0
copyright: true

## General comment
Inventoried waste contains 100% separator sludge; . waste composition (wet, in ppm): upper heating value 0.9 MJ/kg; H2O 900000; O 197; H 2659.5; C 16745; S 98.5; N 2.7196; P 149; B 2.1; Cl 400; Br n.a.; F 0.0077703; I n.a.; Ag n.a.; As 0.5; Ba 27; Cd 0.66; Co 10.4; Cr 71.3; Cu 548.1; Hg 0.22; Mn 40.5; Mo 0.5; Ni 37.6; Pb 27.6; Sb 0.49; Se n.a.; Sn 1.7; V 0.85; Zn 270.6; Be n.a.; Sc n.a.; Sr 30; Ti n.a.; Tl n.a.; W n.a.; Si n.a.; Fe 3400; Ca 18200; Al 133.5; K 148; Mg 1670; Na 71; Share of carbon in waste that is biogenic 0%. Net energy produced in HWI: 17.11MJ/kg electric energy and 1.27MJ/kg thermal energy Allocation of energy production: no substitution or expansion. 100% of burden allocated to waste disposal function of HWI. One kg of this waste produces 0.03149 kg of residues, which are landfilled. Additional solidification with 0.01259 kg of cement.;;

## Included processes
waste-specific air and water emissions from incineration, auxiliary material consumption for flue gas cleaning. Short-term emissions to river water and long-term emissions to ground water from residual material landfill (from solidified fly ashes and scrubber slugde). Process energy demands for HWI.

## Geography
Specific to the technology encountered in Switzerland in 2000. Well applicable to modern incineration practices in Europe or North America or Japan.

## Technology
Swiss HWI plant in 2000 with wet flue gas scrubber and low-dust SCR DeNOx facility. Gross thermal efficiency 74.4% and gross electric efficiency 10%.

## Time period
Transfer coefficients for modern Swiss MSWI. Emission speciation based on early 90ies data.

## Reference product
- Disposal, separator sludge, 90% water, to hazardous waste incineration [CH]: 1 kg
  SWITZERLAND

## Inputs from technosphere
- Chemicals organic, at plant [GLO]: 4.9628e-6 kg; lognormal SD95 10.884
  Proxy for TMT15. uncertainty calculated from uncertainty in average auxiliary material input, and the unertainty of the waste composition of this waste
- Residual material landfill facility [CH]: 6.5596e-11 p; lognormal SD95 2.6366
  uncertainty is calculated from uncertainties in waste composition and transfer coefficients in incinerator
- Hydrochloric acid, 30% in H2O, at plant [RER]: 4.8578e-5 kg; lognormal SD95 2.5134
  uncertainty calculated from uncertainty in average auxiliary material input, and the unertainty of the waste composition of this waste
- Natural gas, burned in industrial furnace 1MW [CH]: 5.3794e-5 MJ; lognormal SD95 17.173
  uncertainty calculated from uncertainty in average DeNOx input, uncertainty in the share of thermal NOx, uncertainty of nitrogen content in average municipal waste and the unertainty in nitrogen content in *this* waste.
- Process-specific burdens, hazardous waste incineration plant [CH]: 1 kg; lognormal SD95 1
  demands per kilogram waste. uncertainty is heeded in the module
- Disposal, cement, hydrated, 0% water, to residual material landfill [CH]: 0.031486 kg; lognormal SD95 2.686
  Hydrated cement for solidification of landfilled residual material. Uncertainty calculated from unertainty of the waste composition of this waste and transfer coefficients in the incinerator and of the solidification recipe.
- Transport, freight, lorry, 16t-32t gross weight, fleet average [CH]: 0.0024603 tkm; lognormal SD95 1.8212
  uncertainty calculated from calculated from uncertainties in waste composition, in transfer coefficients in incinerator, uncertainty in average auxiliary material input, the unertainty of the waste composition of this waste and the uncertainty in generic transportation distances
- Quicklime, milled, packed, at plant [CH]: 0.00010839 kg; lognormal SD95 3.7155
  (same comment as for Hydrochloric acid, 30% in H2O, at plant)
- Process-specific burdens, residual material landfill [CH]: 0.031486 kg; lognormal SD95 2.6366
  (same comment as for Residual material landfill facility)
- Chromium, at regional storage [RER]: 7.9482e-11 kg; lognormal SD95 20.808
  Proxy for vanadium pentoxide V2O5 in SCR catalyst. uncertainty calculated from uncertainty in average DeNOx input, uncertainty in the share of thermal NOx, uncertainty of nitrogen content in average municipal waste and the unertainty in nitrogen content in *this* waste.
- Hydrogen peroxide, 50% in H2O, at plant [RER]: 4.4298e-7 kg; lognormal SD95 7.1269
  (same comment as for Hydrochloric acid, 30% in H2O, at plant)
- Cement, unspecified, at plant [CH]: 0.012595 kg; lognormal SD95 2.686
  Cement for solidification of landfilled residual material. Uncertainty calculated from unertainty of the waste composition of this waste, of transfer coefficients in the incinerator and of the solidification recipe.
- Iron (III) chloride, 40% in H2O, at plant [CH]: 0.00061877 kg; lognormal SD95 3.2157
  (same comment as for Hydrochloric acid, 30% in H2O, at plant)
- Ammonia, liquid, at regional storehouse [CH]: 9.9182e-8 kg; lognormal SD95 16.07
  (same comment as for Natural gas, burned in industrial furnace 1MW)
- Transport, freight, rail [RER]: 0.006254 tkm; lognormal SD95 1.8277
  uncertainty calculated from uncertainty in average auxiliary material input, the unertainty of the waste composition of this waste and the uncertainty in generic transportation distances
- Calcium chloride, CaCl2, at regional storage [CH]: 0.00051667 kg; lognormal SD95 6.9741
  (same comment as for Hydrochloric acid, 30% in H2O, at plant)
- Sodium hydroxide, 50% in H2O, production mix, at plant [RER]: 0.0010336 kg; lognormal SD95 3.5777
  (same comment as for Hydrochloric acid, 30% in H2O, at plant)
- Titanium dioxide, production mix, at plant [RER]: 3.8946e-9 kg; lognormal SD95 20.808
  (same comment as for Natural gas, burned in industrial furnace 1MW)
- Hazardous waste incineration plant [CH]: 1.25e-9 p; lognormal SD95 1
  demands per kilogram waste. uncertainty is heeded in the module
- Light fuel oil, burned in boiler 100kW, non-modulating [CH]: 23 MJ; lognormal SD95 1.53
  Uncertainty dependent on total energy required and heating value present, using experimental GSd for substraction from uc=A*GSDa^2-B
- Chemicals inorganic, at plant [GLO]: 8.0963e-5 kg; lognormal SD95 2.5134
  Proxy for Polyelectrolyte. uncertainty calculated from uncertainty in average auxiliary material input, and the unertainty of the waste composition of this waste

## Emissions to nature
- Hydrogen fluoride [emissions to air, high. pop.]: 1.9551e-12 kg; lognormal SD95 16.33
  (same comment as for Residual material landfill facility)
- Lead [emissions to water, groundwater, long-term]: 1.4316e-7 kg; lognormal SD95 291.79
  Long-term emissions from landfilling of incineration residues. uncertainty is calculated from uncertainties in waste composition and transfer coefficients in incinerator and landfills.
- Sodium [emissions to air, high. pop.]: 6.6802e-7 kg; lognormal SD95 7.5165
  (same comment as for Residual material landfill facility)
- Vanadium [emissions to air, high. pop.]: 8.5e-11 kg; lognormal SD95 12.796
  (same comment as for Residual material landfill facility)
- Cadmium [emissions to water, river]: 2.9823e-10 kg; lognormal SD95 12.362
  uncertainty is calculated from uncertainties in waste composition and transfer coefficients in incinerator and landfills
- Phosphate [emissions to water, groundwater, long-term]: 0.00010043 kg; lognormal SD95 11.301
  (same comment as for Lead)
- Sodium [emissions to water, groundwater, long-term]: 4.3938e-5 kg; lognormal SD95 7.4896
  (same comment as for Lead)
- Iron [emissions to air, high. pop.]: 2.38e-6 kg; lognormal SD95 4.2435
  (same comment as for Residual material landfill facility)
- Manganese [emissions to water, groundwater, long-term]: 3.3454e-7 kg; lognormal SD95 186.45
  (same comment as for Lead)
- BOD5, Biological Oxygen Demand [emissions to water, river]: 8.4139e-7 kg; lognormal SD95 4.1841
  (same comment as for Cadmium)
- Potassium [emissions to water, river]: 4.1593e-5 kg; lognormal SD95 7.0387
  (same comment as for Cadmium)
- BOD5, Biological Oxygen Demand [emissions to water, groundwater, long-term]: 0.00027206 kg; lognormal SD95 3.3388
  (same comment as for Lead)
- Copper [emissions to air, high. pop.]: 3.8367e-7 kg; lognormal SD95 5.7073
  (same comment as for Residual material landfill facility)
- DOC, Dissolved Organic Carbon [emissions to water, river]: 3.6811e-7 kg; lognormal SD95 4.1841
  (same comment as for Cadmium)
- Sulfur dioxide [emissions to air, high. pop.]: 1.182e-7 kg; lognormal SD95 7.2925
  (same comment as for Residual material landfill facility)
- COD, Chemical Oxygen Demand [emissions to water, river]: 8.4139e-7 kg; lognormal SD95 4.1841
  (same comment as for Cadmium)
- Dinitrogen monoxide [emissions to air, high. pop.]: 9.6829e-9 kg; lognormal SD95 16.229
  uncertainty calculated from uncertainty for proxy (from MSWI), uncertainty in average N-emissions, uncertainty in the share of thermal NOx, uncertainty of nitrogen content in average municipal waste and the unertainty in nitrogen content in *this* waste.
- Antimony [emissions to water, river]: 1.7286e-7 kg; lognormal SD95 13.466
  (same comment as for Cadmium)
- Antimony [emissions to water, groundwater, long-term]: 3.1714e-7 kg; lognormal SD95 13.226
  (same comment as for Lead)
- Arsenic [emissions to water, river]: 5e-7 kg; lognormal SD95 13.142
  (same comment as for Cadmium)
- Chromium [emissions to air, high. pop.]: 5.272e-12 kg; lognormal SD95 8.1636
  (same comment as for Residual material landfill facility)
- Zinc [emissions to water, river]: 3.6315e-6 kg; lognormal SD95 6.2181
  (same comment as for Cadmium)
- TOC, Total Organic Carbon [emissions to water, groundwater, long-term]: 0.00011902 kg; lognormal SD95 3.3388
  (same comment as for Lead)
- Boron [emissions to water, river]: 3.2844e-7 kg; lognormal SD95 10.735
  (same comment as for Cadmium)
- Antimony [emissions to air, high. pop.]: 1.906e-15 kg; lognormal SD95 14.496
  (same comment as for Residual material landfill facility)
- Magnesium [emissions to water, river]: 3.1634e-7 kg; lognormal SD95 11.226
  (same comment as for Cadmium)
- Magnesium [emissions to air, high. pop.]: 2.2996e-6 kg; lognormal SD95 4.7649
  (same comment as for Residual material landfill facility)
- Carbon monoxide, fossil [emissions to air, high. pop.]: 1.2076e-5 kg; lognormal SD95 5.07
  (1,4,1,1,3,1) & basic uncertainty of 5; 1 plant for waste solvent incineration in Switzerland
- Molybdenum [emissions to water, river]: 4.9671e-7 kg; lognormal SD95 13.144
  (same comment as for Cadmium)
- Barium [emissions to air, high. pop.]: 2.7e-8 kg; lognormal SD95 8.59
  (same comment as for Residual material landfill facility)
- Iron [emissions to water, groundwater, long-term]: 3.34e-6 kg; lognormal SD95 240.34
  (same comment as for Lead)
- Copper [emissions to water, groundwater, long-term]: 2.0179e-5 kg; lognormal SD95 39.716
  (same comment as for Lead)
- Lead [emissions to air, high. pop.]: 1.0245e-9 kg; lognormal SD95 8.7349
  (same comment as for Residual material landfill facility)
- Calcium [emissions to water, groundwater, long-term]: 0.0016418 kg; lognormal SD95 14.009
  (same comment as for Lead)
- Boron [emissions to water, groundwater, long-term]: 1.5059e-6 kg; lognormal SD95 11.329
  (same comment as for Lead)
- Cobalt [emissions to air, high. pop.]: 7.28e-9 kg; lognormal SD95 9.6494
  (same comment as for Residual material landfill facility)
- Hydrogen chloride [emissions to air, high. pop.]: 1.2338e-7 kg; lognormal SD95 6.0157
  (same comment as for Residual material landfill facility)
- Tin [emissions to water, groundwater, long-term]: 3.2171e-8 kg; lognormal SD95 105.81
  (same comment as for Lead)
- Zinc [emissions to air, high. pop.]: 1.8942e-7 kg; lognormal SD95 6.3329
  (same comment as for Residual material landfill facility)
- Manganese [emissions to water, river]: 9.6349e-10 kg; lognormal SD95 14.034
  (same comment as for Cadmium)
- Cobalt [emissions to water, river]: 1.0393e-5 kg; lognormal SD95 9.4632
  (same comment as for Cadmium)
- Sodium [emissions to water, river]: 2.6394e-5 kg; lognormal SD95 7.6426
  (same comment as for Cadmium)
- Chromium VI [emissions to water, groundwater, long-term]: 1.3496e-5 kg; lognormal SD95 7.4906
  (same comment as for Lead)
- Arsenic [emissions to air, high. pop.]: 5.1e-15 kg; lognormal SD95 14.356
  (same comment as for Residual material landfill facility)
- Fluoride [emissions to water, groundwater, long-term]: 1.2494e-11 kg; lognormal SD95 16.203
  (same comment as for Lead)
- Vanadium [emissions to water, groundwater, long-term]: 6.5325e-7 kg; lognormal SD95 12.628
  (same comment as for Lead)
- Aluminium [emissions to air, high. pop.]: 2.0855e-7 kg; lognormal SD95 6.9612
  (same comment as for Residual material landfill facility)
- DOC, Dissolved Organic Carbon [emissions to water, groundwater, long-term]: 0.00011902 kg; lognormal SD95 3.3388
  (same comment as for Lead)
- Aluminium [emissions to water, river]: 6.6057e-8 kg; lognormal SD95 13.237
  (same comment as for Cadmium)
- Phosphorus [emissions to air, high. pop.]: 1.043e-7 kg; lognormal SD95 6.8875
  (same comment as for Residual material landfill facility)
- Tin [emissions to water, river]: 7.6258e-11 kg; lognormal SD95 19.72
  (same comment as for Cadmium)
- Magnesium [emissions to water, groundwater, long-term]: 0.00018949 kg; lognormal SD95 14.346
  (same comment as for Lead)
- Calcium [emissions to water, river]: 2.7409e-6 kg; lognormal SD95 8.9301
  (same comment as for Cadmium)
- Nitrogen oxides [emissions to air, high. pop.]: 6.9932e-8 kg; lognormal SD95 16.543
  uncertainty calculated from uncertainty in average N-emissions, uncertainty in the share of thermal NOx, uncertainty of nitrogen content in average municipal waste and the unertainty in nitrogen content in *this* waste.
- COD, Chemical Oxygen Demand [emissions to water, groundwater, long-term]: 0.00027206 kg; lognormal SD95 3.3388
  (same comment as for Lead)
- Iron [emissions to water, river]: 0.0027312 kg; lognormal SD95 4.1151
  (same comment as for Cadmium)
- Molybdenum [emissions to water, groundwater, long-term]: 2.2909e-9 kg; lognormal SD95 13.385
  (same comment as for Lead)
- Mercury [emissions to water, river]: 2.3196e-9 kg; lognormal SD95 14.131
  (same comment as for Cadmium)
- Fluoride [emissions to water, river]: 7.756e-9 kg; lognormal SD95 15.998
  (same comment as for Cadmium)
- Tin [emissions to air, high. pop.]: 2.2551e-9 kg; lognormal SD95 11.763
  (same comment as for Residual material landfill facility)
- Vanadium [emissions to water, river]: 2.0943e-9 kg; lognormal SD95 18.425
  (same comment as for Cadmium)
- Phosphate [emissions to water, river]: 7.1538e-6 kg; lognormal SD95 6.5127
  (same comment as for Cadmium)
- Strontium [emissions to air, high. pop.]: 3e-9 kg; lognormal SD95 8.5902
  (same comment as for Residual material landfill facility)
- Nickel [emissions to air, high. pop.]: 2.632e-8 kg; lognormal SD95 8.2575
  (same comment as for Residual material landfill facility)
- Barium [emissions to water, river]: 3.7196e-10 kg; lognormal SD95 21.508
  (same comment as for Cadmium)
- Strontium [emissions to water, groundwater, long-term]: 1.086e-5 kg; lognormal SD95 10.482
  (same comment as for Lead)
- Mercury [emissions to water, groundwater, long-term]: 1.0276e-8 kg; lognormal SD95 57.227
  (same comment as for Lead)
- Barium [emissions to water, groundwater, long-term]: 2.228e-7 kg; lognormal SD95 190.33
  (same comment as for Lead)
- Zinc [emissions to water, groundwater, long-term]: 3.2697e-6 kg; lognormal SD95 117.19
  (same comment as for Lead)
- Nickel [emissions to water, groundwater, long-term]: 1.0819e-5 kg; lognormal SD95 10.217
  (same comment as for Lead)
- Boron [emissions to air, high. pop.]: 2.52e-7 kg; lognormal SD95 11.348
  (same comment as for Residual material landfill facility)
- Potassium [emissions to water, groundwater, long-term]: 0.00010596 kg; lognormal SD95 6.765
  (same comment as for Lead)
- Cyanide [emissions to air, high. pop.]: 2.4207e-9 kg; lognormal SD95 16.229
  (same comment as for Dinitrogen monoxide)
- Arsenic [emissions to water, groundwater, long-term]: 4.99e-16 kg; lognormal SD95 13.386
  (same comment as for Lead)
- Cadmium [emissions to water, groundwater, long-term]: 4.4784e-9 kg; lognormal SD95 271.81
  (same comment as for Lead)
- Strontium [emissions to water, river]: 1.813e-8 kg; lognormal SD95 15.081
  (same comment as for Cadmium)
- Lead [emissions to water, river]: 7.5123e-10 kg; lognormal SD95 10.154
  (same comment as for Cadmium)
- Sulfate [emissions to water, river]: 0.00028403 kg; lognormal SD95 7.0804
  (same comment as for Cadmium)
- Molybdenum [emissions to air, high. pop.]: 1e-9 kg; lognormal SD95 13.312
  (same comment as for Residual material landfill facility)
- Manganese [emissions to air, high. pop.]: 2.2052e-13 kg; lognormal SD95 8.981
  (same comment as for Residual material landfill facility)
- Chloride [emissions to water, groundwater, long-term]: 4.8551e-7 kg; lognormal SD95 5.977
  (same comment as for Lead)
- Chromium VI [emissions to water, river]: 4.4996e-6 kg; lognormal SD95 8.2292
  (same comment as for Cadmium)
- Carbon dioxide, fossil [emissions to air, high. pop.]: 0.060691 kg; lognormal SD95 3.0278
  calculated from uncertainty in carbon in waste and transfer coefficients
- Sulfate [emissions to water, groundwater, long-term]: 1.129e-5 kg; lognormal SD95 7.1643
  (same comment as for Lead)
- Ammonia [emissions to air, high. pop.]: 2.6897e-9 kg; lognormal SD95 16.543
  (same comment as for Nitrogen oxides)
- Copper [emissions to water, river]: 2.3547e-5 kg; lognormal SD95 5.5771
  (same comment as for Cadmium)
- Chloride [emissions to water, river]: 0.00039939 kg; lognormal SD95 5.8325
  (same comment as for Cadmium)
- Nitrate [emissions to water, groundwater, long-term]: 9.7697e-8 kg; lognormal SD95 11.12
  (same comment as for Lead)
- Aluminium [emissions to water, groundwater, long-term]: 3.9568e-5 kg; lognormal SD95 9.7141
  (same comment as for Lead)
- TOC, Total Organic Carbon [emissions to water, river]: 3.6811e-7 kg; lognormal SD95 4.1841
  (same comment as for Cadmium)
- Cadmium [emissions to air, high. pop.]: 3.6345e-11 kg; lognormal SD95 13.168
  (same comment as for Residual material landfill facility)
- Mercury [emissions to air, high. pop.]: 7.598e-15 kg; lognormal SD95 15.372
  (same comment as for Residual material landfill facility)
- Potassium [emissions to air, high. pop.]: 4.462e-7 kg; lognormal SD95 6.8402
  (same comment as for Residual material landfill facility)
- Nickel [emissions to water, river]: 7.7073e-6 kg; lognormal SD95 8.0613
  (same comment as for Cadmium)
- Nitrate [emissions to water, river]: 3.4787e-8 kg; lognormal SD95 7.9624
  (same comment as for Cadmium)
- Calcium [emissions to air, high. pop.]: 3.034e-5 kg; lognormal SD95 3.0703
  (same comment as for Residual material landfill facility)

## Sampling procedure
The 2 Swiss HWI plants, used as the inventory reference technology mix, have a total annual capacity of 53'000 tons of hazardous waste. This corresponds to 39% of the Swiss total installed capacity in 2000. Swiss average plants size is 20'000 t/a.

## Sources
- Doka G., 2009, 2009 - LCI waste treatment services - Doka, Final report ecoinvent data v2.1, 13, Swiss Centre for LCI, Doka LCA, Duebendorf and St. Gallen, CH
Doka G. (2008) Life Cycle Inventories of Waste Treatment Services. Final report ecoinvent data v2.1. Volume: 13. Issue: 0. Swiss Centre for LCI, Empa - TSL. Dübendorf, CH.
Type: Measurement on site
Source: CD-ROM
First author: Doka G.
Year: 2008
Title of anthology: Final report ecoinvent data v2.1
Place of publication: Dübendorf, CH
Publisher: Swiss Centre for LCI, Empa - TSL
Volume No: 13
Issue No: 0

## Validation
Proof reading validation: passed.; Other validation: none;
