# Disposal, nickel smelter slag, 0% water, to residual material landfill

Dataset: EcoSpold 1, unit process
Functional unit: 1 kg
Category: landfill / residual material landfill
Geography: CH
Time period: 2000-01 to 2000-12
Generated by: Gabor Doka
accessRestrictedTo: 0
copyright: true

## General comment
Inventoried waste contains 100% Nickel smelting slag; . waste composition (wet, in ppm): H2O n.a.; O 432120; H n.a.; C 3450; S n.a.; N n.a.; P n.a.; B n.a.; Cl n.a.; Br n.a.; F n.a.; I n.a.; Ag n.a.; As n.a.; Ba n.a.; Cd n.a.; Co 1116.7; Cr n.a.; Cu 800; Hg n.a.; Mn n.a.; Mo n.a.; Ni 1900; Pb n.a.; Sb n.a.; Se n.a.; Sn n.a.; V n.a.; Zn n.a.; Be n.a.; Sc n.a.; Sr n.a.; Ti n.a.; Tl n.a.; W n.a.; Si 164110; Fe 385000; Ca 11500; Al n.a.; K n.a.; Mg n.a.; Na n.a.; Share of carbon in waste that is biogenic 0%. ;;

## Included processes
Waste-specific short-term emissions to water from leachate. Long-term emissions from landfill to ground water.

## Geography
Technology encountered in Switzerland in 2000. Landfill includes base seal and leachate collection system.

## Technology
Swiss residual material landfill for polluted, inorganic waste. With base seal and leachate collection system. Recultivation after closure.

## Time period
Waste composition as given in literature reference, theoretical data or other source. Transfer coefficients from prospective model.

## Reference product
- Disposal, nickel smelter slag, 0% water, to residual material landfill [CH]: 1 kg
  SWITZERLAND

## Inputs from technosphere
- Process-specific burdens, residual material landfill [CH]: 1 kg; lognormal SD95 1
  demands per kilogram waste. uncertainty is heeded in the module
- Residual material landfill facility [CH]: 2.0833e-9 p; lognormal SD95 1
  demands per kilogram waste. uncertainty is heeded in the module

## Emissions to nature
- BOD5, Biological Oxygen Demand [emissions to water, river]: 3.0768e-6 kg; lognormal SD95 8.4722
  uncertainty is calculated from uncertainties in waste composition and transfer coefficients in residual landfill
- Iron [emissions to water, river]: 3.2214e-6 kg; lognormal SD95 9.8547
  (same comment as for BOD5, Biological Oxygen Demand)
- COD, Chemical Oxygen Demand [emissions to water, groundwater, long-term]: 0.0056345 kg; lognormal SD95 4.3838
  uncertainty is calculated from uncertainties in waste composition and transfer coefficients in incinerator and landfills.
- Calcium [emissions to water, river]: 1.7348e-6 kg; lognormal SD95 9.3723
  (same comment as for BOD5, Biological Oxygen Demand)
- BOD5, Biological Oxygen Demand [emissions to water, groundwater, long-term]: 0.001843 kg; lognormal SD95 4.3838
  (same comment as for COD, Chemical Oxygen Demand)
- Copper [emissions to water, river]: 5.1412e-8 kg; lognormal SD95 13.577
  (same comment as for BOD5, Biological Oxygen Demand)
- Nickel [emissions to water, groundwater, long-term]: 0.00068787 kg; lognormal SD95 6.2015
  (same comment as for COD, Chemical Oxygen Demand)
- Cobalt [emissions to water, groundwater, long-term]: 0.00019091 kg; lognormal SD95 10.869
  (same comment as for COD, Chemical Oxygen Demand)
- Silicon [emissions to water, groundwater, long-term]: 0.16374 kg; lognormal SD95 1.761
  (same comment as for COD, Chemical Oxygen Demand)
- COD, Chemical Oxygen Demand [emissions to water, river]: 9.4065e-6 kg; lognormal SD95 8.4722
  (same comment as for BOD5, Biological Oxygen Demand)
- Copper [emissions to water, groundwater, long-term]: 3.0796e-5 kg; lognormal SD95 38.655
  (same comment as for COD, Chemical Oxygen Demand)
- DOC, Dissolved Organic Carbon [emissions to water, river]: 3.7222e-6 kg; lognormal SD95 8.4722
  (same comment as for BOD5, Biological Oxygen Demand)
- Iron [emissions to water, groundwater, long-term]: 0.0019296 kg; lognormal SD95 201.44
  (same comment as for COD, Chemical Oxygen Demand)
- DOC, Dissolved Organic Carbon [emissions to water, groundwater, long-term]: 0.0022296 kg; lognormal SD95 4.3838
  (same comment as for COD, Chemical Oxygen Demand)
- TOC, Total Organic Carbon [emissions to water, groundwater, long-term]: 0.0022296 kg; lognormal SD95 4.3838
  (same comment as for COD, Chemical Oxygen Demand)
- Cobalt [emissions to water, river]: 3.1871e-7 kg; lognormal SD95 11.209
  (same comment as for BOD5, Biological Oxygen Demand)
- Silicon [emissions to water, river]: 0.00036908 kg; lognormal SD95 4.8837
  (same comment as for BOD5, Biological Oxygen Demand)
- Calcium [emissions to water, groundwater, long-term]: 0.0010391 kg; lognormal SD95 14.584
  (same comment as for COD, Chemical Oxygen Demand)
- Nickel [emissions to water, river]: 1.1484e-6 kg; lognormal SD95 9.7191
  (same comment as for BOD5, Biological Oxygen Demand)
- TOC, Total Organic Carbon [emissions to water, river]: 3.7222e-6 kg; lognormal SD95 8.4722
  (same comment as for BOD5, Biological Oxygen Demand)

## Sampling procedure
Landfill model based on observed leachate concentrations in literature. Extrapolated to 60'000 years heeding chemical characteristics. Initial waste composition from various literature sources.

## Uncertainty adjustments
uncertainty of waste input composition data derived from generic formula GSD(c) = N*ln(c)+1. Mean long-term emissions are the emissions until the next glacial period occurs (in 60'000a) and the landfill is eroded. Maximal long-term emissions are the complete emissions of all landfilled material (except Cr). Minimal long-term emissions are derived implicitly from the mean and maximal values assuming a lognormal distribution.

## Sources
- Doka G., 2009, 2009 - LCI waste treatment services - Doka, Final report ecoinvent data v2.1, 13, Swiss Centre for LCI, Doka LCA, Duebendorf and St. Gallen, CH
Doka G. (2009) Life Cycle Inventories of Waste Treatment Services. Final report ecoinvent data v2.1. Volume: 13. Swiss Centre for LCI, Empa - TSL. Dübendorf, CH.
Type: Measurement on site
Source: CD-ROM
First author: Doka G.
Year: 2009
Title of anthology: Final report ecoinvent data v2.1
Place of publication: Dübendorf, CH
Publisher: Swiss Centre for LCI, Empa - TSL
Volume No: 13

## Validation
Proof reading validation: passed.; Other validation: none;
