# Sinter, iron, at plant

Dataset: EcoSpold 1, unit process
Functional unit: 1 kg
Category: metals / ferro\production
Geography: GLO
Time period: 2000-01 to 2000-12
Production volume: 3.83E11 kg/a
Share of production covered: 65 %
Generated by: Hans-Joerg Althaus
accessRestrictedTo: 0
copyright: true

## General comment
Inputs and air emissions from different sources. Transports of iron ore calculated according to information about exports and imports.;

## Included processes
Blending, mixing and sintering. Emissions are abated

## Technology
Down draft sintering on continuous travelling grates

## Reference product
- Sinter, iron, at plant [GLO]: 1 kg
  Global

## Inputs from technosphere
- Iron ore, 65% Fe, at beneficiation [GLO]: 1.05 kg; lognormal SD95 1.0541
  (1,2,1,1,1,1,3)
- Transport, transoceanic freight ship [OCE]: 2.835 tkm; lognormal SD95 2.0069
  (2,nA,1,1,1,3,5)
- Transport, barge [RER]: 0.0315 tkm; lognormal SD95 2.0074
  (2,nA,1,3,1,3,5)
- Aluminium oxide, plant [RER]: 2.5e-11 p; lognormal SD95 5
  (5,5,nA,nA,nA,nA,9); rough estimation
- Limestone, at mine [CH]: 0.148 kg; lognormal SD95 1.0579
  (1,2,1,3,1,1,3)
- Hard coal coke, at plant [RER]: 1.43 MJ; lognormal SD95 1.0579
  (1,2,1,3,1,1,3)
- Natural gas, high pressure, at consumer [RER]: 0.0363 MJ; lognormal SD95 1.0579
  (1,2,1,3,1,1,1)
- Electricity, medium voltage, production ENTSO-E, at grid: 0.01 kWh; lognormal SD95 1.0579
  (1,2,1,3,1,1,2)
- Transport, freight, lorry, fleet average [RER]: 0.002 tkm; lognormal SD95 2.095
  (4,5,nA,nA,nA,nA,5)
- Transport, freight, rail [RER]: 0.30875 tkm; lognormal SD95 2.0074
  (2,nA,1,3,1,3,5)
- Quicklime, in pieces, loose, at plant [CH]: 0.05 kg; lognormal SD95 1.0579
  (1,2,1,3,1,1,3)

## Inputs from nature
- Water, unspecified natural origin/m3 [resources, in water]: 0.0005 m3; lognormal SD95 1.0541
  (1,2,1,1,1,1,12)

## Emissions to nature
- PAH, polycyclic aromatic hydrocarbons [emissions to air, unspecified]: 4.723e-7 kg; lognormal SD95 3.0115
  (2,3,2,3,1,3,21)
- Particulates, < 2.5 um [emissions to air, unspecified]: 0.00020635 kg; lognormal SD95 3.0115
  (2,3,2,3,1,3,27)
- Heat, waste [emissions to air, unspecified]: 1.5386 MJ; lognormal SD95 1.0579
  (1,2,1,3,1,1,13)
- Vanadium [emissions to air, unspecified]: 1.1464e-8 kg; lognormal SD95 5.0131
  (2,3,2,3,1,3,22)
- Dioxin, 2,3,7,8 Tetrachlorodibenzo-p- [emissions to air, unspecified]: 7e-12 kg; lognormal SD95 3.0055
  (1,3,2,3,1,2,21)
- Titanium [emissions to air, unspecified]: 1.6049e-8 kg; lognormal SD95 5.0131
  (2,3,2,3,1,3,22)
- Hydrogen chloride [emissions to air, unspecified]: 3.7601e-5 kg; lognormal SD95 1.5154
  (2,3,2,3,1,3,31)
- Mercury [emissions to air, unspecified]: 7.566e-8 kg; lognormal SD95 5.0131
  (2,3,2,3,1,3,22)
- Hydrogen fluoride [emissions to air, unspecified]: 2.2469e-6 kg; lognormal SD95 1.5154
  (2,3,2,3,1,3,31)
- Carbon dioxide, fossil [emissions to air, unspecified]: 0.20405 kg; lognormal SD95 1.1094
  (2,3,2,3,1,3,14)
- Zinc [emissions to air, unspecified]: 8.263e-7 kg; lognormal SD95 5.0131
  (2,3,2,3,1,3,22)
- Polychlorinated biphenyls [emissions to air, unspecified]: 6.4197e-9 kg; lognormal SD95 3.0115
  (2,3,2,3,1,3,21)
- Nickel [emissions to air, unspecified]: 1.9259e-8 kg; lognormal SD95 5.0131
  (2,3,2,3,1,3,22)
- Manganese [emissions to air, unspecified]: 1.9259e-7 kg; lognormal SD95 5.0131
  (2,3,2,3,1,3,22)
- Copper [emissions to air, unspecified]: 7.6577e-8 kg; lognormal SD95 5.0131
  (2,3,2,3,1,3,22)
- Nitrogen oxides [emissions to air, unspecified]: 0.00052733 kg; lognormal SD95 1.5154
  (2,3,2,3,1,3,16)
- Hydrocarbons, aliphatic, alkanes, unspecified [emissions to air, unspecified]: 0.00013756 kg; lognormal SD95 1.5154
  (2,3,2,3,1,3,16)
- Chromium [emissions to air, unspecified]: 2.522e-8 kg; lognormal SD95 5.0131
  (2,3,2,3,1,3,22)
- Cadmium [emissions to air, unspecified]: 1.9259e-8 kg; lognormal SD95 5.0131
  (2,3,2,3,1,3,22)
- Carbon monoxide, fossil [emissions to air, unspecified]: 0.025679 kg; lognormal SD95 5.0131
  (2,3,2,3,1,3,17)
- Lead [emissions to air, unspecified]: 3.2282e-6 kg; lognormal SD95 5.0131
  (2,3,2,3,1,3,22)
- Sulfur dioxide [emissions to air, unspecified]: 0.001261 kg; lognormal SD95 1.1094
  (2,3,2,3,1,3,15)
- Water [emissions to water, unspecified]: 0.475 kg; lognormal SD95 2.5196
  (5,5,5,5,5,BU:1.05); All uncertainty-values set to 5.0 by default. Balance of input water

## Sampling procedure
Main in- and outputs based on world average, emissions based on some plants in the EU. Everything based on literature.

## Extrapolations
see Geography

## Sources
- Classen M., Althaus H.-J., Blaser S., Scharnhorst W., Tuchschmid M., Jungbluth N., Faist Emmenegger M., 2009, 2009 - LCI metals - Classen, Final report ecoinvent data v2.1, 10, Swiss Centre for LCI, Empa, ESU-services Ltd., Duebendorf, CH
Classen M., Althaus H.-J., Blaser S., Doka G., Jungbluth N., Tuchschmid M. (2008) Life Cycle Inventories of Metals. Final report ecoinvent data v2.1. Volume: 10. Issue: 0. Swiss Centre for LCI, Empa - TSL. Dübendorf, CH.
Type: Measurement on site
Source: CD-ROM
First author: Classen M.
Other authors: Althaus H.-J., Blaser S., Doka G., Jungbluth N., Tuchschmid M.
Year: 2008
Title of anthology: Final report ecoinvent data v2.1
Place of publication: Dübendorf, CH
Publisher: Swiss Centre for LCI, Empa - TSL
Volume No: 10
Issue No: 0

## Validation
Proof reading validation: passed; Other validation: none;
