# Range extender, for hybrid passenger car

Dataset: EcoSpold 1, unit process, infrastructure
Functional unit: 1 kg
Category: transport systems / road
Geography: RER
Time period: 2014-01 to 2014-12
Share of production covered: 100 %
Generated by: Annika Messmer
accessRestrictedTo: 0
copyright: true

## General comment
The construction of the datasets allows to change key parameters (like mass of the vehicle, mass of the battery, consumption, life times, etc.) in order to cover a wide spectrum of situations . However, it is important to consider that changing one parameter of a vehicle, e.g. its mass, may lead to changes in other parameters, e.g. the consumption. When modifying the default parameters given, attention should be payed to the possible influence which one parameter may have over the other.;

## Included processes
The assumed range extender includes two components: a small internal combustion engine (with a weight of 114.9kg) and a small generator (25kW) with a weight of 32kg .

## Technology
The dataset is based on modern car technologies which are expected to be representative up to 2015.

## Time period
Time of publications

## Reference product
- Range extender, for hybrid passenger car [RER]: 1 kg
  Europe

## Inputs from technosphere
- Tap water, at user [RER]: 5.6592 kg; lognormal SD95 1.3687
  (2,4,3,5,3,5,BU:1.05); ; H.J. Althaus und M.Gauch: "Vergleichende Ökobilanz individueller Mobilität:
  Elektromobilität versus konventionelle Mobilität mit Bio- und fossilen
  Treibstoffen", EMPA 2010
- Reinforcing steel, at plant [RER]: 0.18887 kg; lognormal SD95 1.3687
  (same comment as for Tap water, at user)
- Ethylene glycol, at plant [RER]: 0.0315 kg; lognormal SD95 1.3687
  (same comment as for Tap water, at user)
- Lubricating oil, at plant [RER]: 0.026981 kg; lognormal SD95 1.3687
  (same comment as for Tap water, at user)
- Palladium, at regional storage [RER]: 1.349e-6 kg; lognormal SD95 1.3687
  (same comment as for Tap water, at user)
- Heat, natural gas, at industrial furnace 1MW [CH]: 3.9055 MJ; lognormal SD95 1.3687
  (same comment as for Tap water, at user)
- Synthetic rubber, at plant [RER]: 0.01347 kg; lognormal SD95 1.3687
  (same comment as for Tap water, at user)
- Steel, low-alloyed, at plant [RER]: 0.22814 kg; lognormal SD95 1.3687
  (same comment as for Tap water, at user)
- Generator, for hybrid passenger car [RER]: 0.22493 kg; lognormal SD95 3.1315
  (2,4,3,5,3,5,BU:3); ; H.J. Althaus und M.Gauch: "Vergleichende Ökobilanz individueller Mobilität:
  Elektromobilität versus konventionelle Mobilität mit Bio- und fossilen
  Treibstoffen", EMPA 2010
- Injection moulding [RER]: 0.059358 kg; lognormal SD95 1.3687
  (same comment as for Tap water, at user)
- Electricity, medium voltage, production ENTSO-E, at grid: 13.55 kWh; lognormal SD95 1.3687
  (same comment as for Tap water, at user)
- Transport, freight, rail [RER]: 0.093084 tkm; lognormal SD95 2.1368
  (2,4,3,5,3,5,BU:2); ; H.J. Althaus und M.Gauch: "Vergleichende Ökobilanz individueller Mobilität:
  Elektromobilität versus konventionelle Mobilität mit Bio- und fossilen
  Treibstoffen", EMPA 2010
- Polyethylene, HDPE, granulate, at plant [RER]: 0.069246 kg; lognormal SD95 1.3687
  (same comment as for Tap water, at user)
- Aluminium, production mix, at plant [RER]: 0.17146 kg; lognormal SD95 1.3687
  (same comment as for Tap water, at user)
- Transport, freight, lorry, fleet average [RER]: 0.093084 tkm; lognormal SD95 2.1368
  (same comment as for Transport, freight, rail)
- Polyphenylene sulfide, at plant [GLO]: 0.10388 kg; lognormal SD95 1.3687
  (same comment as for Tap water, at user)
- Road vehicle plant [RER]: 5.1129e-10 p; lognormal SD95 3.1315
  (same comment as for Generator, for hybrid passenger car)
- Petrol, at regional storage [RER]: 0.18887 kg; lognormal SD95 1.3687
  (same comment as for Tap water, at user)
- Platinum, at regional storage [RER]: 7.2174e-6 kg; lognormal SD95 1.3687
  (same comment as for Tap water, at user)
- Light fuel oil, burned in industrial furnace 1MW, non-modulating [RER]: 0.11062 MJ; lognormal SD95 1.3687
  (same comment as for Tap water, at user)

## Emissions to nature
- Phosphate [emissions to water, unspecified]: 1.7605e-6 kg; lognormal SD95 1.666
  (2,4,3,5,3,5,BU:1.5); ; H.J. Althaus und M.Gauch: "Vergleichende Ökobilanz individueller Mobilität:
  Elektromobilität versus konventionelle Mobilität mit Bio- und fossilen
  Treibstoffen", EMPA 2010
- Heat, waste [emissions to air, unspecified]: 13.558 MJ; lognormal SD95 1.3687
  (same comment as for Tap water, at user)
- BOD5, Biological Oxygen Demand [emissions to water, unspecified]: 4.5733e-5 kg; lognormal SD95 1.666
  (same comment as for Phosphate)
- NMVOC, non-methane volatile organic compounds, unspecified origin [emissions to air, unspecified]: 0.0084315 kg; lognormal SD95 1.666
  (same comment as for Phosphate)
- COD, Chemical Oxygen Demand [emissions to water, unspecified]: 0.00033928 kg; lognormal SD95 1.666
  (same comment as for Phosphate)

## Sampling procedure
Sampling Procedure

## Extrapolations
Extrapolations

## Sources
- Frischknecht R., Messmer A., Stolz P., 2018, 2018 - Update env. aspects electric cars - Frischknecht, Project report, 561, treeze Ltd., Uster, CH
R. Frischknecht, A. Messmer, P. Stolz (2018) Aktualisierung Umweltaspekte von Elektroautos. Project report. Volume: 561. treeze Ltd.. Uster, CH.
Type: Separate publication
Source: Report
First author: R. Frischknecht
Other authors: A. Messmer, P. Stolz
Year: 2018
Title of anthology: Project report
Place of publication: Uster, CH
Publisher: treeze Ltd.
Volume No: 561

## Validation
Proof reading validation: 22.02.2018; Other validation: \\SRV01\ESU-Docs\Projekte laufend\561 Aktualisierung Umwelt Elektroauto\EcoSpold\Transport\[561_transport_hybrid-car_EIv2_v0.9.xlsx]X-Process;
