# Construction work, coolant circuit

Dataset: EcoSpold 1, unit process
Functional unit: 1 p
Category: energy supply, kbob recommendation / heat pumps, waste water
Geography: CH
Time period: 2004-01 to 2004-12
Share of production covered: 0 %
Generated by: Matthias Tuchschmid
accessRestrictedTo: 0
copyright: true

## General comment
This data set describes the construction work for the excavation of the conduits for the refrigerant circuit and the construction works in house (excavation, concrete use). Data stems from questionnaire and are partly estimated.;

## Included processes
This data set includes excavation requirements for the conduits and building requirements in the house.

## Geography
This data represent the construction work in Switzerland.

## Technology
The coolant circuit is

## Time period
Actual data.

## Reference product
- Construction work, coolant circuit [CH]: 1 p

## Inputs from technosphere
- Sand, at mine [CH]: 30000 kg; lognormal SD95 1.05
  (1,1,1,1,1,1); Questionnaire
- Disposal, building, concrete gravel, to recycling [CH]: 13200 kg; lognormal SD95 1.2077
  (1,1,1,1,3,1); Questionnaire
- xx Tar, at coke plant [DE]: 800 kg; lognormal SD95 1.2077
  (1,1,1,1,3,1); Questionnaire
- Concrete, normal, at plant [CH]: 2 m3; lognormal SD95 1.2077
  (1,1,1,1,3,1); Questionnaire
- Gravel, unspecified, at mine [CH]: 50000 kg; lognormal SD95 1.2077
  (1,1,1,1,3,1); Questionnaire
- Disposal, asphalt, 0.1% water, to sanitary landfill [CH]: 800 kg; lognormal SD95 1.2077
  (1,1,1,1,3,1); Questionnaire
- Excavation, skid-steer loader [RER]: 80 m3; lognormal SD95 1.2077
  (1,1,1,1,3,1); Questionnaire
- Disposal, concrete, 5% water, to construction waste landfill [CH]: 22000 kg; lognormal SD95 1.2077
  (1,1,1,1,3,1); Questionnaire

## Sampling procedure
questionnaire

## Extrapolations
no extrapolations

## Sources
- Faist Emmenegger M., Frischknecht R., 2005, 2005 - LCA heat pump raw sewage - Faist Emmenegger, -, ESU-services Ltd., Uster, CH
Rolf Frischknecht, Mireille Faist Emmenegger (2004) Nutzwärmebereitstellung mit Wärmepumpe für Rohabwasser. Uster.
Type: Separate publication
Source: Interner Bericht
First author: Rolf Frischknecht
Other authors: Mireille Faist Emmenegger
Year: 2004
Place of publication: Uster

## Validation
Proof reading validation: automatic validation in Excel; Other validation: none;
