# Printed wiring board plant

Dataset: EcoSpold 1, unit process, infrastructure
Functional unit: 1 p
Category: electronics / production of components
Geography: RER
Time period: 2000-01 to 2000-12
Production volume: 915809 m2 1-layer
Share of production covered: 0 %
Generated by: Mireille Faist Emmenegger
accessRestrictedTo: 0
copyright: true

## General comment
This data is based on an environmental report from a PWB plant. The original use of land is estimated to be agriculture.;

## Included processes
This data describes the land use and the buildings of a PWB plant in Austria

## Geography
Plant in Austria.

## Technology
Fabricatio of multilayer PWB.

## Time period
Period of environmental report.

## Reference product
- Printed wiring board plant [RER]: 1 p
  Europe

## Inputs from technosphere
- Building, multi-storey [RER]: 545560 m3; lognormal SD95 3.2745
  (5,3,1,1,1,5); estimates

## Inputs from nature
- Occupation, industrial area, built up [resources, land]: 818340 m2a; lognormal SD95 3.2745
  (3,3,1,1,1,5); environmental report + estimated life time
- Occupation, industrial area, vegetation [resources, land]: 1.7309e6 m2a; lognormal SD95 1.5798
  (3,3,1,1,1,5); environmental report + estimated life time
- Transformation, to unknown [resources, land]: 125440 m2; lognormal SD95 2.0641
  (3,3,1,1,1,5); environmental report + estimates
- Occupation, traffic area, road network [resources, land]: 662100 m2a; lognormal SD95 1.5798
  (3,3,1,1,1,5); environmental report + estimated life time
- Occupation, industrial area [resources, land]: 543720 m2a; lognormal SD95 1.5798
  (3,3,1,1,1,5); environmental report + estimated life time
- Transformation, from annual crop [resources, land]: 125440 m2; lognormal SD95 1.5798
  (3,3,1,1,1,5); environmental report + estimates

## Sources
- Hischier R., Classen M., Lehmann M., Scharnhorst W., 2007, 2007 - LCI electric and electronic equipment - Hischier, 0, 0, Swiss Centre for LCI, Empa - TSL, Duebendorf and St. Gallen, CH
Faist Emmenegger M., Jungbluth N., Frischknecht R. (2004) Life Cycle Inventories. Project reports. Volume: 0. ESU-services. Uster, CH.

## Validation
Proof reading validation: 1; Other validation: none;
