# Heat pump 10 kW production for air source heat pump system

Dataset: EcoSpold 1, unit process
Functional unit: 1 p
Category: energy, obsolete / heat, obsolete\heat pumps, obsolete\infrastructure
Geography: CH
Time period: 2024-01 to 2024-01
Generated by: Romain Sacchi
accessRestrictedTo: 0
copyright: true

## General comment
10 kW air fan ASHP system operating in the UK. The ASHP uses an air fan rather than a heat collector, which is placed outside the house in open air. Comparatively to GHSP or WSHP, the ASHP systems have a larger evaporator to increase the efficiency of the systemm. CoP in the UK of 2.8. Lifetime of 20 years. Source: Domestic heat pumps: Life cycle environmental impacts and potential implications for the UK. Benjamin Greening, Adisa Azapagic.2012. http://dx.doi.org/10.1016/j.energy.2012.01.028

## Reference product
- Heat pump 10 kW production for air source heat pump system [CH]: 1 p
  not defined

## Inputs from technosphere
- Electricity, low voltage, production ENTSO-E, at grid: 140 kWh; lognormal SD95 2.565
  Assembly energy {5;5;5;5;5;5;1.05;}
- Heat, natural gas, at boiler condensing modulating 300kW [CH]: 1400 MJ; lognormal SD95 2.565
  Assembly energy {5;5;5;5;5;5;1.05;}
- Steel, low-alloyed, at plant [RER]: 32 kg; lognormal SD95 2.565
  Evaporator and condenser {5;5;5;5;5;5;1.05;}
- Steel product manufacturing, average metal working [RER]: 32 kg; lognormal SD95 2.565
  Evaporator and condenser {5;5;5;5;5;5;1.05;}
- Reinforcing steel, at plant [RER]: 120 kg; lognormal SD95 2.565
  Housing and compressor {5;5;5;5;5;5;1.05;}
- Tube insulation, elastomere, at plant [DE]: 16 kg; lognormal SD95 2.565
  Pipework insulation {5;5;5;5;5;5;1.05;}
- Copper, primary, at refinery [GLO]: 35.2 kg; lognormal SD95 2.565
  Wiring, piping and expansion valve {5;5;5;5;5;5;1.05;}
- Copper product manufacturing, average metal working [RER]: 35.2 kg; lognormal SD95 2.565
  Wiring, piping and expansion valve {5;5;5;5;5;5;1.05;}
- Lubricating oil, at plant [RER]: 2.7 kg; lognormal SD95 2.565
  Lubricating oil {5;5;5;5;5;5;1.05;}
- Polyvinylchloride, bulk polymerised, at plant [RER]: 1.6 kg; lognormal SD95 2.565
  Wiring insulation {5;5;5;5;5;5;1.05;}
- Copper, primary, at refinery [GLO]: 1.4 kg; lognormal SD95 2.565
  Air fan {5;5;5;5;5;5;1.05;}
- Copper product manufacturing, average metal working [RER]: 1.4 kg; lognormal SD95 2.565
  Air fan {5;5;5;5;5;5;1.05;}
- Polyethylene, HDPE, granulate, at plant [RER]: 0.5 kg; lognormal SD95 2.565
  Air fan {5;5;5;5;5;5;1.05;}
- 1,1-difluoroethane, HFC-152a, at plant [US]: 2.45 kg; lognormal SD95 2.565
  Refrigerant R404a {5;5;5;5;5;5;1.05;}
- Trifluoromethane, at plant [GLO]: 2.45 kg; lognormal SD95 2.565
  Refrigerant R404a {5;5;5;5;5;5;1.05;}
- Sand, at mine [CH]: 4650 kg; lognormal SD95 2.565
  Under-floor heating system {5;5;5;5;5;5;1.05;}
- Portland cement, strength class Z 42.5, at plant [CH]: 900 kg; lognormal SD95 2.565
  Under-floor heating system {5;5;5;5;5;5;1.05;}
- Aluminium alloy, AlMg3, at plant [RER]: 126 kg; lognormal SD95 2.565
  Under-floor heating system {5;5;5;5;5;5;1.05;}
- Aluminium product manufacturing, average metal working [RER]: 126 kg; lognormal SD95 2.565
  Under-floor heating system {5;5;5;5;5;5;1.05;}
- Polyethylene, LLDPE, granulate, at plant [RER]: 101 kg; lognormal SD95 2.565
  Under-floor heating system {5;5;5;5;5;5;1.05;}
- Polystyrene foam slab, at plant [RER]: 66 kg; lognormal SD95 2.565
  Under-floor heating system {5;5;5;5;5;5;1.05;}
- Transport, freight, rail, electricity with shunting [CH]: 268.4 tkm; lognormal SD95 2.208
  Generic transport distances calculated based on Table 4.2 of the ecoinvent v.2 Methodology report. Distribution: 54.41 kg over 4933.0 km.
- Transport, freight, lorry, 16t-32t gross weight, fleet average [CH]: 136.3 tkm; lognormal SD95 2.208
  Generic transport distances calculated based on Table 4.2 of the ecoinvent v.2 Methodology report. Distribution: 202.55 kg over 673.0 km.

## Emissions to nature
- Ethane, 1,1-difluoro-, HFC-152a [emissions to air, unspecified]: 0.0735 kg; lognormal SD95 2.785
  Refrigerant R404a {5;5;5;5;5;5;1.5;}
- Methane, trifluoro-, HFC-23 [emissions to air, unspecified]: 0.0735 kg; lognormal SD95 2.785
  Refrigerant R404a {5;5;5;5;5;5;1.5;}

## Sampling procedure
Sampling procedure: Literature data

## Sources
- Sacchi R., Bauer C., 2024, 2024 - LCA power-to-X in residential sector - Sacchi, Project report, PSI, Villigen, CH

## Validation
Proof reading validation: Passed, Other validation: none, Validator: Rolf Frischknecht, Telephone: 0041 44 940 61 91, E-mail: frischknecht@treeze.ch, Company: treeze, Country: CH
