# Fluorspar, 97%, at plant

Dataset: EcoSpold 1, unit process
Functional unit: 1 kg
Category: chemicals / inorganics
Geography: GLO
Time period: 1976-01 to 1991-12
Production volume: A few million tonnes per year.
Share of production covered: 10 %
Generated by: Philippe Stolz
accessRestrictedTo: 0
copyright: true

## General comment
Basic inventory based on old literature information.;
CAS number: 14542-23-5;
Formula: CaF2;
Synonyms: calcium fluoride;

## Included processes
Mineral extraction of calcium fluoride (fluorspar).

## Geography
Main producers are China, South Africa and Mexico. Some data of calcium fluoride produced in Germany.

## Technology
Open cast mining of resource. Separation by crushing, grinding and flotation.

## Time period
Time of publications.

## Reference product
- Fluorspar, 97%, at plant [GLO]: 1 kg
  Global

## Inputs from technosphere
- Electricity, medium voltage, production ENTSO-E, at grid: 0.062242 kWh; lognormal SD95 1.5994
  (3,3,5,5,1,5); Boustead 1979
- Chemical plant, organics [RER]: 4e-10 p; lognormal SD95 3.8994
  (5,na,1,1,5,na); Rough estimation
- Natural gas, burned in industrial furnace 1MWth [CH]: 0.062228 MJ; lognormal SD95 1.5994
  (3,3,5,5,1,5); Boustead 1979
- Heavy fuel oil, burned in industrial furnace 1MW, non-modulating [RER]: 0.58131 MJ; lognormal SD95 1.5994
  (3,3,5,5,1,5); Boustead 1979

## Inputs from nature
- Fluorspar [resources, in ground]: 1.05 kg; lognormal SD95 1.3286
  (3,3,4,3,1,5); Estimation, 5% loss

## Emissions to nature
- Heat, waste [emissions to air, unspecified]: 0.22407 MJ; lognormal SD95 1.5994
  (3,3,5,5,1,5); Calculation
- Particulates, < 2.5 um [emissions to air, unspecified]: 3.75e-5 kg; lognormal SD95 3.9766
  (3,3,5,5,5,5); Literature
- Hydrogen fluoride [emissions to air, unspecified]: 6.9444e-5 kg; lognormal SD95 2.3406
  (3,3,4,3,5,5); Estimation
- Particulates, > 10 um [emissions to air, unspecified]: 0.000195 kg; lognormal SD95 2.532
  (3,3,5,5,5,5); Literature
- Particulates, > 2.5 um, and < 10um [emissions to air, unspecified]: 0.0001425 kg; lognormal SD95 2.962
  (3,3,5,5,5,5); Literature

## Sampling procedure
Literature and own estimations.

## Sources
- Frischknecht R., Itten R., Sinha P., de Wild-Scholten M., Zhank J., 2020, 2015 - LCI and LCA photovoltaic systems - Frischknecht, Project report, 174, IEA PVPS Task 12, Petten, NL
Frischknecht R.,, Stolz P., Sinha P., de Wild-Scholten M. (2020) Life Cycle Inventories and Life Cycle Assessments of Photovoltaic Systems. Project report. Volume: 174. IEA PVPS Task 12.
Type: Separate publication
Source: Report
First author: Frischknecht R.,
Other authors: Stolz P., Sinha P., de Wild-Scholten M.
Year: 2020
Title of anthology: Project report
Publisher: IEA PVPS Task 12
Volume No: 174
Original title: Life Cycle Inventories and Life Cycle Assessments of Photovoltaic Systems

## Validation
Proof reading validation: 30.09.2020; Other validation: G:\Projekte laufend\174 Photovoltaic, IEA Task 12\2017 Global supply chain\EcoSpold\[174-photovoltaics-global-supply-chain-v2.5.xlsx]X-Process;
