# Transport, passenger car, compressed gas, fleet average

Dataset: EcoSpold 1, unit process
Functional unit: 1 km
Category: transport systems / road\Transformation
Geography: RER
Time period: 2020-01 to 2020-12
Generated by: Romain Sacchi
accessRestrictedTo: 0
copyright: False

## General comment
Fleet average vehicle, based on HBEFA 4.1 fleet composition for 2020..

## Time period
Base technology year of 2020

## Reference product
- Transport, passenger car, compressed gas, fleet average [RER]: 1 km

## Inputs from technosphere
All rows: lognormal SD95 1.02
- Transport, passenger car, compressed gas, Compact, 2013, EURO-5 [RER]: 0.222 km
  Uncertainty from pedigree matrix: (1, 2, 1, 1, 1, 1)
- Transport, passenger car, compressed gas, Compact, 2016, EURO-6ab [RER]: 0.111 km
  Uncertainty from pedigree matrix: (1, 2, 1, 1, 1, 1)
- Transport, passenger car, compressed gas, Compact, 2018, EURO-6c [RER]: 0.111 km
  Uncertainty from pedigree matrix: (1, 2, 1, 1, 1, 1)
- Transport, passenger car, compressed gas, Medium, 2013, EURO-5 [RER]: 0.222 km
  Uncertainty from pedigree matrix: (1, 2, 1, 1, 1, 1)
- Transport, passenger car, compressed gas, Medium, 2016, EURO-6ab [RER]: 0.111 km
  Uncertainty from pedigree matrix: (1, 2, 1, 1, 1, 1)
- Transport, passenger car, compressed gas, Medium, 2018, EURO-6c [RER]: 0.111 km
  Uncertainty from pedigree matrix: (1, 2, 1, 1, 1, 1)
- Transport, passenger car, compressed gas, Large, 2013, EURO-5 [RER]: 0.111 km
  Uncertainty from pedigree matrix: (1, 2, 1, 1, 1, 1)

## Extrapolations
Extrapolated from value for Switzerland

## Sources
- Sacchi R., Bauer C., 2023, 2023 - LCI on-road vehicles - Sacchi, PSI, Villigen, CH
doi: 10.5281/ZENODO.5156043
