# 1,1-difluoroethane, HFC-152a, at plant

Dataset: EcoSpold 1, unit process
Functional unit: 1 kg
Category: chemicals / organics
Geography: US
Time period: 2005-01 to 2006-12
Share of production covered: 50 %
Generated by: Philippe Stolz
accessRestrictedTo: 0
copyright: true

## General comment
Basic inventory based on cumulative data.;
CAS number: 75-37-6;
Formula: C2H4F2;
Synonyms: R152a, 1,1-Difluoroethylene;

## Included processes
Pre-products, energy use, infrastructure, some air emissions and transports. No full information on all air and water emissions available.

## Geography
Production plant of DuPont in the United States.

## Technology
Fluoropolymer chemistry.

## Time period
Time of publications.

## Reference product
- 1,1-difluoroethane, HFC-152a, at plant [US]: 1 kg
  UNITED STATES

## Inputs from technosphere
- Transport, freight, lorry, fleet average [RER]: 0.10877 tkm; lognormal SD95 2.2817
  (5,3,1,1,1,5); Rough estimation based on cumulative data, Krieger et al. 2006
- Lime, hydrated, packed, at plant [CH]: 0.021387 kg; lognormal SD95 1.5681
  (5,3,1,1,1,5); Rough estimation based on cumulative data, Krieger et al. 2006
- Transport, transoceanic freight ship [OCE]: 6.3699 tkm; lognormal SD95 2.2817
  (5,3,1,1,1,5); Rough estimation based on cumulative data, Krieger et al. 2006
- Acetylene, at regional storehouse [CH]: 0.42733 kg; lognormal SD95 1.5681
  (5,3,1,1,1,5); Acetylen yield is 92.4%
- Electricity, medium voltage, at grid [US]: 1.0889 kWh; lognormal SD95 1.5681
  (5,3,1,1,1,5); Rough estimation based on cumulative data, Krieger et al. 2006
- Natural gas, burned in industrial furnace 1MWth [CH]: 0.98 MJ; lognormal SD95 1.5681
  (5,3,1,1,1,5); Rough estimation based on cumulative data, Krieger et al. 2006
- Zinc, primary, at regional storage [RER]: 0.0019676 kg; lognormal SD95 1.5681
  (5,3,1,1,1,5); Rough estimation based on cumulative data, Krieger et al. 2006
- Hydrogen fluoride, at plant [GLO]: 0.63699 kg; lognormal SD95 1.5681
  (5,3,1,1,1,5); Rough estimation based on cumulative data, Krieger et al. 2006
- Chemical plant, organics [RER]: 4e-10 p; lognormal SD95 3.2745
  (5,3,1,1,1,5); Rough estimation based on cumulative data, Krieger et al. 2006
- Transport, freight, rail [RER]: 0.27041 tkm; lognormal SD95 2.2817
  (5,3,1,1,1,5); Rough estimation based on cumulative data, Krieger et al. 2006

## Emissions to nature
- Ethane, 1,1-difluoro-, HFC-152a [emissions to air, high. pop.]: 0.013583 kg; lognormal SD95 1.8288
  (5,3,1,1,1,5); Rough estimation based on cumulative data, Krieger et al. 2006
- Heat, waste [emissions to air, unspecified]: 3.92 MJ; lognormal SD95 1.5681
  (5,3,1,1,1,5); Rough estimation based on cumulative data, Krieger et al. 2006

## Sampling procedure
Publication of cumulative data.

## Sources
- Frischknecht R., Itten R., Sinha P., de Wild-Scholten M., Zhank J., 2020, 2015 - LCI and LCA photovoltaic systems - Frischknecht, Project report, 174, IEA PVPS Task 12, Petten, NL
Frischknecht R.,, Stolz P., Sinha P., de Wild-Scholten M. (2020) Life Cycle Inventories and Life Cycle Assessments of Photovoltaic Systems. Project report. Volume: 174. IEA PVPS Task 12.
Type: Separate publication
Source: Report
First author: Frischknecht R.,
Other authors: Stolz P., Sinha P., de Wild-Scholten M.
Year: 2020
Title of anthology: Project report
Publisher: IEA PVPS Task 12
Volume No: 174
Original title: Life Cycle Inventories and Life Cycle Assessments of Photovoltaic Systems

## Validation
Proof reading validation: 30.09.2020; Other validation: G:\Projekte laufend\174 Photovoltaic, IEA Task 12\2017 Global supply chain\EcoSpold\[174-photovoltaics-global-supply-chain-v2.5.xlsx]X-Process;
