# Forestry harvester, at plant

Dataset: EcoSpold 1, unit process
Functional unit: 1 p
Category: wood / wooden materials\new processes\other material
Geography: RER
Time period: 2000-01 to 2016-12
Generated by: default
accessRestrictedTo: 0
copyright: true

## Reference product
- Forestry harvester, at plant [RER]: 1 p

## Inputs from technosphere
- Cast iron, at plant [RER]: 1990 kg; lognormal SD95 1.19252
  Pedigree: (3,4,3,1,1).
- Flat glass, uncoated, at plant [RER]: 139 kg; lognormal SD95 1.08463
  Pedigree: (3,4,3,1,1).
- Road vehicle plant [RER]: 8.73e-7 p; lognormal SD95 2.18105
  Pedigree: (4,5,3,3,4).
- Chromium steel 18/8, at plant [RER]: 2380 kg; lognormal SD95 1.08463
  Pedigree: (3,4,3,1,1).
- Powder coating, steel [RER]: 71.4 m2; lognormal SD95 1.4749
  Pedigree: (3,4,3,1,5).
- Transport, freight, lorry, fleet average [RER]: 6160 tkm; lognormal SD95 1.5103
  Pedigree: (1,1,4,5,4).
- Oxygen, liquid, at plant [RER]: 12 kg; lognormal SD95 1.4749
  Pedigree: (3,4,3,1,5).
- Tap water, at user [RER]: 40000 kg; lognormal SD95 1.4749
  Pedigree: (3,4,3,1,5).
- Treatment, lorry production effluent, to wastewater treatment, class 1 [CH]: 5.32 m3; lognormal SD95 1.50597
  Pedigree: (1,1,2,1,1).
- Acetylene, at regional storehouse [CH]: 5 kg; lognormal SD95 1.4749
  Pedigree: (3,4,3,1,5).
- Synthetic rubber, at plant [RER]: 260 kg; lognormal SD95 1.19252
  Pedigree: (3,4,3,1,1).
- Lead, at regional storage [RER]: 86 kg; lognormal SD95 1.19252
  Pedigree: (3,4,3,1,1).
- Treatment, sewage, to wastewater treatment, class 3 [CH]: 40 m3; lognormal SD95 1.01424
  Pedigree: (1,1,2,1,1).
- Aluminium alloy, AlMg3, at plant [RER]: 41.4 kg; lognormal SD95 18.2376
  Pedigree: (3,4,3,1,1).
- Injection moulding [RER]: 504 kg; lognormal SD95 3.6764
  Pedigree: (1,1,2,1,1).
- Polypropylene, granulate, at plant [RER]: 504 kg; lognormal SD95 1.08463
  Pedigree: (3,4,3,1,1).
- Iron scrap, at plant [RER]: 20000 kg; lognormal SD95 1.17204
  Pedigree: (1,1,2,1,1).
- Electricity, medium voltage, production ENTSO-E, at grid: 73900 kWh; lognormal SD95 1.19252
  Pedigree: (3,4,3,1,1).
- Steel, low-alloyed, at plant [RER]: 17600 kg; lognormal SD95 1.19252
  Pedigree: (3,4,3,1,1).
- Copper, primary, at refinery [GLO]: 2.12 kg; lognormal SD95 1.19252
  Pedigree: (3,4,3,1,1).
- Transport, freight, rail [RER]: 1400 tkm; lognormal SD95 1.5103
  Pedigree: (1,1,4,5,4).
- Disposal, rubber, unspecified, 0% water, to municipal incineration [CH]: 260 kg
- Wire drawing, copper [RER]: 2.12 kg; lognormal SD95 1.08206
  Pedigree: (3,4,3,1,1).
- Electronics for control units [RER]: 69.9 kg; lognormal SD95 1.19252
  Pedigree: (3,4,3,1,1).
- Disposal, polypropylene, 15.9% water, to municipal incineration [CH]: 599 kg
- Heat, natural gas, at boiler condensing modulating >100kW [RER]: 89600 MJ; lognormal SD95 1.19252
  Pedigree: (3,4,3,1,1).
- Disposal, electronics for control units [RER]: 69.9 kg
- Water, completely softened, at plant [RER]: 18 kg; lognormal SD95 1.19252
  Pedigree: (3,4,3,1,1).

## Emissions to nature
- Carbon dioxide, fossil [emissions to air, low. pop.]: 16.9 kg; lognormal SD95 1.25755
  Pedigree: (1,1,2,1,1).

## Sources
- Werner F., 2017, 2017 - LCI wood and wood based products - Werner, Project Report, 0, Environment & Development, Zuerich, CH
