# Road construction, asphalt surface layer, installation process

Dataset: EcoSpold 1, unit process, infrastructure
Functional unit: 1 kg
Category: construction / infrastructure
Geography: CH
Time period: 2025 to 2030
Synonyms: 0
Generated by: Thomas Pohl
accessRestrictedTo: 0
copyright: true

## General comment
Modern European technologies are applied to regional storage facilities, material extraction, and production processes.

## Included processes
This process represents the installation of one ton of asphalt surface course in road construction, including the laying and compaction activities.

## Geography
Europe

## Technology
Generic process for different types of asphalt surface courses and varying shares of recycled asphalt (RAP).

## Time period
Review of data currency scheduled after 5 years.

## Reference product
- Road construction, asphalt surface layer, installation process [CH]: 1 kg

## Inputs from technosphere
- Pneumatic tyre roller, 12t-25t, diesel [CH]: 5.6e-5 hr; lognormal SD95 3.0487
  (2,1,1,1,1,5,BU:3); ; Data based on "Maschinenstunden" (Machine hours) standard analysis in the TB-Viewer of the Schweizerischer Baumeisterverband SBV (Swiss Contractors Association)
- Vibratory roller, 10t, self-propelled, diesel [CH]: 5.6e-5 hr; lognormal SD95 3.0487
  (same comment as for Pneumatic tyre roller, 12t-25t, diesel)
- Asphalt paver, 5.1m, pneumatic drive, hydraulic screed, diesel [CH]: 5.6e-5 hr; lognormal SD95 3.0487
  (same comment as for Pneumatic tyre roller, 12t-25t, diesel)

## Sources
- Pohl T., Stamm R., 2025, 2025 - Datasets construction machinery and infra. - Pohl, Hintergrundbericht, Umtec Technologie AG, Bern, CH
