# Petrol, burned in building machine, with particle filter

Dataset: EcoSpold 1, unit process
Functional unit: 1 MJ
Category: building processes / machinery
Geography: CH
Time period: 2025 to 2030
Synonyms: 0
Generated by: Thomas Pohl
accessRestrictedTo: 0
copyright: true

## General comment
The consumption of lubricating oil are taken from ecoinvent v2.2, as well as emission patern during the combustion. Values for CO2, CO, NOx, CH4 and NMHC were taken from the Non-road database and represent average factors for gasoline-powered, four-stroke, hand-guided tamping rammers and vibratory plates.

## Included processes
This dataset is based on the process "Diesel, burned in building machine {GLO}|". Compared to this reference process, the dataset includes only lubricating oil, diesel fuel and the emissions produced during the combustion of 1 MJ of petrol fuel in an average building machine in Switzerland.

## Geography
Europe

## Technology
The process "petrol, burned in building machine, with particle filter/MJ/CH" has been modified to generate a dataset that consider the emissions produced during the combustion of 1 MJ of petrol fuel in a building machine in Switzerland.

## Time period
Review of data currency scheduled after 5 years.

## Reference product
- Petrol, burned in building machine, with particle filter [CH]: 1 MJ

## Inputs from technosphere
- Petrol, at regional storage [RER]: 0.02447 kg; lognormal SD95 1.2192
  (1,5,2,3,1,3,BU:1.05); ; (1,5,1,3,1,3); ecoinvent v2.2, Net calorific value petrol 40.86 MJ/kg
- Lubricating oil, at plant [RER]: 0.000514 kg; lognormal SD95 1.2192
  (1,5,2,3,1,3,BU:1.05); ; (1,5,1,3,1,3); ecoinvent v2.2.
- Building machine [RER]: 1.34e-7 p; lognormal SD95 3.0492
  (1,5,1,3,1,3,BU:3); ; (1,5,1,3,1,3); ecoinvent v2.2.
- Disposal, used mineral oil, 10% water, to hazardous waste incineration [CH]: 0.000514 kg; lognormal SD95 1.2165
  (1,5,1,3,1,3,BU:1.05); Emissions taken from "Diesel, burned in building machine {GLO}"; (1,5,1,3,1,3); based on ecoinvent v2.2.

## Emissions to nature
- Ammonia [emissions to air, unspecified]: 4.67e-7 kg; lognormal SD95 1.301
  (1,5,1,3,1,3,BU:1.2); Emissions taken from "Diesel, burned in building machine {GLO}"; (1,5,1,3,1,3); based on ecoinvent v2.2.
- Benzo(a)pyrene [emissions to air, unspecified]: 7.01e-10 kg; lognormal SD95 3.0492
  (1,5,1,3,1,3,BU:3); Emissions taken from "Diesel, burned in building machine {GLO}"; (1,5,1,3,1,3); based on ecoinvent v2.2.
- Cadmium [emissions to air, unspecified]: 2.34e-10 kg; lognormal SD95 5.0561
  (1,5,1,3,1,3,BU:5); Emissions taken from "Diesel, burned in building machine {GLO}"; (1,5,1,3,1,3); based on ecoinvent v2.2.
- Carbon dioxide, fossil [emissions to air, unspecified]: 0.076867 kg; lognormal SD95 1.2165
  (1,5,1,3,1,3,BU:1.05); Values for the considered emissions were taken from the Non-road database and represent average factors for gasoline-powered, four-stroke, hand-guided tamping rammers and vibratory plates.; (1,5,1,3,1,3)
- Carbon monoxide, fossil [emissions to air, unspecified]: 0.023766 kg; lognormal SD95 5.0561
  (1,5,1,3,1,3,BU:5); Values for the considered emissions were taken from the Non-road database and represent average factors for gasoline-powered, four-stroke, hand-guided tamping rammers and vibratory plates.; (1,5,1,3,1,3)
- Chromium [emissions to air, unspecified]: 1.17e-9 kg; lognormal SD95 5.0561
  (same comment as for Cadmium)
- Copper [emissions to air, unspecified]: 3.97e-8 kg; lognormal SD95 5.0561
  (same comment as for Cadmium)
- Dinitrogen monoxide [emissions to air, unspecified]: 2.8e-6 kg; lognormal SD95 1.5647
  (1,5,1,3,1,3,BU:1.5); Emissions taken from "Diesel, burned in building machine {GLO}"; (1,5,1,3,1,3); based on ecoinvent v2.2.
- Dioxin, 2,3,7,8 Tetrachlorodibenzo-p- [emissions to water, unspecified]: 1.4e-15 kg; lognormal SD95 1.5647
  (same comment as for Dinitrogen monoxide)
- Heat, waste [emissions to air, unspecified]: 1.06 MJ; lognormal SD95 1.2165
  (same comment as for Disposal, used mineral oil, 10% water, to hazardous waste incineration)
- Methane, fossil [emissions to air, unspecified]: 3.3429e-5 kg; lognormal SD95 1.5647
  (1,5,1,3,1,3,BU:1.5); Values for the considered emissions were taken from the Non-road database and represent average factors for gasoline-powered, four-stroke, hand-guided tamping rammers and vibratory plates.; (1,5,1,3,1,3)
- Nickel [emissions to air, unspecified]: 1.64e-9 kg; lognormal SD95 5.0561
  (same comment as for Cadmium)
- Nitrogen oxides [emissions to air, unspecified]: 0.00013152 kg; lognormal SD95 1.5647
  (same comment as for Methane, fossil)
- NMVOC, non-methane volatile organic compounds, unspecified origin [emissions to air, unspecified]: 0.00096726 kg; lognormal SD95 1.5647
  (same comment as for Methane, fossil)
- PAH, polycyclic aromatic hydrocarbons [emissions to air, unspecified]: 7.85e-8 kg; lognormal SD95 3.0492
  (same comment as for Benzo(a)pyrene)
- Particulates, < 2.5 um [emissions to air, unspecified]: 2.4518e-6 kg; lognormal SD95 3.0492
  (1,5,1,3,1,3,BU:3); Emissions taken from "Diesel, burned in building machine {GLO}"; (1,5,1,3,1,3); ecoinvent v2.2. Reduction factor applied: 97.4%; based on BUWAL 2000 and ecoinvent v2.2
- Selenium [emissions to air, unspecified]: 2.34e-10 kg; lognormal SD95 5.0561
  (same comment as for Cadmium)
- Sulfur dioxide [emissions to air, unspecified]: 2.36e-5 kg; lognormal SD95 1.2165
  (same comment as for Disposal, used mineral oil, 10% water, to hazardous waste incineration)
- Zinc [emissions to air, unspecified]: 2.34e-8 kg; lognormal SD95 5.0561
  (same comment as for Cadmium)
- Particulates, > 10 um [emissions to air, unspecified]: 1.6328e-7 kg; lognormal SD95 1.5647
  (1,5,1,3,1,3,BU:1.5); Emissions taken from "Diesel, burned in building machine {GLO}"; (1,5,1,3,1,3); ecoinvent v2.2. Reduction factor applied: 97.4%; based on BUWAL 2000 and ecoinvent v2.2
- Particulates, > 2.5 um, and < 10um [emissions to air, unspecified]: 1.0894e-7 kg; lognormal SD95 2.0517
  (1,5,1,3,1,3,BU:2); Emissions taken from "Diesel, burned in building machine {GLO}"; (1,5,1,3,1,3); ecoinvent v2.2. Reduction factor applied: 97.4%; based on BUWAL 2000 and ecoinvent v2.2

## Sampling procedure
Statistics

## Extrapolations
Emissions taken from "Diesel, burned in building machine {GLO}"

## Sources
- Pohl T., Stamm R., 2025, 2025 - Datasets construction machinery and infra. - Pohl, Hintergrundbericht, Umtec Technologie AG, Bern, CH
