# Sodium hydroxide, 50% in H2O, production mix, at plant

Dataset: EcoSpold 1, unit process
Functional unit: 1 kg
Category: chemicals / inorganic
Geography: RER
Time period: 2000-01 to 2000-12
Production volume: Equivalent of NaOH from European Cl2 production in 2000 of 9697265 tonnes
Share of production covered: 100 %
Generated by: Roland Hischier
accessRestrictedTo: 0
copyright: true

## General comment
Modul that establishs only an average of the different technologies used for sodium hydroxide production - thus no process-specific emissions are included into this dataset.;
CAS number: 001310-73-2;
Formula: NaOH;
Synonyms: Caustic soda, Sodium hydrate, Lye, lye, caustic, soda lye, White Caustic;

## Included processes
Process establishing an average European sodium hydroxide production from the three different electrolysis cell technologies (mercury, diaphragm, membrane)

## Technology
see general comments

## Reference product
- Sodium hydroxide, 50% in H2O, production mix, at plant [RER]: 1 kg
  Europe

## Inputs from technosphere
- Sodium hydroxide, 50% in H2O, diaphragm cell, at plant [RER]: 0.235 kg; lognormal SD95 1.1
  (1,1,1,1,1,1); statistics from EuroChlor
- Sodium hydroxide, 50% in H2O, membrane cell, at plant [RER]: 0.214 kg; lognormal SD95 1.1
  (1,1,1,1,1,1); statistics from EuroChlor
- Sodium hydroxide, 50% in H2O, mercury cell, at plant [RER]: 0.551 kg; lognormal SD95 1.1
  (1,1,1,1,1,1); statistics from EuroChlor

## Sampling procedure
Official statistics from the Association of European Chlorine Producers (EuroChlor)

## Sources
- Althaus H.-J., Chudacoff M., Hellweg S., Hischier R., Jungbluth N., Osses M., Primas A., 2007, 2007 - LCI chemicals - Althaus, Final report ecoinvent data v2.0, 8, Swiss Centre for LCI, Empa - TSL, ETH, ESU-services Ltd., Chudacoff Oekoscience, Duebendorf, CH
Althaus H.-J., Chudacoff M., Hischier R., Jungbluth N., Osses M., Primas A. (2007) Life Cycle Inventories of Chemicals. Final report ecoinvent data v2.0. Volume: 8. Swiss Centre for LCI, Empa - TSL. Dübendorf, CH.
Type: Measurement on site
Source: CD-ROM
First author: Althaus H.-J.
Other authors: Chudacoff M., Hischier R., Jungbluth N., Osses M., Primas A.
Year: 2007
Title of anthology: Final report ecoinvent data v2.0
Place of publication: Dübendorf, CH
Publisher: Swiss Centre for LCI, Empa - TSL
Volume No: 8

## Validation
Proof reading validation: Passed; Other validation: Passed;
