# xx Lead, secondary, from electronic and electric scrap recycling, at plant

Dataset: EcoSpold 1, unit process
Functional unit: 1 kg
Category: material, obsolete / metals, obsolete\non ferro, obsolete
Geography: SE
Time period: 2000-01 to 2005-12
Generated by: Mischa Classen
accessRestrictedTo: 0
copyright: true

## General comment
The multi-output-process "secondary copper conversion" delivers the co-products "metal values from electric waste, in blister-copper, at converter" and "lead, secondary, from electronic and electric scrap recycling, at plant". The product "metal values from electric waste, …" is an intermediary in the production of secondary gold from electric scrap and is not to be used by the LCA practitioner. The flow "lead, …" is a by-product of this process that receives part of the burdens allocated. It must not be used to reflect lead.;

## Included processes
Inculdes the processing of e-scrap in the Boliden process by the Kaldo plant and the converter aisle.

## Geography
Data describes a Swedish plant that is singular in the region and ranges worldwide among the big producer. It may be taken as approximation for the global situation

## Technology
Conversion of Copper in a Kaldo Converter and treatment in converter aisle.

## Reference product
- xx Lead, secondary, from electronic and electric scrap recycling, at plant [SE]: 1 kg
  SWEDEN

## Inputs from technosphere
- Facilities blister-copper conversion, secondary copper [SE]: 2.6618e-12 p; lognormal SD95 3.0099
  (2,3,1,2,1,3,9)
- Electricity, production mix: 0.0040128 kWh; lognormal SD95 1.1363
  (3,3,1,2,1,3,2)
- Disposal, nickel smelter slag, 0% water, to residual material landfill [CH]: 0.053602 kg; lognormal SD95 1.5176
  (2,3,1,2,4,3,6)
- Quicklime, milled, loose, at plant [CH]: 0.032578 kg; lognormal SD95 1.1031
  (2,3,1,2,1,3,4)

## Emissions to nature
- Dioxin, 2,3,7,8 Tetrachlorodibenzo-p- [emissions to air, low. pop.]: 4.3243e-12 kg; lognormal SD95 5
  uncertainty estimated
- Zinc [emissions to water, lake]: 3.7172e-10 kg; lognormal SD95 5
  uncertainty estimated
- Heat, waste [emissions to air, low. pop.]: 0.014446 MJ; lognormal SD95 1.1363
  calculation
- Particulates, > 10 um [emissions to air, low. pop.]: 4.3868e-8 kg; lognormal SD95 5
  uncertainty estimated
- Arsenic [emissions to air, low. pop.]: 2.8595e-12 kg; lognormal SD95 5
  uncertainty estimated
- Cadmium [emissions to air, low. pop.]: 1.0296e-10 kg; lognormal SD95 5
  uncertainty estimated
- Mercury [emissions to water, lake]: 8.5784e-12 kg; lognormal SD95 5
  uncertainty estimated
- Lead [emissions to water, lake]: 4.0032e-10 kg; lognormal SD95 5
  uncertainty estimated
- Cadmium [emissions to water, lake]: 2.8595e-12 kg; lognormal SD95 5
  uncertainty estimated
- Nitrogen oxides [emissions to air, low. pop.]: 5.9717e-7 kg; lognormal SD95 5
  uncertainty estimated
- Particulates, < 2.5 um [emissions to air, low. pop.]: 1.316e-7 kg; lognormal SD95 5
  uncertainty estimated
- Sulfur dioxide [emissions to air, low. pop.]: 1.2702e-5 kg; lognormal SD95 5
  uncertainty estimated
- Arsenic [emissions to water, lake]: 3.2884e-11 kg; lognormal SD95 5
  uncertainty estimated
- Copper [emissions to water, lake]: 1.1438e-9 kg; lognormal SD95 5
  uncertainty estimated
- Particulates, > 2.5 um, and < 10um [emissions to air, low. pop.]: 8.7735e-8 kg; lognormal SD95 5
  uncertainty estimated
- Copper [emissions to air, low. pop.]: 6.4056e-9 kg; lognormal SD95 5
  uncertainty estimated
- Chlorine [emissions to air, low. pop.]: 2.1828e-7 kg; lognormal SD95 5
  uncertainty estimated
- Mercury [emissions to air, low. pop.]: 2.0593e-10 kg; lognormal SD95 5
  uncertainty estimated
- Fluorine [emissions to air, low. pop.]: 1.7504e-9 kg; lognormal SD95 5
  uncertainty estimated
- Zinc [emissions to air, low. pop.]: 5.7144e-9 kg; lognormal SD95 5
  uncertainty estimated
- Lead [emissions to air, low. pop.]: 4.3912e-8 kg; lognormal SD95 5
  uncertainty estimated

## Sampling procedure
Literature

## Extrapolations
see Geography and Technology

## Sources
- Classen M., Althaus H.-J., Blaser S., Scharnhorst W., Tuchschmid M., Jungbluth N., Faist Emmenegger M., 2009, 2009 - LCI metals - Classen, Final report ecoinvent data v2.1, 10, Swiss Centre for LCI, Empa, ESU-services Ltd., Duebendorf, CH
Classen M., Althaus H.-J., Blaser S., Doka G., Jungbluth N., Tuchschmid M. (2008) Life Cycle Inventories of Metals. Final report ecoinvent data v2.1. Volume: 10. Issue: 0. Swiss Centre for LCI, Empa - TSL. Dübendorf, CH.
Type: Measurement on site
Source: CD-ROM
First author: Classen M.
Other authors: Althaus H.-J., Blaser S., Doka G., Jungbluth N., Tuchschmid M.
Year: 2008
Title of anthology: Final report ecoinvent data v2.1
Place of publication: Dübendorf, CH
Publisher: Swiss Centre for LCI, Empa - TSL
Volume No: 10
Issue No: 0

## Validation
Proof reading validation: Passed; Other validation: none;
