# Disposal, powertrain, for electric scooter

Dataset: EcoSpold 1, unit process, infrastructure
Functional unit: 1 kg
Category: transport systems / road
Geography: RER
Time period: 2014-01 to 2014-12
Production volume: 7800000 kg
Generated by: Frank Werner
accessRestrictedTo: 0
copyright: true

## General comment
This dataset describes the treatment of a used electric drivetrain of an electric scooter. The original dataset has been developed for a drivetrain comprising an electric motor (5.8kg), a controller (1.27kg) and a charger (3.025). First, the drivetrain is manually dismantled to recover all large metal scrap, especially from the electric motor and from the cases of the electronic devices. The scrap steel, copper and aluminium directly recovered from the components is sent to the respective scrap recycling facilities, while the remaining electronics scrap is sent to a smelter facility.;

## Included processes
The dataset starts with the electric drivetrain which needs to be dismantled already in the dismantling facility. The dataset returns the outcome scrap fractions for aluminium, steel, copper, plastic and waste electronics.

## Geography
data of situation in Switzerland

## Technology
current manual dismantling activities in Switzerland.

## Reference product
- Disposal, powertrain, for electric scooter [RER]: 1 kg
  Europe

## Inputs from technosphere
- Manual treatment plant, WEEE scrap [GLO]: 1.6e-8 p; lognormal SD95 4.5746
  (4,5,5,5,5,na)
  Value taken from electronic waste manual treatment. Rough estimation of infrastructure.

## Sampling procedure
Literature

## Sources
- Frischknecht R., Messmer A., Stolz P., 2016, 2016 - Mobitool - Frischknecht, Project Report, 0, treeze Ltd., Bern, CH
