# Potassium hydroxide, at regional storage

Dataset: EcoSpold 1, unit process
Functional unit: 1 kg
Category: chemicals / inorganic
Geography: RER
Time period: 2004-01 to 2004-12
Generated by: Mike Chudacoff
accessRestrictedTo: 0
copyright: true

## General comment
Potassium hydroxide is manufactured by the electrolysis of potassium chloride brine in electrolytical cells;
CAS number: 001310-58-3;
Formula: KOH;

## Included processes
cradle-to-gate, including all precursors, ancillary materials and transports

## Technology
based on industry data in the US

## Reference product
- Potassium hydroxide, at regional storage [RER]: 1 kg
  Europe

## Inputs from technosphere
- Water, completely softened, at plant [RER]: 2.195 kg; lognormal SD95 1.113
  (2,2,1,3,1,1); literature
- Treatment, sewage, to wastewater treatment, class 3 [CH]: 0.000257 m3; lognormal SD95 1.2102
  (4,2,1,3,1,1); approximation
- Electricity, medium voltage, production ENTSO-E, at grid: 1.81 kWh; lognormal SD95 1.0773
  (2,2,1,3,1,1); literature
- Heat, unspecific, in chemical plant [RER]: 6.2 MJ; lognormal SD95 1.0773
  (2,2,1,3,1,1); industry source
- Disposal, salt tailings potash mining, 0% water, to residual material landfill [CH]: 0.023 kg; lognormal SD95 1.2102
  (4,2,1,3,1,1); approximation
- Potassium chloride, as K2O, at regional storehouse [RER]: 0.493 kg; lognormal SD95 1.0773
  (2,2,1,3,1,1); literature
- Transport, freight, rail [RER]: 0.4938 tkm; lognormal SD95 1.3001
  (4,5,na,na,na,na); standard rail transport distance
- Transport, freight, lorry, fleet average [RER]: 0.0823 tkm; lognormal SD95 1.3001
  (4,5,na,na,na,na); standard trucking distance
- Chemical plant, organics [RER]: 4e-10 p; lognormal SD95 1.3001
  (4,5,na,na,na,na); infrastructure of a typical plant

## Inputs from nature
- Water, cooling, unspecified natural origin/m3 [resources, in water]: 0.0022 m3; lognormal SD95 1.0773
  (2,2,1,3,1,1); literature

## Emissions to nature
- Heat, waste [emissions to air, high. pop.]: 6.52 MJ; lognormal SD95 1.2102
  (4,2,1,3,1,1); estimated
- Chloride [emissions to water, river]: 0.038 kg; lognormal SD95 1.2102
  (4,2,1,3,1,1); calculation
- Potassium [emissions to water, river]: 0.013 kg; lognormal SD95 1.2102
  (4,2,1,3,1,1); calculation
- Water [emissions to water, unspecified]: 2.09 kg; lognormal SD95 2.5196
  (5,5,5,5,5,BU:1.05); All uncertainty-values set to 5.0 by default. Balance of input water

## Sources
- Jungbluth N., Chudacoff M., Dauriat A., Dinkel F., Doka G., Faist Emmenegger M., Gnansounou E., Kljun N., Spielmann M., Stettler C., Sutter J., 2007, 2007 - LCI bioenergy - Jungbluth, Final report ecoinvent data v2.0, 17, Swiss Centre for LCI, ESU-services Ltd., Duebendorf and Uster, CH
Jungbluth N., Chudacoff M., Dauriat A., Dinkel F., Doka G., Faist Emmenegger M., Gnansounou E., Kljun N., Spielmann M., Stettler C., Sutter J. (2007) Life Cycle Inventories of Bioenergy. Final report ecoinvent data v2.0. Volume: 17. Swiss Centre for LCI, ESU. Duebendorf and Uster, CH.
Type: Measurement on site
Source: CD-ROM
First author: Jungbluth N.
Other authors: Chudacoff M., Dauriat A., Dinkel F., Doka G., Faist Emmenegger M., Gnansounou E., Kljun N., Spielmann M., Stettler C., Sutter J.
Year: 2007
Title of anthology: Final report ecoinvent data v2.0
Place of publication: Duebendorf and Uster, CH
Publisher: Swiss Centre for LCI, ESU
Volume No: 17

## Validation
Proof reading validation: Passed.; Other validation: none;
