# Dismantling, CRT screen, manually, at plant

Dataset: EcoSpold 1, unit process
Functional unit: 1 kg
Category: electronics waste / unspecified
Geography: CH
Time period: 2004-01 to 2004-12
Share of production covered: 100 %
Generated by: Roland Hischier
accessRestrictedTo: 0
copyright: true

## General comment
manual dismantling in various fractions based on common transfer coefficients for this type of treatment. Data from own experiences in Switzerland.;

## Included processes
This dataset represents the manual dismantling of a WEEE devices in Switzerland.

## Geography
data of situation in Switzerland

## Technology
current manual dismantling activities in Switzerland.

## Reference product
- Dismantling, CRT screen, manually, at plant [CH]: 1 kg
  SWITZERLAND

## Inputs from technosphere
- Manual treatment plant, WEEE scrap [GLO]: 1.6e-8 p; lognormal SD95 3.7732
  (4,5,1,3,5,4,9); rough estimation of infrastructure
- Disposal, treatment of CRT glass [GLO]: 0.5336 kg; lognormal SD95 1.261
  (3,4,1,1,1,5,3); calculated - based on composition data
- Disposal, treatment of printed wiring boards [GLO]: 0.0235 kg; lognormal SD95 1.261
  (3,4,1,1,1,5,3); calculated - based on composition data
- Disposal, treatment of cables [GLO]: 0.0231 kg; lognormal SD95 1.261
  (3,4,1,1,1,5,3); calculated - based on composition data
- Transport, freight, rail, electricity with shunting [CH]: 0.014535 tkm; lognormal SD95 2.0607
  (3,1,1,1,1,5,5); data from Swiss WEEE systems - reported in Hischier (2005)
- Disposal, plastic, consumer electronics, 15.3% water, to municipal incineration [CH]: 0.1639 kg; lognormal SD95 1.261
  (3,4,1,1,1,5,3); calculated - based on composition data
- Transport, freight, lorry, 16t-32t gross weight, fleet average [CH]: 0.028215 tkm; lognormal SD95 2.0607
  (3,1,1,1,1,5,5); data from Swiss WEEE systems - reported in Hischier (2005)
- Dismantling, shredder fraction from manual dismantling, mechanically, at plant [GLO]: 0.0362 kg; lognormal SD95 1.261
  (3,4,1,1,1,5,3); calculated - based on composition data

## Sampling procedure
own experiences

## Sources
- Hischier R., Classen M., Lehmann M., Scharnhorst W., 2007, 2007 - LCI electric and electronic equipment - Hischier, Final report ecoinvent Data v2.0, 18, Swiss Centre for LCI, Empa - TSL, Duebendorf and St. Gallen, CH
Hischier R., Classen M., Lehmann M., Scharnhorst W. (2007) Life Cycle Inventories of Electric and Electronic Equipment - Production, Use & Disposal. Final report ecoinvent Data v2.0. Volume: 18. Swiss Centre for LCI, Empa - TSL. Duebendorf and St. Gallen, CH.
Type: Measurement on site
Source: CD-ROM
First author: Hischier R.
Other authors: Classen M., Lehmann M., Scharnhorst W.
Year: 2007
Title of anthology: Final report ecoinvent Data v2.0
Place of publication: Duebendorf and St. Gallen, CH
Publisher: Swiss Centre for LCI, Empa - TSL
Volume No: 18
Original title: Life Cycle Inventories of Electric and Electronic Equipment - Production, Use & Disposal

## Validation
Proof reading validation: passed.; Other validation: none;
