# Aluminium oxide, at plant

Dataset: EcoSpold 1, unit process
Functional unit: 1 kg
Category: chemicals / inorganics
Geography: RER
Time period: 2000-01 to 2000-12
Generated by: Philippe Stolz
accessRestrictedTo: 0
copyright: true

## General comment
Data are based on the EAA report 2013 which refers to 2010.;
CAS number: 1344-28-1;
Formula: Al2O3;

## Included processes
Includes production of aluminium oxide and aluminium hydroxide.

## Geography
Europe

## Technology
Industry data

## Reference product
- Aluminium oxide, at plant [RER]: 1 kg
  Europe

## Inputs from technosphere
- Transport, transoceanic freight ship [OCE]: 13.74 tkm; lognormal SD95 2.095
  (4,5,na,na,na,na); EAA 2013
- Disposal, redmud from bauxite digestion, 0% water, to residual material landfill [CH]: 0.671 kg; lognormal SD95 1.0587
  (1,1,2,1,1,1); EAA 2013
- Disposal, hazardous waste, 0% water, to underground deposit [DE]: 0.0002 kg; lognormal SD95 1.078
  (1,1,2,1,1,3); EAA 2013
- Transport, freight, rail [RER]: 0.12831 tkm; lognormal SD95 2.095
  (4,5,na,na,na,na); EAA 2013
- Treatment, sewage, to wastewater treatment, class 3 [CH]: 0.0031 m3; lognormal SD95 1.0587
  (1,1,2,1,1,1); EAA 2013
- Sodium hydroxide, 50% in H2O, production mix, at plant [RER]: 0.106 kg; lognormal SD95 1.0587
  (1,1,2,1,1,1); EAA 2013
- Bauxite, at mine [GLO]: 2.251 kg; lognormal SD95 1.0587
  (1,1,2,1,1,1); EAA 2013
- Aluminium hydroxide, plant [RER]: 2.5092e-11 p; lognormal SD95 3.2254
  (5,na,na,na,na,na); ecoinvent
- Diesel, burned in building machine, average [CH]: 0.001 MJ; lognormal SD95 1.0587
  (1,1,2,1,1,1); EAA 2013
- Natural gas, burned in industrial furnace 1MWth [CH]: 4.299 MJ; lognormal SD95 1.0587
  (1,1,2,1,1,1); EAA 2013
- Transport, freight, lorry, fleet average [RER]: 0.009004 tkm; lognormal SD95 2.095
  (4,5,na,na,na,na); EAA 2013
- Quicklime, milled, loose, at plant [CH]: 0.042 kg; lognormal SD95 1.0587
  (1,1,2,1,1,1); EAA 2013
- Electricity, medium voltage, production ENTSO-E, at grid: 0.181 kWh; lognormal SD95 1.0587
  (1,1,2,1,1,1); EAA 2013
- Disposal, inert waste, 5% water, to construction waste landfill [CH]: 0.0409 kg; lognormal SD95 1.0587
  (1,1,2,1,1,1); EAA 2013
- Heavy fuel oil, burned in industrial furnace 1MW, non-modulating [RER]: 5.822 MJ; lognormal SD95 1.0587
  (1,1,2,1,1,1); EAA 2013
- Aluminium oxide, plant [RER]: 2.5e-11 p; lognormal SD95 3.2254
  (5,na,na,na,na,na); ecoinvent
- Disposal, inert material, 0% water, to sanitary landfill [CH]: 0.0069 kg; lognormal SD95 1.0587
  (1,1,2,1,1,1); EAA 2013

## Inputs from nature
- Water, well [resources, in water]: 0.0036 m3; lognormal SD95 1.0587
  (1,1,2,1,1,1); EAA 2013

## Emissions to nature
- COD, Chemical Oxygen Demand [emissions to water, unspecified]: 0.00024574 kg; lognormal SD95 1.506
  (2,1,2,1,1,1); EAA 2008 and ecoinvent, assumption for oil/grease
- TOC, Total Organic Carbon [emissions to water, unspecified]: 6.7487e-5 kg; lognormal SD95 1.506
  (2,1,2,1,1,1); EAA 2008 and ecoinvent, assumption for oil/grease
- Particulates, > 10 um [emissions to air, unspecified]: 7e-5 kg; lognormal SD95 1.5016
  (1,1,2,1,1,1); EAA 2013
- Mercury [emissions to water, unspecified]: 1.26e-10 kg; lognormal SD95 5.0014
  (1,1,2,1,1,1); EAA 2013
- DOC, Dissolved Organic Carbon [emissions to water, unspecified]: 6.7487e-5 kg; lognormal SD95 1.506
  (2,1,2,1,1,1); EAA 2008 and ecoinvent, assumption for oil/grease
- Nitrogen oxides [emissions to air, unspecified]: 0.00111 kg; lognormal SD95 1.506
  (2,1,2,1,1,1); EAA 2013
- Mercury [emissions to air, unspecified]: 6e-8 kg; lognormal SD95 5.0051
  (2,1,2,1,1,1); EAA 2013
- Heat, waste [emissions to air, unspecified]: 0.6516 MJ; lognormal SD95 1.0587
  (1,1,2,1,1,1); EAA 2013
- BOD5, Biological Oxygen Demand [emissions to water, unspecified]: 0.00024574 kg; lognormal SD95 1.506
  (2,1,2,1,1,1); EAA 2008 and ecoinvent, assumption for oil/grease
- Sulfur dioxide [emissions to air, unspecified]: 0.00268 kg; lognormal SD95 1.078
  (2,1,2,1,1,1); EAA 2013
- Water, Europe [emissions to air, unspecified]: 0.5 kg; lognormal SD95 1.5016
  (1,1,2,1,1,1); EAA 2013
- Particulates, < 2.5 um [emissions to air, unspecified]: 7e-6 kg; lognormal SD95 3.0012
  (1,1,2,1,1,1); EAA 2013
- Suspended solids, unspecified [emissions to water, unspecified]: 0.00023 kg; lognormal SD95 1.5016
  (1,1,2,1,1,1); EAA 2013
- Particulates, > 2.5 um, and < 10um [emissions to air, unspecified]: 6.3e-5 kg; lognormal SD95 2.0013
  (1,1,2,1,1,1); EAA 2013
- Water [emissions to water, unspecified]: 3.24 kg; lognormal SD95 2.5196
  (5,5,5,5,5,BU:1.05); All uncertainty-values set to 5.0 by default. Balance of input water

## Sources
- Stolz P., Frischknecht R., 2016, 2016 - LCI aluminium and aluminium profiles - Stolz, -, 525, treeze Ltd., Uster, CH
Stolz P., Frischknecht R. (2016) Life Cycle Inventories of Aluminium. Volume: 525. treeze Ltd.. Uster, CH.
Type: Separate publication
Source: Report
First author: Stolz P.
Other authors: Frischknecht R.
Year: 2016
Place of publication: Uster, CH
Publisher: treeze Ltd.
Volume No: 525
