# Plastic conduits to conduit sorting

Dataset: EcoSpold 1, unit process
Functional unit: 1 kg
Category: waste management / building demolition
Geography: CH
Time period: 2019-01 to 2021-12
Generated by: Daniel Savi
accessRestrictedTo: 0
copyright: true

## General comment
dt: Kunststoffrohru in die Rohr-Sortierung
Version: 0.0

Local category: Entsorgungssysteme
Local subcategory: Gebäudeentsorgung

## Reference product
- Plastic conduits to conduit sorting [CH]: 1 kg
  SWITZERLAND

## Inputs from technosphere
- Transport, freight, lorry, 16t-32t gross weight, fleet average [CH]: 0.171 tkm

## Sources
- Klingler M., Savi D., Doka G., 2019, 2019 - LCA disposal of building materials - Klingler, -, Buero fuer Umweltchemie, Zuerich, CH
M. Klingler (2019) Harmonisierte O¨kobilanzen der Entsorgung von Baustoffen - Fu¨r die Liste der O¨kobilanzdaten im Baubereich. Zürich.

Source: M. Klingler, D. Savi (2019) Harmonisierte O¨kobilanzen der Entsorgung von Baustoffen - Fu¨r die Liste der O¨kobilanzdaten im Baubereich, Büro für Umweltchemie, Zürich
First author: M. Klingler
Year: 2019
Place of publication: Zürich
Original title: Harmonisierte O¨kobilanzen der Entsorgung von Baustoffen - Fu¨r die Liste der O¨kobilanzdaten im Baubereich
