# xxx Industrial residue wood, mix, hardwood, u=40%, at plant

Dataset: EcoSpold 1, unit process
Functional unit: 1 m3
Category: material, obsolete / wood, obsolete\extraction, obsolete
Geography: RER
Generated by: Hans-Joerg Althaus
accessRestrictedTo: 0
copyright: true

## General comment
refers to the actual volume of the wood (not bulked);
Synonyms: Abfallholz, Buche, Beech;

## Included processes
Mix of the different industrial residual hardwood fractions in proportion to their production in Switzerland

## Technology
Mix

## Reference product
- xxx Industrial residue wood, mix, hardwood, u=40%, at plant [RER]: 1 m3
  Europe

## Inputs from technosphere
All rows: lognormal SD95 1.31
- xxx Industrial residue wood, plywood prod., outdoor use, hardwood, u=20%, at plant [RER]: 0.0171 m3
  (4,3,1,3,1,5,3)
- xxx Industrial residue wood, from planing, hardwood, kiln dried, u=10%, at plant [RER]: 0.00963 m3
  (4,3,1,3,1,5,3)
- xxx Industrial residue wood, from planing, hard, air, kiln dried, u=10%, at plant [RER]: 0.00963 m3
  (4,3,1,3,1,5,3)
- xxx Industrial residue wood, hardwood, including bark, u=70%, at plant [RER]: 0.947 m3
  (4,3,1,3,1,5,3)
- xxx Industrial residue wood, plywood prod., indoor use, hardwood, u=20%, at plant [RER]: 0.0171 m3
  (4,3,1,3,1,5,3)

## Sampling procedure
survey

## Extrapolations
see Geography

## Uncertainty adjustments
The assumption that the mix is representative for central Europe is considered in the uncertainties.

## Sources
- Werner F., Althaus H.-J., Kuenniger T., Richter K., Jungbluth N., 2007, 2007 - LCI wood as fuel and const. mat. - Werner, Final report ecoinvent data v2.0, 9, Swiss Centre for LCI, Empa - TSL, ESU-services Ltd., Duebendorf, CH
Werner F., Althaus H.-J., Künniger T., Richter K., Jungbluth N. (2007) 1Life Cycle Inventories of Wood as Fuel and Construction Material. Final report ecoinvent data v2.0. Volume: 9. Issue: 0. Swiss Centre for LCI, Empa - TSL. Dübendorf, CH.
Type: Measurement on site
Source: CD-ROM
First author: Werner F.
Other authors: Althaus H.-J., Künniger T., Richter K., Jungbluth N.
Year: 2007
Title of anthology: Final report ecoinvent data v2.0
Place of publication: Dübendorf, CH
Publisher: Swiss Centre for LCI, Empa - TSL
Volume No: 9
Issue No: 0

## Validation
Proof reading validation: passed; Other validation: none;
