# Electricity, hydropower, at pumped storage power plant

Dataset: EcoSpold 1, unit process
Functional unit: 1 kWh
Category: electricity by fuel / hydro\pumping storage
Geography: RER
Time period: 1945-01 to 2008-12
Generated by: Karin Flury
accessRestrictedTo: 0
copyright: true

## General comment
The storage and pumped storage hydropower are sharing the same infrastructure, consequently the impacts of the reservoirs, the area used, the amount of turbined water and the greenhouse gas emissions are shared with the storage hydropower. The lifetime is assumed to be 150 years for the dams and 80 years for the other material. The data describe a mix and can therefore not be used for an individual pumped storage hydropower station. This dataset is recalculated based on Frischknecht et al. (1996) and Bauer (2007), complemented with data from Vattenfall (2008) and Diem et al. (2008). The electricity consumption is based on BFE (2010).;

## Included processes
Operation of an average storage hydropower station. It includes the electricity consumption, the area transformed and occupied, the volume of the reservoir, greenhouse gas emissions, the consumption of lubricant oil and the amount of turbined water.

## Geography
Average European electricity production in alpine pumped storage hydropower station.

## Technology
Average installed technology. Efficiency 0.8. Annual production volume: 190GWh/a.

## Reference product
- Electricity, hydropower, at pumped storage power plant [RER]: 1 kWh
  Europe

## Inputs from technosphere
- Sulphur hexafluoride, liquid, at plant [RER]: 3.4e-10 kg; lognormal SD95 1.67493
  (4,5,1,5,1,5,BU:1.05); In electric insulation (e.g. switches); based on Vattenfall (2008)
- Electricity, high voltage, production ENTSO-E, at grid: 1.25 kWh; lognormal SD95 1.96501
  (5,5,2,5,1,5,BU:1.05); For the pumping of the water; bfe (2010)
- Lubricating oil, at plant [RER]: 3.244e-8 kg; lognormal SD95 1.67493
  (4,5,1,5,1,5,BU:1.05); Turbines; based on Vattenfall (2008)
- Reservoir hydropower plant, alpine region [RER]: 3.34701e-11 p; lognormal SD95 3.77872
  (4,5,1,5,1,5,BU:3); Infrastructure of the storage power station producing the electricity

## Inputs from nature
- Occupation, water bodies, artificial [resources, land]: 0.00361977 m2a; lognormal SD95 1.82
  (3,1,1,1,1,1,BU:1.5); Area occupied by the reservoir; recalculated based on Frischknecht et al. (1996) and Schweizerisches Talsperrenkomitee (2011)
- Transformation, from unknown [resources, land]: 2.43731e-5 m2; lognormal SD95 2.4157
  (3,1,1,1,1,1,BU:2); Original area before the construction of the power station; recalculated based on Frischknecht et al. (1996) and Schweizerisches Talsperrenkomitee (2011)
- Water, turbine use, unspecified natural origin [resources, in water]: 1.40363 m3; lognormal SD95 1.33562
  (3,1,1,1,1,1,BU:1.05); Amount of water turbined for the generation of electricity; based on BWW (1973)
- Volume occupied, reservoir [resources, in water]: 0.164183 m3y; lognormal SD95 1.33562
  (3,1,1,1,1,1,BU:1.05); Volume occupied by the reservoir; based on Schweizerisches Talsperrenkomitee (2011)
- Transformation, to water bodies, artificial [resources, land]: 2.41318e-5 m2; lognormal SD95 2.4157
  (3,1,1,1,1,1,BU:2); Area covered by the reservoir; recalculated based on Frischknecht et al. (1996) and Schweizerisches Talsperrenkomitee (2011)
- Occupation, industrial area, built up [resources, land]: 3.61977e-5 m2a; lognormal SD95 1.87178
  (4,1,1,1,1,1,BU:1.5); Area occupied by the infrastructure; recalculated based on Frischknecht et al. (1996) and Schweizerisches Talsperrenkomitee (2011)
- Transformation, to industrial area, built up [resources, land]: 2.41318e-7 m2; lognormal SD95 2.45726
  (4,1,1,1,1,1,BU:2); Area covered by infrastructures other than held-back river; recalculated based on Frischknecht et al. (1996) and Schweizerisches Talsperrenkomitee (2011)

## Emissions to nature
- Heat, waste [emissions to air, low. pop.]: 0.9 MJ; lognormal SD95 1.45829
  (4,1,1,1,1,3,BU:1.05); Heat emissions
- Dinitrogen monoxide [emissions to air, low. pop.]: 2.56175e-8 kg; lognormal SD95 1.89835
  (4,3,2,3,1,4,BU:1.5); Nitrous oxide emissions due to the biomass in the reservoirs; calculated based on Diem et al. (2008)
- Oils, unspecified [emissions to soil, industrial]: 9.76e-9 kg; lognormal SD95 2.02388
  (4,5,1,5,1,5,BU:1.5); From turbines; based on Vattenfall (2008)
- Methane, biogenic [emissions to air, low. pop.]: 2.64243e-7 kg; lognormal SD95 1.88442
  (4,3,2,3,1,3,BU:1.5); Methane emissions due to the biomass in the reservoirs; calculated based on Diem et al. (2008)
- Water, OECD [emissions to air, unspecified]: 1.75197 kg; lognormal SD95 2.27088
  (4,3,3,2,4,5,BU:1.5); Water evaporated from reservoir; calculated based on Spreafico & Weingartner (2005)
- Sulfur hexafluoride [emissions to air, low. pop.]: 3.4e-10 kg; lognormal SD95 2.02388
  (4,5,1,5,1,5,BU:1.5); From electric insulations (e.g. switches); based on Vattenfall (2008)
- Oils, unspecified [emissions to water, river]: 2.268e-8 kg; lognormal SD95 2.02388
  (4,5,1,5,1,5,BU:1.5); From turbines; based on Vattenfall (2008)
- Carbon dioxide, land transformation [emissions to air, low. pop.]: 0.00136085 kg; lognormal SD95 1.77324
  (4,3,2,3,1,3,BU:1.4); Carbon dioxide emissions due to the biomass in the reservoirs; calculated based on Diem et al. (2008)
- Water [emissions to water, unspecified]: 1403.63 kg; lognormal SD95 2.5196
  (5,5,5,5,5,BU:1.05); All uncertainty-values set to 5.0 by default. Balance of input water

## Sampling procedure
literature

## Sources
- Flury K., Frischknecht R., 2012, 2012 - LCI hydroelectric power generation - Flury, Project report, 349, ESU-services Ltd., Uster, CH
Flury K., Frischknecht R. (2011) Life Cycle Inventory of hydropower. Project report. Volume: 349. ESU-services Ltd.. Uster, CH.
Type: Separate publication
Source: Report
First author: Flury K.
Other authors: Frischknecht R.
Year: 2011
Title of anthology: Project report
Place of publication: Uster, CH
Publisher: ESU-services Ltd.
Volume No: 349

## Validation
Proof reading validation: 22.10.2012; Other validation: \\Server\e\ESU-Docs\Projektablage\349 Sachbilanzen erneuerbare Energie DE\DatenErgebnisse\[Ecospold_reservoir_CH_v2.2.xlsx]X-Process;
