# Heavy fuel oil, at refinery

Dataset: EcoSpold 1, unit process
Functional unit: 1 kg
Category: oil / fuels
Geography: RER
Time period: 2000-01 to 2000-12
Production volume: 676 million tonnes crude oil for 2016 in 90 refineries in RER
Generated by: Niels Jungbluth
accessRestrictedTo: 0
copyright: true

## General comment
Description of all flows of materials and energy due to the throughput of 1kg crude oil in the refinery. The multioutput-process 'crude oil, in refinery' delivers the co-products petrol, unleaded, bitumen, diesel, light fuel oil, heavy fuel oil, kerosene, naphtha, propane/ butane, refinery gas, secondary sulphur and electricity. The impacts of processing are allocated to the different products with flow specific allocation factors described in the report.;
Synonyms: Schweröl, HFO;

## Included processes
All processes on the refinery site, including energy use and emissions from combustion facilities, including waste water treatment, process emissions and direct discharges to rivers.

## Geography
Assumption for the European average.

## Technology
Assumption for average technology.

## Time period
Statistical data for the throughput and production volumes were available for the year 2016. Major indicators like energy use have been estimated based on a survey in European refineries. Other data and indicators have been estimated based on different environmental reports and statistical data sources.

## Reference product
- Heavy fuel oil, at refinery [RER]: 1 kg
  Europe

## Inputs from technosphere
- Disposal, catalytic converter NOx reduction, 0% water, to underground deposit [DE]: 1.1382e-6 kg; lognormal SD95 1.596
  (3,4,5,3,3,na); Estimation based on literature data
- Iron sulphate, at plant [RER]: 4.998e-5 kg; lognormal SD95 1.596
  (3,4,5,3,3,na); Literature, waste water treatment
- Chemicals organic, at plant [GLO]: 0.00017263 kg; lognormal SD95 1.596
  (3,4,5,3,3,na); IPPC European plant data
- Tap water, unspecified natural origin RER, at user [RER]: 0.015196 kg; lognormal SD95 1.1047
  (2,3,1,3,1,3); Average of plant data
- Disposal, refinery sludge, 89.5% water, to hazardous waste incineration [CH]: 0.0010696 kg; lognormal SD95 1.0587
  (1,1,2,1,1,1); Concawe data for 2010
- Zinc, primary, at regional storage [RER]: 1.2227e-7 kg; lognormal SD95 1.596
  (3,4,5,3,3,na); Range for RER refineries, Zn Catalyst
- Lime, hydrated, packed, at plant [CH]: 3.4986e-5 kg; lognormal SD95 1.596
  (3,4,5,3,3,na); Estimation based on literature
- Crude oil, market mix, at long distance transport [RER]: 0.96107 kg; lognormal SD95 1.0714
  (1,1,1,1,1,3); Reference flow of mulit-output process, allocation by mass
- Transport, freight, lorry, fleet average [RER]: 0.00019941 tkm; lognormal SD95 2.095
  (4,5,na,na,na,na); Standard distance 100km
- Transport, freight, rail [RER]: 0.0011964 tkm; lognormal SD95 2.095
  (4,5,na,na,na,na); Standard distance 600km
- Soap, at plant [RER]: 2.6743e-6 kg; lognormal SD95 1.596
  (3,4,5,3,3,na); Average of plant data
- Ammonia, liquid, at regional storehouse [RER]: 2.0066e-6 kg; lognormal SD95 1.596
  (3,4,5,3,3,na); Literature before 2003
- Refinery [RER]: 2.2775e-11 p; lognormal SD95 3.2968
  (3,4,5,3,3,na); Estimation
- Heavy fuel oil, burned in refinery furnace [RER]: 0.24892 MJ; lognormal SD95 1.0587
  (1,1,2,1,1,1); Concawe data for 2010
- Hydrochloric acid, 30% in H2O, at plant [RER]: 8.8992e-5 kg; lognormal SD95 1.596
  (3,4,5,3,3,na); Env. reports DE
- Zeolite, powder, at plant [RER]: 1.1286e-5 kg; lognormal SD95 1.596
  (3,4,5,3,3,na); Range for RER refineries
- Refinery gas, burned in furnace [RER]: 0.95094 MJ; lognormal SD95 1.0587
  (1,1,2,1,1,1); Concawe data for 2010
- Sulphuric acid, liquid, at plant [RER]: 9.6842e-6 kg; lognormal SD95 1.1376
  (2,4,1,3,1,3); Env. reports DE
- Petroleum coke, burned in refinery furnace [RER]: 0.27031 MJ; lognormal SD95 1.0587
  (1,1,2,1,1,1); Concawe data for 2010
- Sodium hypochlorite, 15% in H2O, at plant [RER]: 4.998e-5 kg; lognormal SD95 1.596
  (3,4,5,3,3,na); Literature, waste water treatment
- Nitrogen, liquid, at plant [RER]: 0.0011247 kg; lognormal SD95 1.1376
  (2,4,1,3,1,3); Env. reports DE
- Natural gas, burned in industrial furnace 1MW [CH]: 0.35538 MJ; lognormal SD95 1.0587
  (1,1,2,1,1,1); Concawe data for 2010
- Electricity, medium voltage, production ENTSO-E, at grid: 0.057083 kWh; lognormal SD95 1.0587
  (1,1,2,1,1,1); Concawe data for 2010
- Disposal, municipal solid waste, 22.9% water, to municipal incineration [CH]: 0.0014494 kg; lognormal SD95 1.0587
  (1,1,2,1,1,1); Concawe data for 2010
- Propylene glycol, liquid, at plant [RER]: 6.2673e-7 kg; lognormal SD95 1.596
  (3,4,5,3,3,na); Literature
- Calcium chloride, CaCl2, at plant [RER]: 1.6217e-5 kg; lognormal SD95 1.596
  (3,4,5,3,3,na); Average of plant data
- Lubricating oil, at plant [RER]: 1.2339e-5 kg; lognormal SD95 1.1376
  (2,4,1,3,1,3); Env. reports DE

## Inputs from nature
- Water, cooling, unspecified natural origin/m3 [resources, in water]: 0.0076869 m3; lognormal SD95 1.07439
  (1,2,1,1,1,3); Barthe et al 2015
- Water, unspecified natural origin/m3 [resources, unspecified]: 0.0065973 m3; lognormal SD95 1.07439
  (1,2,1,1,1,3); Barthe et al 2015

## Emissions to nature
- Oils, unspecified [emissions to water, river]: 4.0522e-7 kg; lognormal SD95 1.8532
  (3,4,5,3,3,na); Literature before 2003
- Cadmium [emissions to water, ocean]: 6.95e-10 kg; lognormal SD95 3.0038
  (1,2,1,1,1,3); Barthe et al 2015
- Barium [emissions to water, ocean]: 1.6249e-8 kg; lognormal SD95 5.3402
  (3,4,5,3,3,na); Literature
- Phenol [emissions to water, river]: 1.2636e-8 kg; lognormal SD95 3.0038
  (1,2,1,1,1,3); Barthe et al 2015
- Boron [emissions to water, river]: 9.6321e-13 kg; lognormal SD95 5.0043
  (1,2,1,1,1,3); Barthe et al 2015
- Nitrogen, organic bound [emissions to water, ocean]: 4.153e-6 kg; lognormal SD95 1.5051
  (1,2,1,1,1,3); Barthe et al 2015
- Particulates, > 10 um [emissions to air, high. pop.]: 1.505e-5 kg; lognormal SD95 1.5051
  (1,2,1,1,1,3); Barthe et al 2015
- Hydrocarbons, aromatic [emissions to air, high. pop.]: 5.1324e-13 kg; lognormal SD95 1.8532
  (3,4,5,3,3,na); Average of plant data
- Fluoride [emissions to water, river]: 2.1891e-7 kg; lognormal SD95 1.5051
  (1,2,1,1,1,3); Barthe et al 2015
- Hydrocarbons, aromatic [emissions to water, river]: 3.6485e-9 kg; lognormal SD95 1.5051
  (1,2,1,1,1,3); Barthe et al 2015
- COD, Chemical Oxygen Demand [emissions to water, ocean]: 4.878e-6 kg; lognormal SD95 1.5051
  (1,2,1,1,1,3); Barthe et al 2015
- Nitrate [emissions to water, river]: 2.2621e-6 kg; lognormal SD95 1.5051
  (1,2,1,1,1,3); Barthe et al 2015
- Fluoride [emissions to water, ocean]: 3.8084e-7 kg; lognormal SD95 1.5051
  (1,2,1,1,1,3); Barthe et al 2015
- Toluene [emissions to air, high. pop.]: 6.1466e-6 kg; lognormal SD95 1.8532
  (3,4,5,3,3,na); Literature
- Tin [emissions to water, river]: 1.598e-9 kg; lognormal SD95 5.0043
  (1,2,1,1,1,3); Barthe et al 2015
- Iron [emissions to water, river]: 5.4728e-8 kg; lognormal SD95 5.0043
  (1,2,1,1,1,3); Barthe et al 2015
- Manganese [emissions to water, river]: 1.4594e-8 kg; lognormal SD95 5.0043
  (1,2,1,1,1,3); Barthe et al 2015
- Ammonium, ion [emissions to water, river]: 2.1643e-7 kg; lognormal SD95 1.5051
  (1,2,1,1,1,3); Barthe et al 2015
- Sulfide [emissions to water, ocean]: 1.5869e-8 kg; lognormal SD95 1.5051
  (1,2,1,1,1,3); Barthe et al 2015
- Chromium [emissions to water, river]: 3.9949e-10 kg; lognormal SD95 3.0038
  (1,2,1,1,1,3); Barthe et al 2015
- Ethene [emissions to air, unspecified]: 2.0489e-6 kg; lognormal SD95 1.8532
  (3,4,5,3,3,na); Literature
- COD, Chemical Oxygen Demand [emissions to water, river]: 2.8039e-6 kg; lognormal SD95 1.5051
  (1,2,1,1,1,3); Barthe et al 2015
- Phosphate [emissions to water, ocean]: 8.2516e-8 kg; lognormal SD95 1.5051
  (1,2,1,1,1,3); Barthe et al 2015
- Nitrite [emissions to water, river]: 3.6485e-8 kg; lognormal SD95 1.5051
  (1,2,1,1,1,3); Barthe et al 2015
- Nitrogen, organic bound [emissions to water, river]: 2.3872e-6 kg; lognormal SD95 1.5051
  (1,2,1,1,1,3); Barthe et al 2015
- Chromium [emissions to water, ocean]: 6.95e-10 kg; lognormal SD95 3.0038
  (1,2,1,1,1,3); Barthe et al 2015
- AOX, Adsorbable Organic Halogen as Cl [emissions to water, ocean]: 3.4747e-8 kg; lognormal SD95 1.5051
  (1,2,1,1,1,3); Barthe et al 2015
- Sulfide [emissions to water, river]: 9.1213e-9 kg; lognormal SD95 1.5051
  (1,2,1,1,1,3); Barthe et al 2015
- Nickel [emissions to water, ocean]: 4.17e-9 kg; lognormal SD95 5.0043
  (1,2,1,1,1,3); Barthe et al 2015
- Benzene, ethyl- [emissions to air, unspecified]: 1.0244e-6 kg; lognormal SD95 3.2968
  (3,4,5,3,3,na); Literature
- PAH, polycyclic aromatic hydrocarbons [emissions to water, river]: 9.9864e-11 kg; lognormal SD95 3.0038
  (1,2,1,1,1,3); Barthe et al 2015
- Propene [emissions to air, unspecified]: 2.0489e-6 kg; lognormal SD95 1.8532
  (3,4,5,3,3,na); Literature
- Benzene, ethyl- [emissions to water, ocean]: 2.7751e-9 kg; lognormal SD95 3.0038
  (1,2,1,1,1,3); Barthe et al 2015
- Cyanide [emissions to water, ocean]: 2.539e-9 kg; lognormal SD95 3.0038
  (1,2,1,1,1,3); Barthe et al 2015
- AOX, Adsorbable Organic Halogen as Cl [emissions to water, river]: 1.9973e-8 kg; lognormal SD95 1.5051
  (1,2,1,1,1,3); Barthe et al 2015
- Molybdenum [emissions to water, ocean]: 4.1893e-14 kg; lognormal SD95 5.0043
  (1,2,1,1,1,3); Barthe et al 2015
- Butene [emissions to air, high. pop.]: 1.0244e-6 kg; lognormal SD95 1.8532
  (3,4,5,3,3,na); Literature
- Nitrate [emissions to water, ocean]: 3.9354e-6 kg; lognormal SD95 1.5051
  (1,2,1,1,1,3); Barthe et al 2015
- Zinc [emissions to water, river]: 5.9923e-9 kg; lognormal SD95 5.0043
  (1,2,1,1,1,3); Barthe et al 2015
- BOD5, Biological Oxygen Demand [emissions to water, ocean]: 1.383e-6 kg; lognormal SD95 1.5051
  (1,2,1,1,1,3); Barthe et al 2015
- Arsenic [emissions to water, river]: 2.7964e-10 kg; lognormal SD95 5.0043
  (1,2,1,1,1,3); Barthe et al 2015
- Suspended solids, unspecified [emissions to water, fossilwater]: 2.2986e-6 kg; lognormal SD95 1.5051
  (1,2,1,1,1,3); Barthe et al 2015
- Cyanide [emissions to water, river]: 1.4594e-9 kg; lognormal SD95 3.0038
  (1,2,1,1,1,3); Barthe et al 2015
- Silver [emissions to water, ocean]: 8.1247e-9 kg; lognormal SD95 5.3402
  (3,4,5,3,3,na); Literature
- Aluminium [emissions to water, ocean]: 8.1247e-9 kg; lognormal SD95 5.3402
  (3,4,5,3,3,na); Literature
- PAH, polycyclic aromatic hydrocarbons [emissions to water, ocean]: 1.7374e-10 kg; lognormal SD95 3.0038
  (1,2,1,1,1,3); Barthe et al 2015
- Benzene [emissions to air, high. pop.]: 2.5083e-6 kg; lognormal SD95 3.0038
  (1,2,1,1,1,3); Barthe et al 2015
- TOC, Total Organic Carbon [emissions to water, river]: 9.9372e-7 kg; lognormal SD95 1.5051
  (1,2,1,1,1,3); Barthe et al 2015
- Sodium [emissions to water, ocean]: 4.8685e-5 kg; lognormal SD95 5.3402
  (3,4,5,3,3,na); Literature
- Phosphorus [emissions to water, river]: 1.0946e-7 kg; lognormal SD95 1.5051
  (1,2,1,1,1,3); Barthe et al 2015
- Ethane [emissions to air, unspecified]: 1.0244e-5 kg; lognormal SD95 1.8532
  (3,4,5,3,3,na); Literature
- Selenium [emissions to water, ocean]: 1.6757e-13 kg; lognormal SD95 5.0043
  (1,2,1,1,1,3); Barthe et al 2015
- Nitrite [emissions to water, ocean]: 6.3474e-8 kg; lognormal SD95 1.5051
  (1,2,1,1,1,3); Barthe et al 2015
- Chromium VI [emissions to water, ocean]: 6.95e-10 kg; lognormal SD95 3.0038
  (1,2,1,1,1,3); Barthe et al 2015
- Tin [emissions to water, ocean]: 2.78e-9 kg; lognormal SD95 5.0043
  (1,2,1,1,1,3); Barthe et al 2015
- Cobalt [emissions to water, ocean]: 4.587e-15 kg; lognormal SD95 3.0038
  (1,2,1,1,1,3); Barthe et al 2015
- Toluene [emissions to water, river]: 1.4594e-9 kg; lognormal SD95 3.0038
  (1,2,1,1,1,3); Barthe et al 2015
- Heptane [emissions to air, high. pop.]: 1.0244e-5 kg; lognormal SD95 1.8532
  (3,4,5,3,3,na); Literature
- Mercury [emissions to water, river]: 3.6485e-11 kg; lognormal SD95 5.0043
  (1,2,1,1,1,3); Barthe et al 2015
- Benzene [emissions to water, ocean]: 1.1582e-9 kg; lognormal SD95 3.0038
  (1,2,1,1,1,3); Barthe et al 2015
- Suspended solids, unspecified [emissions to water, ocean]: 3.9989e-6 kg; lognormal SD95 1.5051
  (1,2,1,1,1,3); Barthe et al 2015
- Hydrocarbons, aromatic [emissions to water, ocean]: 6.3474e-9 kg; lognormal SD95 1.5051
  (1,2,1,1,1,3); Barthe et al 2015
- Ammonium, ion [emissions to water, ocean]: 3.7654e-7 kg; lognormal SD95 1.5051
  (1,2,1,1,1,3); Barthe et al 2015
- Chromium VI [emissions to water, river]: 3.9949e-10 kg; lognormal SD95 3.0038
  (1,2,1,1,1,3); Barthe et al 2015
- Sodium [emissions to water, river]: 2.7984e-5 kg; lognormal SD95 5.3402
  (3,4,5,3,3,na); Literature
- Hydrocarbons, aliphatic, unsaturated [emissions to air, high. pop.]: 1.8819e-12 kg; lognormal SD95 1.8532
  (3,4,5,3,3,na); Average of plant data
- Vanadium [emissions to water, river]: 1.1985e-9 kg; lognormal SD95 5.0043
  (1,2,1,1,1,3); Barthe et al 2015
- Strontium [emissions to water, ocean]: 1.2441e-7 kg; lognormal SD95 5.3402
  (3,4,5,3,3,na); Literature
- Heat, waste [emissions to air, high. pop.]: 0.14384 MJ; lognormal SD95 1.1047
  (2,3,1,3,1,3); Calculation
- Nickel [emissions to water, river]: 2.3969e-9 kg; lognormal SD95 5.0043
  (1,2,1,1,1,3); Barthe et al 2015
- Molybdenum [emissions to water, river]: 2.408e-14 kg; lognormal SD95 5.0043
  (1,2,1,1,1,3); Barthe et al 2015
- Lead [emissions to water, ocean]: 3.475e-9 kg; lognormal SD95 5.0043
  (1,2,1,1,1,3); Barthe et al 2015
- Butane [emissions to air, unspecified]: 4.0977e-5 kg; lognormal SD95 1.8532
  (3,4,5,3,3,na); Literature
- Boron [emissions to water, ocean]: 1.6757e-12 kg; lognormal SD95 5.0043
  (1,2,1,1,1,3); Barthe et al 2015
- Benzene, ethyl- [emissions to water, river]: 1.5952e-9 kg; lognormal SD95 3.0038
  (1,2,1,1,1,3); Barthe et al 2015
- Zinc [emissions to water, ocean]: 1.0425e-8 kg; lognormal SD95 5.0043
  (1,2,1,1,1,3); Barthe et al 2015
- Arsenic [emissions to water, ocean]: 4.865e-10 kg; lognormal SD95 5.0043
  (1,2,1,1,1,3); Barthe et al 2015
- Potassium [emissions to water, river]: 9.3402e-7 kg; lognormal SD95 5.3402
  (3,4,5,3,3,na); Literature
- Methane, fossil [emissions to air, high. pop.]: 8.5282e-6 kg; lognormal SD95 1.5051
  (1,2,1,1,1,3); Barthe et al 2015
- Phosphorus [emissions to water, ocean]: 1.9042e-7 kg; lognormal SD95 1.5051
  (1,2,1,1,1,3); Barthe et al 2015
- Mercury [emissions to water, ocean]: 6.3474e-11 kg; lognormal SD95 5.0043
  (1,2,1,1,1,3); Barthe et al 2015
- Oils, unspecified [emissions to water, ocean]: 7.0497e-7 kg; lognormal SD95 1.8532
  (3,4,5,3,3,na); Literature before 2003
- TOC, Total Organic Carbon [emissions to water, ocean]: 1.7288e-6 kg; lognormal SD95 1.5051
  (1,2,1,1,1,3); Barthe et al 2015
- Magnesium [emissions to water, river]: 2.3314e-6 kg; lognormal SD95 5.3402
  (3,4,5,3,3,na); Literature
- Manganese [emissions to water, ocean]: 2.539e-8 kg; lognormal SD95 5.0043
  (1,2,1,1,1,3); Barthe et al 2015
- Aluminium [emissions to water, river]: 4.6701e-9 kg; lognormal SD95 5.3402
  (3,4,5,3,3,na); Literature
- Potassium [emissions to water, ocean]: 1.6249e-6 kg; lognormal SD95 5.3402
  (3,4,5,3,3,na); Literature
- Xylene [emissions to air, unspecified]: 4.0977e-6 kg; lognormal SD95 1.8532
  (3,4,5,3,3,na); Literature
- Pentane [emissions to air, high. pop.]: 5.1222e-5 kg; lognormal SD95 1.8532
  (3,4,5,3,3,na); Literature
- Sulfate [emissions to water, river]: 1.701e-5 kg; lognormal SD95 1.8532
  (3,4,5,3,3,na); Literature
- Chloride [emissions to water, river]: 5.3612e-5 kg; lognormal SD95 3.0194
  (2,4,1,3,1,3); Env. reports DE
- Cobalt [emissions to water, river]: 2.6366e-15 kg; lognormal SD95 3.0038
  (1,2,1,1,1,3); Barthe et al 2015
- Hydrocarbons, unspecified [emissions to water, river]: 2.9839e-7 kg; lognormal SD95 1.5051
  (1,2,1,1,1,3); Barthe et al 2015
- Vanadium [emissions to water, ocean]: 2.085e-9 kg; lognormal SD95 5.0043
  (1,2,1,1,1,3); Barthe et al 2015
- Copper [emissions to water, river]: 7.9898e-10 kg; lognormal SD95 3.0038
  (1,2,1,1,1,3); Barthe et al 2015
- Magnesium [emissions to water, ocean]: 4.056e-6 kg; lognormal SD95 5.3402
  (3,4,5,3,3,na); Literature
- DOC, Dissolved Organic Carbon [emissions to water, ocean]: 4.9664e-9 kg; lognormal SD95 1.8532
  (3,4,5,3,3,na); Average of CH plant
- Benzene [emissions to water, river]: 6.6576e-10 kg; lognormal SD95 3.0038
  (1,2,1,1,1,3); Barthe et al 2015
- Toluene [emissions to water, ocean]: 2.539e-9 kg; lognormal SD95 3.0038
  (1,2,1,1,1,3); Barthe et al 2015
- Calcium [emissions to water, ocean]: 8.1247e-6 kg; lognormal SD95 3.2968
  (3,4,5,3,3,na); Literature
- Iron [emissions to water, ocean]: 9.5211e-8 kg; lognormal SD95 5.0043
  (1,2,1,1,1,3); Barthe et al 2015
- Propane [emissions to air, high. pop.]: 4.0977e-5 kg; lognormal SD95 1.8532
  (3,4,5,3,3,na); Literature
- Copper [emissions to water, ocean]: 1.39e-9 kg; lognormal SD95 3.0038
  (1,2,1,1,1,3); Barthe et al 2015
- Silver [emissions to water, river]: 4.6701e-9 kg; lognormal SD95 5.3402
  (3,4,5,3,3,na); Literature
- Ammonia [emissions to air, high. pop.]: 1.0996e-6 kg; lognormal SD95 1.209
  (1,2,1,1,1,3); Barthe et al 2015
- Hydrocarbons, unspecified [emissions to water, ocean]: 5.1913e-7 kg; lognormal SD95 1.5051
  (1,2,1,1,1,3); Barthe et al 2015
- Chloride [emissions to water, ocean]: 9.327e-5 kg; lognormal SD95 3.0194
  (2,4,1,3,1,3); Env. reports DE
- Xylene [emissions to water, ocean]: 2.539e-9 kg; lognormal SD95 3.0038
  (1,2,1,1,1,3); Barthe et al 2015
- Hydrocarbons, aliphatic, alkanes, unspecified [emissions to air, unspecified]: 3.4216e-11 kg; lognormal SD95 1.8532
  (3,4,5,3,3,na); Average of plant data
- DOC, Dissolved Organic Carbon [emissions to water, river]: 2.8547e-9 kg; lognormal SD95 1.8532
  (3,4,5,3,3,na); Average of CH plant
- Hexane [emissions to air, high. pop.]: 2.0489e-5 kg; lognormal SD95 1.8532
  (3,4,5,3,3,na); Literature
- Xylene [emissions to water, river]: 1.4594e-9 kg; lognormal SD95 3.0038
  (1,2,1,1,1,3); Barthe et al 2015
- Cadmium [emissions to water, river]: 3.9949e-10 kg; lognormal SD95 3.0038
  (1,2,1,1,1,3); Barthe et al 2015
- BOD5, Biological Oxygen Demand [emissions to water, river]: 7.9498e-7 kg; lognormal SD95 1.5051
  (1,2,1,1,1,3); Barthe et al 2015
- Phosphate [emissions to water, river]: 4.7431e-8 kg; lognormal SD95 1.5051
  (1,2,1,1,1,3); Barthe et al 2015
- Sulfate [emissions to water, ocean]: 2.9593e-5 kg; lognormal SD95 1.8532
  (3,4,5,3,3,na); Literature
- Selenium [emissions to water, river]: 9.6321e-14 kg; lognormal SD95 5.0043
  (1,2,1,1,1,3); Barthe et al 2015
- Barium [emissions to water, river]: 9.3402e-9 kg; lognormal SD95 5.3402
  (3,4,5,3,3,na); Literature
- Phenol [emissions to water, ocean]: 2.1984e-8 kg; lognormal SD95 3.0038
  (1,2,1,1,1,3); Barthe et al 2015
- Strontium [emissions to water, river]: 7.1509e-8 kg; lognormal SD95 5.3402
  (3,4,5,3,3,na); Literature
- Lead [emissions to water, river]: 1.9974e-9 kg; lognormal SD95 5.0043
  (1,2,1,1,1,3); Barthe et al 2015
- Calcium [emissions to water, river]: 4.6701e-6 kg; lognormal SD95 3.2968
  (3,4,5,3,3,na); Literature
- Water [emissions to water, unspecified]: 7.30255, 6.26743 kg (2 entries); lognormal SD95 2.5196
  (5,5,5,5,5,BU:1.05); All uncertainty-values set to 5.0 by default. Balance of input water

## Sampling procedure
Reference document of the European Commission, environmental reports, public statistics and literature data.

## Extrapolations
Some data were available only for single plants and have been extrapolated to the European situation.

## Sources
- Jungbluth N., Meili C., Wenzel P., 2018, 2018 - LCI oil refinery processing and products - Jungbluth, Project report, 565, ESU-services Ltd., Schaffhausen, CH
Jungbluth N., Meili C., Wenzel P. (2018) Life cycle inventories of oil refinery processing and products. Project report. Volume: 565. ESU-services Ltd.. Schaffhausen, CH.
Type: Separate publication
Source: Report
First author: Jungbluth N.
Other authors: Meili C., Wenzel P.
Year: 2018
Title of anthology: Project report
Place of publication: Schaffhausen, CH
Publisher: ESU-services Ltd.
Volume No: 565

## Validation
Proof reading validation: 08.11.2018; Other validation: C:\Users;
