# Electricity mix, operation storage pumps, ENTSO, 2020, at plant

Dataset: EcoSpold 1, unit process
Functional unit: 1 kWh
Category: electricity / production mix
Geography: DE
Time period: 2020 to 2020
Synonyms: 0
Generated by: Rolf Frischknecht
accessRestrictedTo: 0
copyright: true

## General comment
Technology shares determined based on data from ENTSO Transparency Platform. Only domestic electricity production is considered, electricity imports are neglected.;

## Included processes
This dataset includes the shares of different technologies of the electricity mix used for the operation of storage pumps in Germany in 2018.

## Geography
Germany

## Technology
Average technology

## Time period
Time of publications

## Reference product
- Electricity mix, operation storage pumps, ENTSO, 2020, at plant [DE]: 1 kWh

## Inputs from technosphere
All rows: lognormal SD95 1.3069
- Electricity, hydropower, at run-of-river power plant [RER]: 0.030276 kWh
  (4,2,1,1,3,3,BU:1.05); Hydro Run-of-river and poundage ; ENTSO Transparency Platform
- Electricity, hydropower, at reservoir power plant, non alpine regions [RER]: 0.0027267 kWh
  (4,2,1,1,3,3,BU:1.05); Hydro Water Reservoir ; ENTSO Transparency Platform
- Electricity, production mix photovoltaic, at plant [DE]: 0.072311 kWh
  (4,2,1,1,3,3,BU:1.05); Solar ; ENTSO Transparency Platform
- Electricity, at 100MW wind farm, onshore, 2.3MW turbines [RER]: 0.055751 kWh
  (4,2,1,1,3,3,BU:1.05); Wind Offshore ; ENTSO Transparency Platform
- Electricity, at 100MW wind farm, onshore, 2.3MW turbines [RER]: 0.21476 kWh
  (4,2,1,1,3,3,BU:1.05); Wind Onshore ; ENTSO Transparency Platform
- Electricity, at 100MW wind farm, onshore, 2.3MW turbines [RER]: 0.0029858 kWh
  (4,2,1,1,3,3,BU:1.05); Other renewable ; ENTSO Transparency Platform
- Electricity, at wind farm [RER]: 0.00041996 kWh
  (4,2,1,1,3,3,BU:1.05); Geothermal ; ENTSO Transparency Platform
- Electricity, at cogen 1MWth, wood chips, allocation exergy [CH]: 0.038268 kWh
  (4,2,1,1,3,3,BU:1.05); Biomass ; ENTSO Transparency Platform
- Electricity, at cogen 300kWth, biomethane, allocation exergy [CH]: 0.046514 kWh
  (4,2,1,1,3,3,BU:1.05); Biomass ; ENTSO Transparency Platform
- Electricity, nuclear, at power plant pressure water reactor [DE]: 0.10116 kWh
  (4,2,1,1,3,3,BU:1.05); Nuclear ; ENTSO Transparency Platform
- Electricity, nuclear, at power plant boiling water reactor [DE]: 0.027398 kWh
  (4,2,1,1,3,3,BU:1.05); Nuclear ; ENTSO Transparency Platform
- Electricity, natural gas, at power plant [DE]: 0.12701 kWh
  (4,2,1,1,3,3,BU:1.05); Fossil Gas ; ENTSO Transparency Platform
- Electricity, lignite, at power plant [DE]: 0.17918 kWh
  (4,2,1,1,3,3,BU:1.05); Fossil Brown coal; ENTSO Transparency Platform
- Electricity, hard coal, at power plant [DE]: 0.075605 kWh
  (4,2,1,1,3,3,BU:1.05); Fossil Hard coal ; ENTSO Transparency Platform
- Electricity, oil, at power plant [DE]: 0.0074783 kWh
  (4,2,1,1,3,3,BU:1.05); Fossil Oil ; ENTSO Transparency Platform
- Electricity, at cogen 300kWth, diesel, allocation exergy [CH]: 0.00065361 kWh
  (4,2,1,1,3,3,BU:1.05); Fossil Oil ; ENTSO Transparency Platform
- Electricity, industrial gas, at power plant [DE]: 0.0055837 kWh
  (4,2,1,1,3,3,BU:1.05); Other ; ENTSO Transparency Platform
- Electricity from waste, at municipal waste incineration plant [CH]: 0.011919 kWh
  (4,2,1,1,3,3,BU:1.05); Waste ; ENTSO Transparency Platform

## Sampling procedure
Statistics

## Extrapolations
Some generic datasets from ecoinvent have been used.

## Sources
- Krebs L., Frischknecht R., 2021, 2021 - Energy label for passenger cars - Stolz, Project report, 754, treeze Ltd., Bern, CH

## Validation
09.05.2022
G:\Projekte laufend\754 Aktualisierung Energieetikette 2022 BFE\EcoSpold\Strommix Schweiz 2020\[754-Electricity-Mixes-Attributional-CH-v0.4.xlsx]X-Process
