# Electricity, nuclear, at power plant pressure water reactor

Dataset: EcoSpold 1, unit process
Functional unit: 1 kWh
Category: electricity by fuel / waste\nuclear\pwr
Geography: UCTE
Time period: 2000-01 to 2000-12
Generated by: Roberto Dones
accessRestrictedTo: 0
copyright: true

## General comment
The average burnup 45 MWd/kg heavy metal around year 2000 has been assumed representative for the lifetime of the modeled plant. The average burnup corresponds to an average enrichment of 3.9% U235 for fresh uranium fuel elements. Over the lifetime of the plant it can be assumed that approximately 8% of the energy will be produced by MOX fuel elements. Of total fuel elements 92% are assumed to be from fresh U (thus burdened by the full upstream chain), and 13% MOX (burdened by reprocessing). The utilisation factor for the infrastructure is the inverse of the total net electricity delivered in 40 years lifetime;

## Included processes
The module includes fuel elements, chemicals, and diesel requirements as well as the relevant transport requirements. Water use (fresh and decarbonized) for cooling is included. Considered radioactive waste streams are: spent fuel to reprocessing and conditioning; operational low active waste for conditioning in the intermediate repository; and, contaminated waste from dismantling. Non-radioactive wastes are accounted for.

## Geography
Swiss data of one specific plant for requirements and all UCTE (BE, CH, DE, ES, FR, NL) PWRs for emissions.

## Technology
Standard technology for commercial operation.

## Reference product
- Electricity, nuclear, at power plant pressure water reactor [UCTE]: 1 kWh
  Union for the Co-ordination of Transmission of Electricity

## Inputs from technosphere
- Diesel, burned in diesel-electric generating set [GLO]: 0.00044 MJ; lognormal SD95 1.3
  own estimation
- Radioactive waste, in final repository for nuclear waste LLW [CH]: 3.13e-8 m3; lognormal SD95 1.4
  own estimation
- Chemicals organic, at plant [GLO]: 1.64e-6 kg; lognormal SD95 1.2
  own estimation
- Argon, liquid, at plant [RER]: 3.1e-5 kg; lognormal SD95 1.3
  own estimation
- Oxygen, liquid, at plant [RER]: 1.99e-5 kg; lognormal SD95 1.3
  own estimation
- Cationic resin, at plant [CH]: 7.65e-8 kg; lognormal SD95 1.15
  own estimation
- Anionic resin, at plant [CH]: 7.65e-8 kg; lognormal SD95 1.15
  own estimation
- Radioactive waste, in interim storage conditioning [CH]: 4.32e-11 m3; lognormal SD95 1.2
  own estimation
- Nuclear spent fuel, in conditioning, at plant [CH]: 5.34e-7 kg; lognormal SD95 1.3
  own estimation
- Paper, woodfree, coated, at integrated mill [RER]: 7.65e-7 kg; lognormal SD95 1.3
  own estimation
- Disposal, hazardous waste, 25% water, to hazardous waste incineration [CH]: 1.15e-6 kg; lognormal SD95 1.3
  own estimation
- Cast iron, at plant [RER]: 1.53e-7 kg; lognormal SD95 1.2
  extrapolation from another plant type
- Flat glass, coated, at plant [RER]: 5.2e-6 kg; lognormal SD95 1.3
  own estimation
- Bitumen, at refinery [CH]: 9.18e-7 kg; lognormal SD95 1.3
  own estimation
- Sodium hypochlorite, 15% in H2O, at plant [RER]: 2.05e-5 kg; lognormal SD95 1.3
  own estimation
- Radioactive waste, in interim storage, for final repository LLW [CH]: 1.76e-9 m3; lognormal SD95 1.2
  own estimation
- Transport, freight, lorry, 16t-32t gross weight, fleet average [CH]: 6.18e-5 tkm; lognormal SD95 2.1
  standard
- Lubricating oil, at plant [RER]: 1.93e-6 kg; lognormal SD95 1.3
  own estimation
- Nuclear spent fuel, in reprocessing, at plant [RER]: 2.28e-6 kg; lognormal SD95 1.2
  own estimation 50% spent fuel reprocessed, 50% non reprocessed
- Water, decarbonised, at plant [RER]: 2.68 kg; lognormal SD95 1.2
  own estimation
- Disposal, separator sludge, 90% water, to hazardous waste incineration [CH]: 2.6e-6 kg; lognormal SD95 1.3
  own estimation
- Reinforcing steel, at plant [RER]: 5.2e-7 kg; lognormal SD95 1.3
  own assumption
- Disposal, used mineral oil, 10% water, to hazardous waste incineration [CH]: 1.93e-6 kg; lognormal SD95 1.3
  own estimation
- Steel, low-alloyed, at plant [RER]: 1.8e-6 kg; lognormal SD95 1.6
  own assumption
- Nitrogen, liquid, at plant [RER]: 7.34e-5 kg; lognormal SD95 1.3
  own estimation
- Boric acid, anhydrous, powder, at plant [RER]: 7.09e-8 kg; lognormal SD95 1.15
  own estimation on data from utility
- Chemicals inorganic, at plant [GLO]: 2.58e-6 kg; lognormal SD95 1.25
  own estimation
- Concrete, normal, at plant [CH]: 1.16e-8 m3; lognormal SD95 1.3
  own estimation
- Hydrogen, liquid, at plant [RER]: 1.22e-5 kg; lognormal SD95 1.3
  own estimation
- Cement, unspecified, at plant [CH]: 1.09e-6 kg; lognormal SD95 1.3
  own estimation
- Acetylene, at regional storehouse [CH]: 4.28e-8 kg; lognormal SD95 1.25
  own estimation
- Fuel elements PWR, UO2 3.9% & MOX, at nuclear fuel fabrication plant [UCTE]: 2.81e-6 kg; lognormal SD95 1.15
  estimated variation over lifetime
- Carbon dioxide liquid, at plant [RER]: 1.99e-7 kg; lognormal SD95 1.3
  own estimation
- Nuclear power plant, pressure water reactor 1000MW [UCTE]: 3.55e-12 p; lognormal SD95 1.05
  estimation of total net electricity over a lifetime

## Inputs from nature
- Water, salt, ocean [resources, in water]: 0.00144 m3; lognormal SD95 1.3
  own estimation of share
- Water, river [resources, in water]: 0.00431 m3; lognormal SD95 1.3
  own estimation of share

## Emissions to nature
- Strontium-90 [emissions to water, river]: 2.21e-6 kBq; lognormal SD95 1.5
  uncertainty declared in reports for radioactive releases
- Heat, waste [emissions to air, low. pop.]: 7.31 MJ; lognormal SD95 1.03
  uncertainty on efficiency
- Iodine-131 [emissions to water, river]: 2.54e-6 kBq; lognormal SD95 1.5
  uncertainty declared in reports for radioactive releases
- Cobalt-60 [emissions to water, river]: 8.05e-5 kBq; lognormal SD95 1.5
  uncertainty declared in reports for radioactive releases
- Strontium-89 [emissions to water, river]: 2.54e-6 kBq; lognormal SD95 1.5
  uncertainty declared in reports for radioactive releases
- Antimony-124 [emissions to water, river]: 1.33e-5 kBq; lognormal SD95 1.5
  uncertainty declared in reports for radioactive releases
- Hydrogen-3, Tritium [emissions to water, river]: 1.94 kBq; lognormal SD95 1.5
  uncertainty declared in reports for radioactive releases
- Chromium-51 [emissions to water, river]: 1.49e-5 kBq; lognormal SD95 1.5
  uncertainty declared in reports for radioactive releases
- Noble gases, radioactive, unspecified [emissions to air, low. pop.]: 0.7 kBq; lognormal SD95 1.5
  uncertainty declared in reports for radioactive releases
- Antimony-125 [emissions to water, river]: 1.91e-5 kBq; lognormal SD95 1.5
  uncertainty declared in reports for radioactive releases
- Aerosols, radioactive, unspecified [emissions to air, low. pop.]: 9.78e-6 kBq; lognormal SD95 1.5
  uncertainty declared in reports for radioactive releases
- Manganese-54 [emissions to water, river]: 7.21e-6 kBq; lognormal SD95 1.5
  uncertainty declared in reports for radioactive releases
- Cesium-134 [emissions to water, river]: 2.01e-5 kBq; lognormal SD95 1.5
  uncertainty declared in reports for radioactive releases
- Niobium-95 [emissions to water, river]: 3.26e-6 kBq; lognormal SD95 1.5
  uncertainty declared in reports for radioactive releases
- Radioactive species, Nuclides, unspecified [emissions to water, river]: 1.17e-5 kBq; lognormal SD95 1.5
  uncertainty declared in reports for radioactive releases
- Cobalt-58 [emissions to water, river]: 9.53e-5 kBq; lognormal SD95 1.5
  uncertainty declared in reports for radioactive releases
- Hydrogen-3, Tritium [emissions to air, low. pop.]: 0.14 kBq; lognormal SD95 1.5
  uncertainty declared in reports for radioactive releases
- Silver-110 [emissions to water, river]: 5.91e-5 kBq; lognormal SD95 1.5
  uncertainty declared in reports for radioactive releases
- Cesium-137 [emissions to water, river]: 4.3e-5 kBq; lognormal SD95 1.5
  uncertainty declared in reports for radioactive releases
- Tellurium-123m [emissions to water, river]: 2.1e-6 kBq; lognormal SD95 1.5
  uncertainty declared in reports for radioactive releases
- Water [emissions to water, unspecified]: 4.0945 kg; lognormal SD95 2.5196
  (5,5,5,5,5,BU:1.05); All uncertainty-values set to 5.0 by default. Balance of input water

## Sampling procedure
Literature and statistics of radioactive emissions.

## Sources
- Dones R., Bauer C., Doka G., 2009, 2009 - Nuclear energy - Dones, Sachbilanzen von Energiesystemen. Final report No. 6 ecoinvent v2.1, 6, Swiss Centre for LCI, PSI, Doka LCA, Duebendorf and Villigen, CH
Dones, R., Doka G. (2009) Kernenergie. Sachbilanzen von Energiesystemen. Final report No. 6 ecoinvent v2.1. Editors: Bauer C.. Volume: 6. Swiss Centre for LCI, PSI. Dübendorf and Villigen, CH.
Type: Measurement on site
Source: CD-ROM
First author: Dones, R.
Other authors: Doka G.
Year: 2009
Name of editors: Bauer C.
Title of anthology: Sachbilanzen von Energiesystemen. Final report No. 6 ecoinvent v2.1
Place of publication: Dübendorf and Villigen, CH
Publisher: Swiss Centre for LCI, PSI
Volume No: 6

## Validation
Proof reading validation: Corrected for v1.1; Other validation: none;
