# Door leaf, outer, wood, at plant

Dataset: EcoSpold 1, unit process
Functional unit: 1 m2
Category: building components / doors
Geography: CH
Time period: 2018-01 to 2019-12
Generated by: Livia Ramseier
accessRestrictedTo: 0
copyright: true

## General comment
The measures of the visible door leaf are 1m x 2m. 1m2 of visible wooden door leaf weighs 31.5kg. The bill of materials is based on data from door manufactures.;

## Included processes
Included are the materials used in an outer wooden door leaf (without surface treatment). Production losses, work materials, packaging materials, energy demand and the transport of the materials are also included.

## Geography
Data apply to the supply in Switzerland.

## Technology
Industry data.

## Time period
Time of publications.

## Reference product
- Door leaf, outer, wood, at plant [CH]: 1 m2
  SWITZERLAND

## Inputs from technosphere
- Chemicals organic, at plant [GLO]: 0.0020859 kg; lognormal SD95 1.1635
  (3,3,1,1,1,4,BU:1.05); cleaning agent; Average of data from manufacturers
- Disposal, building, polyurethane foam, to final disposal [CH]: 0.02555 kg; lognormal SD95 1.1635
  (3,3,1,1,1,4,BU:1.05); disposal production waste polyurethande foam; Average of data from manufacturers
- Transport, municipal waste collection, lorry 21t [CH]: 0.0003751 tkm; lognormal SD95 1.1635
  (3,3,1,1,1,4,BU:1.05); Transport of waste to municipal incineration; Average of data from manufacturers or Frischknecht et al. 2007
- Lubricating oil, at plant [RER]: 0.00451 kg; lognormal SD95 1.1635
  (3,3,1,1,1,4,BU:1.05); lubricating oil; Average of data from manufacturers
- Glued laminated timber, average glue mix, at plant [RER]: 0.00034415 m3; lognormal SD95 1.1635
  (3,3,1,1,1,4,BU:1.05); laminated veneer timber RER; Average of data from manufacturers
- Disposal, polyurethane, 0.2% water, to municipal incineration [CH]: 0.030592 kg; lognormal SD95 1.1635
  (3,3,1,1,1,4,BU:1.05); disposal production waste withe glue; Average of data from manufacturers
- Medium density fibreboard, uncoated, at plant [RER]: 0.0021819, 0.003846 m3 (2 entries); lognormal SD95 1.1635
  (3,3,1,1,1,4,BU:1.05); fibreboard; Average of data from manufacturers
- Packaging film, LDPE, at plant [RER]: 0.03751 kg; lognormal SD95 1.1635
  (3,3,1,1,1,4,BU:1.05); packaging plastics; Average of data from manufacturers
- Steel product manufacturing, average metal working [RER]: 0.016667 kg; lognormal SD95 1.1635
  (3,3,1,1,1,4,BU:1.05); processing of steel screws; Average of data from manufacturers
- Chemicals organic, at plant [GLO]: 0.00026667 kg; lognormal SD95 1.1635
  (3,3,1,1,1,4,BU:1.05); chemicals; Average of data from manufacturers
- Disposal, plastics, mixture, 15.3% water, to municipal incineration [CH]: 0.03751 kg; lognormal SD95 1.1635
  (3,3,1,1,1,4,BU:1.05); disposal packaging plastics; Average of data from manufacturers
- Wood chips, from industry, softwood, burned in furnace 300kW [CH]: 64.666 MJ; lognormal SD95 1.1635
  (3,3,1,1,1,4,BU:1.05); production waste from laths; Average of data from manufacturers
- Transport, freight, lorry, fleet average [CH]: 14.403 tkm; lognormal SD95 2.0296
  (3,3,1,1,1,4,BU:2); Transportation to production site; Average of data from manufacturers or Frischknecht et al. 2007
- Vinyl acetate, at plant [RER]: 0.44809 kg; lognormal SD95 1.1635
  (3,3,1,1,1,4,BU:1.05); white glue; Average of data from manufacturers
- Disposal, glued laminated timbre, 2.5% binder, as building waste [CH]: 0.047536 kg; lognormal SD95 1.1635
  (3,3,1,1,1,4,BU:1.05); disposal production waste laminated veneer timber; Average of data from manufacturers
- Disposal, medium density fibre board 15% binder, as building waste [CH]: 0.35127 kg; lognormal SD95 1.1635
  (3,3,1,1,1,4,BU:1.05); disposal production waste fibreboard medium density; Average of data from manufacturers
- Chromium steel sheet 18/8, recycling share 2000 (37% Rec.) [CH]: 0.31833 kg; lognormal SD95 1.1635
  (3,3,1,1,1,4,BU:1.05); Chromium steel for fittings; Average of data from manufacturers
- Sawnwood, lath, softwood, dried (u=10%), planed, at sawmill [RER]: 0.0024337 m3; lognormal SD95 1.1635
  (3,3,1,1,1,4,BU:1.05); lath RER; Average of data from manufacturers
- Electricity, medium voltage, at grid [CH]: 10.149 kWh; lognormal SD95 1.1635
  (3,3,1,1,1,4,BU:1.05); electricty for production; Average of data from manufacturers
- Steel sheet, zinc-coated, recycling share 2000 (37% Rec.) [CH]: 0.9 kg; lognormal SD95 1.1635
  (3,3,1,1,1,4,BU:1.05); steel for fittings; Average of data from manufacturers
- Tap water, at user [CH]: 0.01612 kg; lognormal SD95 1.1635
  (3,3,1,1,1,4,BU:1.05); water; Average of data from manufacturers
- Silicone product, at plant [RER]: 0.13888 kg; lognormal SD95 1.1635
  (3,3,1,1,1,4,BU:1.05); silicon; Average of data from manufacturers
- Disposal, rubber, unspecified, 0% water, to municipal incineration [CH]: 0.001375 kg; lognormal SD95 1.1635
  (3,3,1,1,1,4,BU:1.05); disposal production waste silicon; Average of data from manufacturers
- Particleboard, average glue mix, uncoated, at plant [RER]: 0.011962 m3; lognormal SD95 1.1635
  (3,3,1,1,1,4,BU:1.05); particle board; Average of data from manufacturers
- Fibreboard, hard, at plant [RER]: 0.012551 m3; lognormal SD95 1.1635
  (3,3,1,1,1,4,BU:1.05); fibreboard, hard; Average of data from manufacturers
- Disposal, wood particle board, 10% binder, as building waste [CH]: 0.72492 kg; lognormal SD95 1.1635
  (3,3,1,1,1,4,BU:1.05); disposal production waste particle board; Average of data from manufacturers
- Kraft paper, bleached, at plant [RER]: 0.0025 kg; lognormal SD95 1.1635
  (3,3,1,1,1,4,BU:1.05); packaging paper; Average of data from manufacturers
- Steel, low-alloyed, at plant [RER]: 0.016667 kg; lognormal SD95 1.1635
  (3,3,1,1,1,4,BU:1.05); steel screws for fittings; Average of data from manufacturers
- Glued laminated timber, average glue mix, at plant [CH]: 0.001035 m3; lognormal SD95 1.1635
  (3,3,1,1,1,4,BU:1.05); laminated veneer timber CH; Average of data from manufacturers
- Disposal, wood fibre board, 1.25% binder, as building waste [CH]: 1.0702 kg; lognormal SD95 1.1635
  (3,3,1,1,1,4,BU:1.05); disposal production waste fibreboard hard; Average of data from manufacturers
- Packaging, corrugated board, mixed fibre, single wall, at plant [CH]: 0.013063 kg; lognormal SD95 1.1635
  (3,3,1,1,1,4,BU:1.05); packaging cardboard; Average of data from manufacturers
- Transport, freight, rail, electricity with shunting [CH]: 1.8051 tkm; lognormal SD95 2.0296
  (3,3,1,1,1,4,BU:2); Transportation to production site ; Average of data from manufacturers or Frischknecht et al. 2007
- EUR-flat pallet [RER]: 0.0010358 p; lognormal SD95 1.1635
  (3,3,1,1,1,4,BU:1.05); packaging pallet; Average of data from manufacturers
- Sawnwood, lath, softwood, dried (u=10%), planed, at sawmill [CH]: 0.0072829 m3; lognormal SD95 1.1635
  (3,3,1,1,1,4,BU:1.05); lath CH; Average of data from manufacturers
- Aluminium sheet, uncoated [CH]: 2.6302 kg; lognormal SD95 1.1635
  (3,3,1,1,1,4,BU:1.05); aluminium sheet; Average of data from manufacturers
- Polyurethane, rigid foam, market mix, at regional storage [CH]: 0.38055 kg; lognormal SD95 1.1635
  (3,3,1,1,1,4,BU:1.05); polyurethane foam; Average of data from manufacturers

## Sampling procedure
Data survey at 4 door manufactures in Switzerland.

## Extrapolations
Some generic datasets from ecoinvent have been used.

## Sources
- Ramseier L., Stolz P., Frischknecht R., 2020, 2020 - LCA wooden windows and doors - Ramseier, Project report, 634, treeze Ltd., Uster, CH
Ramseier L., Stolz P., Frischknecht R. (2020) Ökobilanz von Holzfenstern und Holztüren. Project report. Volume: 634. treeze Ltd.. Uster, CH.
Type: Separate publication
Source: Report
First author: Ramseier L.
Other authors: Stolz P., Frischknecht R.
Year: 2020
Title of anthology: Project report
Place of publication: Uster, CH
Publisher: treeze Ltd.
Volume No: 634

## Validation
Proof reading validation: 16.06.2021; Other validation: G:\Projekte laufend\634 Holzfenster u.-türen, energieSchweiz\EcoSpold\UVEK2021\[634_EcoSpold_Türen_v1.5_UVEK2021_v0.1.xlsx]X-Process;
