# Electricity mix

Dataset: EcoSpold 1, unit process
Functional unit: 1 kWh
Category: electricity / supply mix
Geography: GLO
Time period: 2023 to 2023
Synonyms: 0
Share of production covered: 100 %
Generated by: Christopher Oberschelp
accessRestrictedTo: 0
copyright: true

## General comment
Electricity domestic net production and import shares are based on annual averages for the years 2021-2023. Only gross to net electicity conversion losses are included as the power plants could not be operated without these, whereas other losses (such as transmission and distribution losses) are not included. Electricity trade between countries is included.

## Included processes
Included are the shares of corresponding electricity production by technology and country at the busbar. Not included are transformation, transport or distribution losses.

## Geography
Data apply to utilities and auto-producers.

## Technology
No technology description is provided because the dataset just describes the power plant portfolio of the respective country using current average technology per energy carrier.

## Time period
Time period of statistics used.

## Reference product
- Electricity mix [GLO]: 1 kWh

## Inputs from technosphere
All rows: lognormal SD95 1.07442
- Electricity mix [RAF]: 0.0229248 kWh
  (1,3,1,3,1,1,BU:1.05), EIA energy statistics and others, own calculations
- Electricity mix [RAS]: 0.551369 kWh
  (1,3,1,3,1,1,BU:1.05), EIA energy statistics and others, own calculations
- Electricity mix [RER]: 0.160388 kWh
  (1,3,1,3,1,1,BU:1.05), EIA energy statistics and others, own calculations
- Electricity mix [RLA]: 0.0509081 kWh
  (1,3,1,3,1,1,BU:1.05), EIA energy statistics and others, own calculations
- Electricity mix [RME]: 0.0370787 kWh
  (1,3,1,3,1,1,BU:1.05), EIA energy statistics and others, own calculations
- Electricity mix [RNA]: 0.177331 kWh
  (1,3,1,3,1,1,BU:1.05), EIA energy statistics and others, own calculations

## Sampling procedure
Statistical data

## Sources
- Oberschelp C., 2025, 2025 - Electricity mixes in UVEK database - Oberschelp, Project reports, 0, Oberschelp Consulting, Zuerich, CH

## Validation
manual review of spold files and documentation
none
