# Operation, passenger car, rape seed methyl ester 5%

Dataset: EcoSpold 1, unit process
Functional unit: 1 km
Category: transport systems / road\operations
Geography: CH
Time period: 2005-01 to 2005-12
Share of production covered: 0 %
Generated by: Natascha Kljun
accessRestrictedTo: 0
copyright: true

## General comment
na;
Synonyms: RME;

## Included processes
rape methyl ester, at regional storage, diesel, low-sulphur, at regional storage supplies are included. Direct airborne emissions of gaseous substances, particulate matters and heavy metals are accounted for. Heavy metal emissions to water and to soil are included. Tyre abrasion is included.; Geography: Data refers to average transport conditions and kilometric performance of different passenger car categories in Switzerland.

## Technology
Euro3

## Reference product
- Operation, passenger car, rape seed methyl ester 5% [CH]: 1 km
  SWITZERLAND

## Inputs from technosphere
- Rape methyl ester, at regional storage [CH]: 0.0029213 kg; lognormal SD95 1.5688
  (,,,,,); Same as for carbon dioxide. However, value might be much higher since fuel consumption calculated following ecoinvent convention differs from lab values.
- Diesel, at regional storage [CH]: 0.052534 kg; lognormal SD95 1.5688
  (same comment as for Rape methyl ester, at regional storage)

## Emissions to nature
- Nickel [emissions to water, unspecified]: 2.31e-8 kg; lognormal SD95 6
  14_transports, table 4.34
- Lead [emissions to soil, unspecified]: 1.44e-8 kg; lognormal SD95 6
  14_transports, table 4.34
- Nitrogen oxides [emissions to air, unspecified]: 0.00050545 kg; lognormal SD95 1.5688
  (,,,,,); NewEuropeanDrivingCycle, Lance & Anderson 2003, Keller et al BUWAL, in process, and environmental agency
- Carbon monoxide, biogenic [emissions to air, unspecified]: 2.86e-5 kg; lognormal SD95 1.5688
  (same comment as for Nitrogen oxides)
- Cadmium [emissions to water, unspecified]: 2.89e-9 kg; lognormal SD95 6
  14_transports, table 4.34
- Carbon dioxide, biogenic [emissions to air, unspecified]: 0.0077976 kg; lognormal SD95 1.5688
  (same comment as for Nitrogen oxides)
- Particulates, > 2.5 um, and < 10um [emissions to air, unspecified]: 1.5716e-5 kg; lognormal SD95 2.0551
  (2,3,1,3,1,5); NewEuropeanDrivingCycle, Lance & Anderson 2003, Keller et al BUWAL, in process, and environmental agency; 14_transports, non-exhaust table 4.23
- Particulates, < 2.5 um [emissions to air, unspecified]: 3.4834e-5 kg; lognormal SD95 3.0525
  (same comment as for Particulates, > 2.5 um, and < 10um)
- Chromium [emissions to air, unspecified]: 8.4315e-9 kg; lognormal SD95 5.1038
  (4,5,1,2,1,1); 14_transports, table 4.33 and own calculations
- Lead [emissions to air, unspecified]: 3.6541e-9 kg; lognormal SD95 5.0147
  (3,2,1,1,1,1); 14_transports, table 4.33 and own calculations
- Zinc [emissions to water, unspecified]: 2.32e-6 kg; lognormal SD95 6
  14_transports, table 4.34
- Toluene [emissions to air, unspecified]: 4.1485e-7 kg; lognormal SD95 1.5688
  (2,3,1,3,1,5); NewEuropeanDrivingCycle, Lance & Anderson 2003, Keller et al BUWAL, in process, and environmental agency
- Methane, fossil [emissions to air, unspecified]: 3.3695e-6 kg; lognormal SD95 1.5688
  (same comment as for Nitrogen oxides)
- Nickel [emissions to air, unspecified]: 8.4501e-9 kg; lognormal SD95 5.1038
  (4,5,1,2,1,1); 14_transports, table 4.33 and own calculations
- Chromium [emissions to soil, unspecified]: 2.6e-8 kg; lognormal SD95 6
  14_transports, table 4.34
- Cadmium [emissions to soil, unspecified]: 2.89e-9 kg; lognormal SD95 6
  14_transports, table 4.34
- Lead [emissions to water, unspecified]: 1.44e-8 kg; lognormal SD95 6
  14_transports, table 4.34
- Ammonia [emissions to air, unspecified]: 1e-6 kg; lognormal SD95 1.3069
  (same comment as for Toluene)
- Nickel [emissions to soil, unspecified]: 2.31e-8 kg; lognormal SD95 6
  14_transports, table 4.34
- Heat, waste [emissions to air, unspecified]: 2.4888 MJ; lognormal SD95 1.11
  14_transports, table 4.63
- Xylene [emissions to air, unspecified]: 1.0371e-6 kg; lognormal SD95 1.5688
  (same comment as for Toluene)
- Benzene [emissions to air, unspecified]: 1.7998e-6 kg; lognormal SD95 1.5688
  (same comment as for Toluene)
- Zinc [emissions to air, unspecified]: 6.2243e-7 kg; lognormal SD95 5.1038
  (4,5,1,2,1,1); 14_transports, table 4.33 and own calculations
- Sulfur dioxide [emissions to air, unspecified]: 5.2534e-6 kg; lognormal SD95 1.2238
  (same comment as for Toluene)
- Zinc [emissions to soil, unspecified]: 2.32e-6 kg; lognormal SD95 6
  14_transports, table 4.34
- Cadmium [emissions to air, unspecified]: 1.1033e-9 kg; lognormal SD95 5.1038
  (4,5,1,2,1,1); 14_transports, table 4.33 and own calculations
- Dinitrogen monoxide [emissions to air, unspecified]: 5.58e-6 kg; lognormal SD95 1.5688
  (same comment as for Toluene)
- Carbon monoxide, fossil [emissions to air, unspecified]: 0.00060918 kg; lognormal SD95 1.5688
  (same comment as for Nitrogen oxides)
- Carbon dioxide, fossil [emissions to air, unspecified]: 0.16609 kg; lognormal SD95 1.5688
  (same comment as for Nitrogen oxides)
- NMVOC, non-methane volatile organic compounds, unspecified origin [emissions to air, unspecified]: 0.00012926 kg; lognormal SD95 1.5688
  (same comment as for Toluene)
- PAH, polycyclic aromatic hydrocarbons [emissions to air, unspecified]: 2.0221e-9 kg; lognormal SD95 3.0525
  (same comment as for Toluene)
- Methane, biogenic [emissions to air, unspecified]: 1.5819e-7 kg; lognormal SD95 1.5688
  (same comment as for Nitrogen oxides)
- Particulates, > 10 um [emissions to air, unspecified]: 7.9188e-5 kg; lognormal SD95 1.5688
  (same comment as for Particulates, > 2.5 um, and < 10um)
- Copper [emissions to soil, unspecified]: 4.33e-8 kg; lognormal SD95 6
  14_transports, table 4.34
- Copper [emissions to water, unspecified]: 4.33e-8 kg; lognormal SD95 6
  14_transports, table 4.34
- Mercury [emissions to air, unspecified]: 7.4861e-13 kg; lognormal SD95 5.1038
  (4,5,1,2,1,1); 14_transports, values in table 4.62 and 4.27
- Chromium VI [emissions to air, unspecified]: 3.7431e-12 kg; lognormal SD95 5.1038
  (4,5,1,2,1,1); 14_transports, table 4.63
- Noise, road, passenger car, average [non material emissions, unspecified]: 1 km
- Chromium [emissions to water, unspecified]: 2.6e-8 kg; lognormal SD95 6
  14_transports, table 4.34
- Selenium [emissions to air, unspecified]: 3.7431e-10 kg; lognormal SD95 5.1038
  (4,5,1,2,1,1); 14_transports, 95% of value in table 4.62
- Copper [emissions to air, unspecified]: 7.4532e-8 kg; lognormal SD95 5.1038
  (4,5,1,2,1,1); 14_transports, table 4.33 and own calculations

## Sampling procedure
National statistics, data from technical institutions and literature data.

## Sources
- Jungbluth N., Chudacoff M., Dauriat A., Dinkel F., Doka G., Faist Emmenegger M., Gnansounou E., Kljun N., Spielmann M., Stettler C., Sutter J., 2007, 2007 - LCI bioenergy - Jungbluth, Final report ecoinvent data v2.0, 17, Swiss Centre for LCI, ESU-services Ltd., Duebendorf and Uster, CH
Jungbluth N., Chudacoff M., Dauriat A., Dinkel F., Doka G., Faist Emmenegger M., Gnansounou E., Kljun N., Spielmann M., Stettler C., Sutter J. (2007) Life Cycle Inventories of Bioenergy. Final report ecoinvent data v2.0. Volume: 17. Swiss Centre for LCI, ESU. Duebendorf and Uster, CH.
Type: Measurement on site
Source: CD-ROM
First author: Jungbluth N.
Other authors: Chudacoff M., Dauriat A., Dinkel F., Doka G., Faist Emmenegger M., Gnansounou E., Kljun N., Spielmann M., Stettler C., Sutter J.
Year: 2007
Title of anthology: Final report ecoinvent data v2.0
Place of publication: Duebendorf and Uster, CH
Publisher: Swiss Centre for LCI, ESU
Volume No: 17

## Validation
Proof reading validation: Passed.; Other validation: none;
