# Paper mill, non-integrated

Dataset: EcoSpold 1, unit process, infrastructure
Functional unit: 1 p
Category: paper+ board / graphic paper\infrastructure
Geography: RER
Time period: 2000-01 to 2000-12
Generated by: Roland Hischier
accessRestrictedTo: 0
copyright: true

## General comment
The dataset represents a non-integrated paper mill with a annual production of 368 kt and a total life time of 50 years.;

## Included processes
This module includes the land-use, buildings (hall and multi-story) and streets within the mill area, machineries for pulp preparation and for paper and energy production as well as the dismanteling/disposal of the whole infrastructure (without the paper machine)

## Geography
Average land-use from European paper mills, valable for whole Europe

## Technology
Typical European paper mill

## Reference product
- Paper mill, non-integrated [RER]: 1 p
  Europe

## Inputs from technosphere
- Building, hall, steel construction [CH]: 96600 m2; lognormal SD95 3.6
  (5,5,1,3,4,5); Estimated, based on information for integrated mill
- Disposal, facilities, chemical production [RER]: 625000 kg; lognormal SD95 3.6
  (5,5,1,3,4,5); Estimated, based on information for integrated mill
- Facilities, chemical production [RER]: 625000 kg; lognormal SD95 3.6
  (5,5,1,3,4,5); Estimated, based on information for integrated mill
- Roads, company, internal [CH]: 604000 m2a; lognormal SD95 3.6
  (5,5,1,3,4,5); Estimated, based on information for integrated mill
- Industrial furnace 1MW, oil [CH]: 2.5 p; lognormal SD95 3.6
  (5,5,1,3,4,5); Estimated, based on information for integrated mill
- Paper machine, at paper mill [RER]: 2 p; lognormal SD95 3.4
  (5,5,1,3,3,5); Estimated, based on information for integrated mill
- Wastewater treatment plant, class 5 [CH]: 1.67 p; lognormal SD95 3.6
  (5,5,1,3,4,5); Estimated, based on information for integrated mill
- Building, multi-storey [RER]: 121000 m3; lognormal SD95 3.6
  (5,5,1,3,4,5); Estimated, based on information for integrated mill

## Inputs from nature
- Occupation, industrial area, vegetation [resources, land]: 4.36e6 m2a; lognormal SD95 1.9
  (5,5,1,3,3,5); Estimated, based on information for integrated mill
- Transformation, to industrial area, built up [resources, land]: 121000 m2; lognormal SD95 2.4
  (5,5,1,3,3,5); Estimated, based on information for integrated mill
- Transformation, to industrial area, vegetation [resources, land]: 87200 m2; lognormal SD95 2.4
  (5,5,1,3,3,5); Estimated, based on information for integrated mill
- Transformation, from unknown [resources, land]: 208000 m2; lognormal SD95 2.4
  (5,5,1,3,3,5); Estimated, based on information for integrated mill
- Occupation, industrial area, built up [resources, land]: 6.04e6 m2a; lognormal SD95 1.9
  (5,5,1,3,3,5); Estimated, based on information for integrated mill
- Occupation, construction site [resources, land]: 242000 m2a; lognormal SD95 2.1
  (5,5,1,3,4,5); Estimated, based on information for integrated mill

## Sampling procedure
literature and estimations from similar processes

## Extrapolations
All information is estimated, based on dataset for an integrated paper mill.

## Sources
- Hischier R., 2007, 2007 - LCI packagings and graphical papers - Hischier, Final report ecoinvent data v2.0, 11, Swiss Centre for LCI, Empa - TSL, Duebendorf and St. Gallen, CH
Hischier R. (2007) Life Cycle Inventories of Packaging and Graphical Paper. Final report ecoinvent data v2.0. Volume: 11. Swiss Centre for LCI, Empa - TSL. Dübendorf, CH.
Type: Measurement on site
Source: CD-ROM
First author: Hischier R.
Year: 2007
Title of anthology: Final report ecoinvent data v2.0
Place of publication: Dübendorf, CH
Publisher: Swiss Centre for LCI, Empa - TSL
Volume No: 11

## Validation
Proof reading validation: passed; Other validation: none;
