# Ventilation unit 6700 m3/h, w. circuit connected heat exchanger, at plant

Dataset: EcoSpold 1, unit process
Functional unit: 1 p
Category: ventilation / production of components
Geography: CH
Time period: 2014-01 to 2014-12
Generated by: Alex Primas
accessRestrictedTo: 0
copyright: true

## General comment
Production of a ventilation unit (air handling unit) with 6700 m3/h nominal air flow rate (at 2 m/s air speed in cross section of air filter or heat exchanger), component weight: 1563 kg, total weight: 1834 kg/Unit, including average components for controls, inverter and electric control cabinet, material for 20 filter replacements (once a year for 20 years lifetime). The air handling unit includes a frame construction, two radial belt drive fans, two multi-leaf damper, heat recovery with circuit connected heat exchanger, heating elements, expansion plenum and empty section in supply and extract air. No cooling elements, humidifier, air-mixing plenum and silencer included. The frame construction made of aluminium-profiles, casing made of hot-dip galvanized and powder coated steel sheets insulated with polyurethane foam. Circuit connected heat exchanger for completely separated supply air and exhaust air streams.;

## Included processes
Materials used for the production. Energy use for the different production steps and for heating the production building. Transport of raw materials to the plant. Estimation for infrastructure of the production site included.

## Technology
Typical technology, materials and components used for ventilation systems in commercial and public buildings

## Time period
Amount of material investigated in 2013. Process information from 2003 to 2012

## Reference product
- Ventilation unit 6700 m3/h, w. circuit connected heat exchanger, at plant [CH]: 1 p
  SWITZERLAND

## Inputs from technosphere
- Transport, freight, rail [RER]: 829.16 tkm; lognormal SD95 2.14
  (4,5,1,1,1,5); Standard distance of ecoinvent used
- Inverter, 2500W, at plant [RER]: 2.8 p; lognormal SD95 1.34
  (3,4,1,1,3,5); Data for similar product, estimations
- Sheet rolling, aluminium [RER]: 104.54 kg; lognormal SD95 1.26
  (3,4,1,1,1,5); Data related to material input
- Zinc coating, pieces, adjustment per um [RER]: -1406.3 m2; lognormal SD95 1.26
  (3,4,1,1,1,5); Data for typical product, estimations
- Pump 40W, at plant [CH]: 4 p; lognormal SD95 1.26
  (3,4,1,1,1,5); Data for typical product, estimations
- Metal working factory operation, average heat energy [RER]: 1834.1 kg; lognormal SD95 1.27
  (2,4,2,1,3,4); Avarage value for similar production
- Chromium steel 18/8, at plant [RER]: 5.1873 kg; lognormal SD95 1.26
  (3,4,1,1,1,5); Data for typical product, estimations
- Powder coating, aluminium sheet [RER]: 193.6 m2; lognormal SD95 1.32
  (4,4,1,1,1,5); Estimated value related to material input
- Electricity, medium voltage, production ENTSO-E, at grid: 1100.4 kWh; lognormal SD95 1.34
  (3,4,1,1,3,5); Data from similar processes, companies
- Electric motor, electric vehicle, at plant [RER]: 144 kg; lognormal SD95 1.24
  (2,4,1,1,1,5); Data for typical product
- Glass fibre reinforced plastic, polyamide, injection moulding, at plant [RER]: 7.0216 kg; lognormal SD95 1.26
  (3,4,1,1,1,5); Data for typical product, estimations
- Copper, at regional storage [RER]: 129.23 kg; lognormal SD95 1.26
  (3,4,1,1,1,5); Data for typical product, estimations
- Polyethylene terephthalate, granulate, amorphous, at plant [RER]: 111.39 kg; lognormal SD95 1.24
  (2,4,1,1,1,5); Data for typical product
- Steel, electric, un- and low-alloyed, at plant [RER]: 354.54 kg; lognormal SD95 1.24
  (2,4,1,1,1,5); Data for typical product
- Sheet rolling, steel [RER]: 958.22 kg; lognormal SD95 1.26
  (3,4,1,1,1,5); Data related to material input
- Fleece production, polyethylene terephthalate [RER]: 111.39 kg; lognormal SD95 1.34
  (3,4,1,1,3,5); Data for similar production process
- Section bar extrusion, aluminium [RER]: 260.38 kg; lognormal SD95 1.26
  (3,4,1,1,1,5); Data related to material input
- Zinc coating, coils [RER]: 91.917 m2; lognormal SD95 1.26
  (3,4,1,1,1,5); Data for typical product, estimations
- Transport, freight, lorry, 16t-32t gross weight, fleet average [CH]: 91.703 tkm; lognormal SD95 2.14
  (4,5,1,1,1,5); Standard distance of ecoinvent used
- Sawnwood, production mix, softwood, dried (u=10%), planed, at sawmill [RER]: 0.11252 m3; lognormal SD95 1.24
  (2,4,1,1,1,5); Data for typical product
- Aluminium, production mix, wrought alloy, at plant [RER]: 364.93 kg; lognormal SD95 1.24
  (2,4,1,1,1,5); Data for typical product
- Sheet rolling, chromium steel [RER]: 5.1873 kg; lognormal SD95 1.26
  (3,4,1,1,1,5); Data related to material input
- Polyurethane, rigid foam, at plant [RER]: 53.882 kg; lognormal SD95 1.24
  (2,4,1,1,1,5); Data for typical product
- Powder coating, steel [RER]: 81.12 m2; lognormal SD95 1.26
  (3,4,1,1,1,5); Data related to material input, estimations
- Metal working factory [RER]: 8.4e-7 p; lognormal SD95 3.07
  (2,4,2,1,3,4); Avarage value for similar production
- Steel, converter, unalloyed, at plant [RER]: 603.68 kg; lognormal SD95 1.24
  (2,4,1,1,1,5); Data for typical product
- Drawing of pipes, steel [RER]: 129.23 kg; lognormal SD95 1.26
  (3,4,1,1,1,5); Data related to material input
- Control and wiring, central unit, at plant [RER]: 18.611 p; lognormal SD95 1.34
  (3,4,1,1,3,5); Data for similar product, estimations
- Synthetic rubber, at plant [RER]: 4.4964 kg; lognormal SD95 1.26
  (3,4,1,1,1,5); Data for typical product, estimations

## Emissions to nature
- Heat, waste [emissions to air, high. pop.]: 3961.6 MJ; lognormal SD95 1.34
  (3,4,1,1,3,5); Calculated from electricity use

## Sampling procedure
Manufacturer informations and literature data. Data of typical product used.

## Sources
- Klingler M., Kasser U., Savi D., Primas A., Stettler Y., Gujer P., 2014, 2014 - LCA ventilation and heating systems - Klingler, Schlussbericht, BFE, Buero fuer Umweltchemie, B&H AG, Zuerich, CH
Klingler M., Kasser U., Savi D., Primas A., Stettler Y., Gujer P. (2014) Ökobilanzdaten für Lüftungs- und Wärmeanlagen. Schlussbericht, BFE. Bundesamt für Energie (BFE). Bern.
Type: Separate publication
Source: Report
First author: Klingler M.
Other authors: Kasser U., Savi D., Primas A., Stettler Y., Gujer P.
Year: 2014
Title of anthology: Schlussbericht, BFE
Place of publication: Bern
Publisher: Bundesamt für Energie (BFE)
