# Gas power plant, 300MWe

Dataset: EcoSpold 1, unit process, infrastructure
Functional unit: 1 p
Category: electricity by fuel / gas\power plant\infrastructure
Geography: GLO
Time period: 1990-01 to 2002-12
Generated by: Thomas Heck
accessRestrictedTo: 0
copyright: true

## General comment
Average gas power plant 300 MWe.
Technology: Average installed gas power plant
Version: 2.2

Local category: Erdgas
Local subcategory: Kraftwerke

## Included processes
The module includes the most important materials used for construction. It includes also the energy requirements for construction; transport is implicitly included in energy consumption.

## Technology
Average installed gas power plant

## Reference product
- Gas power plant, 300MWe [GLO]: 1 p
  Global

## Inputs from technosphere
- Reinforcing steel, at plant [RER]: 1.65e6 kg; lognormal SD95 3
  extrapolated from Faist Emmenegger et al. (2003), basic uncertainty
- Polyethylene, LDPE, granulate, at plant [RER]: 450000 kg; lognormal SD95 3
  extrapolated from Faist Emmenegger et al. (2003), basic uncertainty
- Aluminium, production mix, at plant [RER]: 225000 kg; lognormal SD95 3
  extrapolated from Faist Emmenegger et al. (2003), basic uncertainty
- Concrete, normal, at plant [CH]: 5450 m3; lognormal SD95 3
  extrapolated from Faist Emmenegger et al. (2003), basic uncertainty
- Heavy fuel oil, burned in industrial furnace 1MW, non-modulating [RER]: 3.48e7 MJ; lognormal SD95 4.51
  extrapolated from Faist Emmenegger et al. (2003), uncertainty of amount of material and of energy needed
- Diesel, burned in building machine, average [CH]: 3.48e7 MJ; lognormal SD95 4.51
  (same comment as for Heavy fuel oil, burned in industrial furnace 1MW, non-modulating)
- Electricity, medium voltage, production ENTSO-E, at grid: 708000 kWh; lognormal SD95 4.51
  (same comment as for Heavy fuel oil, burned in industrial furnace 1MW, non-modulating)
- Rock wool, packed, at plant [CH]: 450000 kg; lognormal SD95 3
  extrapolated from Faist Emmenegger et al. (2003), basic uncertainty
- Copper, at regional storage [RER]: 225000 kg; lognormal SD95 3
  extrapolated from Faist Emmenegger et al. (2003), basic uncertainty

## Inputs from nature
- Occupation, industrial area [resources, land]: 2.16e6 m2a; lognormal SD95 4
  uncertainty of land use and life time
- Transformation, from unknown [resources, land]: 60000 m2; lognormal SD95 3
  estimated from range of values in literature
- Transformation, to industrial area [resources, land]: 60000 m2; lognormal SD95 3
  estimated from range of values in literature

## Emissions to nature
- Heat, waste [emissions to air, high. pop.]: 2.55e6 MJ; lognormal SD95 4.51
  uncertainty of electricity consumed (see exchange "electricity, medium voltage, production UCTE, at grid")

## Sampling procedure
Literature

## Sources
- Faist Emmenegger M., Heck T., Jungbluth N., Tuchschmid M., 2007, 2007 - Natural gas - Faist-Emmeneger, Sachbilanzen von Energiesystemen. Final report No. 6 ecoinvent data v2.0, 6, Swiss Centre for LCI, PSI, ESU-services Ltd., Duebendorf and Villigen, CH
Faist Emmenegger, M., Heck, T., Jungbluth, N. (2007) Erdgas. Sachbilanzen von Energiesystemen. Final report No. 6 ecoinvent data v2.0. Editors: Dones R.. Volume: 6. Swiss Centre for LCI, PSI. Dübendorf and Villigen, CH.
Type: Measurement on site
Source: CD-ROM
First author: Faist Emmenegger, M.
Other authors: Heck, T., Jungbluth, N.
Year: 2007
Name of editors: Dones R.
Title of anthology: Sachbilanzen von Energiesystemen. Final report No. 6 ecoinvent data v2.0
Place of publication: Dübendorf and Villigen, CH
Publisher: Swiss Centre for LCI, PSI
Volume No: 6

## Validation
Proof reading validation: passed; Other validation: none;
