# Disposal, dust, unalloyed EAF steel, 15.4% water, to residual material landfill

Dataset: EcoSpold 1, unit process
Functional unit: 1 kg
Category: landfill / residual material landfill
Geography: CH
Time period: 2000-01 to 2000-12
Generated by: Gabor Doka
accessRestrictedTo: 0
copyright: true

## General comment
Inventoried waste contains 100% dust from unalloyed electric steel production to landfill; . waste composition (wet, in ppm): H2O 105410; O 75250; H n.a.; C 11979; S 7187.1; N n.a.; P 1672.9; B n.a.; Cl 26353; Br n.a.; F 4408.1; I n.a.; Ag n.a.; As 397.69; Ba n.a.; Cd 574.97; Co 14.374; Cr 3934; Cu 2635.3; Hg 5.2705; Mn 29686; Mo n.a.; Ni 287.48; Pb 32582; Sb n.a.; Se n.a.; Sn n.a.; V 335.4; Zn 215610; Be n.a.; Sc n.a.; Sr n.a.; Ti n.a.; Tl n.a.; W n.a.; Si 14558; Fe 359360; Ca 65063; Al 2535.9; K 10739; Mg 17337; Na 12086; Share of carbon in waste that is biogenic 0%. ;;

## Included processes
Waste-specific short-term emissions to water from leachate. Long-term emissions from landfill to ground water.

## Geography
Technology encountered in Switzerland in 2000. Landfill includes base seal and leachate collection system.

## Technology
Swiss residual material landfill for polluted, inorganic waste. With base seal and leachate collection system. Recultivation after closure.

## Time period
Waste composition as given in literature reference, theoretical data or other source. Transfer coefficients from prospective model.

## Reference product
- Disposal, dust, unalloyed EAF steel, 15.4% water, to residual material landfill [CH]: 1 kg
  SWITZERLAND

## Inputs from technosphere
- Residual material landfill facility [CH]: 2.0833e-9 p; lognormal SD95 1
  demands per kilogram waste. uncertainty is heeded in the module
- Process-specific burdens, residual material landfill [CH]: 1 kg; lognormal SD95 1
  demands per kilogram waste. uncertainty is heeded in the module

## Emissions to nature
- Magnesium [emissions to water, groundwater, long-term]: 0.0019698 kg; lognormal SD95 11.444
  uncertainty is calculated from uncertainties in waste composition and transfer coefficients in incinerator and landfills.
- TOC, Total Organic Carbon [emissions to water, river]: 1.2923e-5 kg; lognormal SD95 7.3076
  uncertainty is calculated from uncertainties in waste composition and transfer coefficients in residual landfill
- Nickel [emissions to water, groundwater, long-term]: 0.00010408 kg; lognormal SD95 7.9899
  (same comment as for Magnesium)
- Arsenic [emissions to water, groundwater, long-term]: 3.9769e-13 kg; lognormal SD95 5.9986
  (same comment as for Magnesium)
- Vanadium [emissions to water, river]: 8.2313e-7 kg; lognormal SD95 10.117
  (same comment as for TOC, Total Organic Carbon)
- Iron [emissions to water, river]: 3.0068e-6 kg; lognormal SD95 9.8847
  (same comment as for TOC, Total Organic Carbon)
- Chloride [emissions to water, groundwater, long-term]: 0.018816 kg; lognormal SD95 2.7704
  (same comment as for Magnesium)
- Aluminium [emissions to water, groundwater, long-term]: 0.00075279 kg; lognormal SD95 6.712
  (same comment as for Magnesium)
- Manganese [emissions to water, river]: 4.0938e-7 kg; lognormal SD95 11.209
  (same comment as for TOC, Total Organic Carbon)
- Potassium [emissions to water, river]: 0.0030273 kg; lognormal SD95 3.5486
  (same comment as for TOC, Total Organic Carbon)
- Copper [emissions to water, river]: 1.6935e-7 kg; lognormal SD95 12.029
  (same comment as for TOC, Total Organic Carbon)
- Fluoride [emissions to water, river]: 0.00023888 kg; lognormal SD95 4.988
  (same comment as for TOC, Total Organic Carbon)
- Manganese [emissions to water, groundwater, long-term]: 0.00024522 kg; lognormal SD95 133.81
  (same comment as for Magnesium)
- Mercury [emissions to water, groundwater, long-term]: 2.4878e-7 kg; lognormal SD95 46.444
  (same comment as for Magnesium)
- Nickel [emissions to water, river]: 1.7376e-7 kg; lognormal SD95 11.965
  (same comment as for TOC, Total Organic Carbon)
- Cadmium [emissions to water, groundwater, long-term]: 3.9034e-6 kg; lognormal SD95 195.75
  (same comment as for Magnesium)
- Aluminium [emissions to water, river]: 1.2567e-6 kg; lognormal SD95 9.6256
  (same comment as for TOC, Total Organic Carbon)
- Silicon [emissions to water, groundwater, long-term]: 0.014525 kg; lognormal SD95 3.1165
  (same comment as for Magnesium)
- Lead [emissions to water, river]: 2.8214e-7 kg; lognormal SD95 11.689
  (same comment as for TOC, Total Organic Carbon)
- Sodium [emissions to water, river]: 0.0045354 kg; lognormal SD95 3.3826
  (same comment as for TOC, Total Organic Carbon)
- Sulfate [emissions to water, groundwater, long-term]: 0.019248 kg; lognormal SD95 3.5885
  (same comment as for Magnesium)
- Sulfate [emissions to water, river]: 0.0023133 kg; lognormal SD95 4.2383
  (same comment as for TOC, Total Organic Carbon)
- Cobalt [emissions to water, river]: 4.1026e-9 kg; lognormal SD95 17.363
  (same comment as for TOC, Total Organic Carbon)
- BOD5, Biological Oxygen Demand [emissions to water, river]: 1.0683e-5 kg; lognormal SD95 7.3076
  (same comment as for TOC, Total Organic Carbon)
- Copper [emissions to water, groundwater, long-term]: 0.00010144 kg; lognormal SD95 35.492
  (same comment as for Magnesium)
- Lead [emissions to water, groundwater, long-term]: 0.000169 kg; lognormal SD95 210.44
  (same comment as for Magnesium)
- Zinc [emissions to water, groundwater, long-term]: 0.0026426 kg; lognormal SD95 83.842
  (same comment as for Magnesium)
- DOC, Dissolved Organic Carbon [emissions to water, groundwater, long-term]: 0.0077411 kg; lognormal SD95 3.5066
  (same comment as for Magnesium)
- Mercury [emissions to water, river]: 4.1532e-10 kg; lognormal SD95 21.307
  (same comment as for TOC, Total Organic Carbon)
- Cobalt [emissions to water, groundwater, long-term]: 2.4575e-6 kg; lognormal SD95 16.917
  (same comment as for Magnesium)
- COD, Chemical Oxygen Demand [emissions to water, groundwater, long-term]: 0.019563 kg; lognormal SD95 3.5066
  (same comment as for Magnesium)
- TOC, Total Organic Carbon [emissions to water, groundwater, long-term]: 0.0077411 kg; lognormal SD95 3.5066
  (same comment as for Magnesium)
- Phosphate [emissions to water, river]: 1.9131e-6 kg; lognormal SD95 10.413
  (same comment as for TOC, Total Organic Carbon)
- Fluoride [emissions to water, groundwater, long-term]: 0.0041692 kg; lognormal SD95 3.9281
  (same comment as for Magnesium)
- Chromium VI [emissions to water, river]: 0.00023648 kg; lognormal SD95 5.0129
  (same comment as for TOC, Total Organic Carbon)
- BOD5, Biological Oxygen Demand [emissions to water, groundwater, long-term]: 0.006399 kg; lognormal SD95 3.5066
  (same comment as for Magnesium)
- Magnesium [emissions to water, river]: 3.2885e-6 kg; lognormal SD95 8.7297
  (same comment as for TOC, Total Organic Carbon)
- Chloride [emissions to water, river]: 0.0075371 kg; lognormal SD95 2.9737
  (same comment as for TOC, Total Organic Carbon)
- Cadmium [emissions to water, river]: 6.5165e-9 kg; lognormal SD95 16.604
  (same comment as for TOC, Total Organic Carbon)
- Iron [emissions to water, groundwater, long-term]: 0.0018011 kg; lognormal SD95 201.71
  (same comment as for Magnesium)
- COD, Chemical Oxygen Demand [emissions to water, river]: 3.266e-5 kg; lognormal SD95 7.3076
  (same comment as for TOC, Total Organic Carbon)
- Calcium [emissions to water, groundwater, long-term]: 0.005879 kg; lognormal SD95 12.612
  (same comment as for Magnesium)
- Vanadium [emissions to water, groundwater, long-term]: 0.00025779 kg; lognormal SD95 6.107
  (same comment as for Magnesium)
- Zinc [emissions to water, river]: 4.4116e-6 kg; lognormal SD95 9.153
  (same comment as for TOC, Total Organic Carbon)
- Calcium [emissions to water, river]: 9.8147e-6 kg; lognormal SD95 7.8585
  (same comment as for TOC, Total Organic Carbon)
- Phosphate [emissions to water, groundwater, long-term]: 0.001146 kg; lognormal SD95 8.5556
  (same comment as for Magnesium)
- Chromium VI [emissions to water, groundwater, long-term]: 0.00074701 kg; lognormal SD95 4.047
  (same comment as for Magnesium)
- Sodium [emissions to water, groundwater, long-term]: 0.0075501 kg; lognormal SD95 3.2694
  (same comment as for Magnesium)
- Arsenic [emissions to water, river]: 0.00039769 kg; lognormal SD95 5.8412
  (same comment as for TOC, Total Organic Carbon)
- DOC, Dissolved Organic Carbon [emissions to water, river]: 1.2923e-5 kg; lognormal SD95 7.3076
  (same comment as for TOC, Total Organic Carbon)
- Potassium [emissions to water, groundwater, long-term]: 0.0077122 kg; lognormal SD95 3.3353
  (same comment as for Magnesium)
- Silicon [emissions to water, river]: 3.2741e-5 kg; lognormal SD95 6.4711
  (same comment as for TOC, Total Organic Carbon)

## Sampling procedure
Landfill model based on observed leachate concentrations in literature. Extrapolated to 60'000 years heeding chemical characteristics. Initial waste composition from various literature sources.

## Uncertainty adjustments
uncertainty of waste input composition data derived from generic formula GSD(c) = N*ln(c)+1. Mean long-term emissions are the emissions until the next glacial period occurs (in 60'000a) and the landfill is eroded. Maximal long-term emissions are the complete emissions of all landfilled material (except Cr). Minimal long-term emissions are derived implicitly from the mean and maximal values assuming a lognormal distribution.

## Sources
- Doka G., 2009, 2009 - LCI waste treatment services - Doka, Final report ecoinvent data v2.1, 13, Swiss Centre for LCI, Doka LCA, Duebendorf and St. Gallen, CH
Doka G. (2009) Life Cycle Inventories of Waste Treatment Services. Final report ecoinvent data v2.1. Volume: 13. Swiss Centre for LCI, Empa - TSL. Dübendorf, CH.
Type: Measurement on site
Source: CD-ROM
First author: Doka G.
Year: 2009
Title of anthology: Final report ecoinvent data v2.1
Place of publication: Dübendorf, CH
Publisher: Swiss Centre for LCI, Empa - TSL
Volume No: 13

## Validation
Proof reading validation: passed.; Other validation: none;
