# Electricity, residual mix

Dataset: EcoSpold 1, unit process
Functional unit: 1 kWh
Category: electricity / supply mix
Geography: CH
Time period: 2020 to 2020
Synonyms: 0
Share of production covered: 100 %
Generated by: Rolf Frischknecht
accessRestrictedTo: 0
copyright: true

## General comment
The location and technology of the production of the residual attributes have been for some technologies (biomass, solar, hydropower) adapted by the ENTSO-mix based on technologies, which is a rough estimation.;

## Included processes
Includes the shares of residual attributes produced in Europe in 2019 with the different technologies. Not included are transformation, transport or distribution losses.

## Geography
Data apply to untracked electricity supplied in Switzerland.
Wind power plants are European averages.

## Technology
No technology description is provided because the dataset just describes the power plant portfolio of the respective country using current average technology per energy carrier.

## Time period
Time of publications.

## Reference product
- Electricity, residual mix [CH]: 1 kWh

## Inputs from technosphere
All rows: lognormal SD95 1.05
- Electricity, from natural gas [ENTSO-E]: 0.037506 kWh
  (1,1,1,1,1,1,BU:1.05); ; AIB (2020)
- Electricity, nuclear, at power plant [UCTE]: 0.8296 kWh
  (1,1,1,1,1,1,BU:1.05); ; AIB (2020)
- Electricity, oil, at power plant [UCTE]: 0.0058938 kWh
  (1,1,1,1,1,1,BU:1.05); ; AIB (2020)
- Electricity, hydropower, at reservoir power plant, alpine region [RER]: 0.014336 kWh
  (1,1,1,1,1,1,BU:1.05); Differentiated between different hydropower technologies according to statistical factsheet ENTSO-E 2018; AIB (2020), ENSO-E (2018)
- Electricity, hydropower, at reservoir power plant, non alpine regions [RER]: 0.014336 kWh
  (same comment as for Electricity, hydropower, at reservoir power plant, alpine region)
- Electricity, hydropower, at run-of-river power plant [RER]: 0.027828 kWh
  (same comment as for Electricity, hydropower, at reservoir power plant, alpine region)
- Electricity, production mix photovoltaic, at plant [DE]: 0.0328 kWh
  (1,1,1,1,1,1,BU:1.05); Same dataset used as in the dataset ENTSO based on technologies; AIB (2020)
- Electricity, at cogen 1MWth, wood chips, allocation exergy [CH]: 0.0377 kWh
  (1,1,1,1,1,1,BU:1.05); ; AIB (2020)

## Sampling procedure
Statistical data

## Sources
- Frischknecht R., 2022, 2022 - Energy label for passenger cars - Frischknecht, Project reports, 754, treeze Ltd., Bern, CH

## Validation
10.05.2022
G:\Projekte laufend\754 Aktualisierung Energieetikette 2022 BFE\EcoSpold\Strommix Schweiz 2020\[754-StrommixSchweiz2020_v0.1.xlsx]X-Process
