# Irrigating

Dataset: EcoSpold 1, unit process
Functional unit: 1 ha
Category: agricultural / unspecified
Geography: CH
Time period: 2000-01 to 2000-12
Generated by: Dunja Dux
accessRestrictedTo: 0
copyright: true

## General comment
Overhead watering of one ha during one year (4 times 300 m3 water). Mobile sprinkler system, with fix installed pump (30 m3/h, 7-8 bar, 22 kW), water pipe and hydrant, turbine propulsion, 300 m water hose, exterior diameter 75 mm. Water amount of 1200 m3 per ha and year included.;
Synonyms: Beregnen;

## Included processes
The inventory takes into account electricity and diesel fuel consumption, the amount of agricultural machinery, of the shed and the further infrastructure like pump or water hose, etc., which has to be attributed to the irrigation. Also taken into consideration is the amount of emissions to the air from combustion and the emission to the soil from tyre abrasion during the work process. The following activities where considered part of the work process: preliminary work at the farm, like attaching the adequate machine to the tractor; transfer to field (with an assumed distance of 1 km); field work (for a parcel of land of 1 ha surface); transfer to farm and concluding work, like uncoupling the machine. The overlapping during the field work is considered. The amount of water irrigated is taken into account. Not included are dust other than from combustion and noise.

## Geography
The inventories are based on expert estimation made by the FAT, in Switzerland and literature values from Germany and Austria.

## Technology
Emissions and fuel consumption by the newest models of tractors set into operation during the period from 1999 to 2001.

## Time period
Measurements were made in the last few years (1999-2001).

## Reference product
- Irrigating [CH]: 1 ha
  SWITZERLAND

## Inputs from technosphere
- Electricity, low voltage, at grid [CH]: 876 kWh; lognormal SD95 1.11
  (1,4,1,1,1,na)
- Polyethylene, HDPE, granulate, at plant [RER]: 23.1 kg; lognormal SD95 1.11
  (1,4,1,1,1,na)
- Excavation, hydraulic digger, average [CH]: 4 m3; lognormal SD95 1.11
  (1,4,1,1,1,na)
- Diesel, at regional storage [CH]: 3.78 kg; lognormal SD95 1.11
  (1,4,1,1,1,na)
- Tractor, production [CH]: 0.458 kg; lognormal SD95 1.11
  (1,4,1,1,1,na)
- Agricultural machinery, general, production [CH]: 21.7 kg; lognormal SD95 1.13
  (2,4,2,1,1,na)
- Polyvinylchloride, bulk polymerised, at plant [RER]: 1.12 kg; lognormal SD95 1.11
  (1,4,1,1,1,na)
- Disposal, building, bulk iron (excluding reinforcement), to sorting plant [CH]: 0.00427 kg; lognormal SD95 1.11
  (1,4,1,1,1,na)
- Disposal, building, polyvinylchloride products, to final disposal [CH]: 0.00112 kg; lognormal SD95 1.11
  (1,4,1,1,1,na)
- Disposal, building, polyethylene/polypropylene products, to final disposal [CH]: 0.00667 kg; lognormal SD95 1.11
  (1,4,1,1,1,na)
- Extrusion, plastic film [RER]: 24.2 kg; lognormal SD95 1.11
  (1,4,1,1,1,na)
- Cast iron, at plant [RER]: 4.27 kg; lognormal SD95 1.11
  (1,4,1,1,1,na)
- Shed [CH]: 0.0589 m2; lognormal SD95 3.01
  (1,4,1,1,1,na)

## Inputs from nature
- Water, river [resources, in water]: 1200 m3; lognormal SD95 1.11
  (1,4,1,1,1,na)
- Occupation, construction site [resources, land]: 6.67 m2a; lognormal SD95 1.52
  (1,4,1,1,1,na)

## Emissions to nature
- PAH, polycyclic aromatic hydrocarbons [emissions to air, low. pop.]: 1.24e-5 kg; lognormal SD95 3.05
  (1,2,1,1,3,na)
- Selenium [emissions to air, low. pop.]: 3.78e-8 kg; lognormal SD95 1.56
  (1,2,1,1,3,na)
- Chromium [emissions to air, low. pop.]: 1.89e-7 kg; lognormal SD95 5.05
  (1,2,1,1,3,na)
- Sulfur dioxide [emissions to air, low. pop.]: 0.00381 kg; lognormal SD95 1.21
  (1,2,1,1,3,na)
- Particulates, < 2.5 um [emissions to air, low. pop.]: 0.0156 kg; lognormal SD95 3.05
  (1,2,1,1,3,na)
- NMVOC, non-methane volatile organic compounds, unspecified origin [emissions to air, low. pop.]: 0.0165 kg; lognormal SD95 1.52
  (1,4,1,1,1,na)
- Ammonia [emissions to air, low. pop.]: 7.56e-5 kg; lognormal SD95 1.56
  (1,2,1,1,3,na)
- Cadmium [emissions to air, low. pop.]: 3.78e-8 kg; lognormal SD95 5.05
  (1,2,1,1,3,na)
- Dinitrogen monoxide [emissions to air, low. pop.]: 0.000454 kg; lognormal SD95 1.56
  (1,2,1,1,3,na)
- Carbon monoxide, fossil [emissions to air, low. pop.]: 0.0363 kg; lognormal SD95 5.01
  (1,4,1,1,1,na)
- Heat, waste [emissions to air, low. pop.]: 3330 MJ; lognormal SD95 1.11
  (1,4,1,1,1,na)
- Benzo(a)pyrene [emissions to air, low. pop.]: 1.13e-7 kg; lognormal SD95 5.05
  (1,2,1,1,3,na)
- Benzene [emissions to air, low. pop.]: 2.76e-5 kg; lognormal SD95 1.56
  (1,2,1,1,3,na)
- Methane, fossil [emissions to air, low. pop.]: 0.000488 kg; lognormal SD95 1.56
  (1,2,1,1,3,na)
- Zinc [emissions to soil, agricultural]: 0.00271 kg; lognormal SD95 1.52
  (1,4,1,1,1,na)
- Lead [emissions to soil, agricultural]: 5.3e-6 kg; lognormal SD95 1.52
  (1,4,1,1,1,na)
- Copper [emissions to air, low. pop.]: 6.43e-6 kg; lognormal SD95 5.05
  (1,2,1,1,3,na)
- Nickel [emissions to air, low. pop.]: 2.65e-7 kg; lognormal SD95 5.05
  (1,2,1,1,3,na)
- Nitrogen oxides [emissions to air, low. pop.]: 0.193 kg; lognormal SD95 1.52
  (1,4,1,1,1,na)
- Carbon dioxide, fossil [emissions to air, low. pop.]: 11.7 kg; lognormal SD95 1.21
  (1,2,1,1,3,na)
- Cadmium [emissions to soil, agricultural]: 1.09e-6 kg; lognormal SD95 1.52
  (1,4,1,1,1,na)
- Zinc [emissions to air, low. pop.]: 3.78e-6 kg; lognormal SD95 5.05
  (1,2,1,1,3,na)
- Water [emissions to water, unspecified]: 1.14e6 kg; lognormal SD95 2.5196
  (5,5,5,5,5,BU:1.05); All uncertainty-values set to 5.0 by default. Balance of input water

## Sampling procedure
Data on fuel consumption and emissions of CO, HC and NOx are expert estimations based on measurements for comparable activities. The other emissions were calculated basing on literature data and the measured fuel consumption.

## Extrapolations
Processes are typical procedures for Switzerland around the year 2000, they are not statistical average processes.

## Sources
- Nemecek T., Kaegi T., 2007, 2007 - LCI agricultural prod. systems - Nemecek, Ecoinvent report version 2.0, 15, Swiss Centre for LCI, ART, Duebendorf and Zuerich, CH
Nemecek, T., Kägi, T., Blaser, S. (2007) Life Cycle Inventories of Agricultural Production Systems. Ecoinvent report version 2.0. Editors: 0. Volume: 15. Swiss Centre for LCI, ART. Duebendorf and Zurich, CH.
Type: Measurement on site
Source: CD-ROM
First author: Nemecek, T.
Other authors: Kägi, T., Blaser, S.
Year: 2007
Name of editors: 0
Title of anthology: Ecoinvent report version 2.0
Place of publication: Duebendorf and Zurich, CH
Publisher: Swiss Centre for LCI, ART
Volume No: 15

## Validation
Proof reading validation: Passed.; Other validation: none;
