# Electricity, production from hydro power, at plant

Dataset: EcoSpold 1, unit process
Functional unit: 1 kWh
Category: electricity by fuel / hydro\power plants
Geography: CH
Time period: 2011-01 to 2011-12
Share of production covered: 100 %
Generated by: Philippe Stolz
accessRestrictedTo: 0
copyright: true

## General comment
Electricity domestic net production shares are based on annual averages for the year 2011.;

## Included processes
Included are the shares of run-of-river, reservoir and small hydropower plants in the total hydropower electricity production at the busbar. Not included are transformation, transport or distribution losses.

## Geography
Switzerland

## Technology
Hydropower

## Time period
Time period of statistics used.

## Reference product
- Electricity, production from hydro power, at plant [CH]: 1 kWh
  SWITZERLAND

## Inputs from technosphere
- Electricity, hydropower, net, at reservoir power plant [CH]: 0.52973 kWh; lognormal SD95 1.0714
  (1,1,1,1,1,3,BU:1.05); BFE Elektrizitätsstatistik 2011, own calculations
- Electricity, hydropower, at small hydropower plant [CH]: 0.10853 kWh; lognormal SD95 1.0714
  (1,1,1,1,1,3,BU:1.05); BFE Elektrizitätsstatistik 2011, Flury & Frischknecht 2012
- Electricity, hydropower, at run-of-river power plant [CH]: 0.36174 kWh; lognormal SD95 1.0714
  (1,1,1,1,1,3,BU:1.05); BFE Elektrizitätsstatistik 2011, Flury & Frischknecht 2012

## Sampling procedure
Statistical data

## Sources
- Stolz P., Frischknecht R., 2015, 2015 - LCA electricity mix Switzerland 2011 - Stolz, Project reports, 537, treeze Ltd., Uster, CH
Stolz, P., Frischknecht, R. (2015) Umweltbilanz Strommix Schweiz 2011: Hydropower mix. Project reports. Volume: 537. treeze Ltd.. Uster, CH.
Type: Separate publication
First author: Stolz, P.
Other authors: Frischknecht, R.
Year: 2015
Title of anthology: Project reports
Place of publication: Uster, CH
Publisher: treeze Ltd.
Volume No: 537

## Validation
Proof reading validation: automatic validation in Excel; Other validation: \\SRV01\ESU-Docs\Projekte laufend\563 Aktualisierung KBOB_2016\EcoSpold\[563-Hydropower-CH-v0.1.xlsx]X-Process;
