# Disposal, mixed demolition, at plant

Dataset: EcoSpold 1, unit process
Functional unit: 1 kg
Category: waste management / inert material landfill
Geography: CH
Time period: 2015-01 to 2015-12
Share of production covered: 0 %
Generated by: Laura Tschuemperlin
accessRestrictedTo: 0
copyright: true

## General comment
This is a multi output process of mixed demolition entering the recycling plant. An economic allocation is applied between the disposal service of mixed demolition and the recycling product RC-M;

## Included processes
Includes the infrastructure, energy demand and waste of the recycling process of mixed demolition

## Geography
Data from Eberhard AG, Switzerland

## Technology
dry processing, stationary crusher

## Reference product
- Disposal, mixed demolition, at plant [CH]: 1 kg
  SWITZERLAND

## Inputs from technosphere
- Sorting plant for construction waste [CH]: 9.7197e-11 p; lognormal SD95 3.0487
  (2,1,1,1,1,5,BU:3); Doka (2003);
- Disposal, concrete, 5% water, to construction waste landfill [CH]: 0.004993 kg; lognormal SD95 1.3001
  (4,5,na,na,na,na,BU:1.05); Persönliche Mitteilung, Martin Preisig, Eberhard Bau AG, 09.11.2015;
- Disposal, plastics, mixture, 15.3% water, to municipal incineration [CH]: 0.0091538 kg; lognormal SD95 1.3001
  (same comment as for Disposal, concrete, 5% water, to construction waste landfill)
- Diesel, burned in building machine, average [CH]: 0.013751 MJ; lognormal SD95 1.05
  (1,1,1,1,1,1,BU:1.05); Persönliche Mitteilung, Martin Preisig, Eberhard Bau AG, 09.11.2015;
- Electricity, medium voltage, at grid [CH]: 0.0039289 kWh; lognormal SD95 1.05
  (same comment as for Diesel, burned in building machine, average)
- Disposal, wood untreated, 20% water, to municipal incineration [CH]: 0.0091538 kg; lognormal SD95 1.3001
  (same comment as for Disposal, concrete, 5% water, to construction waste landfill)

## Sources
- Tschuemperlin L., Frischknecht R., 2016, 2016 - LCA precast concrete parts - Tschuemperlin, Project report, 551, treeze Ltd., Zuerich, CH
Tschümperlin L., Frischknecht R., (2016) CEM III/B Betone und Fertigbetonteile. Project report. Volume: 551. treeze.Ltd. Uster, CH.
Type: Separate publication
Source: Report
First author: Tschümperlin L.
Other authors: Frischknecht R.,
Year: 2016
Title of anthology: Project report
Place of publication: Uster, CH
Publisher: treeze.Ltd
Volume No: 551

## Validation
Proof reading validation: 17.02.2016; Other validation: G:\Projekte laufend\551 CEM IIIA Beton und Fertigbetonteile\EcoSpold\[551 CEM IIIA Beton_v2.xlsx]X-Process;
