# Disposal, ash slurry solids and bark chips, to municipal incineration

Dataset: EcoSpold 1, unit process
Functional unit: 1 kg
Category: incineration / municipal incineration
Geography: CH
Time period: 1998-01 to 1998-12
Generated by: Gabor Doka
accessRestrictedTo: 0
copyright: true

## General comment
Inventoried waste contains . waste composition (wet, in ppm): H2O n.a.; O 363500; H n.a.; C 12000; S 9200; N n.a.; P 83654; B n.a.; Cl n.a.; Br n.a.; F n.a.; I n.a.; Ag n.a.; As 6.7; Ba n.a.; Cd 0.86775; Co 1.8; Cr 18.969; Cu 833.59; Hg -0.030194; Mn 20000; Mo 3.7; Ni 4.7161; Pb 12.651; Sb n.a.; Se n.a.; Sn n.a.; V 39.5; Zn 2921.3; Be n.a.; Sc n.a.; Sr n.a.; Ti 1380; Tl n.a.; W n.a.; Si 82600; Fe 22800; Ca n.a.; Al 20800; K 147120; Mg 32100; Na 200960; Share of carbon in waste that is biogenic 100%. Share of iron in waste that is metallic/recyclable 0%. Net energy produced in MSWI: 0MJ/kg waste electric energy and 0MJ/kg waste thermal energy Allocation of energy production: no substitution or expansion. Total burden allocated to waste disposal function of MSWI. One kg of this waste produces 0.7604 kg of slag and 0.2264 kg of residues, which are landfilled. Additional solidification with 0.09055 kg of cement.;;

## Included processes
waste-specific air and water emisions from incineration, auxiliary material consumption for flue gas cleaning. Short-term emissions to river water and long-term emisisons to ground water from slag compartment (from bottom slag) and residual material landfill (from solidified fly ashes and scrubber slugde). Process energy demands for MSWI.

## Geography
Specific to the technology mix encountered in Switzerland in 2000. Well applicable to modern incineration practices in Europe, North America or Japan.

## Technology
average Swiss MSWI plants in 2000 (grate incinerators) with electrostatic precipitator for fly ash (ESP), wet flue gas scrubber and 29.4% SNCR , 32.2% SCR-high dust , 24.6% SCR-low dust -DeNOx facilities and 13.8% without Denox (by burnt waste, according to Swiss average). Share of waste incinerated in plants with magnetic scrap separation from slag : 50%. Gross electric efficiency technology mix 12.997% and Gross thermal efficiency technology mix 25.57%

## Time period
Waste composition as given in literature reference, theoretical data or other source. Transfer coefficients for modern Swiss MSWI. Emission speciation based on early 90ies data.

## Reference product
- Disposal, ash slurry solids and bark chips, to municipal incineration [CH]: 1 kg
  SWITZERLAND

## Inputs from technosphere
- Process-specific burdens, slag compartment [CH]: 0.76041 kg; lognormal SD95 1.244
  uncertainty is calculated from uncertainties in waste composition and transfer coefficients in incinerator
- Residual material landfill facility [CH]: 4.7162e-10 p; lognormal SD95 1.2282
  (same comment as for Process-specific burdens, slag compartment)
- Quicklime, milled, packed, at plant [CH]: 3.6025e-5 kg; lognormal SD95 2.2761
  uncertainty calculated from uncertainty in average auxiliary material input, and the unertainty of the waste composition of this waste
- Process-specific burdens, residual material landfill [CH]: 0.22638 kg; lognormal SD95 1.2282
  (same comment as for Process-specific burdens, slag compartment)
- Disposal, cement, hydrated, 0% water, to residual material landfill [CH]: 0.22638 kg; lognormal SD95 1.3236
  Hydrated cement for solidification of landfilled residual material. Uncertainty calculated from unertainty of the waste composition of this waste and transfer coefficients in the incinerator and of the solidification recipe.
- Municipal waste incineration plant [CH]: 2.5e-10 p; lognormal SD95 1
  demands per kilogram waste. uncertainty is heeded in the module
- Transport, freight, rail [RER]: 0.01686 tkm; lognormal SD95 1.5412
  uncertainty calculated from uncertainty in average auxiliary material input, the unertainty of the waste composition of this waste and the uncertainty in generic transportation distances
- Chemicals inorganic, at plant [GLO]: 8.569e-6 kg; lognormal SD95 1.8866
  Proxy for Polyelectrolyte. uncertainty calculated from uncertainty in average auxiliary material input, and the unertainty of the waste composition of this waste
- Cement, unspecified, at plant [CH]: 0.090551 kg; lognormal SD95 1.3236
  Cement for solidification of landfilled residual material. Uncertainty calculated from unertainty of the waste composition of this waste, of transfer coefficients in the incinerator and of the solidification recipe.
- Sodium hydroxide, 50% in H2O, production mix, at plant [RER]: 0.003567 kg; lognormal SD95 2.4394
  (same comment as for Quicklime, milled, packed, at plant)
- Chemicals organic, at plant [GLO]: 3.3842e-6 kg; lognormal SD95 12.908
  Proxy for TMT15. uncertainty calculated from uncertainty in average auxiliary material input, and the unertainty of the waste composition of this waste
- Heat from waste, at municipal waste incineration plant [CH]: 0.83868 MJ; lognormal SD95 1.05
  uncertainty is calculated from uncertainties in waste composition and uncertainties in energy efficiency and the uncertainty in internal energy demand
- Electricity from waste, at municipal waste incineration plant [CH]: 0.14377 kWh; lognormal SD95 3.78
  (same comment as for Heat from waste, at municipal waste incineration plant)
- Slag compartment [CH]: 1.3518e-9 p; lognormal SD95 1.244
  (same comment as for Process-specific burdens, slag compartment)
- Hydrochloric acid, 30% in H2O, at plant [RER]: 5.1414e-6 kg; lognormal SD95 1.8866
  (same comment as for Quicklime, milled, packed, at plant)
- Process-specific burdens, municipal waste incineration [CH]: 1 kg; lognormal SD95 1
  demands per kilogram waste. uncertainty is heeded in the module
- Iron (III) chloride, 40% in H2O, at plant [CH]: 0.00042987 kg; lognormal SD95 3.1822
  (same comment as for Quicklime, milled, packed, at plant)
- Transport, freight, lorry, 16t-32t gross weight, fleet average [CH]: 0.044651 tkm; lognormal SD95 1.1709
  uncertainty calculated from calculated from uncertainties in waste composition, in transfer coefficients in incinerator, uncertainty in average auxiliary material input, the unertainty of the waste composition of this waste and the uncertainty in generic transportation distances

## Emissions to nature
- Vanadium [emissions to water, groundwater, long-term]: 6.7751e-6 kg; lognormal SD95 14.793
  Long-term emissions from landfilling of incineration residues. uncertainty is calculated from uncertainties in waste composition and transfer coefficients in incinerator and landfills.
- Manganese [emissions to air, high. pop.]: 1.089e-10 kg; lognormal SD95 3.61
  (same comment as for Process-specific burdens, slag compartment)
- Vanadium [emissions to water, river]: 2.6653e-8 kg; lognormal SD95 9.4938
  uncertainty is calculated from uncertainties in waste composition and transfer coefficients in incinerator and landfills
- DOC, Dissolved Organic Carbon [emissions to water, groundwater, long-term]: 0.00011718 kg; lognormal SD95 2.6967
  (same comment as for Vanadium)
- Silicon [emissions to water, groundwater, long-term]: 0.0071725 kg; lognormal SD95 83.777
  (same comment as for Vanadium)
- Methane, biogenic [emissions to air, high. pop.]: 6.3821e-6 kg; lognormal SD95 1.57
  (2,3,4,2,1,2) & basic uncertainty of 1.5; confidential data from 5 plants in Switzerland and Germany
- Potassium [emissions to water, groundwater, long-term]: 0.12116 kg; lognormal SD95 1.5825
  (same comment as for Vanadium)
- Nickel [emissions to air, high. pop.]: 2.0354e-13 kg; lognormal SD95 11.29
  (same comment as for Process-specific burdens, slag compartment)
- Mercury [emissions to air, high. pop.]: -1.0428e-15 kg; lognormal SD95 17.223
  (same comment as for Process-specific burdens, slag compartment)
- Iron [emissions to water, groundwater, long-term]: 0.01068 kg; lognormal SD95 7.901
  (same comment as for Vanadium)
- Copper [emissions to air, high. pop.]: 6.1534e-9 kg; lognormal SD95 5.5696
  (same comment as for Process-specific burdens, slag compartment)
- Molybdenum [emissions to air, high. pop.]: 7.4e-9 kg; lognormal SD95 10.824
  (same comment as for Process-specific burdens, slag compartment)
- Titanium [emissions to water, river]: 6.651e-9 kg; lognormal SD95 16.577
  (same comment as for Vanadium)
- Silicon [emissions to water, river]: 1.7503e-5 kg; lognormal SD95 4.1466
  (same comment as for Vanadium)
- Phosphorus [emissions to air, high. pop.]: 8.3654e-5 kg; lognormal SD95 2.2201
  (same comment as for Process-specific burdens, slag compartment)
- Heat, waste [emissions to air, high. pop.]: 0.44446 MJ; lognormal SD95 1.0649
  (same comment as for Heat from waste, at municipal waste incineration plant)
- Heat, waste [emissions to water, river]: 0.073108 MJ; lognormal SD95 1.0649
  (same comment as for Heat from waste, at municipal waste incineration plant)
- Chromium VI [emissions to water, groundwater, long-term]: 2.0081e-6 kg; lognormal SD95 10.66
  (same comment as for Vanadium)
- Iron [emissions to water, river]: 7.8024e-6 kg; lognormal SD95 2.8808
  (same comment as for Vanadium)
- Titanium [emissions to water, groundwater, long-term]: 0.00041349 kg; lognormal SD95 7.2292
  (same comment as for Vanadium)
- COD, Chemical Oxygen Demand [emissions to water, river]: 8.0204e-7 kg; lognormal SD95 3.7933
  (same comment as for Vanadium)
- Chromium VI [emissions to water, river]: 6.1807e-7 kg; lognormal SD95 8.2447
  (same comment as for Vanadium)
- Cadmium [emissions to water, river]: 3.9354e-10 kg; lognormal SD95 12.046
  (same comment as for Vanadium)
- Arsenic [emissions to water, river]: 3.0205e-6 kg; lognormal SD95 8.1087
  (same comment as for Vanadium)
- Magnesium [emissions to air, high. pop.]: 4.4202e-5 kg; lognormal SD95 2.7225
  (same comment as for Process-specific burdens, slag compartment)
- Molybdenum [emissions to water, river]: 6.3194e-7 kg; lognormal SD95 6.6963
  (same comment as for Vanadium)
- Magnesium [emissions to water, river]: 0.00011237 kg; lognormal SD95 5.4033
  (same comment as for Vanadium)
- Chromium [emissions to air, high. pop.]: 1.4026e-12 kg; lognormal SD95 9.61
  (same comment as for Process-specific burdens, slag compartment)
- Iron [emissions to air, high. pop.]: 7.6117e-7 kg; lognormal SD95 3.0625
  (same comment as for Process-specific burdens, slag compartment)
- Phosphate [emissions to water, groundwater, long-term]: 0.0097972 kg; lognormal SD95 63.965
  (same comment as for Vanadium)
- Phosphate [emissions to water, river]: 1.6356e-5 kg; lognormal SD95 5.0156
  (same comment as for Vanadium)
- Sulfur dioxide [emissions to air, high. pop.]: 3.9194e-5 kg; lognormal SD95 3.5065
  (same comment as for Process-specific burdens, slag compartment)
- Titanium [emissions to air, high. pop.]: 1.38e-6 kg; lognormal SD95 4.9284
  (same comment as for Process-specific burdens, slag compartment)
- Nickel [emissions to water, groundwater, long-term]: 4.4156e-6 kg; lognormal SD95 9.9046
  (same comment as for Vanadium)
- Manganese [emissions to water, river]: 1.1189e-6 kg; lognormal SD95 8.1213
  (same comment as for Vanadium)
- TOC, Total Organic Carbon [emissions to water, groundwater, long-term]: 0.00011718 kg; lognormal SD95 2.6967
  (same comment as for Vanadium)
- Arsenic [emissions to water, groundwater, long-term]: 3.6795e-6 kg; lognormal SD95 9.9606
  (same comment as for Vanadium)
- Silicon [emissions to air, high. pop.]: 0.0001923 kg; lognormal SD95 2.1904
  (same comment as for Process-specific burdens, slag compartment)
- TOC, Total Organic Carbon [emissions to water, river]: 3.2897e-7 kg; lognormal SD95 3.7052
  (same comment as for Vanadium)
- Manganese [emissions to water, groundwater, long-term]: 0.017222 kg; lognormal SD95 3.6357
  (same comment as for Vanadium)
- Molybdenum [emissions to water, groundwater, long-term]: 3.0606e-6 kg; lognormal SD95 10.642
  (same comment as for Vanadium)
- Aluminium [emissions to air, high. pop.]: 3.2493e-5 kg; lognormal SD95 2.9929
  (same comment as for Process-specific burdens, slag compartment)
- Sulfate [emissions to water, groundwater, long-term]: 0.023074 kg; lognormal SD95 2.4404
  (same comment as for Vanadium)
- COD, Chemical Oxygen Demand [emissions to water, groundwater, long-term]: 0.00029613 kg; lognormal SD95 2.6967
  (same comment as for Vanadium)
- Sodium [emissions to water, river]: 0.043447 kg; lognormal SD95 1.5723
  (same comment as for Vanadium)
- Chromium [emissions to water, river]: 6.0458e-8 kg; lognormal SD95 8.9211
  (same comment as for Vanadium)
- DOC, Dissolved Organic Carbon [emissions to water, river]: 3.2897e-7 kg; lognormal SD95 3.7052
  (same comment as for Vanadium)
- Mercury [emissions to water, groundwater, long-term]: -1.5709e-9 kg; lognormal SD95 45.579
  (same comment as for Vanadium)
- BOD5, Biological Oxygen Demand [emissions to water, groundwater, long-term]: 9.6863e-5 kg; lognormal SD95 2.6967
  (same comment as for Vanadium)
- Cobalt [emissions to water, river]: 3.0792e-10 kg; lognormal SD95 15.997
  (same comment as for Vanadium)
- Carbon dioxide, biogenic [emissions to air, high. pop.]: 0.043165 kg; lognormal SD95 3.2412
  (same comment as for Process-specific burdens, slag compartment)
- Mercury [emissions to water, river]: -3.2289e-10 kg; lognormal SD95 15.615
  (same comment as for Vanadium)
- Lead [emissions to water, river]: 3.5239e-10 kg; lognormal SD95 9.1485
  (same comment as for Vanadium)
- Zinc [emissions to air, high. pop.]: 4.7725e-8 kg; lognormal SD95 4.4944
  (same comment as for Process-specific burdens, slag compartment)
- Sodium [emissions to air, high. pop.]: 0.0018908 kg; lognormal SD95 1.7161
  (same comment as for Process-specific burdens, slag compartment)
- Vanadium [emissions to air, high. pop.]: 3.95e-9 kg; lognormal SD95 8.2944
  (same comment as for Process-specific burdens, slag compartment)
- Copper [emissions to water, groundwater, long-term]: 0.00067382 kg; lognormal SD95 5.096
  (same comment as for Vanadium)
- Zinc [emissions to water, river]: 5.371e-7 kg; lognormal SD95 3.9857
  (same comment as for Vanadium)
- Magnesium [emissions to water, groundwater, long-term]: 0.029632 kg; lognormal SD95 2.5965
  (same comment as for Vanadium)
- Nickel [emissions to water, river]: 2.958e-9 kg; lognormal SD95 16.226
  (same comment as for Vanadium)
- Potassium [emissions to air, high. pop.]: 0.00044354 kg; lognormal SD95 1.9044
  (same comment as for Process-specific burdens, slag compartment)
- Cadmium [emissions to air, high. pop.]: 4.7785e-11 kg; lognormal SD95 12.816
  (same comment as for Process-specific burdens, slag compartment)
- BOD5, Biological Oxygen Demand [emissions to water, river]: 4.4907e-7 kg; lognormal SD95 3.0052
  (same comment as for Vanadium)
- Arsenic [emissions to air, high. pop.]: 6.834e-14 kg; lognormal SD95 10.956
  (same comment as for Process-specific burdens, slag compartment)
- Cobalt [emissions to air, high. pop.]: 5.715e-14 kg; lognormal SD95 12.532
  (same comment as for Process-specific burdens, slag compartment)
- Cobalt [emissions to water, groundwater, long-term]: 1.5759e-6 kg; lognormal SD95 10.998
  (same comment as for Vanadium)
- Lead [emissions to air, high. pop.]: 4.6957e-10 kg; lognormal SD95 9.61
  (same comment as for Process-specific burdens, slag compartment)
- Aluminium [emissions to water, river]: 1.7307e-6 kg; lognormal SD95 5.7839
  (same comment as for Vanadium)
- Zinc [emissions to water, groundwater, long-term]: 4.5292e-5 kg; lognormal SD95 95.038
  (same comment as for Vanadium)
- Carbon monoxide, biogenic [emissions to air, high. pop.]: 0.0002229 kg; lognormal SD95 5.01
  (1,3,2,2,1,2) & basic uncertainty of 5; literature data from switzerland and germany adapted to plant age distribution in switzerland
- Sodium [emissions to water, groundwater, long-term]: 0.15562 kg; lognormal SD95 1.4698
  (same comment as for Vanadium)
- Sulfate [emissions to water, river]: 0.0044671 kg; lognormal SD95 2.2744
  (same comment as for Vanadium)
- Cadmium [emissions to water, groundwater, long-term]: 8.707e-9 kg; lognormal SD95 222.37
  (same comment as for Vanadium)
- Potassium [emissions to water, river]: 0.025511 kg; lognormal SD95 1.7426
  (same comment as for Vanadium)
- Aluminium [emissions to water, groundwater, long-term]: 0.015393 kg; lognormal SD95 2.7832
  (same comment as for Vanadium)
- Lead [emissions to water, groundwater, long-term]: 9.0131e-7 kg; lognormal SD95 220.31
  (same comment as for Vanadium)
- Copper [emissions to water, river]: 3.385e-8 kg; lognormal SD95 10.031
  (same comment as for Vanadium)

## Sampling procedure
waste-specific calculation based on literature data

## Extrapolations
Typical elemental transfer coefficients from current studies for modern MSWI, completed with data from coal power plants and estimates, adapted for inert/burnable waste.

## Uncertainty adjustments
uncertainty of waste input composition data derived from generic formula GSD(c) = N*ln(c)+1

## Sources
- Doka G., 2009, 2009 - LCI waste treatment services - Doka, Final report ecoinvent data v2.0, 13, Swiss Centre for LCI, Doka LCA, Duebendorf and St. Gallen, CH
Doka G. (2007) Life Cycle Inventories of Waste Treatment Services. Final report ecoinvent data v2.0. Volume: 13. Swiss Centre for LCI, Empa - TSL. Dübendorf, CH.
Type: Separate publication
Source: CD-ROM
First author: Doka G.
Year: 2007
Title of anthology: Final report ecoinvent data v2.0
Place of publication: Dübendorf, CH
Publisher: Swiss Centre for LCI, Empa - TSL
Volume No: 13

## Validation
Proof reading validation: automatic validation; Other validation: none;
