# xxx Electricity, photovoltaic, at 3kWp slanted-roof , pc-Si, future

Dataset: EcoSpold 1, unit process
Functional unit: 1 kWh
Category: energy, obsolete / others, obsolete
Geography: CH
Generated by: default
accessRestrictedTo: 0
copyright: true

## General comment
This process was included in version 1 of the ecoinvent database but was obsolete in version 2. For compatibility reasons a dummy process is included in version 2 of the SimaPro ecoinvent process libraries. Please exchange this process for a similar process from the most recent ecoinvent library.

Record: PRé Consultants, the Netherlands, V. Cleij

Generator: PRé Consultants, the Netherlands, V. Cl

## Reference product
- xxx Electricity, photovoltaic, at 3kWp slanted-roof , pc-Si, future [CH]: 1 kWh
  This process was included in version 1 of the ecoinvent database but was obsolete in version 2. For compatibility reasons a dummy process is included in version 2 of the SimaPro ecoinvent process libraries.

## Sources
- Created for EcoSpold 1 compatibility, Project reports, 401
Itten, R., Frischknecht, R. (2012) Life Cycle Inventories of electricity mixes. Project reports. Volume: 401. ESU-services Ltd.. Uster, CH.
Type: Separate publication
First author: Itten, R.
Other authors: Frischknecht, R.
Year: 2012
Title of anthology: Project reports
Place of publication: Uster, CH
Publisher: ESU-services Ltd.
Volume No: 401
