# Electricity, low voltage, production from hydro power, at grid

Dataset: EcoSpold 1, unit process
Functional unit: 1 kWh
Category: energy supply, kbob recommendation / electricity, delivered via network
Geography: CH
Time period: 2004-01 to 2004-12
Share of production covered: 100 %
Generated by: Philippe Stolz
accessRestrictedTo: 0
copyright: true

## General comment
This dataset describes the transformation from medium to low voltage as well as the distribution of electricity at low voltage.;

## Included processes
Included are the hydropower electricity production in Switzerland, the transmission network as well as direct SF6-emissions to air. Electricity losses during low-voltage transmission and transformation from medium-voltage are accounted for.

## Geography
Data apply to public and self producers. Geographical classification according to IEA. Assumptions for transmission network, losses and emissions are based on UTCE data.

## Technology
Average technology used to distribute electricity. Includes underground and overhead lines, as well as air- and SF6-insulated medium-to-low voltage switching stations. Electricity production according to related datasets

## Time period
Time of publications.

## Reference product
- Electricity, low voltage, production from hydro power, at grid [CH]: 1 kWh
  SWITZERLAND

## Inputs from technosphere
- Electricity, medium voltage, production from hydro power, at grid [CH]: 1.0604 kWh; lognormal SD95 1.3117
  (2,3,1,1,3,5,BU:1.05); specific losses of network estimated based on statistics
- Distribution network, electricity, low voltage [CH]: 8.7405e-8 km; lognormal SD95 3.0611
  (2,4,1,1,1,5,BU:3); based on consumption statistics
- Sulphur hexafluoride, liquid, at plant [RER]: 2.7965e-9 kg; lognormal SD95 1.3117
  (2,3,1,1,3,5,BU:1.05); based on emission data

## Emissions to nature
- Heat, waste [emissions to soil, unspecified]: 0.16295 MJ; lognormal SD95 1.2423
  (2,4,1,1,1,5,BU:1.05); estimations based on losses
- Heat, waste [emissions to air, unspecified]: 0.054318 MJ; lognormal SD95 1.2423
  (2,4,1,1,1,5,BU:1.05); estimations based on losses
- Sulfur hexafluoride [emissions to air, unspecified]: 2.7965e-9 kg; lognormal SD95 1.6249
  (2,3,1,1,3,5,BU:1.5); national statistics

## Sampling procedure
Statistical data

## Sources
- Stolz P., Frischknecht R., 2015, 2015 - LCA electricity mix Switzerland 2011 - Stolz, Project reports, 537, treeze Ltd., Uster, CH
Stolz, P., Frischknecht, R. (2015) Umweltbilanz Strommix Schweiz 2011: Hydropower mix. Project reports. Volume: 537. treeze Ltd.. Uster, CH.
Type: Separate publication
First author: Stolz, P.
Other authors: Frischknecht, R.
Year: 2015
Title of anthology: Project reports
Place of publication: Uster, CH
Publisher: treeze Ltd.
Volume No: 537

## Validation
Proof reading validation: automatic validation in Excel; Other validation: \\SRV01\ESU-Docs\Projekte laufend\563 Aktualisierung KBOB_2016\EcoSpold\[563-Hydropower-CH-v0.1.xlsx]X-Process;
