# Cotton seed, at farm

Dataset: EcoSpold 1, unit process
Functional unit: 1 kg
Category: agricultural / plant production\seeds
Geography: US
Time period: 2005-01 to 2005-12
Production volume: US average prod of cotton 4'516'365t in 2001-2006.
Share of production covered: 100 %
Generated by: Thomas Kaegi
accessRestrictedTo: 0
copyright: true

## General comment
Inventory refers to the production of 1 kg cotton fibre respectively cottonseed, both with a moisture content of 6%. Fresh matter yield at 6% moisture: 775 kg/ha cotton fibre and 1144 kg/ha cottonseed. The multioutput-process 'cotton, at farm' delivers the co-products 'cotton fibre, at farm' and 'cottonseed, at farm'. Economic allocation with allocation factor of 87.2% to fibre (exceptions see report).;

## Included processes
The inventory includes the processes of soil cultivation, sowing, weed control, fertilisation, pest and pathogen control, irrigation, harvest and ginning. Machine infrastructure and a shed for machine sheltering is included. Inputs of fertilisers, pesticides and seed as well as their transports to the farm are considered. The direct emissions on the field are also included. The system boundary is at the farm gate. Raw cotton is separated into cotton fibres and cottonseed.

## Geography
Refers to an average production in the USA

## Technology
Conventional production typical for the country. Water for irrigation is pumped from 48 meter depth by electric pumps.

## Time period
The yield data have been collected for the years 2001-2006.

## Reference product
- Cotton seed, at farm [US]: 1 kg
  UNITED STATES

## Inputs from technosphere
- Diammonium phosphate, as P2O5, at regional storehouse [RER]: 0.0062338 kg; lognormal SD95 1.0744
  (2,2,1,1,1,na)
- Tillage, harrowing, by spring tine harrow [CH]: 0.00044583 ha; lognormal SD95 1.0744
  (2,1,1,3,1,na)
- Fertilising, by broadcaster [CH]: 0.00033437 ha; lognormal SD95 1.0744
  (2,1,1,3,1,na)
- Diuron, at regional storehouse [CH]: 1.3643e-5 kg; lognormal SD95 1.0714
  (2,1,1,1,1,na)
- Baling [CH]: 0.0013371 p; lognormal SD95 1.0744
  (2,1,1,3,1,na)
- Acetamide-anillide-compounds, at regional storehouse [CH]: 3.8781e-6 kg; lognormal SD95 1.0714
  (2,1,1,1,1,na)
- Triazine-compounds, at regional storehouse [CH]: 9.1235e-6 kg; lognormal SD95 1.0714
  (2,1,1,1,1,na)
- Linuron, at regional storehouse [CH]: 4.1765e-7 kg; lognormal SD95 1.0714
  (2,1,1,1,1,na)
- Dicamba, at regional storehouse [CH]: 4.972e-8 kg; lognormal SD95 1.0714
  (2,1,1,1,1,na)
- Tillage, harrowing, by rotary harrow [CH]: 0.00011146 ha; lognormal SD95 1.0744
  (2,1,1,3,1,na)
- [thio]carbamate-compounds, at regional storehouse [CH]: 4.8726e-7 kg; lognormal SD95 1.0714
  (2,1,1,1,1,na)
- Bipyridylium-compounds, at regional storehouse [CH]: 4.9223e-6 kg; lognormal SD95 1.0714
  (2,1,1,1,1,na)
- Tillage, cultivating, chiselling [CH]: 0.00011146 ha; lognormal SD95 1.0744
  (2,1,1,3,1,na)
- Cyclic N-compounds, at regional storehouse [CH]: 5.4692e-8 kg; lognormal SD95 1.0714
  (2,1,1,1,1,na)
- Mulching [CH]: 0.00011146 ha; lognormal SD95 1.0744
  (2,1,1,3,1,na)
- Benzo[thia]diazole-compounds, at regional storehouse [CH]: 2.5457e-6 kg; lognormal SD95 1.0714
  (2,1,1,1,1,na)
- Organophosphorus-compounds, at regional storehouse [CH]: 0.00013404 kg; lognormal SD95 1.0714
  (2,1,1,1,1,na)
- Phenoxy-compounds, at regional storehouse [CH]: 3.5351e-6 kg; lognormal SD95 1.0714
  (2,1,1,1,1,na)
- Ammonium nitrate, as N, at regional storehouse [RER]: 0.002651 kg; lognormal SD95 1.0744
  (2,2,1,1,1,na)
- Diammonium phosphate, as N, at regional storehouse [RER]: 0.0024393 kg; lognormal SD95 1.0744
  (2,2,1,1,1,na)
- Potassium chloride, as K2O, at regional storehouse [RER]: 0.0099567 kg; lognormal SD95 1.0744
  (2,2,1,1,1,na)
- Grain drying, high temperature [CH]: 0.019639 kg; lognormal SD95 1.0744
  (2,2,1,1,1,na)
- Sowing [CH]: 0.00011146 ha; lognormal SD95 1.0744
  (2,1,1,3,1,na)
- Irrigating [US]: 0.14556 m3; lognormal SD95 1.0714
  (2,1,1,1,1,na)
- Application of plant protection products, by field sprayer [CH]: 0.0015441 ha; lognormal SD95 1.0744
  (2,1,1,3,1,na)
- Urea, as N, at regional storehouse [RER]: 0.0019197 kg; lognormal SD95 1.0744
  (2,2,1,1,1,na)
- Dinitroaniline-compounds, at regional storehouse [CH]: 4.6707e-5 kg; lognormal SD95 1.0714
  (2,1,1,1,1,na)
- [sulfonyl]urea-compounds, at regional storehouse [CH]: 6.1752e-6 kg; lognormal SD95 1.0714
  (2,1,1,1,1,na)
- Pyretroid-compounds, at regional storehouse [CH]: 1.0143e-6 kg; lognormal SD95 1.0714
  (2,1,1,1,1,na)
- Pesticide unspecified, at regional storehouse [CH]: 6.7557e-5 kg; lognormal SD95 1.0714
  (2,1,1,1,1,na)
- Glyphosate, at regional storehouse [CH]: 0.00011789 kg; lognormal SD95 1.0714
  (2,1,1,1,1,na)
- Combine harvesting [CH]: 0.00010043 ha; lognormal SD95 1.0744
  (2,1,1,3,1,na)
- Nitrile-compounds, at regional storehouse [CH]: 1.6905e-7 kg; lognormal SD95 1.0714
  (2,1,1,1,1,na)
- Transport, freight, lorry, fleet average [RER]: 0.0032696 tkm; lognormal SD95 2.095
  (4,5,na,na,na,na)
- Cotton seed, at regional storehouse [US]: 0.001624 kg; lognormal SD95 1.0744
  (2,2,1,1,1,na)
- Ammonia, liquid, at regional storehouse [RER]: 0.0055501 kg; lognormal SD95 1.0744
  (2,2,1,1,1,na)

## Inputs from nature
- Transformation, from annual crop [resources, land]: 1.11457 m2; lognormal SD95 2.0034
  (2,1,1,1,1,na)
- Energy, gross calorific value, in biomass [resources, biotic]: 23.301 MJ; lognormal SD95 1.0714
  (2,1,1,1,1,na)
- Occupation, annual crop [resources, land]: 1.11457 m2a; lognormal SD95 2.0034
  (2,1,1,1,1,na)
- Transformation, to annual crop [resources, land]: 1.11457 m2; lognormal SD95 2.0034
  (2,1,1,1,1,na)
- Carbon dioxide, in air [resources, in air]: 2.66365 kg; lognormal SD95 1.0714
  (2,1,1,1,1,na)

## Emissions to nature
- Phosphorus [emissions to water, river]: 0.00021632 kg; lognormal SD95 1.5051
  (2,2,1,1,1,na)
- Norflurazon [emissions to soil, agricultural]: 8.4523e-8 kg; lognormal SD95 1.2077
  (2,1,1,1,1,na)
- Indoxacarb [emissions to soil, agricultural]: 2.3865e-7 kg; lognormal SD95 1.2077
  (2,1,1,1,1,na)
- Parathion [emissions to soil, agricultural]: 1.233e-6 kg; lognormal SD95 1.2077
  (2,1,1,1,1,na)
- Clomazone [emissions to soil, agricultural]: 5.4692e-8 kg; lognormal SD95 1.2077
  (2,1,1,1,1,na)
- Chlorpyrifos [emissions to soil, agricultural]: 1.9093e-6 kg; lognormal SD95 1.2077
  (2,1,1,1,1,na)
- Cyclanilide [emissions to soil, agricultural]: 1.422e-6 kg; lognormal SD95 1.2077
  (2,1,1,1,1,na)
- Tebufenozide [emissions to soil, agricultural]: 3.729e-8 kg; lognormal SD95 1.2077
  (2,1,1,1,1,na)
- Iprodione [emissions to soil, agricultural]: 3.9776e-8 kg; lognormal SD95 1.2077
  (2,1,1,1,1,na)
- Bromoxynil [emissions to soil, agricultural]: 1.6905e-7 kg; lognormal SD95 1.2077
  (2,1,1,1,1,na)
- Lead [emissions to water, groundwater]: 6.7225e-8 kg; lognormal SD95 1.8181
  (2,2,1,5,1,na)
- Dicamba [emissions to soil, agricultural]: 4.972e-8 kg; lognormal SD95 1.2077
  (2,1,1,1,1,na)
- Malathion [emissions to soil, agricultural]: 4.6488e-5 kg; lognormal SD95 1.2077
  (2,1,1,1,1,na)
- Fenpropathrin [emissions to soil, agricultural]: 7.9551e-8 kg; lognormal SD95 1.2077
  (2,1,1,1,1,na)
- Benzene, pentachloronitro- [emissions to soil, agricultural]: 1.7103e-6 kg; lognormal SD95 1.2077
  (2,1,1,1,1,na)
- Methomyl [emissions to soil, agricultural]: 8.9495e-8 kg; lognormal SD95 1.2077
  (2,1,1,1,1,na)
- 2,4-D [emissions to soil, agricultural]: 3.0627e-6 kg; lognormal SD95 1.2077
  (2,1,1,1,1,na)
- Permethrin [emissions to soil, agricultural]: 1.7402e-8 kg; lognormal SD95 1.2077
  (2,1,1,1,1,na)
- Naled [emissions to soil, agricultural]: 2.1877e-7 kg; lognormal SD95 1.2077
  (2,1,1,1,1,na)
- Bifenthrin [emissions to soil, agricultural]: 1.7402e-8 kg; lognormal SD95 1.2077
  (2,1,1,1,1,na)
- Dicrotophos [emissions to soil, agricultural]: 6.563e-6 kg; lognormal SD95 1.2077
  (2,1,1,1,1,na)
- Deltamethrin [emissions to soil, agricultural]: 2.9831e-8 kg; lognormal SD95 1.2077
  (2,1,1,1,1,na)
- Paraquat [emissions to soil, agricultural]: 4.9223e-6 kg; lognormal SD95 1.2077
  (2,1,1,1,1,na)
- Phosphate [emissions to water, river]: 0.0002923 kg; lognormal SD95 1.5217
  (2,2,1,5,1,na)
- Etridiazole [emissions to soil, agricultural]: 3.5798e-7 kg; lognormal SD95 1.2077
  (2,1,1,1,1,na)
- Abamectin [emissions to soil, agricultural]: 2.0883e-8 kg; lognormal SD95 1.2077
  (2,1,1,1,1,na)
- Fluometuron [emissions to soil, agricultural]: 6.1254e-6 kg; lognormal SD95 1.2077
  (2,1,1,1,1,na)
- Endosulfan [emissions to soil, agricultural]: 7.5574e-7 kg; lognormal SD95 1.2077
  (2,1,1,1,1,na)
- Lambda-cyhalothrin [emissions to soil, agricultural]: 3.2815e-7 kg; lognormal SD95 1.2077
  (2,1,1,1,1,na)
- Lactofen [emissions to soil, agricultural]: 3.729e-8 kg; lognormal SD95 1.2077
  (2,1,1,1,1,na)
- Metolachlor [emissions to soil, agricultural]: 3.8781e-6 kg; lognormal SD95 1.2077
  (2,1,1,1,1,na)
- Nickel [emissions to soil, agricultural]: -3.3003e-5 kg; lognormal SD95 1.5217
  (2,2,1,5,1,na)
- Phosphate [emissions to water, groundwater]: 7.802e-6 kg; lognormal SD95 1.5217
  (2,2,1,5,1,na)
- Zinc [emissions to soil, agricultural]: -2.521e-5 kg; lognormal SD95 1.5217
  (2,2,1,5,1,na)
- Cadmium [emissions to water, groundwater]: 2.2181e-8 kg; lognormal SD95 1.8181
  (2,2,1,5,1,na)
- Thidiazuron [emissions to soil, agricultural]: 2.5457e-6 kg; lognormal SD95 1.2077
  (2,1,1,1,1,na)
- Azoxystrobin [emissions to soil, agricultural]: 1.591e-7 kg; lognormal SD95 1.2077
  (2,1,1,1,1,na)
- Copper [emissions to water, groundwater]: 1.5564e-6 kg; lognormal SD95 1.8181
  (2,2,1,5,1,na)
- Trifluralin [emissions to soil, agricultural]: 3.2189e-5 kg; lognormal SD95 1.2077
  (2,1,1,1,1,na)
- Phorate [emissions to soil, agricultural]: 2.5855e-6 kg; lognormal SD95 1.2077
  (2,1,1,1,1,na)
- Lead [emissions to water, river]: 1.0566e-5 kg; lognormal SD95 1.8181
  (2,2,1,5,1,na)
- Copper [emissions to water, river]: 4.2026e-5 kg; lognormal SD95 1.8181
  (2,2,1,5,1,na)
- Pyrithiobac sodium salt [emissions to soil, agricultural]: 9.5462e-7 kg; lognormal SD95 1.2077
  (2,1,1,1,1,na)
- Mepiquat chloride [emissions to soil, agricultural]: 3.0429e-6 kg; lognormal SD95 1.2077
  (2,1,1,1,1,na)
- Dinitrogen monoxide [emissions to air, low. pop.]: 0.00030368 kg; lognormal SD95 1.4057
  (2,2,1,1,1,na)
- Profenofos [emissions to soil, agricultural]: 1.3723e-6 kg; lognormal SD95 1.2077
  (2,1,1,1,1,na)
- Zinc [emissions to water, river]: 5.7864e-5 kg; lognormal SD95 1.8181
  (2,2,1,5,1,na)
- Esfenvalerate [emissions to soil, agricultural]: 2.9831e-8 kg; lognormal SD95 1.2077
  (2,1,1,1,1,na)
- Dicofol [emissions to soil, agricultural]: 2.4114e-7 kg; lognormal SD95 1.2077
  (2,1,1,1,1,na)
- Buprofezin [emissions to soil, agricultural]: 7.9551e-8 kg; lognormal SD95 1.2077
  (2,1,1,1,1,na)
- Chromium [emissions to soil, agricultural]: -4.2057e-5 kg; lognormal SD95 1.5217
  (2,2,1,5,1,na)
- Glyphosate [emissions to soil, agricultural]: 0.00011789 kg; lognormal SD95 1.2077
  (2,1,1,1,1,na)
- Thifensulfuron-methyl [emissions to soil, agricultural]: 4.972e-8 kg; lognormal SD95 1.2077
  (2,1,1,1,1,na)
- Arsenic [emissions to soil, agricultural]: 2.4362e-7 kg; lognormal SD95 1.2077
  (2,1,1,1,1,na)
- Copper [emissions to soil, agricultural]: -3.7482e-5 kg; lognormal SD95 1.5217
  (2,2,1,5,1,na)
- Tralomethrin [emissions to soil, agricultural]: 2.9831e-8 kg; lognormal SD95 1.2077
  (2,1,1,1,1,na)
- Carbon dioxide, fossil [emissions to air, low. pop.]: 0.0030139 kg; lognormal SD95 1.0744
  (2,2,1,1,1,na)
- Nitrogen oxides [emissions to air, low. pop.]: 6.3771e-5 kg; lognormal SD95 1.4057
  (2,2,1,1,1,na)
- Pyriproxyfen [emissions to soil, agricultural]: 1.243e-8 kg; lognormal SD95 1.2077
  (2,1,1,1,1,na)
- Zinc [emissions to water, groundwater]: 7.9609e-6 kg; lognormal SD95 1.8181
  (2,2,1,5,1,na)
- Propargite [emissions to soil, agricultural]: 3.5052e-7 kg; lognormal SD95 1.2077
  (2,1,1,1,1,na)
- Carbofuran [emissions to soil, agricultural]: 1.591e-7 kg; lognormal SD95 1.2077
  (2,1,1,1,1,na)
- Sodium chlorate [emissions to air, high. pop.]: 1.0441e-5 kg; lognormal SD95 1.2077
  (2,1,1,1,1,na)
- Cyfluthrin [emissions to soil, agricultural]: 5.3698e-7 kg; lognormal SD95 1.2077
  (2,1,1,1,1,na)
- Prometryn [emissions to soil, agricultural]: 8.9695e-6 kg; lognormal SD95 1.2077
  (2,1,1,1,1,na)
- Chromium [emissions to water, river]: 5.6353e-5 kg; lognormal SD95 1.8181
  (2,2,1,5,1,na)
- Cypermethrin [emissions to soil, agricultural]: 9.8445e-7 kg; lognormal SD95 1.2077
  (2,1,1,1,1,na)
- Disodium acid methane arsenate [emissions to soil, agricultural]: 3.6793e-7 kg; lognormal SD95 1.2077
  (2,1,1,1,1,na)
- Tribufos [emissions to soil, agricultural]: 1.8794e-5 kg; lognormal SD95 1.2077
  (2,1,1,1,1,na)
- Ammonia [emissions to air, low. pop.]: 0.00071279 kg; lognormal SD95 1.209
  (2,2,1,1,1,na)
- Methamidophos [emissions to soil, agricultural]: 2.9831e-8 kg; lognormal SD95 1.2077
  (2,1,1,1,1,na)
- Diuron [emissions to soil, agricultural]: 1.3643e-5 kg; lognormal SD95 1.2077
  (2,1,1,1,1,na)
- Nickel [emissions to water, river]: 3.8769e-5 kg; lognormal SD95 1.8181
  (2,2,1,5,1,na)
- Chromium [emissions to water, groundwater]: 1.0251e-5 kg; lognormal SD95 1.8181
  (2,2,1,5,1,na)
- Linuron [emissions to soil, agricultural]: 4.1765e-7 kg; lognormal SD95 1.2077
  (2,1,1,1,1,na)
- Acephate [emissions to soil, agricultural]: 1.9905e-5 kg; lognormal SD95 1.2077
  (2,1,1,1,1,na)
- Cyanazine [emissions to soil, agricultural]: 1.5413e-7 kg; lognormal SD95 1.2077
  (2,1,1,1,1,na)
- Nitrate [emissions to water, groundwater]: 0.00311 kg; lognormal SD95 1.5051
  (2,2,1,1,1,na)
- Ethephon [emissions to soil, agricultural]: 5.4692e-5 kg; lognormal SD95 1.2077
  (2,1,1,1,1,na)
- Aldicarb [emissions to soil, agricultural]: 1.5413e-5 kg; lognormal SD95 1.2077
  (2,1,1,1,1,na)
- Oxamyl [emissions to soil, agricultural]: 9.5462e-7 kg; lognormal SD95 1.2077
  (2,1,1,1,1,na)
- Dimethoate [emissions to soil, agricultural]: 8.4523e-8 kg; lognormal SD95 1.2077
  (2,1,1,1,1,na)
- Carboxin [emissions to soil, agricultural]: 7.4579e-9 kg; lognormal SD95 1.2077
  (2,1,1,1,1,na)
- Oils, unspecified [emissions to soil, agricultural]: 1.6159e-7 kg; lognormal SD95 1.2077
  (2,1,1,1,1,na)
- Spinosad [emissions to soil, agricultural]: 1.2927e-7 kg; lognormal SD95 1.2077
  (2,1,1,1,1,na)
- Endothall [emissions to soil, agricultural]: 1.9888e-8 kg; lognormal SD95 1.2077
  (2,1,1,1,1,na)
- Dimethipin [emissions to soil, agricultural]: 9.944e-8 kg; lognormal SD95 1.2077
  (2,1,1,1,1,na)
- Thiamethoxam [emissions to soil, agricultural]: 3.4803e-7 kg; lognormal SD95 1.2077
  (2,1,1,1,1,na)
- Metalaxil [emissions to soil, agricultural]: 1.3922e-7 kg; lognormal SD95 1.2077
  (2,1,1,1,1,na)
- Disulfoton [emissions to soil, agricultural]: 1.4916e-7 kg; lognormal SD95 1.2077
  (2,1,1,1,1,na)
- Monosodium acid methanearsonate [emissions to soil, agricultural]: 8.9794e-6 kg; lognormal SD95 1.2077
  (2,1,1,1,1,na)
- Pendimethalin [emissions to soil, agricultural]: 1.4518e-5 kg; lognormal SD95 1.2077
  (2,1,1,1,1,na)
- Cadmium [emissions to soil, agricultural]: 1.5542e-6 kg; lognormal SD95 1.5217
  (2,2,1,5,1,na)
- Imidacloprid [emissions to soil, agricultural]: 1.4916e-7 kg; lognormal SD95 1.2077
  (2,1,1,1,1,na)
- Carfentrazone-ethyl [emissions to soil, agricultural]: 2.0883e-7 kg; lognormal SD95 1.2077
  (2,1,1,1,1,na)
- Clethodim [emissions to soil, agricultural]: 3.2318e-8 kg; lognormal SD95 1.2077
  (2,1,1,1,1,na)
- Cadmium [emissions to water, river]: 5.1487e-7 kg; lognormal SD95 1.8181
  (2,2,1,5,1,na)
- Lead [emissions to soil, agricultural]: -7.9635e-6 kg; lognormal SD95 1.5217
  (2,2,1,5,1,na)

## Sampling procedure
Data come from the NREL database and from varoius U.S database. Data were compiled from statistics, literature, farm survey reports, documents from extension services, and expert knowledge.

## Sources
- Nemecek T., Kaegi T., 2007, 2007 - LCI agricultural prod. systems - Nemecek, Ecoinvent report version 2.0, 15, Swiss Centre for LCI, ART, Duebendorf and Zuerich, CH
Nemecek, T., Kägi, T., Blaser, S. (2007) Life Cycle Inventories of Agricultural Production Systems. Ecoinvent report version 2.0. Editors: 0. Volume: 15. Swiss Centre for LCI, ART. Duebendorf and Zurich, CH.
Type: Measurement on site
Source: CD-ROM
First author: Nemecek, T.
Other authors: Kägi, T., Blaser, S.
Year: 2007
Name of editors: 0
Title of anthology: Ecoinvent report version 2.0
Place of publication: Duebendorf and Zurich, CH
Publisher: Swiss Centre for LCI, ART
Volume No: 15

## Validation
Proof reading validation: automatic validation in Excel; Other validation: none;
