# Manufacturing, wet green mortar, per kg mortar

Dataset: EcoSpold 1, unit process
Functional unit: 1 kg
Category: construction materials / plaster
Geography: CH
Time period: 2000-01 to 2016-12
Generated by: Daniel Savi
accessRestrictedTo: 0
copyright: true

## General comment
Herstellungsaufwand Frischmörtel, pro kg Mörtel
Version: 0.0

Local category: construction materials
Local subcategory: Putze

## Reference product
- Manufacturing, wet green mortar, per kg mortar [CH]: 1 kg
  SWITZERLAND

## Inputs from technosphere
- Lubricating oil, at plant [RER]: 2.46e-6 kg; lognormal SD95 1.10306
- Industrial machine, heavy, unspecified, at plant [RER]: 0.00055 kg; lognormal SD95 1.30007
  (4;5;1;1;1)
- Electricity, medium voltage, at grid [CH]: 0.013 kWh; lognormal SD95 1.10306
  (2;3;1;2;2)

## Sources
- Kasser U., R. Frischknecht, M. Klingler, D. Savi, R. Itten, F. Wyss,P. Stolz, L. Tschuemperlin, 2016, 2016 - Renewal and exp. of LCA data in KBOB - Kasser, -, Buero fuer Umweltchemie, treeze Ltd., Zuerich and Uster, CH
U. Kasser, R. Frischknecht, M. Klingler, D. Savi, R. Itten, F. Wyss,P. Stolz, L. Tschümperlin 2016 (2015Z) Erneuerung und Erweiterung der Ökobilanzdaten in der KBOB-Liste "Ökobilanzdaten im Baubereich", Projekt QualiBOB. unknown.

First author: U. Kasser, R. Frischknecht, M. Klingler, D. Savi, R. Itten, F. Wyss,P. Stolz, L. Tschümperlin 2016
Year: 2015Z
Place of publication: unknown
Original title: Erneuerung und Erweiterung der Ökobilanzdaten in der KBOB-Liste "Ökobilanzdaten im Baubereich", Projekt QualiBOB
