# Disposal, EI 90 fire insulation, 100mm, 120kg/m3, reinforced alumium foil

Dataset: EcoSpold 1, unit process
Functional unit: 1 m2
Category: waste management / building demolition
Geography: CH
Time period: 2014-01 to 2014-12
Generated by: Alex Primas
accessRestrictedTo: 0
copyright: true

## General comment
Disposal of a insulation for fire protection of ventilation duct, made of 120 kg/m3 rock wool, for fire class EI 90, insulation thickness 100 mm, total weight: 13.7 kg/m2. Including cover with a reinforced aluminium facing and stainless steel wire mesh. Reference value of inventory is m2 area of duct surface.;

## Included processes
Transport to dismantling facilities, machines for handling in sorting plant, electricity demand for sorting plant, final disposal of waste material. Cut-off to recycling for metals.

## Geography
Specific to the technology mix encountered in sorting plants in Switzerland.

## Technology
Disposal to a sorting plant assumed. Metal pieces, copper in cables and electronic devices are recycled, plastic parts are incinerated, inert wastes (e.g. rock wool) are landfilled.

## Time period
Amount of material investigated in 2013. Disposal technology mix as used in late 1990ies

## Reference product
- Disposal, EI 90 fire insulation, 100mm, 120kg/m3, reinforced alumium foil [CH]: 1 m2
  SWITZERLAND

## Inputs from technosphere
- Disposal, building, bulk iron (excluding reinforcement), to sorting plant [CH]: 0.488 kg; lognormal SD95 1.26
  (3,4,1,1,1,5); Data related to production process
- Disposal, building, PE sealing sheet, to final disposal [CH]: 0.054 kg; lognormal SD95 1.26
  (3,4,1,1,1,5); Data related to production process
- Disposal, building, mineral wool, to sorting plant [CH]: 13.2 kg; lognormal SD95 1.22
  (2,3,1,1,1,5); Data related to production process

## Sampling procedure
Waste-specific calculation based on production input data

## Sources
- Klingler M., Kasser U., Savi D., Primas A., Stettler Y., Gujer P., 2014, 2014 - LCA ventilation and heating systems - Klingler, Schlussbericht, BFE, Buero fuer Umweltchemie, B&H AG, Zuerich, CH
Klingler M., Kasser U., Savi D., Primas A., Stettler Y., Gujer P. (2014) Ökobilanzdaten für Lüftungs- und Wärmeanlagen. Schlussbericht, BFE. Bundesamt für Energie (BFE). Bern.
Type: Separate publication
Source: Report
First author: Klingler M.
Other authors: Kasser U., Savi D., Primas A., Stettler Y., Gujer P.
Year: 2014
Title of anthology: Schlussbericht, BFE
Place of publication: Bern
Publisher: Bundesamt für Energie (BFE)
