# Plastic tunnel, type almeria

Dataset: EcoSpold 1, unit process, infrastructure
Functional unit: 1 m2a
Category: agricultural / agricultural means of production\buildings
Geography: ES
Time period: 2020-01 to 2020-12
Generated by: Melina Glimmann
accessRestrictedTo: 0
copyright: true

## General comment
This dataset represents the production and dismantling of 1 m2a of plastic tunnel type Almeria used for agricultural production.

## Geography
The inventory is modelled for Spain

## Reference product
- Plastic tunnel, type almeria [ES]: 1 m2a

## Inputs from technosphere
- Injection moulding [RER]: 0.0985 kg; lognormal SD95 1.218
  (2,3,3,3,1,5,BU:1.05); ;
- Polyethylene, HDPE, granulate, at plant [RER]: 0.0505 kg; lognormal SD95 1.218
  (2,3,3,3,1,5,BU:1.05); ;
- Tractor, production [CH]: 0.0215 kg; lognormal SD95 3.04991
  (2,3,3,3,1,5,BU:1.05); ;
- Wire drawing, copper [RER]: 0.0057 kg; lognormal SD95 1.218
  (2,3,3,3,1,5,BU:1.05); ;
- Sheet rolling, steel [RER]: 0.4155 kg; lognormal SD95 1.218
  (2,3,3,3,1,5,BU:1.05); ;
- Steel, low-alloyed, at plant [RER]: 0.41 kg; lognormal SD95 1.218
  (2,3,3,3,1,5,BU:1.05); ;
- Extrusion, plastic film [RER]: 0.17572 kg; lognormal SD95 1.218
  (2,3,3,3,1,5,BU:1.05); ;
- Polypropylene, granulate, at plant [RER]: 0.048 kg; lognormal SD95 1.218
  (2,3,3,3,1,5,BU:1.05); ;
- Disposal, polypropylene, 15.9% water, to municipal incineration [CH]: 0.048 kg; lognormal SD95 1.218
  (2,3,3,3,1,5,BU:1.05); ;
- Concrete, normal, at plant [CH]: 0.00062 m3; lognormal SD95 1.218
  (2,3,3,3,1,5,BU:1.05); ;
- Polyethylene, LDPE, granulate, at plant [RER]: 0.1435 kg; lognormal SD95 1.218
  (2,3,3,3,1,5,BU:1.05); ;
- Disposal, polyethylene, 0.4% water, to municipal incineration [CH]: 0.194 kg; lognormal SD95 1.218
  (2,3,3,3,1,5,BU:1.05); ;
- Zinc, primary, at regional storage [RER]: 0.02325 kg; lognormal SD95 1.218
  (2,3,3,3,1,5,BU:1.05); ;
- Polyvinylchloride, at regional storage [RER]: 0.0279 kg; lognormal SD95 1.218
  (2,3,3,3,1,5,BU:1.05); ;
- Disposal, polyvinylchloride, 0.2% water, to municipal incineration [CH]: 0.0279 kg; lognormal SD95 1.218
  (2,3,3,3,1,5,BU:1.05); ;

## Sampling procedure
Literature

## Extrapolations
This dataset has been extrapolated from the year 2014 to the year 2020. The uncertainty has been adjusted accordingly.

## Sources
- Kaegi T., Glimmann M., Conte F., Roberts G., 2021, 2021 - LCA tomatoes and green beans production - Kaegi, Carbotech on behalf of BAFU, Carbotech AG, Zuerich, CH

## Validation
21.01.2022 \\tsclient\Schreibtisch\WinShare\BAFU Gemuese\2022-01-21\[EcoSpold_Bafu_Gemuese_Plastic tunnel ES v1.xlsx]X-Process
