# Operation, freight train

Dataset: EcoSpold 1, unit process
Functional unit: 1 tkm
Category: transport systems / train\operations
Geography: BE
Time period: 1995-01 to 2007-12
Production volume: 9357 Mio. tkm in 2007 in Belgium
Share of production covered: 100 %
Generated by: Michael Spielmann
accessRestrictedTo: 0
copyright: true

## General comment
Average data for the operation of goods transportation by rail in Belgium. The data has been determined top down, by combining the total yearly energy consumption and the yearly tkm-performance of goods transportation.;

## Included processes
The inventory includes the actual energy consumption for an average goods train (1289Gt) in Belgium using electro and diesel energy. In addition the diesel consumption and emissions of shunting processes are accounted for.

## Geography
Data refers to average goods transport conditions in Belgium, some extrapolation from switzerland has been made: diesel consumption for shunting, particle matters from abrasion processes

## Technology
diesel and electric traction, diesel traction for shunting

## Time period
Data for emission indices for shunting is based on figures of 1995, specific energy consumption per tkm is from 2011

## Reference product
- Operation, freight train [BE]: 1 tkm
  BELGIUM

## Inputs from technosphere
- Diesel, at regional storage [RER]: 0.0036724 kg; lognormal SD95 1.09
  (2,3,1,3,1,1); International Rail study
- Electricity, high voltage, at grid [BE]: 0.072303 kWh; lognormal SD95 1.09
  (2,3,1,3,1,1); International Rail study

## Emissions to nature
- Particulates, > 2.5 um, and < 10um [emissions to air, unspecified]: 7.0658e-6 kg; lognormal SD95 2.02
  (3,3,1,3,1,1); own calculation base on PM figures of int. Rail study
- Ammonia [emissions to air, unspecified]: 7.3231e-8 kg; lognormal SD95 1.57
  (2,3,1,3,3,1); International Rail study
- Mercury [emissions to air, unspecified]: 7.3231e-14 kg; lognormal SD95 5.1
  (4,5,1,2,1,1); expert estimate quoted from literature
- Sulfur hexafluoride [emissions to air, unspecified]: 3.1813e-9 kg; lognormal SD95 1.63
  (3,5,1,2,3,1); literature
- Sulfur dioxide [emissions to air, unspecified]: 2.2024e-6 kg; lognormal SD95 1.09
  (2,3,1,3,1,1); European railway study
- Zinc [emissions to air, unspecified]: 3.6724e-9 kg; lognormal SD95 5.1
  (4,5,1,2,1,1); expert estimate quoted from literature
- Nitrogen oxides [emissions to air, unspecified]: 0.00020179 kg; lognormal SD95 1.51
  (2,3,1,3,1,1); International Rail study
- Iron [emissions to soil, unspecified]: 1.7786e-5 kg; lognormal SD95 3
  (-,-,-,-,-,1); own calculation based on literature
- Particulates, < 2.5 um [emissions to air, unspecified]: 4.7116e-6 kg; lognormal SD95 3.02
  (3,3,1,3,1,1); own calculation base on PM figures of int. Rail study
- Carbon dioxide, fossil [emissions to air, unspecified]: 0.011554 kg; lognormal SD95 1.09
  (2,3,1,3,1,1); International Rail study
- Particulates, > 10 um [emissions to air, unspecified]: 1.5964e-5 kg; lognormal SD95 1.52
  (3,3,1,3,1,1); own calculation base on PM figures of int. Rail study
- Lead [emissions to air, unspecified]: 4.0413e-13 kg; lognormal SD95 5.1
  (4,5,1,2,1,1); expert estimate quoted from literature
- Chromium [emissions to air, unspecified]: 1.8389e-10 kg; lognormal SD95 5.1
  (4,5,1,2,1,1); expert estimate quoted from literature
- NMVOC, non-methane volatile organic compounds, unspecified origin [emissions to air, unspecified]: 1.8606e-5 kg; lognormal SD95 1.57
  (2,3,1,3,3,1); handbook emission factors for HGV
- Cadmium [emissions to air, unspecified]: 3.6724e-11 kg; lognormal SD95 5.1
  (4,5,1,2,1,1); expert estimate quoted from literature
- Carbon monoxide, fossil [emissions to air, unspecified]: 5.8043e-5 kg; lognormal SD95 5.01
  (2,3,1,3,1,1); International Rail study
- Dinitrogen monoxide [emissions to air, unspecified]: 3.6724e-7 kg; lognormal SD95 1.57
  (2,3,1,3,3,1); International Rail study
- Methane, fossil [emissions to air, unspecified]: 4.7736e-7 kg; lognormal SD95 1.57
  (2,3,1,3,3,1); handbook emission factors for HGV
- Nickel [emissions to air, unspecified]: 2.5712e-10 kg; lognormal SD95 5.1
  (4,5,1,2,1,1); expert estimate quoted from literature
- Heat, waste [emissions to air, unspecified]: 0.26029 MJ; lognormal SD95 1.07
  (2,1,1,1,1,1); standard value
- Selenium [emissions to air, unspecified]: 3.6724e-11 kg; lognormal SD95 5.1
  (4,5,1,2,1,1); expert estimate quoted from literature
- Noise, rail, freight train [non material emissions, unspecified]: 1 tkm
- Copper [emissions to air, unspecified]: 6.2382e-9 kg; lognormal SD95 5.1
  (4,5,1,2,1,1); expert estimate quoted from literature
- Benzene [emissions to air, unspecified]: 3.6724e-7 kg; lognormal SD95 2.06
  (2,3,1,3,3,1); handbook emission factors for HGV
- Toluene [emissions to air, unspecified]: 1.47e-7 kg; lognormal SD95 2.06
  (3,3,1,3,3,1); handbook emission factors for HGV
- Xylene [emissions to air, unspecified]: 1.47e-7 kg; lognormal SD95 2.06
  (3,3,1,3,3,1); handbook emission factors for HGV

## Sampling procedure
International Railway statistic

## Sources
- Spielmann M., Bauer C., Dones R., Tuchschmid M., 2007, 2007 - Transport services - Spielmann, Final report ecoinvent Data v2.0, 14, Swiss Centre for LCI, PSI, ESU-services Ltd., Duebendorf, Villigen and Uster, CH
Spielmann M., Dones R; Bauer C. (2007) Life Cycle Inventories of Transport Services. Final report ecoinvent Data v2.0. Volume: 14. Issue: 0. Swiss Centre for LCI, PSI. Dübendorf and Villigen, CH.
Type: Measurement on site
Source: CD-ROM
First author: Spielmann M.
Other authors: Dones R; Bauer C.
Year: 2007
Title of anthology: Final report ecoinvent Data v2.0
Place of publication: Dübendorf and Villigen, CH
Publisher: Swiss Centre for LCI, PSI
Volume No: 14
Issue No: 0

## Validation
Proof reading validation: passed.; Other validation: none;
