# xx Paper, woodfree, uncoated, at regional storage

Dataset: EcoSpold 1, unit process
Functional unit: 1 kg
Category: material, obsolete / paper + board, obsolete\graphic paper, obsolete
Geography: CH
Time period: 2000-01 to 2000-12
Production volume: Total Swiss graphic paper consumption 2000: 725.8 kt (official statistics)
Share of production covered: 100 %
Generated by: Roland Hischier
accessRestrictedTo: 0
copyright: true

## Included processes
This module includes the transport from the production site to a central distribution site within Switzerland for the domestic and the foreign uncoated fine paper consumed in Switzerland.; Geography: Deliveries within/to Switzerland according to official Swiss trade statistics with country-specific transport distances.

## Technology
Average situation

## Reference product
- xx Paper, woodfree, uncoated, at regional storage [CH]: 1 kg
  SWITZERLAND

## Inputs from technosphere
- Transport, transoceanic freight ship [OCE]: 0.0168 tkm; lognormal SD95 2.11
  (3,1,1,1,3,5); estimation based on Swiss statistics
- Transport, freight, lorry, fleet average [RER]: 0.191 tkm; lognormal SD95 2.11
  (3,1,1,1,3,5); estimation based on Swiss statistics
- Transport, freight, rail [RER]: 0.49 tkm; lognormal SD95 2.11
  (3,1,1,1,3,5); estimation based on Swiss statistics
- Paper, woodfree, uncoated, at integrated mill [RER]: 0.5 kg; lognormal SD95 1.24
  (3,3,1,1,1,5); estimated, based on CEPI production statistics
- Paper, woodfree, uncoated, at non-integrated mill [RER]: 0.5 kg; lognormal SD95 1.24
  (3,3,1,1,1,5); estimated, based on CEPI production statistics

## Extrapolations
Standard distances for domestic production, imports from neighbourhood countries and imports from scandinavian countries. Distribution integrated / non-integrated mill based on own assumption.

## Sources
- Hischier R., 2007, 2007 - LCI packagings and graphical papers - Hischier, Final report ecoinvent data v2.0, 11, Swiss Centre for LCI, Empa - TSL, Duebendorf and St. Gallen, CH
Hischier R. (2007) Life Cycle Inventories of Packaging and Graphical Paper. Final report ecoinvent data v2.0. Volume: 11. Swiss Centre for LCI, Empa - TSL. Dübendorf, CH.
Type: Measurement on site
Source: CD-ROM
First author: Hischier R.
Year: 2007
Title of anthology: Final report ecoinvent data v2.0
Place of publication: Dübendorf, CH
Publisher: Swiss Centre for LCI, Empa - TSL
Volume No: 11

## Validation
Proof reading validation: Passed; Other validation: none;
