# Use of core national IP network per hour

Dataset: EcoSpold 1, unit process
Functional unit: 1 hr
Category: computers & network / use cases
Geography: CH
Time period: 2023-01 to 2029-12
Synonyms: Übertragungsnetz; Kernnetz
Generated by: Lugas Raka Adrianto, Maulana Permana Ajie, Didier Beloin-Saint-Pierre
accessRestrictedTo: 0
copyright: false

## General comment
The data set represents the IP core network in Switzerland;

## Included processes
The dataset corresponds to the amount of equipment and electricity consumed to support a certain amount of network traffic in this specific network type. The dataset is based on the total amount of material, equipment, and components for the core network in Switzerland. The information is based on Swisscom's network. The literature describes the amount of material, equipment, and components for an average site. This is then multiplied with the total number of sites which Swisscom has. The information however is confidential. The total amount of network traffic is based on the Swisscom network in the year 2020. The total amount of electricity consumed is based on the addition of the core network and transport network. This terminology is based on the report but corresponds to the entire core network. It is assumed that the equipment has the same lifetime as a server which is 6 years. The functional unit = 1 GB.

## Geography
Data for Swiss networks

## Technology
The mix of Swiss core transmission network.

## Reference product
- Use of core national IP network per hour [CH]: 1 hr
  1 unit = 1 GB data

## Inputs from technosphere
All rows: lognormal SD95 1.22
- Cable, data cable in infrastructure, at plant [GLO]: 3.68e-5 m
  (2,2,1,1,2,5,BU:1.05) Based on full time use over 6 years (i.e. 6*365*24) and number of users
- Router, IP network, at server [GLO]: 3.25e-7 p
  (same comment as for Cable, data cable in infrastructure, at plant)
- Printed wiring board, mounted, Laptop PC mainboard, Pb free, at plant [GLO]: 1.64e-8 kg
  (same comment as for Cable, data cable in infrastructure, at plant)
- Steel, low-alloyed, at plant [RER]: 1.21e-8 kg
  (same comment as for Cable, data cable in infrastructure, at plant)
- Hot rolling, steel [RER]: 1.21e-8 kg
  (2,2,1,1,2,5,BU:1.05) Link to value of steel input
- Electricity, low voltage, at grid [CH]: 0.000189 kWh
  (2,2,1,1,2,5,BU:1.05) Based on annual electricity use and number of users

## Sampling procedure
Literature & own estimations

## Extrapolations
Average technology

## Sources
- Raka Adrianto L., Permana Ajie M., Beloin-Saint-Pierre D., 2024, 2024 - LCI ICT sector - Raka Adrianto, Empa, St. Gallen, CH

## Validation
Proof reading validation: Passed, Other validation: none, Validator: Mischa Zschokke, Company: Carbotech, Country: CH
