# xx Chlorothalonil, at regional storage

Dataset: EcoSpold 1, unit process
Functional unit: 1 kg
Category: material, obsolete / wood, obsolete\extraction, obsolete\pesticides, obsolete
Geography: RER
Time period: 2008-01 to 2008-12
Share of production covered: 100 %
Generated by: Juergen Sutter
accessRestrictedTo: 0
copyright: true

## General comment
Production of chlorothalonil including materials, energy uses, infrastructure and emissions.;

## Geography
The inventory is modelled for Europe.

## Technology
pesticides

## Time period
Time of publications

## Reference product
- xx Chlorothalonil, at regional storage [RER]: 1 kg
  Europe

## Inputs from technosphere
- Transport, freight, rail [RER]: 2.2513 tkm; lognormal SD95 2.095
  (4,5,na,na,na,na); Standard distances
- Sodium hydroxide, 50% in H2O, production mix, at plant [RER]: 0.60606 kg; lognormal SD95 1.3765
  (4,5,1,1,1,5); Stoechiometric calculation
- Chlorine, liquid, production mix, at plant [RER]: 0.51037 kg; lognormal SD95 1.3765
  (4,5,1,1,1,5); Stoechiometric calculation
- Oxygen, liquid, at plant [RER]: 0.41352 kg; lognormal SD95 1.3765
  (4,5,1,1,1,5); Stoechiometric calculation
- Ammonia, liquid, at regional storehouse [RER]: 0.14646 kg; lognormal SD95 1.3765
  (4,5,1,1,1,5); Stoechiometric calculation
- Heat, unspecific, in chemical plant [RER]: 4.0029 MJ; lognormal SD95 1.3765
  (4,5,1,1,1,5); Estimation
- Chemical plant, organics [RER]: 8.0057e-10 p; lognormal SD95 3.0909
  (4,5,na,na,na,na); Estimation
- Electricity, medium voltage, production ENTSO-E, at grid: 0.66648 kWh; lognormal SD95 1.3765
  (4,5,1,1,1,5); Estimation
- Transport, freight, lorry, fleet average [RER]: 0.37522 tkm; lognormal SD95 2.095
  (4,5,na,na,na,na); Standard distances
- Xylene, at plant [RER]: 0.46831 kg; lognormal SD95 1.3765
  (4,5,1,1,1,5); Stoechiometric calculation

## Inputs from nature
- Water, cooling, unspecified natural origin/m3 [resources, in water]: 0.048034 m3; lognormal SD95 1.3765
  (4,5,1,1,1,5); Estimation

## Emissions to nature
- Carbon dioxide, fossil [emissions to air, high. pop.]: 0.18482 kg; lognormal SD95 1.3001
  (4,5,na,na,na,na); Estimation
- Chloride [emissions to water, river]: 0.58389 kg; lognormal SD95 3.0909
  (4,5,na,na,na,na); Estimation
- m-Xylene [emissions to air, high. pop.]: 0.00093661 kg; lognormal SD95 1.6169
  (4,5,na,na,na,na); Estimation
- Sodium [emissions to water, river]: 0.34848 kg; lognormal SD95 5.1037
  (4,5,na,na,na,na); Estimation
- Ammonia [emissions to air, high. pop.]: 0.00029291 kg; lognormal SD95 1.3713
  (4,5,na,na,na,na); Estimation
- Chlorine [emissions to air, high. pop.]: 0.0022329 kg; lognormal SD95 1.6169
  (4,5,na,na,na,na); Estimation
- m-Xylene [emissions to water, river]: 0.0022479 kg; lognormal SD95 3.0909
  (4,5,na,na,na,na); Estimation
- Heat, waste [emissions to air, high. pop.]: 2.3993 MJ; lognormal SD95 1.3765
  (4,5,1,1,1,5); Calculated from the electricity input
- Ammonium, ion [emissions to water, river]: 0.002145 kg; lognormal SD95 1.6169
  (4,5,na,na,na,na); Estimation
- Water [emissions to water, unspecified]: 45.6323 kg; lognormal SD95 2.5196
  (5,5,5,5,5,BU:1.05); All uncertainty-values set to 5.0 by default. Balance of input water

## Sampling procedure
Literature data

## Extrapolations
Transports and emissions are modelled with standard methods.

## Sources
- Nemecek T., Kaegi T., 2007, 2007 - LCI agricultural prod. systems - Nemecek, Ecoinvent report version 2.0, 15, Swiss Centre for LCI, ART, Duebendorf and Zuerich, CH
Nemecek, T., Kägi, T., Blaser, S. (2007) Life Cycle Inventories of Agricultural Production Systems. Ecoinvent report version 2.0. Editors: 0. Volume: 15. Swiss Centre for LCI, ART. Duebendorf and Zurich, CH.
Type: Measurement on site
Source: CD-ROM
First author: Nemecek, T.
Other authors: Kägi, T., Blaser, S.
Year: 2007
Name of editors: 0
Title of anthology: Ecoinvent report version 2.0
Place of publication: Duebendorf and Zurich, CH
Publisher: Swiss Centre for LCI, ART
Volume No: 15

## Validation
Proof reading validation: Passed.; Other validation: none;
