# Anode, graphite, for Li-ion battery

Dataset: EcoSpold 1, unit process
Functional unit: 1 kg
Category: electronics / batteries
Geography: GLO
Time period: 2023-01 to 2029-12
Synonyms: Anode; Graphit; für Li-Ion Batterie
Generated by: Lugas Raka Adrianto, Maulana Permana Ajie, Didier Beloin-Saint-Pierre
accessRestrictedTo: 0
copyright: true

## General comment
Data is taken from recent literature on EV battery production along with its components;

## Included processes
This dataset represents the production of 1 kg graphite-based anode for Li-ion batteries. Data are based on literature and expert judgement. For infrastructure, the ecoinvent dataset ""chemical factory, organics"" is accounted. This dataset is a copy of the corresponding regional dataset. Production volume was adjusted.

## Geography
Data for global graphite based anodes in the world

## Technology
Anode for Lithium ion batteries.

## Reference product
- Anode, graphite, for Li-ion battery [GLO]: 1 kg
  Asia and the Pacific

## Inputs from technosphere
- Carbon black, at plant [GLO]: 0.01 kg; lognormal SD95 1.15
  (2,2,1,4,2,4,BU:1.05); Crenna et al, 2021, Literature
- Carboxymethyl cellulose, powder, at plant [RER]: 0.03 kg; lognormal SD95 1.15
  (2,2,1,4,2,4,BU:1.05); Crenna et al, 2021, Literature
- Chemical plant, organics [RER]: 4e-10 p; lognormal SD95 3.02
  (2,2,1,4,2,4,BU:1.05); Crenna et al, 2021, Literature
- Latex, at plant [RER]: 0.02 kg; lognormal SD95 1.15
  (2,2,1,4,2,4,BU:1.05); Crenna et al, 2021, Literature
- Graphite, battery grade, at plant [CN]: 0.94 kg; lognormal SD95 1.15
  (2,2,1,4,2,4,BU:1.05); Crenna et al, 2021, Literature
- Water, deionised, at plant [CH]: 1 kg; lognormal SD95 1.15
  (2,2,1,4,2,4,BU:1.05); Crenna et al, 2021, Literature
- Electricity, medium voltage, production GLO, at grid [GLO]: 0.44058 kWh; lognormal SD95 1.15
  (2,2,1,4,2,4,BU:1.05); Crenna et al, 2021, Literature
- Heat, natural gas, at industrial furnace 1MW [CH]: 7.7593 MJ; lognormal SD95 1.15
  (2,2,1,4,2,4,BU:1.05); Crenna et al, 2021, Literature
- Transport, freight, rail [RER]: 0.98658 tkm; lognormal SD95 2.07
  (2,2,3,4,2,5,BU:2.00); Ellingsen, 2014 supporting information
- Transport, freight, lorry, 32t-40t gross weight, fleet average [RER]: 0.24048 tkm; lognormal SD95 2.07
  (2,2,3,4,2,5,BU:2.00); Ellingsen, 2014 supporting information
- Treatment, sewage, to wastewater treatment, class 3 [CH]: 0.001 m3; lognormal SD95 1.27
  (2,2,3,4,3,4,BU:1.05); Literature, Crenna et al (2021).

## Sampling procedure
Literature & own estimations

## Extrapolations
Average technology

## Sources
- Raka Adrianto L., Permana Ajie M., Beloin-Saint-Pierre D., 2024, 2024 - LCI ICT sector - Raka Adrianto, Empa, St. Gallen, CH

## Validation
Proof reading validation: Passed, Other validation: none, Validator: Mischa Zschokke, Company: Carbotech, Country: CH
