# Fluorescent whitening agent distyrylbiphenyl type, at plant

Dataset: EcoSpold 1, unit process
Functional unit: 1 kg
Category: chemicals / washing agents\auxiliaries
Geography: RER
Time period: 2000-01 to 2000-12
Production volume: 250000000
Share of production covered: 98 %
Generated by: Rainer Zah
accessRestrictedTo: 0
copyright: true

## General comment
data based on company information for a former detergent study of EMPA;
CAS number: 027344-41-8;
Synonyms: DSBP;

## Included processes
This module contains material and energy input, production of waste and emissions for the production of the mentioned FWA (fluorescent whitening agent). Transport and infrastructure have been estimated.

## Geography
data from European main producer, used as European average

## Technology
Typcial production process for end of 90s

## Time period
year of reported data

## Reference product
- Fluorescent whitening agent distyrylbiphenyl type, at plant [RER]: 1 kg
  Europe

## Inputs from technosphere
- Transport, freight, rail [RER]: 1.8 tkm; lognormal SD95 2.07
  (2,3,3,2,1,4);
- Disposal, hazardous waste, 25% water, to hazardous waste incineration [CH]: 5.59e-9 kg; lognormal SD95 1.25
  (2,3,3,2,1,4);
- Disposal, inert waste, 5% water, to construction waste landfill [CH]: 0.233 kg; lognormal SD95 1.25
  (2,3,3,2,1,4);
- Disposal, average incineration residue, 0% water, to residual material landfill [CH]: 0.0441 kg; lognormal SD95 1.25
  (2,3,3,2,1,4);
- Transport, freight, lorry, fleet average [RER]: 0.3 tkm; lognormal SD95 2.07
  (2,3,3,2,1,4);
- Disposal, municipal solid waste, 22.9% water, to sanitary landfill [CH]: 0.523 kg; lognormal SD95 1.25
  (2,3,3,2,1,4);
- Chemical plant, organics [RER]: 1.2e-9 p; lognormal SD95 3.06
  (2,3,3,2,1,4);

## Inputs from nature
All rows: lognormal SD95 1.25
- Diatomite [resources, in ground]: 0.0102 kg
  (2,3,3,2,1,4);
- Coal, brown [resources, in ground]: 1.31 kg
  (2,3,3,2,1,4);
- Gas, natural/m3 [resources, in ground]: 4.86 m3
  (2,3,3,2,1,4);
- Oil, crude [resources, in ground]: 2.79 kg
  (2,3,3,2,1,4);
- Uranium [resources, in ground]: 0.000115 kg
  (2,3,3,2,1,4);
- Fluorspar [resources, in ground]: 1.94e-5 kg
  (2,3,3,2,1,4);
- Energy, potential (in hydropower reservoir), converted [resources, in water]: 32.6 MJ
  (2,3,3,2,1,4);
- Potassium chloride [resources, in ground]: 1.25e-7 kg
  (2,3,3,2,1,4);
- Stibnite [resources, in ground]: 0.00106 kg
  (2,3,3,2,1,4);
- Magnesite [resources, in ground]: 8.86e-9 kg
  (2,3,3,2,1,4);
- Sand [resources, in ground]: 0.0549 kg
  (2,3,3,2,1,4);
- Coal, hard [resources, in ground]: 2.09 kg
  (2,3,3,2,1,4);
- Wood, unspecified, standing/m3 [resources, biotic]: 2.01e-5 m3
  (2,3,3,2,1,4);
- Aluminium [resources, in ground]: 0.00155 kg
  (2,3,3,2,1,4);
- Iron [resources, in ground]: 0.00697 kg
  (2,3,3,2,1,4);
- Phosphorus [resources, in ground]: 1.94 kg
  (2,3,3,2,1,4);
- Sodium chloride [resources, in ground]: 3.35 kg
  (2,3,3,2,1,4);
- Calcite [resources, in ground]: 0.0798 kg
  (2,3,3,2,1,4);

## Emissions to nature
- Toluene [emissions to water, river]: 7.34e-6 kg; lognormal SD95 3.06
  (2,3,3,2,1,4);
- Arsenic [emissions to water, river]: 6.25e-6 kg; lognormal SD95 5.07
  (2,3,3,2,1,4);
- Hydrocarbons, aromatic [emissions to air, high. pop.]: 0.000157 kg; lognormal SD95 3.06
  (2,3,3,2,1,4);
- Radioactive species, Nuclides, unspecified [emissions to water, river]: 90.4 kBq; lognormal SD95 3.06
  (2,3,3,2,1,4);
- Hydrogen [emissions to air, high. pop.]: 0.0025 kg; lognormal SD95 1.58
  (2,3,3,2,1,4);
- Ammonium, ion [emissions to water, river]: 0.0039 kg; lognormal SD95 1.58
  (2,3,3,2,1,4);
- DOC, Dissolved Organic Carbon [emissions to water, river]: 0.0143 kg; lognormal SD95 1.58
  (2,3,3,2,1,4);
- Manganese [emissions to air, high. pop.]: 6.27e-7 kg; lognormal SD95 1.58
  (2,3,3,2,1,4);
- Fluoride [emissions to water, river]: 1.58e-5 kg; lognormal SD95 1.58
  (2,3,3,2,1,4);
- Particulates, < 2.5 um [emissions to air, high. pop.]: 0.00445 kg; lognormal SD95 1.58
  (2,3,3,2,1,4);
- Ammonia [emissions to air, high. pop.]: 9.3e-5 kg; lognormal SD95 1.58
  (2,3,3,2,1,4);
- NMVOC, non-methane volatile organic compounds, unspecified origin [emissions to air, high. pop.]: 0.0329 kg; lognormal SD95 2.07
  (2,3,3,2,1,4);
- Hydrogen fluoride [emissions to air, high. pop.]: 8.54e-5 kg; lognormal SD95 1.58
  (2,3,3,2,1,4);
- Sulfide [emissions to water, river]: 0.00211 kg; lognormal SD95 1.58
  (2,3,3,2,1,4);
- Nickel [emissions to air, high. pop.]: 2.19e-5 kg; lognormal SD95 5.07
  (2,3,3,2,1,4);
- Copper [emissions to water, river]: 2.26e-5 kg; lognormal SD95 5.07
  (2,3,3,2,1,4);
- PAH, polycyclic aromatic hydrocarbons [emissions to air, high. pop.]: 1.06e-6 kg; lognormal SD95 2.07
  (2,3,3,2,1,4);
- Hydrogen chloride [emissions to air, high. pop.]: 0.0017 kg; lognormal SD95 2.07
  (2,3,3,2,1,4);
- Methane, bromotrifluoro-, Halon 1301 [emissions to air, high. pop.]: 2.75e-7 kg; lognormal SD95 2.07
  (2,3,3,2,1,4);
- Sulfur dioxide [emissions to air, high. pop.]: 0.0952 kg; lognormal SD95 1.25
  (2,3,3,2,1,4);
- Solids, inorganic [emissions to water, river]: 0.0506 kg; lognormal SD95 1.58
  (2,3,3,2,1,4);
- Mercury [emissions to water, river]: 1.28e-8 kg; lognormal SD95 5.07
  (2,3,3,2,1,4);
- Sulfate [emissions to water, river]: 0.224 kg; lognormal SD95 1.58
  (2,3,3,2,1,4);
- Hydrocarbons, chlorinated [emissions to air, high. pop.]: 4.47e-5 kg; lognormal SD95 2.07
  (2,3,3,2,1,4);
- Zinc [emissions to water, river]: 0.000171 kg; lognormal SD95 5.07
  (2,3,3,2,1,4);
- Nitrogen [emissions to water, river]: 0.000799 kg; lognormal SD95 1.58
  (2,3,3,2,1,4);
- Particulates, > 10 um [emissions to air, high. pop.]: 0.005696 kg; lognormal SD95 1.58
  (2,3,3,2,1,4);
- Carbon dioxide, fossil [emissions to air, high. pop.]: 20.7 kg; lognormal SD95 1.25
  (2,3,3,2,1,4);
- COD, Chemical Oxygen Demand [emissions to water, river]: 0.00018 kg; lognormal SD95 1.58
  (2,3,3,2,1,4);
- Nitrate [emissions to water, river]: 0.0108 kg; lognormal SD95 1.58
  (2,3,3,2,1,4);
- Lead [emissions to water, river]: 1.76e-5 kg; lognormal SD95 5.07
  (2,3,3,2,1,4);
- PAH, polycyclic aromatic hydrocarbons [emissions to water, river]: 7.71e-7 kg; lognormal SD95 3.06
  (2,3,3,2,1,4);
- BOD5, Biological Oxygen Demand [emissions to water, river]: 3.28e-5 kg; lognormal SD95 1.58
  (2,3,3,2,1,4);
- Mercury [emissions to air, high. pop.]: 3.43e-7 kg; lognormal SD95 5.07
  (2,3,3,2,1,4);
- Radioactive species, other beta emitters [emissions to air, high. pop.]: 9870 kBq; lognormal SD95 3.06
  (2,3,3,2,1,4);
- Phenol [emissions to water, river]: 9.87e-6 kg; lognormal SD95 3.06
  (2,3,3,2,1,4);
- Particulates, > 2.5 um, and < 10um [emissions to air, high. pop.]: 0.007654 kg; lognormal SD95 1.58
  (2,3,3,2,1,4);
- Lead [emissions to air, high. pop.]: 4.29e-6 kg; lognormal SD95 5.07
  (2,3,3,2,1,4);
- Antimony [emissions to water, river]: 6.92e-5 kg; lognormal SD95 5.07
  (2,3,3,2,1,4);
- Nickel [emissions to water, river]: 1.52e-5 kg; lognormal SD95 5.07
  (2,3,3,2,1,4);
- Chlorinated solvents, unspecified [emissions to water, river]: 9.64e-8 kg; lognormal SD95 3.06
  (2,3,3,2,1,4);
- Chloride [emissions to water, river]: 0.48 kg; lognormal SD95 1.58
  (2,3,3,2,1,4);
- Chromium [emissions to water, river]: 3.17e-5 kg; lognormal SD95 5.07
  (2,3,3,2,1,4);
- Carbon monoxide, fossil [emissions to air, high. pop.]: 0.0106 kg; lognormal SD95 5.07
  (2,3,3,2,1,4);
- Phosphate [emissions to water, river]: 0.00232 kg; lognormal SD95 1.58
  (2,3,3,2,1,4);
- Methane, fossil [emissions to air, high. pop.]: 0.035 kg; lognormal SD95 1.58
  (2,3,3,2,1,4);
- Nitrogen, organic bound [emissions to water, river]: 8.48e-6 kg; lognormal SD95 1.58
  (2,3,3,2,1,4);
- Dinitrogen monoxide [emissions to air, high. pop.]: 0.000608 kg; lognormal SD95 1.58
  (2,3,3,2,1,4);
- Iron [emissions to water, river]: 0.00585 kg; lognormal SD95 5.07
  (2,3,3,2,1,4);
- Cyanide [emissions to water, river]: 1.2e-6 kg; lognormal SD95 1.58
  (2,3,3,2,1,4);
- Hydrocarbons, aromatic [emissions to water, river]: 5.45e-5 kg; lognormal SD95 3.06
  (2,3,3,2,1,4);
- Barium [emissions to water, river]: 0.000391 kg; lognormal SD95 5.07
  (2,3,3,2,1,4);
- Nitrogen oxides [emissions to air, high. pop.]: 0.0584 kg; lognormal SD95 1.58
  (2,3,3,2,1,4);
- Aluminium [emissions to water, river]: 0.00387 kg; lognormal SD95 5.07
  (2,3,3,2,1,4);
- TOC, Total Organic Carbon [emissions to water, river]: 0.0206 kg; lognormal SD95 1.58
  (2,3,3,2,1,4);
- Benzene [emissions to air, high. pop.]: 6.69e-5 kg; lognormal SD95 3.06
  (2,3,3,2,1,4);
- Chlorine [emissions to air, high. pop.]: 6e-10 kg; lognormal SD95 1.58
  (2,3,3,2,1,4);
- Hydrocarbons, unspecified [emissions to water, river]: 0.00174 kg; lognormal SD95 3.06
  (2,3,3,2,1,4);
- Cadmium [emissions to air, high. pop.]: 8.79e-7 kg; lognormal SD95 5.07
  (2,3,3,2,1,4);
- Zinc [emissions to air, high. pop.]: 1.27e-5 kg; lognormal SD95 5.07
  (2,3,3,2,1,4);
- Cadmium [emissions to water, river]: 2.27e-7 kg; lognormal SD95 5.07
  (2,3,3,2,1,4);

## Sampling procedure
aggregated data, calculated by the producing company itself

## Extrapolations
see geography and technology

## Sources
- Zah R., Hischier R., 2007, 2007 - LCI detergents - Zah, Final report ecoinvent data v2.0, 12, Swiss Centre for LCI, Empa - TSL, Duebendorf and St. Gallen, CH
Zah R., Hischier R. (2007) Life Cycle Inventories of Detergents. Final report ecoinvent data v2.0. Volume: 12. Swiss Centre for LCI, Empa - TSL. Dübendorf, CH.
Type: Measurement on site
Source: CD-ROM
First author: Zah R.
Other authors: Hischier R.
Year: 2007
Title of anthology: Final report ecoinvent data v2.0
Place of publication: Dübendorf, CH
Publisher: Swiss Centre for LCI, Empa - TSL
Volume No: 12

## Validation
Proof reading validation: passed.; Other validation: none;
