# Cadmium chloride, semiconductor-grade, at plant

Dataset: EcoSpold 1, unit process
Functional unit: 1 kg
Category: metals / non ferro
Geography: US
Time period: 2005-01 to 2005-12
Share of production covered: 0 %
Generated by: Matthias Tuchschmid
accessRestrictedTo: 0
copyright: true

## General comment
This datasets describes the production of high-grade cadmium chloride (99.999%) from cadmium and hydrochloric acid. This purity of cadmium chloride can be used in the production of thin film solar cells. ;
CAS number: 010108-64-2;
Formula: CdCl2;

## Included processes
The energy consumption, emissions and transports are estimated.

## Geography
Production in US

## Technology
Production of cadmium chloride by reaction of cadmium with hydrogen chloride

## Reference product
- Cadmium chloride, semiconductor-grade, at plant [US]: 1 kg
  UNITED STATES

## Inputs from technosphere
- Chemical plant, organics [RER]: 4e-10 p; lognormal SD95 3.8082
  (4,5,2,1,5,5); assumption
- Cadmium, semiconductor-grade, at plant [US]: 0.64597 kg; lognormal SD95 2.2954
  (5,4,2,1,5,5); calculated based on formula
- Hydrochloric acid, 30% in H2O, at plant [RER]: 0.41908 kg; lognormal SD95 2.2954
  (5,4,2,1,5,5); calculated based on formula
- Electricity, medium voltage, at grid [US]: 0.042586 kWh; lognormal SD95 2.2954
  (5,4,2,1,5,5); assumption,
- Transport, freight, lorry, fleet average [RER]: 0.1065 tkm; lognormal SD95 2.095
  (4,5,na,na,na,na); standard distances in Europe and USA (each 100km)
- Transport, freight, rail [RER]: 0.21301 tkm; lognormal SD95 2.095
  (4,5,na,na,na,na); standard distances in Europe and USA (each 200km)

## Emissions to nature
- Heat, waste [emissions to air, high. pop.]: 0.15331 MJ; lognormal SD95 2.3288
  (5,5,2,1,5,5); estimation
- Cadmium [emissions to air, high. pop.]: 3.8758e-6 kg; lognormal SD95 6.1551
  (5,5,2,1,5,5); estimation
- Hydrogen [emissions to air, high. pop.]: 0.011465 kg; lognormal SD95 2.5505
  (5,5,2,1,5,5); estimation

## Sampling procedure
literature and own estimations

## Extrapolations
Cadmium emissions are extrapolated from cadmium purification.

## Sources
- Classen M., Althaus H.-J., Blaser S., Scharnhorst W., Tuchschmid M., Jungbluth N., Faist Emmenegger M., 2009, 2009 - LCI metals - Classen, Final report ecoinvent data v2.1, 10, Swiss Centre for LCI, Empa, ESU-services Ltd., Duebendorf, CH
Classen M., Althaus H.-J., Blaser S., Doka G., Jungbluth N., Tuchschmid M. (2008) Life Cycle Inventories of Metals. Final report ecoinvent data v2.1. Volume: 10. Issue: 0. Swiss Centre for LCI, Empa - TSL. Dübendorf, CH.
Type: Measurement on site
Source: CD-ROM
First author: Classen M.
Other authors: Althaus H.-J., Blaser S., Doka G., Jungbluth N., Tuchschmid M.
Year: 2008
Title of anthology: Final report ecoinvent data v2.1
Place of publication: Dübendorf, CH
Publisher: Swiss Centre for LCI, Empa - TSL
Volume No: 10
Issue No: 0

## Validation
Proof reading validation: automatic validation in Excel; Other validation: none;
