# xx Molybdenum concentrate, couple production Cu

Dataset: EcoSpold 1, unit process
Functional unit: 1 kg
Category: material, obsolete / metals, obsolete\non ferro, obsolete
Geography: US
Time period: 2000-01 to 2000-12
Production volume: 9.5 million tonnes in Cu in 1994
Share of production covered: 84 %
Generated by: Mischa Classen
accessRestrictedTo: 0
copyright: true

## General comment
The multi-output-process "mining copper-ore" delivers the co-products "copper concentrate, at beneficiation" and "molybdenum, molybdenite concentrate, couple production Cu". The product "copper concentrate" is a intermediary process required in the following copper production (5.2.5 Winning of primary copper in ecoinvent). The module "molybdenite concentrate" is designed for the use in Ecoinvent as starting material for the manufacturing of molybdenum trioxide and ferromolybdenum, both materials which used in the manufacturing of high quality steels and alloys.;

## Included processes
The module includes a mining and a beneficiation step with the mining infrastructure and disposal of overburden and tailings (see part II "Auxiliary Processes").

## Geography
This module is valid for the whole corresponding region. Some agents used like lime or sodium cyanide originate from data sets valid for Switzerland or Europe. Processes like blasting and transport originate from data sets valid for Switzerland or Europe.

## Technology
Mining is done 70% open pit and 30% underground, followed by joint beneficiation of copper and molybdenite trough flotation, where considerable amounts of agents are added. Overburden and tailings are disposed near the mining site.

## Reference product
- xx Molybdenum concentrate, couple production Cu [US]: 1 kg
  North America

## Inputs from technosphere
- Aluminium hydroxide, plant [RER]: 2.9139e-9 p; lognormal SD95 3.07
  (3,2,2,1,3,4,9)
- Non-ferrous metal mine, underground [GLO]: 1.4657e-9 p; lognormal SD95 3.36
  (5,5,1,1,3,5,9)
- Electricity, medium voltage, production ENTSO-E, at grid: 3.08321 kWh; lognormal SD95 1.14
  (2,3,2,1,1,4,2)
- Blasting [RER]: 0.34686 kg; lognormal SD95 1.13
  (2,2,2,1,1,4,4)
- Conveyor belt, at plant [RER]: 2.6277e-5 m; lognormal SD95 3.36
  (5,5,1,1,3,5,9)
- Diesel, burned in building machine, average [CH]: 0.026453 MJ; lognormal SD95 1.13
  (2,2,2,1,1,4,4)
- Chemicals inorganic, at plant [GLO]: 0.26686 kg; lognormal SD95 2
  reported values
- Electricity, hydropower, at run-of-river power plant [RER]: 4.63066 kWh; lognormal SD95 1.14
  (2,3,2,1,1,4,2)
- Limestone, milled, packed, at plant [CH]: 0.41693 kg; lognormal SD95 1.04
  reported values
- Non-ferrous metal mine, surface [GLO]: 3.3577e-9 p; lognormal SD95 3.36
  (5,5,1,1,3,5,9)
- Disposal, sulfidic tailings, off-site [GLO]: 905.109 kg; lognormal SD95 1.13
  (2,2,2,1,1,4,6)
- Chromium steel 18/8, at plant [RER]: 0.27562 kg; lognormal SD95 1.2
  reported values
- Chemicals organic, at plant [GLO]: 0.078248 kg; lognormal SD95 2
  reported values
- Sodium cyanide, at plant [RER]: 0.012146 kg; lognormal SD95 2
  reported values

## Inputs from nature
- Transformation, from unknown [resources, land]: 0.00060146 m2; lognormal SD95 2.01
  (2,2,2,1,1,2,8)
- Occupation, mineral extraction site [resources, land]: 0.018102 m2a; lognormal SD95 1.51
  (2,2,2,1,1,2,7)
- Molybdenum, 0.022% in sulfide, Mo 8.2E-3% and Cu 0.22% in crude ore [resources, in ground]: 0.68672 kg; lognormal SD95 1.13
  (2,2,2,1,1,4,12)
- Transformation, to mineral extraction site [resources, land]: 0.00060146 m2; lognormal SD95 2.01
  (2,2,2,1,1,2,8)
- Water, river [resources, in water]: 0.35504 m3; lognormal SD95 1.13
  (2,2,1,1,1,4,12)

## Emissions to nature
- Cadmium [emissions to air, low. pop.]: 1.7577e-8 kg; lognormal SD95 1.59
  (3,2,1,1,3,4,31)
- BOD5, Biological Oxygen Demand [emissions to water, river]: 0.0037022 kg; lognormal SD95 10
  reported values
- Iron [emissions to water, river]: 0.00010336 kg; lognormal SD95 10
  reported values
- Lead [emissions to air, low. pop.]: 2.2365e-6 kg; lognormal SD95 1.59
  (3,2,1,1,3,4,31)
- Suspended solids, unspecified [emissions to water, river]: 0.0018336 kg; lognormal SD95 10
  reported values
- Beryllium [emissions to air, low. pop.]: 4.1518e-7 kg; lognormal SD95 1.59
  (3,2,1,1,3,4,31)
- Particulates, > 10 um [emissions to air, low. pop.]: 0.0078248 kg; lognormal SD95 2.69
  (3,2,1,1,5,4,19)
- COD, Chemical Oxygen Demand [emissions to water, river]: 0.0037022 kg; lognormal SD95 10
  reported values
- Boron [emissions to air, low. pop.]: 1.5942e-6 kg; lognormal SD95 1.59
  (3,2,1,1,3,4,31)
- Heat, waste [emissions to air, low. pop.]: 27.7956 MJ; lognormal SD95 1.14
  (2,3,2,1,1,4,13)
- Mercury [emissions to water, river]: 1.3372e-8 kg; lognormal SD95 10
  reported values
- Zinc [emissions to air, low. pop.]: 3.0365e-5 kg; lognormal SD95 1.59
  (3,2,1,1,3,4,31)
- Cobalt [emissions to water, river]: 2.7737e-7 kg; lognormal SD95 10
  reported values
- Copper [emissions to water, river]: 2.8088e-6 kg; lognormal SD95 10
  reported values
- Manganese [emissions to water, river]: 8.7591e-6 kg; lognormal SD95 10
  reported values
- Cobalt [emissions to air, low. pop.]: 3.1942e-6 kg; lognormal SD95 1.59
  (3,2,1,1,3,4,31)
- TOC, Total Organic Carbon [emissions to water, river]: 0.0014482 kg; lognormal SD95 10
  reported values
- Chromium [emissions to water, river]: 1.9445e-7 kg; lognormal SD95 10
  reported values
- Carbon dioxide, fossil [emissions to air, low. pop.]: 0.18336 kg; lognormal SD95 2.3
  (5,3,3,6,5,5,24)
- Antimony [emissions to air, low. pop.]: 3.1942e-8 kg; lognormal SD95 1.59
  (3,2,1,1,3,4,31)
- Fluorine [emissions to air, low. pop.]: 0.00015182 kg; lognormal SD95 1.59
  (3,2,1,1,3,4,31)
- Lead [emissions to water, river]: 9.927e-7 kg; lognormal SD95 10
  reported values
- Aluminium [emissions to water, river]: 3.0657e-5 kg; lognormal SD95 10
  reported values
- Selenium [emissions to air, low. pop.]: 8e-9 kg; lognormal SD95 1.59
  (3,2,1,1,3,4,31)
- Cadmium [emissions to water, river]: 1.1212e-7 kg; lognormal SD95 10
  reported values
- Particulates, > 2.5 um, and < 10um [emissions to air, low. pop.]: 0.070657 kg; lognormal SD95 3.69
  (3,2,1,1,5,4,20)
- DOC, Dissolved Organic Carbon [emissions to water, river]: 0.0014482 kg; lognormal SD95 10
  reported values
- Nickel [emissions to water, river]: 8.6423e-6 kg; lognormal SD95 10
  reported values
- Sulfate [emissions to water, river]: 0.83504 kg; lognormal SD95 10
  reported values
- Arsenic [emissions to water, river]: 1.0453e-6 kg; lognormal SD95 10
  reported values
- Mercury [emissions to air, low. pop.]: 8e-9 kg; lognormal SD95 1.59
  (3,2,1,1,3,4,31)
- Copper [emissions to air, low. pop.]: 8e-6 kg; lognormal SD95 1.59
  (3,2,1,1,3,4,31)
- Particulates, < 2.5 um [emissions to air, low. pop.]: 0.081168 kg; lognormal SD95 2.69
  (3,2,1,1,5,4,23)
- Cyanide [emissions to water, river]: 0.0013489 kg; lognormal SD95 1.84
  (4,2,2,3,4,4,33)
- Nitrogen, organic bound [emissions to water, river]: 0.0080584 kg; lognormal SD95 10
  reported values
- Arsenic [emissions to air, low. pop.]: 2.3942e-7 kg; lognormal SD95 1.59
  (3,2,1,1,3,4,31)
- Manganese [emissions to air, low. pop.]: 0.00015182 kg; lognormal SD95 1.59
  (3,2,1,1,3,4,31)
- Nickel [emissions to air, low. pop.]: 1.2788e-5 kg; lognormal SD95 1.59
  (3,2,1,1,3,4,31)
- Calcium [emissions to water, river]: 0.2435 kg; lognormal SD95 10
  reported values
- Chromium [emissions to air, low. pop.]: 1.5942e-5 kg; lognormal SD95 1.59
  (3,2,1,1,3,4,31)
- Zinc [emissions to water, river]: 2.692e-5 kg; lognormal SD95 10
  reported values
- Carbon disulfide [emissions to air, low. pop.]: 0.034686 kg; lognormal SD95 2.31
  (4,2,2,5,4,4,23)
- Water [emissions to water, unspecified]: 337.288 kg; lognormal SD95 2.5196
  (5,5,5,5,5,BU:1.05); All uncertainty-values set to 5.0 by default. Balance of input water

## Sampling procedure
literature

## Extrapolations
see Geography and Technology

## Sources
- Classen M., Althaus H.-J., Blaser S., Scharnhorst W., Tuchschmid M., Jungbluth N., Faist Emmenegger M., 2009, 2009 - LCI metals - Classen, Final report ecoinvent data v2.1, 10, Swiss Centre for LCI, Empa, ESU-services Ltd., Duebendorf, CH
Classen M., Althaus H.-J., Blaser S., Doka G., Jungbluth N., Tuchschmid M. (2008) Life Cycle Inventories of Metals. Final report ecoinvent data v2.1. Volume: 10. Issue: 0. Swiss Centre for LCI, Empa - TSL. Dübendorf, CH.
Type: Measurement on site
Source: CD-ROM
First author: Classen M.
Other authors: Althaus H.-J., Blaser S., Doka G., Jungbluth N., Tuchschmid M.
Year: 2008
Title of anthology: Final report ecoinvent data v2.1
Place of publication: Dübendorf, CH
Publisher: Swiss Centre for LCI, Empa - TSL
Volume No: 10
Issue No: 0

## Validation
Proof reading validation: passed; Other validation: none;
