# Fluorine, liquid, at plant

Dataset: EcoSpold 1, unit process
Functional unit: 1 kg
Category: chemicals / gases
Geography: RER
Time period: 2000-01 to 2000-12
Production volume: 17000 t/a worldwide
Generated by: Niels Jungbluth
accessRestrictedTo: 0
copyright: true

## General comment
This module investigates the production of fluorine as a basic product for SF6. It is a rough and incomplete inventory which is based on information found in the literature. ;
CAS number: 007782-41-4;
Formula: F2;

## Included processes
Production of fluorine from hydrogene fluoride. Infrastructure estimated with generic data. Data for raw material KF were not available.

## Geography
Estimation for Europe

## Technology
Electrolysis of KF-2HF (40.68 wt % HF)

## Time period
Time of publication

## Reference product
- Fluorine, liquid, at plant [RER]: 1 kg
  Europe

## Inputs from technosphere
- Electricity, medium voltage, production ENTSO-E, at grid: 15.3 kWh; lognormal SD95 1.1
  Range from literature
- Transport, freight, lorry, fleet average [RER]: 0.114 tkm; lognormal SD95 2.1
  (4,5,na,na,na,na); Standard distance 100km
- Chemical plant, organics [RER]: 4e-10 p; lognormal SD95 3.9
  (5,na,1,1,5,na); Rough estimation
- Hydrogen fluoride, at plant [GLO]: 1.14 kg; lognormal SD95 2.03
  (3,4,2,3,5,na); Estimation for the use of KF · 2HF (40.68 wt % HF) with pure HF, 92.5% yield
- Transport, freight, rail [RER]: 0.683 tkm; lognormal SD95 2.1
  (4,5,na,na,na,na); Standard distance 600km

## Emissions to nature
- Hydrogen fluoride [emissions to air, unspecified]: 0.001 kg; lognormal SD95 1.77
  (5,na,na,na,1,na); Estimation
- Heat, waste [emissions to air, unspecified]: 55 MJ; lognormal SD95 1.1
  Range from literature

## Sampling procedure
Literature survey

## Extrapolations
From single data.

## Sources
- Althaus H.-J., Chudacoff M., Hellweg S., Hischier R., Jungbluth N., Osses M., Primas A., 2007, 2007 - LCI chemicals - Althaus, Final report ecoinvent data v2.0, 8, Swiss Centre for LCI, Empa - TSL, ETH, ESU-services Ltd., Chudacoff Oekoscience, Duebendorf, CH
Althaus H.-J., Chudacoff M., Hischier R., Jungbluth N., Osses M., Primas A. (2007) Life Cycle Inventories of Chemicals. Final report ecoinvent data v2.0. Volume: 8. Swiss Centre for LCI, Empa - TSL. Dübendorf, CH.
Type: Measurement on site
Source: CD-ROM
First author: Althaus H.-J.
Other authors: Chudacoff M., Hischier R., Jungbluth N., Osses M., Primas A.
Year: 2007
Title of anthology: Final report ecoinvent data v2.0
Place of publication: Dübendorf, CH
Publisher: Swiss Centre for LCI, Empa - TSL
Volume No: 8

## Validation
Proof reading validation: Passed.; Other validation: none;
