# Average mineral fertiliser, as P2O5, at regional storehouse

Dataset: EcoSpold 1, unit process
Functional unit: 1 kg
Category: agricultural / agricultural means of production\mineral fertiliser
Geography: RER
Time period: 2017-01 to 2020-12
Generated by: Melina Glimmann
accessRestrictedTo: 0
copyright: true

## General comment
The inventory refers to the production of 1 kg P2O5 fertiliser

## Geography
RER

## Reference product
- Average mineral fertiliser, as P2O5, at regional storehouse [RER]: 1 kg

## Inputs from technosphere
- Ammonium nitrate phosphate, as P2O5, at regional storehouse [RER]: 0.074, 0.285, 0.148 kg (3 entries); lognormal SD95 1.3025
  (4,1,2,2,1,5,BU:1.05); ;
- Triple superphosphate, as P2O5, at regional storehouse [RER]: 0.411 kg; lognormal SD95 1.3025
  (4,1,2,2,1,5,BU:1.05); ;
- Single superphosphate, as P2O5, at regional storehouse [RER]: 0.044 kg; lognormal SD95 1.3025
  (4,1,2,2,1,5,BU:1.05); ;
- Diammonium phosphate, as P2O5, at regional storehouse [RER]: 0.261 kg; lognormal SD95 1.3025
  (4,1,2,2,1,5,BU:1.05); ;

## Sampling procedure
The data is based on literature and statistical data as well as expert judgements.

## Sources
- Kaegi T., Glimmann M., Conte F., Roberts G., 2021, 2021 - LCA tomatoes and green beans production - Kaegi, Carbotech on behalf of BAFU, Carbotech AG, Zuerich, CH

## Validation
15.12.2021 \\tsclient\Schreibtisch\WinShare\BAFU Gemuese\2021-12-15\[EcoSpold_Bafu_Gemuese_Average mineral fertiliser_as P2O5 v1.xlsx]X-Process
