# 570 kWp open ground installation, micro-Si, on open ground

Dataset: EcoSpold 1, unit process, infrastructure
Functional unit: 1 p
Category: chemicals / processing
Geography: RER
Time period: 2014-01 to 2018-12
Production volume: Total installed capacity in 2018: 120 GWp in Europe.
Share of production covered: 100 %
Generated by: Philippe Stolz
accessRestrictedTo: 0
copyright: true

## General comment
Photovoltaic installation with a capacity of 570kWp and a life time of 30 years installed in Europe. The efficiency of micro-Si PV modules is 10.0% (manufacturer data 2011). The share of rejected or replaced PV modules is estimated at 3%. The inverter is assumed to be replaced once during the service life of the PV system.;

## Included processes
All components for the installation of a 570kWp photovoltaic plant, energy use for the mounting, transport of materials and persons to the construction place. Disposal of components after end of life.

## Geography
Installation in Europe.

## Technology
Current technology for mounting of panels or laminates, electric installations and other components.

## Time period
Module efficiency in 2011.

## Reference product
- 570 kWp open ground installation, micro-Si, on open ground [RER]: 1 p
  Europe

## Inputs from technosphere
- Open ground construction, on ground [RER]: 5700 m2; lognormal SD95 3.0827
  (3,4,3,1,1,5,BU:3); installation
- Transport, freight, lorry, 7.5t-16t gross weight, fleet average [RER]: 16761 tkm; lognormal SD95 2.095
  (4,5,na,na,na,na,BU:2); Transport of module and material (panel, electrical installation and mounting structure) 100 km from the regional storage to the construction site
- Photovoltaic panel, micro-Si, at regional storage [RER]: 5871 m2; lognormal SD95 3.0157
  (2,1,1,1,1,4,BU:3); Module
- Electric installation, 570 kWp photovoltaic plant, at plant [ES]: 1 p; lognormal SD95 3.0827
  (3,4,3,1,1,5,BU:3); cabling, lightning protection and fuse box
- Diesel, burned in building machine, average [CH]: 7673.1 MJ; lognormal SD95 2.0865
  (3,4,3,1,1,5,BU:2); Energy use for foundation piling and wheel loader, analogous to single-Si
- Electricity, low voltage, production ENTSO-E, at grid: 36.033 kWh; lognormal SD95 1.285
  (3,4,3,1,1,5,BU:1.05); Energy for mounting
- Inverter, 500kW, at plant [RER]: 2.28 p; lognormal SD95 3.0827
  (3,4,3,1,1,5,BU:3); 1 replacement during the lifetime of the PV system; demand scaled linearly by power output
- Treatment, c-Si PV module [RER]: 97325 kg; lognormal SD95 1.3001
  (4,5,na,na,na,na,BU:1.05); recycling of PV modules at the end of life

## Emissions to nature
- Heat, waste [emissions to air, high. pop.]: 129.72 MJ; lognormal SD95 1.1576
  (3,4,2,1,1,1,BU:1.05); calculated with electricty use

## Sampling procedure
Data provided by Oerlikon Solar

## Extrapolations
Estimations for lifetime of PV modules (30a) and inverters (15a) as well as for transport distances.

## Sources
- Frischknecht R., Itten R., Sinha P., de Wild-Scholten M., Zhank J., 2020, 2015 - LCI and LCA photovoltaic systems - Frischknecht, Project report, 174, IEA PVPS Task 12, Petten, NL
Frischknecht R.,, Stolz P., Sinha P., de Wild-Scholten M. (2020) Life Cycle Inventories and Life Cycle Assessments of Photovoltaic Systems. Project report. Volume: 174. IEA PVPS Task 12.
Type: Separate publication
Source: Report
First author: Frischknecht R.,
Other authors: Stolz P., Sinha P., de Wild-Scholten M.
Year: 2020
Title of anthology: Project report
Publisher: IEA PVPS Task 12
Volume No: 174
Original title: Life Cycle Inventories and Life Cycle Assessments of Photovoltaic Systems

## Validation
Proof reading validation: 30.09.2020; Other validation: G:\Projekte laufend\174 Photovoltaic, IEA Task 12\2017 Global supply chain\EcoSpold\[174-photovoltaics-global-supply-chain-v2.5.xlsx]X-Process;
