# Medium duty truck, diesel, 18t gross weight, 2020, EURO-VI, urban delivery

Dataset: EcoSpold 1, unit process
Functional unit: 1 p
Category: transport systems / road\Transformation\Infrastructure
Geography: RER
Time period: 2020-01 to 2020-12
Generated by: Romain Sacchi
accessRestrictedTo: 0
copyright: False

## General comment
Combustion engine power: 322 [kW]. Power share from combustion engine: 100 [%]. Km over lifetime: 693000 [km]. Yearly mileage: 42000 [km/year]. Autonomy on a full tank/battery: 150 [km]. Tank-to-wheel efficiency: 24 [%]. Tank-to-wheel energy consumption: 9742 [kj/km]. Fuel tank capacity: 405 [kWh]. Available payload: 8700 [kg]. Payload: 3050 [kg]. Load factor: 35 [%]. Curb mass (excl. driver and cargo): 9224 [kg]. Driving mass (incl. driver and cargo): 12349 [kg]..

## Time period
EURO-VI emissions standards apply to truck registrations from 2013-01 until present. Vehicle lightweighting factors match manufacture year of 2020

## Reference product
- Medium duty truck, diesel, 18t gross weight, 2020, EURO-VI, urban delivery [RER]: 1 p

## Inputs from technosphere
All rows: lognormal SD95 1.09366
- Assembly operation, for lorry [RER]: 9224 kg
  Uncertainty from pedigree matrix: (2, 3, 2, 1, 1, 3)
- Gearbox, for lorry [RER]: 153 kg
  Uncertainty from pedigree matrix: (2, 3, 2, 1, 1, 3)
- Fuel tank, for diesel vehicle [RER]: 33.8 kg
  Uncertainty from pedigree matrix: (2, 3, 2, 1, 1, 3)
- Transmission, for lorry [RER]: 221 kg
  Uncertainty from pedigree matrix: (2, 3, 2, 1, 1, 3)
- Suspension, for lorry [RER]: 1720 kg
  Uncertainty from pedigree matrix: (2, 3, 2, 1, 1, 3)
- Maintenance, lorry 16t [CH]: 1.13 p
  Uncertainty from pedigree matrix: (2, 3, 2, 1, 1, 3)
- Power electronics, for lorry [RER]: 125 kg
  Uncertainty from pedigree matrix: (2, 3, 2, 1, 1, 3)
- Other components, for hybrid electric lorry [RER]: 614 kg
  Uncertainty from pedigree matrix: (2, 3, 2, 1, 1, 3)
- Retarder, for lorry [RER]: 51 kg
  Uncertainty from pedigree matrix: (2, 3, 2, 1, 1, 3)
- Exhaust system, for lorry [RER]: 225 kg
  Uncertainty from pedigree matrix: (2, 3, 2, 1, 1, 3)
- Cabin, for lorry [RER]: 900 kg
  Uncertainty from pedigree matrix: (2, 3, 2, 1, 1, 3)
- Glider lightweighting [GLO]: 420 kg
  Uncertainty from pedigree matrix: (2, 3, 2, 1, 1, 3)
- Frame, blanks and saddle, for lorry [RER]: 3620 kg
  Uncertainty from pedigree matrix: (2, 3, 2, 1, 1, 3)
- Internal combustion engine, for lorry [RER]: 954 kg
  Uncertainty from pedigree matrix: (2, 3, 2, 1, 1, 3)
- Tires and wheels, for lorry [RER]: 998 kg
  Uncertainty from pedigree matrix: (2, 3, 2, 1, 1, 3)
- Disposal, lorry 16t [CH]: 1.13 p
  Uncertainty from pedigree matrix: (2, 3, 2, 1, 1, 3)

## Sources
- Sacchi R., Bauer C., 2023, 2023 - LCI on-road vehicles - Sacchi, PSI, Villigen, CH
doi: 10.5281/ZENODO.5156043
