# Heat distribution, hydronic radiant floor heating, 150m2

Dataset: EcoSpold 1, unit process, infrastructure
Functional unit: 1 p
Category: energy, obsolete / heat, obsolete\heat pumps, obsolete\infrastructure
Geography: CH
Time period: 2000-01 to 2000-12
Share of production covered: 0 %
Generated by: Thomas Heck
accessRestrictedTo: 0
copyright: true

## General comment
Average infrastructure.;
Synonyms: floor radiation heating, radiant floor heating, hydronic radiant floor heating;

## Included processes
The module includes the most important materials and transport needed for production.

## Geography
Could be used for European conditions.

## Technology
Underfloor heating.

## Reference product
- Heat distribution, hydronic radiant floor heating, 150m2 [CH]: 1 p
  SWITZERLAND

## Inputs from technosphere
- Disposal, inert waste, 5% water, to construction waste landfill [CH]: 5730 kg; lognormal SD95 2.06
  basic uncertainty:2;(4,na,3,1,1,na);
- Disposal, plastics, mixture, 15.3% water, to municipal incineration [CH]: 167 kg; lognormal SD95 2.06
  basic uncertainty:2;(4,na,3,1,1,na);
- Cement, unspecified, at plant [CH]: 900 kg; lognormal SD95 2.06
  basic uncertainty:2;(4,na,3,1,1,na);
- Aluminium, production mix, at plant [RER]: 126 kg; lognormal SD95 2.06
  basic uncertainty:2;(4,na,3,1,1,na);
- Transport, freight, rail [RER]: 160 tkm; lognormal SD95 2.49
  uncertainty of transport distance and of amount of material
- Polyethylene, LDPE, granulate, at plant [RER]: 101 kg; lognormal SD95 2.06
  basic uncertainty:2;(4,na,3,1,1,na);
- Polystyrene, high impact, HIPS, at plant [RER]: 66 kg; lognormal SD95 2.06
  basic uncertainty:2;(4,na,3,1,1,na);
- Transport, freight, lorry, 16t-32t gross weight, fleet average [CH]: 128 tkm; lognormal SD95 2.49
  uncertainty of transport distance and of amount of material
- Sand, at mine [CH]: 4650 kg; lognormal SD95 2.06
  basic uncertainty:2;(4,na,3,1,1,na);

## Inputs from nature
- Water, unspecified natural origin/m3 [resources, in water]: 0.45 m3; lognormal SD95 2.06
  basic uncertainty:2;(4,na,3,1,1,na);

## Emissions to nature
- Water [emissions to water, unspecified]: 427.5 kg; lognormal SD95 2.5196
  (5,5,5,5,5,BU:1.05); All uncertainty-values set to 5.0 by default. Balance of input water

## Sampling procedure
Literature, manufacturer information

## Sources
- Heck T., 2007, 2007 - Heat pumps - Heck, Sachbilanzen von Energiesystemen. Final report No. 6 ecoinvent data v2.0, 6, Swiss Centre for LCI, PSI, Duebendorf and Villigen, CH
Heck, T. (2007) Wärmepumpen. Sachbilanzen von Energiesystemen. Final report No. 6 ecoinvent data v2.0. Editors: Dones R.. Volume: 6. Swiss Centre for LCI, PSI. Dübendorf and Villigen, CH.
Type: Measurement on site
Source: CD-ROM
First author: Heck, T.
Year: 2007
Name of editors: Dones R.
Title of anthology: Sachbilanzen von Energiesystemen. Final report No. 6 ecoinvent data v2.0
Place of publication: Dübendorf and Villigen, CH
Publisher: Swiss Centre for LCI, PSI
Volume No: 6

## Validation
Proof reading validation: prepared; Other validation: none;
