# Exhaust gas treatment 1

Dataset: EcoSpold 1, unit process
Functional unit: 1 kg
Category: transport systems / road\Vehicle components\Energy storage\Hydrogen tank
Geography: RER
Time period: 2020-01 to 2020-12
Generated by: Romain Sacchi
accessRestrictedTo: 0
copyright: False

## General comment
Original source: Benitez A, Wulf C, de Palmenaer A, Lengersdorf M, Röding T, Grube T, et al. Ecological assessment of fuel cell electric vehicles with special focus on type IV carbon fiber hydrogen tank. J Clean Prod 2021, 278:123277. https://doi.org/10.1016/j.jclepro.2020.123277..

## Time period
Base technology year of 2020

## Reference product
- Exhaust gas treatment 1 [RER]: 1 kg

## Emissions to nature
- Argon [emissions to air, unspecified]: 0.0126 kg; lognormal SD95 1.16387
  Uncertainty from pedigree matrix: (3, 3, 3, 2, 1, 3)
- Carbon dioxide, fossil [emissions to air, unspecified]: 0.00163 kg; lognormal SD95 1.16387
  Uncertainty from pedigree matrix: (3, 3, 3, 2, 1, 3)
- Water [emissions to air, unspecified]: 2.07e-7 kg; lognormal SD95 1.16387
  Uncertainty from pedigree matrix: (3, 3, 3, 2, 1, 3)
- Nitrogen [emissions to air, unspecified]: 0.00743 kg; lognormal SD95 1.16387
  Uncertainty from pedigree matrix: (3, 3, 3, 2, 1, 3)

## Sources
- Sacchi R., Bauer C., 2023, 2023 - LCI on-road vehicles - Sacchi, PSI, Villigen, CH
doi: 10.5281/ZENODO.5156043
