# Disposal, lignite ash, 0% water, to opencast refill

Dataset: EcoSpold 1, unit process
Functional unit: 1 kg
Category: Others / unspecified
Geography: FR
Time period: 2000-01 to 2000-12
Generated by: Gabor Doka
accessRestrictedTo: 0
copyright: true

## General comment
backfilled waste composition is (in ppm): H2O n.a.;
Synonyms: ashes form lignite incineration disposed as backfill in opencast lignite mines;

## Included processes
This module contains only direct emissions from lignite ash used as backfill in opencast lignite mines: short-term emissions (0-100a) and long-term emissions (>100a) both to ground water. E.g. land-use and energy consumption is *not* included.

## Geography
Ash composition calculated from country-specific coal composition (FR) and technology-specific transfer coefficients in power plant.

## Technology
Lignite ash as backfill in lignite opencast mine (together with tailings)

## Reference product
- Disposal, lignite ash, 0% water, to opencast refill [FR]: 1 kg
  FRANCE

## Emissions to nature
- Thallium [emissions to water, groundwater, long-term]: 7.0325e-8 kg; lognormal SD95 15.841
  Long-term emission from lignite ash backfill. Uncertainty derived from uncertainty in ash composition and uncertainty in transfer coefficients.
- Beryllium [emissions to water, groundwater]: 5.3471e-9 kg; lognormal SD95 16.97
  Short-term emission from lignite ash backfill. Uncertainty derived from uncertainty in ash composition and uncertainty in transfer coefficients.
- Manganese [emissions to water, groundwater, long-term]: 7.0519e-5 kg; lognormal SD95 7.4522
  (same comment as for Thallium)
- Zinc [emissions to water, groundwater, long-term]: 9.8347e-5 kg; lognormal SD95 7.1272
  (same comment as for Thallium)
- Cobalt [emissions to water, groundwater, long-term]: 5.2854e-5 kg; lognormal SD95 7.7391
  (same comment as for Thallium)
- Cadmium [emissions to water, groundwater, long-term]: 2.1426e-6 kg; lognormal SD95 11.304
  (same comment as for Thallium)
- Chromium VI [emissions to water, groundwater]: 7.4453e-6 kg; lognormal SD95 8.4754
  (same comment as for Beryllium)
- Boron [emissions to water, groundwater]: 5.8054e-6 kg; lognormal SD95 8.0733
  (same comment as for Beryllium)
- Selenium [emissions to water, groundwater]: 2.3002e-6 kg; lognormal SD95 10.312
  (same comment as for Beryllium)
- Molybdenum [emissions to water, groundwater]: 7.0477e-6 kg; lognormal SD95 9.9014
  (same comment as for Beryllium)
- Tungsten [emissions to water, groundwater, long-term]: 2.1662e-6 kg; lognormal SD95 10.762
  (same comment as for Thallium)
- Strontium [emissions to water, groundwater]: 3.7418e-7 kg; lognormal SD95 11.033
  (same comment as for Beryllium)
- Mercury [emissions to water, groundwater]: 1.3952e-11 kg; lognormal SD95 27.954
  (same comment as for Beryllium)
- Zinc [emissions to water, groundwater]: 5.0489e-9 kg; lognormal SD95 17.016
  (same comment as for Beryllium)
- Vanadium [emissions to water, groundwater, long-term]: 6.6336e-5 kg; lognormal SD95 7.6105
  (same comment as for Thallium)
- Silicon [emissions to water, groundwater]: 0.00095502 kg; lognormal SD95 4.1794
  (same comment as for Beryllium)
- Calcium [emissions to water, groundwater, long-term]: 0.070495 kg; lognormal SD95 2.19
  (same comment as for Thallium)
- Aluminium [emissions to water, groundwater, long-term]: 0.016552 kg; lognormal SD95 3.0343
  (same comment as for Thallium)
- Chloride [emissions to water, groundwater]: 1.0059e-5 kg; lognormal SD95 8.9602
  (same comment as for Beryllium)
- Manganese [emissions to water, groundwater]: 2.44e-9 kg; lognormal SD95 18.2
  (same comment as for Beryllium)
- Cadmium [emissions to water, groundwater]: 6.0929e-11 kg; lognormal SD95 25.032
  (same comment as for Beryllium)
- Arsenic [emissions to water, groundwater]: 1.7492e-5 kg; lognormal SD95 8.8932
  (same comment as for Beryllium)
- Lead [emissions to water, groundwater]: 3.8183e-10 kg; lognormal SD95 21.466
  (same comment as for Beryllium)
- Iodide [emissions to water, groundwater, long-term]: 7.0522e-14 kg; lognormal SD95 12.934
  (same comment as for Thallium)
- Nickel [emissions to water, groundwater]: 8.0088e-8 kg; lognormal SD95 13.014
  (same comment as for Beryllium)
- Barium [emissions to water, groundwater]: 1.22e-8 kg; lognormal SD95 15.644
  (same comment as for Beryllium)
- Titanium [emissions to water, groundwater]: 4.3843e-7 kg; lognormal SD95 10.834
  (same comment as for Beryllium)
- Phosphate [emissions to water, groundwater, long-term]: 0.00024225 kg; lognormal SD95 7.3884
  (same comment as for Thallium)
- Bromine [emissions to water, groundwater, long-term]: 9.5406e-8 kg; lognormal SD95 10.36
  (same comment as for Thallium)
- Scandium [emissions to water, groundwater, long-term]: 1.2648e-6 kg; lognormal SD95 11.579
  (same comment as for Thallium)
- Selenium [emissions to water, groundwater, long-term]: 3.6642e-6 kg; lognormal SD95 10.146
  (same comment as for Thallium)
- Potassium [emissions to water, groundwater]: 0.0011939 kg; lognormal SD95 4.5282
  (same comment as for Beryllium)
- Beryllium [emissions to water, groundwater, long-term]: 3.5207e-6 kg; lognormal SD95 10.706
  (same comment as for Thallium)
- Tungsten [emissions to water, groundwater]: 1.3599e-6 kg; lognormal SD95 10.933
  (same comment as for Beryllium)
- Cobalt [emissions to water, groundwater]: 3.7875e-8 kg; lognormal SD95 14.021
  (same comment as for Beryllium)
- Fluoride [emissions to water, groundwater, long-term]: 1.533e-5 kg; lognormal SD95 8.8939
  (same comment as for Thallium)
- Thallium [emissions to water, groundwater]: 1.068e-10 kg; lognormal SD95 23.731
  (same comment as for Beryllium)
- Arsenic [emissions to water, groundwater, long-term]: 1.7492e-14 kg; lognormal SD95 9.0868
  (same comment as for Thallium)
- Sulfate [emissions to water, groundwater, long-term]: 0.086585 kg; lognormal SD95 2.5311
  (same comment as for Thallium)
- Sodium [emissions to water, groundwater]: 0.0021987 kg; lognormal SD95 4.1897
  (same comment as for Beryllium)
- Antimony [emissions to water, groundwater, long-term]: 8.6483e-6 kg; lognormal SD95 9.1803
  (same comment as for Thallium)
- Chromium VI [emissions to water, groundwater, long-term]: 4.896e-6 kg; lognormal SD95 8.3219
  (same comment as for Thallium)
- Nickel [emissions to water, groundwater, long-term]: 5.2734e-5 kg; lognormal SD95 7.7406
  (same comment as for Thallium)
- Magnesium [emissions to water, groundwater, long-term]: 0.010573 kg; lognormal SD95 3.3239
  (same comment as for Thallium)
- Silicon [emissions to water, groundwater, long-term]: 0.12069 kg; lognormal SD95 1.9179
  (same comment as for Thallium)
- Scandium [emissions to water, groundwater]: 4.9826e-7 kg; lognormal SD95 11.943
  (same comment as for Beryllium)
- Lead [emissions to water, groundwater, long-term]: 1.7574e-5 kg; lognormal SD95 8.8882
  (same comment as for Thallium)
- Titanium [emissions to water, groundwater, long-term]: 0.00035217 kg; lognormal SD95 5.9469
  (same comment as for Thallium)
- Chloride [emissions to water, groundwater, long-term]: 7.5715e-6 kg; lognormal SD95 8.9739
  (same comment as for Thallium)
- Bromine [emissions to water, groundwater]: 5.5463e-6 kg; lognormal SD95 10.156
  (same comment as for Beryllium)
- Molybdenum [emissions to water, groundwater, long-term]: 9.5903e-12 kg; lognormal SD95 10.107
  (same comment as for Thallium)
- Fluoride [emissions to water, groundwater]: 2.3e-6 kg; lognormal SD95 9.6978
  (same comment as for Beryllium)
- Tin [emissions to water, groundwater, long-term]: 5.6413e-6 kg; lognormal SD95 10.156
  (same comment as for Thallium)
- Calcium [emissions to water, groundwater]: 2.6691e-5 kg; lognormal SD95 6.9052
  (same comment as for Beryllium)
- Vanadium [emissions to water, groundwater]: 7.5803e-7 kg; lognormal SD95 10.279
  (same comment as for Beryllium)
- Tin [emissions to water, groundwater]: 4.4779e-10 kg; lognormal SD95 21.17
  (same comment as for Beryllium)
- Strontium [emissions to water, groundwater, long-term]: 0.00024637 kg; lognormal SD95 6.2662
  (same comment as for Thallium)
- Iodide [emissions to water, groundwater]: 7.0522e-7 kg; lognormal SD95 12.696
  (same comment as for Beryllium)
- Barium [emissions to water, groundwater, long-term]: 0.0003526 kg; lognormal SD95 5.9469
  (same comment as for Thallium)
- Antimony [emissions to water, groundwater]: 5.429e-6 kg; lognormal SD95 9.3373
  (same comment as for Beryllium)
- Sulfate [emissions to water, groundwater]: 0.031892 kg; lognormal SD95 2.7563
  (same comment as for Beryllium)
- Phosphate [emissions to water, groundwater]: 4.0443e-7 kg; lognormal SD95 12.332
  (same comment as for Beryllium)
- Iron [emissions to water, groundwater]: 1.5932e-7 kg; lognormal SD95 12.309
  (same comment as for Beryllium)
- Magnesium [emissions to water, groundwater]: 5.0344e-6 kg; lognormal SD95 8.2277
  (same comment as for Beryllium)
- Aluminium [emissions to water, groundwater]: 2.0606e-5 kg; lognormal SD95 6.8999
  (same comment as for Beryllium)
- Boron [emissions to water, groundwater, long-term]: 0.00046309 kg; lognormal SD95 5.6622
  (same comment as for Thallium)
- Sodium [emissions to water, groundwater, long-term]: 0.0009748 kg; lognormal SD95 4.2499
  (same comment as for Thallium)
- Iron [emissions to water, groundwater, long-term]: 0.012724 kg; lognormal SD95 3.1697
  (same comment as for Thallium)
- Potassium [emissions to water, groundwater, long-term]: 0.00092181 kg; lognormal SD95 4.5351
  (same comment as for Thallium)
- Mercury [emissions to water, groundwater, long-term]: 7.0553e-8 kg; lognormal SD95 15.838
  (same comment as for Thallium)
- Copper [emissions to water, groundwater, long-term]: 2.1136e-5 kg; lognormal SD95 8.69
  (same comment as for Thallium)
- Copper [emissions to water, groundwater]: 3.4084e-9 kg; lognormal SD95 17.66
  (same comment as for Beryllium)

## Sampling procedure
country-specific calculation based on literature data

## Extrapolations
Ash composition calculated from coal composition and transfer coefficients in power plant (cf. ecoinvent coal report Röder 2003). Transfer coefficients in backfill estimated from data of residual material landfills and estimated carbonate phase of lignite ashes

## Uncertainty adjustments
uncertainty of waste input composition data derived from generic formula GSD(c) = N*ln(c)+1. Mean long-term emissions are the emissions until the next glacial period occurs (in 60'000a) and the landfill is eroded. Maximal long-term emissions are the complete emissions of all landfilled material (except Cr). Minimal long-term emissions are derived implicitly from the mean and maximal values assuming a lognormal distribution.

## Sources
- Doka G., 2009, 2009 - LCI waste treatment services - Doka, Final report ecoinvent data v2.1, 13, Swiss Centre for LCI, Doka LCA, Duebendorf and St. Gallen, CH
Doka G. (2008) Life Cycle Inventories of Waste Treatment Services. Final report ecoinvent data v2.1. Volume: 13. Issue: 0. Swiss Centre for LCI, Empa - TSL. Dübendorf, CH.
Type: Measurement on site
Source: CD-ROM
First author: Doka G.
Year: 2008
Title of anthology: Final report ecoinvent data v2.1
Place of publication: Dübendorf, CH
Publisher: Swiss Centre for LCI, Empa - TSL
Volume No: 13
Issue No: 0

## Validation
Proof reading validation: passed.; Other validation: none;
