# Electricity, nuclear, at power plant

Dataset: EcoSpold 1, unit process
Functional unit: 1 kWh
Category: electricity by fuel / waste\nuclear
Geography: UCTE
Time period: 2000-01 to 2000-12
Generated by: Roberto Dones
accessRestrictedTo: 0
copyright: true

## General comment
Details on the two components average PWR and average BWR can be found in the respective mudules.;

## Included processes
The module represents the Swiss nuclear mix (electricity delivered in the period 1995 - 1999) of 90% PWR and 10% BWR.

## Geography
Swiss data of one specific PWR and one specific BWR for requirements and all UCTE (BE, CH, DE, ES, FR, NL) nuclear power plants for emissions.

## Technology
Standard technology for commercial operation.

## Reference product
- Electricity, nuclear, at power plant [UCTE]: 1 kWh
  Union for the Co-ordination of Transmission of Electricity

## Inputs from technosphere
- Electricity, nuclear, at power plant boiling water reactor [UCTE]: 0.1 kWh; lognormal SD95 1.02
  share nuclear power generation
- Electricity, nuclear, at power plant pressure water reactor [UCTE]: 0.9 kWh; lognormal SD95 1.02
  share nuclear power generation

## Sampling procedure
Energy statistics

## Sources
- Dones R., Bauer C., Doka G., 2009, 2009 - Nuclear energy - Dones, Sachbilanzen von Energiesystemen. Final report No. 6 ecoinvent v2.1, 6, Swiss Centre for LCI, PSI, Doka LCA, Duebendorf and Villigen, CH
Dones, R., Doka G. (2009) Kernenergie. Sachbilanzen von Energiesystemen. Final report No. 6 ecoinvent v2.1. Editors: Bauer C.. Volume: 6. Swiss Centre for LCI, PSI. Dübendorf and Villigen, CH.
Type: Measurement on site
Source: CD-ROM
First author: Dones, R.
Other authors: Doka G.
Year: 2009
Name of editors: Bauer C.
Title of anthology: Sachbilanzen von Energiesystemen. Final report No. 6 ecoinvent v2.1
Place of publication: Dübendorf and Villigen, CH
Publisher: Swiss Centre for LCI, PSI
Volume No: 6

## Validation
Proof reading validation: passed; Other validation: for final calculation August 2003;
