# Natural gas, burned in boiler fan burner non-modulating <100kW

Dataset: EcoSpold 1, unit process
Functional unit: 1 MJ
Category: heat / gas\furnace
Geography: RER
Time period: 2000-01 to 2000-12
Generated by: Thomas Heck
accessRestrictedTo: 0
copyright: true

## General comment
NOx and CO emissions derived from measurements under controlled conditions;

## Included processes
The module includes fuel input from low pressure (CH) network, infrastructure (boiler), emissions to air, and electricity needed for operation.

## Geography
Natural gas input (low pressure) and emission data extrapolated from Switzerland to Europe (RER).

## Technology
Models on market

## Reference product
- Natural gas, burned in boiler fan burner non-modulating <100kW [RER]: 1 MJ
  Europe

## Inputs from technosphere
- Electricity, low voltage, production ENTSO-E, at grid: 0.00278 kWh; lognormal SD95 2
  range of electricity for pumps etc., different literature
- xxx Gas boiler [RER]: 6.6e-7 p; lognormal SD95 1.5
  uncertainty of life time and extrapolation to range of capacity
- Natural gas, low pressure, at consumer [CH]: 1 MJ; lognormal SD95 1.2
  CH module used for RER

## Emissions to nature
- Benzo(a)pyrene [emissions to air, high. pop.]: 1e-11 kg; lognormal SD95 8
  rough estimate, high uncertainty
- Particulates, < 2.5 um [emissions to air, high. pop.]: 1e-7 kg; lognormal SD95 2
  literature
- Butane [emissions to air, high. pop.]: 7e-7 kg; lognormal SD95 8
  rough estimate, high uncertainty
- Propane [emissions to air, high. pop.]: 2e-7 kg; lognormal SD95 8
  rough estimate, high uncertainty
- Sulfur dioxide [emissions to air, high. pop.]: 5.5e-7 kg; lognormal SD95 1.1
  composition of natural gas
- Nitrogen oxides [emissions to air, high. pop.]: 1.7e-5 kg; lognormal SD95 1.4
  calculated based on (SVGW 2002)
- Benzene [emissions to air, high. pop.]: 4e-7 kg; lognormal SD95 8
  rough estimate, high uncertainty
- Propionic acid [emissions to air, high. pop.]: 2e-8 kg; lognormal SD95 8
  rough estimate, high uncertainty
- Acetaldehyde [emissions to air, high. pop.]: 1e-9 kg; lognormal SD95 8
  rough estimate, high uncertainty
- Carbon monoxide, fossil [emissions to air, high. pop.]: 3e-6 kg; lognormal SD95 6.2
  calculated based on (SVGW 2002)
- PAH, polycyclic aromatic hydrocarbons [emissions to air, high. pop.]: 1e-8 kg; lognormal SD95 8
  rough estimate, high uncertainty
- Dioxin, 2,3,7,8 Tetrachlorodibenzo-p- [emissions to air, high. pop.]: 3e-17 kg; lognormal SD95 8
  rough estimate, high uncertainty
- Heat, waste [emissions to air, high. pop.]: 1.11 MJ; lognormal SD95 1
  uncertainty of operation supply energy and heating value
- Acetic acid [emissions to air, high. pop.]: 1.5e-7 kg; lognormal SD95 8
  rough estimate, high uncertainty
- Dinitrogen monoxide [emissions to air, high. pop.]: 5e-7 kg; lognormal SD95 8
  rough estimate, high uncertainty
- Methane, fossil [emissions to air, high. pop.]: 2e-6 kg; lognormal SD95 8
  rough estimate, high uncertainty
- Formaldehyde [emissions to air, high. pop.]: 1e-7 kg; lognormal SD95 8
  rough estimate, high uncertainty
- Pentane [emissions to air, high. pop.]: 1.2e-6 kg; lognormal SD95 8
  rough estimate, high uncertainty
- Mercury [emissions to air, high. pop.]: 3e-11 kg; lognormal SD95 5
  trace element in natural gas
- Carbon dioxide, fossil [emissions to air, high. pop.]: 0.056 kg; lognormal SD95 1.1
  composition of natural gas
- Toluene [emissions to air, high. pop.]: 2e-7 kg; lognormal SD95 8
  rough estimate, high uncertainty

## Sampling procedure
Literature, manufacturers; CO and NOx emissions from (SVGW 2002), sample size (number of selected devices for which emission values are given in SVGW list): CO 72 , NOx 73 .

## Extrapolations
see Geography

## Sources
- Faist Emmenegger M., Heck T., Jungbluth N., Tuchschmid M., 2007, 2007 - Natural gas - Faist-Emmeneger, Sachbilanzen von Energiesystemen. Final report No. 6 ecoinvent data v2.0, 6, Swiss Centre for LCI, PSI, ESU-services Ltd., Duebendorf and Villigen, CH
Faist Emmenegger, M., Heck, T., Jungbluth, N. (2007) Erdgas. Sachbilanzen von Energiesystemen. Final report No. 6 ecoinvent data v2.0. Editors: Dones R.. Volume: 6. Swiss Centre for LCI, PSI. Dübendorf and Villigen, CH.
Type: Measurement on site
Source: CD-ROM
First author: Faist Emmenegger, M.
Other authors: Heck, T., Jungbluth, N.
Year: 2007
Name of editors: Dones R.
Title of anthology: Sachbilanzen von Energiesystemen. Final report No. 6 ecoinvent data v2.0
Place of publication: Dübendorf and Villigen, CH
Publisher: Swiss Centre for LCI, PSI
Volume No: 6

## Validation
Proof reading validation: Preliminary passed, based on a review of a first draft of the final report. Data have to be validated again after review of the written report.; Other validation: none;
