# xxx Operation, lorry >28t, fleet average

Dataset: EcoSpold 1, unit process
Functional unit: 1 km
Category: transport systems / transport, obsolete\road, obsolete\operations, obsolete
Geography: CH
Production volume: nachliefern
Share of production covered: 100 %
Generated by: Michael Spielmann
accessRestrictedTo: 0
copyright: true

## General comment
Average data for the operation of an average Swiss lorry (fleet average) in the year 2005, comprising various emission technologies.;

## Included processes
Fuel consumption is included. Direct airborne emissions of gaseous substances, particulate matters and heavy metals are accounted for. Particulate emissions comprise exhaust- and abrasions emissions. Heavy metal emissions to soil and water caused by tyre abrision are included as well.

## Technology
diesel engine

## Reference product
- xxx Operation, lorry >28t, fleet average [CH]: 1 km
  SWITZERLAND

## Inputs from technosphere
- Diesel, at regional storage [CH]: 0.28099 kg; lognormal SD95 1.05
  (1,1,1,1,1,1); derived from Swiss database on road transport emissions (HBEFA), assuming a share of 62.8% for diesel

## Emissions to nature
- Ethane, 1,1,1,2-tetrafluoro-, HFC-134a [emissions to air, unspecified]: 2.29e-6 kg; lognormal SD95 2
  literature study and own assumptions: initial input cooling agent: 2kg/vehicle. Yearly loss 8%. Yearly kilometric performance: 70000vkm
- Zinc [emissions to water, unspecified]: 5.0189e-6 kg; lognormal SD95 5.6287
  (5,5,5,1,1,5); abrasion of tyres, quantity derived from tyre composition
- Chromium [emissions to soil, unspecified]: 8.4754e-9 kg; lognormal SD95 2.113
  (5,5,5,1,1,5); abrasion of tyres, quantity derived from tyre composition
- Nitrogen oxides [emissions to air, unspecified]: 0.0087785 kg; lognormal SD95 1.5007
  (1,1,1,1,1,2); derived from Swiss database on road transport emissions
- Nickel [emissions to water, unspecified]: 2.2966e-8 kg; lognormal SD95 5.6287
  (5,5,5,1,1,5); abrasion of tyres, quantity derived from tyre composition
- Copper [emissions to soil, unspecified]: 1.1893e-7 kg; lognormal SD95 2.113
  (5,5,5,1,1,5); abrasion of tyres, quantity derived from tyre composition
- Particulates, > 10 um [emissions to air, unspecified]: 5.664e-5 kg; lognormal SD95 1.5224
  (1,3,3,3,1,2); abrasions emissions (tyre wear, break wear, road surface)
- Acetaldehyde [emissions to air, unspecified]: 1.948e-5 kg; lognormal SD95 1.5111
  (2,3,2,1,1,2); derived from NMHC values; split available from European Road Transport Emission database (Copert)
- Nickel [emissions to air, unspecified]: 2.4654e-8 kg; lognormal SD95 5.4168
  (4,5,5,1,1,5); trace elements in fuel and abrasion of tyres
- Noise, road, lorry, average [non material emissions, unspecified]: 1 km
- Mercury [emissions to air, unspecified]: 5.6198e-12 kg; lognormal SD95 5.4168
  (4,5,5,1,1,5); trace elements in fuel
- Dinitrogen monoxide [emissions to air, unspecified]: 8.8345e-6 kg; lognormal SD95 1.5253
  (2,3,1,1,1,4); derived from Swiss database on road transport emissions (HBEFA)
- Selenium [emissions to air, unspecified]: 2.8099e-9 kg; lognormal SD95 5.4168
  (4,5,5,1,1,5); trace elements in fuel
- Formaldehyde [emissions to air, unspecified]: 3.5806e-5 kg; lognormal SD95 1.5111
  (same comment as for Acetaldehyde)
- Lead [emissions to water, unspecified]: 7.3135e-8 kg; lognormal SD95 5.6287
  (5,5,5,1,1,5); abrasion of tyres, quantity derived from tyre composition
- Methane, fossil [emissions to air, unspecified]: 1.0482e-5 kg; lognormal SD95 1.5007
  (1,1,1,1,1,2); derived from HC values; split available from Swiss database on road transport emissions (HBEFA).
- NMVOC, non-methane volatile organic compounds, unspecified origin [emissions to air, unspecified]: 0.0003483 kg; lognormal SD95 1.5007
  (same comment as for Methane, fossil)
- Zinc [emissions to air, unspecified]: 6.7649e-7 kg; lognormal SD95 5.4168
  (4,5,5,1,1,5); trace elements in fuel and abrasion of tyres
- Copper [emissions to water, unspecified]: 1.1893e-7 kg; lognormal SD95 3.5459
  (5,5,5,1,1,5); abrasion of tyres, quantity derived from tyre composition
- Nickel [emissions to soil, unspecified]: 2.2966e-8 kg; lognormal SD95 2.113
  (5,5,5,1,1,5); abrasion of tyres, quantity derived from tyre composition
- Cadmium [emissions to water, unspecified]: 1.7771e-9 kg; lognormal SD95 3.5459
  (5,5,5,1,1,5); abrasion of tyres, quantity derived from tyre composition
- Carbon dioxide, fossil [emissions to air, unspecified]: 0.88859 kg; lognormal SD95 1.0714
  (2,1,1,1,1,1); own calculations, based on fuel consumption
- Sulfur dioxide [emissions to air, unspecified]: 2.8099e-5 kg; lognormal SD95 1.0714
  (2,1,1,1,1,1); own calculations, based on fuel consumption
- Carbon monoxide, fossil [emissions to air, unspecified]: 0.0017253 kg; lognormal SD95 5.0006
  (1,1,1,1,1,2); derived from Swiss database on road transport emissions
- Chromium [emissions to water, unspecified]: 8.4754e-9 kg; lognormal SD95 3.5459
  (5,5,5,1,1,5); abrasion of tyres, quantity derived from tyre composition
- Ammonia [emissions to air, unspecified]: 5e-6 kg; lognormal SD95 1.2423
  (2,3,1,1,1,4); derived from Swiss database on road transport emissions (HBEFA)
- Zinc [emissions to soil, unspecified]: 5.0189e-6 kg; lognormal SD95 2.113
  (5,5,5,1,1,5); abrasion of tyres, quantity derived from tyre composition
- Cadmium [emissions to air, unspecified]: 3.0259e-9 kg; lognormal SD95 5.4168
  (4,5,5,1,1,5); trace elements in fuel and abrasion of tyres
- Lead [emissions to air, unspecified]: 2.826e-8 kg; lognormal SD95 5.4168
  (4,5,5,1,1,5); trace elements in fuel and abrasion of tyres
- Particulates, < 2.5 um [emissions to air, unspecified]: 0.00023648 kg; lognormal SD95 3.0135
  (1,1,3,3,1,2); includes exhaust- and abrasions emissions.
- Heat, waste [emissions to air, unspecified]: 12.673 MJ; lognormal SD95 1.2152
  (2,1,1,1,1,5); own calculation; based on HHV.
- Copper [emissions to air, unspecified]: 8.6885e-7 kg; lognormal SD95 5.4168
  (4,5,5,1,1,5); trace elements in fuel and abrasion of tyres
- Cadmium [emissions to soil, unspecified]: 1.7771e-9 kg; lognormal SD95 2.113
  (5,5,5,1,1,5); abrasion of tyres, quantity derived from tyre composition
- Particulates, > 2.5 um, and < 10um [emissions to air, unspecified]: 6.1589e-5 kg; lognormal SD95 2.0307
  (3,3,3,3,1,2); abrasions emissions (tyre wear, break wear, road surface)
- Xylene [emissions to air, unspecified]: 3.4939e-6 kg; lognormal SD95 1.5007
  (same comment as for Methane, fossil)
- Benzene [emissions to air, unspecified]: 1.3976e-6 kg; lognormal SD95 1.5007
  (same comment as for Methane, fossil)
- Toluene [emissions to air, unspecified]: 7.2935e-6 kg; lognormal SD95 1.5007
  (same comment as for Methane, fossil)
- Chromium [emissions to air, unspecified]: 1.985e-8 kg; lognormal SD95 5.4168
  (4,5,5,1,1,5); trace elements in fuel and abrasion of tyres
- Lead [emissions to soil, unspecified]: 7.3135e-8 kg; lognormal SD95 2.113
  (5,5,5,1,1,5); abrasion of tyres, quantity derived from tyre composition
- Chromium VI [emissions to air, unspecified]: 2.8099e-11 kg; lognormal SD95 5.4168
  (4,5,5,1,1,5); own calculation
- PAH, polycyclic aromatic hydrocarbons [emissions to air, unspecified]: 1e-9 kg; lognormal SD95 12.012
  (2,3,1,1,1,2); rough estimate, derived from from European Road Transport Emission database (Copert)

## Sampling procedure
Literature data.

## Sources
- Spielmann M., Bauer C., Dones R., Tuchschmid M., 2007, 2007 - Transport services - Spielmann, Final report ecoinvent Data v2.0, 14, Swiss Centre for LCI, PSI, ESU-services Ltd., Duebendorf, Villigen and Uster, CH
Spielmann M., Dones R; Bauer C. (2007) Life Cycle Inventories of Transport Services. Final report ecoinvent Data v2.0. Volume: 14. Issue: 0. Swiss Centre for LCI, PSI. Dübendorf and Villigen, CH.
Type: Measurement on site
Source: CD-ROM
First author: Spielmann M.
Other authors: Dones R; Bauer C.
Year: 2007
Title of anthology: Final report ecoinvent Data v2.0
Place of publication: Dübendorf and Villigen, CH
Publisher: Swiss Centre for LCI, PSI
Volume No: 14
Issue No: 0

## Validation
Proof reading validation: Passed; Other validation: none;
