# Disposal, sludge from steel rolling, 20% water, to residual material landfill

Dataset: EcoSpold 1, unit process
Functional unit: 1 kg
Category: waste management / residual material landfill
Geography: CH
Time period: 2000-01 to 2000-12
Generated by: Mischa Zschokke
accessRestrictedTo: 0
copyright: true

## General comment
Correction of Cr(VI) emissions according to "Chromium stability in Steel slag: Elizaveta Cheremisina and Johanna Schenk, www.steel-research.ch, steel research int. 88 (2017) No. 11. According to this literature the Cr(VI) composition of slag from BOF (basic oxigen furnace) and EAF (electric arc furnace) are 0.0001 wt %, 0.000001 kg / kg or 1 mg / kg.\nBecause of the fact that most of the Cr is in the Cr2O3 state. This values are based on model calculations.;
Synonyms: In UVEK2018 enthalten;

## Geography
Switzerland

## Technology
Industry data.

## Time period
Time of publications.

## Reference product
- Disposal, sludge from steel rolling, 20% water, to residual material landfill [CH]: 1 kg
  SWITZERLAND

## Inputs from technosphere
All rows: lognormal SD95 1.0744
- Disposal, cement, hydrated, 0% water, to residual material landfill [CH]: 1 kg
  (2,2,1,1,1,nA,BU:1.05); ;
- Transport, freight, rail [RER]: 0.04 tkm
  (2,2,1,1,1,nA,BU:1.05); ;
- Transport, freight, lorry, 16t-32t gross weight, fleet average [CH]: 0.02 tkm
  (2,2,1,1,1,nA,BU:1.05); ;
- Residual material landfill facility [CH]: 2.0833e-9 p
  (2,2,1,1,1,nA,BU:1.05); ;
- Process-specific burdens, residual material landfill [CH]: 1 kg
  (2,2,1,1,1,nA,BU:1.05); ;
- Cement, unspecified, at plant [CH]: 0.4 kg
  (2,2,1,1,1,nA,BU:1.05); ;

## Emissions to nature
- TOC, Total Organic Carbon [emissions to water, river]: 1.0698e-5 kg; lognormal SD95 1.5051
  (2,2,1,1,1,nA,BU:1.5); ;
- TOC, Total Organic Carbon [emissions to water, groundwater, long-term]: 0.0064079 kg; lognormal SD95 1.5051
  (2,2,1,1,1,nA,BU:1.5); ;
- Chloride [emissions to water, groundwater, long-term]: 0.0055853 kg; lognormal SD95 3.0038
  (2,2,1,1,1,nA,BU:3); ;
- Chromium VI [emissions to water, groundwater, long-term]: 5e-7 kg; lognormal SD95 3.0038
  (2,2,1,1,1,nA,BU:3); total amount in sludge 1mg/kg: assumption 50% to river 50% to groundwater; Cheremisina & Schenk, 2017
- Aluminium [emissions to water, river]: 4.1028e-6 kg; lognormal SD95 5.0043
  (2,2,1,1,1,nA,BU:5); ;
- Lead [emissions to water, groundwater, long-term]: 9.0733e-6 kg; lognormal SD95 5.0043
  (2,2,1,1,1,nA,BU:5); ;
- BOD5, Biological Oxygen Demand [emissions to water, groundwater, long-term]: 0.0052969 kg; lognormal SD95 1.5051
  (2,2,1,1,1,nA,BU:1.5); ;
- Chromium VI [emissions to water, river]: 5e-7 kg; lognormal SD95 3.0038
  (same comment as for Chromium VI)
- Copper [emissions to water, groundwater, long-term]: 6.5144e-5 kg; lognormal SD95 3.0038
  (2,2,1,1,1,nA,BU:3); ;
- BOD5, Biological Oxygen Demand [emissions to water, river]: 8.8429e-6 kg; lognormal SD95 1.5051
  (2,2,1,1,1,nA,BU:1.5); ;
- DOC, Dissolved Organic Carbon [emissions to water, groundwater, long-term]: 0.0064079 kg; lognormal SD95 1.5051
  (2,2,1,1,1,nA,BU:1.5); ;
- Cadmium [emissions to water, river]: 9.9125e-9 kg; lognormal SD95 3.0038
  (2,2,1,1,1,nA,BU:3); ;
- Lead [emissions to water, river]: 1.5147e-8 kg; lognormal SD95 5.0043
  (2,2,1,1,1,nA,BU:5); ;
- Mercury [emissions to water, river]: 1.3784e-8 kg; lognormal SD95 5.0043
  (2,2,1,1,1,nA,BU:5); ;
- Mercury [emissions to water, groundwater, long-term]: 8.2565e-6 kg; lognormal SD95 5.0043
  (2,2,1,1,1,nA,BU:5); ;
- Nickel [emissions to water, groundwater, long-term]: 0.0017912 kg; lognormal SD95 5.0043
  (2,2,1,1,1,nA,BU:5); ;
- Zinc [emissions to water, river]: 2.6783e-8 kg; lognormal SD95 5.0043
  (2,2,1,1,1,nA,BU:5); ;
- Aluminium [emissions to water, groundwater, long-term]: 0.0024576 kg; lognormal SD95 5.0043
  (2,2,1,1,1,nA,BU:5); ;
- COD, Chemical Oxygen Demand [emissions to water, groundwater, long-term]: 0.016194 kg; lognormal SD95 1.5051
  (2,2,1,1,1,nA,BU:1.5); ;
- COD, Chemical Oxygen Demand [emissions to water, river]: 2.7034e-5 kg; lognormal SD95 1.5051
  (2,2,1,1,1,nA,BU:1.5); ;
- Chloride [emissions to water, river]: 0.0022374 kg; lognormal SD95 3.0038
  (2,2,1,1,1,nA,BU:3); ;
- Manganese [emissions to water, river]: 4.9199e-8 kg; lognormal SD95 5.0043
  (2,2,1,1,1,nA,BU:5); ;
- Copper [emissions to water, river]: 1.0876e-7 kg; lognormal SD95 3.0038
  (2,2,1,1,1,nA,BU:3); ;
- Nickel [emissions to water, river]: 2.9903e-6 kg; lognormal SD95 5.0043
  (2,2,1,1,1,nA,BU:5); ;
- Zinc [emissions to water, groundwater, long-term]: 1.6043e-5 kg; lognormal SD95 5.0043
  (2,2,1,1,1,nA,BU:5); ;
- DOC, Dissolved Organic Carbon [emissions to water, river]: 1.0698e-5 kg; lognormal SD95 1.5051
  (2,2,1,1,1,nA,BU:1.5); ;
- Cadmium [emissions to water, groundwater, long-term]: 5.9376e-6 kg; lognormal SD95 3.0038
  (2,2,1,1,1,nA,BU:3); ;
- Iron [emissions to water, groundwater, long-term]: 0.00013582 kg; lognormal SD95 5.0043
  (2,2,1,1,1,nA,BU:5); ;
- Iron [emissions to water, river]: 2.2674e-7 kg; lognormal SD95 5.0043
  (2,2,1,1,1,nA,BU:5); ;
- Manganese [emissions to water, groundwater, long-term]: 2.947e-5 kg; lognormal SD95 5.0043
  (2,2,1,1,1,nA,BU:5); ;

## Sampling procedure
Data from literature

## Extrapolations
Some generic datasets from ecoinvent have been used.

## Sources
- Zschokke M., Bolt P., Conrad S., 2021, 2021 - LCI steel and iron processes - Zschokke, Project report, Carbotech AG, Zuerich, CH
M. Zschokke, S. Conrad, P. Bolt (2020) Life cycle inventories of steel and iron processes for UVEK:2020. Project report. carbotech. Zurich, CH.
Type: Separate publication
Source: Report
First author: M. Zschokke
Other authors: S. Conrad, P. Bolt
Year: 2020
Title of anthology: Project report
Place of publication: Zurich, CH
Publisher: carbotech
Original title: Life cycle inventories of steel and iron processes for UVEK:2020

## Validation
Proof reading validation: 23.02.2021; Other validation: \\tsclient\mischa\UBTeam\AKTUELLE Projekte\BAFU Update Eisenmetalle fu¨r UVEK-2020 - 287.65\Daten\Excel2EcoSpold\A_zum_Konvertieren\Updated February 2021\[Disposal, sludge from steel rolling, 20%, to residual material landfill, CH_v0.2.xlsx]X-Process;
