# Brick, at plant

Dataset: EcoSpold 1, unit process
Functional unit: 1 kg
Category: construction / bricks
Geography: RER
Time period: 2000-01 to 2000-12
Generated by: Daniel Kellenberger
accessRestrictedTo: 0
copyright: true

## General comment
not included: charge of the wastewater and solid waste, it's assumed that the waste heat is totale reused for drying, no hard coal coke is used within these 12 plants;
Synonyms: Ziegel, clay, Ton;

## Included processes
includes first ginding process, wet process (includes second ginding, mixing and plastifying), storage, forming (extruding molding method) and cutting, drying, firing, loading, packing and storage

## Geography
certain exchanges are proxies (CH for RER), specially for the petrol consumption the proxy "operation, passenger car" has been used; data stem from Switzerland, Germany and Austria

## Technology
Mix of different technologies (different firing fuels) in A, D, CH.

## Reference product
- Brick, at plant [RER]: 1 kg
  Europe

## Inputs from technosphere
- Tap water, at user [RER]: 0.0272 kg; lognormal SD95 1.64
  (5,5,3,3,1,5);
- Sand, at mine [CH]: 0.0147 kg; lognormal SD95 1.64
  (5,5,3,3,1,5);
- Electricity, medium voltage, production ENTSO-E, at grid: 0.0394 kWh; lognormal SD95 1.64
  (5,5,3,3,1,5);
- Transport, freight, rail [RER]: 9e-5 tkm; lognormal SD95 2.34
  (5,5,3,3,1,5);
- Lubricating oil, at plant [RER]: 1.32e-5 kg; lognormal SD95 1.64
  (5,5,3,3,1,5);
- Transport, passenger car, fleet average [RER]: 0.010375 km; lognormal SD95 1.64
  (5,5,3,3,1,5);
- Light fuel oil, at regional storage [RER]: 0.00541 kg; lognormal SD95 1.64
  (5,5,3,3,1,5);
- Limestone, milled, packed, at plant [CH]: 0.0239 kg; lognormal SD95 1.64
  (5,5,3,3,1,5);
- Pulverised lignite, at plant [DE]: 0.0245 MJ; lognormal SD95 1.64
  (5,5,3,3,1,5);
- Transport, freight, lorry, 32t-40t gross weight, fleet average [CH]: 0.014 tkm; lognormal SD95 2.34
  (5,5,3,3,1,5);
- Heavy fuel oil, at regional storage [RER]: 0.000381 kg; lognormal SD95 1.64
  (5,5,3,3,1,5);
- Limestone, crushed, for mill [CH]: 0.000396 kg; lognormal SD95 1.64
  (5,5,3,3,1,5);
- Clay, at mine [CH]: 1.35 kg; lognormal SD95 1.64
  (5,5,3,3,1,5);
- Transport, freight, lorry, 16t-32t gross weight, fleet average [CH]: 0.00468 tkm; lognormal SD95 2.34
  (5,5,3,3,1,5);
- Mine, clay [CH]: 2e-10 p; lognormal SD95 3.38
  (3,5,5,1,3,5);
- Wood chips, softwood, wet, measured as dry mass, at sawmill [RER]: 0.006449 kg
  (5,5,3,3,1,5); species composition as in old DS
- Packaging film, LDPE, at plant [RER]: 0.000542 kg; lognormal SD95 1.64
  (5,5,3,3,1,5);
- Sheet rolling, chromium steel [RER]: 1.57e-7 kg; lognormal SD95 1.64
  (5,5,3,3,1,5);
- Polyethylene, HDPE, granulate, at plant [RER]: 8.58e-7 kg; lognormal SD95 1.64
  (5,5,3,3,1,5);
- Sheet rolling, steel [RER]: 1.57e-5 kg; lognormal SD95 1.64
  (5,5,3,3,1,5);
- Polystyrene, expandable, at plant [RER]: 0.000352 kg; lognormal SD95 1.64
  (5,5,3,3,1,5);
- EUR-flat pallet [RER]: 1.61e-5 p; lognormal SD95 1.64
  (5,5,3,3,1,5);
- Diesel, burned in building machine, average [CH]: 0.0297 MJ; lognormal SD95 1.64
  (5,5,3,3,1,5);
- Wood chips, hardwood, wet, measured as dry mass, at sawmill [RER]: 0.003547 kg
  (5,5,3,3,1,5); species composition as in old DS
- Natural gas, high pressure, at consumer [RER]: 1.24 MJ; lognormal SD95 1.64
  (5,5,3,3,1,5);
- Steel, low-alloyed, at plant [RER]: 3.06e-5 kg; lognormal SD95 1.64
  (5,5,3,3,1,5);

## Inputs from nature
- Water, well [resources, in water]: 7.36e-5 m3; lognormal SD95 1.64
  (5,5,3,3,1,5);

## Emissions to nature
- Carbon dioxide, fossil [emissions to air, unspecified]: 0.18 kg; lognormal SD95 1.64
  (5,5,3,3,1,5);
- Hydrogen fluoride [emissions to air, unspecified]: 1.06e-5 kg; lognormal SD95 1.89
  (5,5,3,3,1,5);
- Phenol [emissions to air, unspecified]: 1.3e-7 kg; lognormal SD95 2.34
  (5,5,3,3,1,5);
- Carbon monoxide, fossil [emissions to air, unspecified]: 0.000391 kg; lognormal SD95 1.64
  (5,5,3,3,1,5);
- Benzene [emissions to air, unspecified]: 2.96e-6 kg; lognormal SD95 2.34
  (5,5,3,3,1,5);
- NMVOC, non-methane volatile organic compounds, unspecified origin [emissions to air, unspecified]: 7.63e-5 kg; lognormal SD95 2.34
  (5,5,3,3,1,5);
- Formaldehyde [emissions to air, unspecified]: 1.64e-5 kg; lognormal SD95 2.34
  (5,5,3,3,1,5);
- Heat, waste [emissions to air, unspecified]: 0.142 MJ; lognormal SD95 1.64
- Hydrogen chloride [emissions to air, unspecified]: 1.22e-5 kg; lognormal SD95 1.89
  (5,5,3,3,1,5);
- Particulates, < 2.5 um [emissions to air, unspecified]: 1.4e-5 kg; lognormal SD95 3.33
  (5,5,3,3,1,5);
- Nitrogen oxides [emissions to air, unspecified]: 0.00026 kg; lognormal SD95 1.89
  (5,5,3,3,1,5);
- Sulfur dioxide [emissions to air, unspecified]: 9.98e-5 kg; lognormal SD95 2.34
  (5,5,3,3,1,5);
- Particulates, > 10 um [emissions to air, unspecified]: 4.68e-6 kg; lognormal SD95 1.89
  (5,5,3,3,1,5);
- Water [emissions to water, unspecified]: 0.06624 kg; lognormal SD95 2.5196
  (5,5,5,5,5,BU:1.05); All uncertainty-values set to 5.0 by default. Balance of input water

## Sampling procedure
The data relates to 12 brick production plants in Germany, Austria and Switzerland; The estimation of infrastructure relates to one company in Switzerland (Ziegelei Gasser AG in Rapperswil BE),

## Sources
- Kellenberger D., Althaus H.-J., Jungbluth N., Kuenniger T., Lehmann M., Thalmann P., 2007, 2007 - LCI building products - Kellenberger, Final report ecoinvent data v2.0, 7, Swiss Centre for LCI, Empa - TSL, ESU-services Ltd., Bau- und Umweltchimie, Duebendorf, CH
Kellenberger D., Althaus H.-J., Jungbluth N., Künniger T. (2007) Life Cycle Inventories of Building Products. Final report ecoinvent data v2.0. Volume: 7. Swiss Centre for LCI, Empa - TSL. Dübendorf, CH.
Type: Measurement on site
Source: CD-ROM
First author: Kellenberger D.
Other authors: Althaus H.-J., Jungbluth N., Künniger T.
Year: 2007
Title of anthology: Final report ecoinvent data v2.0
Place of publication: Dübendorf, CH
Publisher: Swiss Centre for LCI, Empa - TSL
Volume No: 7

## Validation
Proof reading validation: passed; Other validation: none;
