# Fuel tank, compressed hydrogen gas, 700bar, with aluminium liner

Dataset: EcoSpold 1, unit process
Functional unit: 1 kg
Category: transport systems / road\Vehicle components\Energy storage\Hydrogen tank
Geography: RER
Time period: 2020-01 to 2020-12
Generated by: Romain Sacchi
accessRestrictedTo: 0
copyright: False

## General comment
a carbon fiber-resin (CF) composite-wrapped single tank system, with a high density polyethylene (HDPE) liner (i.e., Type IV tanks) capable of storing 5.6 kg usable hydrogen, weighting 119 kg per unit. Original source: Evangelisti et al. 2017, doi: 10.1016/j.jclepro.2016.11.159.

## Time period
Base technology year of 2020

## Reference product
- Fuel tank, compressed hydrogen gas, 700bar, with aluminium liner [RER]: 1 kg

## Inputs from technosphere
All rows: lognormal SD95 1.16387
- Electricity, low voltage, production ENTSO-E, at grid [ENTSO-E]: 0.108 kWh
  Uncertainty from pedigree matrix: (3, 3, 3, 2, 1, 3)
- Chromium steel product manufacturing, average metal working [RER]: 0.0894 kg
  Uncertainty from pedigree matrix: (3, 3, 3, 2, 1, 3)
- Polyethylene, HDPE, granulate, at plant [RER]: 0.0862 kg
  Uncertainty from pedigree matrix: (3, 3, 3, 2, 1, 3)
- Chromium steel 18/8, at plant [RER]: 0.0894 kg
  Uncertainty from pedigree matrix: (3, 3, 3, 2, 1, 3)
- Epoxy resin, liquid, at plant [RER]: 0.249 kg
  Uncertainty from pedigree matrix: (3, 3, 3, 2, 1, 3)
- Carbon fiber, weaved, at factory [RER]: 0.166 kg
  Uncertainty from pedigree matrix: (3, 3, 3, 2, 1, 3)
- Aluminium alloy, AlMg3, at plant [RER]: 0.0596 kg
  Uncertainty from pedigree matrix: (3, 3, 3, 2, 1, 3)
- Glass fibre, at plant [RER]: 0.0471 kg
  Uncertainty from pedigree matrix: (3, 3, 3, 2, 1, 3)
- Polyurethane, flexible foam, at plant [RER]: 0.0392 kg
  Uncertainty from pedigree matrix: (3, 3, 3, 2, 1, 3)
- Transport, freight, rail [RER]: 0.133 tkm
  Uncertainty from pedigree matrix: (3, 3, 3, 2, 1, 3)
- Transport, freight, lorry, 16t-32t gross weight, fleet average [RER]: 0.0571 tkm
  Uncertainty from pedigree matrix: (3, 3, 3, 2, 1, 3)

## Sources
- Sacchi R., Bauer C., 2023, 2023 - LCI on-road vehicles - Sacchi, PSI, Villigen, CH
doi: 10.5281/ZENODO.5156043
