# Assembly, LCD module, at plant

Dataset: EcoSpold 1, unit process
Functional unit: 1 kg
Category: electronics / devices
Geography: GLO
Time period: 2023-01 to 2029-12
Generated by: Lugas Raka Adrianto, Maulana Permana Ajie, Didier Beloin-Saint-Pierre
accessRestrictedTo: 0
copyright: false

## General comment
Data are based on information in a US-EPA LCA study about LCD and CRT production. The data represent the respective efforts for a 15-inch LCD computer screen, as it is produced in Japan. 2023 updates: According to the recent market statistics for TFT-LCD modules, the largest producers globally are: BOE, LG Display, Innolyx Corp, AUO, Samsung, and China Star, all representing more than 80% market share (Cision, 2010; Statista, 2020). The electricity consumption are nevertheless regionalized according to the market share and producing regions, namely China (40%), Japan (30%), and Taiwan (30%). The current version of the UVEK LCA database allows for the inclusion of Taiwan electricity mix into the updated dataset unlike the previous version. The energy efficiency improvement concerning heat and electricity is also applied for the module production (Cantini et al., 2022).; Geography: Data from literature (based on information from Japanese producers) used as data for the global production average;

## Included processes
This module includes the auxiliaries and energy efforts as well as the related emissions (air/water) and waste amounts for the assembly of the complete LCD module. Estimations for infrastructure and the overall transport amounts (incl. for the materials in the LCD module) are included as well.

## Technology
Current technology in Japan

## Reference product
- Assembly, LCD module, at plant [GLO]: 1 kg
  Global

## Inputs from technosphere
- Acetic acid, 98% in H2O, at plant [RER]: 0.0016667 kg; lognormal SD95 1.31
  (1,3,4,3,1,5,BU:1.06); data from an US-EPA LCA study
- Acetone, liquid, at plant [RER]: 0.0026823 kg; lognormal SD95 1.31
  (1,3,4,3,1,5,BU:1.06); data from an US-EPA LCA study
- Aluminium sulphate, powder, at plant [RER]: 0.027344 kg; lognormal SD95 1.31
  (1,3,4,3,1,5,BU:1.06); data from an US-EPA LCA study
- Ammonia, liquid, at regional storehouse [RER]: 0.0076211 kg; lognormal SD95 1.31
  (1,3,4,3,1,5,BU:1.06); data from an US-EPA LCA study
- Argon, crude, liquid, at plant [RER]: 0.0020495 kg; lognormal SD95 1.31
  (1,3,4,3,1,5,BU:1.06); data from an US-EPA LCA study
- Carbon dioxide liquid, at plant [RER]: 9.7396e-6 kg; lognormal SD95 1.31
  (1,3,4,3,1,5,BU:1.06); data from an US-EPA LCA study
- Chemicals organic, at plant [GLO]: 0.15699 kg; lognormal SD95 1.31
  (1,3,4,3,1,5,BU:1.06); data from an US-EPA LCA study
- Chlorine, liquid, production mix, at plant [RER]: 0.0040365 kg; lognormal SD95 1.31
  (1,3,4,3,1,5,BU:1.06); data from an US-EPA LCA study
- Cyclohexanol, at plant [RER]: 5.2865e-6 kg; lognormal SD95 1.31
  (1,3,4,3,1,5,BU:1.06); data from an US-EPA LCA study
- Dimethyl sulfoxide, at plant [RER]: 0.017266 kg; lognormal SD95 1.31
  (1,3,4,3,1,5,BU:1.06); data from an US-EPA LCA study
- Electricity, medium voltage, at grid [CN]: 5.80807 kWh; lognormal SD95 1.31
  (1,3,4,3,1,5,BU:1.06); data from an US-EPA LCA study
- Electricity, medium voltage, at grid [JP]: 4.35605 kWh; lognormal SD95 1.31
  (1,3,4,3,1,5,BU:1.06); data from an US-EPA LCA study
- Electricity, medium voltage, at grid [TW]: 4.35605 kWh; lognormal SD95 1.31
  (1,3,4,3,1,5,BU:1.06); data from an US-EPA LCA study
- Electronic component production plant [GLO]: 2e-8 p; lognormal SD95 3.18
  (4,5,4,3,1,5,BU:3.00); Estimation, based on electronic component production site
- Ethanol from ethylene, at plant [RER]: 0.0035156 kg; lognormal SD95 1.31
  (1,3,4,3,1,5,BU:1.06); data from an US-EPA LCA study
- Ethylene glycol, at plant [RER]: 0.00021146 kg; lognormal SD95 1.31
  (1,3,4,3,1,5,BU:1.06); data from an US-EPA LCA study
- Glass fibre, at plant [RER]: 3.8229e-7 kg; lognormal SD95 1.31
  (1,3,4,3,1,5,BU:1.06); data from an US-EPA LCA study
- Heat, light fuel oil, at industrial furnace 1MW [RER]: 9.38835 MJ; lognormal SD95 1.31
  (1,3,4,3,1,5,BU:1.06); data from an US-EPA LCA study
- Heat, natural gas, at industrial furnace 1MW [CH]: 37.2744 MJ; lognormal SD95 1.31
  (1,3,4,3,1,5,BU:1.06); data from an US-EPA LCA study
- Hydrochloric acid, 30% in H2O, at plant [RER]: 0.011224 kg; lognormal SD95 1.31
  (1,3,4,3,1,5,BU:1.06); data from an US-EPA LCA study
- Hydrogen fluoride, at plant [GLO]: 0.0010964 kg; lognormal SD95 1.31
  (1,3,4,3,1,5,BU:1.06); data from an US-EPA LCA study
- Hydrogen peroxide, 50% in H2O, at plant [RER]: 3.8281e-5 kg; lognormal SD95 1.31
  (1,3,4,3,1,5,BU:1.06); data from an US-EPA LCA study
- Hydrogen, liquid, at plant [RER]: 0.11562 kg; lognormal SD95 1.31
  (1,3,4,3,1,5,BU:1.06); data from an US-EPA LCA study
- Isopropanol, at plant [RER]: 0.090885 kg; lognormal SD95 1.31
  (1,3,4,3,1,5,BU:1.06); data from an US-EPA LCA study
- Krypton, gaseous, at regional storage [CH]: 6.7188e-6 kg; lognormal SD95 1.31
  (1,3,4,3,1,5,BU:1.06); data from an US-EPA LCA study
- Lime, hydrated, packed, at plant [CH]: 0.036198 kg; lognormal SD95 1.31
  (1,3,4,3,1,5,BU:1.06); data from an US-EPA LCA studyv
- Methyl ethyl ketone, at plant [RER]: 1.9141e-6 kg; lognormal SD95 1.31
  (1,3,4,3,1,5,BU:1.06); data from an US-EPA LCA study
- Nitric acid, 50% in H2O, at plant [RER]: 0.0032292 kg; lognormal SD95 1.31
  (1,3,4,3,1,5,BU:1.06); data from an US-EPA LCA study
- Nitrogen, liquid, at plant [RER]: 1.5365 kg; lognormal SD95 1.31
  (1,3,4,3,1,5,BU:1.06); data from an US-EPA LCA study
- N-methyl-2-pyrrolidone, at plant [RER]: 0.00021146 kg; lognormal SD95 1.31
  (1,3,4,3,1,5,BU:1.06); data from an US-EPA LCA study
- Oxygen, liquid, at plant [RER]: 0.0020182 kg; lognormal SD95 1.31
  (1,3,4,3,1,5,BU:1.06); data from an US-EPA LCA study
- Panel components, at plant [GLO]: 0.021875 kg; lognormal SD95 1.31
  (1,3,4,3,1,5,BU:1.06); data from an US-EPA LCA study
- Phosphoric acid, industrial grade, 85% in H2O, at plant [RER]: 0.010286 kg; lognormal SD95 1.31
  (1,3,4,3,1,5,BU:1.06); data from an US-EPA LCA study
- Polycarbonate, at plant [RER]: 0.00025312 kg; lognormal SD95 1.31
  (1,3,4,3,1,5,BU:1.06); data from an US-EPA LCA study
- Propylene glycol, liquid, at plant [RER]: 0.005224 kg; lognormal SD95 1.31
  (1,3,4,3,1,5,BU:1.06); data from an US-EPA LCA study
- Sodium hydroxide, 50% in H2O, production mix, at plant [RER]: 0.09349 kg; lognormal SD95 1.31
  (1,3,4,3,1,5,BU:1.06); data from an US-EPA LCA study
- Sodium phosphate, at plant [RER]: 0.048177 kg; lognormal SD95 1.31
  (1,3,4,3,1,5,BU:1.06); data from an US-EPA LCA study
- Sulphuric acid, liquid, at plant [RER]: 0.059635 kg; lognormal SD95 1.31
  (1,3,4,3,1,5,BU:1.06); data from an US-EPA LCA study
- Toluene diisocyanate, at plant [RER]: 8.0208e-6 kg; lognormal SD95 1.31
  (1,3,4,3,1,5,BU:1.06); data from an US-EPA LCA study
- Transport, freight, rail [RER]: 1.9405 tkm; lognormal SD95 2.24
  (4,5,4,3,3,5,BU:2.00); standard values
- Transport, freight, lorry, fleet average [RER]: 0.32341 tkm; lognormal SD95 2.24
  (4,5,4,3,3,5,BU:2.00); standard values
- Xylene, at plant [RER]: 0.00040885 kg; lognormal SD95 1.31
  (1,3,4,3,1,5,BU:1.06); data from an US-EPA LCA study
- Disposal, glass, 0% water, to construction waste landfill [CH]: 0.11995 kg; lognormal SD95 1.63
  (1,3,4,3,4,5,BU:1.07); data from an US-EPA LCA study
  data from an US-EPA LCA study
- Disposal, plastic, consumer electronics, 15.3% water, to municipal incineration [CH]: 0.2099 kg; lognormal SD95 1.63
  (1,3,4,3,4,5,BU:1.07); data from an US-EPA LCA study
  data from an US-EPA LCA study - approximated with existing waste process
- Disposal, refinery sludge, 89.5% water, to hazardous waste incineration [CH]: 0.0080469 kg; lognormal SD95 1.63
  (1,3,4,3,4,5,BU:1.07); data from an US-EPA LCA study - approximated with existing waste process
- Disposal, sludge, NaCl electrolysis, 0% water, to residual material landfill [CH]: 0.014922 kg; lognormal SD95 1.63
  (same comment as for Disposal, refinery sludge, 89.5% water, to hazardous waste incineratio)
- Disposal, solvents mixture, 16.5% water, to hazardous waste incineration [CH]: 0.87294 kg; lognormal SD95 1.63
  (same comment as for Disposal, refinery sludge, 89.5% water, to hazardous waste incineratio)
- Disposal, used mineral oil, 10% water, to hazardous waste incineration [CH]: 0.0041927 kg; lognormal SD95 1.63
  (same comment as for Disposal, refinery sludge, 89.5% water, to hazardous waste incineratio)
- Treatment, LCD module production effluent, to wastewater treatment, class 2 [CH]: 0.3737 m3; lognormal SD95 1.31
  (1,3,4,3,1,5,BU:1.06); data from an US-EPA LCA study

## Inputs from nature
- Water, unspecified natural origin/m3 [resources, in water]: 0.28125 m3; lognormal SD95 1.31
  (1,3,4,3,1,5,BU:1.05); data from an US-EPA LCA study

## Emissions to nature
- Acetic acid [emissions to air, high. pop.]: 0.00035417 kg; lognormal SD95 1.62
  (1,3,4,3,1,5,BU:1.50); data from an US-EPA LCA study
- Acetone [emissions to air, high. pop.]: 4.8437e-5 kg; lognormal SD95 1.62
  (1,3,4,3,1,5,BU:1.50); data from an US-EPA LCA study
- Ammonia [emissions to air, high. pop.]: 0.016224 kg; lognormal SD95 1.62
  (1,3,4,3,1,5,BU:1.50); data from an US-EPA LCA study
- Tetramethyl ammonium hydroxide [emissions to air, high. pop.]: 0.16745 kg; lognormal SD95 1.62
  (1,3,4,3,1,5,BU:1.50); data from an US-EPA LCA study
- Sulfur hexafluoride [emissions to air, high. pop.]: 2.7924e-5 kg; lognormal SD95 1.89
  (3,3,4,1,4,5,BU:1.50); tier 2b default emission factor according to IPCC guidelines
- Sodium tetrahydroborate [emissions to air, high. pop.]: 0.0046354 kg; lognormal SD95 2.1
  (1,3,4,3,1,5,BU:2.00); data from an US-EPA LCA study
- Phosphoric acid [emissions to air, high. pop.]: 1.263e-5 kg; lognormal SD95 1.62
  (1,3,4,3,1,5,BU:1.50); data from an US-EPA LCA study
- Phosphine [emissions to air, high. pop.]: 0.016302 kg; lognormal SD95 1.62
  (1,3,4,3,1,5,BU:1.50); data from an US-EPA LCA study
- NMVOC, non-methane volatile organic compounds, unspecified origin [emissions to air, high. pop.]: 0.027813 kg; lognormal SD95 2.1
  (1,3,4,3,1,5,BU:2.00); data from an US-EPA LCA study
- Nitrogen oxides [emissions to air, high. pop.]: 7.0052e-5 kg; lognormal SD95 1.62
  (1,3,4,3,1,5,BU:1.50); data from an US-EPA LCA study
- Nitrogen fluoride [emissions to air, high. pop.]: 6.9821e-6 kg; lognormal SD95 1.89
  (3,3,4,1,4,5,BU:1.50); tier 2b default emission factor according to IPCC guidelines
- Hydrogen [emissions to air, high. pop.]: 3.4635e-5 kg; lognormal SD95 1.62
  (1,3,4,3,1,5,BU:1.50); data from an US-EPA LCA study
- Hydrogen fluoride [emissions to air, high. pop.]: 0.013568 kg; lognormal SD95 1.62
  (1,3,4,3,1,5,BU:1.50); data from an US-EPA LCA study
- Hydrogen chloride [emissions to air, high. pop.]: 0.015781 kg; lognormal SD95 1.62
  (1,3,4,3,1,5,BU:1.50); data from an US-EPA LCA study
- Heat, waste [emissions to air, high. pop.]: 67.448 MJ; lognormal SD95 1.93
  (4,3,4,3,4,5,BU:1.50); Calculated from electricity input
- Diethylene glycol [emissions to air, high. pop.]: 2.5234e-5 kg; lognormal SD95 2.1
  (1,3,4,3,1,5,BU:2.00); data from an US-EPA LCA study
- Cyclohexane [emissions to air, high. pop.]: 1.263e-5 kg; lognormal SD95 2.1
  (1,3,4,3,1,5,BU:2.00); data from an US-EPA LCA study
- Boron trifluoride [emissions to air, high. pop.]: 0.0023906 kg; lognormal SD95 2.1
  (1,3,4,3,1,5,BU:2.00); data from an US-EPA LCA study
- Boric acid [emissions to air, high. pop.]: 3.5677e-7 kg; lognormal SD95 2.1
  (1,3,4,3,1,5,BU:2.00); data from an US-EPA LCA study
- Antimony [emissions to water, unspecified]: 2.9688e-8 kg; lognormal SD95 5.11
  (1,3,4,3,1,5,BU:5.00); data from an US-EPA LCA study
- Arsenic [emissions to water, unspecified]: 2.9688e-8 kg; lognormal SD95 5.11
  (1,3,4,3,1,5,BU:5.00); data from an US-EPA LCA study
- BOD5, Biological Oxygen Demand [emissions to water, unspecified]: 0.0045312 kg; lognormal SD95 1.62
  (1,3,4,3,1,5,BU:1.50); data from an US-EPA LCA study
- Boron [emissions to water, unspecified]: 1.1927e-6 kg; lognormal SD95 1.62
  (1,3,4,3,1,5,BU:1.50); data from an US-EPA LCA study
- Cadmium [emissions to water, unspecified]: 2.9688e-8 kg; lognormal SD95 5.11
  (1,3,4,3,1,5,BU:5.00); data from an US-EPA LCA study
- Chromium VI [emissions to water, unspecified]: 5.9635e-8 kg; lognormal SD95 5.11
  (1,3,4,3,1,5,BU:5.00); data from an US-EPA LCA study
- Chromium [emissions to water, unspecified]: 2.3021e-6 kg; lognormal SD95 5.11
  (1,3,4,3,1,5,BU:5.00); data from an US-EPA LCA study
- COD, Chemical Oxygen Demand [emissions to water, unspecified]: 0.00069792 kg; lognormal SD95 1.62
  (1,3,4,3,1,5,BU:1.50); data from an US-EPA LCA study
- Copper [emissions to water, unspecified]: 2.3906e-7 kg; lognormal SD95 5.11
  (1,3,4,3,1,5,BU:5.00); data from an US-EPA LCA study
- Cyanide [emissions to water, unspecified]: 9.5313e-7 kg; lognormal SD95 1.62
  (1,3,4,3,1,5,BU:1.50); data from an US-EPA LCA study
- Ethane, 1,1,1-trichloro-, HCFC-140 [emissions to water, unspecified]: 5.9635e-9 kg; lognormal SD95 3.09
  (1,3,4,3,1,5,BU:3.00); data from an US-EPA LCA study
- Fluoride [emissions to water, unspecified]: 0.0033333 kg; lognormal SD95 1.62
  (1,3,4,3,1,5,BU:1.50); data from an US-EPA LCA study
- Hydrocarbons, aromatic [emissions to water, unspecified]: 0.00015312 kg; lognormal SD95 3.09
  (1,3,4,3,1,5,BU:3.00); data from an US-EPA LCA study
- Iron [emissions to water, unspecified]: 6.849e-7 kg; lognormal SD95 5.11
  (1,3,4,3,1,5,BU:5.00); data from an US-EPA LCA study
- Lead [emissions to water, unspecified]: 1.6068e-6 kg; lognormal SD95 5.11
  (1,3,4,3,1,5,BU:5.00); data from an US-EPA LCA study
- Manganese [emissions to water, unspecified]: 5.9635e-8 kg; lognormal SD95 5.11
  (1,3,4,3,1,5,BU:5.00); data from an US-EPA LCA study
- Mercury [emissions to water, unspecified]: 2.5234e-8 kg; lognormal SD95 5.11
  (1,3,4,3,1,5,BU:5.00); data from an US-EPA LCA study
- Nickel [emissions to water, unspecified]: 5.9635e-8 kg; lognormal SD95 5.11
  (1,3,4,3,1,5,BU:5.00); data from an US-EPA LCA study
- Nitrogen [emissions to water, unspecified]: 0.020651 kg; lognormal SD95 1.62
  (1,3,4,3,1,5,BU:1.50); data from an US-EPA LCA study
- Oils, unspecified [emissions to water, unspecified]: 5.2604e-5 kg; lognormal SD95 3.09
  (1,3,4,3,1,5,BU:3.00); data from an US-EPA LCA study
- Phenol [emissions to water, unspecified]: 5.9635e-8 kg; lognormal SD95 3.09
  (1,3,4,3,1,5,BU:3.00); data from an US-EPA LCA study
- Phosphate [emissions to water, unspecified]: 5.9635e-8 kg; lognormal SD95 1.62
  (1,3,4,3,1,5,BU:1.50); data from an US-EPA LCA study
- Phosphorus [emissions to water, unspecified]: 0.0011224 kg; lognormal SD95 1.62
  (1,3,4,3,1,5,BU:1.50); data from an US-EPA LCA study
- Solids, inorganic [emissions to water, unspecified]: 0.0019661 kg; lognormal SD95 1.62
  (1,3,4,3,1,5,BU:1.50); data from an US-EPA LCA study
- Water [emissions to water, unspecified]: 267.188 kg; lognormal SD95 2.5196
  (5,5,5,5,5,BU:1.05); All uncertainty-values set to 5.0 by default. Balance of input water

## Sampling procedure
literature & own estimations

## Extrapolations
see generalComment

## Sources
- Raka Adrianto L., Permana Ajie M., Beloin-Saint-Pierre D., 2024, 2024 - LCI ICT sector - Raka Adrianto, Empa, St. Gallen, CH

## Validation
Proof reading validation: Passed, Other validation: none, Validator: Mischa Zschokke, Company: Carbotech, Country: CH
