# Disposal, polystyrene, 0.2% water, to municipal incineration

Dataset: EcoSpold 1, unit process
Functional unit: 1 kg
Category: waste management / municipal incineration
Geography: CH
Time period: 2000-01 to 2000-12
Generated by: Gabor Doka
accessRestrictedTo: 0
copyright: true

## General comment
This dataset represents the activity of waste disposal of waste polystyrene in a municipal solid waste incinerator (MSWI) Recommended use of this dataset: For PS, which goes to disposal as part of communal waste mixture. For Expanded PS (EPS) use other dataset. Waste composition (wet, in ppm): upper heating value 38.88 MJ/kg; lower heating value 38.67 MJ/kg; H2O 2000; O 38852; H 78046; C 868490; S 678.75; N 1942.6; P n.a.; B n.a.; Cl 1132.1; Br 882.12; F 14.25; I n.a.; Ag n.a.; As 1.8418; Ba 180.79; Cd 23.336; Co 30.622; Cr 39.613; Cu 107.56; Hg 0.82311; Mn 77.469; Mo n.a.; Ni 19.968; Pb 14.935; Sb 41.65; Se 2.0357; Sn 25.403; V 279.32; Zn 834.61; Be 0.48468; Sc n.a.; Sr 85.789; Ti 969.36; Tl 0.38774; W n.a.; Si n.a.; Fe 3611.5; Ca n.a.; Al 193.87; K n.a.; Mg n.a.; Na 1420.6; Share of carbon in waste that is biogenic 0%. Share of metals in waste not oxidised and bulk-recyclable (exclude very small or thin parts) Iron: 0%; Alu: 0%; Copper: 0%. One kg of this waste produces 0.02415 kg of slag and 0.008568 kg of residues, which are landfilled. Additional solidification with 0.003427 kg of cement. Net energy production: 5.04MJ/kg electric energy and 9.71MJ/kg thermal energy. Recovery of metal scrap to recycling: 0g iron scrap, 0g aluminium scrap, 0g copper scrap.;;

## Included processes
Waste incineration from waste reception gate further downstream (excluding transport to the MSWI plant). Waste-specific air and water emisions from incineration, auxiliary material consumption for flue gas cleaning. Short-term emissions to river water and long-term emisisons to ground water from slag compartment (from bottom ash) and residual material landfill (from solidified fly ashes and scrubber slugde). Waste-specific process energy demands for MSWI and net energy generation.

## Geography
Specific to the technology mix encountered in Switzerland in 2010. Well applicable to modern incineration practices in Europe, North America or Japan.

## Technology
average Swiss MSWI plants in 2010 (grate incinerators) with electrostatic precipitator for fly ash (ESP), wet flue gas scrubber and 25% SNCR , 42.77% SCR-high dust , 32.68% SCR-low dust -DeNOx facilities and 0% without Denox (weighted according to mass of burnt waste, representing Swiss average). Efficiency of iron scrap separation from slag : 58%. Efficiency of non-ferrous scrap separation from slag : 31%. Gross electric efficiency technology mix 15.84% and Gross thermal efficiency technology mix 28.51%

## Time period
Waste composition as given in literature reference, theoretical data or other source. Transfer coefficients for modern MSWI.

## Reference product
- Disposal, polystyrene, 0.2% water, to municipal incineration [CH]: 1 kg
  SWITZERLAND

## Inputs from technosphere
- Natural gas, burned in industrial furnace 1MW [CH]: 0.2162 MJ; lognormal SD95 2.7535
  Input to DeNOx stage, to heat up flue gas in low-dust SCR. uncertainty calculated from uncertainty in average DeNOx input, uncertainty in the share of thermal NOx, uncertainty of nitrogen content in average municipal waste and the uncertainty in nitrogen content in *this* waste.
- Ammonia, liquid, at regional storehouse [CH]: 0.0011561 kg; lognormal SD95 2.7535
  Input to DeNOx stage (100% NH3). uncertainty calculated from uncertainty in average DeNOx input, uncertainty in the share of thermal NOx, uncertainty of nitrogen content in average municipal waste and the uncertainty in nitrogen content in *this* waste.
- Chemicals inorganic, at plant [GLO]: 9.2e-5 kg; lognormal SD95 2.2078
  auxilliary inputs for the wastewater treatment stage of the incinerator plant. Proxy for Polyelectrolyte. uncertainty calculated from uncertainty in average Polyelectrolyte input, of transfer coefficients in the incinerator, and the uncertainty of the waste composition of this waste
- Chemicals organic, at plant [GLO]: 1.9767e-5 kg; lognormal SD95 8.8197
  auxilliary inputs for the wastewater treatment stage of the incinerator plant. Proxy for (pure) Trisodium-trimercapto-s-triazine (CAS 17766-26-6), used as 15% diluted solution, aka TMT15. uncertainty calculated from uncertainty in average TMT15 input, of transfer coefficients in the incinerator, and the uncertainty of the waste composition of this waste
- Disposal, cement, hydrated, 0% water, to residual material landfill [CH]: 0.0085685 kg; lognormal SD95 1.6143
  Hydrated cement output for solidification of landfilled residual material. Uncertainty calculated from uncertainty of the waste composition of this waste and transfer coefficients in the incinerator and of the solidification recipe.
- Hydrochloric acid, 30% in H2O, at plant [RER]: 2.4182e-5 kg; lognormal SD95 2.2078
  auxilliary inputs for the wastewater treatment stage of the incinerator plant. uncertainty calculated from uncertainty in average HCl input, of transfer coefficients in the incinerator, and the uncertainty of the waste composition of this waste
- Transport, freight, rail [RER]: 0.0065096 tkm; lognormal SD95 1.1749
  Transport services to transport incineration residues to landfills and to transport auxilliary inputs of the incinerator plant. uncertainty calculated from uncertainty in average auxiliary material input, the uncertainty of the waste composition of this waste and the uncertainty in generic transportation distances
- Slag compartment [CH]: 3.9839e-11 p; lognormal SD95 1.6987
  landfill infrastructure required for landfilling of bottom ash. uncertainty is calculated from uncertainties in waste composition and transfer coefficients in incinerator
- Sodium hydroxide, 50% in H2O, production mix, at plant [RER]: 0.00036999 kg; lognormal SD95 2.7832
  auxilliary inputs for the flue gas treatment stage of the incinerator plant. uncertainty calculated from uncertainty in average NaOH input, of transfer coefficients in the incinerator, and the uncertainty of the waste composition of this waste
- Iron (III) chloride, 40% in H2O, at plant [CH]: 8.9224e-5 kg; lognormal SD95 2.8041
  auxilliary inputs for the wastewater treatment stage of the incinerator plant. uncertainty calculated from uncertainty in average FeCl3 input, of transfer coefficients in the incinerator, and the uncertainty of the waste composition of this waste
- Transport, freight, lorry, 16t-32t gross weight, fleet average [CH]: 0.010854 tkm; lognormal SD95 1.1661
  (same comment as for Transport, freight, rail)
- Cement, unspecified, at plant [CH]: 0.0034274 kg; lognormal SD95 1.6143
  Cement required for solidification of landfilled residual material. Uncertainty calculated from uncertainty of the waste composition of this waste, of transfer coefficients in the incinerator and of the solidification recipe.
- Quicklime, milled, packed, at plant [CH]: 0.00070834 kg; lognormal SD95 4.1789
  auxilliary inputs for the flue gas treatment stage of the incinerator plant. uncertainty calculated from uncertainty in average CaO input, of transfer coefficients in the incinerator, and the uncertainty of the waste composition of this waste
- Titanium dioxide, production mix, at plant [RER]: 7.2435e-5 kg; lognormal SD95 4.334
  Input to DeNOx stage (TiO2 catalyst carrier) uncertainty calculated from uncertainty in average DeNOx input, uncertainty in the share of thermal NOx, uncertainty of nitrogen content in average municipal waste and the uncertainty in nitrogen content in *this* waste.
- Process-specific burdens, slag compartment [CH]: 0.022409 kg; lognormal SD95 1.6987
  mass-specific expenditures required for landfilling of bottom ash. uncertainty is calculated from uncertainties in waste composition and transfer coefficients in incinerator
- Municipal waste incineration plant [CH]: 2.5e-10 p; lognormal SD95 1
  demands per kilogram waste. uncertainty is heeded in the module
- Process-specific burdens, residual material landfill [CH]: 0.0085685 kg; lognormal SD95 1.5517
  mass-specific expenditures required for landfilling of incineration residues. uncertainty is calculated from uncertainties in waste composition and transfer coefficients in incinerator
- Residual material landfill facility [CH]: 1.7851e-11 p; lognormal SD95 1.5517
  landfill infrastructure required for landfilling of incineration residues. uncertainty is calculated from uncertainties in waste composition and transfer coefficients in incinerator
- Chromium oxide, flakes, at plant [RER]: 1.4783e-6 kg; lognormal SD95 4.334
  Input to DeNOx stage. uncertainty calculated from uncertainty in average DeNOx input, uncertainty in the share of thermal NOx, uncertainty of nitrogen content in average municipal waste and the uncertainty in nitrogen content in *this* waste.
- Water, decarbonised, at plant [RER]: 0.58661 kg; lognormal SD95 2.8041
  Incinerator process water used in flue gas scrubber stage. uncertainty calculated from uncertainty in average water input, and the uncertainty of the waste composition of this waste

## Emissions to nature
- Sodium [emissions to air, high. pop.]: 1.1663e-5 kg; lognormal SD95 4.84
  Emission to air from waste composition and transfer coefficients. uncertainty is calculated from uncertainties in waste composition and transfer coefficients in incinerator
- Thallium [emissions to water, river]: 2.3754e-10 kg; lognormal SD95 15.36
  Emissions to water from waste composition and transfer coefficients in incinerator and landfills. uncertainty is calculated from uncertainties in waste composition and transfer coefficients in incinerator and landfills
- Iron [emissions to air, high. pop.]: 6.4724e-9 kg; lognormal SD95 4.4521
  (same comment as for Sodium)
- Nickel [emissions to water, river]: 1.3416e-8 kg; lognormal SD95 13.835
  (same comment as for Thallium)
- Barium [emissions to air, high. pop.]: 7.096e-7 kg; lognormal SD95 6.6564
  (same comment as for Sodium)
- Lead [emissions to air, high. pop.]: 1.2305e-9 kg; lognormal SD95 9.3636
  (same comment as for Sodium)
- COD, Chemical Oxygen Demand [emissions to water, groundwater, long-term]: 0.0065221 kg; lognormal SD95 1.2548
  Long-term emissions from landfilling of incineration residues. uncertainty is calculated from uncertainties in waste composition and transfer coefficients in incinerator and landfills.
- Manganese [emissions to water, groundwater, long-term]: 4.7792e-5 kg; lognormal SD95 16.718
  (same comment as for COD, Chemical Oxygen Demand)
- COD, Chemical Oxygen Demand [emissions to water, river]: 0.0010159 kg; lognormal SD95 1.3598
  (same comment as for Thallium)
- Cadmium [emissions to air, high. pop.]: 1.1895e-8 kg; lognormal SD95 8.7616
  (same comment as for Sodium)
- Thallium [emissions to water, groundwater, long-term]: 2.2626e-7 kg; lognormal SD95 9.5018
  (same comment as for COD, Chemical Oxygen Demand)
- Tin [emissions to air, high. pop.]: 1.6593e-11 kg; lognormal SD95 9.1204
  (same comment as for Sodium)
- Bromine [emissions to water, river]: 0.00079666 kg; lognormal SD95 2.9582
  (same comment as for Thallium)
- Copper [emissions to air, high. pop.]: 9.8518e-9 kg; lognormal SD95 7.29
  (same comment as for Sodium)
- Ammonia [emissions to air, high. pop.]: 1.3593e-6 kg; lognormal SD95 2.967
  Nitrogen species emitted to air after DeNOx stage. uncertainty calculated from uncertainty in average N-emissions and uncertainty in the share of thermal NOx and the uncertainty in nitrogen content in *this* waste.
- Particulates, < 2.5 um [emissions to air, high. pop.]: 1.1988e-6 kg; lognormal SD95 3.2804
  Incomplete combustion product emitted to air. uncertainty calculated from uncertainty in average operation emissions, and the uncertainty of the flue gas volume from this waste.
- Antimony [emissions to air, high. pop.]: 3.3364e-11 kg; lognormal SD95 8.5264
  (same comment as for Sodium)
- Beryllium [emissions to water, groundwater, long-term]: 4.4296e-7 kg; lognormal SD95 12.378
  (same comment as for COD, Chemical Oxygen Demand)
- Benzene, pentachloro- [emissions to air, high. pop.]: 5.3048e-11 kg; lognormal SD95 1.6402
  (same comment as for Particulates, < 2.5 um)
- Titanium [emissions to air, high. pop.]: 8.0423e-7 kg; lognormal SD95 5.1984
  (same comment as for Sodium)
- Strontium [emissions to water, groundwater, long-term]: 8.5677e-5 kg; lognormal SD95 7.2564
  (same comment as for COD, Chemical Oxygen Demand)
- Nitrogen oxides [emissions to air, high. pop.]: 0.00043046 kg; lognormal SD95 2.967
  sum of fuel-Nox and thermal-NOx emitted to air after DeNOx stage. uncertainty calculated from uncertainty in average N-emissions and uncertainty in the share of thermal NOx and the uncertainty in nitrogen content in *this* waste.
- Hydrogen chloride [emissions to air, high. pop.]: 6.4605e-7 kg; lognormal SD95 5.1071
  (same comment as for Sodium)
- Fluoride [emissions to water, groundwater, long-term]: 1.2776e-5 kg; lognormal SD95 5.5236
  (same comment as for COD, Chemical Oxygen Demand)
- Methane, fossil [emissions to air, high. pop.]: 1.5061e-7 kg; lognormal SD95 1.6402
  (same comment as for Particulates, < 2.5 um)
- Cobalt [emissions to air, high. pop.]: 5.5692e-8 kg; lognormal SD95 8.41
  (same comment as for Sodium)
- Cobalt [emissions to water, groundwater, long-term]: 2.4945e-5 kg; lognormal SD95 7.7248
  (same comment as for COD, Chemical Oxygen Demand)
- Zinc [emissions to water, groundwater, long-term]: 0.0002538 kg; lognormal SD95 28.574
  (same comment as for COD, Chemical Oxygen Demand)
- Lead [emissions to water, river]: 1.4287e-9 kg; lognormal SD95 7.5512
  (same comment as for Thallium)
- Aluminium [emissions to water, groundwater, long-term]: 0.0001402 kg; lognormal SD95 5.9622
  (same comment as for COD, Chemical Oxygen Demand)
- Vanadium [emissions to water, groundwater, long-term]: 0.00013021 kg; lognormal SD95 4.7967
  (same comment as for COD, Chemical Oxygen Demand)
- Cyanide [emissions to air, high. pop.]: 6.2247e-6 kg; lognormal SD95 10.176
  (same comment as for Ammonia)
- Lead [emissions to water, groundwater, long-term]: 7.2211e-6 kg; lognormal SD95 64.89
  (same comment as for COD, Chemical Oxygen Demand)
- Mercury [emissions to water, groundwater, long-term]: 5.2424e-8 kg; lognormal SD95 34.837
  (same comment as for COD, Chemical Oxygen Demand)
- Vanadium [emissions to air, high. pop.]: 5.9241e-6 kg; lognormal SD95 6.2001
  (same comment as for Sodium)
- Selenium [emissions to water, groundwater, long-term]: 1.3222e-6 kg; lognormal SD95 7.9953
  (same comment as for COD, Chemical Oxygen Demand)
- Zinc [emissions to water, river]: 7.53e-8 kg; lognormal SD95 4.6352
  (same comment as for Thallium)
- Nickel [emissions to water, groundwater, long-term]: 1.9167e-5 kg; lognormal SD95 8.5164
  (same comment as for COD, Chemical Oxygen Demand)
- Dioxin, 2,3,7,8 Tetrachlorodibenzo-p- [emissions to air, high. pop.]: 2.008e-14 kg; lognormal SD95 3.2804
  (same comment as for Particulates, < 2.5 um)
- Copper [emissions to water, river]: 1.3938e-8 kg; lognormal SD95 6.4502
  (same comment as for Thallium)
- Sodium [emissions to water, groundwater, long-term]: 0.001023 kg; lognormal SD95 3.008
  (same comment as for COD, Chemical Oxygen Demand)
- Bromine [emissions to air, high. pop.]: 4.4062e-7 kg; lognormal SD95 5.3361
  (same comment as for Sodium)
- NMVOC, non-methane volatile organic compounds, unspecified origin [emissions to air, high. pop.]: 4.5694e-7 kg; lognormal SD95 1.6402
  (same comment as for Particulates, < 2.5 um)
- Aluminium [emissions to water, river]: 2.0981e-8 kg; lognormal SD95 8.2272
  (same comment as for Thallium)
- Arsenic [emissions to water, river]: 1.2758e-6 kg; lognormal SD95 10.447
  (same comment as for Thallium)
- BOD5, Biological Oxygen Demand [emissions to water, river]: 0.0010029 kg; lognormal SD95 1.3646
  (same comment as for Thallium)
- Carbon dioxide, fossil [emissions to air, high. pop.]: 3.1653 kg; lognormal SD95 1.0517
  (same comment as for Sodium)
- DOC, Dissolved Organic Carbon [emissions to water, groundwater, long-term]: 0.0025808 kg; lognormal SD95 1.2548
  (same comment as for COD, Chemical Oxygen Demand)
- Sulfate [emissions to water, groundwater, long-term]: 0.0016811 kg; lognormal SD95 3.5975
  (same comment as for COD, Chemical Oxygen Demand)
- Copper [emissions to water, groundwater, long-term]: 9.6078e-5 kg; lognormal SD95 6.916
  (same comment as for COD, Chemical Oxygen Demand)
- Nitrate [emissions to water, river]: 2.4763e-5 kg; lognormal SD95 3.5332
  (same comment as for Thallium)
- Antimony [emissions to water, river]: 1.4355e-5 kg; lognormal SD95 7.989
  (same comment as for Thallium)
- Phenol, pentachloro- [emissions to air, high. pop.]: 4.3725e-12 kg; lognormal SD95 1.6402
  (same comment as for Particulates, < 2.5 um)
- Tin [emissions to water, river]: 6.7204e-10 kg; lognormal SD95 14.484
  (same comment as for Thallium)
- Barium [emissions to water, river]: 2.4332e-8 kg; lognormal SD95 8.8073
  (same comment as for Thallium)
- TOC, Total Organic Carbon [emissions to water, groundwater, long-term]: 0.0025808 kg; lognormal SD95 1.2548
  (same comment as for COD, Chemical Oxygen Demand)
- Tin [emissions to water, groundwater, long-term]: 9.7222e-6 kg; lognormal SD95 16.956
  (same comment as for COD, Chemical Oxygen Demand)
- Carbon monoxide, fossil [emissions to air, high. pop.]: 1.7068e-5 kg; lognormal SD95 5.4674
  (same comment as for Particulates, < 2.5 um)
- Beryllium [emissions to water, river]: 3.0357e-10 kg; lognormal SD95 19.121
  (same comment as for Thallium)
- Strontium [emissions to water, river]: 5.4015e-8 kg; lognormal SD95 13.506
  (same comment as for Thallium)
- Chromium VI [emissions to water, groundwater, long-term]: 3.6338e-6 kg; lognormal SD95 12.101
  (same comment as for COD, Chemical Oxygen Demand)
- Chromium [emissions to air, high. pop.]: 3.459e-8 kg; lognormal SD95 8.1796
  (same comment as for Sodium)
- Selenium [emissions to water, river]: 6.8768e-7 kg; lognormal SD95 8.7304
  (same comment as for Thallium)
- Iron [emissions to water, groundwater, long-term]: 0.001822 kg; lognormal SD95 5.1477
  (same comment as for COD, Chemical Oxygen Demand)
- Nitrate [emissions to water, groundwater, long-term]: 6.9869e-5 kg; lognormal SD95 4.5723
  (same comment as for COD, Chemical Oxygen Demand)
- Aluminium [emissions to air, high. pop.]: 1.5807e-10 kg; lognormal SD95 7.0225
  (same comment as for Sodium)
- Particulates, > 2.5 um, and < 10um [emissions to air, high. pop.]: 6.0239e-9 kg; lognormal SD95 2.187
  (same comment as for Particulates, < 2.5 um)
- Heat, waste [emissions to air, high. pop.]: 28.426 MJ; lognormal SD95 1.263
  Waste heat generated from heating value of this waste plus any electricity required to process it. uncertainty is calculated from uncertainties in waste composition and uncertainties in energy efficiency and the uncertainty in internal energy demand
- Iron [emissions to water, river]: 9.4942e-8 kg; lognormal SD95 5.9073
  (same comment as for Thallium)
- Manganese [emissions to water, river]: 1.2059e-8 kg; lognormal SD95 6.3872
  (same comment as for Thallium)
- Mercury [emissions to water, river]: 8.9392e-10 kg; lognormal SD95 8.3368
  (same comment as for Thallium)
- Chromium [emissions to water, river]: 3.0758e-9 kg; lognormal SD95 8.3112
  (same comment as for Thallium)
- Chromium VI [emissions to water, river]: 1.1071e-6 kg; lognormal SD95 8.6549
  (same comment as for Thallium)
- Fluoride [emissions to water, river]: 1.0896e-6 kg; lognormal SD95 5.8966
  (same comment as for Thallium)
- TOC, Total Organic Carbon [emissions to water, river]: 0.00044367 kg; lognormal SD95 1.3604
  (same comment as for Thallium)
- Dinitrogen monoxide [emissions to air, high. pop.]: 2.8973e-5 kg; lognormal SD95 10.176
  (same comment as for Ammonia)
- Chloride [emissions to water, groundwater, long-term]: 0.00026234 kg; lognormal SD95 4.9416
  (same comment as for COD, Chemical Oxygen Demand)
- Nickel [emissions to air, high. pop.]: 2.5084e-8 kg; lognormal SD95 8.8804
  (same comment as for Sodium)
- Toluene [emissions to air, high. pop.]: 2.0081e-8 kg; lognormal SD95 1.6402
  (same comment as for Particulates, < 2.5 um)
- Sodium [emissions to water, river]: 0.00038598 kg; lognormal SD95 3.0531
  (same comment as for Thallium)
- BOD5, Biological Oxygen Demand [emissions to water, groundwater, long-term]: 0.0021334 kg; lognormal SD95 1.2548
  (same comment as for COD, Chemical Oxygen Demand)
- Titanium [emissions to water, groundwater, long-term]: 0.00028979 kg; lognormal SD95 5.9206
  (same comment as for COD, Chemical Oxygen Demand)
- Benzene, hexachloro- [emissions to air, high. pop.]: 2.0994e-11 kg; lognormal SD95 1.6402
  (same comment as for Particulates, < 2.5 um)
- Strontium [emissions to air, high. pop.]: 8.5789e-9 kg; lognormal SD95 7.5076
  (same comment as for Sodium)
- Selenium [emissions to air, high. pop.]: 2.4285e-8 kg; lognormal SD95 11.424
  (same comment as for Sodium)
- Cadmium [emissions to water, groundwater, long-term]: 1.7029e-6 kg; lognormal SD95 171.11
  (same comment as for COD, Chemical Oxygen Demand)
- Sulfur dioxide [emissions to air, high. pop.]: 7.2181e-6 kg; lognormal SD95 5.4592
  (same comment as for Sodium)
- Cobalt [emissions to water, river]: 5.548e-9 kg; lognormal SD95 10.979
  (same comment as for Thallium)
- Antimony [emissions to water, groundwater, long-term]: 2.6487e-5 kg; lognormal SD95 7.7238
  (same comment as for COD, Chemical Oxygen Demand)
- Barium [emissions to water, groundwater, long-term]: 9.1047e-5 kg; lognormal SD95 20.024
  (same comment as for COD, Chemical Oxygen Demand)
- Hydrogen fluoride [emissions to air, high. pop.]: 9.6137e-8 kg; lognormal SD95 9.2077
  (same comment as for Sodium)
- Benzo(a)pyrene [emissions to air, high. pop.]: 2.2343e-13 kg; lognormal SD95 3.2804
  (same comment as for Particulates, < 2.5 um)
- Sulfate [emissions to water, river]: 0.00034433 kg; lognormal SD95 3.1853
  (same comment as for Thallium)
- Heat, waste [emissions to water, river]: 6.5086 MJ; lognormal SD95 1.263
  (same comment as for Heat, waste)
- Vanadium [emissions to water, river]: 4.4596e-7 kg; lognormal SD95 7.0261
  (same comment as for Thallium)
- Zinc [emissions to air, high. pop.]: 5.5941e-7 kg; lognormal SD95 5.3361
  (same comment as for Sodium)
- Arsenic [emissions to air, high. pop.]: 1.4427e-8 kg; lognormal SD95 11.56
  (same comment as for Sodium)
- Chloride [emissions to water, river]: 0.00086915 kg; lognormal SD95 4.2516
  (same comment as for Thallium)
- Titanium [emissions to water, river]: 3.6142e-7 kg; lognormal SD95 4.1847
  (same comment as for Thallium)
- Arsenic [emissions to water, groundwater, long-term]: 5.5153e-7 kg; lognormal SD95 11.495
  (same comment as for COD, Chemical Oxygen Demand)
- DOC, Dissolved Organic Carbon [emissions to water, river]: 0.00044367 kg; lognormal SD95 1.3604
  (same comment as for Thallium)
- Mercury [emissions to air, high. pop.]: 2.3338e-8 kg; lognormal SD95 12.532
  (same comment as for Sodium)
- Manganese [emissions to air, high. pop.]: 1.4795e-8 kg; lognormal SD95 7.5625
  (same comment as for Sodium)
- Benzene [emissions to air, high. pop.]: 1.0041e-8 kg; lognormal SD95 1.6402
  (same comment as for Particulates, < 2.5 um)
- Thallium [emissions to air, high. pop.]: 3.8774e-10 kg; lognormal SD95 13.69
  (same comment as for Sodium)
- Bromine [emissions to water, groundwater, long-term]: 8.5022e-5 kg; lognormal SD95 5.2017
  (same comment as for COD, Chemical Oxygen Demand)
- Cadmium [emissions to water, river]: 2.2367e-9 kg; lognormal SD95 7.1629
  (same comment as for Thallium)

## Sampling procedure
fully waste-specific calculation based on literature data for average MSWI operation performance

## Extrapolations
Typical elemental transfer coefficients from current studies for modern MSWI, completed with data from coal power plants and estimates, adapted for inert/burnable waste.

## Uncertainty adjustments
uncertainty of waste input composition data derived from generic formula GSD(c) = N*ln(c)+1

## Sources
- Doka G., 2013, 2013 - Updates LCI waste treatment services - Doka, -, Doka LCA, Zuerich, CH
Doka G. (2013) Updates to Life Cycle Inventories of Waste Treatment Services - part II: waste incineration. Doka LCA. Zurich.
Type: Separate publication
Source: Report to document the 2013 changes to the MSWI incinerator model and datasets (URL: http://www.doka.ch/ecoinventMSWIupdateLCI2013.pdf). To be read with the ecoinvent Nr 13 report (Doka 2009, Life Cycle Inventories of Waste Treatment Services) for ecoinvent v2.2.
First author: Doka G.
Year: 2013
Place of publication: Zurich
Publisher: Doka LCA
Original title: Updates to Life Cycle Inventories of Waste Treatment Services - part II: waste incineration

## Validation
Proof reading validation: Passed.; Other validation: none;
