# Copper telluride cement, from copper production

Dataset: EcoSpold 1, unit process
Functional unit: 1 kg
Category: metals / non ferro
Geography: GLO
Time period: 2000-01 to 2005-12
Generated by: Mischa Classen
accessRestrictedTo: 0
copyright: true

## General comment
The multi-output-process "processing of anode slime, primary copper production" delivers the co-products "copper telluride cement, from copper production" and "silver, from copper production, at refinery". The product "copper telluride cement, …" is an intermediary in the production of telluride and is not to be used by the LCA practitioner. The flow "silver, …" is a by-product of this process that receives part of the burdens allocated. The dataset must not be used to reflect silver. For Tellurium and Silver the respective adequate enduser datasets have to be chosen.;

## Included processes
Generation of anode slime from primary copper production (input), leaching and precipitation of copper telluride, melting and electrolysis of silver

## Geography
Data on average global context.

## Technology
Leaching of anode slime from primary copper production and precipitation of copper telluride on copper choppings, melting of residues with subsequent Moebius electrolysis.

## Reference product
- Copper telluride cement, from copper production [GLO]: 1 kg
  Global

## Inputs from technosphere
- Facilities precious metal refinery [SE]: 4.8718e-9 p; lognormal SD95 3.0072
  (2,2,1,2,1,3,9)
- Electricity, high voltage, production ENTSO-E, at grid: 0.043318 kWh; lognormal SD95 2.0991
  (4,2,1,2,5,5,2)
- Oxygen, liquid, at plant [RER]: 0.0017601 kg; lognormal SD95 5
  uncertainty estimated
- Copper, at regional storage [RER]: 0.00069 kg; lognormal SD95 1.2366
  (3,2,1,1,1,5,3)
- Anode slime, silver and tellurium containing, primary copper production [GLO]: 0.14108 kg; lognormal SD95 1.0913
  (2,2,1,2,1,3,3)
- Light fuel oil, burned in industrial furnace 1MW, non-modulating [RER]: 0.0053289 MJ; lognormal SD95 5
  uncertainty estimated

## Emissions to nature
- Mercury [emissions to air, low. pop.]: 4.3845e-9 kg; lognormal SD95 5
  uncertainty estimated
- Chlorine [emissions to air, low. pop.]: 4.6478e-6 kg; lognormal SD95 5
  uncertainty estimated
- Particulates, > 10 um [emissions to air, low. pop.]: 3.2519e-7 kg; lognormal SD95 5
  uncertainty estimated
- Dioxin, 2,3,7,8 Tetrachlorodibenzo-p- [emissions to air, low. pop.]: 9.2078e-11 kg; lognormal SD95 5
  uncertainty estimated
- Lead [emissions to air, low. pop.]: 9.0763e-7 kg; lognormal SD95 5
  uncertainty estimated
- Particulates, < 2.5 um [emissions to air, low. pop.]: 9.7558e-7 kg; lognormal SD95 5
  uncertainty estimated
- Fluorine [emissions to air, low. pop.]: 3.7268e-8 kg; lognormal SD95 5
  uncertainty estimated
- Copper [emissions to air, low. pop.]: 3.2886e-8 kg; lognormal SD95 5
  uncertainty estimated
- Heat, waste [emissions to air, low. pop.]: 0.15595 MJ; lognormal SD95 1
  calculation
- Zinc [emissions to air, low. pop.]: 1.2167e-7 kg; lognormal SD95 5
  uncertainty estimated
- Particulates, > 2.5 um, and < 10um [emissions to air, low. pop.]: 6.5038e-7 kg; lognormal SD95 5
  uncertainty estimated
- Cadmium [emissions to air, low. pop.]: 2.1923e-9 kg; lognormal SD95 5
  uncertainty estimated
- Nitrogen oxides [emissions to air, low. pop.]: 1.2715e-5 kg; lognormal SD95 5
  uncertainty estimated
- Sulfur dioxide [emissions to air, low. pop.]: 9.8655e-6 kg; lognormal SD95 5
  uncertainty estimated

## Sampling procedure
Literature

## Extrapolations
see Geography and Technology

## Sources
- Classen M., Althaus H.-J., Blaser S., Scharnhorst W., Tuchschmid M., Jungbluth N., Faist Emmenegger M., 2009, 2009 - LCI metals - Classen, Final report ecoinvent data v2.1, 10, Swiss Centre for LCI, Empa, ESU-services Ltd., Duebendorf, CH
Classen M., Althaus H.-J., Blaser S., Doka G., Jungbluth N., Tuchschmid M. (2008) Life Cycle Inventories of Metals. Final report ecoinvent data v2.1. Volume: 10. Issue: 0. Swiss Centre for LCI, Empa - TSL. Dübendorf, CH.
Type: Measurement on site
Source: CD-ROM
First author: Classen M.
Other authors: Althaus H.-J., Blaser S., Doka G., Jungbluth N., Tuchschmid M.
Year: 2008
Title of anthology: Final report ecoinvent data v2.1
Place of publication: Dübendorf, CH
Publisher: Swiss Centre for LCI, Empa - TSL
Volume No: 10
Issue No: 0

## Validation
Proof reading validation: Passed; Other validation: none;
