# Silicon, production mix, photovoltaics, at plant

Dataset: EcoSpold 1, unit process
Functional unit: 1 kg
Category: metals / refinement
Geography: CN
Time period: 2018-01 to 2021-12
Production volume: Approximately 450000 t in 2018
Generated by: Philippe Stolz
accessRestrictedTo: 0
copyright: true

## General comment
Solar-grade silicon (about 99.9999999% = 9N purity) is mainly produced by the modified Siemens process. The share of solar-grade silicon produced in fluidised bed reactors (FBR) is <5% according to ITRPV 2020. This production route is not modelled separately because life cycle inventory data are not available. The share of electronic-grade and electronic off-grade silicon used in the PV industry is considered negligible.;
CAS number: 7440-21-3;
Formula: Si;

## Included processes
Domestic production and imports of the purified silicon feedstock used for single-crystalline and multi-crystalline silicon wafer production in China. Transport of polysilicon from different world regions to regional storage.

## Technology
Modified Siemens process

## Time period
Data refer to 2018

## Reference product
- Silicon, production mix, photovoltaics, at plant [CN]: 1 kg
  CHINA

## Inputs from technosphere
- Transport, freight, lorry, fleet average [RER]: 0.05 tkm; lognormal SD95 2.095
  (4,5,na,na,na,na); Standard distance 50km
- Transport, transoceanic freight ship [OCE]: 5.3739 tkm; lognormal SD95 2.095
  (4,5,na,na,na,na); Transport distance CN-EU: 19994 km, CN-US: 20755 km, CN-APAC: 4584 km
- Silicon, solar grade, modified Siemens process, at plant [US]: 0.092779 kg; lognormal SD95 1.113
  (3,1,1,1,1,1); Market share US Polysilicon
- Transport, freight, rail [RER]: 0.2 tkm; lognormal SD95 2.095
  (4,5,na,na,na,na); Standard distance 200km
- Silicon, solar grade, modified Siemens process, at plant [RER]: 0.13535 kg; lognormal SD95 1.113
  (3,1,1,1,1,1); Market share European Polysilicon
- Silicon, solar grade, modified Siemens process, at plant [APAC]: 0.16191 kg; lognormal SD95 1.113
  (3,1,1,1,1,1); Market share APAC Polysilicon
- Silicon, solar grade, modified Siemens process, at plant [CN]: 0.60996 kg; lognormal SD95 1.113
  (3,1,1,1,1,1); Market share Chinese Polysilicon

## Sampling procedure
Survey among market intelligence companies

## Sources
- Frischknecht R., Itten R., Sinha P., de Wild-Scholten M., Zhank J., 2020, 2015 - LCI and LCA photovoltaic systems - Frischknecht, Project report, 174, IEA PVPS Task 12, Petten, NL
Frischknecht R.,, Stolz P., Sinha P., de Wild-Scholten M. (2020) Life Cycle Inventories and Life Cycle Assessments of Photovoltaic Systems. Project report. Volume: 174. IEA PVPS Task 12.
Type: Separate publication
Source: Report
First author: Frischknecht R.,
Other authors: Stolz P., Sinha P., de Wild-Scholten M.
Year: 2020
Title of anthology: Project report
Publisher: IEA PVPS Task 12
Volume No: 174
Original title: Life Cycle Inventories and Life Cycle Assessments of Photovoltaic Systems

## Validation
Proof reading validation: 30.09.2020; Other validation: G:\Projekte laufend\174 Photovoltaic, IEA Task 12\2017 Global supply chain\EcoSpold\[174-photovoltaics-global-supply-chain-v2.5.xlsx]X-Process;
