# Gold, at refinery

Dataset: EcoSpold 1, unit process
Functional unit: 1 kg
Category: metals / non ferro
Geography: CA
Time period: 2002-01 to 2006-12
Production volume: 13.61 t gold
Generated by: Matthias Tuchschmid
accessRestrictedTo: 0
copyright: true

## General comment
This data set describes the beneficiation, concentration and refinement of gold.;
CAS number: 007440-57-5;

## Included processes
This data set describes the mining of gold concentrate in Canada. It includes energy and water consumption, land use, transports, waste disposal as well as emissions to air and water.

## Geography
Material requirements for gold concentration are estimated with Australian data, air emission are estimated with Swedish data.

## Technology
The mining of ore from open pit and underground mines is considered.

## Time period
Period of public environmental report

## Reference product
- Gold, at refinery [CA]: 1 kg
  CANADA

## Inputs from technosphere
- Sulphuric acid, liquid, at plant [RER]: 0.66543 kg; lognormal SD95 1.1498
  (2,3,2,5,1,3); Calculation, based on thesis on Australian precious metal production, data for 1999
- Blasting [RER]: 15.854 kg; lognormal SD95 1.1094
  (2,3,2,3,1,3); Estimation, based on US-Data
- Electricity, medium voltage, production NORDEL, at grid [NORDEL]: 22522 kWh; lognormal SD95 1.1414
  (2,4,2,3,1,3); Environmental report (Placer-Dome, 2002)
- Disposal, sulfidic tailings, off-site [GLO]: 117090 kg; lognormal SD95 1.1414
  (2,4,2,3,1,3); Estimation
- Mine, gold [CA]: 1.4695e-6 p; lognormal SD95 3.0115
  (2,3,2,3,1,3); Environmental report
- Sodium cyanide, at plant [RER]: 136.22 kg; lognormal SD95 1.1414
  (2,4,2,3,1,3); Calculation, based on thesis on Australian precious metal production, data for 1999
- Sodium hydroxide, 50% in H2O, production mix, at plant [RER]: 11.645 kg; lognormal SD95 1.1498
  (same comment as for Sulphuric acid, liquid, at plant)
- Diesel, burned in diesel-electric generating set [GLO]: 734.9 MJ; lognormal SD95 1.1414
  (2,4,2,3,1,3); Environmental report (Placer-Dome, 2002)
- Transport, freight, lorry, 3.5t gross weight, fleet average [RER]: 97.012 tkm; lognormal SD95 2.0217
  (same comment as for Sodium cyanide, at plant)
- Charcoal, at plant [GLO]: 16.968 kg; lognormal SD95 1.1498
  (same comment as for Sulphuric acid, liquid, at plant)
- Zinc, primary, at regional storage [RER]: 2.8946 kg; lognormal SD95 1.1498
  (same comment as for Sulphuric acid, liquid, at plant)
- Transport, freight, rail [RER]: 458.14 tkm; lognormal SD95 2.0165
  (2,4,na,na,na,na); Calculation, based on standard distances
- Facilities precious metal refinery [SE]: 1.6461e-7 p; lognormal SD95 3.0206
  (2,4,2,3,1,3); Estimation
- Hydrochloric acid, 30% in H2O, at plant [RER]: 13.641 kg; lognormal SD95 1.1094
  (2,3,2,3,1,3); Calculation, based on thesis on Australian precious metal production, data for 1999
- Diesel, burned in building machine, average [CH]: 10132 MJ; lognormal SD95 1.1414
  (2,4,2,3,1,3); Environmental report (Placer-Dome, 2002)
- Transport, freight, lorry, fleet average [RER]: 229.07 tkm; lognormal SD95 2.0165
  (2,4,na,na,na,na); Calculation, based on standard distances
- Natural gas, burned in industrial furnace 1MWth [CH]: 70316 MJ; lognormal SD95 1.1414
  (same comment as for Sodium cyanide, at plant)
- Limestone, milled, packed, at plant [CH]: 63.215 kg; lognormal SD95 1.1414
  (same comment as for Sodium cyanide, at plant)

## Inputs from nature
- Water, well [resources, in water]: 347.91 m3; lognormal SD95 1.096
  (1,3,2,3,1,3); Environmental report (Placer-Dome, 2002)
- Gold, Au 7.1E-4%, in ore [resources, in ground]: 1.1765 kg; lognormal SD95 1.096
  (1,3,2,3,1,3); Estimation

## Emissions to nature
- Arsenic [emissions to water, ocean]: 0.0046363 kg; lognormal SD95 5.0094
  (1,3,2,3,1,3); Environmental report (Placer-Dome, 2002)
- Carbon dioxide, fossil [emissions to air, low. pop.]: 2.5366 kg; lognormal SD95 1.1414
  (2,4,2,3,1,3); Estimation, based on Swedish Data
- Copper [emissions to air, low. pop.]: 0.00013174 kg; lognormal SD95 5.0235
  (2,4,2,3,1,3); Estimation, based on Swedish Data
- Cadmium [emissions to water, ocean]: 0.0010654 kg; lognormal SD95 3.0082
  (1,3,2,3,1,3); Environmental report (Placer-Dome, 2002)
- Cyanide [emissions to water, ocean]: 0.027994 kg; lognormal SD95 3.0082
  (1,3,2,3,1,3); Environmental report (Placer-Dome, 2002)
- Nickel [emissions to water, ocean]: 0.015658 kg; lognormal SD95 5.0094
  (1,3,2,3,1,3); Environmental report (Placer-Dome, 2002)
- Heat, waste [emissions to air, low. pop.]: 81079 MJ; lognormal SD95 1.1414
  (2,4,2,3,1,3); Calculation
- Zinc [emissions to water, ocean]: 0.0062234 kg; lognormal SD95 5.0094
  (1,3,2,3,1,3); Environmental report (Placer-Dome, 2002)
- Lead [emissions to water, ocean]: 0.0023218 kg; lognormal SD95 5.0094
  (1,3,2,3,1,3); Environmental report (Placer-Dome, 2002)
- Mercury [emissions to water, ocean]: 1.3226e-5 kg; lognormal SD95 5.0094
  (1,3,2,3,1,3); Environmental report (Placer-Dome, 2002)
- Zinc [emissions to air, low. pop.]: 3.637e-5 kg; lognormal SD95 5.0235
  (2,4,2,3,1,3); Estimation, based on Swedish Data
- Lead [emissions to air, low. pop.]: 4.2836e-5 kg; lognormal SD95 5.0235
  (2,4,2,3,1,3); Estimation, based on Swedish Data
- Copper [emissions to water, ocean]: 0.012682 kg; lognormal SD95 3.0082
  (1,3,2,3,1,3); Environmental report (Placer-Dome, 2002)
- Water [emissions to water, unspecified]: 313119 kg; lognormal SD95 2.5196
  (5,5,5,5,5,BU:1.05); All uncertainty-values set to 5.0 by default. Balance of input water

## Sampling procedure
environmental report

## Extrapolations
See Geography, estimation of conversion of transport fuel to tkm

## Sources
- Classen M., Althaus H.-J., Blaser S., Scharnhorst W., Tuchschmid M., Jungbluth N., Faist Emmenegger M., 2009, 2009 - LCI metals - Classen, Final report ecoinvent data v2.1, 10, Swiss Centre for LCI, Empa, ESU-services Ltd., Duebendorf, CH
Classen M., Althaus H.-J., Blaser S., Doka G., Jungbluth N., Tuchschmid M. (2008) Life Cycle Inventories of Metals. Final report ecoinvent data v2.1. Volume: 10. Issue: 0. Swiss Centre for LCI, Empa - TSL. Dübendorf, CH.
Type: Measurement on site
Source: CD-ROM
First author: Classen M.
Other authors: Althaus H.-J., Blaser S., Doka G., Jungbluth N., Tuchschmid M.
Year: 2008
Title of anthology: Final report ecoinvent data v2.1
Place of publication: Dübendorf, CH
Publisher: Swiss Centre for LCI, Empa - TSL
Volume No: 10
Issue No: 0

## Validation
Proof reading validation: Passed; Other validation: none;
