# Electricity, high voltage, production ENTSO-E, at grid

Dataset: EcoSpold 1, unit process
Functional unit: 1 kWh
Category: electricity / production mix
Geography: ENTSO-E
Time period: 2023 to 2023
Synonyms: 0
Share of production covered: 100 %
Generated by: Christopher Oberschelp
accessRestrictedTo: 0
copyright: true

## General comment
Electricity domestic net production shares are based on annual averages for 2023. Losses are distributed across voltage levels with total losses for the same time frame as well as older proxy data for disaggregation. The transmission network and direct emissions to air (ozone and N2O) are also included. Remark: This dataset describes the transmission of high voltage electricity. Ozone- and NO2-emission factors are based on published measurements made in various countries. Assumptions for transmission network, losses and emissions are based on older UCTE data.

## Included processes
Included are the shares of domestic electricity production by technology at the busbar. Not included are transformation, transport or distribution losses.

## Geography
Data apply to utilities and auto-producers.

## Technology
No technology description is provided because the dataset just describes the power plant portfolio of the respective country using current average technology per energy carrier.

## Time period
Time period of statistics used.

## Reference product
- Electricity, high voltage, production ENTSO-E, at grid [ENTSO-E]: 1 kWh

## Inputs from technosphere
- Electricity, production mix [ENTSO-E]: 1.02818 kWh; lognormal SD95 1.0714
  (1,1,1,1,1,3,BU:1.05), EIA energy statistics and others, own calculations
- Transmission network, electricity, high voltage [CH]: 6.82e-9 km; lognormal SD95 3.1614
  (3,1,4,5,3,5); based on consumption statistics

## Emissions to nature
- Ozone [emissions to air, unspecified]: 4.5e-6 kg; lognormal SD95 1.5
  (-,-,-,-,-,-); standard deviation based on variation reported in literature
- Dinitrogen monoxide [emissions to air, unspecified]: 5e-6 kg; lognormal SD95 1.5
  (-,-,-,-,-,-); standard deviation based on variation reported in literature
- Heat, waste [emissions to soil, unspecified]: 0.0046789 MJ; lognormal SD95 1.3221
  (4,1,3,1,1,5); estimations based on losses
- Heat, waste [emissions to air, unspecified]: 0.088899 MJ; lognormal SD95 1.3221
  (4,1,3,1,1,5); estimations based on losses

## Sampling procedure
Statistical data

## Sources
- Oberschelp C., 2025, 2025 - Electricity mixes in UVEK database - Oberschelp, Project reports, 0, Oberschelp Consulting, Zuerich, CH

## Validation
manual review of spold files and documentation
none
