# Pellets, iron, at plant

Dataset: EcoSpold 1, unit process
Functional unit: 1 kg
Category: metals / extraction
Geography: RER
Time period: 2018-01 to 2020-12
Generated by: Mischa Zschokke
accessRestrictedTo: 0
copyright: true

## General comment
Input/output data from three pellet plant sites in the EU-25.\nNo transport of iron ore because pellets are fabricated at mine;
Synonyms: In UVEK2018 enthalten;

## Included processes
Blending, mixing and sintering. Emissions are abated

## Geography
Inputs relate to three pellent plant sites in EU-25. Emissions relate to European plants.; Data from literature, referring to Europe

## Technology
Industry data.

## Time period
Time of publications.

## Reference product
- Pellets, iron, at plant [RER]: 1 kg
  Europe

## Inputs from technosphere
- Basic oxygen furnace gas, burned in power plant [RER]: 0.306 MJ; lognormal SD95 1.0744
  (2,2,1,1,1,nA,BU:1.05); Coke oven gas or BOF gas; Remus (2013)
- Limestone, crushed, for mill [CH]: 0.0025 kg; lognormal SD95 1.1267
  (2,2,3,1,1,nA,BU:1.05); Limestone not from CH; Remus (2013)
- Dolomite, at plant [RER]: 0.0138 kg; lognormal SD95 1.1267
  (2,2,3,1,1,nA,BU:1.05); dolomite instead of olivine; Remus (2013)
- Hard coal coke, at plant [RER]: 0.342 MJ; lognormal SD95 1.1267
  (2,2,3,1,1,nA,BU:1.05); (coke breeeze); Remus (2013)
- Natural gas, high pressure, at consumer [RER]: 0.014 MJ; lognormal SD95 1.0744
  (2,2,1,1,1,nA,BU:1.05); ;
- Compressed air, average installation, <30kW, 8 bar gauge, at supply network [RER]: 0.213 m3; lognormal SD95 1.1267
  (2,2,3,1,1,nA,BU:1.05); ; Remus (2013)
- Iron ore, 65% Fe, at beneficiation [GLO]: 0.95 kg; lognormal SD95 1.1267
  (2,2,3,1,1,nA,BU:1.05); ; Remus (2013)
- Bentonite, at processing [DE]: 0.00545 kg; lognormal SD95 1.1267
  (2,2,3,1,1,nA,BU:1.05); ; Remus (2013)
- Electricity, medium voltage, production ENTSO-E, at grid: 0.024091 kWh; lognormal SD95 1.0744
  (2,2,1,1,1,nA,BU:1.05); ; Remus (2013)
- Transport, freight, lorry, fleet average [RER]: 0.0095 tkm; lognormal SD95 2.004
  (2,2,1,1,1,nA,BU:2); based on UVEK:2016;
- Transport, freight, rail [RER]: 0.0040091 tkm; lognormal SD95 2.004
  (2,2,1,1,1,nA,BU:2); based on UVEK:2016;
- Aluminium oxide, plant [RER]: 2.5e-11 p; lognormal SD95 3.0038
  (2,2,1,1,1,nA,BU:3); as proxy;

## Inputs from nature
- Water, cooling, unspecified natural origin/m3 [resources, in water]: 0.00068 m3; lognormal SD95 1.0744
  (2,2,1,1,1,nA,BU:1.05); ; Remus (2013)

## Emissions to nature
- Nitrogen oxides [emissions to air, unspecified]: 0.00035 kg; lognormal SD95 1.5217
  (2,2,3,1,1,nA,BU:1.5); ; Remus (2013)
- Particulates, < 2.5 um [emissions to air, unspecified]: 8.2e-5 kg; lognormal SD95 3.0162
  (2,2,3,1,1,nA,BU:3); dust after abatement (< 2.5 um); Remus (2013)
- Chromium [emissions to air, unspecified]: 1.38e-8 kg; lognormal SD95 5.0184
  (2,2,3,1,1,nA,BU:5); ; Remus (2013)
- Hydrogen chloride [emissions to air, unspecified]: 2.17e-5 kg; lognormal SD95 1.5217
  (2,2,3,1,1,nA,BU:1.5); ; Remus (2013)
- Cadmium [emissions to air, unspecified]: 1.11e-9 kg; lognormal SD95 5.0184
  (2,2,3,1,1,nA,BU:5); ; Remus (2013)
- Lead [emissions to air, unspecified]: 4.32e-8 kg; lognormal SD95 5.0184
  (2,2,3,1,1,nA,BU:5); ; Remus (2013)
- Dioxin, 2,3,7,8 Tetrachlorodibenzo-p- [emissions to air, unspecified]: 1.02e-13 kg; lognormal SD95 3.0162
  (2,2,3,1,1,nA,BU:3); ; Remus (2013)
- Hydrogen fluoride [emissions to air, unspecified]: 3.8e-6 kg; lognormal SD95 1.5217
  (2,2,3,1,1,nA,BU:1.5); ; Remus (2013)
- Vanadium [emissions to air, unspecified]: 1.43e-8 kg; lognormal SD95 5.0184
  (2,2,3,1,1,nA,BU:5); ; Remus (2013)
- Thallium [emissions to air, unspecified]: 1.8e-10 kg; lognormal SD95 5.0184
  (2,2,3,1,1,nA,BU:5); ; Remus (2013)
- Zinc [emissions to air, unspecified]: 6.52e-7 kg; lognormal SD95 5.0184
  (2,2,3,1,1,nA,BU:5); ; Remus (2013)
- PAH, polycyclic aromatic hydrocarbons [emissions to air, unspecified]: 9e-10 kg; lognormal SD95 3.0162
  (2,2,3,1,1,nA,BU:3); ; Remus (2013)
- Carbon monoxide, fossil [emissions to air, unspecified]: 0.00021 kg; lognormal SD95 5.0184
  (2,2,3,1,1,nA,BU:5); ; Remus (2013)
- Nickel [emissions to air, unspecified]: 9.6e-9 kg; lognormal SD95 5.0184
  (2,2,3,1,1,nA,BU:5); ; Remus (2013)
- NMVOC, non-methane volatile organic compounds, unspecified origin [emissions to air, unspecified]: 2.25e-5 kg; lognormal SD95 1.5217
  (2,2,3,1,1,nA,BU:1.5); ; Remus (2013)
- Mercury [emissions to air, unspecified]: 1.23e-8 kg; lognormal SD95 5.0184
  (2,2,3,1,1,nA,BU:5); ; Remus (2013)
- Manganese [emissions to air, unspecified]: 3.47e-8 kg; lognormal SD95 5.0184
  (2,2,3,1,1,nA,BU:5); ; Remus (2013)
- Copper [emissions to air, unspecified]: 4.1e-9 kg; lognormal SD95 5.0184
  (2,2,3,1,1,nA,BU:5); ; Remus (2013)
- Carbon dioxide, fossil [emissions to air, unspecified]: 0.105 kg; lognormal SD95 1.1267
  (2,2,3,1,1,nA,BU:1.05); ; Remus (2013)
- Sulfur dioxide [emissions to air, unspecified]: 0.000112 kg; lognormal SD95 1.1267
  (2,2,3,1,1,nA,BU:1.05); ; Remus (2013)
- Water [emissions to water, unspecified]: 0.646 kg; lognormal SD95 2.5196
  (5,5,5,5,5,BU:1.05); All uncertainty-values set to 5.0 by default. Balance of input water

## Sampling procedure
Data from literature

## Extrapolations
Some generic datasets from ecoinvent have been used.

## Sources
- Zschokke M., Bolt P., Conrad S., 2021, 2021 - LCI steel and iron processes - Zschokke, Project report, Carbotech AG, Zuerich, CH
M. Zschokke, S. Conrad, P. Bolt (2020) Life cycle inventories of steel and iron processes for UVEK:2020. Project report. carbotech. Zurich, CH.
Type: Separate publication
Source: Report
First author: M. Zschokke
Other authors: S. Conrad, P. Bolt
Year: 2020
Title of anthology: Project report
Place of publication: Zurich, CH
Publisher: carbotech
Original title: Life cycle inventories of steel and iron processes for UVEK:2020

## Validation
Proof reading validation: 30.01.2021; Other validation: [pellets, iron, at plant, RER v0.3.xlsx]X-Process;
