# Tap water, desalinated sea water, at user

Dataset: EcoSpold 1, unit process
Functional unit: 1 kg
Category: water / water supply\production
Geography: ES
Time period: 2017-01 to 2020-12
Generated by: Melina Glimmann
accessRestrictedTo: 0
copyright: true

## Geography
The inventory is modelled for Spain

## Reference product
- Tap water, desalinated sea water, at user [ES]: 1 kg

## Inputs from technosphere
- EDTA, ethylenediaminetetraacetic acid, at plant [RER]: 2.34e-9 kg; lognormal SD95 2.5649
  (5,5,5,5,5,5,BU:1.05); ;
- Sodium sulphate from sulfuric acid digestion of spodumene [GLO]: 3.1599e-5, 5.502e-6 kg (2 entries); lognormal SD95 1.2355
  (1,1,3,1,1,5,BU:1.05); ;
- Disposal, municipal solid waste, 22.9% water, to municipal incineration [CH]: 5.1602e-9, 1.433e-8, 1.0135e-5, 8.4189e-7, 3.6109e-9 kg (5 entries); lognormal SD95 2.5649
  (5,5,5,5,5,5,BU:1.05); ;
- Chlorine, liquid, production mix, at plant [RER]: 9.9997e-7, 2.0003e-7 kg (2 entries); lognormal SD95 1.3635
  (3,4,3,1,3,5,BU:1.05); ;
- Disposal, glass, 0% water, to municipal incineration [CH]: 3.1751e-9, 3.7405e-7 kg (2 entries); lognormal SD95 2.5649
  (5,5,5,5,5,5,BU:1.05); ;
- Chemicals organic, at plant [GLO]: 9.37e-7, 7.39e-8, 3e-8 kg (3 entries); lognormal SD95 1.3635
  (3,4,3,1,3,5,BU:1.05); ;
- Epoxy resin, liquid, at plant [RER]: 4.7527e-9, 2.2562e-8 kg (2 entries); lognormal SD95 1.2355
  (1,1,3,1,1,5,BU:1.05); ;
- Polycarboxylates, 40% active substance, at plant [RER]: 2.0484e-6, 1.0116e-6 kg (2 entries); lognormal SD95 2.5649
  (5,5,5,5,5,5,BU:1.05); ;
- Glass fibre, at plant [RER]: 3.4991e-7 kg; lognormal SD95 1.2355
  (1,1,3,1,1,5,BU:1.05); ;
- Lime, hydrated, packed, at plant [CH]: 3.6613e-7, 4.3134e-5 kg (2 entries); lognormal SD95 1.285
  (3,4,3,1,1,5,BU:1.05); ;
- Sodium hypochlorite, 15% in H2O, at plant [RER]: 3.1058e-6, 6.5424e-7 kg (2 entries); lognormal SD95 1.3635
  (3,4,3,1,3,5,BU:1.05); ;
- Sodium hydroxide, 50% in H2O, production mix, at plant [RER]: 2.727e-5 kg; lognormal SD95 1.3635
  (3,4,3,1,3,5,BU:1.05); ;
- Water works [CH]: 5.3526e-13 p; lognormal SD95 3.05781
  (1,1,3,1,1,5,BU:3); ;
- Tap water, at user [CH]: 5.5959e-5 kg; lognormal SD95 1.2355
  (1,1,3,1,1,5,BU:1.05); ;
- Electricity, low voltage, at grid [ES]: 0.003723 kWh; lognormal SD95 1.2355
  (1,1,3,1,1,5,BU:1.05); ;
- Carbon dioxide liquid, at plant [RER]: 5.8256e-6, 2.7674e-5 kg (2 entries); lognormal SD95 1.285
  (3,4,3,1,1,5,BU:1.05); ;
- Iron (III) chloride, 40% in H2O, at plant [CH]: 5.2e-13 kg; lognormal SD95 1.41451
  (3,4,4,1,3,5,BU:1.05); ;

## Inputs from nature
- Water, salt, ocean [resources, in water]: 0.0025 m3; lognormal SD95 1.2355
  (1,1,3,1,1,5,BU:1.05); ;

## Sampling procedure
Literature

## Sources
- Kaegi T., Glimmann M., Conte F., Roberts G., 2021, 2021 - LCA tomatoes and green beans production - Kaegi, Carbotech on behalf of BAFU, Carbotech AG, Zuerich, CH

## Validation
15.12.2021 \\tsclient\Schreibtisch\WinShare\BAFU Gemuese\2021-12-15\[EcoSpold_Bafu_Gemuese_Tap water_desalinated sea water_ES v1.xlsx]X-Process
