# Potatoes, at farm

Dataset: EcoSpold 1, unit process
Functional unit: 1 kg
Category: agricultural / plant production
Geography: US
Time period: 2005-01 to 2005-12
Production volume: U.S. average prod of potato 20'066'292t in 2001-2006.
Share of production covered: 100 %
Generated by: Thomas Kaegi
accessRestrictedTo: 0
copyright: true

## General comment
Inventory refers to the production of 1 kg potatoes, at farm with a moisture content of 78 %. Fresh matter yield at 78% moisture: 41001 kg/ha.;

## Included processes
The inventory includes the processes of soil cultivation, sowing, weed control, fertilisation, pest and pathogen control, irrigation and harvest. Machine infrastructure and a shed for machine sheltering is included. Inputs of fertilisers, pesticides and seed as well as their transports to the farm are considered. The direct emissions on the field are also included. The system boundary is at the farm gate.

## Technology
Conventional production typical for the country. Water for irrigation is pumped from 48 meter depth by electric pumps.

## Time period
The yield data have been collected for the years 2001-2006.

## Reference product
- Potatoes, at farm [US]: 1 kg
  UNITED STATES

## Inputs from technosphere
- Fertilising, by broadcaster [CH]: 4.878e-5 ha; lognormal SD95 1.0744
  (2,1,1,3,1,na)
- Organophosphorus-compounds, at regional storehouse [CH]: 2.9817e-5 kg; lognormal SD95 1.0714
  (2,1,1,1,1,na)
- Potato planting [CH]: 2.439e-5 ha; lognormal SD95 1.0744
  (2,1,1,3,1,na)
- Transport, freight, lorry, fleet average [RER]: 0.0046773 tkm; lognormal SD95 2.095
  (4,5,na,na,na,na)
- Tillage, harrowing, by spring tine harrow [CH]: 4.878e-5 ha; lognormal SD95 1.0744
  (2,1,1,3,1,na)
- Tillage, ploughing [CH]: 2.439e-5 ha; lognormal SD95 1.0744
  (2,1,1,3,1,na)
- Diammonium phosphate, as P2O5, at regional storehouse [RER]: 0.0043273 kg; lognormal SD95 1.1267
  (2,2,3,1,1,na)
- Tillage, hoeing and earthing-up, potatoes [CH]: 4.878e-5 ha; lognormal SD95 1.0744
  (2,1,1,3,1,na)
- Irrigating [US]: 0.11256 m3; lognormal SD95 1.0714
  (2,1,1,1,1,na)
- Dithiocarbamate-compounds, at regional storehouse [CH]: 6.1703e-5 kg; lognormal SD95 1.0714
  (2,1,1,1,1,na)
- Potato seed IP, at regional storehouse [CH]: 0.057408 kg; lognormal SD95 1.0744
  (2,2,1,1,1,na)
- Harvesting, by complete harvester, potatoes [CH]: 2.3881e-5 ha; lognormal SD95 1.0744
  (2,1,1,3,1,na)
- [sulfonyl]urea-compounds, at regional storehouse [CH]: 1.001e-7 kg; lognormal SD95 1.0714
  (2,1,1,1,1,na)
- Ammonia, liquid, at regional storehouse [RER]: 0.0023786 kg; lognormal SD95 1.1267
  (2,2,3,1,1,na)
- Triazine-compounds, at regional storehouse [CH]: 6.6651e-6 kg; lognormal SD95 1.0714
  (2,1,1,1,1,na)
- Maneb, at regional storehouse [CH]: 9.5744e-8 kg; lognormal SD95 1.0714
  (2,1,1,1,1,na)
- Acetamide-anillide-compounds, at regional storehouse [CH]: 5.0592e-6 kg; lognormal SD95 1.0714
  (2,1,1,1,1,na)
- Diammonium phosphate, as N, at regional storehouse [RER]: 0.0016933 kg; lognormal SD95 1.0744
  (2,2,1,1,1,na)
- Bipyridylium-compounds, at regional storehouse [CH]: 3.3423e-6 kg; lognormal SD95 1.0714
  (2,1,1,1,1,na)
- Linuron, at regional storehouse [CH]: 8.7476e-7 kg; lognormal SD95 1.0714
  (2,1,1,1,1,na)
- Application of plant protection products, by field sprayer [CH]: 9.7559e-5 ha; lognormal SD95 1.0744
  (2,1,1,3,1,na)
- Potassium chloride, as K2O, at regional storehouse [RER]: 0.0041284 kg; lognormal SD95 1.1267
  (2,2,3,1,1,na)
- Urea, as N, at regional storehouse [RER]: 0.00082272 kg; lognormal SD95 1.1267
  (2,2,3,1,1,na)
- Pesticide unspecified, at regional storehouse [CH]: 0.0010174 kg; lognormal SD95 1.0714
  (2,1,1,1,1,na)
- [thio]carbamate-compounds, at regional storehouse [CH]: 0.00067046 kg; lognormal SD95 1.0714
  (2,1,1,1,1,na)
- Ammonium nitrate, as N, at regional storehouse [RER]: 0.0011361 kg; lognormal SD95 1.1267
  (2,2,3,1,1,na)
- Tillage, cultivating, chiselling [CH]: 2.439e-5 ha; lognormal SD95 1.0744
  (2,1,1,3,1,na)
- Phenoxy-compounds, at regional storehouse [CH]: 2.4083e-6 kg; lognormal SD95 1.0714
  (2,1,1,1,1,na)
- Potato haulm cutting [CH]: 2.439e-5 ha; lognormal SD95 1.0744
  (2,1,1,3,1,na)
- Dinitroaniline-compounds, at regional storehouse [CH]: 4.624e-6 kg; lognormal SD95 1.0714
  (2,1,1,1,1,na)
- Glyphosate, at regional storehouse [CH]: 2.4371e-7 kg; lognormal SD95 1.0714
  (2,1,1,1,1,na)
- Potato grading [CH]: 1 kg; lognormal SD95 1.0744
  (2,1,1,3,1,na)
- Pyridazine-compounds, at regional storehouse [CH]: 4.1127e-6 kg; lognormal SD95 1.0714
  (2,1,1,1,1,na)

## Inputs from nature
- Transformation, from annual crop [resources, land]: 0.2439 m2; lognormal SD95 2.0034
  (2,1,1,1,1,na)
- Carbon dioxide, in air [resources, in air]: 0.32142 kg; lognormal SD95 1.0714
  (2,1,1,1,1,na)
- Transformation, to annual crop [resources, land]: 0.2439 m2; lognormal SD95 2.0034
  (2,1,1,1,1,na)
- Energy, gross calorific value, in biomass [resources, biotic]: 3.6476 MJ; lognormal SD95 1.0714
  (2,1,1,1,1,na)
- Occupation, annual crop [resources, land]: 0.2439 m2a; lognormal SD95 2.0034
  (2,1,1,1,1,na)

## Emissions to nature
- Carbaryl [emissions to soil, agricultural]: 6.0928e-8 kg; lognormal SD95 1.2077
  (2,1,1,1,1,na)
- Zinc [emissions to water, river]: 4.4566e-6 kg; lognormal SD95 1.8181
  (2,2,1,5,1,na)
- Chromium [emissions to water, river]: 2.7742e-6 kg; lognormal SD95 1.8181
  (2,2,1,5,1,na)
- Phorate [emissions to soil, agricultural]: 6.7979e-6 kg; lognormal SD95 1.2077
  (2,1,1,1,1,na)
- Chromium [emissions to soil, agricultural]: 2.2082e-7 kg; lognormal SD95 1.5217
  (2,2,1,5,1,na)
- Imidacloprid [emissions to soil, agricultural]: 1.0706e-6 kg; lognormal SD95 1.2077
  (2,1,1,1,1,na)
- Sethoxydim [emissions to soil, agricultural]: 8.704e-8 kg; lognormal SD95 1.2077
  (2,1,1,1,1,na)
- Ethoprop [emissions to soil, agricultural]: 3.7601e-6 kg; lognormal SD95 1.2077
  (2,1,1,1,1,na)
- Spinosad [emissions to soil, agricultural]: 4.352e-9 kg; lognormal SD95 1.2077
  (2,1,1,1,1,na)
- Propargite [emissions to soil, agricultural]: 2.1804e-6 kg; lognormal SD95 1.2077
  (2,1,1,1,1,na)
- Nickel [emissions to soil, agricultural]: -1.6075e-6 kg; lognormal SD95 1.5217
  (2,2,1,5,1,na)
- Copper [emissions to water, river]: 2.3196e-6 kg; lognormal SD95 1.8181
  (2,2,1,5,1,na)
- Cadmium [emissions to water, groundwater]: 1.1559e-9 kg; lognormal SD95 1.8181
  (2,2,1,5,1,na)
- 2,4-D [emissions to soil, agricultural]: 5.984e-9 kg; lognormal SD95 1.2077
  (2,1,1,1,1,na)
- Lead [emissions to water, river]: 1.0178e-6 kg; lognormal SD95 1.8181
  (2,2,1,5,1,na)
- Nitrogen oxides [emissions to air, low. pop.]: 2.874e-5 kg; lognormal SD95 1.4057
  (2,2,1,1,1,na)
- Trichlorfon [emissions to soil, agricultural]: 3.264e-9 kg; lognormal SD95 1.2077
  (2,1,1,1,1,na)
- Dinitrogen monoxide [emissions to air, low. pop.]: 0.00013686 kg; lognormal SD95 1.4057
  (2,2,1,1,1,na)
- Pymetrozine [emissions to soil, agricultural]: 2.089e-7 kg; lognormal SD95 1.2077
  (2,1,1,1,1,na)
- Metalaxil [emissions to soil, agricultural]: 2.1151e-6 kg; lognormal SD95 1.2077
  (2,1,1,1,1,na)
- Sulfur [emissions to soil, agricultural]: 1.1359e-5 kg; lognormal SD95 1.2077
  (2,1,1,1,1,na)
- Cadmium [emissions to water, river]: 2.6832e-8 kg; lognormal SD95 1.8181
  (2,2,1,5,1,na)
- Malathion [emissions to soil, agricultural]: 5.9296e-8 kg; lognormal SD95 1.2077
  (2,1,1,1,1,na)
- Aldicarb [emissions to soil, agricultural]: 4.1431e-6 kg; lognormal SD95 1.2077
  (2,1,1,1,1,na)
- Endothall [emissions to soil, agricultural]: 1.2512e-8 kg; lognormal SD95 1.2077
  (2,1,1,1,1,na)
- Sulfuric acid [emissions to soil, agricultural]: 0.00076712 kg; lognormal SD95 1.2077
  (2,1,1,1,1,na)
- Lead [emissions to soil, agricultural]: -7.1092e-7 kg; lognormal SD95 1.5217
  (2,2,1,5,1,na)
- Metiram [emissions to soil, agricultural]: 2.794e-6 kg; lognormal SD95 1.2077
  (2,1,1,1,1,na)
- Diquat [emissions to soil, agricultural]: 3.1335e-6 kg; lognormal SD95 1.2077
  (2,1,1,1,1,na)
- Esfenvalerate [emissions to soil, agricultural]: 2.2195e-7 kg; lognormal SD95 1.2077
  (2,1,1,1,1,na)
- Dimethomorph [emissions to soil, agricultural]: 3.9168e-8 kg; lognormal SD95 1.2077
  (2,1,1,1,1,na)
- Copper [emissions to soil, agricultural]: 1.755e-6 kg; lognormal SD95 1.5217
  (2,2,1,5,1,na)
- Flutolanil [emissions to soil, agricultural]: 7.3984e-7 kg; lognormal SD95 1.2077
  (2,1,1,1,1,na)
- Thiazole, 2-(thiocyanatemethylthio)benzo- [emissions to soil, agricultural]: 6.3383e-5 kg; lognormal SD95 1.2077
  (2,1,1,1,1,na)
- Dipropylthiocarbamic acid S-ethyl ester [emissions to soil, agricultural]: 1.6229e-5 kg; lognormal SD95 1.2077
  (2,1,1,1,1,na)
- Paraquat [emissions to soil, agricultural]: 2.089e-7 kg; lognormal SD95 1.2077
  (2,1,1,1,1,na)
- Piperonyl butoxide [emissions to soil, agricultural]: 2.2304e-8 kg; lognormal SD95 1.2077
  (2,1,1,1,1,na)
- Rimsulfuron [emissions to soil, agricultural]: 1.001e-7 kg; lognormal SD95 1.2077
  (2,1,1,1,1,na)
- Endosulfan [emissions to soil, agricultural]: 1.3578e-6 kg; lognormal SD95 1.2077
  (2,1,1,1,1,na)
- Linuron [emissions to soil, agricultural]: 8.7476e-7 kg; lognormal SD95 1.2077
  (2,1,1,1,1,na)
- Nitrate [emissions to water, groundwater]: 0.001856 kg; lognormal SD95 1.5051
  (2,2,1,1,1,na)
- Dimethoate [emissions to soil, agricultural]: 1.038e-6 kg; lognormal SD95 1.2077
  (2,1,1,1,1,na)
- Propamocarb HCl [emissions to soil, agricultural]: 3.264e-8 kg; lognormal SD95 1.2077
  (2,1,1,1,1,na)
- Metribuzin [emissions to soil, agricultural]: 6.4562e-6 kg; lognormal SD95 1.2077
  (2,1,1,1,1,na)
- Carbofuran [emissions to soil, agricultural]: 6.7891e-7 kg; lognormal SD95 1.2077
  (2,1,1,1,1,na)
- Azinphos-methyl [emissions to soil, agricultural]: 3.9603e-7 kg; lognormal SD95 1.2077
  (2,1,1,1,1,na)
- Ammonia [emissions to air, low. pop.]: 0.00030548 kg; lognormal SD95 1.209
  (2,2,1,1,1,na)
- Phosmet [emissions to soil, agricultural]: 7.4855e-7 kg; lognormal SD95 1.2077
  (2,1,1,1,1,na)
- Phosphate [emissions to water, river]: 0.0002029 kg; lognormal SD95 1.5217
  (2,2,1,5,1,na)
- Trifluralin [emissions to soil, agricultural]: 4.896e-7 kg; lognormal SD95 1.2077
  (2,1,1,1,1,na)
- Metam-sodium dihydrate [emissions to soil, agricultural]: 0.00066972 kg; lognormal SD95 1.2077
  (2,1,1,1,1,na)
- Cymoxanil [emissions to soil, agricultural]: 1.8278e-7 kg; lognormal SD95 1.2077
  (2,1,1,1,1,na)
- Cadmium [emissions to soil, agricultural]: 2.7477e-7 kg; lognormal SD95 1.5217
  (2,2,1,5,1,na)
- Chlorothalonil [emissions to soil, agricultural]: 5.0327e-5 kg; lognormal SD95 1.2077
  (2,1,1,1,1,na)
- Iprodione [emissions to soil, agricultural]: 1.3252e-6 kg; lognormal SD95 1.2077
  (2,1,1,1,1,na)
- Diazinon [emissions to soil, agricultural]: 1.5014e-6 kg; lognormal SD95 1.2077
  (2,1,1,1,1,na)
- Copper [emissions to water, groundwater]: 8.5908e-8 kg; lognormal SD95 1.8181
  (2,2,1,5,1,na)
- Azoxystrobin [emissions to soil, agricultural]: 1.9584e-6 kg; lognormal SD95 1.2077
  (2,1,1,1,1,na)
- Clethodim [emissions to soil, agricultural]: 4.896e-9 kg; lognormal SD95 1.2077
  (2,1,1,1,1,na)
- Glyphosate [emissions to soil, agricultural]: 2.4371e-7 kg; lognormal SD95 1.2077
  (2,1,1,1,1,na)
- Lead [emissions to water, groundwater]: 6.4759e-9 kg; lognormal SD95 1.8181
  (2,2,1,5,1,na)
- Mercury [emissions to soil, agricultural]: -1.1299e-8 kg; lognormal SD95 1.5217
  (2,2,1,5,1,na)
- Metolachlor [emissions to soil, agricultural]: 4.5304e-6 kg; lognormal SD95 1.2077
  (2,1,1,1,1,na)
- Cyfluthrin [emissions to soil, agricultural]: 2.6983e-7 kg; lognormal SD95 1.2077
  (2,1,1,1,1,na)
- Mercury [emissions to water, river]: 3.9496e-9 kg; lognormal SD95 1.8181
  (2,2,1,5,1,na)
- Mercury [emissions to water, groundwater]: 1.2642e-10 kg; lognormal SD95 1.8181
  (2,2,1,5,1,na)
- Nickel [emissions to water, river]: 2.304e-6 kg; lognormal SD95 1.8181
  (2,2,1,5,1,na)
- Zinc [emissions to soil, agricultural]: -3.7861e-7 kg; lognormal SD95 1.5217
  (2,2,1,5,1,na)
- Mancozeb [emissions to soil, agricultural]: 5.8909e-5 kg; lognormal SD95 1.2077
  (2,1,1,1,1,na)
- Fentin hydroxide [emissions to soil, agricultural]: 6.5063e-7 kg; lognormal SD95 1.2077
  (2,1,1,1,1,na)
- Zinc [emissions to water, groundwater]: 6.1312e-7 kg; lognormal SD95 1.8181
  (2,2,1,5,1,na)
- Maleic hydrazide [emissions to soil, agricultural]: 4.1127e-6 kg; lognormal SD95 1.2077
  (2,1,1,1,1,na)
- Glufosinate [emissions to soil, agricultural]: 3.2205e-7 kg; lognormal SD95 1.2077
  (2,1,1,1,1,na)
- Maneb [emissions to soil, agricultural]: 9.5744e-8 kg; lognormal SD95 1.2077
  (2,1,1,1,1,na)
- Carbon dioxide, fossil [emissions to air, low. pop.]: 0.0012917 kg; lognormal SD95 1.0744
  (2,2,1,1,1,na)
- Oxamyl [emissions to soil, agricultural]: 3.1509e-6 kg; lognormal SD95 1.2077
  (2,1,1,1,1,na)
- Phosphorus [emissions to water, river]: 0.00015016 kg; lognormal SD95 1.5051
  (2,2,1,1,1,na)
- Pendimethalin [emissions to soil, agricultural]: 4.1344e-6 kg; lognormal SD95 1.2077
  (2,1,1,1,1,na)
- Chromium [emissions to water, groundwater]: 5.0462e-7 kg; lognormal SD95 1.8181
  (2,2,1,5,1,na)
- Dichlorprop-P [emissions to soil, agricultural]: 0.00010134 kg; lognormal SD95 1.2077
  (2,1,1,1,1,na)
- Thiamethoxam [emissions to soil, agricultural]: 1.9149e-7 kg; lognormal SD95 1.2077
  (2,1,1,1,1,na)
- Benzene, pentachloronitro- [emissions to soil, agricultural]: 4.0822e-6 kg; lognormal SD95 1.2077
  (2,1,1,1,1,na)
- Phosphate [emissions to water, groundwater]: 1.7073e-6 kg; lognormal SD95 1.5217
  (2,2,1,5,1,na)
- Permethrin [emissions to soil, agricultural]: 1.3056e-7 kg; lognormal SD95 1.2077
  (2,1,1,1,1,na)

## Sampling procedure
Data come from the NREL database and from varoius U.S database. Data were compiled from statistics, literature, farm survey reports, documents from extension services, and expert knowledge.

## Sources
- Nemecek T., Kaegi T., 2007, 2007 - LCI agricultural prod. systems - Nemecek, Ecoinvent report version 2.0, 15, Swiss Centre for LCI, ART, Duebendorf and Zuerich, CH
Nemecek, T., Kägi, T., Blaser, S. (2007) Life Cycle Inventories of Agricultural Production Systems. Ecoinvent report version 2.0. Editors: 0. Volume: 15. Swiss Centre for LCI, ART. Duebendorf and Zurich, CH.
Type: Measurement on site
Source: CD-ROM
First author: Nemecek, T.
Other authors: Kägi, T., Blaser, S.
Year: 2007
Name of editors: 0
Title of anthology: Ecoinvent report version 2.0
Place of publication: Duebendorf and Zurich, CH
Publisher: Swiss Centre for LCI, ART
Volume No: 15

## Validation
Proof reading validation: automatic validation in Excel; Other validation: none;
