# Waste paper, mixed, from public collection, for further treatment

Dataset: EcoSpold 1, unit process
Functional unit: 1 kg
Category: paper+ board / waste paper
Geography: CH
Time period: 2000-01 to 2000-12
Production volume: Swiss paper / board collection: 1'094 kt (STAR report)
Generated by: Roland Hischier
accessRestrictedTo: 0
copyright: true

## Included processes
This module includes the transportation efforts for the collection as well as the fruther transportation to the next paper production site / paper sorting plant. No further efforts are included into this module. The collected waste paper has a biogenic C content of 40.4% (average C-content of waste paper according to Doka 2004); Geography: Estimation from the author of the study, valuable for Switzerland.

## Technology
Special lorry for collection - then average lorry for further transports

## Reference product
- Waste paper, mixed, from public collection, for further treatment [CH]: 1 kg
  SWITZERLAND

## Inputs from technosphere
- Transport, municipal waste collection, lorry 21t [CH]: 0.0251 tkm; lognormal SD95 2.52
  (5,4,1,3,4,5); own estimation
- Transport, freight, lorry, 32t-40t gross weight, fleet average [CH]: 0.0987 tkm; lognormal SD95 2.52
  (5,4,1,3,4,5); own estimation

## Sampling procedure
Estimation

## Extrapolations
see geography and technology

## Sources
- Althaus H.-J., Chudacoff M., Hellweg S., Hischier R., Jungbluth N., Osses M., Primas A., 2007, 2007 - LCI chemicals - Althaus, Final report ecoinvent data v2.0, 8, Swiss Centre for LCI, Empa - TSL, ETH, ESU-services Ltd., Chudacoff Oekoscience, Duebendorf, CH
Althaus H.-J., Chudacoff M., Hischier R., Jungbluth N., Osses M., Primas A. (2007) Life Cycle Inventories of Chemicals. Final report ecoinvent data v2.0. Volume: 8. Swiss Centre for LCI, Empa - TSL. Dübendorf, CH.
Type: Measurement on site
Source: CD-ROM
First author: Althaus H.-J.
Other authors: Chudacoff M., Hischier R., Jungbluth N., Osses M., Primas A.
Year: 2007
Title of anthology: Final report ecoinvent data v2.0
Place of publication: Dübendorf, CH
Publisher: Swiss Centre for LCI, Empa - TSL
Volume No: 8

## Validation
Proof reading validation: passed.; Other validation: none;
