# Sheet rolling, steel

Dataset: EcoSpold 1, unit process
Functional unit: 1 kg
Category: metals / chipless shaping
Geography: RER
Time period: 2000-01 to 2000-12
Production volume: Little less than 50 million tonnes in 1996
Share of production covered: 0 %
Generated by: Silvio Blaser
accessRestrictedTo: 0
copyright: true

## General comment
This process is to be used only for un- and low-alloyed steel. For many applications, the products of hot rolling are unsatisfactory, e.g., with respect to cross section, surface quality, dimensional accuracy, and general finish, so that cold rolling is necessary. Cold rolled products are mainly strips and sheets with high quality surface finish and precise metallurgical properties for use in high specification products. ;
Synonyms: cold rolling;

## Included processes
Includes the process steps continuous pickling line, cold rolling, annealing, tempering, inspecting and finishing, packing coils or sheets, roll maintenance. Does not include the material being rolled

## Technology
Average technique for EU, for un- and low-alloyed steel. A 50-50 mix is inventoried where different technologies are apllied for the same process step (e.g. pickling)

## Reference product
- Sheet rolling, steel [RER]: 1 kg
  Europe

## Inputs from technosphere
- Disposal, used mineral oil, 10% water, to hazardous waste incineration [CH]: 0.000888 kg; lognormal SD95 1.22
  (1,5,1,1,1,3);
- Sulphuric acid, liquid, at plant [RER]: 0.00418 kg; lognormal SD95 1.2
  calculated from max value assuming lognormal distribution
- Chemicals inorganic, at plant [GLO]: 1.58e-8 kg; lognormal SD95 2
  calculated from max value assuming lognormal distribution
- Sawnwood, production mix, softwood, raw, dried (u=20%), at sawmill [RER]: 1.85e-6 m3; lognormal SD95 1.05
  calculated from max value assuming lognormal distribution
- Rolling mill [RER]: 1.62e-9 p; lognormal SD95 3.04
  (3,4,1,1,1,4);
- Steel, electric, un- and low-alloyed, at plant [RER]: 0.000236 kg; lognormal SD95 1.1
  calculated from max value assuming lognormal distribution
- Natural gas, burned in industrial furnace 1MWth [CH]: 0.912 MJ; lognormal SD95 1.38
  calculated from max value assuming lognormal distribution
- Hydrochloric acid, 30% in H2O, at plant [RER]: 0.000397 kg; lognormal SD95 1.13
  calculated from max value assuming lognormal distribution
- Disposal, basic oxygen furnace wastes, 0% water, to residual material landfill [CH]: 0.000193 kg; lognormal SD95 1.29
  calculated from max value assuming lognormal distribution
- Sodium dichromate, at plant [RER]: 0.00015 kg; lognormal SD95 1.07
  calculated from max value assuming lognormal distribution
- Transport, freight, lorry, fleet average [RER]: 0.0298 tkm; lognormal SD95 2.09
  (4,5,n.a.,n.a.,n.a.,n.a.);
- Electricity, medium voltage, production ENTSO-E, at grid: 0.223 kWh; lognormal SD95 1.5
  calculated from max value assuming lognormal distribution
- Disposal, municipal solid waste, 22.9% water, to municipal incineration [CH]: 0.000358 kg; lognormal SD95 1.22
  (2,5,1,1,1,3);
- Lime, hydrated, loose, at plant [CH]: 5.42e-5 kg; lognormal SD95 1.2
  calculated from max value assuming lognormal distribution
- Water, deionised, at plant [CH]: 0.135 kg; lognormal SD95 2.55
  calculated from max value assuming lognormal distribution
- Steel, converter, unalloyed, at plant [RER]: 0.0855 kg; lognormal SD95 1.31
  (4,5,1,1,1,3);
- Disposal, sludge from steel rolling, 20% water, to residual material landfill [CH]: 0.0201 kg; lognormal SD95 1.57
  (2,5,1,1,1,3);
- Kraft paper, unbleached, at plant [RER]: 2.68e-5 kg; lognormal SD95 2.98
  calculated from max value assuming lognormal distribution
- Packaging film, LDPE, at plant [RER]: 8.49e-5 kg; lognormal SD95 1.06
  calculated from max value assuming lognormal distribution
- Kraft paper, bleached, at plant [RER]: 1.6e-6 kg; lognormal SD95 1.06
  calculated from max value assuming lognormal distribution
- Silicon carbide, at plant [RER]: 4.47e-5 kg; lognormal SD95 1.12
  calculated from max value assuming lognormal distribution
- Disposal, steel in car shredder residue, 0% water, to municipal incineration [CH]: 0.0079 kg; lognormal SD95 2
  calculated from max value assuming lognormal distribution
- Heat, unspecific, in chemical plant [RER]: 0.171 MJ; lognormal SD95 1.53
  calculated from max value assuming lognormal distribution
- Lubricating oil, at plant [RER]: 0.00459 kg; lognormal SD95 5.22
  calculated from max value assuming lognormal distribution

## Inputs from nature
- Water, cooling, unspecified natural origin/m3 [resources, in water]: 0.027 m3; lognormal SD95 1.22
  (1,5,1,1,1,3);

## Emissions to nature
- Lead [emissions to water, unspecified]: 3e-7 kg; lognormal SD95 1.86
  (2,5,1,1,1,3);
- Mercury [emissions to water, unspecified]: 3e-8 kg; lognormal SD95 1.86
  (2,5,1,1,1,3);
- Iron [emissions to water, unspecified]: 4.65e-6 kg; lognormal SD95 1.86
  (2,5,1,1,1,3);
- DOC, Dissolved Organic Carbon [emissions to water, unspecified]: 1.33e-5 kg; lognormal SD95 2.79
  (5,5,5,5,5,5);
- Oils, unspecified [emissions to soil, unspecified]: 3.85e-5 kg; lognormal SD95 1.12
  calculated from max value assuming lognormal distribution
- Hydrogen [emissions to air, unspecified]: 7.27e-10 kg; lognormal SD95 1.41
  calculated from max value assuming lognormal distribution
- Nickel [emissions to water, unspecified]: 8.49e-7 kg; lognormal SD95 1.86
  (2,5,1,1,1,3);
- Hydrocarbons, unspecified [emissions to water, unspecified]: 1.89e-6 kg; lognormal SD95 3.05
  (2,5,1,1,1,3);
- Nitrogen oxides [emissions to air, unspecified]: 0.000101 kg; lognormal SD95 10
  calculated from max value assuming lognormal distribution
- Iron [emissions to soil, unspecified]: 4.52e-5 kg; lognormal SD95 5.28
  calculated from max value assuming lognormal distribution
- Chromium VI [emissions to water, unspecified]: 3e-8 kg; lognormal SD95 1.86
  (2,5,1,1,1,3);
- NMVOC, non-methane volatile organic compounds, unspecified origin [emissions to air, unspecified]: 2.34e-5 kg; lognormal SD95 2.05
  (1,5,1,1,1,3);
- Particulates, > 10 um [emissions to air, unspecified]: 4.64e-5 kg; lognormal SD95 1.56
  (1,5,1,1,1,3);
- Heat, waste [emissions to air, unspecified]: 0.804 MJ; lognormal SD95 1.56
  (0,5,n.a.,n.a.,n.a.,n.a.);
- Sulfate [emissions to air, unspecified]: 3.46e-8 kg; lognormal SD95 1.41
  calculated from max value assuming lognormal distribution
- Particulates, > 2.5 um, and < 10um [emissions to air, unspecified]: 4.69e-5 kg; lognormal SD95 2.05
  (1,5,1,1,1,3);
- Sulfur dioxide [emissions to air, unspecified]: 2.18e-5 kg; lognormal SD95 2
  calculated from max value assuming lognormal distribution
- COD, Chemical Oxygen Demand [emissions to water, unspecified]: 4.13e-5 kg; lognormal SD95 1.57
  (2,5,1,1,1,3);
- Hydrogen chloride [emissions to air, unspecified]: 1.29e-7 kg; lognormal SD95 2.05
  (1,5,1,1,1,3);
- Manganese [emissions to water, unspecified]: 6.12e-7 kg; lognormal SD95 1.86
  (2,5,1,1,1,3);
- Zinc [emissions to water, unspecified]: 2.24e-7 kg; lognormal SD95 1.86
  (2,5,1,1,1,3);
- Suspended solids, unspecified [emissions to water, unspecified]: 0.000159 kg; lognormal SD95 1.57
  (2,5,1,1,1,3);
- Chloride [emissions to water, unspecified]: 1.34e-6 kg; lognormal SD95 1.57
  (2,5,1,1,1,3);
- Aluminium [emissions to water, unspecified]: 1.42e-6 kg; lognormal SD95 1.86
  (2,5,1,1,1,3);
- Chromium [emissions to air, unspecified]: 4.18e-9 kg; lognormal SD95 5.06
  (1,5,1,1,1,3);
- Copper [emissions to water, unspecified]: 2.9e-7 kg; lognormal SD95 1.86
  (2,5,1,1,1,3);
- Cadmium [emissions to water, unspecified]: 1.5e-7 kg; lognormal SD95 1.86
  (2,5,1,1,1,3);
- Chromium [emissions to water, unspecified]: 5.4e-7 kg; lognormal SD95 1.86
  (2,5,1,1,1,3);
- TOC, Total Organic Carbon [emissions to water, unspecified]: 1.33e-5 kg; lognormal SD95 2.79
  (5,5,5,5,5,5);
- BOD5, Biological Oxygen Demand [emissions to water, unspecified]: 4.13e-5 kg; lognormal SD95 2.79
  (5,5,5,5,5,5);
- Water [emissions to water, unspecified]: 25.65 kg; lognormal SD95 2.5196
  (5,5,5,5,5,BU:1.05); All uncertainty-values set to 5.0 by default. Balance of input water

## Sampling procedure
Literature

## Uncertainty adjustments
The fact that no data were available about the percentage of companies represented by the study citated is considered in the uncertainties.

## Sources
- Werner F., Althaus H.-J., Kuenniger T., Richter K., Jungbluth N., 2007, 2007 - LCI wood as fuel and const. mat. - Werner, Final report ecoinvent data v2.0, 9, Swiss Centre for LCI, Empa - TSL, ESU-services Ltd., Duebendorf, CH
Werner F., Althaus H.-J., Künniger T., Richter K., Jungbluth N. (2007) 1Life Cycle Inventories of Wood as Fuel and Construction Material. Final report ecoinvent data v2.0. Volume: 9. Issue: 0. Swiss Centre for LCI, Empa - TSL. Dübendorf, CH.
Type: Measurement on site
Source: CD-ROM
First author: Werner F.
Other authors: Althaus H.-J., Künniger T., Richter K., Jungbluth N.
Year: 2007
Title of anthology: Final report ecoinvent data v2.0
Place of publication: Dübendorf, CH
Publisher: Swiss Centre for LCI, Empa - TSL
Volume No: 9
Issue No: 0

## Validation
Proof reading validation: Passed.; Other validation: none;
