# Disposal, municipal solid waste, 22.9% water, to sanitary landfill

Dataset: EcoSpold 1, unit process
Functional unit: 1 kg
Category: landfill / sanitary landfill
Geography: CH
Time period: 2000-01 to 2000-12
Generated by: Gabor Doka
accessRestrictedTo: 0
copyright: true

## General comment
Inventoried waste contains 21% paper; 8% Mixed cardbord; 15% plastics; 3% laminated materials; 2% laminated packaging, e.g. tetra bricks; 3% combined goods e.g. dipers; 3% glass; 2% textiles; 8% minerals; 9% natural products; 22% compostable material; 2.65% inert metals; 1% volatile metals; 0.0065% batteries; 0.34% electronic goods; . waste composition (wet, in ppm): upper heating value 13.27 MJ/kg; lower heating value 11.74 MJ/kg; H2O 228830; O 257060; H 48250; C 334230; S 1119; N 3123.8; P 893.79; B 7.1933; Cl 6866.2; Br 13.552; F 56.358; I 0.0121; Ag 0.714; As 0.62521; Ba 149.04; Cd 11.748; Co 1.3453; Cr 315.21; Cu 1212.8; Hg 1.4424; Mn 259.36; Mo 1.9551; Ni 107.38; Pb 502.43; Sb 22.564; Se 0.31969; Sn 73.44; V 9.2147; Zn 1311.2; Be n.a.; Sc n.a.; Sr n.a.; Ti n.a.; Tl n.a.; W n.a.; Si 48510; Fe 29996; Ca 14062; Al 12420; K 2059.7; Mg 3377.7; Na 5143.9; Share of carbon in waste that is biogenic 60.4%. Overall degradability of waste during 100 years: 18.73%.;;

## Included processes
Waste-specific short-term emissions to air via landfill gas incineration and landfill leachate. Burdens from treatment of short-term leachate (0-100a) in wastewater treatment plant (including WWTP sludge disposal in municipal incinerator). Long-term emissions from landfill to groundwater (after base lining failure).

## Geography
Technology encountered in Switzerland in 2000. Landfill includes base seal, leachate collection system, treatment of leachate in municipal wastewater treatment plant.

## Technology
Swiss municipal sanitary landfill for biogenic or untreated municipal waste ("reactive organic landfill"). Landfill gas and leachate collection system. Recultivation and monitoring for 150 years after closure.

## Reference product
- Disposal, municipal solid waste, 22.9% water, to sanitary landfill [CH]: 1 kg
  SWITZERLAND

## Inputs from technosphere
- Disposal, paper, 11.2% water, to municipal incineration [CH]: 3.88e-5 kg; lognormal SD95 1.13
  burden from wastewater treatment of the short-term leachate (0-100a). Uncertainty calculated from unertainty of the waste composition of this waste, uncertainty in waste decomposition and short-term leaching in sanitary landfill
- Chemicals inorganic, at plant [GLO]: 6.71e-9 kg; lognormal SD95 5.42
  burden from incineration of sludge from wastewater treatment of the short-term leachate (0-100a). uncertainty is calculated from uncertainties in waste composition and transfer coefficients in incinerator and uncertainty of waste decomposition and short-term leaching in sanitary landfill
- Iron (III) chloride, 40% in H2O, at plant [CH]: 8.81e-5 kg; lognormal SD95 7.4
  (same comment as for Chemicals inorganic, at plant)
- Quicklime, milled, packed, at plant [CH]: 2.39e-8 kg; lognormal SD95 2.98
  (same comment as for Chemicals inorganic, at plant)
- Process-specific burdens, residual material landfill [CH]: 9.15e-5 kg; lognormal SD95 2.56
  (same comment as for Chemicals inorganic, at plant)
- Electricity from waste, at municipal waste incineration plant [CH]: 0.000333 kWh; lognormal SD95 3.13
  (same comment as for Chemicals inorganic, at plant)
- Hydrochloric acid, 30% in H2O, at plant [RER]: 4.03e-9 kg; lognormal SD95 5.42
  (same comment as for Chemicals inorganic, at plant)
- Aluminium sulphate, powder, at plant [RER]: 1.74e-5 kg; lognormal SD95 7.42
  (same comment as for Disposal, paper, 11.2% water, to municipal incineration)
- Sewer grid, class 3 [CH]: 5.45e-10 km; lognormal SD95 1.1
  (same comment as for Disposal, paper, 11.2% water, to municipal incineration)
- Residual material landfill facility [CH]: 1.91e-13 p; lognormal SD95 2.56
  (same comment as for Chemicals inorganic, at plant)
- Process-specific burdens, municipal waste incineration [CH]: 0.00232 kg; lognormal SD95 2.21
  burden from incineration of sludge from wastewater treatment of the short-term leachate (0-100a).
- Disposal, cement, hydrated, 0% water, to residual material landfill [CH]: 9.15e-5 kg; lognormal SD95 2.57
  (same comment as for Chemicals inorganic, at plant)
- Transport, freight, lorry, 16t-32t gross weight, fleet average [CH]: 9.34e-5 tkm; lognormal SD95 2.38
  (same comment as for Chemicals inorganic, at plant)
- Process-specific burdens, sanitary landfill [CH]: 1 kg; lognormal SD95 1
  demands per kilogram waste. uncertainty is heeded in the module
- Disposal, plastics, mixture, 15.3% water, to municipal incineration [CH]: 3.88e-5 kg; lognormal SD95 1.13
  (same comment as for Disposal, paper, 11.2% water, to municipal incineration)
- Chemicals organic, at plant [GLO]: 2.2e-7 kg; lognormal SD95 12.1
  (same comment as for Chemicals inorganic, at plant)
- Chromium oxide, flakes, at plant [RER]: 1.29e-9 kg; lognormal SD95 5.13
  burden from incineration of sludge from wastewater treatment of the short-term leachate (0-100a). Proxy for vanadium pentoxide V2O5 in SCR catalyst, uncertainty calculated from uncertainty in average DeNOx input, uncertainty in the share of thermal NOx, uncertainty of nitrogen content in average municipal waste and the unertainty in nitrogen content in *this* waste and uncertainty of waste decomposition and short-term leaching in sanitary landfill
- Light fuel oil, burned in boiler 100kW, non-modulating [CH]: 0.000577 MJ; lognormal SD95 2.41
  (same comment as for Disposal, paper, 11.2% water, to municipal incineration)
- Electricity, low voltage, at grid [CH]: 0.00864 kWh; lognormal SD95 2.76
  (same comment as for Disposal, paper, 11.2% water, to municipal incineration)
- Wastewater treatment plant, class 3 [CH]: 1.42e-11 p; lognormal SD95 1.1
  (same comment as for Disposal, paper, 11.2% water, to municipal incineration)
- Titanium dioxide, production mix, at plant [RER]: 6.35e-8 kg; lognormal SD95 5.13
  (same comment as for Chemicals inorganic, at plant)
- Heat from waste, at municipal waste incineration plant [CH]: 0.00194 MJ; lognormal SD95 2.21
  (same comment as for Chemicals inorganic, at plant)
- Sanitary landfill facility [CH]: 5.56e-10 p; lognormal SD95 1
  demands per kilogram waste. uncertainty is heeded in the module
- Ammonia, liquid, at regional storehouse [CH]: 2.22e-6 kg; lognormal SD95 3.72
  (same comment as for Chemicals inorganic, at plant)
- Iron sulphate, at plant [RER]: 6.43e-5 kg; lognormal SD95 7.42
  (same comment as for Disposal, paper, 11.2% water, to municipal incineration)
- Cement, unspecified, at plant [CH]: 3.66e-5 kg; lognormal SD95 2.57
  (same comment as for Chemicals inorganic, at plant)
- Transport, freight, rail [RER]: 0.000112 tkm; lognormal SD95 6.6
  (same comment as for Chemicals inorganic, at plant)
- Slag compartment [CH]: 1.34e-12 p; lognormal SD95 2.88
  (same comment as for Chemicals inorganic, at plant)
- Process-specific burdens, slag compartment [CH]: 0.000753 kg; lognormal SD95 2.88
  (same comment as for Chemicals inorganic, at plant)
- Natural gas, burned in industrial furnace 1MW [CH]: 0.000216 MJ; lognormal SD95 3.72
  (same comment as for Chemicals inorganic, at plant)
- Natural gas, burned in boiler modulating >100kW [RER]: 0.000779 MJ; lognormal SD95 2.41
  (same comment as for Disposal, paper, 11.2% water, to municipal incineration)
- Municipal waste incineration plant [CH]: 5.8e-13 p; lognormal SD95 2.21
  (same comment as for Process-specific burdens, municipal waste incineration)
- Sodium hydroxide, 50% in H2O, production mix, at plant [RER]: 1.32e-7 kg; lognormal SD95 2.97
  (same comment as for Chemicals inorganic, at plant)

## Emissions to nature
- Carbon dioxide, biogenic [emissions to air, low. pop.]: 0.135 kg; lognormal SD95 1.98
  burden from direct release or incineration of landfill biogas. Uncertainty calculated from unertainty of the waste composition of this waste, uncertainty in waste decomposition and short-term leaching in sanitary landfill
- Molybdenum [emissions to air, high. pop.]: 5.55e-11 kg; lognormal SD95 14.2
  Emissions from short-term leachate treatment and incineration of resulting sludge. Uncertainty calculated depending on waste input and uncertainty of transfer coefficents in landfill, wastewater treatment and incineration model.
- Cadmium [emissions to water, groundwater, long-term]: 1.16e-5 kg; lognormal SD95 9.32
  Emissions from long-term leachate (>100a) directly from MSW landfill and indirectly via incineration of treatement sludge from leachate treatement. Uncertainty calculated depending on waste input and uncertainty of long-term transfer coefficents in landfill.
- Selenium [emissions to air, high. pop.]: 1.5e-17 kg; lognormal SD95 18.7
  (same comment as for Molybdenum)
- DOC, Dissolved Organic Carbon [emissions to water, groundwater, long-term]: 0.0713 kg; lognormal SD95 4.44
  (same comment as for Cadmium)
- Vanadium [emissions to water, river]: 9.27e-8 kg; lognormal SD95 12.2
  (same comment as for Molybdenum)
- Cyanide [emissions to air, high. pop.]: 3.95e-8 kg; lognormal SD95 3.81
  (same comment as for Molybdenum)
- Molybdenum [emissions to water, river]: 3.33e-8 kg; lognormal SD95 13.9
  (same comment as for Molybdenum)
- Iodide [emissions to water, groundwater, long-term]: 3.76e-9 kg; lognormal SD95 16.2
  (same comment as for Cadmium)
- Manganese [emissions to water, groundwater, long-term]: 0.00025 kg; lognormal SD95 6.13
  (same comment as for Cadmium)
- Molybdenum [emissions to air, low. pop.]: 1.41e-11 kg; lognormal SD95 28.2
  (same comment as for Carbon dioxide, biogenic)
- Fluoride [emissions to water, groundwater, long-term]: 4.98e-5 kg; lognormal SD95 7.68
  (same comment as for Cadmium)
- Chromium VI [emissions to water, river]: 1.76e-7 kg; lognormal SD95 11.2
  (same comment as for Molybdenum)
- Magnesium [emissions to air, low. pop.]: 1.02e-7 kg; lognormal SD95 12.7
  (same comment as for Carbon dioxide, biogenic)
- Aluminium [emissions to water, groundwater, long-term]: 0.0124 kg; lognormal SD95 3.2
  (same comment as for Cadmium)
- Antimony [emissions to water, river]: 8.76e-8 kg; lognormal SD95 12.5
  (same comment as for Molybdenum)
- Arsenic [emissions to air, high. pop.]: 8.46e-12 kg; lognormal SD95 15.3
  (same comment as for Molybdenum)
- Nickel [emissions to water, groundwater, long-term]: 0.000107 kg; lognormal SD95 7.03
  (same comment as for Cadmium)
- Carbon monoxide, biogenic [emissions to air, low. pop.]: 7.63e-6 kg; lognormal SD95 5.74
  (same comment as for Carbon dioxide, biogenic)
- Carbon monoxide, biogenic [emissions to air, high. pop.]: 3.17e-6 kg; lognormal SD95 3.85
  (same comment as for Molybdenum)
- Selenium [emissions to air, low. pop.]: 1.52e-12 kg; lognormal SD95 33.3
  (same comment as for Carbon dioxide, biogenic)
- Calcium [emissions to air, low. pop.]: 7.84e-8 kg; lognormal SD95 13.2
  (same comment as for Carbon dioxide, biogenic)
- COD, Chemical Oxygen Demand [emissions to water, river]: 0.00103 kg; lognormal SD95 4.04
  (same comment as for Molybdenum)
- NMVOC, non-methane volatile organic compounds, unspecified origin [emissions to air, high. pop.]: 4.18e-8 kg; lognormal SD95 5.04
  (same comment as for Molybdenum)
- Zinc [emissions to air, high. pop.]: 2.59e-11 kg; lognormal SD95 9.52
  (same comment as for Molybdenum)
- Selenium [emissions to water, groundwater, long-term]: 9.04e-8 kg; lognormal SD95 18
  (same comment as for Cadmium)
- Chromium [emissions to air, high. pop.]: 1.23e-14 kg; lognormal SD95 12.2
  (same comment as for Molybdenum)
- Fluoride [emissions to water, river]: 1.07e-6 kg; lognormal SD95 10
  Emissions from short-term leachate treatment. Uncertainty calculated depending on waste input and uncertainty of transfer coefficents in landfill and wastewater treatment.
- Potassium [emissions to water, groundwater, long-term]: 0.00163 kg; lognormal SD95 4.51
  (same comment as for Cadmium)
- Copper [emissions to air, low. pop.]: 8.32e-11 kg; lognormal SD95 24.1
  (same comment as for Carbon dioxide, biogenic)
- Sulfur dioxide [emissions to air, low. pop.]: 2.74e-5 kg; lognormal SD95 7.27
  (same comment as for Carbon dioxide, biogenic)
- TOC, Total Organic Carbon [emissions to water, groundwater, long-term]: 0.0713 kg; lognormal SD95 4.44
  (same comment as for Cadmium)
- Potassium [emissions to water, river]: 0.000428 kg; lognormal SD95 4.87
  (same comment as for Fluoride)
- Methane, biogenic [emissions to air, low. pop.]: 0.0206 kg; lognormal SD95 2.21
  (same comment as for Carbon dioxide, biogenic)
- Bromine [emissions to air, low. pop.]: 2.37e-8 kg; lognormal SD95 14.7
  (same comment as for Carbon dioxide, biogenic)
- Sodium [emissions to water, groundwater, long-term]: 0.00409 kg; lognormal SD95 3.83
  (same comment as for Cadmium)
- Antimony [emissions to air, low. pop.]: 3.23e-11 kg; lognormal SD95 26.3
  (same comment as for Carbon dioxide, biogenic)
- Phosphorus [emissions to air, high. pop.]: 8.6e-9 kg; lognormal SD95 7.56
  (same comment as for Molybdenum)
- Chloride [emissions to water, groundwater, long-term]: 0.00561 kg; lognormal SD95 3.63
  (same comment as for Cadmium)
- Chromium [emissions to water, river]: 5.29e-10 kg; lognormal SD95 11.5
  (same comment as for Molybdenum)
- Bromine [emissions to water, groundwater, long-term]: 1.18e-5 kg; lognormal SD95 9.18
  (same comment as for Cadmium)
- Cadmium [emissions to water, river]: 7.08e-8 kg; lognormal SD95 12.5
  (same comment as for Molybdenum)
- Antimony [emissions to water, groundwater, long-term]: 2.29e-6 kg; lognormal SD95 23.1
  (same comment as for Cadmium)
- Carbon dioxide, biogenic [emissions to air, high. pop.]: 0.0045 kg; lognormal SD95 4.04
  (same comment as for Molybdenum)
- Nitrogen oxides [emissions to air, high. pop.]: 1.37e-5 kg; lognormal SD95 3.21
  (same comment as for Molybdenum)
- Copper [emissions to water, river]: 7.55e-8 kg; lognormal SD95 11.3
  (same comment as for Molybdenum)
- Mercury [emissions to water, river]: 9.48e-10 kg; lognormal SD95 17.9
  (same comment as for Molybdenum)
- Manganese [emissions to air, low. pop.]: 1.49e-9 kg; lognormal SD95 19
  (same comment as for Carbon dioxide, biogenic)
- Nitrate [emissions to water, river]: 0.00278 kg; lognormal SD95 3.08
  (same comment as for Molybdenum)
- Carbon dioxide, fossil [emissions to air, low. pop.]: 0.00615 kg; lognormal SD95 1.98
  (same comment as for Carbon dioxide, biogenic)
- BOD5, Biological Oxygen Demand [emissions to water, groundwater, long-term]: 0.0185 kg; lognormal SD95 4.44
  (same comment as for Cadmium)
- Magnesium [emissions to air, high. pop.]: 5.52e-8 kg; lognormal SD95 4.95
  (same comment as for Molybdenum)
- BOD5, Biological Oxygen Demand [emissions to water, river]: 0.000325 kg; lognormal SD95 4.05
  (same comment as for Molybdenum)
- Cobalt [emissions to water, groundwater, long-term]: 1.28e-6 kg; lognormal SD95 11.3
  (same comment as for Cadmium)
- Lead [emissions to air, high. pop.]: 5.58e-12 kg; lognormal SD95 12.6
  (same comment as for Molybdenum)
- Manganese [emissions to air, high. pop.]: 1.59e-14 kg; lognormal SD95 9.32
  (same comment as for Molybdenum)
- Hydrogen sulfide [emissions to water, groundwater, long-term]: 7.48e-5 kg; lognormal SD95 4.98
  (same comment as for Cadmium)
- Cobalt [emissions to air, high. pop.]: 1.82e-15 kg; lognormal SD95 14.5
  (same comment as for Molybdenum)
- Vanadium [emissions to air, high. pop.]: 8.99e-12 kg; lognormal SD95 12.7
  (same comment as for Molybdenum)
- Barium [emissions to air, low. pop.]: 2.74e-9 kg; lognormal SD95 18
  (same comment as for Carbon dioxide, biogenic)
- Barium [emissions to water, groundwater, long-term]: 0.000147 kg; lognormal SD95 6.18
  (same comment as for Cadmium)
- Silicon [emissions to air, low. pop.]: 5.19e-8 kg; lognormal SD95 14
  (same comment as for Carbon dioxide, biogenic)
- Sulfate [emissions to water, river]: 0.000294 kg; lognormal SD95 4.78
  (same comment as for Fluoride)
- Carbon monoxide, fossil [emissions to air, low. pop.]: 3.49e-7 kg; lognormal SD95 5.74
  (same comment as for Carbon dioxide, biogenic)
- Nickel [emissions to air, low. pop.]: 9.6e-11 kg; lognormal SD95 24
  (same comment as for Carbon dioxide, biogenic)
- Calcium [emissions to air, high. pop.]: 5.13e-8 kg; lognormal SD95 4.91
  (same comment as for Molybdenum)
- Iron [emissions to air, high. pop.]: 2.31e-9 kg; lognormal SD95 5.96
  (same comment as for Molybdenum)
- Dinitrogen monoxide [emissions to air, high. pop.]: 3.88e-6 kg; lognormal SD95 3.01
  (same comment as for Molybdenum)
- Ammonia [emissions to air, high. pop.]: 1.41e-6 kg; lognormal SD95 3.29
  (same comment as for Molybdenum)
- Sulfate [emissions to water, groundwater, long-term]: 0.00287 kg; lognormal SD95 4.98
  (same comment as for Cadmium)
- Arsenic [emissions to water, groundwater, long-term]: 5.98e-7 kg; lognormal SD95 12.7
  (same comment as for Cadmium)
- Ammonium, ion [emissions to water, groundwater, long-term]: 0.000631 kg; lognormal SD95 4.25
  (same comment as for Cadmium)
- Calcium [emissions to water, river]: 0.000283 kg; lognormal SD95 4.7
  (same comment as for Molybdenum)
- Lead [emissions to water, groundwater, long-term]: 0.000502 kg; lognormal SD95 5.64
  (same comment as for Cadmium)
- Chloride [emissions to water, river]: 0.0013 kg; lognormal SD95 3.8
  (same comment as for Fluoride)
- Iron [emissions to air, low. pop.]: 7.77e-9 kg; lognormal SD95 16.6
  (same comment as for Carbon dioxide, biogenic)
- Zinc [emissions to water, river]: 7.09e-7 kg; lognormal SD95 8.98
  (same comment as for Molybdenum)
- Iodide [emissions to water, river]: 8.23e-9 kg; lognormal SD95 16.1
  (same comment as for Fluoride)
- DOC, Dissolved Organic Carbon [emissions to water, river]: 0.000251 kg; lognormal SD95 4.05
  (same comment as for Molybdenum)
- Nitrite [emissions to water, groundwater, long-term]: 3.44e-5 kg; lognormal SD95 4.25
  (same comment as for Cadmium)
- Silicon [emissions to water, river]: 1.25e-5 kg; lognormal SD95 5.22
  (same comment as for Molybdenum)
- Zinc [emissions to air, low. pop.]: 5.09e-10 kg; lognormal SD95 20.8
  (same comment as for Carbon dioxide, biogenic)
- Tin [emissions to water, groundwater, long-term]: 7.34e-5 kg; lognormal SD95 7.41
  (same comment as for Cadmium)
- Aluminium [emissions to water, river]: 5.76e-6 kg; lognormal SD95 5.62
  (same comment as for Molybdenum)
- Methane, biogenic [emissions to air, high. pop.]: 8.81e-6 kg; lognormal SD95 4.33
  (same comment as for Molybdenum)
- Vanadium [emissions to water, groundwater, long-term]: 2.65e-6 kg; lognormal SD95 13.1
  (same comment as for Cadmium)
- Molybdenum [emissions to water, groundwater, long-term]: 7.73e-7 kg; lognormal SD95 13.1
  (same comment as for Cadmium)
- Carbon dioxide, fossil [emissions to air, high. pop.]: 0.000205 kg; lognormal SD95 4.04
  (same comment as for Molybdenum)
- Nickel [emissions to water, river]: 2.33e-7 kg; lognormal SD95 11.1
  (same comment as for Molybdenum)
- Heat, waste [emissions to air, high. pop.]: 0.0417 MJ; lognormal SD95 2.52
  (same comment as for Chemicals inorganic, at plant)
- Methane, fossil [emissions to air, low. pop.]: 0.000944 kg; lognormal SD95 2.21
  (same comment as for Carbon dioxide, biogenic)
- Nitrate [emissions to water, groundwater, long-term]: 6.8e-5 kg; lognormal SD95 4.14
  (same comment as for Cadmium)
- Phosphate [emissions to water, river]: 1.46e-5 kg; lognormal SD95 7.31
  (same comment as for Molybdenum)
- Sodium [emissions to air, low. pop.]: 2.63e-7 kg; lognormal SD95 11.5
  (same comment as for Carbon dioxide, biogenic)
- Vanadium [emissions to air, low. pop.]: 4.57e-11 kg; lognormal SD95 25.6
  (same comment as for Carbon dioxide, biogenic)
- Mercury [emissions to water, groundwater, long-term]: 1.44e-6 kg; lognormal SD95 11.8
  (same comment as for Cadmium)
- Antimony [emissions to air, high. pop.]: 6.36e-12 kg; lognormal SD95 19.9
  (same comment as for Molybdenum)
- Heat, waste [emissions to soil, industrial]: 0.939 MJ; lognormal SD95 2.69
  burden from short-term decomposition of waste (0-100a). Uncertainty calculated from unertainty of the waste composition of this waste, uncertainty in waste decomposition and short-term leaching in sanitary landfill
- Calcium [emissions to water, groundwater, long-term]: 0.0138 kg; lognormal SD95 3.13
  (same comment as for Cadmium)
- Phosphate [emissions to water, groundwater, long-term]: 1.93e-5 kg; lognormal SD95 191
  (same comment as for Cadmium)
- Hydrogen chloride [emissions to air, low. pop.]: 1.79e-5 kg; lognormal SD95 7
  (same comment as for Carbon dioxide, biogenic)
- Nitrogen oxides [emissions to air, low. pop.]: 4.07e-7 kg; lognormal SD95 5.89
  (same comment as for Carbon dioxide, biogenic)
- Manganese [emissions to water, river]: 3.02e-6 kg; lognormal SD95 8.18
  (same comment as for Molybdenum)
- Nitrogen [emissions to water, river]: 2.07e-5 kg; lognormal SD95 3.14
  (same comment as for Molybdenum)
- Iron [emissions to water, groundwater, long-term]: 0.00213 kg; lognormal SD95 16.7
  (same comment as for Cadmium)
- Methane, fossil [emissions to air, high. pop.]: 4.03e-7 kg; lognormal SD95 4.33
  (same comment as for Molybdenum)
- Nitrogen, organic bound [emissions to water, groundwater, long-term]: 0.00103 kg; lognormal SD95 4.25
  (same comment as for Cadmium)
- Arsenic [emissions to air, low. pop.]: 4.21e-10 kg; lognormal SD95 21.2
  (same comment as for Carbon dioxide, biogenic)
- Boron [emissions to air, high. pop.]: 4.25e-7 kg; lognormal SD95 10.1
  (same comment as for Molybdenum)
- Bromine [emissions to water, river]: 1.69e-6 kg; lognormal SD95 10
  (same comment as for Fluoride)
- Ammonium, ion [emissions to water, river]: 0.000763 kg; lognormal SD95 3.32
  (same comment as for Molybdenum)
- NMVOC, non-methane volatile organic compounds, unspecified origin [emissions to air, low. pop.]: 1.51e-7 kg; lognormal SD95 2.21
  (same comment as for Carbon dioxide, biogenic)
- Aluminium [emissions to air, high. pop.]: 1.45e-7 kg; lognormal SD95 5.59
  (same comment as for Molybdenum)
- Heat, waste [emissions to water, river]: 0.0299 MJ; lognormal SD95 4.03
  (same comment as for Chemicals inorganic, at plant)
- TOC, Total Organic Carbon [emissions to water, river]: 0.000261 kg; lognormal SD95 4.04
  (same comment as for Molybdenum)
- Heat, waste [emissions to air, low. pop.]: 0.766 MJ; lognormal SD95 2.35
  (same comment as for Carbon dioxide, biogenic)
- Silicon [emissions to air, high. pop.]: 4.54e-7 kg; lognormal SD95 5.3
  (same comment as for Molybdenum)
- Barium [emissions to water, river]: 6.6e-7 kg; lognormal SD95 8.01
  (same comment as for Molybdenum)
- Mercury [emissions to air, low. pop.]: 1.2e-9 kg; lognormal SD95 19.4
  (same comment as for Carbon dioxide, biogenic)
- Copper [emissions to water, groundwater, long-term]: 0.00121 kg; lognormal SD95 4.91
  (same comment as for Cadmium)
- Cobalt [emissions to air, low. pop.]: 2.9e-11 kg; lognormal SD95 26.6
  (same comment as for Carbon dioxide, biogenic)
- Sodium [emissions to water, river]: 0.00105 kg; lognormal SD95 4.18
  (same comment as for Fluoride)
- Carbon monoxide, fossil [emissions to air, high. pop.]: 1.45e-7 kg; lognormal SD95 3.85
  (same comment as for Molybdenum)
- Zinc [emissions to water, groundwater, long-term]: 0.00108 kg; lognormal SD95 4.9
  (same comment as for Cadmium)
- Mercury [emissions to air, high. pop.]: 5.07e-15 kg; lognormal SD95 18.6
  (same comment as for Molybdenum)
- Tin [emissions to air, high. pop.]: 1.05e-11 kg; lognormal SD95 15.9
  (same comment as for Molybdenum)
- Silicon [emissions to water, groundwater, long-term]: 0.000941 kg; lognormal SD95 55.9
  (same comment as for Cadmium)
- Hydrogen fluoride [emissions to air, low. pop.]: 5.82e-6 kg; lognormal SD95 8.62
  (same comment as for Carbon dioxide, biogenic)
- Aluminium [emissions to air, low. pop.]: 2.4e-8 kg; lognormal SD95 14.8
  (same comment as for Carbon dioxide, biogenic)
- Tin [emissions to air, low. pop.]: 3.41e-12 kg; lognormal SD95 31.1
  (same comment as for Carbon dioxide, biogenic)
- Chromium [emissions to air, low. pop.]: 8.43e-11 kg; lognormal SD95 24.2
  (same comment as for Carbon dioxide, biogenic)
- Boron [emissions to water, river]: 4.2e-6 kg; lognormal SD95 9.89
  (same comment as for Molybdenum)
- Potassium [emissions to air, low. pop.]: 1.07e-7 kg; lognormal SD95 12.6
  (same comment as for Carbon dioxide, biogenic)
- Iron [emissions to water, river]: 1.58e-5 kg; lognormal SD95 6.6
  (same comment as for Molybdenum)
- Silver [emissions to water, groundwater, long-term]: 7.14e-7 kg; lognormal SD95 12.7
  (same comment as for Cadmium)
- Cadmium [emissions to air, high. pop.]: 3.81e-12 kg; lognormal SD95 13
  (same comment as for Molybdenum)
- Particulates, < 2.5 um [emissions to air, low. pop.]: 2.68e-6 kg; lognormal SD95 3.64
  (same comment as for Carbon dioxide, biogenic)
- Lead [emissions to air, low. pop.]: 5.62e-11 kg; lognormal SD95 24.9
  (same comment as for Carbon dioxide, biogenic)
- Magnesium [emissions to water, river]: 0.000369 kg; lognormal SD95 4.74
  (same comment as for Molybdenum)
- Selenium [emissions to water, river]: 4.07e-9 kg; lognormal SD95 17
  (same comment as for Molybdenum)
- Cobalt [emissions to water, river]: 5.9e-8 kg; lognormal SD95 13.2
  (same comment as for Molybdenum)
- Heat, waste [emissions to water, groundwater, long-term]: 11.1 MJ; lognormal SD95 1.69
  burden from long-term decomposition of waste (>100a). Uncertainty calculated from unertainty of the waste composition of this waste, uncertainty in waste decomposition and short-term leaching in sanitary landfill
- Nickel [emissions to air, high. pop.]: 6.52e-15 kg; lognormal SD95 12.2
  (same comment as for Molybdenum)
- Nitrite [emissions to water, river]: 1.6e-5 kg; lognormal SD95 4.27
  (same comment as for Molybdenum)
- Tin [emissions to water, river]: 5.71e-9 kg; lognormal SD95 15.5
  (same comment as for Molybdenum)
- Arsenic [emissions to water, river]: 2.65e-8 kg; lognormal SD95 14.9
  (same comment as for Molybdenum)
- Iodine [emissions to air, low. pop.]: 1.15e-10 kg; lognormal SD95 20.7
  (same comment as for Carbon dioxide, biogenic)
- Barium [emissions to air, high. pop.]: 1.03e-8 kg; lognormal SD95 8.13
  (same comment as for Molybdenum)
- Chromium VI [emissions to water, groundwater, long-term]: 1.44e-6 kg; lognormal SD95 296
  (same comment as for Cadmium)
- Cadmium [emissions to air, low. pop.]: 9.3e-10 kg; lognormal SD95 19.9
  (same comment as for Carbon dioxide, biogenic)
- Boron [emissions to water, groundwater, long-term]: 2.34e-6 kg; lognormal SD95 10.1
  (same comment as for Cadmium)
- COD, Chemical Oxygen Demand [emissions to water, groundwater, long-term]: 0.0779 kg; lognormal SD95 4.44
  (same comment as for Cadmium)
- Lead [emissions to water, river]: 1.85e-8 kg; lognormal SD95 12
  (same comment as for Molybdenum)
- Copper [emissions to air, high. pop.]: 1.59e-12 kg; lognormal SD95 12
  (same comment as for Molybdenum)
- Magnesium [emissions to water, groundwater, long-term]: 0.00301 kg; lognormal SD95 4.07
  (same comment as for Cadmium)

## Sampling procedure
Landfill model based on observed leachate concentrations in literature. Extrapolated to 60'000 years heeding chemical characteristics. Initial waste composition from various literature sources.

## Uncertainty adjustments
uncertainty of waste input composition data derived from generic formula GSD(c) = N*ln(c)+1. Minimal long-term emissions are the emissions until the carbonate buffer in the landfill is used up. Mean long-term emissions are the emissions until the next glacial period occurs (in 60'000a) and the landfill is eroded. Maximal long-term emissions are the complete emissions of all landfilled material (except Cr).

## Sources
- Doka G., 2009, 2009 - LCI waste treatment services - Doka, Final report ecoinvent data v2.0, 13, Swiss Centre for LCI, Doka LCA, Duebendorf and St. Gallen, CH
Doka G. (2007) Life Cycle Inventories of Waste Treatment Services. Final report ecoinvent data v2.0. Volume: 13. Swiss Centre for LCI, Empa - TSL. Dübendorf, CH.
Type: Separate publication
Source: CD-ROM
First author: Doka G.
Year: 2007
Title of anthology: Final report ecoinvent data v2.0
Place of publication: Dübendorf, CH
Publisher: Swiss Centre for LCI, Empa - TSL
Volume No: 13

## Validation
Proof reading validation: Passed. Calculation for standard deviation 95 of, i.e., infrastructure, ; Other validation: none;
