# Portafer, at plant

Dataset: EcoSpold 1, unit process
Functional unit: 1 kg
Category: chemicals / civil engineering_transport
Geography: RER
Time period: 2000-01 to 2000-12
Generated by: Roland Hischier
accessRestrictedTo: 0
copyright: true

## General comment
The functional unit represent 1 kg of milled ferric oxide. Large uncertainty of the process data due to weak data on the production process.;
CAS number: 001309-37-1;

## Included processes
Raw materials, machineries and energy consumption for production, estimated emissions to air from production and infrastructure of the site (approximation). No water emissions. Overburden and tailing material from process together with losses of product not taken into account.

## Technology
Data approximated with data from iron mining, lime crushing and lime milling.

## Reference product
- Portafer, at plant [RER]: 1 kg
  Europe

## Inputs from technosphere
- Recultivation, iron mine [GLO]: 2.13e-6 m2; lognormal SD95 2.2
  (4,3,1,3,3,5); approximation with data from iron mining & lime treatment
- Light fuel oil, burned in boiler 100kW, non-modulating [CH]: 0.003 MJ; lognormal SD95 1.4
  (4,3,1,3,3,5); approximation with data from iron mining & lime treatment
- Diesel, burned in building machine, average [CH]: 0.0255 MJ; lognormal SD95 1.4
  (4,3,1,3,3,5); approximation with data from iron mining & lime treatment
- Blasting [RER]: 0.000271 kg; lognormal SD95 1.4
  (4,3,1,3,3,5); approximation with data from iron mining & lime treatment
- Industrial machine, heavy, unspecified, at plant [RER]: 0.000231 kg; lognormal SD95 3.1
  (4,3,1,3,3,5); approximation with data from iron mining & lime treatment
- Heat, light fuel oil, at industrial furnace 1MW [RER]: 0.0898 MJ; lognormal SD95 1.4
  (4,3,1,3,3,5); approximation with data from iron mining & lime treatment
- Electricity, medium voltage, production ENTSO-E, at grid: 0.0339 kWh; lognormal SD95 1.4
  (4,3,1,3,3,5); approximation with data from iron mining & lime treatment
- Mine, iron [GLO]: 8.33e-13 p; lognormal SD95 3.1
  (4,3,1,3,3,5); approximation with data from iron mining & lime treatment
- Conveyor belt, at plant [RER]: 2.78e-8 m; lognormal SD95 3.1
  (4,3,1,3,3,5); approximation with data from iron mining & lime treatment

## Inputs from nature
- Iron [resources, in ground]: 1.11 kg; lognormal SD95 1.4
  (4,3,1,3,3,5); approximation with data from iron mining & lime treatment
- Transformation, from forest, unspecified [resources, land]: 2.13e-6 m2; lognormal SD95 2.2
  (4,3,1,3,3,5); approximation with data from iron mining & lime treatment
- Occupation, mineral extraction site [resources, land]: 0.00012 m2a; lognormal SD95 1.7
  (4,3,1,3,3,5); approximation with data from iron mining & lime treatment
- Water, well [resources, in water]: 2.93e-5 m3; lognormal SD95 1.4
  (4,3,1,3,3,5); approximation with data from iron mining & lime treatment
- Transformation, to mineral extraction site [resources, land]: 2.13e-6 m2; lognormal SD95 2.2
  (4,3,1,3,3,5); approximation with data from iron mining & lime treatment

## Emissions to nature
- Particulates, < 2.5 um [emissions to air, low. pop.]: 0.000145 kg; lognormal SD95 3.1
  (4,3,1,3,3,5); approximation with data from iron mining & lime treatment
- Heat, waste [emissions to air, low. pop.]: 0.122 MJ; lognormal SD95 1.4
  (4,3,1,3,3,5); approximation with data from iron mining & lime treatment
- Particulates, > 10 um [emissions to air, low. pop.]: 0.00145 kg; lognormal SD95 1.7
  (4,3,1,3,3,5); approximation with data from iron mining & lime treatment
- Particulates, > 2.5 um, and < 10um [emissions to air, low. pop.]: 0.00131 kg; lognormal SD95 2.2
  (4,3,1,3,3,5); approximation with data from iron mining & lime treatment
- Water [emissions to water, unspecified]: 0.02637 kg; lognormal SD95 2.5196
  (5,5,5,5,5,BU:1.05); All uncertainty-values set to 5.0 by default. Balance of input water

## Sampling procedure
approximation with data from literature

## Extrapolations
see technology

## Sources
- Hischier R., 2007, 2007 - LCI packagings and graphical papers - Hischier, Final report ecoinvent data v2.0, 11, Swiss Centre for LCI, Empa - TSL, Duebendorf and St. Gallen, CH
Hischier R. (2007) Life Cycle Inventories of Packaging and Graphical Paper. Final report ecoinvent data v2.0. Volume: 11. Swiss Centre for LCI, Empa - TSL. Dübendorf, CH.
Type: Measurement on site
Source: CD-ROM
First author: Hischier R.
Year: 2007
Title of anthology: Final report ecoinvent data v2.0
Place of publication: Dübendorf, CH
Publisher: Swiss Centre for LCI, Empa - TSL
Volume No: 11

## Validation
Proof reading validation: passed; Other validation: none;
