# SOx retained, in hard coal flue gas desulphurisation

Dataset: EcoSpold 1, unit process
Functional unit: 1 kg
Category: power plants / unspecified
Geography: RER
Time period: 2000-01 to 2000-12
Generated by: Christian Bauer
accessRestrictedTo: 0
copyright: true

## General comment
The efficiency of the desulphurisation is 90 %. All environmental burdens associated with the operation of the scrubber are allocated to the SO2 retained and hence to the power plant. Therefore the produced gypsum is assumed to be burden free, and not explicitly included in the module. The considered input of limestone and quicklime reflects the average use of these materials in European scrubbers.;

## Included processes
The module describes the operation of a wet scrubber. It includes material input, transport of this material, waste water and solid waste.

## Technology
Average installed technology in the 1990s.

## Reference product
- SOx retained, in hard coal flue gas desulphurisation [RER]: 1 kg
  Europe

## Inputs from technosphere
- Sodium hydroxide, 50% in H2O, production mix, at plant [RER]: 0.02 kg; lognormal SD95 1.3
  (3,4,3,3,1,5)
- Transport, freight, rail [RER]: 0.17 tkm; lognormal SD95 2.1
  (3,4,3,3,1,5)
- Sulphuric acid, liquid, at plant [RER]: 0.08 kg; lognormal SD95 1.3
  (3,4,3,3,1,5)
- Water, decarbonised, at plant [RER]: 20 kg; lognormal SD95 1.3
  (3,4,3,3,1,5)
- Disposal, municipal solid waste, 22.9% water, to sanitary landfill [CH]: 0.06 kg; lognormal SD95 1.3
  (3,4,3,3,1,5)
- Quicklime, milled, loose, at plant [CH]: 0.2 kg; lognormal SD95 1.3
  (3,4,3,3,1,5)
- Limestone, milled, loose, at plant [CH]: 1.3 kg; lognormal SD95 1.3
  (3,4,3,3,1,5)
- Transport, freight, lorry, fleet average [RER]: 0.003 tkm; lognormal SD95 2.1
  (3,4,3,3,1,5)

## Emissions to nature
- Potassium [emissions to water, river]: 5e-5 kg; lognormal SD95 5.1
  (3,4,3,3,1,5)
- Potassium-40 [emissions to water, river]: 0.059 kBq; lognormal SD95 3.1
  (3,4,3,3,1,5)
- BOD5, Biological Oxygen Demand [emissions to water, river]: 2.5e-5 kg; lognormal SD95 1.6
  (3,4,3,3,1,5)
- Radium-226 [emissions to water, river]: 0.029 kBq; lognormal SD95 3.1
  (3,4,3,3,1,5)
- Thorium-232 [emissions to water, river]: 0.011 kBq; lognormal SD95 3.1
  (3,4,3,3,1,5)
- Suspended solids, unspecified [emissions to water, river]: 3e-6 kg; lognormal SD95 1.6
  (3,4,3,3,1,5)
- Sodium [emissions to water, river]: 0.0025 kg; lognormal SD95 5.1
  (3,4,3,3,1,5)
- Chloride [emissions to water, river]: 0.25 kg; lognormal SD95 1.6
  (3,4,3,3,1,5)
- Polonium-210 [emissions to water, river]: 0.047 kBq; lognormal SD95 3.1
  (3,4,3,3,1,5)
- Boron [emissions to water, river]: 0.00033 kg; lognormal SD95 5.1
  (3,4,3,3,1,5)
- Carbon dioxide, fossil [emissions to air, low. pop.]: 0.55 kg; lognormal SD95 1.3
  (3,4,3,3,1,5)
- Lead-210 [emissions to water, river]: 0.047 kBq; lognormal SD95 3.1
  (3,4,3,3,1,5)
- Manganese [emissions to water, river]: 5e-6 kg; lognormal SD95 5.1
  (3,4,3,3,1,5)
- Sulfate [emissions to water, river]: 0.01 kg; lognormal SD95 1.6
  (3,4,3,3,1,5)
- Arsenic [emissions to water, river]: 5e-6 kg; lognormal SD95 5.1
  (3,4,3,3,1,5)
- Antimony [emissions to water, river]: 3e-6 kg; lognormal SD95 5.1
  (3,4,3,3,1,5)
- Lead [emissions to water, river]: 5e-7 kg; lognormal SD95 5.1
  (3,4,3,3,1,5)
- COD, Chemical Oxygen Demand [emissions to water, river]: 0.00075 kg; lognormal SD95 1.6
  (3,4,3,3,1,5)
- Vanadium [emissions to water, river]: 3e-6 kg; lognormal SD95 5.1
  (3,4,3,3,1,5)
- Aluminium [emissions to water, river]: 3e-6 kg; lognormal SD95 5.1
  (3,4,3,3,1,5)
- Zinc [emissions to water, river]: 5e-6 kg; lognormal SD95 5.1
  (3,4,3,3,1,5)
- Iron [emissions to water, river]: 3e-6 kg; lognormal SD95 5.1
  (3,4,3,3,1,5)
- Fluoride [emissions to water, river]: 0.00015 kg; lognormal SD95 1.6
  (3,4,3,3,1,5)
- Chromium [emissions to water, river]: 3e-6 kg; lognormal SD95 5.1
  (3,4,3,3,1,5)
- Nickel [emissions to water, river]: 3e-6 kg; lognormal SD95 5.1
  (3,4,3,3,1,5)
- Mercury [emissions to water, river]: 3e-7 kg; lognormal SD95 5.1
  (3,4,3,3,1,5)
- Tin [emissions to water, river]: 3e-6 kg; lognormal SD95 5.1
  (3,4,3,3,1,5)
- Nitrate [emissions to water, river]: 0.005 kg; lognormal SD95 1.6
  (3,4,3,3,1,5)
- Magnesium [emissions to water, river]: 0.01 kg; lognormal SD95 5.1
  (3,4,3,3,1,5)
- Phosphate [emissions to water, river]: 2e-6 kg; lognormal SD95 1.6
  (3,4,3,3,1,5)
- Selenium [emissions to water, river]: 5e-7 kg; lognormal SD95 5.1
  (3,4,3,3,1,5)
- Copper [emissions to water, river]: 3e-6 kg; lognormal SD95 5.1
  (3,4,3,3,1,5)
- Sulfite [emissions to water, river]: 0.0001 kg; lognormal SD95 1.6
  (3,4,3,3,1,5)
- Ammonium, ion [emissions to water, river]: 3.85e-6 kg; lognormal SD95 1.6
  (3,4,3,3,1,5)
- Uranium-238 [emissions to water, river]: 0.023 kBq; lognormal SD95 3.1
  (3,4,3,3,1,5)
- Molybdenum [emissions to water, river]: 3e-6 kg; lognormal SD95 5.1
  (3,4,3,3,1,5)
- Cadmium [emissions to water, river]: 3e-7 kg; lognormal SD95 5.1
  (3,4,3,3,1,5)
- Calcium [emissions to water, river]: 0.05 kg; lognormal SD95 5.1
  (3,4,3,3,1,5)

## Sampling procedure
literature

## Sources
- Dones R., Bauer C., Roeder A., 2007, 2007 - Coal - Dones, Sachbilanzen von Energiesystemen. Final report No. 6 ecoinvent data v2.0, 6, Swiss Centre for LCI, PSI, Duebendorf and Villigen, CH
Röder, A., Ch. Bauer, R. Dones (2007) Kohle. Sachbilanzen von Energiesystemen. Final report No. 6 ecoinvent data v2.0. Editors: Dones R.. Volume: 6. Swiss Centre for LCI, PSI. Dübendorf and Villigen, CH.
Type: Measurement on site
Source: CD-ROM
First author: Röder, A.
Other authors: Ch. Bauer, R. Dones
Year: 2007
Name of editors: Dones R.
Title of anthology: Sachbilanzen von Energiesystemen. Final report No. 6 ecoinvent data v2.0
Place of publication: Dübendorf and Villigen, CH
Publisher: Swiss Centre for LCI, PSI
Volume No: 6

## Validation
Proof reading validation: passed; Other validation: none;
