# Soybean oil, at oil mill

Dataset: EcoSpold 1, unit process
Functional unit: 1 kg
Category: agricultural / plant oils
Geography: US
Time period: 2004-01 to 2006-12
Production volume: Approx. 46 Mt of soybeans were processed to oil and meal in 2003 in the US
Share of production covered: 0 %
Generated by: Edgard Gnansounou
accessRestrictedTo: 0
copyright: true

## General comment
Inventory refers to the production of 1 kg soybean oil, respectively soybean meal (incl. hulls). The multioutput-process 'soybeans, in oil mill' delivers the co-products 'soybean oil, at oil mill' and 'soybean meal, at oil mill'. Economic allocation with allocation factor of 34.5% to oil and 65.5 to meal. Allocation is done according to carbon balance for CO2 emissions.;

## Included processes
This process includes the transport of soybeans to the mill, and the processing of soybeans to soybean oil and meal. System boundary is at the oil mill.

## Technology
Typical oil mill designed for soybean oil solvent extraction (incl. pre-cracking of soybeans, dehulling, oil extraction, meal processing and oil purification), US context.

## Time period
Data from 1998 to 2005, current technology for soybean oil extraction

## Reference product
- Soybean oil, at oil mill [US]: 1 kg
  UNITED STATES

## Inputs from technosphere
- Heat, light fuel oil, at industrial furnace 1MW [RER]: 0.056596 MJ; lognormal SD95 1.1668
  (2,4,2,1,1,4); Based on US study, cross-checking with various literature references, industrial data
- Heat, at hard coal industrial furnace 1-10MW [RER]: 0.14535 MJ; lognormal SD95 1.1668
  (same comment as for Heat, light fuel oil, at industrial furnace 1MW)
- Treatment, sewage, from residence, to wastewater treatment, class 2 [CH]: 0.0001647 m3; lognormal SD95 1.5655
  (5,5,2,1,1,na); Calculation to close mass balance of process
- Transport, freight, lorry, 7.5t-16t gross weight, fleet average [RER]: 0.18335 tkm; lognormal SD95 2.095
  (4,5,na,na,na,na); Based on ecoinvent Guidelines, standard distances
- Tap water, at user [RER]: 0.15731 kg; lognormal SD95 1.1668
  (same comment as for Heat, light fuel oil, at industrial furnace 1MW)
- Heat, natural gas, at industrial furnace 1MW [CH]: 1.0843 MJ; lognormal SD95 1.1668
  (same comment as for Heat, light fuel oil, at industrial furnace 1MW)
- Transport, freight, lorry, fleet average [RER]: 0.00021165 tkm; lognormal SD95 2.095
  (4,5,na,na,na,na); Based on ecoinvent Guidelines, standard distances
- Oil mill [CH]: 3.1345e-10 p; lognormal SD95 3.2843
  (1,4,1,3,4,5); Calculation, according to production capacity and lifetime of the plant
- Electricity, medium voltage, at grid [US]: 0.075772 kWh; lognormal SD95 1.1668
  (same comment as for Heat, light fuel oil, at industrial furnace 1MW)
- Transport, freight, rail [RER]: 0.0025399 tkm; lognormal SD95 2.095
  (4,5,na,na,na,na); Based on ecoinvent Guidelines, standard distances
- Phosphoric acid, industrial grade, 85% in H2O, at plant [RER]: 0.00030919 kg; lognormal SD95 1.0752
  (1,2,1,2,1,3); Literature data & biodiesel producers
- Hexane, at plant [RER]: 0.003924 kg; lognormal SD95 1.1668
  (same comment as for Heat, light fuel oil, at industrial furnace 1MW)
- Soybeans, at farm [US]: 1.83346 kg; lognormal SD95 1.113
  (1,1,1,1,1,4); Based on US study, cross-checking with various literature references, industrial data

## Inputs from nature
- Carbon dioxide, in air [resources, in air]: 0.20493 kg; lognormal SD95 1.05
  (1,1,1,1,1,na); Correction to close carbon balance of individual outputs

## Emissions to nature
- Heat, waste [emissions to air, high. pop.]: 5.93362 MJ; lognormal SD95 1.1376
  (2,4,1,3,1,3); ecoinvent guidelines, calculation from electricity consumption and energy balance
- Hexane [emissions to air, high. pop.]: 0.003924 kg; lognormal SD95 1.5046
  (1,1,1,2,1,3); Emissions are taken to be equal to input of gas

## Sampling procedure
Data from US study, cross-checking with various literature sources, industrial data. Sources of energy supply from national statistics.

## Sources
- Jungbluth N., Chudacoff M., Dauriat A., Dinkel F., Doka G., Faist Emmenegger M., Gnansounou E., Kljun N., Spielmann M., Stettler C., Sutter J., 2007, 2007 - LCI bioenergy - Jungbluth, Final report ecoinvent data v2.0, 17, Swiss Centre for LCI, ESU-services Ltd., Duebendorf and Uster, CH
Jungbluth N., Chudacoff M., Dauriat A., Dinkel F., Doka G., Faist Emmenegger M., Gnansounou E., Kljun N., Spielmann M., Stettler C., Sutter J. (2007) Life Cycle Inventories of Bioenergy. Final report ecoinvent data v2.0. Volume: 17. Swiss Centre for LCI, ESU. Duebendorf and Uster, CH.
Type: Measurement on site
Source: CD-ROM
First author: Jungbluth N.
Other authors: Chudacoff M., Dauriat A., Dinkel F., Doka G., Faist Emmenegger M., Gnansounou E., Kljun N., Spielmann M., Stettler C., Sutter J.
Year: 2007
Title of anthology: Final report ecoinvent data v2.0
Place of publication: Duebendorf and Uster, CH
Publisher: Swiss Centre for LCI, ESU
Volume No: 17

## Validation
Proof reading validation: Passed.; Other validation: none;
