# Printed wiring board, through-hole, lead-free surface, at plant

Dataset: EcoSpold 1, unit process
Functional unit: 1 m2
Category: electronics / component
Geography: GLO
Time period: 2023-01 to 2029-12
Production volume: $ 18.9315 Billion in 1998 (includes all rigid PWB)
Generated by: Lugas Raka Adrianto, Maulana Permana Ajie, Didier Beloin-Saint-Pierre
accessRestrictedTo: 0
copyright: false

## General comment
The functional unit represents 1 m2 of a 2-layer FR-4 PWB, lead-free surface finished (mixture of various finishing methods), with soldermask, for through-hole mount applications, without mounted components. It is designed to be used in industry electronics and simple ICT applications. Process data are taken from environmental reports of 2 German PWB producers, plus from literature. The described PWB has a square weight of 3.08 kg/m2.;

## Included processes
The module covers the assembly of a PWB prepared for surface mounting of components. In this dataset (raw) materials, infrastructure, energy consumption, emissions to air and water and waste amounts from the production of 1 m2 of board are taken into account. Not included into this dataset is the mounting of the PWB.

## Geography
This module is based on information from European producers that are seen as representative for the global situation.

## Technology
Dataset comprises the following steps of PWB production: substrate preparation, imaging, exposure, etching, sandwiching, via opening, desmearing, activation and accelaration steps as well as via filling, second imaging, exposure, copper plating, cleaning, oxidification, dry vacuum lamination, micro etching, surface finishing.

## Reference product
- Printed wiring board, through-hole, lead-free surface, at plant [GLO]: 1 m2
  Global

## Inputs from technosphere
- Acrylic varnish, 87.5% in H2O, at plant [RER]: 0.137 kg; lognormal SD95 1.26
  (2,3,3,4,1,5,BU:1.05); approximation, based on average data over 3 years from 1 European PWB producer
- Ammonium chloride, at plant [GLO]: 1.868 kg; lognormal SD95 1.26
  (2,3,3,4,1,5,BU:1.05); assumption - based on data from 1 European producer
- Copper, primary, at refinery [GLO]: 0.75245 kg; lognormal SD95 1.26
  (2,3,3,4,1,5,BU:1.05); assumption - based on data from 1 European producer
- Dipropylene glycol monomethyl ether, at plant [RER]: 0.0546 kg; lognormal SD95 1.26
  (2,3,3,4,1,5,BU:1.05); average data over 3 years from 1 European PWB producer
- Electricity, medium voltage, production GLO, at grid [GLO]: 54 kWh; lognormal SD95 1.26
  (2,3,3,4,1,5,BU:1.05); updated using recent literature data
- Electronic component production plant [GLO]: 2e-8 p; lognormal SD95 3.07
  (2,3,3,4,1,5,BU:1.05); rough assumption
- Ethanol from ethylene, at plant [RER]: 0.02335 kg; lognormal SD95 1.26
  (2,3,3,4,1,5,BU:1.05); assumption - based on data from 1 European producer
- Glass fibre reinforced plastic, polyester resin, hand lay-up, at plant [RER]: 2.9916 kg; lognormal SD95 1.26
  (2,3,3,4,1,5,BU:1.05); average data over 3 years from 1 European PWB producer
- Heat, light fuel oil, at industrial furnace 1MW [RER]: 0.755 MJ; lognormal SD95 1.26
  (2,3,3,4,1,5,BU:1.05); average data over 3 years from 1 European PWB producer
- Heat, natural gas, at industrial furnace 1MW [CH]: 70.9 MJ; lognormal SD95 1.26
  (2,3,3,4,1,5,BU:1.05); updated using recent literature data
- Hydrochloric acid, 30% in H2O, at plant [RER]: 1.61 kg; lognormal SD95 1.26
  (2,3,3,4,1,5,BU:1.05); average data over 3 years from 1 European PWB producer
- Hydrogen peroxide, 50% in H2O, at plant [RER]: 0.239 kg; lognormal SD95 1.26
  (2,3,3,4,1,5,BU:1.05); average data over 3 years from 1 European PWB producer
- Iron (III) chloride, 40% in H2O, at plant [CH]: 0.183 kg; lognormal SD95 1.26
  (2,3,3,4,1,5,BU:1.05); average data over 3 years from 1 European PWB producer
- Isopropanol, at plant [RER]: 0.137 kg; lognormal SD95 1.26
  (same comment as for Acrylic varnish, 87.5% in H2O, at plant)
- Phenolic resin, at plant [RER]: 0.061989 kg; lognormal SD95 1.26
  (2,3,3,4,1,5,BU:1.05); average data over 3 years from 1 European PWB producer
- Polyethylene, LLDPE, granulate, at plant [RER]: 0.02335 kg; lognormal SD95 1.26
  (2,3,3,4,1,5,BU:1.05); assumption - based on data from 1 European producer
- Potassium carbonate, at plant [GLO]: 3.7827 kg; lognormal SD95 1.26
  (2,3,3,4,1,5,BU:1.05); assumption - based on data from 1 European producer
- Sheet rolling, copper [RER]: 1.8167 kg; lognormal SD95 1.26
  (2,3,3,4,1,5,BU:1.05); average data over 3 years from 1 European PWB producer
- Silver, at regional storage [RER]: 0.00081053 kg; lognormal SD95 1.26
  (2,3,3,4,1,5,BU:1.05); average from several ZVEI umbrella specifications for PWB
- Sodium chloride, powder, at plant [RER]: 0.327 kg; lognormal SD95 1.26
  (2,3,3,4,1,5,BU:1.05); average data over 3 years from 1 European PWB producer
- Sodium hydroxide, 50% in H2O, production mix, at plant [RER]: 0.434 kg; lognormal SD95 1.26
  (2,3,3,4,1,5,BU:1.05); average data over 3 years from 1 European PWB producer
- Sodium persulfate, at plant [GLO]: 0.6538 kg; lognormal SD95 1.26
  (2,3,3,4,1,5,BU:1.05); assumption - based on data from 1 European producer
- Sulphuric acid, liquid, at plant [RER]: 0.239 kg; lognormal SD95 1.26
  (2,3,3,4,1,5,BU:1.05); average data over 3 years from 1 European PWB producer
- Tap water, at user [RER]: 308 kg; lognormal SD95 1.26
  (2,3,3,4,1,5,BU:1.05); average data over 3 years from 1 European PWB producer
- Tin, at regional storage [RER]: 0.0035684 kg; lognormal SD95 1.26
  (2,3,3,4,1,5,BU:1.05); average from several ZVEI umbrella specifications for PWB
- Transport, freight, rail [RER]: 9.177 tkm; lognormal SD95 2.07
  (2,3,3,4,1,5,BU:2.00); standard distances
- Transport, freight, lorry, fleet average [RER]: 1.5295 tkm; lognormal SD95 2.07
  (2,3,3,4,1,5,BU:2.00); standard distances
- Water, ultrapure, at plant [GLO]: 0.205 kg; lognormal SD95 1.26
  (2,3,3,4,1,5,BU:2.00); average data over 3 years from 3 European PWB producer
- Disposal, hazardous waste, 25% water, to hazardous waste incineration [CH]: 1.96 kg; lognormal SD95 1.26
  (2,3,3,4,1,5,BU:1.05); average data over 3 years from 1 European PWB producer
- Disposal, municipal solid waste, 22.9% water, to municipal incineration [CH]: 0.09414 kg; lognormal SD95 1.26
  (2,3,3,4,1,5,BU:1.05); average data over 3 years from 1 European PWB producer
- Disposal, plastics, mixture, 15.3% water, to municipal incineration [CH]: 0.227 kg; lognormal SD95 1.26
  (2,3,3,4,1,5,BU:1.05); average data over 3 years from 1 European PWB producer
- Disposal, sludge from steel rolling, 20% water, to residual material landfill [CH]: 0.743 kg; lognormal SD95 1.26
  (2,3,3,4,1,5,BU:1.05); average data over 3 years from 1 European PWB producer
- Disposal, solvents mixture, 16.5% water, to hazardous waste incineration [CH]: 0.109 kg; lognormal SD95 1.26
  (2,3,3,4,1,5,BU:1.05); average data over 3 years from 1 European PWB producer

## Emissions to nature
- Copper [emissions to air, high. pop.]: 0.00498 kg; lognormal SD95 3.07
  (2,3,3,4,1,5,BU:3.00); calculated from total release in USA
- Heat, waste [emissions to air, high. pop.]: 340.56 MJ; lognormal SD95 1.59
  (2,3,3,4,1,5,BU:1.50); calculated, from electricity input
- Hydrogen chloride [emissions to air, high. pop.]: 0.002944 kg; lognormal SD95 2.07
  (2,3,3,4,1,5,BU:2.00); average data over 3 years from 1 European PWB producer
- Hydrogen peroxide [emissions to air, high. pop.]: 0.000414 kg; lognormal SD95 2.07
  (2,3,3,4,1,5,BU:2.00); average data over 3 years from 1 European PWB producer
- NMVOC, non-methane volatile organic compounds, unspecified origin [emissions to air, high. pop.]: 0.00852 kg; lognormal SD95 2.07
  (2,3,3,4,1,5,BU:2.00); average data over 3 years from 1 European PWB producer
- Sodium hydroxide [emissions to air, high. pop.]: 0.000782 kg; lognormal SD95 2.07
  (2,3,3,4,1,5,BU:2.00); average data over 3 years from 1 European PWB producer
- Sulfuric acid [emissions to air, high. pop.]: 0.000414 kg; lognormal SD95 2.07
  (2,3,3,4,1,5,BU:2.00); average data over 3 years from 1 European PWB producer
- AOX, Adsorbable Organic Halogen as Cl [emissions to water, unspecified]: 0.00013352 kg; lognormal SD95 1.59
  (2,3,3,4,1,5,BU:1.50); average data over 3 years from 1 European PWB producer
- Arsenic [emissions to water, unspecified]: 2.1779e-6 kg; lognormal SD95 5.08
  (2,3,3,4,1,5,BU:5.00); average data over 3 years from 1 European PWB producer
- BOD5, Biological Oxygen Demand [emissions to water, unspecified]: 8.4e-5 kg; lognormal SD95 1.59
  (2,3,3,4,1,5,BU:1.50); average data over 3 years from 1 European PWB producer
- Cadmium [emissions to water, unspecified]: 1.8422e-5 kg; lognormal SD95 5.08
  (2,3,3,4,1,5,BU:5.00); average data over 3 years from 1 European PWB producer
- Chromium [emissions to water, unspecified]: 5.2166e-5 kg; lognormal SD95 5.08
  (2,3,3,4,1,5,BU:5.00); average data over 3 years from 1 European PWB producer
- COD, Chemical Oxygen Demand [emissions to water, unspecified]: 8.4e-5 kg; lognormal SD95 1.59
  (2,3,3,4,1,5,BU:1.50); average data over 3 years from 1 European PWB producer
- Copper [emissions to water, unspecified]: 2.07e-8 kg; lognormal SD95 5.08
  (2,3,3,4,1,5,BU:5.00); average data over 3 years from 1 European PWB producer
- Fluoride [emissions to water, unspecified]: 0.00037574 kg; lognormal SD95 1.59
  (2,3,3,4,1,5,BU:1.50); average data over 3 years from 1 European PWB producer
- Mercury [emissions to water, unspecified]: 6.0922e-7 kg; lognormal SD95 5.08
  (2,3,3,4,1,5,BU:5.00); average data over 3 years from 1 European PWB producer
- Nickel [emissions to water, unspecified]: 8e-9 kg; lognormal SD95 5.08
  (2,3,3,4,1,5,BU:5.00); average data over 3 years from 1 European PWB producer
- Zinc [emissions to water, unspecified]: 8.33e-9 kg; lognormal SD95 5.08
  (2,3,3,4,1,5,BU:5.00); average data over 3 years from 1 European PWB producer

## Sampling procedure
Literature

## Extrapolations
see Geography and Technology

## Sources
- Raka Adrianto L., Permana Ajie M., Beloin-Saint-Pierre D., 2024, 2024 - LCI ICT sector - Raka Adrianto, Empa, St. Gallen, CH

## Validation
Proof reading validation: Passed, Other validation: none, Validator: Mischa Zschokke, Company: Carbotech, Country: CH
