# Electricity, natural gas, at CHP power plant

Dataset: EcoSpold 1, unit process
Functional unit: 1 kWh
Category: electricity by fuel / gas
Geography: GB
Time period: 2021-01-01 to 2023-12-31
Generated by: Christopher Oberschelp
accessRestrictedTo: 0
copyright: false

## General comment
Translated name: Strom, ab Erdgas-WKK-Kraftwerk
Included processes: Electricity output at busbar. The dataset uses the average net efficiency of power plants in the ENTSO-E region adjusted for co-generation (using allocation based on exergy content) due to incomplete region-specific data.

The average allocated net electrical efficiency is about 51.9 % (ENTSO-E average). The electricity generation of this technology in the region is at about 20'000 GWh based on international energy statistics.

Technology: Average technology mix.

Version: 2024

Local category: Erdgas
Local subcategory: Kraftwerke

Representativeness: 100 %

Production volume: 20'000 GWh

Generator: Christopher Oberschelp
E-mail: contact@oberschelp-consulting.ch; Country: CH Former geography text: NA. ; UUID:

## Geography
GB in 2022

## Technology
Average technology mix

## Reference product
- Electricity, natural gas, at CHP power plant [GB]: 1 kWh

## Inputs from technosphere
- Natural gas, burned in power plant or heat plant [GB]: 6.93 MJ; lognormal SD95 1.21
  calculated from IEA Extended World Energy Balances for 2022; uncertainty own estimate

## Sampling procedure
Databases/ literature data based on regional statistics.

## Sources
- Zschokke M., Elsener F., Oberschelp C., 2025, 2025 - Update LCI electricity from natural gas - Zschokke, Default Anthology, 0, Carbotech AG, Zuerich, CH
On behalf of the Federal Office for the Environment, Bern

## Validation
Proof reading validation: Proof reading validation: had passed; Other validation: none;
Validator: René Itten
Telephone: 0041 58 934 52 32; E-mail: rene.itten@zhaw.ch; Country: CH
