# Aluminium composite panel FR, at plant

Dataset: EcoSpold 1, unit process
Functional unit: 1 m2
Category: construction materials / aluminum composite panels
Geography: RER
Time period: 2000-01 to 2016-12
Generated by: Daniel Savi
accessRestrictedTo: 0
copyright: true

## General comment
Alu-Verbund Fassadenplatte FR, Herstellung
1m2 Platte mit flammgeschütztem Kern, Stärke 4 mm, Flächengewicht 7.6 kg
Aludeckschichten 2.7 kg/m2, Kern Polyethlen/Aluminiumhydroxid 4.9 kg/m2
Version: 0.0

Local category: construction materials
Local subcategory: Alu-Verbundplatten

## Reference product
- Aluminium composite panel FR, at plant [RER]: 1 m2
  Europe

## Inputs from technosphere
- Aluminium hydroxide, at plant [RER]: 2.37 kg; lognormal SD95 1.62235
  (4;5;2;1;4)
- Aluminium product manufacturing, average metal working [RER]: 2.703 kg; lognormal SD95 1.62235
  (4;5;2;1;4)
- Polyethylene, LDPE, granulate, at plant [RER]: 2.648 kg; lognormal SD95 1.62235
  (4;5;2;1;4)
- Aluminium, production mix, wrought alloy, at plant [RER]: 2.703 kg; lognormal SD95 1.62235
  (4;5;2;1;4)
- Transport, freight, rail [RER]: 1.54433 tkm; lognormal SD95 3.15881
  (5;5;5;1;5)
- Powder coating, aluminium sheet [RER]: 1 m2; lognormal SD95 1.62235
  (4;5;2;1;4)
- Sheet rolling, aluminium [RER]: 2.703 kg; lognormal SD95 1.62235
  (4;5;2;1;4)
- Transport, freight, lorry, 32t-40t gross weight, fleet average [RER]: 0.771967 tkm; lognormal SD95 3.15881
  (5;5;5;1;5)
- Extrusion, plastic film [RER]: 5.02 kg; lognormal SD95 1.62235
  (4;5;2;1;4)

## Sources
- Kasser U., R. Frischknecht, M. Klingler, D. Savi, R. Itten, F. Wyss,P. Stolz, L. Tschuemperlin, 2016, 2016 - Renewal and exp. of LCA data in KBOB - Kasser, -, Buero fuer Umweltchemie, treeze Ltd., Zuerich and Uster, CH
U. Kasser, R. Frischknecht, M. Klingler, D. Savi, R. Itten, F. Wyss,P. Stolz, L. Tschümperlin 2016 (2015Z) Erneuerung und Erweiterung der Ökobilanzdaten in der KBOB-Liste "Ökobilanzdaten im Baubereich", Projekt QualiBOB. unknown.

First author: U. Kasser, R. Frischknecht, M. Klingler, D. Savi, R. Itten, F. Wyss,P. Stolz, L. Tschümperlin 2016
Year: 2015Z
Place of publication: unknown
Original title: Erneuerung und Erweiterung der Ökobilanzdaten in der KBOB-Liste "Ökobilanzdaten im Baubereich", Projekt QualiBOB
