# Electronic component, active, unspecified, at plant

Dataset: EcoSpold 1, unit process
Functional unit: 1 kg
Category: electronics / component
Geography: GLO
Time period: 2023-01 to 2029-12
Generated by: Lugas Raka Adrianto, Maulana Permana Ajie, Didier Beloin-Saint-Pierre
accessRestrictedTo: 0
copyright: false

## General comment
This module represents an unweighted average of all active components on a desktop motherboard, a laptop mainboard and a CRT TV board. In 2023, no major updates are implemented for this dataset, except for the use of updated ICT datasets in the background/inventory, e.g. capacitors, inductors, resistors, etc.;

## Included processes
This dataset covers material input (and within this the respective production efforts) for unspecified active electronic components.

## Geography
Data represent a global valuable average composition of active electronic components.

## Technology
see general comments

## Reference product
- Electronic component, active, unspecified, at plant [GLO]: 1 kg
  Global

## Inputs from technosphere
All rows: lognormal SD95 2.33
- Diode, unspecified, at plant [GLO]: 0.0196 kg
  (5,3,4,1,5,5,BU:1.05); calculated from Desktop PC, Laptop and TV mainboards
- Integrated circuit, IC, logic type, at plant [GLO]: 0.55 kg
  (5,3,4,1,5,5,BU:1.05); calculated from Desktop PC, Laptop and TV mainboards
- Integrated circuit, IC, memory type, at plant [GLO]: 0.309 kg
  (5,3,4,1,5,5,BU:1.05); calculated from Desktop PC, Laptop and TV mainboards
- Light emitting diode, LED, at plant [GLO]: 0.00375 kg
  (5,3,4,1,5,5,BU:1.05); calculated from Desktop PC, Laptop and TV mainboards
- Transistor, unspecified, at plant [GLO]: 0.117 kg
  (5,3,4,1,5,5,BU:1.05); calculated from Desktop PC, Laptop and TV mainboards

## Sampling procedure
Literature & own estimations

## Extrapolations
see Geography & Technology

## Sources
- Raka Adrianto L., Permana Ajie M., Beloin-Saint-Pierre D., 2024, 2024 - LCI ICT sector - Raka Adrianto, Empa, St. Gallen, CH

## Validation
Proof reading validation: Passed, Other validation: none, Validator: Mischa Zschokke, Company: Carbotech, Country: CH
