# Printed wiring board, power supply unit desktop PC, Pb free, at plant

Dataset: EcoSpold 1, unit process
Functional unit: 1 kg
Category: electronics / component
Geography: GLO
Time period: 2023-01 to 2029-12
Generated by: Lugas Raka Adrianto, Maulana Permana Ajie, Didier Beloin-Saint-Pierre
accessRestrictedTo: 0
copyright: false

## General comment
The data represent the PWB of a power supply unit, used in modern Desktop PCs. Material data are based on own dismantling activities. Infrastructure and production efforts are based on own assumptions. An update was made in 2023, comprising: modification to energy consumption and regionalization of inventory flows, such as energy and metal input (Duque Ciceri et al., 2010; Kupka et al., 2018.); Geography: Data represent a global valuable composition of PWB in a power supply unit.;

## Included processes
This dataset covers component input and production efforts (incl. PWB waste due to failure in mounting) for the production of a PWB used in the power supply unit of a desktop PC, using Pb-free solder material.

## Technology
average PWB mounting technology (wave soldering)

## Reference product
- Printed wiring board, power supply unit desktop PC, Pb free, at plant [GLO]: 1 kg
  Global

## Inputs from technosphere
- Aluminium, production mix, wrought alloy, at plant [RER]: 0.13 kg; lognormal SD95 1.38
  (2,5,4,3,1,5,BU:1.05); own dismantling activities of a Intel PII Desktop PC PSU
- Capacitor, electrolyte type, < 2cm height, at plant [GLO]: 0.043673 kg; lognormal SD95 1.38
  (2,5,4,3,1,5,BU:1.05); own dismantling activities of a Intel PII Desktop PC PSU
- Capacitor, electrolyte type, > 2cm height, at plant [GLO]: 0.073878 kg; lognormal SD95 1.38
  (2,5,4,3,1,5,BU:1.05); own dismantling activities of a Intel PII Desktop PC PSU
- Capacitor, film, through-hole mounting, at plant [GLO]: 0.022551 kg; lognormal SD95 1.38
  (2,5,4,3,1,5,BU:1.05); own dismantling activities of a Intel PII Desktop PC PSU
- Capacitor, unspecified, at plant [GLO]: 0.025 kg; lognormal SD95 1.38
  (2,5,4,3,1,5,BU:1.05); own dismantling activities of a Intel PII Desktop PC PSU
- Diode, glass-, through-hole mounting, at plant [GLO]: 0.0065 kg; lognormal SD95 1.38
  (2,5,4,3,1,5,BU:1.05); own dismantling activities of a Intel PII Desktop PC PSU
- Inductor, ring core choke type, at plant [GLO]: 0.25612 kg; lognormal SD95 1.38
  (2,5,4,3,1,5,BU:1.05); own dismantling activities of a Intel PII Desktop PC PSU
- Integrated circuit, IC, logic type, at plant [GLO]: 0.0030918 kg; lognormal SD95 1.38
  (2,5,4,3,1,5,BU:1.05); own dismantling activities of a Intel PII Desktop PC PSU
- Mounting, through-hole technology, Pb-free solder [GLO]: 0.049184 m2; lognormal SD95 1.38
  (2,5,4,3,1,5,BU:1.05); own dismantling activities of a Intel PII Desktop PC PSU
- Printed wiring board, through-hole, lead-free surface, at plant [GLO]: 0.049184 m2; lognormal SD95 1.38
  (2,5,4,3,1,5,BU:1.05); own dismantling activities of a Intel PII Desktop PC PSU
- Resistor, metal film type, through-hole mounting, at plant [GLO]: 0.012143 kg; lognormal SD95 1.38
  (2,5,4,3,1,5,BU:1.05); own dismantling activities of a Intel PII Desktop PC PSU
- Section bar extrusion, aluminium [RER]: 0.13 kg; lognormal SD95 1.38
  (2,5,4,3,1,5,BU:1.05); own dismantling activities of a Intel PII Desktop PC PSU
- Transformer, high voltage use, at plant [GLO]: 0.19388 kg; lognormal SD95 1.38
  (2,5,4,3,1,5,BU:1.05); own dismantling activities of a Intel PII Desktop PC PSU
- Transformer, low voltage use, at plant [GLO]: 0.061531 kg; lognormal SD95 1.38
  (2,5,4,3,1,5,BU:1.05); own dismantling activities of a Intel PII Desktop PC PSU
- Transistor, wired, big size, through-hole mounting, at plant [GLO]: 0.036122 kg; lognormal SD95 1.38
  (2,5,4,3,1,5,BU:1.05); own dismantling activities of a Intel PII Desktop PC PSU
- Transistor, wired, small size, through-hole mounting, at plant [GLO]: 0.0017959 kg; lognormal SD95 1.38
  (2,5,4,3,1,5,BU:1.05); own dismantling activities of a Intel PII Desktop PC PSU
- Transport, freight, rail [RER]: 0.14286 tkm; lognormal SD95 2.15
  (2,5,4,3,1,5,BU:2.00); standard distances
- Transport, freight, lorry, fleet average [RER]: 0.13265 tkm; lognormal SD95 2.15
  (2,5,4,3,1,5,BU:2.00); standard distances
- Transport, transoceanic freight ship [OCE]: 0.80612 tkm; lognormal SD95 2.15
  (2,5,4,3,1,5,BU:2.00); standard distances
- Disposal, treatment of printed wiring boards [GLO]: 0.020408 kg; lognormal SD95 1.33
  (3,3,4,3,1,5,BU:1.05); data from literature plus own assumptions

## Sampling procedure
own dismantling and literature

## Extrapolations
see Geography & Technology

## Sources
- Raka Adrianto L., Permana Ajie M., Beloin-Saint-Pierre D., 2024, 2024 - LCI ICT sector - Raka Adrianto, Empa, St. Gallen, CH

## Validation
Proof reading validation: Passed, Other validation: none, Validator: Mischa Zschokke, Company: Carbotech, Country: CH
