# Transport, Motorbike, electric, 11-35kW, NMC battery, 2020, label-certified electricity

Dataset: EcoSpold 1, unit process
Functional unit: 1 km
Category: transport systems / road\Transformation
Geography: CH
Time period: 2020-01 to 2020-12
Generated by: Romain Sacchi
accessRestrictedTo: 0
copyright: False

## General comment
Power: 14 kW. Lifetime: 38500 km. Annual kilometers: 2405 km. Number of passengers: 1.1. Curb mass: 170.9 kg. Lightweighting of glider: 0%. Emission standard: None. Service visits throughout lifetime: 1.5. Range: 95 km. Battery capacity: 8.1 kWh. Available battery capacity: 6.48 kWh. Battery mass: 57.9 kg. Battery replacement throughout lifetime: 1. Fuel tank capacity: 0 kWh. Fuel mass: 0 kg. Source: Sacchi R., Bauer C. Life cycle inventories for on-road vehicles. Paul Scherrer Institut, 2023. DOI: 10.5281/zenodo.5156043 10.46.

## Time period
Technology and vehicle lightweighting factors match manufacture year of 2020

## Reference product
- Transport, Motorbike, electric, 11-35kW, NMC battery, 2020, label-certified electricity [CH]: 1 km

## Inputs from technosphere
- Motorbike, electric, 11-35kW, NMC battery, 2020 [CH]: 2.6e-5 p; lognormal SD95 1.12899
  Uncertainty from pedigree matrix: (3, 3, 2, 1, 1, 3)
- Operation, maintenance, road [CH]: 0.00129 my; lognormal SD95 1.51685
  Uncertainty from pedigree matrix: (3, 1, 5, 2, 1, 1)
- Electricity, low voltage, certified electricity, at grid [CH]: 0.0753 kWh; lognormal SD95 1.07866
  Uncertainty from pedigree matrix: (2, 1, 2, 2, 1, 3)
- Maintenance, electric scooter, without battery [CH]: 4e-5 p; lognormal SD95 1.12899
  Uncertainty from pedigree matrix: (3, 3, 2, 1, 1, 3)
- Road [CH]: 0.000136 my; lognormal SD95 1.51685
  Uncertainty from pedigree matrix: (3, 1, 5, 2, 1, 1)
- Road wear emissions, passenger car [RER]: 8.81e-6 kg; lognormal SD95 1.62301
  Uncertainty from pedigree matrix: (4, 5, 2, 3, 4, 3)
- Tyre wear emissions, passenger car [RER]: 5.79e-6 kg; lognormal SD95 1.62301
  Uncertainty from pedigree matrix: (4, 5, 2, 3, 4, 3)
- Brake wear emissions, passenger car [RER]: 3.23e-6 kg; lognormal SD95 1.62301
  Uncertainty from pedigree matrix: (4, 5, 2, 3, 4, 3)
- Disposal, road [RER]: 0.00014 my; lognormal SD95 1.51685
  Uncertainty from pedigree matrix: (3, 1, 5, 2, 1, 1)

## Emissions to nature
- Noise, road, passenger car, average [non material emissions, unspecified]: 0.5 km; lognormal SD95 1.87651
  Uncertainty from pedigree matrix: (5, 5, 2, 1, 4, 5)

## Sources
- Sacchi R., Bauer C., 2023, 2023 - LCI on-road vehicles - Sacchi, PSI, Villigen, CH
doi: 10.5281/ZENODO.5156043
