# Disposal, packaging cardboard, 19.6% water, to construction waste landfill

Dataset: EcoSpold 1, unit process
Functional unit: 1 kg
Category: waste management / construction waste landfill
Geography: CH
Generated by: default
accessRestrictedTo: 0
copyright: true

## General comment
This dataset represents the activity of waste disposal of waste paperboard in a construction waste landfill. Recommended use of this dataset: For minor amounts going to construction waste landfill as part of a building product (eg. fibres in reinforced gypsum boards). Large amounts of separated cardboard cannot go into this type of landfill.Inventoried waste consists of fraction: 100% cardboard; . Waste composition (wet, in ppm): upper heating value 17.91 MJ/kg; lower heating value 15.92 MJ/kg; H2O 104370; O 392680; H 57791; C 433270; S 1776.8; N 2583.5; P na; B na; Cl 7173.3; Br na; F na; I na; Ag na; As 1.168; Ba 57.193; Cd 0.93313; Co 0.91806; Cr 9.2403; Cu 35.113; Hg 0.30131; Mn 95.196; Mo na; Ni 10.64; Pb 28.963; Sb 0.0046044; Se 3.1073; Sn 6.7521; V na; Zn 63.333; Be 1.1299; Sc na; Sr 45.009; Ti na; Tl na; W na; Si na; Fe na; Ca na; Al na; K na; Mg na; Na na. Share of carbon in waste that is biogenic 100%.;;

## Included processes
Waste-specific short-term emissions via landfill leachate. Waste-specific long-term emissions from landfill. Land transformation and occupation. Waste placement and compaction. Landfill construction materials, sewer pipe for leachate, and access road.

## Technology
This is an inventory for a construction waste landfill (mostly mineral C&D waste, VVEA type B). Ultimate average landfill height is 11 meters. Operation phase duration is 15 years.

## Reference product
- Disposal, packaging cardboard, 19.6% water, to construction waste landfill [CH]: 1 kg
  SWITZERLAND

## Inputs from technosphere
- Extrusion, plastic pipes [RER]: 2.5834e-6 kg; lognormal SD95 3.1055
  for base drain system in landfill and sewer auxiliary materials. Uncertainty calculated from uncertainty in base parameters.
- Polyethylene, HDPE, granulate, at plant [RER]: 2.5439e-6 kg; lognormal SD95 3.1055
  (same comment as for Extrusion, plastic pipes)
- Bitumen, at refinery [CH]: 8.1169e-6 kg; lognormal SD95 3.1055
  for access street. Uncertainty calculated from uncertainty in base parameters.
- Cast iron, at plant [RER]: 1.3026e-7 kg; lognormal SD95 3.1055
  for sewer auxiliary materials. Uncertainty calculated from uncertainty in base parameters.
- Polyvinylchloride, at regional storage [RER]: 1.9736e-8 kg; lognormal SD95 3.1055
  for sewer auxiliary materials. Uncertainty calculated from uncertainty in base parameters.
- Tap water, at user [RER]: 0.00016406 kg; lognormal SD95 3.1055
  for sewer auxiliary materials. Uncertainty calculated from uncertainty in base parameters.
- Sand, at mine [CH]: 0.021824 kg; lognormal SD95 3.1055
  for landfill base layer and sewer auxiliary materials. Uncertainty calculated from uncertainty in base parameters.
- Polypropylene, granulate, at plant [RER]: 1.9736e-8 kg; lognormal SD95 3.1055
  for sewer auxiliary materials. Uncertainty calculated from uncertainty in base parameters.
- Excavation, skid-steer loader [RER]: 0.00030229 m3; lognormal SD95 3.1055
  excavation work for landfill construction, sewer construction, waste placement and compaction, and landfill recultivation. Uncertainty calculated from uncertainty in base parameters.
- Concrete, sole plate and foundation, at plant [CH]: 1.156e-8 m3; lognormal SD95 3.1055
  for sewer pipe. Uncertainty calculated from uncertainty in base parameters.
- Reinforcing steel, at plant [RER]: 7.6971e-7 kg; lognormal SD95 3.1055
  for sewer auxiliary materials. Uncertainty calculated from uncertainty in base parameters.
- Synthetic rubber, at plant [RER]: 7.8944e-9 kg; lognormal SD95 3.1055
  for sewer auxiliary materials. Uncertainty calculated from uncertainty in base parameters.
- Chromium steel 18/8, at plant [RER]: 2.6841e-7 kg; lognormal SD95 3.1055
  for sewer auxiliary materials. Uncertainty calculated from uncertainty in base parameters.
- Gravel, round, at mine [CH]: 0.036583 kg; lognormal SD95 3.1055
  for access street, for recultivation layer. Uncertainty calculated from uncertainty in base parameters.
- Diesel, burned in building machine, average [CH]: 1.9748e-6 MJ; lognormal SD95 3.1055
  construction diesel for access street and sewer construction. Uncertainty calculated from uncertainty in base parameters.
- Transport, freight, lorry, 16t-32t gross weight, fleet average [CH]: 0.0036943 tkm; lognormal SD95 1.9032
  transport for landfill infrastructure materials. uncertainty calculated from uncertainty in transported goods
- Excavation, hydraulic digger, average [CH]: 0.00030229 m3; lognormal SD95 3.1055
  (same comment as for Excavation, skid-steer loader)
- Transport, freight, rail [RER]: 2.8427e-6 tkm; lognormal SD95 2.0832
  (same comment as for Transport, freight, lorry, 16t-32t gross weight, fleet average)

## Inputs from nature
- Occupation, traffic area, road network [resources, land]: 8.658e-6 m2a; lognormal SD95 2.5417
  for access road to landfill during construction, operation, and aftercare phase of 25 years. Uncertainty calculated from uncertainty in base parameters.
- Transformation, from pasture, man made [resources, land]: 4.5671e-5 m2; lognormal SD95 4.3339
  for establishing the landfill on open ground. Uncertainty calculated from uncertainty in base parameters.
- Transformation, to dump site, inert material landfill [resources, land]: 4.5455e-5 m2; lognormal SD95 4.3339
  for establishing the landfill. Uncertainty calculated from uncertainty in base parameters.
- Transformation, to pasture, man made [resources, land]: 4.5455e-5 m2; lognormal SD95 4.3339
  recultivation of landfill after operation phase. Uncertainty calculated from uncertainty in base parameters.
- Transformation, to traffic area, road network [resources, land]: 2.1645e-7 m2; lognormal SD95 4.3339
  for access road to landfill. Uncertainty calculated from uncertainty in base parameters.
- Transformation, from dump site, inert material landfill [resources, land]: 4.5455e-5 m2; lognormal SD95 4.3339
  (same comment as for Transformation, to pasture, man made)
- Occupation, dump site [resources, land]: 0.00068182 m2a; lognormal SD95 2.5417
  occupation of landfill during operation phase of 15 years. Uncertainty calculated from uncertainty in base parameters.
- Waste mass, total, placed in landfill [resources, in ground]: 1 kg; lognormal SD95 1
  waste mass placed in construction waste landfill (for ecoscarcity LCIA only). uncertainty is low as functional unit.
- Organic carbon, placed in landfill [resources, in ground]: 0.43327 kg; lognormal SD95 1.3256
  organic carbon placed in construction waste landfill (for ecoscarcity LCIA only). uncertainty is derived from uncertainty in initial waste composition.

## Emissions to nature
- Beryllium [emissions to water, river]: 7.3898e-10 kg; lognormal SD95 20.243
  burden from short-term leachate to groundwater in uncontrolled landfill in moist cimate. Uncertainty calculated from unertainty of the waste composition of this waste and short-term leaching in landfill
- Chloride [emissions to water, river]: 0.0013506 kg; lognormal SD95 3.9779
  (same comment as for Beryllium)
- Manganese [emissions to water, groundwater, long-term]: 2.4554e-5 kg; lognormal SD95 10.909
  Emissions from long-term leachate (>100a) directly from construction waste landfill. Uncertainty calculated depending on waste input and uncertainty of long-term transfer coefficents in landfill.
- Cobalt [emissions to water, groundwater, long-term]: 1.6453e-7 kg; lognormal SD95 21.029
  (same comment as for Manganese)
- Antimony [emissions to water, river]: 9.8544e-11 kg; lognormal SD95 19.402
  (same comment as for Beryllium)
- Cadmium [emissions to water, groundwater, long-term]: 9.2536e-7 kg; lognormal SD95 12.338
  (same comment as for Manganese)
- TOC, Total Organic Carbon [emissions to water, groundwater, long-term]: 0.42792 kg; lognormal SD95 1.3258
  (same comment as for Manganese)
- Nitrate [emissions to water, groundwater, long-term]: 0.0097879 kg; lognormal SD95 4.3192
  (same comment as for Manganese)
- Arsenic [emissions to water, river]: 2.2261e-9 kg; lognormal SD95 18.383
  (same comment as for Beryllium)
- Mercury [emissions to water, groundwater, long-term]: 3.0034e-7 kg; lognormal SD95 13.817
  (same comment as for Manganese)
- Copper [emissions to water, groundwater, long-term]: 1.3009e-5 kg; lognormal SD95 10.195
  (same comment as for Manganese)
- Zinc [emissions to water, groundwater, long-term]: 4.2866e-5 kg; lognormal SD95 7.8458
  (same comment as for Manganese)
- Mercury [emissions to water, river]: 9.7014e-10 kg; lognormal SD95 19.781
  (same comment as for Beryllium)
- Chromium VI [emissions to water, groundwater, long-term]: 1.234e-6 kg; lognormal SD95 20.649
  (same comment as for Manganese)
- Manganese [emissions to water, river]: 4.0992e-8 kg; lognormal SD95 13.897
  (same comment as for Beryllium)
- BOD5, Biological Oxygen Demand [emissions to water, groundwater, long-term]: 0.26101 kg; lognormal SD95 1.3258
  (same comment as for Manganese)
- Tin [emissions to water, river]: 6.9918e-8 kg; lognormal SD95 13.361
  (same comment as for Beryllium)
- Copper [emissions to water, river]: 2.1717e-8 kg; lognormal SD95 14.816
  (same comment as for Beryllium)
- Strontium [emissions to water, groundwater, long-term]: 4.4733e-5 kg; lognormal SD95 7.9025
  (same comment as for Manganese)
- Cadmium [emissions to water, river]: 7.7701e-9 kg; lognormal SD95 16.501
  (same comment as for Beryllium)
- Hydrogen sulfide [emissions to water, groundwater, long-term]: 3.5178e-7 kg; lognormal SD95 4.6069
  (same comment as for Manganese)
- Sulfate [emissions to water, river]: 0.00029788 kg; lognormal SD95 5.7042
  (same comment as for Beryllium)
- COD, Chemical Oxygen Demand [emissions to water, river]: 0.02392 kg; lognormal SD95 3.317
  (same comment as for Beryllium)
- Hydrogen sulfide [emissions to water, river]: 2.0827e-8 kg; lognormal SD95 5.7042
  (same comment as for Beryllium)
- Lead [emissions to water, river]: 1.1164e-8 kg; lognormal SD95 15.799
  (same comment as for Beryllium)
- Strontium [emissions to water, river]: 2.7551e-7 kg; lognormal SD95 11.507
  (same comment as for Beryllium)
- Cobalt [emissions to water, river]: 2.7467e-10 kg; lognormal SD95 22.037
  (same comment as for Beryllium)
- Sulfate [emissions to water, groundwater, long-term]: 0.0050315 kg; lognormal SD95 4.6069
  (same comment as for Manganese)
- DOC, Dissolved Organic Carbon [emissions to water, river]: 0.0053513 kg; lognormal SD95 3.317
  (same comment as for Beryllium)
- Zinc [emissions to water, river]: 7.1563e-8 kg; lognormal SD95 13.154
  (same comment as for Beryllium)
- Beryllium [emissions to water, groundwater, long-term]: 4.4265e-7 kg; lognormal SD95 14.341
  (same comment as for Manganese)
- Barium [emissions to water, groundwater, long-term]: 5.7037e-5 kg; lognormal SD95 7.6606
  (same comment as for Manganese)
- Selenium [emissions to water, river]: 9.059e-10 kg; lognormal SD95 19.897
  (same comment as for Beryllium)
- Arsenic [emissions to water, groundwater, long-term]: 7.9395e-7 kg; lognormal SD95 12.417
  (same comment as for Manganese)
- Antimony [emissions to water, groundwater, long-term]: 4.5059e-9 kg; lognormal SD95 16.001
  (same comment as for Manganese)
- BOD5, Biological Oxygen Demand [emissions to water, river]: 0.003264 kg; lognormal SD95 3.317
  (same comment as for Beryllium)
- Chromium VI [emissions to water, river]: 2.2115e-9 kg; lognormal SD95 18.375
  (same comment as for Beryllium)
- Chloride [emissions to water, groundwater, long-term]: 0.0058227 kg; lognormal SD95 3.5967
  (same comment as for Manganese)
- DOC, Dissolved Organic Carbon [emissions to water, groundwater, long-term]: 0.42792 kg; lognormal SD95 1.3258
  (same comment as for Manganese)
- Ammonium, ion [emissions to water, river]: 4.5571e-6 kg; lognormal SD95 6.645
  (same comment as for Beryllium)
- Lead [emissions to water, groundwater, long-term]: 6.6875e-6 kg; lognormal SD95 13.196
  (same comment as for Manganese)
- Nickel [emissions to water, river]: 1.6603e-8 kg; lognormal SD95 15.242
  (same comment as for Beryllium)
- Barium [emissions to water, river]: 1.5639e-7 kg; lognormal SD95 12.162
  (same comment as for Beryllium)
- Tin [emissions to water, groundwater, long-term]: 6.6822e-6 kg; lognormal SD95 9.9504
  (same comment as for Manganese)
- Selenium [emissions to water, groundwater, long-term]: 4.9782e-7 kg; lognormal SD95 20.221
  (same comment as for Manganese)
- TOC, Total Organic Carbon [emissions to water, river]: 0.0053513 kg; lognormal SD95 3.317
  (same comment as for Beryllium)
- Nitrate [emissions to water, river]: 0.00010158 kg; lognormal SD95 6.645
  (same comment as for Beryllium)
- Nickel [emissions to water, groundwater, long-term]: 9.9452e-6 kg; lognormal SD95 9.4473
  (same comment as for Manganese)
- COD, Chemical Oxygen Demand [emissions to water, groundwater, long-term]: 1.9128 kg; lognormal SD95 1.3258
  (same comment as for Manganese)
- Ammonium, ion [emissions to water, groundwater, long-term]: 0.00043912 kg; lognormal SD95 4.3192
  (same comment as for Manganese)

## Sampling procedure
Landfill model based on average mineral building waste composition and observed average leachate concentrations from various literature sources. Extrapolated to 60'000 years heeding chemical characteristics and hydrology. Based on waste composition and climate data the end of carbonate phase of this landfill is estimated to be reached beyond 60'000 years.

## Uncertainty adjustments
uncertainty of waste input composition data derived from generic formula GSD(c) = N*ln(c)+1. *Mean* long-term emissions are the emissions until 60'000 years after waste placement. *Maximal* (upper bound) long-term emissions are the complete emissions of all landfilled material, depicting possible mechanical landfill failures and/or natural erosion not heeded in the mean value. Minimal long-term emissions are derived implicitly from the mean and maximal values assuming a lognormal distribution.

## Sources
- Doka G., 2020, 2020 - LCI exc. mat. constr. and dem. waste landfill - Doka, -, Doka LCA, Zuerich, CH
Doka G. (2020) Two models for waste-specific and climate-specific life cycle inventories of excavation material landfills and construction & demolition waste landfills. Doka LCA. Zürich, CH. http://www.doka.ch/publications.htm.
Type: Separate publication
First author: Doka G.
Year: 2020
Place of publication: Zürich, CH. http://www.doka.ch/publications.htm
Publisher: Doka LCA
Original title: Two models for waste-specific and climate-specific life cycle inventories of excavation material landfills and construction & demolition waste landfills
