# Petrol, 15% vol. ETBE additive, EtOH f. biomass, prod. RER, at service station

Dataset: EcoSpold 1, unit process
Functional unit: 1 kg
Category: fuels / oil\petrol
Geography: CH
Time period: 2000-01 to 2000-12
Production volume: Production volume of ETBE in RER was about 900 Ml, in 2004.
Share of production covered: 0 %
Generated by: Edgard Gnansounou
accessRestrictedTo: 0
copyright: true

## General comment
Inventory refers to the distribution of 1 kg unleaded gasoline blended with 15% vol. ethyl tert-butyl ether (ETBE) to the end user, in Switzerland. The fuel blend is imported from the European Union. Distribution to the final consumer (service station) including all necessary transports. Fossil and biogenic carbon contents are respectively 80.3% and 3.7%.;
CAS number: 000637-92-3;
Synonyms: 2-ethoxy-2-methylpropane, 2-methyl-2-ethoxypropane, ETBE, ethyl tert-butyl ether, ethyl tertiary butyl ether, ethyl tertio butyl ether, ethyl tert-butyl oxide, tert-butyl ethyl ether, alkohol, alcohol dehydrated, algrain, anhydrol, cologne spirit, cologne spirits (alcohol), denatured alcohol, ethyl alcohol, ethanol, ethanol 200 proof, ethanol absolute, ethyl hydrate, ethyl hydroxide, fermentation alcohol, grain alcohol, bioethanol, bio-ethanol;

## Included processes
This process includes the distribution of unleaded gasoline blended with 15% vol. ethyl tert-butyl ether (ETBE) to the the end user in CH, at the filling station. The fuel blend is imported from RER, mostly France, by train (165 km). Operation of storage tanks and petrol stations are taken into account. Emissions from evaporation and treatment of effluents are also included. Excluding emissions from car-washing at petrol stations.

## Geography
Mainly based on EU studies. ETBE is largely produced in France, Spain and possibly soon in Germany. The blend is here mainly imported from Feysin (F) to Geneva (165 km by train), then distributed in CH (100 km by rail and 150 km by road). Surveys for distribution mainly for DE and CH.

## Technology
Distribution of fuels

## Reference product
- Petrol, 15% vol. ETBE additive, EtOH f. biomass, prod. RER, at service station [CH]: 1 kg
  SWITZERLAND

## Inputs from technosphere
- Transport, freight, rail, electricity with shunting [CH]: 0.1 tkm; lognormal SD95 2.095
  (4,5,na,na,na,na); Based on ecoinvent Guidelines, standard distances
- Disposal, municipal solid waste, 22.9% water, to sanitary landfill [CH]: 6.27e-6 kg; lognormal SD95 1.2502
  (2,4,1,3,3,3); Environmental report for wastes
- Transport, freight, lorry, 16t-32t gross weight, fleet average [CH]: 0.15 tkm; lognormal SD95 2.095
  (4,5,na,na,na,na); Based on ecoinvent Guidelines, standard distances
- Regional distribution, oil products [RER]: 2.6205e-10 p; lognormal SD95 3.0584
  (3,na,1,3,3,na); Average data for petrol station
- Light fuel oil, burned in boiler 100kW, non-modulating [CH]: 0.000621 MJ; lognormal SD95 1.2502
  (2,4,1,3,3,3); Data for fuel distribution (storage and filling station)
- Tap water, at user [CH]: 0.000689 kg; lognormal SD95 1.2502
  (2,4,1,3,3,3); Data for petrol distribution
- Petrol, 15% vol. ETBE additive, with ethanol from biomass, at refinery [RER]: 1.0005 kg; lognormal SD95 1.05
  (1,1,1,1,1,1); Product plus losses
- Disposal, separator sludge, 90% water, to hazardous waste incineration [CH]: 0.000168 kg; lognormal SD95 1.2748
  (2,4,3,3,3,3); Sludge from storage, environmental report and literature
- Transport, freight, rail [RER]: 0.165 tkm; lognormal SD95 2.095
  (4,5,na,na,na,na); Assumption, standard distances
- Electricity, low voltage, at grid [CH]: 0.0067 kWh; lognormal SD95 1.2502
  (2,4,1,3,3,3); Data for fuel distribution (storage and filling station)
- Treatment, rainwater mineral oil storage, to wastewater treatment, class 2 [CH]: 7.5e-5 m3; lognormal SD95 1.3966
  (4,5,3,3,3,na); Treatment of rainwater with pollutants
- Treatment, sewage, to wastewater treatment, class 2 [CH]: 6.89e-7 m3; lognormal SD95 1.2502
  (2,4,1,3,3,3); Used water

## Emissions to nature
- Hydrocarbons, aromatic [emissions to air, high. pop.]: 4.5544e-5 kg; lognormal SD95 1.7026
  (4,5,2,5,3,4); Losses 0.05% according to product properties
- Methane, fossil [emissions to air, high. pop.]: 1.3663e-7 kg; lognormal SD95 1.7026
  (4,5,2,5,3,4); Losses 0.05% according to product properties
- Heat, waste [emissions to air, high. pop.]: 0.02412 MJ; lognormal SD95 1.1376
  (2,4,1,3,1,3); ecoinvent guidelines, calculation from electricity consumption and energy balance
- Hydrocarbons, aliphatic, alkanes, unspecified [emissions to air, high. pop.]: 0.0002491 kg; lognormal SD95 1.7026
  (4,5,2,5,3,4); Losses 0.05% according to product properties
- Toluene [emissions to air, high. pop.]: 2.2772e-5 kg; lognormal SD95 1.7026
  (4,5,2,5,3,4); Losses 0.05% according to product properties
- Hexane [emissions to air, high. pop.]: 5.9207e-6 kg; lognormal SD95 1.7026
  (4,5,2,5,3,4); Losses 0.05% according to product properties
- Xylene [emissions to air, high. pop.]: 5.0098e-5 kg; lognormal SD95 1.7026
  (4,5,2,5,3,4); Losses 0.05% according to product properties
- t-Butyl methyl ether [emissions to air, high. pop.]: 2.2772e-5 kg; lognormal SD95 1.7026
  (4,5,2,5,3,4); Losses 0.05% according to product properties
- Hydrocarbons, aliphatic, unsaturated [emissions to air, high. pop.]: 4.5544e-5 kg; lognormal SD95 1.7026
  (4,5,2,5,3,4); Losses 0.05% according to product properties
- Benzene [emissions to air, high. pop.]: 4.5544e-6 kg; lognormal SD95 1.7026
  (4,5,2,5,3,4); Losses 0.05% according to product properties
- Ethanol [emissions to air, high. pop.]: 3.5268e-5 kg; lognormal SD95 1.7026
  (4,5,2,5,3,4); Losses 0.05% according to product properties
- Benzene, ethyl- [emissions to air, high. pop.]: 9.5735e-6 kg; lognormal SD95 1.7026
  (4,5,2,5,3,4); Losses 0.05% according to product properties

## Sources
- Jungbluth N., Chudacoff M., Dauriat A., Dinkel F., Doka G., Faist Emmenegger M., Gnansounou E., Kljun N., Spielmann M., Stettler C., Sutter J., 2007, 2007 - LCI bioenergy - Jungbluth, Final report ecoinvent data v2.0, 17, Swiss Centre for LCI, ESU-services Ltd., Duebendorf and Uster, CH
Jungbluth N., Chudacoff M., Dauriat A., Dinkel F., Doka G., Faist Emmenegger M., Gnansounou E., Kljun N., Spielmann M., Stettler C., Sutter J. (2007) Life Cycle Inventories of Bioenergy. Final report ecoinvent data v2.0. Volume: 17. Swiss Centre for LCI, ESU. Duebendorf and Uster, CH.
Type: Measurement on site
Source: CD-ROM
First author: Jungbluth N.
Other authors: Chudacoff M., Dauriat A., Dinkel F., Doka G., Faist Emmenegger M., Gnansounou E., Kljun N., Spielmann M., Stettler C., Sutter J.
Year: 2007
Title of anthology: Final report ecoinvent data v2.0
Place of publication: Duebendorf and Uster, CH
Publisher: Swiss Centre for LCI, ESU
Volume No: 17

## Validation
Proof reading validation: Passed.; Other validation: none;
