# Molasses, from sugar beet, at sugar refinery

Dataset: EcoSpold 1, unit process
Functional unit: 1 kg
Category: agricultural / food\byproducts
Geography: CH
Time period: 2000-01 to 2000-12
Production volume: Production of sugar was 250 kt in Switzerland in 2004
Share of production covered: 0 %
Generated by: Edgard Gnansounou
accessRestrictedTo: 0
copyright: true

## General comment
Inventory refers to the production of 1 kg sugar, respectively 1 kg of molasses (72% dry matter) and 1 kg of pulps (25.6% dry matter). The multioutput-process 'sugar beet, in sugar refinery' delivers the co-products 'sugar, from sugar beet, at sugar refinery' and 'molasses, from sugar beet, at sugar refinery' and 'pulps, from sugar beet, at sugar refinery. Economic allocation with allocation factor for common stages of 91.7% to sugar, 4.5% to molasses and 3.8% to pulps. Allocation is done according to carbon balance for CO2 emissions.;

## Included processes
This dataset includes the transport of sugar beets to the sugar refinery, and the processing of sugar beets to sugar, molasses (72% dry matter) and pulps (25.6% dry matter). System boundary is at the sugar refinery. Treatment of waste effluents is included. Packaging of the sugar is not included.

## Geography
Data is from sugar producer in CH, industrial data

## Technology
Sweet juice is extracted from the sugar beets by diffusion. The juice is then purified and crystallized to sugar. Molasses come as a by-product of the crystallization process.

## Time period
Data from 1998 to 2005, typical technology for the production of sugar from sugar beet

## Reference product
- Molasses, from sugar beet, at sugar refinery [CH]: 1 kg
  SWITZERLAND

## Inputs from technosphere
- Limestone, milled, loose, at plant [CH]: 0.037631 kg; lognormal SD95 1.2077
  (1,1,1,1,1,5); Environmental report of Swiss sugar manufacturer
- Transport, freight, rail, electricity with shunting [CH]: 0.099995 tkm; lognormal SD95 2.0477
  (1,1,1,1,1,5); Environmental report of Swiss sugar manufacturer
- Chemicals inorganic, at plant [GLO]: 0.00017331 kg; lognormal SD95 1.2077
  (1,1,1,1,1,5); Environmental report of Swiss sugar manufacturer
- Electricity, medium voltage, at grid [CH]: 0.040129 kWh; lognormal SD95 1.2077
  (1,1,1,1,1,5); Environmental report of Swiss sugar manufacturer
- Sugar refinery [GLO]: 1.8376e-11 p; lognormal SD95 3.0454
  (1,1,1,1,1,5); Environmental report of Swiss sugar manufacturer
- Treatment, sewage, from residence, to wastewater treatment, class 2 [CH]: 0.0022202 m3; lognormal SD95 1.2077
  (1,1,1,1,1,5); Environmental report of Swiss sugar manufacturer
- Transport, freight, lorry, fleet average [CH]: 0.012471 tkm; lognormal SD95 2.0477
  (1,1,1,1,1,5); Environmental report of Swiss sugar manufacturer
- Sugar beets IP, at farm [CH]: 1.24711 kg; lognormal SD95 1.2077
  (1,1,1,1,1,5); Environmental report of Swiss sugar manufacturer
- Chemicals organic, at plant [GLO]: 0.00012036 kg; lognormal SD95 1.2077
  (1,1,1,1,1,5); Environmental report of Swiss sugar manufacturer
- Hard coal coke, at plant [RER]: 0.0032545 MJ; lognormal SD95 1.2077
  (1,1,1,1,1,5); Environmental report of Swiss sugar manufacturer
- Disposal, limestone residue, 5% water, to construction waste landfill [CH]: 0.045629 kg; lognormal SD95 1.2077
  (1,1,1,1,1,5); Environmental report of Swiss sugar manufacturer
- Sulphuric acid, liquid, at plant [RER]: 8.1844e-5 kg; lognormal SD95 1.2077
  (1,1,1,1,1,5); Environmental report of Swiss sugar manufacturer
- Soda, powder, at plant [RER]: 0.00044773 kg; lognormal SD95 1.2077
  (1,1,1,1,1,5); Environmental report of Swiss sugar manufacturer
- Heat, natural gas, at industrial furnace 1MW [CH]: 0.37884 MJ; lognormal SD95 1.2077
  (1,1,1,1,1,5); Environmental report of Swiss sugar manufacturer
- Transport, freight, lorry, 16t-32t gross weight, fleet average [CH]: 0.0020975 tkm; lognormal SD95 2.0477
  (1,1,1,1,1,5); Environmental report of Swiss sugar manufacturer
- Tap water, at user [CH]: 1.37482 kg; lognormal SD95 1.2077
  (1,1,1,1,1,5); Environmental report of Swiss sugar manufacturer

## Inputs from nature
- Carbon dioxide, in air [resources, in air]: 0.52949 kg; lognormal SD95 1.05
  (1,1,1,1,1,1); Calculation, to close carbon balance

## Emissions to nature
- Heat, waste [emissions to air, high. pop.]: 0.16086 MJ; lognormal SD95 1.1376
  (2,4,1,3,1,3); ecoinvent guidelines, calculation from electricity consumption and energy balance

## Sources
- Jungbluth N., Chudacoff M., Dauriat A., Dinkel F., Doka G., Faist Emmenegger M., Gnansounou E., Kljun N., Spielmann M., Stettler C., Sutter J., 2007, 2007 - LCI bioenergy - Jungbluth, Final report ecoinvent data v2.0, 17, Swiss Centre for LCI, ESU-services Ltd., Duebendorf and Uster, CH
Jungbluth N., Chudacoff M., Dauriat A., Dinkel F., Doka G., Faist Emmenegger M., Gnansounou E., Kljun N., Spielmann M., Stettler C., Sutter J. (2007) Life Cycle Inventories of Bioenergy. Final report ecoinvent data v2.0. Volume: 17. Swiss Centre for LCI, ESU. Duebendorf and Uster, CH.
Type: Measurement on site
Source: CD-ROM
First author: Jungbluth N.
Other authors: Chudacoff M., Dauriat A., Dinkel F., Doka G., Faist Emmenegger M., Gnansounou E., Kljun N., Spielmann M., Stettler C., Sutter J.
Year: 2007
Title of anthology: Final report ecoinvent data v2.0
Place of publication: Duebendorf and Uster, CH
Publisher: Swiss Centre for LCI, ESU
Volume No: 17

## Validation
Proof reading validation: Passed.; Other validation: none;
