# Disposal, glass, 0% water, to construction waste landfill

Dataset: EcoSpold 1, unit process
Functional unit: 1 kg
Category: waste management / construction waste landfill
Geography: CH
Time period: 2000-01 to 2000-12
Generated by: default
accessRestrictedTo: 0
copyright: true

## General comment
This dataset represents the activity of waste disposal of waste glass in a construction waste landfill. Recommended use of this dataset: For broken glass or reinforcement glass fibres from building material disposal. If really landfilled, this might also be used for packaging glass. Large amounts of separated packaging glass are likely to be recycled. Inventoried waste consists of fraction: 100% Glass; . Waste composition (wet, in ppm): upper heating value 0.1423 MJ/kg; lower heating value 0.04602 MJ/kg; H2O 20000; O 483070; H na; C na; S na; N na; P na; B na; Cl 195.89; Br na; F na; I na; Ag na; As na; Ba na; Cd na; Co na; Cr 303.63; Cu 7.8356; Hg na; Mn na; Mo na; Ni na; Pb 38.688; Sb na; Se na; Sn na; V na; Zn 3.9178; Be na; Sc na; Sr na; Ti na; Tl na; W na; Si 359090; Fe na; Ca 72818; Al na; K na; Mg na; Na 64472. Share of carbon in waste that is biogenic 60.4%.;;

## Included processes
Waste-specific short-term emissions via landfill leachate. Waste-specific long-term emissions from landfill. Land transformation and occupation. Waste placement and compaction. Landfill construction materials, sewer pipe for leachate, and access road.

## Technology
This is an inventory for a construction waste landfill (mostly mineral C&D waste, VVEA type B). Ultimate average landfill height is 11 meters. Operation phase duration is 15 years.

## Reference product
- Disposal, glass, 0% water, to construction waste landfill [CH]: 1 kg
  SWITZERLAND

## Inputs from technosphere
- Polyethylene, HDPE, granulate, at plant [RER]: 2.5439e-6 kg; lognormal SD95 3.1055
  for base drain system in landfill and sewer auxiliary materials. Uncertainty calculated from uncertainty in base parameters.
- Transport, freight, rail [RER]: 2.8427e-6 tkm; lognormal SD95 2.0832
  transport for landfill infrastructure materials. uncertainty calculated from uncertainty in transported goods
- Excavation, skid-steer loader [RER]: 0.00030229 m3; lognormal SD95 3.1055
  excavation work for landfill construction, sewer construction, waste placement and compaction, and landfill recultivation. Uncertainty calculated from uncertainty in base parameters.
- Tap water, at user [RER]: 0.00016406 kg; lognormal SD95 3.1055
  for sewer auxiliary materials. Uncertainty calculated from uncertainty in base parameters.
- Extrusion, plastic pipes [RER]: 2.5834e-6 kg; lognormal SD95 3.1055
  (same comment as for Polyethylene, HDPE, granulate, at plant)
- Reinforcing steel, at plant [RER]: 7.6971e-7 kg; lognormal SD95 3.1055
  for sewer auxiliary materials. Uncertainty calculated from uncertainty in base parameters.
- Polyvinylchloride, at regional storage [RER]: 1.9736e-8 kg; lognormal SD95 3.1055
  for sewer auxiliary materials. Uncertainty calculated from uncertainty in base parameters.
- Synthetic rubber, at plant [RER]: 7.8944e-9 kg; lognormal SD95 3.1055
  for sewer auxiliary materials. Uncertainty calculated from uncertainty in base parameters.
- Sand, at mine [CH]: 0.021824 kg; lognormal SD95 3.1055
  for landfill base layer and sewer auxiliary materials. Uncertainty calculated from uncertainty in base parameters.
- Chromium steel 18/8, at plant [RER]: 2.6841e-7 kg; lognormal SD95 3.1055
  for sewer auxiliary materials. Uncertainty calculated from uncertainty in base parameters.
- Polypropylene, granulate, at plant [RER]: 1.9736e-8 kg; lognormal SD95 3.1055
  for sewer auxiliary materials. Uncertainty calculated from uncertainty in base parameters.
- Bitumen, at refinery [CH]: 8.1169e-6 kg; lognormal SD95 3.1055
  for access street. Uncertainty calculated from uncertainty in base parameters.
- Concrete, sole plate and foundation, at plant [CH]: 1.156e-8 m3; lognormal SD95 3.1055
  for sewer pipe. Uncertainty calculated from uncertainty in base parameters.
- Gravel, round, at mine [CH]: 0.036583 kg; lognormal SD95 3.1055
  for access street, for recultivation layer. Uncertainty calculated from uncertainty in base parameters.
- Cast iron, at plant [RER]: 1.3026e-7 kg; lognormal SD95 3.1055
  for sewer auxiliary materials. Uncertainty calculated from uncertainty in base parameters.
- Excavation, hydraulic digger, average [CH]: 0.00030229 m3; lognormal SD95 3.1055
  (same comment as for Excavation, skid-steer loader)
- Transport, freight, lorry, 16t-32t gross weight, fleet average [CH]: 0.0036943 tkm; lognormal SD95 1.9032
  (same comment as for Transport, freight, rail)
- Diesel, burned in building machine, average [CH]: 1.9748e-6 MJ; lognormal SD95 3.1055
  construction diesel for access street and sewer construction. Uncertainty calculated from uncertainty in base parameters.

## Inputs from nature
- Waste mass, total, placed in landfill [resources, in ground]: 1 kg; lognormal SD95 1
  waste mass placed in construction waste landfill (for ecoscarcity LCIA only). uncertainty is low as functional unit.
- Transformation, to dump site, inert material landfill [resources, land]: 4.5455e-5 m2; lognormal SD95 4.3339
  for establishing the landfill. Uncertainty calculated from uncertainty in base parameters.
- Occupation, dump site [resources, land]: 0.00068182 m2a; lognormal SD95 2.5417
  occupation of landfill during operation phase of 15 years. Uncertainty calculated from uncertainty in base parameters.
- Transformation, to traffic area, road network [resources, land]: 2.1645e-7 m2; lognormal SD95 4.3339
  for access road to landfill. Uncertainty calculated from uncertainty in base parameters.
- Transformation, from pasture, man made [resources, land]: 4.5671e-5 m2; lognormal SD95 4.3339
  for establishing the landfill on open ground. Uncertainty calculated from uncertainty in base parameters.
- Transformation, from dump site, inert material landfill [resources, land]: 4.5455e-5 m2; lognormal SD95 4.3339
  recultivation of landfill after operation phase. Uncertainty calculated from uncertainty in base parameters.
- Occupation, traffic area, road network [resources, land]: 8.658e-6 m2a; lognormal SD95 2.5417
  for access road to landfill during construction, operation, and aftercare phase of 25 years. Uncertainty calculated from uncertainty in base parameters.
- Transformation, to pasture, man made [resources, land]: 4.5455e-5 m2; lognormal SD95 4.3339
  (same comment as for Transformation, from dump site, inert material landfill)

## Emissions to nature
- Lead [emissions to water, river]: 1.4913e-8 kg; lognormal SD95 15.362
  burden from short-term leachate to groundwater in uncontrolled landfill in moist cimate. Uncertainty calculated from unertainty of the waste composition of this waste and short-term leaching in landfill
- Copper [emissions to water, river]: 4.8463e-9 kg; lognormal SD95 17.105
  (same comment as for Lead)
- Silicon [emissions to water, river]: 1.4847e-5 kg; lognormal SD95 8.1576
  (same comment as for Lead)
- Sodium [emissions to water, river]: 0.00066084 kg; lognormal SD95 4.2527
  (same comment as for Lead)
- Chloride [emissions to water, river]: 3.6883e-5 kg; lognormal SD95 6.9642
  (same comment as for Lead)
- Sodium [emissions to water, groundwater, long-term]: 0.063678 kg; lognormal SD95 2.2384
  Emissions from long-term leachate (>100a) directly from construction waste landfill. Uncertainty calculated depending on waste input and uncertainty of long-term transfer coefficents in landfill.
- Zinc [emissions to water, groundwater, long-term]: 2.6517e-6 kg; lognormal SD95 10.926
  (same comment as for Sodium)
- Calcium [emissions to water, groundwater, long-term]: 0.056101 kg; lognormal SD95 2.2674
  (same comment as for Sodium)
- Zinc [emissions to water, river]: 4.4269e-9 kg; lognormal SD95 17.26
  (same comment as for Lead)
- Chloride [emissions to water, groundwater, long-term]: 0.00015901 kg; lognormal SD95 6.4912
  (same comment as for Sodium)
- Copper [emissions to water, groundwater, long-term]: 2.9029e-6 kg; lognormal SD95 12.028
  (same comment as for Sodium)
- Chromium VI [emissions to water, river]: 7.2668e-8 kg; lognormal SD95 13.1
  (same comment as for Lead)
- Calcium [emissions to water, river]: 9.3657e-5 kg; lognormal SD95 5.7891
  (same comment as for Lead)
- Silicon [emissions to water, groundwater, long-term]: 0.0088936 kg; lognormal SD95 41.011
  (same comment as for Sodium)
- Chromium VI [emissions to water, groundwater, long-term]: 4.0547e-5 kg; lognormal SD95 14.938
  (same comment as for Sodium)
- Lead [emissions to water, groundwater, long-term]: 8.933e-6 kg; lognormal SD95 12.806
  (same comment as for Sodium)

## Sampling procedure
Landfill model based on average mineral building waste composition and observed average leachate concentrations from various literature sources. Extrapolated to 60'000 years heeding chemical characteristics and hydrology. Based on waste composition and climate data the end of carbonate phase of this landfill is estimated to be reached beyond 60'000 years.

## Uncertainty adjustments
uncertainty of waste input composition data derived from generic formula GSD(c) = N*ln(c)+1. *Mean* long-term emissions are the emissions until 60'000 years after waste placement. *Maximal* (upper bound) long-term emissions are the complete emissions of all landfilled material, depicting possible mechanical landfill failures and/or natural erosion not heeded in the mean value. Minimal long-term emissions are derived implicitly from the mean and maximal values assuming a lognormal distribution.

## Sources
- Doka G., 2020, 2020 - LCI exc. mat. constr. and dem. waste landfill - Doka, -, Doka LCA, Zuerich, CH
Doka G. (2020) Two models for waste-specific and climate-specific life cycle inventories of excavation material landfills and construction & demolition waste landfills. Doka LCA. Zürich, CH. http://www.doka.ch/publications.htm.
Type: Separate publication
First author: Doka G.
Year: 2020
Place of publication: Zürich, CH. http://www.doka.ch/publications.htm
Publisher: Doka LCA
Original title: Two models for waste-specific and climate-specific life cycle inventories of excavation material landfills and construction & demolition waste landfills
