# xxx Methane, 96 vol-%, from sewage sludge, at purification

Dataset: EcoSpold 1, unit process, infrastructure
Functional unit: 1 m3
Category: energy, obsolete / others, obsolete
Geography: CH
Time period: 2004-01 to 2004-12
Share of production covered: 0 %
Generated by: Rolf Frischknecht
accessRestrictedTo: 0
copyright: true

## Geography
Conditions of cogeneration in Switzerland.

## Technology
Lambda 1-engine" with a catalytic converter

## Reference product
- xxx Methane, 96 vol-%, from sewage sludge, at purification [CH]: 1 m3

## Inputs from technosphere
- Facilities, chemical production [RER]: 4e-11 kg; lognormal SD95 3.0909
  (4,5,n.a,n.a,n.a,n.a); rough estimation
- Electricity, medium voltage, at grid [CH]: 0.5 kWh; lognormal SD95 2.0296
  (3,4,1,1,1,3); literature studies and own calculations (basic uncertainty is increased to 2.,0, in contrast to standard values)

## Emissions to nature
- Hydrogen sulfide [emissions to air, low. pop.]: 3.4875e-6 kg; lognormal SD95 1.1267
  (2,1,1,3,1,3); literature studies and own calculations (basic uncertainty is increased, in contrast to standard values)
- Sulfur dioxide [emissions to air, low. pop.]: 0.00055158 kg; lognormal SD95 1.1267
  (same comment as for Hydrogen sulfide)
- Methane, biogenic [emissions to air, low. pop.]: 0.022257 kg; lognormal SD95 1.1701
  (same comment as for Hydrogen sulfide)
- Heat, waste [emissions to air, low. pop.]: 1.8 MJ; lognormal SD95 2.0296
  (same comment as for Electricity, medium voltage, at grid)
- Carbon dioxide, biogenic [emissions to air, low. pop.]: 0.86586 kg; lognormal SD95 1.209
  (1,1,1,3,1,3); literature studies and own calculations (basic uncertainty is increased, in contrast to standard values)

## Sources
- Jungbluth N., Buesser S., Frischknecht R., Tuchschmid M., 2008, 2008 - LCA biomass-to-liquid fuels - Jungbluth, -, ESU-services Ltd., Uster, CH
Tuchschmid, M., Frischknecht, R. (2008) Bewertung von Biomasse. ESU. Uster, CH.
Type: Separate publication
Source: Report
First author: Tuchschmid, M.
Other authors: Frischknecht, R.
Year: 2008
Place of publication: Uster, CH
Publisher: ESU

## Validation
Proof reading validation: automatic validation in Excel
Other validation: none
