# Straw, from straw areas, at field

Dataset: EcoSpold 1, unit process
Functional unit: 1 kg
Category: agricultural / plant production
Geography: CH
Time period: 2000-01 to 2004-12
Share of production covered: 0 %
Generated by: Fredy Dinkel
accessRestrictedTo: 0
copyright: true

## General comment
Refers to 1 kg dry matter of fresh straw from straw areas with 1.66 kg CO2 and 17.6 MJ per kg dry matter. The dry matter content of fresh straw is about 15% the density about 120 kg/m3;
Synonyms: bedding, litter, mulch;

## Included processes
The inventories include the cultivation of straw on a straw area. Included steps are harvest and loading for transport.

## Technology
Extensiv organic procduction.

## Reference product
- Straw, from straw areas, at field [CH]: 1 kg
  SWITZERLAND

## Inputs from technosphere
- Fodder loading, by self-loading trailer [CH]: 0.056 m3; lognormal SD95 1.3078
  (2,2,1,3,3,5); Calculation with 15% dry matter content and density of about 120 kg/m3
- Mowing, by rotary mower [CH]: 0.0005 ha; lognormal SD95 1.3277
  (3,3,1,1,3,5); Calculation with 15% dry matter content and density of about 120 kg/m3

## Inputs from nature
- Energy, gross calorific value, in biomass [resources, biotic]: 17.6 MJ; lognormal SD95 1.0907
  (2,1,1,3,1,3); Calculation with 17.6 gross calorific energy content (Value for "Landschaftsheu" in Schriftenreihe "Nachwachsende Rohstoffe - Band 3 " 1995)
- Transformation, to pasture, man made, extensive [resources, land]: 0.1 m2; lognormal SD95 2.0612
  (3,2,1,1,1,5); Calculation for the cultivation of one ha during one year, life time of 50 years according the ecoinvent quality guidelines
- Transformation, from pasture, man made, extensive [resources, land]: 0.1 m2; lognormal SD95 2.0612
  (same comment as for Transformation, to pasture, man made, extensive)
- Occupation, pasture, man made, intensive [resources, land]: 5 m2a; lognormal SD95 1.5
  (1,1,1,1,1,1); Calculation for one ha cultivated during one year with a yield of 20 dt per year.
- Carbon dioxide, in air [resources, in air]: 1.65 kg; lognormal SD95 1.0907
  (2,1,1,3,1,3); Calculated with an uptake of 0.450 kg carbon per kg DM (value of 'Landschaftsheu', Schriftenreihe Nachwachsende Rohstoffe), resulting in 1.65 kg CO2 / kg DM

## Emissions to nature
- Cadmium [emissions to soil, agricultural]: -1.3e-7 kg; lognormal SD95 1.6367
  (2,1,4,3,3,4); Calculation input - output bilance using data about metal content of grass (Nemecek et al 2004)
- Dinitrogen monoxide [emissions to air, low. pop.]: 0.000165 kg; lognormal SD95 1.8431
  (2,1,3,3,4,5); Formula as in ecoinvent report 15, Kapitel 4.4 (Nemecek et al. 2004)
- Copper [emissions to soil, agricultural]: -8.6e-6 kg; lognormal SD95 1.6367
  (same comment as for Cadmium)
- Chromium [emissions to soil, agricultural]: -1.09e-6 kg; lognormal SD95 1.6367
  (same comment as for Cadmium)
- Lead [emissions to soil, agricultural]: -3.3e-6 kg; lognormal SD95 1.6367
  (same comment as for Cadmium)
- Mercury [emissions to soil, agricultural]: -1.5e-7 kg; lognormal SD95 1.6367
  (same comment as for Cadmium)
- Zinc [emissions to soil, agricultural]: -4e-5 kg; lognormal SD95 1.6367
  (same comment as for Cadmium)
- Phosphate [emissions to water, river]: 0.00017177 kg; lognormal SD95 1.8071
  (2,2,3,3,4,4); Formula as in ecoinvent report 15, Kapitel 4.4 (Nemecek et al. 2004)
- Nitrogen oxides [emissions to air, low. pop.]: 3.465e-5 kg; lognormal SD95 1.8431
  (2,1,3,3,4,5); Formula as in ecoinvent report 15, Kapitel 4.4 (Nemecek et al. 2004)
- Nickel [emissions to soil, agricultural]: -1.68e-6 kg; lognormal SD95 1.6367
  (same comment as for Cadmium)
- Phosphate [emissions to water, groundwater]: 6.871e-5 kg; lognormal SD95 1.8071
  (2,2,3,3,4,4); Formula as in ecoinvent report 15, Kapitel 4.4 (Nemecek et al. 2004)
- Phosphorus [emissions to water, river]: 2.3045e-6 kg; lognormal SD95 1.8071
  (2,2,3,3,4,4); Formula as in ecoinvent report 15, Kapitel 4.4 (Nemecek et al. 2004)

## Sampling procedure
Data were compiled from statistics, fertilising recommendations, documents from extension services and expert knowledge.

## Sources
- Jungbluth N., Chudacoff M., Dauriat A., Dinkel F., Doka G., Faist Emmenegger M., Gnansounou E., Kljun N., Spielmann M., Stettler C., Sutter J., 2007, 2007 - LCI bioenergy - Jungbluth, Final report ecoinvent data v2.0, 17, Swiss Centre for LCI, ESU-services Ltd., Duebendorf and Uster, CH
Jungbluth N., Chudacoff M., Dauriat A., Dinkel F., Doka G., Faist Emmenegger M., Gnansounou E., Kljun N., Spielmann M., Stettler C., Sutter J. (2007) Life Cycle Inventories of Bioenergy. Final report ecoinvent data v2.0. Volume: 17. Swiss Centre for LCI, ESU. Duebendorf and Uster, CH.
Type: Measurement on site
Source: CD-ROM
First author: Jungbluth N.
Other authors: Chudacoff M., Dauriat A., Dinkel F., Doka G., Faist Emmenegger M., Gnansounou E., Kljun N., Spielmann M., Stettler C., Sutter J.
Year: 2007
Title of anthology: Final report ecoinvent data v2.0
Place of publication: Duebendorf and Uster, CH
Publisher: Swiss Centre for LCI, ESU
Volume No: 17

## Validation
Proof reading validation: Passed.; Other validation: none;
