# Disposal of heating system, apartment building Rautistrasse

Dataset: EcoSpold 1, unit process
Functional unit: 1 m2
Category: waste management / building demolition
Geography: CH
Time period: 1994-01 to 2008-12
Generated by: Matthias Klingler
accessRestrictedTo: 0
copyright: true

## General comment
Disposal of components for the heating system;

## Included processes
Transport to dismantling facilities, machines for handling in sorting plant, electricity demand for sorting plant, final disposal of waste material. Cut-off to recycling for metals.

## Geography
Specific to the technology mix encountered in sorting plants in Switzerland.

## Technology
Disposal to a sorting plant assumed. Metal pieces, copper in cables and electronic devices are recycled, plastic parts are incinerated, inert wastes are landfilled.

## Time period
Amount of material investigated in 2013. Disposal technology mix as used in late 1990ies

## Reference product
- Disposal of heating system, apartment building Rautistrasse [CH]: 1 m2
  SWITZERLAND

## Inputs from technosphere
- Disposal of heat dissipation system, apartment building Rautistrasse [CH]: 1 m2; lognormal SD95 1
  (1,1,1,1,1,1); summation of subsystems, Basic uncertainty: set as 1.0
- Disposal of heat distribution system, apartment building Rautistrasse [CH]: 1 m2; lognormal SD95 1
  (1,1,1,1,1,1); summation of subsystems, Basic uncertainty: set as 1.0
- Disposal of borehole heat exchanger, apartment building Rautistrasse [CH]: 1 m2; lognormal SD95 1
  (1,1,1,1,1,1); summation of subsystems, Basic uncertainty: set as 1.0
- Disposal of heat production system, apartment building Rautistrasse [CH]: 1 m2; lognormal SD95 1
  (1,1,1,1,1,1); summation of subsystems, Basic uncertainty: set as 1.0

## Sampling procedure
Waste-specific calculation based on input data from call of bids for a heating system of a specific building.

## Sources
- Klingler M., Kasser U., Savi D., Primas A., Stettler Y., Gujer P., 2014, 2014 - LCA ventilation and heating systems - Klingler, Schlussbericht, BFE, Buero fuer Umweltchemie, B&H AG, Zuerich, CH
Klingler M., Kasser U., Savi D., Primas A., Stettler Y., Gujer P. (2014) Ökobilanzdaten für Lüftungs- und Wärmeanlagen. Schlussbericht, BFE. Bundesamt für Energie (BFE). Bern.
Type: Separate publication
Source: Report
First author: Klingler M.
Other authors: Kasser U., Savi D., Primas A., Stettler Y., Gujer P.
Year: 2014
Title of anthology: Schlussbericht, BFE
Place of publication: Bern
Publisher: Bundesamt für Energie (BFE)
