# Aluminium composite panel, at regional storage, with resource correction

Dataset: EcoSpold 1, unit process
Functional unit: 1 m2
Category: construction materials / aluminum composite panels
Geography: CH
Time period: 2000-01 to 2016-12
Generated by: Daniel Savi
accessRestrictedTo: 0
copyright: true

## General comment
Alu-Verbund-Fassadenplatte, Regionallager CH
Marktmix aus Platten mit flammgeschütztem und nicht flammgeschütztem Kern. Resource correction added for share of primary aluminium for KBOB recommendation 2016.
Mittlere Plattendicke 4 mm, Mittleres Flächengewicht 7.1 kg/m2,
Aludeckschichten 2.7 kg/m2, Kern 4.4 kg/m2
Version: 0.0

Local category: construction materials
Local subcategory: Alu-Verbundplatten

## Reference product
- Aluminium composite panel, at regional storage, with resource correction [CH]: 1 m2
  SWITZERLAND

## Inputs from technosphere
- Aluminium composite panel, transport DE->CH [RER]: 0.1125, 0.3375 m2 (2 entries); lognormal SD95 3.17129
  (5;5;5;5;5)
- Aluminium composite panel, transport ES->CH [RER]: 0.075, 0.025 m2 (2 entries); lognormal SD95 3.17129
  (5;5;5;5;5)
- Aluminium composite panel, packaging [RER]: 1 m2; lognormal SD95 2.5196
  (5;5;5;5;5)
- Aluminium composite panel FR, at plant [RER]: 0.75 m2; lognormal SD95 2.5196
  (5;5;5;5;5)
- Aluminium composite panel, at plant [RER]: 0.25 m2; lognormal SD95 2.5196
  (5;5;5;5;5)
- Aluminium composite panel FR, transport FR->CH [RER]: 0.3375 m2; lognormal SD95 3.17129
  (5;5;5;5;5)
- Aluminium composite panel, transport FR->CH [RER]: 0.1125 m2; lognormal SD95 3.17129
  (5;5;5;5;5)

## Inputs from nature
- Aluminium, resource correction [resources, unspecified]: -1.189 kg
  (1,1,1,1,1,1,BU:1.05); Aluminium production mix for Europe in 2013 according to Marlen Bertram, World Aluminium

## Sources
- Kasser U., R. Frischknecht, M. Klingler, D. Savi, R. Itten, F. Wyss,P. Stolz, L. Tschuemperlin, 2016, 2016 - Renewal and exp. of LCA data in KBOB - Kasser, -, Buero fuer Umweltchemie, treeze Ltd., Zuerich and Uster, CH
U. Kasser, R. Frischknecht, M. Klingler, D. Savi, R. Itten, F. Wyss,P. Stolz, L. Tschümperlin 2016 (2015Z) Erneuerung und Erweiterung der Ökobilanzdaten in der KBOB-Liste "Ökobilanzdaten im Baubereich", Projekt QualiBOB. unknown.

First author: U. Kasser, R. Frischknecht, M. Klingler, D. Savi, R. Itten, F. Wyss,P. Stolz, L. Tschümperlin 2016
Year: 2015Z
Place of publication: unknown
Original title: Erneuerung und Erweiterung der Ökobilanzdaten in der KBOB-Liste "Ökobilanzdaten im Baubereich", Projekt QualiBOB
