# Diesel, burned in agricultural machine

Dataset: EcoSpold 1, unit process
Functional unit: 1 kg
Category: agricultural / agricultural production\fuels
Geography: CH
Time period: 2014-01 to 2022-12
Generated by: Tanja Laube
accessRestrictedTo: 0
copyright: true

## General comment
This dataset represents the diesel demand in agricultural machinery and is valid for 1kg diesel, burned in agricultural machinery

## Geography
The inventory is modelled for Europe

## Reference product
- Diesel, burned in agricultural machine [CH]: 1 kg

## Inputs from technosphere
- Shed [CH]: 0.0018647 m2; lognormal SD95 3.09158
  (1,2,4,2,1,5,BU:3); ;
- Trailer, production [CH]: 0.55505 kg; lognormal SD95 3.05851
  (1,2,3,2,1,5,BU:3); ;
- Tractor, production [CH]: 0.083716 kg; lognormal SD95 3.05851
  (1,2,3,2,1,5,BU:3); ;
- xxx Diesel, at regional storage [CH]: 1 kg; lognormal SD95 1.30131
  (1,2,4,2,1,5,BU:1.05); ;

## Emissions to nature
- Selenium [emissions to air, low. pop.]: 1e-8 kg; lognormal SD95 5.10371
  (4,1,1,1,1,5,BU:5);
- PAH, polycyclic aromatic hydrocarbons [emissions to air, low. pop.]: 3.2798e-6 kg; lognormal SD95 3.0504
  (2,2,2,1,1,5,BU:3);
- Zinc [emissions to air, low. pop.]: 1e-6 kg; lognormal SD95 5.05742
  (2,2,2,1,1,5,BU:5);
- Particulates, < 2.5 um [emissions to air, low. pop.]: 0.0049083 kg; lognormal SD95 3.0504
  (2,2,2,1,1,5,BU:3);
- Zinc [emissions to soil, agricultural]: 0.00048165 kg; lognormal SD95 1.31639
  (4,1,1,1,1,5,BU:1.1);
- Dinitrogen monoxide [emissions to air, low. pop.]: 0.00011995 kg; lognormal SD95 1.5662
  (2,2,2,1,1,5,BU:1.5);
- Heat, waste [emissions to air, low. pop.]: 45.413 MJ; lognormal SD95 1.21919
  (2,2,2,1,1,5,BU:1.05);
- Lead [emissions to soil, agricultural]: 7.867e-7 kg; lognormal SD95 1.31639
  (4,1,1,1,1,5,BU:1.1);
- Benzo(a)pyrene [emissions to air, low. pop.]: 3.0046e-8 kg; lognormal SD95 3.0504
  (2,2,2,1,1,5,BU:3);
- Nitrogen oxides [emissions to air, low. pop.]: 0.038991 kg; lognormal SD95 1.63229
  (4,1,3,2,1,5,BU:1.5);
- Benzene [emissions to air, low. pop.]: 7.2936e-6 kg; lognormal SD95 3.0504
  (2,2,2,1,1,5,BU:3);
- Ammonia [emissions to air, low. pop.]: 2e-5 kg; lognormal SD95 1.3032
  (2,2,2,1,1,5,BU:1.2);
- Nickel [emissions to air, low. pop.]: 6.9954e-8 kg; lognormal SD95 5.05742
  (2,2,2,1,1,5,BU:5);
- Cadmium [emissions to air, low. pop.]: 1e-8 kg; lognormal SD95 5.05742
  (2,2,2,1,1,5,BU:5);
- Carbon dioxide, fossil [emissions to air, low. pop.]: 3.1193 kg; lognormal SD95 1.21919
  (2,2,2,1,1,5,BU:1.05);
- Carbon monoxide, fossil [emissions to air, low. pop.]: 0.0058716 kg; lognormal SD95 5.05742
  (2,2,2,1,1,5,BU:5);
- NMVOC, non-methane volatile organic compounds, unspecified origin [emissions to air, low. pop.]: 0.0021445 kg; lognormal SD95 1.63229
  (4,1,3,2,1,5,BU:1.5);
- Sulfur dioxide [emissions to air, low. pop.]: 0.0010092 kg; lognormal SD95 1.21919
  (2,2,2,1,1,5,BU:1.05);
- Methane, fossil [emissions to air, low. pop.]: 0.00012913 kg; lognormal SD95 1.5662
  (2,2,2,1,1,5,BU:1.5);
- Cadmium [emissions to soil, agricultural]: 1.789e-7 kg; lognormal SD95 1.31639
  (4,1,1,1,1,5,BU:1.1);
- Chromium [emissions to air, low. pop.]: 5e-8 kg; lognormal SD95 5.05742
  (2,2,2,1,1,5,BU:5);
- Copper [emissions to air, low. pop.]: 1.6995e-6 kg; lognormal SD95 5.05742
  (2,2,2,1,1,5,BU:5);

## Sampling procedure
The data is based on literature and expert judgements.

## Sources
- Kaegi T., Conte F., Laube T., Roberts G., 2022, 2022 - LCA strawberry and asparagus production - Kaegi, Carbotech on behalf of BAFU, Carbotech AG, Zuerich, CH

## Validation
15.08.2022 \\tsclient\Schreibtisch\WinShare\BAFU Gemuese\Spargeln und Erdbeeren\[EcoSpold_Bafu_Gemuese_Diesel burned in agricultural machine_CH v1.xlsx]X-Process
