# Particle board, UF-bound, coated, dry area

Dataset: EcoSpold 1, unit process
Functional unit: 1 kg
Category: construction materials / others
Geography: CH
Time period: 2010-01 to 2010-12
Share of production covered: 0 %
Generated by: Franziska Wyss
accessRestrictedTo: 0
copyright: true

## General comment
The materials reflect average construction materials in Switzerland and are based on Althaus H.-J., Lehmann M. (2010). Ökologische Baustoffliste (v2.2e).;

## Included processes
This data set includes the material use for the production or the disposal of building materials. Linked to updated LCI of particle boards from Ecoinvent data v3.2 for KBOB recommendation 2016.

## Geography
Data for Switzerland

## Reference product
- Particle board, UF-bound, coated, dry area [CH]: 1 kg

## Inputs from technosphere
- Acrylic varnish, 87.5% in H2O, at plant [RER]: 0.029412 kg; lognormal SD95 1.05
  (1,1,1,1,1,1,BU:1.05); ; Althaus H.-J., Lehmann M. (2010). Ökologische Baustoffliste (v2.2e),
- Particleboard, uncoated, average glue mix, at regional storage, with resource correction [CH]: 0.941184 kg; lognormal SD95 1.05
  (1,1,1,1,1,1,BU:1.05); ; ; Dichte: 640 kg/m3

## Sources
- Wyss F., 2015, 2015 - Case studies buildings - Wyss, Project report, 494, treeze Ltd., Uster, CH
Frischknecht R., Itten R., Wyss F. (2013) IEA Annex 57 Buildings. Project report. Volume: 494. treeze Ltd.. Uster, CH.
Type: Separate publication
Source: Report
First author: Frischknecht R.
Other authors: Itten R., Wyss F.
Year: 2013
Title of anthology: Project report
Place of publication: Uster, CH
Publisher: treeze Ltd.
Volume No: 494

## Validation
Proof reading validation: 11.12.2013; Other validation: \\Server\e\ESU-Docs\Projekte laufend\494 IEA Annex 57\EcoSpold\KBOB Liste\[494-Entsorgung-KBOB-Liste-Baumaterialien-EMPA-v0.11.xlsx]X-Process;
