# Transport, aircraft, passenger, long-haul, business

Dataset: EcoSpold 1, unit process
Functional unit: 1 personkm
Category: transport systems / airplane
Geography: RER
Time period: 2016-01 to 2019-12
Production volume: 145'594'000'000pkm
Share of production covered: 100 %
Generated by: Rolf Frischknecht
accessRestrictedTo: 0
copyright: true

## General comment
Inventory refers to the entire transport life cycle. Airport infrastructure expenditures and environmental interventions are accounted for using the yearly transport performance at uniqueairport in Zurich (73'526'350'051 pkm/a). Aircraft manufacturing is allocated based on the total life span of an aircraft (25'000 LTO), the average distance of a fligth (7850km) and allocated according to the area of a seat in the business class and its transport performance of business passenger (49p/unit);

## Included processes
The dataset describes the operation of aircrafts including taxying, take-off and landing covering fuel consumption and operation emissions. Aircraft manufacture and maintenance, airport construction, operation and dismantling are inputs to this dataset

## Technology
Aircraft operation modelled based on passenger aircrafts operated by Lufthansa Group in 2019. The emission profiles distinguish between LTO and cruise.

## Time period
Start date refers to emission factor data. End date refers to year of reporting fuel consumption and transport activities

## Reference product
- Transport, aircraft, passenger, long-haul, business [RER]: 1 personkm
  Europe

## Inputs from technosphere
- Kerosene, at regional storage [RER]: 0.047595 kg; lognormal SD95 1.2435
  (2,4,1,3,1,5,BU:1.05); ; Lufthansa Balance 2015, BLD 2014, pers. communication Lufthasa, Mail 20.8.2015
- Operation, maintenance, airport [RER]: 7.1821e-12 p; lognormal SD95 2.0646
  (2,4,1,3,1,5,BU:2); same as airport multipied by the lifetime of the airport of 100 years;
- Disposal, airport [RER]: 7.1821e-14 p; lognormal SD95 3.0616
  (2,4,1,3,1,5,BU:3); same as airport;
- Aircraft, long haul [RER]: 3.602e-11 p; lognormal SD95 3.0616
  (2,4,1,3,1,5,BU:3); Calculated based on the assumed numbers of LTOs in the life time of an aircraft of 25000LTO/airplane, an average load of 251 passengers or 12 tons of freight and an average distance of a flight of 7850km; For the effort of the maintenance 5% of the production is added; FAA (2010) Aging Airplane Program; Lufthansa Balance 2015
- Airport [RER]: 7.1821e-14 p; lognormal SD95 3.0616
  (2,4,1,3,1,5,BU:3); assumed yearly throughput airport: passenger 5608369 p and freight 423221t; Airport Zürich, yearly report 2019

## Emissions to nature
- Particulates, < 2.5 um [emissions to air, stratosphere + troposphere]: 8.864e-7 kg; lognormal SD95 3.1078
  (2,5,2,5,1,5,BU:3); ; 0
- Noise, aircraft, passenger [non material emissions, unspecified]: 1.6889 personkm; lognormal SD95 1.5
  (1,1,1,1,1,1,BU:1.5); ; Ecological Scarcity method 2013; Frischknecht & Büsser Knöpfel 2013
- Ethene [emissions to air, stratosphere + troposphere]: 2.0449e-6 kg; lognormal SD95 1.6375
  (2,5,2,5,1,5,BU:1.5); ; 0
- Sulfur dioxide [emissions to air, stratosphere + troposphere]: 3.6922e-5 kg; lognormal SD95 1.3297
  (2,5,2,5,1,5,BU:1.05); ; 0
- NMVOC, non-methane volatile organic compounds, unspecified origin [emissions to air, low. pop.]: 1.914e-6 kg; lognormal SD95 1.6375
  (2,5,2,5,1,5,BU:1.5); ; 0
- Butadiene [emissions to air, stratosphere + troposphere]: 2.1154e-7 kg; lognormal SD95 1.6375
  (2,5,2,5,1,5,BU:1.5); ; 0
- NMVOC, non-methane volatile organic compounds, unspecified origin [emissions to air, stratosphere + troposphere]: 1.1752e-5 kg; lognormal SD95 1.6375
  (2,5,2,5,1,5,BU:1.5); ; 0
- Water [emissions to air, low. pop.]: 0.0017705 kg; lognormal SD95 1.6375
  (2,5,2,5,1,5,BU:1.5); ; 0
- Nitrogen oxides [emissions to air, stratosphere + troposphere]: 0.00047737 kg; lognormal SD95 1.6375
  (2,5,2,5,1,5,BU:1.5); ; 0
- Butadiene [emissions to air, unspecified]: 5.2885e-8 kg; lognormal SD95 1.6375
  (2,5,2,5,1,5,BU:1.5); ; 0
- Heat, waste [emissions to air, unspecified]: 0.00042104 MJ; lognormal SD95 1.3297
  (2,5,2,5,1,5,BU:1.05); default value;
- Ethene [emissions to air, unspecified]: 5.1122e-7 kg; lognormal SD95 1.6375
  (2,5,2,5,1,5,BU:1.5); ; 0
- Carbon monoxide, fossil [emissions to air, low. pop.]: 1.8891e-5 kg; lognormal SD95 5.123
  (2,5,2,5,1,5,BU:5); ; 0
- Particulates, < 2.5 um [emissions to air, unspecified]: 2.216e-7 kg; lognormal SD95 3.1078
  (2,5,2,5,1,5,BU:3); ; 0
- Water [emissions to air, stratosphere + troposphere]: 0.045797 kg; lognormal SD95 1.6375
  (2,5,2,5,1,5,BU:1.5); ; 0
- Heat, waste [emissions to air, stratosphere + troposphere]: 0.0016842 MJ; lognormal SD95 1.3297
  (2,5,2,5,1,5,BU:1.05); default value;
- NMVOC, non-methane volatile organic compounds, unspecified origin [emissions to air, unspecified]: 2.938e-6 kg; lognormal SD95 1.6375
  (2,5,2,5,1,5,BU:1.5); ; 0
- Benzene [emissions to air, stratosphere + troposphere]: 2.2329e-7 kg; lognormal SD95 3.1078
  (2,5,2,5,1,5,BU:3); ; 0
- Nitrogen oxides [emissions to air, unspecified]: 0.00011934 kg; lognormal SD95 1.6375
  (2,5,2,5,1,5,BU:1.5); ; 0
- Sulfur dioxide [emissions to air, low. pop.]: 1.4301e-6 kg; lognormal SD95 1.3297
  (2,5,2,5,1,5,BU:1.05); ; 0
- Carbon monoxide, fossil [emissions to air, unspecified]: 1.752e-5 kg; lognormal SD95 5.123
  (2,5,2,5,1,5,BU:5); ; 0
- Nitrogen oxides [emissions to air, low. pop.]: 1.7763e-5 kg; lognormal SD95 1.6375
  (2,5,2,5,1,5,BU:1.5); ; 0
- Carbon monoxide, fossil [emissions to air, stratosphere + troposphere]: 7.0081e-5 kg; lognormal SD95 5.123
  (2,5,2,5,1,5,BU:5); ; 0
- Sulfur dioxide [emissions to air, unspecified]: 9.2306e-6 kg; lognormal SD95 1.3297
  (2,5,2,5,1,5,BU:1.05); ; 0
- Particulates, < 2.5 um [emissions to air, low. pop.]: 1.4278e-7 kg; lognormal SD95 3.1078
  (2,5,2,5,1,5,BU:3); ; 0
- Benzene [emissions to air, unspecified]: 5.5823e-8 kg; lognormal SD95 3.1078
  (2,5,2,5,1,5,BU:3); ; 0
- Water [emissions to air, unspecified]: 0.011449 kg; lognormal SD95 1.6375
  (2,5,2,5,1,5,BU:1.5); ; 0
- Carbon dioxide, fossil [emissions to air, stratosphere + troposphere]: 0.11634 kg; lognormal SD95 1.3297
  (2,5,2,5,1,5,BU:1.05); assumption: a share of of the crusie emission take place in the upper troposphere and lower stratosphere (this corresponds to a share of of the total emissions); 0
- Formaldehyde [emissions to air, stratosphere + troposphere]: 1.7628e-6 kg; lognormal SD95 1.6375
  (2,5,2,5,1,5,BU:1.5); ; 0
- Carbon dioxide, fossil [emissions to air, low. pop.]: 0.0044977 kg; lognormal SD95 1.3297
  (2,5,2,5,1,5,BU:1.05); assumption: a share of of the total emission occure during the LTO; for LTO emissions different emission factors are used than for cruise; 0
- Benzene [emissions to air, low. pop.]: 3.6366e-8 kg; lognormal SD95 3.1078
  (2,5,2,5,1,5,BU:3); ; 0
- Butadiene [emissions to air, low. pop.]: 3.4452e-8 kg; lognormal SD95 1.6375
  (2,5,2,5,1,5,BU:1.5); ; 0
- Particulates, < 2.5 um [emissions to air, low. pop.]: 5.3193e-8 kg; lognormal SD95 3.1078
  (2,5,2,5,1,5,BU:3); PM2.5 Emission of the abrasion during LTO ; 0
- Ethene [emissions to air, low. pop.]: 3.3304e-7 kg; lognormal SD95 1.6375
  (2,5,2,5,1,5,BU:1.5); ; 0
- Formaldehyde [emissions to air, low. pop.]: 2.871e-7 kg; lognormal SD95 1.6375
  (2,5,2,5,1,5,BU:1.5); ; 0
- Heat, waste [emissions to air, low. pop.]: 6.5109e-5 MJ; lognormal SD95 1.3297
  (2,5,2,5,1,5,BU:1.05); default value;
- Formaldehyde [emissions to air, unspecified]: 4.4071e-7 kg; lognormal SD95 1.6375
  (2,5,2,5,1,5,BU:1.5); ; 0
- Carbon dioxide, fossil [emissions to air, unspecified]: 0.029085 kg; lognormal SD95 1.3297
  (2,5,2,5,1,5,BU:1.05); assumption: a share of of the cruise emissione take place in the troposphere (this corresponds to a share of of the total emissions); 0

## Sampling procedure
fuel consumption is based on corporate data, emission profiles are based on FOEN statistics

## Extrapolations
Allocation between passengers and freight based on weight (average passenger weight between 158kg and 163kg); allocation between booking classes based on seat area.

## Sources
- Messmer A., Frischknecht R., 2016, 2016 - LCI air transport services - Messmer, Project report, 544, treeze Ltd., Uster, CH
Messmer A., Frischknecht R. (2015) Life cycle inventories of air transport services. Project report. Volume: 544. treeze Ltd.. Uster, CH.
Type: Separate publication
Source: Report
First author: Messmer A.
Other authors: Frischknecht R.
Year: 2015
Title of anthology: Project report
Place of publication: Uster, CH
Publisher: treeze Ltd.
Volume No: 544

## Validation
Proof reading validation: 09.03.2021; Other validation: G:\Projekte laufend\735 Aktualisierung Flugtransporte\EcoSpold\[735_aircraftTransport_2021_v0.10.xlsx]X-Process;
