# Cotton seed, at regional storehouse

Dataset: EcoSpold 1, unit process
Functional unit: 1 kg
Category: agricultural / plant production\seeds
Geography: US
Time period: 2005-01 to 2005-12
Share of production covered: 100 %
Generated by: Thomas Kaegi
accessRestrictedTo: 0
copyright: true

## General comment
Inventory refers to 1kg cotton seed, at regional storehouse. ;

## Included processes
The seed produced at the farm is transported to the processing centre, treated (pre-cleaning, cleaning, eventually drying, chemical dressing and bag filling), stored and afterwards transported to the regional storage centre.

## Geography
Refers to an average production in the USA

## Technology
conventional production typical for the country

## Reference product
- Cotton seed, at regional storehouse [US]: 1 kg
  UNITED STATES

## Inputs from technosphere
- Building, multi-storey [RER]: 2e-5 m3; lognormal SD95 1.0714
  (2,1,1,1,1,na)
- Cotton seed, at farm [US]: 1 kg; lognormal SD95 1.0714
  (2,1,1,1,1,na)
- Diphenylether-compounds, at regional storehouse [RER]: 0.0001 kg; lognormal SD95 1.2077
  (2,1,1,1,1,na)
- Transport, freight, lorry, fleet average [RER]: 0.2 tkm; lognormal SD95 1.0714
  (2,1,1,1,1,na)
- Electricity, low voltage, at grid [US]: 0.058 kWh; lognormal SD95 1.0714
  (2,1,1,1,1,na)

## Inputs from nature
- Occupation, construction site [resources, land]: 8e-6 m2a; lognormal SD95 1.5044
  (2,1,1,1,1,na)
- Transformation, to industrial area, built up [resources, land]: 4e-6 m2; lognormal SD95 2.0034
  (2,1,1,1,1,na)
- Transformation, from unknown [resources, land]: 4e-6 m2; lognormal SD95 2.0034
  (2,1,1,1,1,na)
- Occupation, industrial area, built up [resources, land]: 0.0002 m2a; lognormal SD95 1.5044
  (2,1,1,1,1,na)

## Emissions to nature
- Heat, waste [emissions to soil, agricultural]: 0.2088 MJ; lognormal SD95 1.0714
  (2,1,1,1,1,na)

## Sampling procedure
Data come from rape seed inventory and own estimation for transports.

## Sources
- Nemecek T., Kaegi T., 2007, 2007 - LCI agricultural prod. systems - Nemecek, Ecoinvent report version 2.0, 15, Swiss Centre for LCI, ART, Duebendorf and Zuerich, CH
Nemecek, T., Kägi, T., Blaser, S. (2007) Life Cycle Inventories of Agricultural Production Systems. Ecoinvent report version 2.0. Editors: 0. Volume: 15. Swiss Centre for LCI, ART. Duebendorf and Zurich, CH.
Type: Measurement on site
Source: CD-ROM
First author: Nemecek, T.
Other authors: Kägi, T., Blaser, S.
Year: 2007
Name of editors: 0
Title of anthology: Ecoinvent report version 2.0
Place of publication: Duebendorf and Zurich, CH
Publisher: Swiss Centre for LCI, ART
Volume No: 15

## Validation
Proof reading validation: Passed.; Other validation: none;
