# Natural gas, high pressure, at consumer

Dataset: EcoSpold 1, unit process
Functional unit: 1 MJ
Category: fuels / natural gas\gas to user
Geography: GLO
Time period: 2023 to 2024
Production volume: not known
Generated by: Niels Jungbluth
accessRestrictedTo: 0
copyright: true

## General comment
Infrastructure requirements are based on estimated standard capacity. The net calorific value of natural gas is 36.0 MJ/Nm³.

## Included processes
This dataset describes the structure of the Global gas mix with regard to the countries of origin and the energy requirements and the emissions of the high pressure distribution network.

## Geography
Energy requirements and emissions are based on Swiss data. Calculations include production and transport of natural gas from 42 countries.

## Technology
The quantity of gas delivered in the high pressure network is estimated. Industry, power plants and half of commercial and of other sectors are assumed to consume high pressure gas.

## Time period
Energy requirements are from 2019 and leakage data are from 2018. Trade movements investigated for 2023.

## Reference product
- Natural gas, high pressure, at consumer [GLO]: 1 MJ

## Inputs from technosphere
- Natural gas, high pressure, at consumer [GLO]: 0.0010457 MJ; lognormal SD95 1.5688
  (4,3,5,3,1,BU:1.05); natural gas input
- Natural gas, burned in gas turbine [GLO]: 0.0049022 MJ; lognormal SD95 1.3042
  (4,2,2,3,3,BU:1.05); Qualified estimates from different gas companies
- Pipeline, natural gas, high pressure distribution network [CH]: 1.0666e-9 km; lognormal SD95 3.321
  (4,3,5,3,3,BU:3); based on estimated standard capacity
- Natural gas, production AE, at long-distance pipeline [GLO]: 0.014318 MJ; lognormal SD95 1.596
  (1,1,1,1,3,BU:1.05); Eurostat 2024 for European countries, EI 2024 for other countries and regions
- Natural gas, production AO, at long-distance pipeline [GLO]: 0.0013563 MJ; lognormal SD95 1.2077
  (same comment as for Natural gas, production AE, at long-distance pipeline)
- Natural gas, production AR, at long-distance pipeline [GLO]: 0.010716 MJ; lognormal SD95 1.2077
  (same comment as for Natural gas, production AE, at long-distance pipeline)
- Natural gas, production AU, at long-distance pipeline [GLO]: 0.039104 MJ; lognormal SD95 1.2077
  (same comment as for Natural gas, production AE, at long-distance pipeline)
- Natural gas, production AZ, at long-distance pipeline [GLO]: 0.0091634 MJ; lognormal SD95 1.2077
  (same comment as for Natural gas, production AE, at long-distance pipeline)
- Natural gas, production BO, at long-distance pipeline [GLO]: 0.0030775 MJ; lognormal SD95 1.2077
  (same comment as for Natural gas, production AE, at long-distance pipeline)
- Natural gas, production BR, at long-distance pipeline [GLO]: 0.0060361 MJ; lognormal SD95 1.2077
  (same comment as for Natural gas, production AE, at long-distance pipeline)
- Natural gas, production CA, at long-distance pipeline [GLO]: 0.049028 MJ; lognormal SD95 1.2077
  (same comment as for Natural gas, production AE, at long-distance pipeline)
- Natural gas, production CN, at long-distance pipeline [GLO]: 0.060369 MJ; lognormal SD95 1.2077
  (same comment as for Natural gas, production AE, at long-distance pipeline)
- Natural gas, production CO, at long-distance pipeline [GLO]: 0.0031082 MJ; lognormal SD95 1.2077
  (same comment as for Natural gas, production AE, at long-distance pipeline)
- Natural gas, production DE, at long-distance pipeline [GLO]: 0.00098085 MJ; lognormal SD95 1.2077
  (same comment as for Natural gas, production AE, at long-distance pipeline)
- Natural gas, production DZ, at long-distance pipeline [GLO]: 0.026168 MJ; lognormal SD95 1.2077
  (same comment as for Natural gas, production AE, at long-distance pipeline)
- Natural gas, production EG, at long-distance pipeline [GLO]: 0.014715 MJ; lognormal SD95 1.2077
  (same comment as for Natural gas, production AE, at long-distance pipeline)
- Natural gas, production GB, at long-distance pipeline [GLO]: 0.0088838 MJ; lognormal SD95 1.2077
  (same comment as for Natural gas, production AE, at long-distance pipeline)
- Natural gas, production GQ, at long-distance pipeline [GLO]: 0.0019842 MJ; lognormal SD95 1.2077
  (same comment as for Natural gas, production AE, at long-distance pipeline)
- Natural gas, production ID, at long-distance pipeline [GLO]: 0.016561 MJ; lognormal SD95 1.2077
  (same comment as for Natural gas, production AE, at long-distance pipeline)
- Natural gas, production IN, at long-distance pipeline [GLO]: 0.0081397 MJ; lognormal SD95 1.2077
  (same comment as for Natural gas, production AE, at long-distance pipeline)
- Natural gas, production IQ, at long-distance pipeline [GLO]: 0.002559 MJ; lognormal SD95 1.2077
  (same comment as for Natural gas, production AE, at long-distance pipeline)
- Natural gas, production IR, at long-distance pipeline [GLO]: 0.064858 MJ; lognormal SD95 1.2077
  (same comment as for Natural gas, production AE, at long-distance pipeline)
- Natural gas, production IT, at long-distance pipeline [GLO]: 0.00073349 MJ; lognormal SD95 1.2077
  (same comment as for Natural gas, production AE, at long-distance pipeline)
- Natural gas, production KW, at long-distance pipeline [GLO]: 0.0034865 MJ; lognormal SD95 1.2077
  (same comment as for Natural gas, production AE, at long-distance pipeline)
- Natural gas, production KZ, at long-distance pipeline [GLO]: 0.0079431 MJ; lognormal SD95 1.2077
  (same comment as for Natural gas, production AE, at long-distance pipeline)
- Natural gas, production LY, at long-distance pipeline [GLO]: 0.0042025 MJ; lognormal SD95 1.2077
  (same comment as for Natural gas, production AE, at long-distance pipeline)
- Natural gas, production MX, at long-distance pipeline [GLO]: 0.0091713 MJ; lognormal SD95 1.2077
  (same comment as for Natural gas, production AE, at long-distance pipeline)
- Natural gas, production MY, at long-distance pipeline [GLO]: 0.020893 MJ; lognormal SD95 1.2077
  (same comment as for Natural gas, production AE, at long-distance pipeline)
- Natural gas, production NG, at long-distance pipeline [GLO]: 0.01126 MJ; lognormal SD95 1.2077
  (same comment as for Natural gas, production AE, at long-distance pipeline)
- Natural gas, production NL, at long-distance pipeline [GLO]: 0.0025391 MJ; lognormal SD95 1.2077
  (same comment as for Natural gas, production AE, at long-distance pipeline)
- Natural gas, production NO, at long-distance pipeline [GLO]: 0.030057 MJ; lognormal SD95 1.2077
  (same comment as for Natural gas, production AE, at long-distance pipeline)
- Natural gas, production OM, at long-distance pipeline [GLO]: 0.011121 MJ; lognormal SD95 1.2077
  (same comment as for Natural gas, production AE, at long-distance pipeline)
- Natural gas, production PE, at long-distance pipeline [GLO]: 0.0039751 MJ; lognormal SD95 1.2077
  (same comment as for Natural gas, production AE, at long-distance pipeline)
- Natural gas, production PL, at long-distance pipeline [GLO]: 0.00092696 MJ; lognormal SD95 1.2077
  (same comment as for Natural gas, production AE, at long-distance pipeline)
- Natural gas, production QA, at long-distance pipeline [GLO]: 0.046638 MJ; lognormal SD95 1.2077
  (same comment as for Natural gas, production AE, at long-distance pipeline)
- Natural gas, production RO, at long-distance pipeline [GLO]: 0.0022864 MJ; lognormal SD95 1.2077
  (same comment as for Natural gas, production AE, at long-distance pipeline)
- Natural gas, production RU, at long-distance pipeline [GLO]: 0.15111 MJ; lognormal SD95 1.2077
  (same comment as for Natural gas, production AE, at long-distance pipeline)
- Natural gas, production SA, at long-distance pipeline [GLO]: 0.02941 MJ; lognormal SD95 1.2077
  (same comment as for Natural gas, production AE, at long-distance pipeline)
- Natural gas, production TH, at long-distance pipeline [GLO]: 0.006613 MJ; lognormal SD95 1.2077
  (same comment as for Natural gas, production AE, at long-distance pipeline)
- Natural gas, production TM, at long-distance pipeline [GLO]: 0.019662 MJ; lognormal SD95 1.2077
  (same comment as for Natural gas, production AE, at long-distance pipeline)
- Natural gas, production TT, at long-distance pipeline [GLO]: 0.0064409 MJ; lognormal SD95 1.2077
  (same comment as for Natural gas, production AE, at long-distance pipeline)
- Natural gas, production UA, at long-distance pipeline [GLO]: 0.0045608 MJ; lognormal SD95 1.2077
  (same comment as for Natural gas, production AE, at long-distance pipeline)
- Natural gas, production US, at long-distance pipeline [GLO]: 0.2668 MJ; lognormal SD95 1.2077
  (same comment as for Natural gas, production AE, at long-distance pipeline)
- Natural gas, production UZ, at long-distance pipeline [GLO]: 0.011392 MJ; lognormal SD95 1.2077
  (same comment as for Natural gas, production AE, at long-distance pipeline)
- Natural gas, production VE, at long-distance pipeline [GLO]: 0.0076495 MJ; lognormal SD95 1.2077
  (same comment as for Natural gas, production AE, at long-distance pipeline)

## Emissions to nature
- Methane, fossil [emissions to air, low. pop.]: 1.9255e-5 kg; lognormal SD95 1.5681
  (2,3,4,1,1,BU:1.5); Calculated based on leakage and average gas composition
- Ethane [emissions to air, low. pop.]: 1.5948e-6 kg; lognormal SD95 1.5681
  (2,3,4,1,1,BU:1.5); Calculated based on leakage and average gas composition
- Propane [emissions to air, low. pop.]: 3.5882e-7 kg; lognormal SD95 1.5681
  (2,3,4,1,1,BU:1.5); Calculated based on leakage and average gas composition
- Butane [emissions to air, low. pop.]: 1.8451e-7 kg; lognormal SD95 1.5681
  (2,3,4,1,1,BU:1.5); Calculated based on leakage and average gas composition
- NMVOC, non-methane volatile organic compounds, unspecified origin [emissions to air, low. pop.]: 1.3286e-8 kg; lognormal SD95 1.5681
  (2,3,4,1,1,BU:1.5); Calculated based on leakage and average gas composition
- Carbon dioxide, fossil [emissions to air, low. pop.]: 6.6606e-7 kg; lognormal SD95 1.2226
  (2,3,4,1,1,BU:1.05); Calculated based on leakage and average gas composition

## Sampling procedure
Literature. Online calculators for distances.The consumption mix is calculated based on international trade statistics for 2023.

## Sources
- Meili C., Jungbluth N., Bussa M., Stefanel A., 2025, 2025 - LCI long-distance transport crude oil - Meili, Project report, 234, ESU-services Ltd., Schaffhausen, CH
- Bussa M., Jungbluth N., Meili C., 2025, 2025 - LCI long-dist. transp. and distrib. natural gas - Bussa, Project report, 234, ESU-services Ltd., Schaffhausen, CH

## Validation
Passed.
https://esuservices-my.sharepoint.com/personal/jungbluth_esu-services_ch/Documents/ESU-intern/565 Beratung BAFU/EcoSpoldDataXML/[565-EcoSpold-gas-transport-2025-v2.0.xlsb]X-Process
