# Heat, at 10.5 m2 evacuated tube collector, glass-glass tube, one-family house, for combined system

Dataset: EcoSpold 1, unit process
Functional unit: 1 MJ
Category: heat / solar
Geography: CH
Time period: 2010-01 to 2010-12
Production volume: Total solar heat delivered by evacuated tube collectors in 2001 was 2.3TJ.
Generated by: Matthias Stucki
accessRestrictedTo: 0
copyright: true

## General comment
Use of a solar system with glass-glass pipes excluding the necessary auxiliary heating. The simulation is made for heat pipe solar collector systems in the city of Zurich. The annual irradiation amounts to 1249 kWh/m2. 33% solar fraction, 35° inclination, 22° southeast orientation.;
Synonyms: Sidney collector, China collector;

## Included processes
Delivery of heat with a solar system including maintenance and electricity use for operation. Excluding the necessary auxiliary heating. Rough assumption for a glass-glass tube collector system by considering a heat pipe system correcting the life time from 25 years to 20 years.

## Geography
Solar collector system operated in CH.

## Technology
Solar collector system for hot water installed on the roof of a house.

## Time period
Time of simulation.

## Reference product
- Heat, at 10.5 m2 evacuated tube collector, glass-glass tube, one-family house, for combined system [CH]: 1 MJ
  SWITZERLAND

## Inputs from technosphere
- Electricity, low voltage, at grid [CH]: 0.0075797 kWh; lognormal SD95 1.0714
  (2,na,1,1,1,na); Simulation
- Transport, freight, lorry, 3.5t gross weight, fleet average [CH]: 0.00018557 tkm; lognormal SD95 3.0033
  (2,na,1,1,1,na); 250km per plant for maintenance
- Solar system, 10.5 m2 evacuated tube collector, one-family house, combined system [CH]: 3.4366e-6 p; lognormal SD95 3.0033
  (2,na,1,1,1,na); Simulation

## Inputs from nature
- Energy, solar, converted [resources, in air]: 1.5095 MJ; lognormal SD95 1.0714
  (2,na,1,1,1,na); Includes losses in the system

## Emissions to nature
- Heat, waste [emissions to air, high. pop.]: 1.5368 MJ; lognormal SD95 1.0714
  (2,na,1,1,1,na); Simulation and solar energy

## Sampling procedure
Own simulation.

## Sources
- Stucki M., Jungbluth N., 2012, 2012 - Update LCI solar collectors - Stucki, -, 352, ESU-services Ltd., Uster, CH
Stucki M., Jungbluth N. (2010) Update of the Life Cycle Inventories of Solar Collectors. Volume: 352. ESU-services Ltd.. Uster, CH.
Type: Separate publication
First author: Stucki M.
Other authors: Jungbluth N.
Year: 2010
Place of publication: Uster, CH
Publisher: ESU-services Ltd.
Volume No: 352

## Validation
Proof reading validation: 40529; Other validation: \\Server\E\ESU-Docs\Projekte laufend\352 Sonnenkollektoranlagen\Berechnung\[neueingabe-Kollektoren-2.2+V1.0.xlsx]X-Process;
