# Pump station

Dataset: EcoSpold 1, unit process, infrastructure
Functional unit: 1 p
Category: water / drinking water\infrastructure
Geography: CH
Time period: 2000-01 to 2000-12
Production volume: 644546 m3 per year
Share of production covered: 9 %
Generated by: Niels Jungbluth
accessRestrictedTo: 0
copyright: true

## General comment
Estimation for a pump station in Marin (NE) with a capacity of 644546 m3 per year. Life time 70 years.;

## Included processes
Materials, transports, disposal for the infrastructure. Estimation for land use. No data for construction work.

## Technology
pump station

## Time period
Time of publication.

## Reference product
- Pump station [CH]: 1 p
  SWITZERLAND

## Inputs from technosphere
- Concrete, normal, at plant [CH]: 227.47 m3; lognormal SD95 1.2226
  (2,3,1,1,1,5); Literature
- Disposal, building, reinforced concrete, to sorting plant [CH]: 535870 kg; lognormal SD95 1.2226
  (2,3,1,1,1,5); Estimation for materials used
- Steel, low-alloyed, at plant [RER]: 3216 kg; lognormal SD95 1.2226
  (2,3,1,1,1,5); Literature
- Aluminium, production mix, at plant [RER]: 11 kg; lognormal SD95 1.2226
  (2,3,1,1,1,5); Literature
- Cast iron, at plant [RER]: 4492 kg; lognormal SD95 1.2226
  (2,3,1,1,1,5); Literature
- Reinforcing steel, at plant [RER]: 17968 kg; lognormal SD95 1.2226
  (2,3,1,1,1,5); Literature
- Disposal, building, glass pane (in burnable frame), to final disposal [CH]: 323 kg; lognormal SD95 1.2226
  (2,3,1,1,1,5); Estimation for materials used
- Flat glass, coated, at plant [RER]: 323 kg; lognormal SD95 1.2226
  (2,3,1,1,1,5); Literature
- Synthetic rubber, at plant [RER]: 0.42 kg; lognormal SD95 1.2226
  (2,3,1,1,1,5); Literature
- Transport, freight, lorry, 16t-32t gross weight, fleet average [CH]: 14760 tkm; lognormal SD95 2.095
  (4,5,na,na,na,na); Standard distance 50km
- Copper, at regional storage [RER]: 861 kg; lognormal SD95 1.2226
  (2,3,1,1,1,5); Literature
- Bronze, at plant [CH]: 1.05 kg; lognormal SD95 1.2226
  (2,3,1,1,1,5); Literature
- Transport, freight, rail, electricity with shunting [CH]: 48509 tkm; lognormal SD95 2.095
  (4,5,na,na,na,na); Standard distance 600km
- Cement, unspecified, at plant [CH]: 52812 kg; lognormal SD95 1.2226
  (2,3,1,1,1,5); Literature
- Polyvinylchloride, bulk polymerised, at plant [RER]: 1164 kg; lognormal SD95 1.2226
  (2,3,1,1,1,5); Literature
- Disposal, building, reinforcement steel, to sorting plant [CH]: 4492 kg; lognormal SD95 1.2226
  (2,3,1,1,1,5); Estimation for materials used
- Brass, at plant [CH]: 0.63 kg; lognormal SD95 1.2226
  (2,3,1,1,1,5); Literature
- Poor concrete, at plant [CH]: 16.105 m3; lognormal SD95 1.2226
  (2,3,1,1,1,5); Literature
- Disposal, building, cement (in concrete) and mortar, to sorting plant [CH]: 52812 kg; lognormal SD95 1.2226
  (2,3,1,1,1,5); Estimation for materials used
- Disposal, rubber, unspecified, 0% water, to municipal incineration [CH]: 0.42 kg; lognormal SD95 1.2226
  (2,3,1,1,1,5); Estimation for materials used
- Disposal, polyvinylchloride, 0.2% water, to municipal incineration [CH]: 1164 kg; lognormal SD95 1.2226
  (2,3,1,1,1,5); Estimation for materials used

## Inputs from nature
- Occupation, industrial area [resources, land]: 43750 m2a; lognormal SD95 1.7743
  (5,na,1,1,1,na); Rough estimation for 70a life time
- Transformation, to industrial area [resources, land]: 625 m2; lognormal SD95 2.2323
  (5,na,1,1,1,na); Rough estimation
- Transformation, from unknown [resources, land]: 625 m2; lognormal SD95 2.2323
  (5,na,1,1,1,na); Rough estimation

## Sampling procedure
Literature and own estimations

## Extrapolations
From single data to Swiss situation.

## Sources
- Althaus H.-J., Chudacoff M., Hellweg S., Hischier R., Jungbluth N., Osses M., Primas A., 2007, 2007 - LCI chemicals - Althaus, Final report ecoinvent data v2.0, 8, Swiss Centre for LCI, Empa - TSL, ETH, ESU-services Ltd., Chudacoff Oekoscience, Duebendorf, CH
Althaus H.-J., Chudacoff M., Hischier R., Jungbluth N., Osses M., Primas A. (2007) Life Cycle Inventories of Chemicals. Final report ecoinvent data v2.0. Volume: 8. Swiss Centre for LCI, Empa - TSL. Dübendorf, CH.
Type: Measurement on site
Source: CD-ROM
First author: Althaus H.-J.
Other authors: Chudacoff M., Hischier R., Jungbluth N., Osses M., Primas A.
Year: 2007
Title of anthology: Final report ecoinvent data v2.0
Place of publication: Dübendorf, CH
Publisher: Swiss Centre for LCI, Empa - TSL
Volume No: 8

## Validation
Proof reading validation: Passed; Other validation: none;
