# Mine, iron

Dataset: EcoSpold 1, unit process, infrastructure
Functional unit: 1 p
Category: metals / ferro\production\infrastructure
Geography: GLO
Time period: 2000-01 to 2000-12
Generated by: Hans-Joerg Althaus
accessRestrictedTo: 0
copyright: true

## General comment
These data are a rough assumption. Yearly output is 40000000000 kg, life Time 30 years
Technology: Buildings and stationary machines.
Version: 2.2

Production volume: unknown
Local category: Metalle
Local subcategory: Gewinnung

## Included processes
Infrastructure of the mine (without land use of the open mine itself) and of the enrichment plant.

## Technology
Buildings and stationary machines.

## Reference product
- Mine, iron [GLO]: 1 p
  Global

## Inputs from technosphere
- Building, hall [CH]: 40000 m2; lognormal SD95 5
  (5,nA,nA,nA,nA,nA,9); rough estimation
- Industrial machine, heavy, unspecified, at plant [RER]: 200000 kg; lognormal SD95 5
  (5,nA,nA,nA,nA,nA,9); rough estimation
- Building, multi-storey [RER]: 10000 m3; lognormal SD95 5
  (5,nA,nA,nA,nA,nA,9); rough estimation

## Inputs from nature
- Transformation, to industrial area, built up [resources, land]: 50000 m2; lognormal SD95 5
  (5,nA,nA,nA,nA,nA,8); rough estimation
- Occupation, industrial area, built up [resources, land]: 1.5e6 m2a; lognormal SD95 5
  (5,nA,nA,nA,nA,nA,7); rough estimation
- Transformation, from unknown [resources, land]: 50000 m2; lognormal SD95 5
  (5,nA,nA,nA,nA,nA,8); rough estimation

## Sampling procedure
estimation

## Sources
- Classen M., Althaus H.-J., Blaser S., Scharnhorst W., Tuchschmid M., Jungbluth N., Faist Emmenegger M., 2009, 2009 - LCI metals - Classen, Final report ecoinvent data v2.1, 10, Swiss Centre for LCI, Empa, ESU-services Ltd., Duebendorf, CH
Classen M., Althaus H.-J., Blaser S., Doka G., Jungbluth N., Tuchschmid M. (2008) Life Cycle Inventories of Metals. Final report ecoinvent data v2.1. Volume: 10. Issue: 0. Swiss Centre for LCI, Empa - TSL. Dübendorf, CH.
Type: Measurement on site
Source: CD-ROM
First author: Classen M.
Other authors: Althaus H.-J., Blaser S., Doka G., Jungbluth N., Tuchschmid M.
Year: 2008
Title of anthology: Final report ecoinvent data v2.1
Place of publication: Dübendorf, CH
Publisher: Swiss Centre for LCI, Empa - TSL
Volume No: 10
Issue No: 0

## Validation
Proof reading validation: passed; Other validation: none;
