# Refrigerant R134a, at plant

Dataset: EcoSpold 1, unit process
Functional unit: 1 kg
Category: chemicals / organic
Geography: RER
Time period: 1990-01 to 2000-12
Share of production covered: 0 %
Generated by: Thomas Heck
accessRestrictedTo: 0
copyright: true

## General comment
It has been assumed that 50% of R134a is produced from trichlorethylene and 50% from tetrachloroethylene. Data based on (Frischknecht 1999);
Formula: C2H2F4;
Synonyms: working fluid, cooling fluid, HFC-134a, 1,1,1,2-Tetrafluorethan, 1,1,1,2-tetrafluoroethane;

## Included processes
The module includes chemicals, energy and transport requirements for R134a production.

## Reference product
- Refrigerant R134a, at plant [RER]: 1 kg
  Europe

## Inputs from technosphere
- Hydrogen fluoride, at plant [GLO]: 0.845 kg; lognormal SD95 1.1
  basic uncertainty:1.1;(1,1,1,1,1,1);
- Tetrachloroethylene, at plant [WEU]: 0.9 kg; lognormal SD95 1.1
  basic uncertainty:1.1;(1,1,1,1,1,1);
- Transport, freight, lorry, fleet average [RER]: 0.62 tkm; lognormal SD95 1.7
  basic uncertainty of transport
- Chlorine, liquid, production mix, at plant [RER]: 0.385 kg; lognormal SD95 1.1
  basic uncertainty:1.1;(1,1,1,1,1,1);
- Trichloroethylene, at plant [WEU]: 0.68 kg; lognormal SD95 1.1
  basic uncertainty:1.1;(1,1,1,1,1,1);
- Natural gas, burned in industrial furnace 1MWth [CH]: 24 MJ; lognormal SD95 1.22
  basic uncertainty:1.05;(1,3,1,3,1,5);
- Electricity, medium voltage, production ENTSO-E, at grid: 1.03 kWh; lognormal SD95 1.22
  basic uncertainty:1.05;(1,3,1,3,1,5);
- Hydrogen, liquid, at plant [RER]: 0.02 kg; lognormal SD95 1.1
  basic uncertainty:1.1;(1,1,1,1,1,1);

## Emissions to nature
- Ethane, 2-chloro-1,1,1,2-tetrafluoro-, HCFC-124 [emissions to air, unspecified]: 0.01 kg; lognormal SD95 2
  basic uncertainty
- Ethane, 1,1,2-trichloro-1,2,2-trifluoro-, CFC-113 [emissions to air, unspecified]: 0.01 kg; lognormal SD95 2
  basic uncertainty
- Ethane, 1,1,1,2-tetrafluoro-, HFC-134a [emissions to air, unspecified]: 0.019 kg; lognormal SD95 2
  basic uncertainty

## Sampling procedure
Literature

## Sources
- Heck T., 2007, 2007 - Heat pumps - Heck, Sachbilanzen von Energiesystemen. Final report No. 6 ecoinvent data v2.0, 6, Swiss Centre for LCI, PSI, Duebendorf and Villigen, CH
Heck, T. (2007) Wärmepumpen. Sachbilanzen von Energiesystemen. Final report No. 6 ecoinvent data v2.0. Editors: Dones R.. Volume: 6. Swiss Centre for LCI, PSI. Dübendorf and Villigen, CH.
Type: Measurement on site
Source: CD-ROM
First author: Heck, T.
Year: 2007
Name of editors: Dones R.
Title of anthology: Sachbilanzen von Energiesystemen. Final report No. 6 ecoinvent data v2.0
Place of publication: Dübendorf and Villigen, CH
Publisher: Swiss Centre for LCI, PSI
Volume No: 6

## Validation
Proof reading validation: prepared; Other validation: none;
