# Wrecking, transocean container ship

Dataset: EcoSpold 1, unit process
Functional unit: 1 p
Category: transport systems / ship
Geography: IN
Time period: 2011-01 to 2013-12
Share of production covered: 100 %
Generated by: Annika Messmer
accessRestrictedTo: 0
copyright: true

## General comment
The emissions are determined based on the painted surface of a transoceanic vessel (10m2/LDT) and assumed LDT for transoceanic freight ship of 46000 LDT;

## Included processes
This process includes all the energy required for the wrecking of a transoceanic vessel in India. Also included are all the waste and emissions which are caused due to the wrecking.

## Technology
Average technology

## Time period
Time of publications

## Reference product
- Wrecking, transocean container ship [IN]: 1 p
  INDIA

## Inputs from technosphere
All rows: lognormal SD95 1.3635
- Disposal, inert waste, 5% water, to construction waste landfill [CH]: 240500 kg
  (3,4,1,5,3,5,BU:1.05); ; Paritosh C. Deshpande, 2013
- Disposal, municipal solid waste, 22.9% water, to municipal incineration [CH]: 36075 kg
  (3,4,1,5,3,5,BU:1.05); ; Paritosh C. Deshpande, 2014
- Disposal, bilge oil, 90% water, to hazardous waste incineration [CH]: 28860 kg
  (3,4,1,5,3,5,BU:1.05); ; Paritosh C. Deshpande, 2015
- Liquefied petroleum gas, at service station [CH]: 17893 kg
  (3,4,1,5,3,5,BU:1.05); ; Paritosh C. Deshpande, 2012
- Oxygen, liquid, at plant [RER]: 82251 kg
  (3,4,1,5,3,5,BU:1.05); ; Paritosh C. Deshpande, 2012

## Emissions to nature
- Lead [emissions to air, low. pop.]: 12.727 kg; lognormal SD95 5.1464
  (3,4,1,5,3,5,BU:5); ; Paritosh C. Deshpande, 2016
- Zinc [emissions to air, low. pop.]: 58.442 kg; lognormal SD95 5.1464
  (3,4,1,5,3,5,BU:5); ; Paritosh C. Deshpande, 2015
- Chromium [emissions to soil, unspecified]: 2.3203 kg; lognormal SD95 1.6621
  (3,4,1,5,3,5,BU:1.5); ; Paritosh C. Deshpande, 2012
- Tin [emissions to soil, unspecified]: 3.4805 kg; lognormal SD95 1.6621
  (3,4,1,5,3,5,BU:1.5); ; Paritosh C. Deshpande, 2012
- Zinc [emissions to soil, unspecified]: 87.013 kg; lognormal SD95 1.6621
  (3,4,1,5,3,5,BU:1.5); ; Paritosh C. Deshpande, 2012
- Carbon dioxide, fossil [emissions to air, low. pop.]: 149490 kg; lognormal SD95 1.3635
  (3,4,1,5,3,5,BU:1.05); ; Paritosh C. Deshpande, 2013
- Tin [emissions to air, low. pop.]: 2.3377 kg; lognormal SD95 5.1464
  (3,4,1,5,3,5,BU:5); ; Paritosh C. Deshpande, 2017
- Chromium [emissions to air, low. pop.]: 1.5584 kg; lognormal SD95 5.1464
  (3,4,1,5,3,5,BU:5); ; Paritosh C. Deshpande, 2018
- Iron [emissions to air, low. pop.]: 649.35 kg; lognormal SD95 5.1464
  (3,4,1,5,3,5,BU:5); ; Paritosh C. Deshpande, 2019
- Copper [emissions to soil, unspecified]: 157.78 kg; lognormal SD95 1.6621
  (3,4,1,5,3,5,BU:1.5); ; Paritosh C. Deshpande, 2012
- Iron [emissions to soil, unspecified]: 966.81, 149490 kg (2 entries); lognormal SD95 1.6621
  (3,4,1,5,3,5,BU:1.5); ; Paritosh C. Deshpande, 2012
- Lead [emissions to soil, unspecified]: 18.949 kg; lognormal SD95 1.6621
  (3,4,1,5,3,5,BU:1.5); ; Paritosh C. Deshpande, 2012
- Copper [emissions to air, low. pop.]: 105.97 kg; lognormal SD95 5.1464
  (3,4,1,5,3,5,BU:5); ; Paritosh C. Deshpande, 2014

## Sampling procedure
Statistics

## Extrapolations
Some generic datasets from ecoinvent have been used.

## Sources
- Messmer A., Frischknecht R., 2016, 2016 - LCI water transport services - Messmer, Project report, 544, treeze Ltd., Uster, CH
Annika Messmer, Rolf Frischknecht (2016) Life cycle inventories of water transport services. Project report. Volume: 544. treeze Ltd.. Uster, CH.
Type: Separate publication
Source: Report
First author: Annika Messmer
Other authors: Rolf Frischknecht
Year: 2016
Title of anthology: Project report
Place of publication: Uster, CH
Publisher: treeze Ltd.
Volume No: 544

## Validation
Proof reading validation: 07.11.2016; Other validation: G:\Projekte laufend\544 Aktualisierung mobitool\Schiff\Frachtschiff\Ecospold\[544_Wrecking_EIV2_v0.2.xlsx]X-Process;
