# Cleft timber, cork, measured as dry mass, at forest road

Dataset: EcoSpold 1, unit process
Functional unit: 1 kg
Category: wood / wooden materials\new processes\other material
Geography: PT
Time period: 2000-01 to 2016-12
Generated by: default
accessRestrictedTo: 0
copyright: true

## Reference product
- Cleft timber, cork, measured as dry mass, at forest road [PT]: 1 kg

## Inputs from technosphere
- Diesel, burned in building machine, average [CH]: 0.00249 MJ; lognormal SD95 1.52865
  Pedigree: (1,2,5,5,3).
- Power sawing, without catalytic converter [RER]: 2.44e-5 hr; lognormal SD95 1.52865
  Pedigree: (1,2,5,5,3).
- Transport, passenger car, fleet average [RER]: 1.72e-6 km; lognormal SD95 1.36759
  Pedigree: (1,1,4,1,1).

## Inputs from nature
- Transformation, from forest, extensive [resources, land]: 0.00302 m2; lognormal SD95 1.11577
  Pedigree: (1,1,4,1,1).
- Carbon dioxide, in air [resources, in air]: 0.29 kg; lognormal SD95 1.11577
  Pedigree: (1,1,4,1,1).
- Transformation, to forest, extensive [resources, land]: 0.00302 m2; lognormal SD95 1.11577
  Pedigree: (1,1,4,1,1).
- Occupation, forest, extensive [resources, unspecified]: 0.423332 m2a
- Energy, gross calorific value, in biomass [resources, biotic]: 3.14 MJ; lognormal SD95 1.11577
  Pedigree: (1,1,4,1,1).
- Wood, hard, standing [resources, biotic]: 0.000162 m3; lognormal SD95 1.11577
  Pedigree: (1,1,4,1,1).

## Sources
- Werner F., 2017, 2017 - LCI wood and wood based products - Werner, Project Report, 0, Environment & Development, Zuerich, CH
