# Transport, transoceanic freight ship, Fahrzeug

Dataset: EcoSpold 1, unit process
Functional unit: 1 tkm
Category: transport systems / ship
Geography: OCE
Time period: 2000-01 to 2015-12
Share of production covered: 100 %
Generated by: Annika Messmer
accessRestrictedTo: 0
copyright: true

## General comment
Inventory refers to the entire transport life cycle. Port infrastructure expenditures and environmental interventions are allocated based the yearly throughput (444.7 Mio t). Vessel manufacturing is allocated based on the total kilometric performance (2126552 km) and its transport performance (75148dwt /unit). For each transport activity 2 ports are required.;

## Included processes
The module calls the modules addressing: production of vessel; construction and land use of port; operation, maintenance and disposal of port and vessel. In this module included is the energy consumption as well as the emissios.

## Technology
Technology

## Time period
Time of publications

## Reference product
- Transport, transoceanic freight ship, Fahrzeug [OCE]: 1 tkm
  Oceanic

## Inputs from technosphere
- Maintenance, transoceanic freight ship [RER]: 1.0835e-11 p; lognormal SD95 3.0708
  (3,4,1,3,1,5,BU:3); ;
- Transoceanic freight ship [OCE]: 1.0835e-11 p; lognormal SD95 3.0616
  (2,4,1,3,1,5,BU:3); scaled with the transport capacity (65'000dwt container ship; 100'000dwt freight ship); calculation based on the assumption of a life time of 20 years; CO2 Emission Statistics for the World Commercial Fleet, 2009
- Wrecking, transocean ship [IN]: 5.5799e-12 p; lognormal SD95 2.0551
  (2,3,1,3,1,5,BU:2); assumed life time 20 years; CO2 Emission Statistics for the World Commercial Fleet, 2009

## Sampling procedure
Sampling Procedure

## Extrapolations
Extrapolations

## Sources
- Messmer A., Frischknecht R., 2016, 2016 - LCI water transport services - Messmer, Project report, 544, treeze Ltd., Uster, CH
Annika Messmer, Rolf Frischknecht (2016) Life cycle inventories of water transport services. Project report. Volume: 544. treeze Ltd.. Uster, CH.
Type: Separate publication
Source: Report
First author: Annika Messmer
Other authors: Rolf Frischknecht
Year: 2016
Title of anthology: Project report
Place of publication: Uster, CH
Publisher: treeze Ltd.
Volume No: 544

## Validation
Proof reading validation: 09.11.2016; Other validation: G:\Projekte laufend\544 Aktualisierung mobitool\Schiff\Frachtschiff\Ecospold\[544_Seeschiffahrt_EIV2_v0.5.xlsx]X-Process;
