# Foam glass, at plant

Dataset: EcoSpold 1, unit process
Functional unit: 1 kg
Category: construction / insulation
Geography: RER
Time period: 2001-01 to 2001-12
Production volume: A volume of 30625 tons per year is produced
Share of production covered: 100 %
Generated by: Philpp Thalmann
accessRestrictedTo: 0
copyright: true

## General comment
Refers to foam glass of a density of 110 kg/m3 and a thermal conductivity of 0.040 W/mK. Foam glass products sold to Switzerland and Lichtenstein are produced with renewable energy certificates from RECS (www.recs.org). ;
Synonyms: T4 WDS;

## Included processes
melting, forming to a pipe, cooling down, smashing, crushing, mixing with carbon powder. Foaming by heating in a mould, cooling, cutting to slabs and packing. Internal processes (workshop, administration etc.), transport of raw materials and energy carrier for furnace, packing and infrastructure are also included.

## Geography
Data are from one company in Belgium which covers nearly 100% of the European foam glass market. For some exchanges RER-, CH- and GLO-modules are used as proxy. No energy certificates are accounted

## Technology
All data refer to the year 2005. Today foam glass is made of 68% recycled glass and only recycled glass is used instead of silica sand. Recycled glass is to some extent directly injected to the cellulating furnace without melting, resulting in less energy use. The energy for the melting process is electricity. Natural gas is used for the cellulating process. All emissions from processing raw materials and heating are taken into account.

## Reference product
- Foam glass, at plant [RER]: 1 kg
  Europe

## Inputs from technosphere
- Treatment, sewage, to wastewater treatment, class 3 [CH]: 0.00020769 m3; lognormal SD95 1.0541
  (1,2,1,1,1,1);
- Chromium steel 18/8, at plant [RER]: 0.0012711 kg; lognormal SD95 1.0714
  (1,3,1,1,1,1);
- Transport, freight, lorry, 32t-40t gross weight, fleet average [CH]: 0.19404 tkm; lognormal SD95 2.0006
  (1,2,1,1,1,1);
- Glass cullets, sorted, at sorting plant [RER]: 0.81385 kg; lognormal SD95 1.0714
  (1,3,1,1,1,1);
- Disposal, packaging cardboard, 19.6% water, to municipal incineration [CH]: 0.0073077 kg; lognormal SD95 1.0714
  (1,3,1,1,1,1);
- Aluminium hydroxide, at plant [RER]: 0.0064 kg; lognormal SD95 1.0714
  (1,3,1,1,1,1);
- Diesel, burned in building machine, average [CH]: 0.096241 MJ; lognormal SD95 1.0714
  (1,3,1,1,1,1);
- Electricity, medium voltage, at grid [BE]: 1.4969 kWh; lognormal SD95 1.0714
  (1,3,1,1,1,1);
- Feldspar, at plant [RER]: 0.25846 kg; lognormal SD95 1.0714
  (1,3,1,1,1,1);
- Clay, at mine [CH]: 0.00034923 kg; lognormal SD95 1.0714
  (1,3,1,1,1,1);
- Soda, powder, at plant [RER]: 0.046154 kg; lognormal SD95 1.0714
  (1,3,1,1,1,1);
- Corrugated board, recycling fibre, double wall, at plant [RER]: 0.0073077 kg; lognormal SD95 1.0714
  (1,3,1,1,1,1);
- Molybdenum, at regional storage [RER]: 7.6923e-5 kg; lognormal SD95 1.0714
  (1,3,1,1,1,1);
- Packaging film, LDPE, at plant [RER]: 0.0146 kg; lognormal SD95 1.0714
  (1,3,1,1,1,1);
- Natural gas, burned in industrial furnace 1MWth [CH]: 11.616 MJ; lognormal SD95 1.0714
  (1,3,1,1,1,1);
- Disposal, wood untreated, 20% water, to municipal incineration [CH]: 0.042138 kg; lognormal SD95 1.0714
  (1,3,1,1,1,1);
- Foam glass plant [BE]: 5.102e-10 p; lognormal SD95 3.046
  (1,2,1,1,1,5);
- Transport, transoceanic freight ship [OCE]: 0.0070769 tkm; lognormal SD95 2.0034
  (1,3,1,1,1,1);
- Potassium nitrate, as N, at regional storehouse [RER]: 0.00034104 kg; lognormal SD95 1.0714
  (1,3,1,1,1,1);
- Iron ore, 65% Fe, at beneficiation [GLO]: 0.027692 kg; lognormal SD95 1.0714
  (1,3,1,1,1,1);
- EUR-flat pallet [RER]: 0.0015962 p; lognormal SD95 1.0714
  (1,3,1,1,1,1);
- Light fuel oil, burned in boiler 100kW, non-modulating [CH]: 0.042296 MJ; lognormal SD95 1.0714
  (1,3,1,1,1,1);
- Disposal, PE sealing sheet, 4% water, to municipal incineration [CH]: 0.0146 kg; lognormal SD95 1.0714
  (1,3,1,1,1,1);
- Tap water, at user [RER]: 0.036923 kg; lognormal SD95 1.0714
  (1,3,1,1,1,1);
- Carbon black, at plant [GLO]: 0.0061538 kg; lognormal SD95 1.0714
  (1,3,1,1,1,1);
- Sinter, iron, at plant [GLO]: 0.0004 kg; lognormal SD95 1.0714
  (1,3,1,1,1,1);
- Sodium sulphate, from natural sources, at plant [RER]: 0.0053846 kg; lognormal SD95 1.0714
  (1,3,1,1,1,1);
- Manganese concentrate, at beneficiation [GLO]: 0.026154 kg; lognormal SD95 1.0714
  (1,3,1,1,1,1);

## Inputs from nature
- Water, well [resources, in water]: 0.00023692 m3; lognormal SD95 1.0714
  (1,3,1,1,1,1);

## Emissions to nature
- Nitrogen oxides [emissions to air, low. pop.]: 0.001 kg; lognormal SD95 1.521
  (3,3,1,1,1,1);
- Sulfur dioxide [emissions to air, low. pop.]: 0.00023077 kg; lognormal SD95 1.1249
  (3,3,1,1,1,1);
- Carbon dioxide, fossil [emissions to air, low. pop.]: 0.029385 kg; lognormal SD95 1.1249
  (3,3,1,1,1,1);
- Particulates, < 2.5 um [emissions to air, low. pop.]: 4.57e-5 kg; lognormal SD95 3.046
  (1,2,1,1,1,5);
- Heat, waste [emissions to air, low. pop.]: 5.3889 MJ; lognormal SD95 1.0714
  (1,3,1,1,1,1);
- Water [emissions to water, unspecified]: 0.213228 kg; lognormal SD95 2.5196
  (5,5,5,5,5,BU:1.05); All uncertainty-values set to 5.0 by default. Balance of input water

## Sampling procedure
survey

## Sources
- Kellenberger D., Althaus H.-J., Jungbluth N., Kuenniger T., Lehmann M., Thalmann P., 2007, 2007 - LCI building products - Kellenberger, Final report ecoinvent data v2.0, 7, Swiss Centre for LCI, Empa - TSL, ESU-services Ltd., Bau- und Umweltchimie, Duebendorf, CH
Kellenberger D., Althaus H.-J., Jungbluth N., Künniger T. (2007) Life Cycle Inventories of Building Products. Final report ecoinvent data v2.0. Volume: 7. Swiss Centre for LCI, Empa - TSL. Dübendorf, CH.
Type: Measurement on site
Source: CD-ROM
First author: Kellenberger D.
Other authors: Althaus H.-J., Jungbluth N., Künniger T.
Year: 2007
Title of anthology: Final report ecoinvent data v2.0
Place of publication: Dübendorf, CH
Publisher: Swiss Centre for LCI, Empa - TSL
Volume No: 7

## Validation
Proof reading validation: passed; Other validation: none;
