# Zinc coating, pieces, adjustment per um

Dataset: EcoSpold 1, unit process
Functional unit: 1 m2
Category: metals / coating
Geography: RER
Time period: 2000-01 to 2000-12
Generated by: Silvio Blaser
accessRestrictedTo: 0
copyright: true

## General comment
This module is applicable if the coating layer is thicker than the one given for "zinc coating, pieces", or for "zinc coating, coils". Applying it for the latter, the module has to be multiplied by the factor 1.53 for correct use. The Dataset is not applicable for thinner coating layers. Data given per square meter of product surface corrected by one um.;
Synonyms: hot dip coating, galvanising;

## Included processes
Includes the process steps galvanising (melt zinc coating) and finishing. Does not include the fabricates being coated.

## Technology
Average technique for EU.

## Time period
Reference from 1996 refers partly to data from 1993.

## Reference product
- Zinc coating, pieces, adjustment per um [RER]: 1 m2
  Europe

## Inputs from technosphere
- Transport, freight, lorry, fleet average [RER]: 0.0015 tkm; lognormal SD95 2.095
  (4,5,n.a.,n.a.,n.a.,n.a.,5)
- Zinc, primary, at regional storage [RER]: 0.0154 kg; lognormal SD95 1.218
  (1,5,2,1,1,3,12)

## Emissions to nature
- Arsenic [emissions to air, unspecified]: 4.86e-11 kg; lognormal SD95 1.5655
  (1,5,2,1,1,3,31)
- Lead [emissions to air, unspecified]: 8.72e-10 kg; lognormal SD95 1.5655
  (1,5,2,1,1,3,31)
- Cadmium [emissions to air, unspecified]: 3.35e-10 kg; lognormal SD95 1.5655
  (1,5,2,1,1,3,31)
- Zinc [emissions to air, unspecified]: 1.72e-7 kg; lognormal SD95 1.5655
  (1,5,2,1,1,3,31)

## Sampling procedure
Literature

## Uncertainty adjustments
The fact that no data were available about the percentage of companies represented by the study cited is considered in the uncertainties.

## Sources
- Classen M., Althaus H.-J., Blaser S., Scharnhorst W., Tuchschmid M., Jungbluth N., Faist Emmenegger M., 2009, 2009 - LCI metals - Classen, Final report ecoinvent data v2.1, 10, Swiss Centre for LCI, Empa, ESU-services Ltd., Duebendorf, CH
Classen M., Althaus H.-J., Blaser S., Doka G., Jungbluth N., Tuchschmid M. (2008) Life Cycle Inventories of Metals. Final report ecoinvent data v2.1. Volume: 10. Issue: 0. Swiss Centre for LCI, Empa - TSL. Dübendorf, CH.
Type: Measurement on site
Source: CD-ROM
First author: Classen M.
Other authors: Althaus H.-J., Blaser S., Doka G., Jungbluth N., Tuchschmid M.
Year: 2008
Title of anthology: Final report ecoinvent data v2.1
Place of publication: Dübendorf, CH
Publisher: Swiss Centre for LCI, Empa - TSL
Volume No: 10
Issue No: 0

## Validation
Proof reading validation: Validated for v1.01; Other validation: none;
