# Window frame, wood, w/o surface treatment, wall opening, at plant

Dataset: EcoSpold 1, unit process
Functional unit: 1 m2
Category: building components / windows
Geography: CH
Time period: 2018-01 to 2019-12
Generated by: Livia Ramseier
accessRestrictedTo: 0
copyright: true

## General comment
The measures of the window are 1.75m (width) x 1.3m (height). The wall opening is 1.8 m2 (assumption width of frame 0.12m, 2/3 of frame are behind the wall opening). 1m2 (wall opening) of wooden window frame weighs 19.8kg. The bill of materials is based on data from 3 window producers.;

## Included processes
Included are the materials used in a wooden window frame (without surface treatment). Production losses, work materials, packaging materials, energy demand and the transport of the materials are also included.

## Technology
Industry data.

## Time period
Time of publications.

## Reference product
- Window frame, wood, w/o surface treatment, wall opening, at plant [CH]: 1 m2
  SWITZERLAND

## Inputs from technosphere
- Packaging, corrugated board, mixed fibre, single wall, at plant [CH]: 0.0015137 kg; lognormal SD95 1.1635
  (3,3,1,1,1,4,BU:1.05); Packaging cardboard; Average of data from manufacturers
- Electricity, medium voltage, at grid [CH]: 19.013 kWh; lognormal SD95 1.1635
  (3,3,1,1,1,4,BU:1.05); Electricity; Average of data from manufacturers
- Disposal, polyurethane, 0.2% water, to municipal incineration [CH]: 0.00010377 kg; lognormal SD95 1.1635
  (3,3,1,1,1,4,BU:1.05); Disposal production waste PVCa-adhesive; Average of data from manufacturers
- Adhesive for metals, at plant [DE]: 0.047234 kg; lognormal SD95 1.1635
  (3,3,1,1,1,4,BU:1.05); Metal adhesive; Average of data from manufacturers
- Sawnwood, lath, softwood, dried (u=10%), planed, at sawmill [CH]: 0.0002558 m3; lognormal SD95 1.1635
  (3,3,1,1,1,4,BU:1.05); Softwood lath, origin Switzerland; Average of data from manufacturers
- Synthetic rubber, at plant [RER]: 0.23626 kg; lognormal SD95 1.1635
  (3,3,1,1,1,4,BU:1.05); EPDM; Average of data from manufacturers
- Polyurethane, rigid foam, market mix, at regional storage [CH]: 0.0099425 kg; lognormal SD95 1.1635
  (3,3,1,1,1,4,BU:1.05); PUR; Average of data from manufacturers
- Disposal, plastics containing nitrogen (ABS, PU, polyamide), as building waste [CH]: 0.0071438 kg; lognormal SD95 1.1635
  (3,3,1,1,1,4,BU:1.05); Disposal production waste polyamide; Average of data from manufacturers
- Transport, freight, lorry, fleet average [CH]: 27.395 tkm; lognormal SD95 2.0296
  (3,3,1,1,1,4,BU:2); Transport of materials to production site; Average of data from manufacturers and standard distances
- Casting, brass [CH]: 0.1536 kg; lognormal SD95 1.1635
  (3,3,1,1,1,4,BU:1.05); Processing of zinc; Average of data from manufacturers
- Glass fibre reinforced plastic, polyamide, injection moulding, at plant [RER]: 0.078582 kg; lognormal SD95 1.1635
  (3,3,1,1,1,4,BU:1.05); Fibreglass-reinforced polyamide; Average of data from manufacturers
- Aluminium profile, uncoated, SZFF 2014, recycling share 52%, at plant [CH]: 0.28392 kg; lognormal SD95 1.1635
  (3,3,1,1,1,4,BU:1.05); Aluminium profil (powder coated); Average of data from manufacturers
- Disposal, building, polystyrene isolation, flame-retardant, to final disposal [CH]: 0.00039217 kg; lognormal SD95 1.1635
  (3,3,1,1,1,4,BU:1.05); Disposal production waste insulation; Average of data from manufacturers
- Disposal, wood untreated, 20% water, to municipal incineration [CH]: 8.7263 kg; lognormal SD95 1.1635
  (3,3,1,1,1,4,BU:1.05); Disposal production waste scantling; Average of data from manufacturers
- Aluminium, production mix, cast alloy, at plant [RER]: 0.023383 kg; lognormal SD95 1.1635
  (3,3,1,1,1,4,BU:1.05); Die cast aluminium; Average of data from manufacturers
- Silicone product, at plant [RER]: 0.11114 kg; lognormal SD95 1.1635
  (3,3,1,1,1,4,BU:1.05); Silicon; Average of data from manufacturers
- Heat, light fuel oil, at boiler 100kW condensing, non-modulating [CH]: 0.84355 MJ; lognormal SD95 1.1635
  (3,3,1,1,1,4,BU:1.05); Heat from heating oil ; Average of data from manufacturers
- Synthetic rubber, at plant [RER]: 0.11965 kg; lognormal SD95 1.1635
  (3,3,1,1,1,4,BU:1.05); TPE; Average of data from manufacturers
- Acrylic binder, 34% in H2O, at plant [RER]: 0.0044631 kg; lognormal SD95 1.1635
  (3,3,1,1,1,4,BU:1.05); Acrylic adhesive; Average of data from manufacturers
- Disposal, polyurethane, 0.2% water, to municipal incineration [CH]: 0.0004686 kg; lognormal SD95 1.1635
  (3,3,1,1,1,4,BU:1.05); Disposal production waste metal adhesive; Average of data from manufacturers
- Chemicals organic, at plant [GLO]: 0.0011246 kg; lognormal SD95 1.1635
  (3,3,1,1,1,4,BU:1.05); Other chemicals; Average of data from manufacturers
- Metal working factory [RER]: 9.6751e-9 p; lognormal SD95 3.0281
  (3,3,1,1,1,4,BU:3); Infastructure for market mix calculated based on weight; based on previous window frame dataset
- Polystyrene, extruded (XPS), market mix, at regional storage [CH]: 0.013465 kg; lognormal SD95 1.1635
  (3,3,1,1,1,4,BU:1.05); Other insulation; Average of data from manufacturers
- Adhesive for metals, at plant [DE]: 0.0081749 kg; lognormal SD95 1.1635
  (3,3,1,1,1,4,BU:1.05); other adhesive; Average of data from manufacturers
- Sawnwood, lath, softwood, dried (u=10%), planed, at sawmill [RER]: 0.00059687 m3; lognormal SD95 1.1635
  (3,3,1,1,1,4,BU:1.05); Softwood lath, origin Europe; Average of data from manufacturers
- Transport, freight, rail, electricity with shunting [CH]: 1.0677 tkm; lognormal SD95 2.0296
  (same comment as for Transport, freight, lorry, fleet average)
- Lubricating oil, at plant [RER]: 0.0052605 kg; lognormal SD95 1.1635
  (3,3,1,1,1,4,BU:1.05); Lubricating oil; Average of data from manufacturers
- Disposal, rubber, unspecified, 0% water, to municipal incineration [CH]: 0.0023392 kg; lognormal SD95 1.1635
  (3,3,1,1,1,4,BU:1.05); Disposal production waste EPDM; Average of data from manufacturers
- Anodising, aluminium sheet [RER]: 0.16046 m2; lognormal SD95 1.1635
  (3,3,1,1,1,4,BU:1.05); Anodising of aluminium profil; Average of data from manufacturers
- Section bar rolling, steel [RER]: 1.2504 kg; lognormal SD95 1.1635
  (3,3,1,1,1,4,BU:1.05); Processing of steel sheet, low-alloyed; Average of data from manufacturers
- Steel, low-alloyed, at plant [RER]: 1.2504 kg; lognormal SD95 1.1635
  (3,3,1,1,1,4,BU:1.05); Steel sheet, low-alloyed; Average of data from manufacturers
- Zinc, primary, at regional storage [RER]: 0.1536 kg; lognormal SD95 1.1635
  (3,3,1,1,1,4,BU:1.05); Die cast zinc; Average of data from manufacturers
- Transport, municipal waste collection, lorry 21t [CH]: 0.089602 tkm; lognormal SD95 1.1635
  (3,3,1,1,1,4,BU:1.05); Transport production waste to municipal incineration; Standard distances
- Aluminium profile, uncoated, SZFF 2014, recycling share 52%, at plant [CH]: 0.64746 kg; lognormal SD95 1.1635
  (3,3,1,1,1,4,BU:1.05); Aluminium profil (anodised); Average of data from manufacturers
- Polyethylene, HDPE, granulate, at plant [RER]: 0.0044189 kg; lognormal SD95 1.1635
  (3,3,1,1,1,4,BU:1.05); Other plastic parts; Average of data from manufacturers
- EUR-flat pallet [RER]: 3.8192e-5 p; lognormal SD95 1.1635
  (3,3,1,1,1,4,BU:1.05); Packaging pallet; Average of data from manufacturers
- Disposal, plastics, mixture, 15.3% water, to municipal incineration [CH]: 0.053779 kg; lognormal SD95 1.1635
  (3,3,1,1,1,4,BU:1.05); Disposal of packaging PE foil; Average of data from manufacturers
- Disposal, rubber, unspecified, 0% water, to municipal incineration [CH]: 0.016133 kg; lognormal SD95 1.1635
  (3,3,1,1,1,4,BU:1.05); Disposal production waste silicon; Average of data from manufacturers
- Injection moulding [RER]: 0.0058918 kg; lognormal SD95 1.1635
  (3,3,1,1,1,4,BU:1.05); Processing of other plastic parts; Average of data from manufacturers
- Steel, low-alloyed, at plant [RER]: 0.058056 kg; lognormal SD95 1.1635
  (3,3,1,1,1,4,BU:1.05); Steel screws, low-alloyed; Average of data from manufacturers
- Powder coating, aluminium sheet [RER]: 0.070129 m2; lognormal SD95 1.1635
  (3,3,1,1,1,4,BU:1.05); Powder coating of aluminium profil; Average of data from manufacturers
- Disposal, rubber, unspecified, 0% water, to municipal incineration [CH]: 0.0031061 kg; lognormal SD95 1.1635
  (3,3,1,1,1,4,BU:1.05); Disposal production waste TPE; Average of data from manufacturers
- Tap water, at user [CH]: 0.014493 kg; lognormal SD95 1.1635
  (3,3,1,1,1,4,BU:1.05); Water; Average of data from manufacturers
- Wood chips, from industry, softwood, burned in furnace 300kW [CH]: 33.217 MJ; lognormal SD95 1.1635
  (3,3,1,1,1,4,BU:1.05); Wood chips; Average of data from manufacturers
- Steel product manufacturing, average metal working [RER]: 0.058056 kg; lognormal SD95 1.1635
  (3,3,1,1,1,4,BU:1.05); Processing of steel sheet for steel screws; Average of data from manufacturers
- Acrylonitrile-butadiene-styrene copolymer, ABS, at plant [RER]: 0.0040506 kg; lognormal SD95 1.1635
  (3,3,1,1,1,4,BU:1.05); ABS; Average of data from manufacturers
- Disposal, steel, 0% water, to municipal incineration [CH]: 0.059544 kg; lognormal SD95 1.1635
  (3,3,1,1,1,4,BU:1.05); Disposal production waste steel sheet, low-alloyed; Average of data from manufacturers
- Nylon 6, at plant [RER]: 0.0058918 kg; lognormal SD95 1.1635
  (3,3,1,1,1,4,BU:1.05); Other plastic parts; Average of data from manufacturers
- Scantling, softwood, average, at plant [RER]: 0.043552 m3; lognormal SD95 1.1635
  (3,3,1,1,1,4,BU:1.05); Scantling softwood, origin Europe; Average of data from manufacturers
- Disposal, polyurethane, 0.2% water, to municipal incineration [CH]: 0.090399 kg; lognormal SD95 1.1635
  (3,3,1,1,1,4,BU:1.05); Disposal production waste adhesive in scantling; Average of data from manufacturers
- Scantling, softwood, average, at plant [CH]: 0.0063808 m3; lognormal SD95 1.1635
  (3,3,1,1,1,4,BU:1.05); Scantling softwood, origin Switzerland; Average of data from manufacturers
- Vinyl acetate, at plant [RER]: 0.008389 kg; lognormal SD95 1.1635
  (3,3,1,1,1,4,BU:1.05); PVAc adhesive; Average of data from manufacturers
- Chemicals organic, at plant [GLO]: 0.003221 kg; lognormal SD95 1.1635
  (3,3,1,1,1,4,BU:1.05); Cleaning agent; Average of data from manufacturers
- Disposal, steel, 0% water, to municipal incineration [CH]: 0.00042624 kg; lognormal SD95 1.1635
  (3,3,1,1,1,4,BU:1.05); Disposal production waste steel screws, low-alloyed; Average of data from manufacturers
- Packaging film, LDPE, at plant [RER]: 0.045551 kg; lognormal SD95 1.1635
  (3,3,1,1,1,4,BU:1.05); Packaging PE foil; Average of data from manufacturers
- Disposal, polyurethane, 0.2% water, to municipal incineration [CH]: 4.4277e-5 kg; lognormal SD95 1.1635
  (3,3,1,1,1,4,BU:1.05); Disposal production waste acrylic adhesive; Average of data from manufacturers

## Sampling procedure
Data survey at 4 window manufacturers in Switzerland.

## Extrapolations
Some generic datasets from ecoinvent have been used.

## Sources
- Ramseier L., Stolz P., Frischknecht R., 2020, 2020 - LCA wooden windows and doors - Ramseier, Project report, 634, treeze Ltd., Uster, CH
Ramseier L., Stolz P., Frischknecht R. (2020) Ökobilanz von Holzfenstern und Holztüren. Project report. Volume: 634. treeze Ltd.. Uster, CH.
Type: Separate publication
Source: Report
First author: Ramseier L.
Other authors: Stolz P., Frischknecht R.
Year: 2020
Title of anthology: Project report
Place of publication: Uster, CH
Publisher: treeze Ltd.
Volume No: 634

## Validation
Proof reading validation: 10.11.2021; Other validation: G:\Projekte laufend\634 Holzfenster u.-türen, energieSchweiz\EcoSpold\UVEK2021\[634_EcoSpold_Fensterrahmen_v1.4_UVEK2021_v0.3_R_corr_I.xlsx]X-Process;
