# Wood chips, production mix, wet, measured as dry mass, at forest road & at sawmill

Dataset: EcoSpold 1, unit process
Functional unit: 1 kg
Category: wood / wooden materials\new processes\other material
Geography: RER
Time period: 2014-01 to 2016-12
Generated by: Frank Werner
accessRestrictedTo: 0
copyright: true

## Reference product
- Wood chips, production mix, wet, measured as dry mass, at forest road & at sawmill [RER]: 1 kg

## Inputs from technosphere
- Wood chips, birch, wet, sustainable forest management, measured as dry mass, at forest road [SE]: 0.16 kg
  Pedigree: (1,1,4,5,4).
- Wood chips, softwood, wet, sustainable forest management, measured as dry mass, at forest road [CH]: 0.0127 kg
  Pedigree: (4,4,4,5,3).
- Wood chips, spruce, wet, sustainable forest management, measured as dry mass, at forest road [SE]: 0.136 kg
  Pedigree: (1,1,4,5,4).
- Wood chips, beech, wet, sustainable forest management, measured as dry mass, at forest road [DE]: 0.208 kg
  Pedigree: (1,1,4,5,4).
- Wood chips, oak, wet, sustainable forest management, measured as dry mass, at forest road [DE]: 0.0408 kg
  Pedigree: (1,1,4,5,4).
- Wood chips, softwood, wet, measured as dry mass, at sawmill [RER]: 0.145 kg
  Pedigree: (4,4,4,5,3).
- Wood chips, pine, wet, sustainable forest management, measured as dry mass, at forest road [SE]: 0.125 kg
  Pedigree: (1,1,4,5,4).
- Wood chips, spruce, wet, sustainable forest management, measured as dry mass, at forest road [DE]: 0.0713 kg
  Pedigree: (1,1,4,5,4).
- Transport, freight, lorry, fleet average [RER]: 0 tkm
  Pedigree: (4,4,4,5,3).
- Wood chips, pine, wet, sustainable forest management, measured as dry mass, at forest road [DE]: 0.0441 kg
  Pedigree: (1,1,4,5,4).
- Wood chips, hardwood, wet, sustainable forest management, measured as dry mass, at forest road [CH]: 0.0443 kg
  Pedigree: (4,4,4,5,3).
- Wood chips, hardwood, wet, measured as dry mass, at sawmill [RER]: 0.0127 kg
  Pedigree: (4,4,4,5,3).

## Sources
- Werner F., 2017, 2017 - LCI wood and wood based products - Werner, Project Report, 0, Environment & Development, Zuerich, CH
