# Polystyrene foam slab, at plant

Dataset: EcoSpold 1, unit process
Functional unit: 1 kg
Category: construction / insulation
Geography: RER
Time period: 2000-01 to 2000-12
Generated by: Hans-Joerg Althaus
accessRestrictedTo: 0
copyright: true

## General comment
Combination of material and processing module. EPS foam slab has a density of 30 kg/m3 and a thermal conductivity of 0.035-0.04 W/mK.\nTechnology: European average EPS production;

## Included processes
Includes production and thermoforming of EPS

## Technology
European average EPS production; thermoforming from 2 Factories in Switzerland

## Reference product
- Polystyrene foam slab, at plant [RER]: 1 kg
  Europe

## Inputs from technosphere
- Polystyrene, expandable, at plant [RER]: 1.04 kg; lognormal SD95 1
  uncertainties in the combined modules --> no uncertainty
- Foaming, expanding [RER]: 1 kg; lognormal SD95 1
  uncertainties in the combined modules --> no uncertainty

## Sources
- Kellenberger D., Althaus H.-J., Jungbluth N., Kuenniger T., Lehmann M., Thalmann P., 2007, 2007 - LCI building products - Kellenberger, Final report ecoinvent data v2.0, 7, Swiss Centre for LCI, Empa - TSL, ESU-services Ltd., Bau- und Umweltchimie, Duebendorf, CH
Kellenberger D., Althaus H.-J., Jungbluth N., Künniger T. (2007) Life Cycle Inventories of Building Products. Final report ecoinvent data v2.0. Volume: 7. Swiss Centre for LCI, Empa - TSL. Dübendorf, CH.
Type: Measurement on site
Source: CD-ROM
First author: Kellenberger D.
Other authors: Althaus H.-J., Jungbluth N., Künniger T.
Year: 2007
Title of anthology: Final report ecoinvent data v2.0
Place of publication: Dübendorf, CH
Publisher: Swiss Centre for LCI, Empa - TSL
Volume No: 7

## Validation
Proof reading validation: Passed; Other validation: none;
