# Circulation pump

Dataset: EcoSpold 1, unit process, infrastructure
Functional unit: 1 kg
Category: energy supply, kbob recommendation / heat pumps, waste water
Geography: RER
Time period: 2004-01 to 2004-12
Share of production covered: 0 %
Generated by: Matthias Tuchschmid
accessRestrictedTo: 0
copyright: true

## General comment
This data set describes the production of a circulation pump from literature source. Data stems from literature.;

## Included processes
This data set describes the production of a circulation pump including energy use, use of semi-finished products and working materials, waste treatment and transports of components.

## Geography
This data represent the production in Europa.

## Technology
5 kg circulation pump

## Time period
Literature source uses data from 1996.

## Reference product
- Circulation pump [RER]: 1 kg

## Inputs from technosphere
- Chromium steel 18/8, at plant [RER]: 0.41 kg; lognormal SD95 1.2252
  (1,3,2,1,3,3); Literature
- Transport, freight, rail [RER]: 0.66 tkm; lognormal SD95 2.0558
  (1,3,2,1,3,3); Literature
- Cast iron, at plant [RER]: 0.54 kg; lognormal SD95 1.2252
  (1,3,2,1,3,3); Literature
- Synthetic rubber, at plant [RER]: 0.003 kg; lognormal SD95 1.2252
  (1,3,2,1,3,3); Literature
- Natural gas, burned in industrial furnace 1MWth [CH]: 0.25 MJ; lognormal SD95 1.2252
  (1,3,2,1,3,3); Literature
- Copper, at regional storage [RER]: 0.11 kg; lognormal SD95 1.2252
  (1,3,2,1,3,3); Literature
- Transport, freight, lorry, fleet average [RER]: 0.55 tkm; lognormal SD95 2.0558
  (1,3,2,1,3,3); Literature
- Aluminium, primary, at plant [RER]: 0.0088 kg; lognormal SD95 1.2252
  (1,3,2,1,3,3); Literature
- Electronics for control units [RER]: 0.018 kg; lognormal SD95 1.2252
  (1,3,2,1,3,3); Literature
- Electricity, medium voltage, production ENTSO-E, at grid: 0.13889 kWh; lognormal SD95 1.2252
  (1,3,2,1,3,3); Literature
- Polyvinylchloride, bulk polymerised, at plant [RER]: 0.013 kg; lognormal SD95 1.2252
  (1,3,2,1,3,3); Literature

## Sampling procedure
literature

## Extrapolations
no extrapolations

## Sources
- Faist Emmenegger M., Frischknecht R., 2005, 2005 - LCA heat pump raw sewage - Faist Emmenegger, -, ESU-services Ltd., Uster, CH
Rolf Frischknecht, Mireille Faist Emmenegger (2004) Nutzwärmebereitstellung mit Wärmepumpe für Rohabwasser. Uster.
Type: Separate publication
Source: Interner Bericht
First author: Rolf Frischknecht
Other authors: Mireille Faist Emmenegger
Year: 2004
Place of publication: Uster

## Validation
Proof reading validation: automatic validation in Excel; Other validation: none;
