# xx Electricity, hydropower, at power plant

Dataset: EcoSpold 1, unit process
Functional unit: 1 kWh
Category: energy, obsolete / electricity by fuel, obsolete\hydro, obsolete
Geography: JP
Time period: 1945-01 to 2000-12
Production volume: 73 TWh
Share of production covered: 100 %
Generated by: Mireille Faist Emmenegger
accessRestrictedTo: 0
copyright: true

## General comment
Electricity production shares are determined on annual average and on the level of net production.;

## Included processes
Includes shares of electricity produced by of run-of-river and reservoir hydropower plants.

## Geography
Valid for this single country.

## Technology
Not applicable because the dataset just describes shares.

## Time period
Time of publications.

## Reference product
- xx Electricity, hydropower, at power plant [JP]: 1 kWh
  JAPAN

## Inputs from technosphere
- Electricity, hydropower, at reservoir power plant, non alpine regions [RER]: 0.10194 kWh; lognormal SD95 1.113
  (1,1,1,5,1,1); national statistics
- Electricity, hydropower, at run-of-river power plant [RER]: 0.89806 kWh; lognormal SD95 1.113
  (1,1,1,5,1,1); national statistics

## Sampling procedure
Literature data.

## Extrapolations
Some data are derived from other or unknown plants.

## Sources
- Bauer C., Bolliger R., Tuchschmid M., Faist-Emmenegger M., 2007, 2007 - Hydropower - Bauer, Sachbilanzen von Energiesystemen. Final report No. 6 ecoinvent data v2.0, 6, Swiss Centre for LCI, PSI, ESU-services Ltd., Duebendorf and Villigen, CH
Bolliger, R., Bauer, Ch. (2007) Wasserkraft. Sachbilanzen von Energiesystemen. Final report No. 6 ecoinvent data v2.0. Editors: Dones R.. Volume: 6. Swiss Centre for LCI, PSI. Dübendorf and Villigen, CH.
Type: Measurement on site
Source: CD-ROM
First author: Bolliger, R.
Other authors: Bauer, Ch.
Year: 2007
Name of editors: Dones R.
Title of anthology: Sachbilanzen von Energiesystemen. Final report No. 6 ecoinvent data v2.0
Place of publication: Dübendorf and Villigen, CH
Publisher: Swiss Centre for LCI, PSI
Volume No: 6

## Validation
Proof reading validation: Passed; Other validation: none;
