# Electricity mix, operation storage pumps, ENTSO, winter 2018, at plant

Dataset: EcoSpold 1, unit process
Functional unit: 1 kWh
Category: electricity / production mix
Geography: DE
Time period: 2018-01 to 2018-12
Generated by: Philippe Stolz
accessRestrictedTo: 0
copyright: true

## General comment
Technology shares determined based on data from ENTSO Transparency Platform. Only domestic electricity production is considered, electricity imports are neglected.;

## Included processes
This dataset includes the shares of different technologies of the electricity mix used for the operation of storage pumps in Germany in winter 2018.

## Geography
Germany

## Technology
Average technology

## Time period
Time of publications

## Reference product
- Electricity mix, operation storage pumps, ENTSO, winter 2018, at plant [DE]: 1 kWh
  GERMANY

## Inputs from technosphere
All rows: lognormal SD95 1.3069
- Electricity, nuclear, at power plant pressure water reactor [DE]: 0.10811 kWh
  (4,2,1,1,3,3,BU:1.05); Nuclear ; ENTSO Transparency Platform
- Electricity, at cogen 1MWth, wood chips, allocation exergy [CH]: 0.033768 kWh
  (4,2,1,1,3,3,BU:1.05); Biomass ; ENTSO Transparency Platform
- Electricity, hydropower, at run-of-river power plant [RER]: 0.023737 kWh
  (4,2,1,1,3,3,BU:1.05); Hydro Run-of-river and poundage ; ENTSO Transparency Platform
- Electricity, oil, at power plant [DE]: 0.0049361 kWh
  (4,2,1,1,3,3,BU:1.05); Fossil Oil ; ENTSO Transparency Platform
- Electricity, at 100MW wind farm, onshore, 2.3MW turbines [RER]: 0.040427 kWh
  (4,2,1,1,3,3,BU:1.05); Wind Offshore ; ENTSO Transparency Platform
- Electricity, at cogen 300kWth, diesel, allocation exergy [CH]: 0.00043141 kWh
  (4,2,1,1,3,3,BU:1.05); Fossil Oil ; ENTSO Transparency Platform
- Electricity, at cogen with biogas engine, allocation exergy [CH]: 0.041044 kWh
  (4,2,1,1,3,3,BU:1.05); Biomass ; ENTSO Transparency Platform
- Electricity, industrial gas, at power plant [DE]: 0.0063147 kWh
  (4,2,1,1,3,3,BU:1.05); Other ; ENTSO Transparency Platform
- Electricity, natural gas, at power plant [DE]: 0.077918 kWh
  (4,2,1,1,3,3,BU:1.05); Fossil Gas ; ENTSO Transparency Platform
- Electricity, at 100MW wind farm, onshore, 2.3MW turbines [RER]: 0.2059 kWh
  (4,2,1,1,3,3,BU:1.05); Wind Onshore ; ENTSO Transparency Platform
- Electricity, at 100MW wind farm, onshore, 2.3MW turbines [RER]: 0.0026512 kWh
  (4,2,1,1,3,3,BU:1.05); Other renewable ; ENTSO Transparency Platform
- Electricity, nuclear, at power plant boiling water reactor [DE]: 0.029282 kWh
  (4,2,1,1,3,3,BU:1.05); Nuclear ; ENTSO Transparency Platform
- Electricity, hydropower, at reservoir power plant, non alpine regions [RER]: 0.0013013 kWh
  (4,2,1,1,3,3,BU:1.05); Hydro Water Reservoir ; ENTSO Transparency Platform
- Electricity, industrial gas, at power plant [DE]: 0.0068766 kWh
  (4,2,1,1,3,3,BU:1.05); Fossil Coal-derived gas ; ENTSO Transparency Platform
- Electricity, hard coal, at power plant [DE]: 0.15815 kWh
  (4,2,1,1,3,3,BU:1.05); Fossil Hard coal ; ENTSO Transparency Platform
- Electricity from waste, at municipal waste incineration plant [CH]: 0.010909 kWh
  (4,2,1,1,3,3,BU:1.05); Waste ; ENTSO Transparency Platform
- Electricity, at wind farm [RER]: 5.5742e-5 kWh
  (4,2,1,1,3,3,BU:1.05); Geothermal ; ENTSO Transparency Platform
- Electricity, production mix photovoltaic, at plant [DE]: 0.012362 kWh
  (4,2,1,1,3,3,BU:1.05); Solar ; ENTSO Transparency Platform
- Electricity, lignite, at power plant [DE]: 0.23583 kWh
  (4,2,1,1,3,3,BU:1.05); Fossil Brown coal; ENTSO Transparency Platform

## Sampling procedure
Statistics

## Extrapolations
Some generic datasets from ecoinvent have been used.

## Sources
- Frischknecht R., Alig M., 2021, 2021 - Electricity mixes in LCA of buildings - Frischknecht, Project report, 651, treeze Ltd., Bern, CH
Stolz P., Frischknecht R. (2020) Electricity Mixes in Life Cycle Assessments of Buildings. Project report. Volume: 651. treeze Ltd.. Uster, CH.
Type: Separate publication
Source: Report
First author: Stolz P.
Other authors: Frischknecht R.
Year: 2020
Title of anthology: Project report
Place of publication: Uster, CH
Publisher: treeze Ltd.
Volume No: 651

## Validation
Proof reading validation: 20.07.2020; Other validation: G:\Projekte laufend\651 Strommixe LCA Gebäude BFE\EcoSpold\[651-Electricity-Mixes-Attributional-CH-v0.19.xlsx]X-Process;
