# Ammonium bicarbonate, at plant

Dataset: EcoSpold 1, unit process
Functional unit: 1 kg
Category: chemicals / inorganic
Geography: RER
Time period: 2000-01 to 2000-12
Generated by: Maggie Osses
accessRestrictedTo: 0
copyright: true

## General comment
Manufacturing process is considered with consumption of raw materials, energy, as well as infrastructure and land use. Transport of the raw materials is included. No by-product is generated in the process. Auxiliaries, solid wastes, emissions to air and water (excepting emission of waste-heat) are not included due to the lack of data. Transport and storage of the final product are not included. Transcient or unstable operations are not considered, but the production during stable operation conditions. Inventory refers to 1 kg 100% amonium bicarbonate. Data for consumption of energy have been provided by a manufacturer. Consumption of raw materials is estimated on stoechiomtry assuming an efficiency of 95%. The literature source used is von Däniken et al. 1995.;
CAS number: 001066-33-7;
Formula: NH5CO3;
Synonyms: Ammoniumhydrogencarbonat, Doppeltkohlensaures Ammonium;

## Geography
Data concerning energy have been provided by a European manufacturing company. No further information is available on the location and characteristics of this manufacturer. Therefore, the representativeness of these values for the European ammonium bicarbonate industry is unknown.

## Time period
Values based on data from the early 1990s.

## Reference product
- Ammonium bicarbonate, at plant [RER]: 1 kg
  Europe

## Inputs from technosphere
- Electricity, medium voltage, production ENTSO-E, at grid: 0.323 kWh; lognormal SD95 2.17
  (3,5,4,5,5,5); data from a manufacturing company
- Ammonia, liquid, at regional storehouse [RER]: 0.227 kg; lognormal SD95 1.21
  (4,na,na,na,na,na); estimation on stoechiometry
- Carbon dioxide liquid, at plant [RER]: 0.586 kg; lognormal SD95 1.21
  (4,na,na,na,na,na); estimation on stoechiometry
- Chemical plant, organics [RER]: 4e-10 p; lognormal SD95 3.96
  (4,1,5,3,5,4); estimation

## Inputs from nature
- Water, unspecified natural origin/m3 [resources, in water]: 0.24 m3; lognormal SD95 1.21
  (4,na,na,na,na,na); estimation on stoechiometry

## Emissions to nature
- Heat, waste [emissions to air, high. pop.]: 1.16 MJ; lognormal SD95 2.17
  (3,5,4,5,5,5); data from a manufacturing company
- Water [emissions to water, unspecified]: 228 kg; lognormal SD95 2.5196
  (5,5,5,5,5,BU:1.05); All uncertainty-values set to 5.0 by default. Balance of input water

## Sampling procedure
Sampling procedure: see geography

## Extrapolations
Consumption of raw materials: estimation on stoechiometry (for an efficiency of 95%). Infrastructure: proxy module used (chemical plant, organics)

## Sources
- Althaus H.-J., Chudacoff M., Hellweg S., Hischier R., Jungbluth N., Osses M., Primas A., 2007, 2007 - LCI chemicals - Althaus, Final report ecoinvent data v2.0, 8, Swiss Centre for LCI, Empa - TSL, ETH, ESU-services Ltd., Chudacoff Oekoscience, Duebendorf, CH
Althaus H.-J., Chudacoff M., Hischier R., Jungbluth N., Osses M., Primas A. (2007) Life Cycle Inventories of Chemicals. Final report ecoinvent data v2.0. Volume: 8. Swiss Centre for LCI, Empa - TSL. Dübendorf, CH.
Type: Measurement on site
Source: CD-ROM
First author: Althaus H.-J.
Other authors: Chudacoff M., Hischier R., Jungbluth N., Osses M., Primas A.
Year: 2007
Title of anthology: Final report ecoinvent data v2.0
Place of publication: Dübendorf, CH
Publisher: Swiss Centre for LCI, Empa - TSL
Volume No: 8

## Validation
Proof reading validation: Passed.; Other validation: none;
