# Disposal, zinc in car shredder residue, 0% water, to municipal incineration

Dataset: EcoSpold 1, unit process
Functional unit: 1 kg
Category: waste management / municipal incineration
Geography: CH
Time period: 2000-01 to 2000-12
Generated by: Gabor Doka
accessRestrictedTo: 0
copyright: true

## General comment
This dataset represents the activity of waste disposal of zinc in car shredder residue in a municipal solid waste incinerator (MSWI) Recommended use of this dataset: For disposal of rather fine or dusty zinc, which goes to incineration as part of Automotive Shredder Residue (ASR). Due to fine grain size of the particles, 50% burnability is assumed, therefore not suited for less fine zinc parts in waste. Pure, isolated zinc fractions will not be disposed in incinerators, but rather go to recycling. Inventoried waste contains 50% Zn in ASR burnable; 50% Zn in ASR inert; . Waste composition (wet, in ppm): H2O n.a.; O n.a.; H n.a.; C n.a.; S n.a.; N n.a.; P n.a.; B n.a.; Cl n.a.; Br n.a.; F n.a.; I n.a.; Ag n.a.; As n.a.; Ba n.a.; Cd n.a.; Co n.a.; Cr n.a.; Cu n.a.; Hg n.a.; Mn n.a.; Mo n.a.; Ni n.a.; Pb n.a.; Sb n.a.; Se n.a.; Sn n.a.; V n.a.; Zn 1000000; Be n.a.; Sc n.a.; Sr n.a.; Ti n.a.; Tl n.a.; W n.a.; Si n.a.; Fe n.a.; Ca n.a.; Al n.a.; K n.a.; Mg n.a.; Na n.a.; Share of carbon in waste that is biogenic 60.4%. Share of metals in waste not oxidised and bulk-recyclable (exclude very small or thin parts) Iron: 0%; Alu: 0%; Copper: 0%. One kg of this waste produces 0.9696 kg of slag and 0.438 kg of residues, which are landfilled. Additional solidification with 0.1752 kg of cement. Net energy production: 0MJ/kg electric energy and 0MJ/kg thermal energy. Recovery of metal scrap to recycling: 0g iron scrap, 0g aluminium scrap, 0g copper scrap.; Formula: Zn;;

## Included processes
Waste incineration from waste reception gate further downstream (excluding transport to the MSWI plant). Waste-specific air and water emisions from incineration, auxiliary material consumption for flue gas cleaning. Short-term emissions to river water and long-term emisisons to ground water from slag compartment (from bottom ash) and residual material landfill (from solidified fly ashes and scrubber slugde). Waste-specific process energy demands for MSWI and net energy generation.

## Geography
Specific to the technology mix encountered in Switzerland in 2010. Well applicable to modern incineration practices in Europe, North America or Japan.

## Technology
average Swiss MSWI plants in 2010 (grate incinerators) with electrostatic precipitator for fly ash (ESP), wet flue gas scrubber and 25% SNCR , 42.77% SCR-high dust , 32.68% SCR-low dust -DeNOx facilities and 0% without Denox (weighted according to mass of burnt waste, representing Swiss average). Efficiency of iron scrap separation from slag : 58%. Efficiency of non-ferrous scrap separation from slag : 31%. Gross electric efficiency technology mix 15.84% and Gross thermal efficiency technology mix 28.51%

## Time period
Waste composition as given in literature reference, theoretical data or other source. Transfer coefficients for modern MSWI.

## Reference product
- Disposal, zinc in car shredder residue, 0% water, to municipal incineration [CH]: 1 kg
  SWITZERLAND

## Inputs from technosphere
- Transport, freight, lorry, 16t-32t gross weight, fleet average [CH]: 0.066796 tkm; lognormal SD95 1.0794
  Transport services to transport incineration residues to landfills and to transport auxilliary inputs of the incinerator plant. uncertainty calculated from uncertainty in average auxiliary material input, the uncertainty of the waste composition of this waste and the uncertainty in generic transportation distances
- Slag compartment [CH]: 1.7237e-9 p; lognormal SD95 1.1306
  landfill infrastructure required for landfilling of bottom ash. uncertainty is calculated from uncertainties in waste composition and transfer coefficients in incinerator
- Disposal, cement, hydrated, 0% water, to residual material landfill [CH]: 0.43802 kg; lognormal SD95 1.2142
  Hydrated cement output for solidification of landfilled residual material. Uncertainty calculated from uncertainty of the waste composition of this waste and transfer coefficients in the incinerator and of the solidification recipe.
- Transport, freight, rail [RER]: 0.029228 tkm; lognormal SD95 1.1373
  (same comment as for Transport, freight, lorry, 16t-32t gross weight, fleet average)
- Chemicals inorganic, at plant [GLO]: 0.00014995 kg; lognormal SD95 1.2757
  auxilliary inputs for the wastewater treatment stage of the incinerator plant. Proxy for Polyelectrolyte. uncertainty calculated from uncertainty in average Polyelectrolyte input, of transfer coefficients in the incinerator, and the uncertainty of the waste composition of this waste
- Natural gas, burned in industrial furnace 1MW [CH]: 0.014872 MJ; lognormal SD95 2.0998
  Input to DeNOx stage, to heat up flue gas in low-dust SCR. uncertainty calculated from uncertainty in average DeNOx input, uncertainty in the share of thermal NOx, uncertainty of nitrogen content in average municipal waste and the uncertainty in nitrogen content in *this* waste.
- Cement, unspecified, at plant [CH]: 0.17521 kg; lognormal SD95 1.2142
  Cement required for solidification of landfilled residual material. Uncertainty calculated from uncertainty of the waste composition of this waste, of transfer coefficients in the incinerator and of the solidification recipe.
- Municipal waste incineration plant [CH]: 2.5e-10 p; lognormal SD95 1
  demands per kilogram waste. uncertainty is heeded in the module
- Ammonia, liquid, at regional storehouse [CH]: 7.9531e-5 kg; lognormal SD95 2.0998
  Input to DeNOx stage (100% NH3). uncertainty calculated from uncertainty in average DeNOx input, uncertainty in the share of thermal NOx, uncertainty of nitrogen content in average municipal waste and the uncertainty in nitrogen content in *this* waste.
- Electricity from waste, at municipal waste incineration plant [CH]: 0.039276 kWh; lognormal SD95 1.05
  Net electricity required to incinerate this waste (subsidiesed from high-calorific waste fractions). uncertainty is calculated from uncertainties in waste composition and uncertainties in energy efficiency and the uncertainty in internal energy demand
- Heat from waste, at municipal waste incineration plant [CH]: 0.11042 MJ; lognormal SD95 1.05
  Net heat required to incinerate this waste (subsidiesed from high-calorific waste fractions). uncertainty is calculated from uncertainties in waste composition and uncertainties in energy efficiency and the uncertainty in internal energy demand
- Residual material landfill facility [CH]: 9.1254e-10 p; lognormal SD95 1.0372
  landfill infrastructure required for landfilling of incineration residues. uncertainty is calculated from uncertainties in waste composition and transfer coefficients in incinerator
- Chromium oxide, flakes, at plant [RER]: 1.0169e-7 kg; lognormal SD95 3.9877
  Input to DeNOx stage. uncertainty calculated from uncertainty in average DeNOx input, uncertainty in the share of thermal NOx, uncertainty of nitrogen content in average municipal waste and the uncertainty in nitrogen content in *this* waste.
- Process-specific burdens, residual material landfill [CH]: 0.43802 kg; lognormal SD95 1.0372
  mass-specific expenditures required for landfilling of incineration residues. uncertainty is calculated from uncertainties in waste composition and transfer coefficients in incinerator
- Titanium dioxide, production mix, at plant [RER]: 4.9828e-6 kg; lognormal SD95 3.9877
  Input to DeNOx stage (TiO2 catalyst carrier) uncertainty calculated from uncertainty in average DeNOx input, uncertainty in the share of thermal NOx, uncertainty of nitrogen content in average municipal waste and the uncertainty in nitrogen content in *this* waste.
- Process-specific burdens, slag compartment [CH]: 0.96959 kg; lognormal SD95 1.1306
  mass-specific expenditures required for landfilling of bottom ash. uncertainty is calculated from uncertainties in waste composition and transfer coefficients in incinerator
- Water, decarbonised, at plant [RER]: 0.95613 kg; lognormal SD95 1.2757
  Incinerator process water used in flue gas scrubber stage. uncertainty calculated from uncertainty in average water input, and the uncertainty of the waste composition of this waste
- Iron (III) chloride, 40% in H2O, at plant [CH]: 0.0074717 kg; lognormal SD95 1.2757
  auxilliary inputs for the wastewater treatment stage of the incinerator plant. uncertainty calculated from uncertainty in average FeCl3 input, of transfer coefficients in the incinerator, and the uncertainty of the waste composition of this waste
- Hydrochloric acid, 30% in H2O, at plant [RER]: 3.9415e-5 kg; lognormal SD95 1.2757
  auxilliary inputs for the wastewater treatment stage of the incinerator plant. uncertainty calculated from uncertainty in average HCl input, of transfer coefficients in the incinerator, and the uncertainty of the waste composition of this waste

## Emissions to nature
- Particulates, > 2.5 um, and < 10um [emissions to air, high. pop.]: 2.8222e-8 kg; lognormal SD95 2.4794
  Incomplete combustion product emitted to air. uncertainty calculated from uncertainty in average operation emissions, and the uncertainty of the flue gas volume from this waste.
- Carbon monoxide, fossil [emissions to air, high. pop.]: 3.1658e-5 kg; lognormal SD95 6.1984
  (same comment as for Particulates, > 2.5 um, and < 10um)
- Zinc [emissions to water, river]: 5.9995e-5 kg; lognormal SD95 3.2713
  Emissions to water from waste composition and transfer coefficients in incinerator and landfills. uncertainty is calculated from uncertainties in waste composition and transfer coefficients in incinerator and landfills
- Heat, waste [emissions to air, high. pop.]: 0.11508 MJ; lognormal SD95 1.0649
  Waste heat generated from heating value of this waste plus any electricity required to process it. uncertainty is calculated from uncertainties in waste composition and uncertainties in energy efficiency and the uncertainty in internal energy demand
- Benzene, pentachloro- [emissions to air, high. pop.]: 2.4853e-10 kg; lognormal SD95 1.8595
  (same comment as for Particulates, > 2.5 um, and < 10um)
- NMVOC, non-methane volatile organic compounds, unspecified origin [emissions to air, high. pop.]: 2.1408e-6 kg; lognormal SD95 1.8595
  (same comment as for Particulates, > 2.5 um, and < 10um)
- Heat, waste [emissions to water, river]: 0.026312 MJ; lognormal SD95 1.0649
  (same comment as for Heat, waste)
- Benzene, hexachloro- [emissions to air, high. pop.]: 9.836e-11 kg; lognormal SD95 1.8595
  (same comment as for Particulates, > 2.5 um, and < 10um)
- Phenol, pentachloro- [emissions to air, high. pop.]: 2.0486e-11 kg; lognormal SD95 1.8595
  (same comment as for Particulates, > 2.5 um, and < 10um)
- Zinc [emissions to air, high. pop.]: 0.00033513 kg; lognormal SD95 1.3924
  Emission to air from waste composition and transfer coefficients. uncertainty is calculated from uncertainties in waste composition and transfer coefficients in incinerator
- Ammonia [emissions to air, high. pop.]: 9.3509e-8 kg; lognormal SD95 2.3499
  Nitrogen species emitted to air after DeNOx stage. uncertainty calculated from uncertainty in average N-emissions and uncertainty in the share of thermal NOx and the uncertainty in nitrogen content in *this* waste.
- Dioxin, 2,3,7,8 Tetrachlorodibenzo-p- [emissions to air, high. pop.]: 9.4075e-14 kg; lognormal SD95 3.719
  (same comment as for Particulates, > 2.5 um, and < 10um)
- Toluene [emissions to air, high. pop.]: 9.4081e-8 kg; lognormal SD95 1.8595
  (same comment as for Particulates, > 2.5 um, and < 10um)
- Carbon monoxide, biogenic [emissions to air, high. pop.]: 4.8306e-5 kg; lognormal SD95 6.1984
  (same comment as for Particulates, > 2.5 um, and < 10um)
- Zinc [emissions to water, groundwater, long-term]: 0.65204 kg; lognormal SD95 3.9902
  Long-term emissions from landfilling of incineration residues. uncertainty is calculated from uncertainties in waste composition and transfer coefficients in incinerator and landfills.
- Nitrogen oxides [emissions to air, high. pop.]: 2.9611e-5 kg; lognormal SD95 2.3499
  sum of fuel-Nox and thermal-NOx emitted to air after DeNOx stage. uncertainty calculated from uncertainty in average N-emissions and uncertainty in the share of thermal NOx and the uncertainty in nitrogen content in *this* waste.
- Benzo(a)pyrene [emissions to air, high. pop.]: 1.0468e-12 kg; lognormal SD95 3.719
  (same comment as for Particulates, > 2.5 um, and < 10um)
- Methane, fossil [emissions to air, high. pop.]: 2.7935e-7 kg; lognormal SD95 1.8595
  (same comment as for Particulates, > 2.5 um, and < 10um)
- Methane, biogenic [emissions to air, high. pop.]: 4.2626e-7 kg; lognormal SD95 1.8595
  (same comment as for Particulates, > 2.5 um, and < 10um)
- Particulates, < 2.5 um [emissions to air, high. pop.]: 5.6163e-6 kg; lognormal SD95 3.719
  (same comment as for Particulates, > 2.5 um, and < 10um)
- Benzene [emissions to air, high. pop.]: 4.7041e-8 kg; lognormal SD95 1.8595
  (same comment as for Particulates, > 2.5 um, and < 10um)

## Sampling procedure
fully waste-specific calculation based on literature data for average MSWI operation performance

## Extrapolations
Typical elemental transfer coefficients from current studies for modern MSWI, completed with data from coal power plants and estimates, adapted for inert/burnable waste.

## Uncertainty adjustments
uncertainty of waste input composition data derived from generic formula GSD(c) = N*ln(c)+1

## Sources
- Doka G., 2013, 2013 - Updates LCI waste treatment services - Doka, -, Doka LCA, Zuerich, CH
Doka G. (2013) Updates to Life Cycle Inventories of Waste Treatment Services - part II: waste incineration. Doka LCA. Zurich.
Type: Separate publication
Source: Report to document the 2013 changes to the MSWI incinerator model and datasets (URL: http://www.doka.ch/ecoinventMSWIupdateLCI2013.pdf). To be read with the ecoinvent Nr 13 report (Doka 2009, Life Cycle Inventories of Waste Treatment Services) for ecoinvent v2.2.
First author: Doka G.
Year: 2013
Place of publication: Zurich
Publisher: Doka LCA
Original title: Updates to Life Cycle Inventories of Waste Treatment Services - part II: waste incineration

## Validation
Proof reading validation: Passed.; Other validation: none;
