# SOFC fuel cell 125kWe, future

Dataset: EcoSpold 1, unit process, infrastructure
Functional unit: 1 p
Category: heat / natural gas\cogeneration\power unit\infrastructure
Geography: CH
Time period: 2000-01 to 2005-12
Generated by: Alex Primas
accessRestrictedTo: 0
copyright: true

## General comment
The module reflects a solid oxide fuel cell (SOFC) system with 125 kW electrical output. Inventory based on information from literature and one manufacturer. Life time operation of auxiliary systems is 80'000 h. Stack lifetime is 48'000 h.;
Synonyms: solid oxide fuel cell, oxidkeramische Hochtemperaturbrennstoffzelle, Festoxid Brennstoffzelle, Festkeramik Brennstoffzelle;

## Included processes
The module includes the most important materials used for production, the energy needed for production, planning and engineering. Also included is the transport of the raw materials, the engine delivery and the installation on site.

## Technology
Solid oxide fuel cell (SOFC) with unpressurised tubular stack design for central cogeneration use. Performance, stack lifetime and catalyst use according to expected future values for a serial product. Operation with connection to low pressure gas network. Electrical efficiency 47%, total efficiency 80%.

## Reference product
- SOFC fuel cell 125kWe, future [CH]: 1 p
  SWITZERLAND

## Inputs from technosphere
- Nickel, 99.5%, at plant [GLO]: 25 kg; lognormal SD95 1.5996
  (2,4,3,2,4,5); data from 100kWel plant design adapted
- Disposal, inert waste, 5% water, to construction waste landfill [CH]: 617.4 kg; lognormal SD95 1.3488
  (2,4,3,2,3,5); approximation for disposal of ceramic parts
- Building, hall, steel construction [CH]: 0.56 m2; lognormal SD95 3.117
  (4,4,2,5,1,5); rough estimation based on company data
- Transport, freight, lorry, fleet average [RER]: 1600 tkm; lognormal SD95 2.095
  (4,5,nA,nA,nA,nA); standard distances used
- Sheet rolling, steel [RER]: 11750 kg; lognormal SD95 1.2451
  (2,4,2,2,1,5); based on material input
- Iron-nickel-chromium alloy, at plant [RER]: 250 kg; lognormal SD95 1.3488
  (2,4,3,2,3,5); data from 100kWel plant design adapted
- Transport, freight, lorry, 32t-40t gross weight, fleet average [CH]: 3200 tkm; lognormal SD95 2.1559
  (4,4,2,1,3,5); estimation for transport of fuel cell to site
- Construction work, cogen unit 160kWe [RER]: 3.5 p; lognormal SD95 3.1192
  (2,4,3,2,3,5); data from 160 kWel engine cogen plant adapted
- Zinc, primary, at regional storage [RER]: 1.25 kg; lognormal SD95 1.5996
  (2,4,3,2,4,5); data from 100kWel plant design adapted
- Heating, sanitary equipment cogen unit 160kWe [RER]: 0.75 p; lognormal SD95 3.1626
  (4,4,2,5,3,5); approximation based on similar process
- Reinforcing steel, at plant [RER]: 11750 kg; lognormal SD95 1.4625
  (4,5,3,2,3,5); data for future 125kWel plant design, value uncertain
- Building, multi-storey [RER]: 3.4 m3; lognormal SD95 3.117
  (4,4,2,5,1,5); rough estimation based on company data
- Light fuel oil, burned in boiler 100kW, non-modulating [CH]: 9000 MJ; lognormal SD95 1.2872
  (3,4,2,1,3,4); estimation based on specific energy demand of engineering hours
- Sheet rolling, chromium steel [RER]: 2050 kg; lognormal SD95 1.2451
  (2,4,2,2,1,5); based on material input
- Aluminium oxide, at plant [RER]: 588 kg; lognormal SD95 1.3488
  (2,4,3,2,3,5); data from 100kWel plant design adapted
- Inverter, 2500W, at plant [RER]: 50 p; lognormal SD95 3.331
  (4,4,2,2,4,5); data from 3kWel unit for use in photovoltaics
- Transport, freight, rail [RER]: 3200 tkm; lognormal SD95 2.095
  (4,5,nA,nA,nA,nA); standard distances used
- Chromium steel 18/8, at plant [RER]: 1800 kg; lognormal SD95 1.4625
  (4,5,3,2,3,5); data for future 125kWel plant design, value uncertain
- Treatment, sewage, from residence, to wastewater treatment, class 2 [CH]: 19.52 m3; lognormal SD95 1.6362
  (4,4,1,2,4,5); approximation for waste water treatment
- Transport, passenger car, fleet average [CH]: 1875 km; lognormal SD95 2.1559
  (4,4,2,1,3,5); estimation
- Stack SOFC fuel cell 125kWe, future [CH]: 1 p; lognormal SD95 3
  (nA.,nA.,nA.,nA.,1,nA.); material input
- Electricity, medium voltage, production ENTSO-E, at grid: 6040 kWh; lognormal SD95 1.3488
  (2,4,3,2,3,5); data from 100kWel plant design adapted
- Natural gas, burned in industrial furnace 1MWth [CH]: 61100 MJ; lognormal SD95 1.5841
  (2,4,1,2,4,5); approximation with company data of similar branch
- Electricity, low voltage, at grid [CH]: 1200 kWh; lognormal SD95 1.2872
  (3,4,2,1,3,4); estimation based on specific energy demand of engineering hours

## Inputs from nature
- Occupation, industrial area [resources, land]: 101 m2a; lognormal SD95 1.6486
  (4,4,2,5,1,5); rough estimation based on company data
- Water, unspecified natural origin/m3 [resources, in water]: 19.52 m3; lognormal SD95 1.5841
  (2,4,1,2,4,5); approximation with company data of similar branch
- Transformation, to industrial area, built up [resources, land]: 2.02 m2; lognormal SD95 2.1219
  (4,4,2,5,1,5); rough estimation based on company data
- Transformation, from unknown [resources, land]: 2.02 m2; lognormal SD95 2.1219
  (4,4,2,5,1,5); rough estimation based on company data

## Emissions to nature
- Heat, waste [emissions to air, high. pop.]: 26064 MJ; lognormal SD95 1.5841
  (2,4,1,2,4,5); uncertainty electricity demand
- Water [emissions to water, unspecified]: 18544 kg; lognormal SD95 2.5196
  (5,5,5,5,5,BU:1.05); All uncertainty-values set to 5.0 by default. Balance of input water

## Sampling procedure
Literature data and manufacturer information

## Sources
- Primas A., 2007, 2007 - LCI new CHP systems - Primas, Final report ecoinvent Data v2.0, 20, Swiss Centre for LCI, B&H AG, Duebendorf and Zuerich, CH
Primas A., 0 (2007) Life Cycle Inventories of new CHP systems. Final report ecoinvent Data v2.0. Editors: 0. Volume: 20. Swiss Centre for LCI, B&H AG. Duebendorf and Zurich, CH.
Type: Measurement on site
Source: CD-ROM
First author: Primas A.
Other authors: 0
Year: 2007
Name of editors: 0
Title of anthology: Final report ecoinvent Data v2.0
Place of publication: Duebendorf and Zurich, CH
Publisher: Swiss Centre for LCI, B&H AG
Volume No: 20

## Validation
Proof reading validation: passed; Other validation: none;
