# Disposal, internal combustion engine, for passenger car

Dataset: EcoSpold 1, unit process, infrastructure
Functional unit: 1 kg
Category: transport systems / road
Geography: RER
Time period: 2014-01 to 2014-12
Production volume: 16500000000 kg
Generated by: Frank Werner
accessRestrictedTo: 0
copyright: true

## General comment
This dataset describes the shredding of the used internal combustion engine (ICE) of a passenger car. The entries are given on a per kg basis. The original data has been collected for an ICE with a weight of approximately 275kg. The infrastructure and emission data is based on the e-waste shredding dataset which is based on literature. The output scrap and waste material quantities are derived from the respective ICE production dataset. The materialization of the motor is divided in 5 main fractions: scrap steel, scrap Aluminium, scrap Copper, scrap plastics and a shredding residue. These are the output waste flows of the process.The details concerning the materialization of the ICE trated in this dataset are described in Althaus and Gauch "Vergleichende Oekobilanz der Elektromobilität: Elektromobilität bersus konventionelle Mobilität mit Bio- und fossilen Treibstoffen".;

## Included processes
The dataset takes as input the used internal combustion engine and includes the treatment facility. This dataset returns the scrap fractions going to the specific recycling facilities and the emissions produced during the treatment process.

## Geography
Data from European studies, values used as global average data.

## Technology
Modern Shredder facility with 2 shredder, 2 magnetic separation & 2 Eddy-current separation steps. The shredded ICE corresponds to modern average technology.

## Reference product
- Disposal, internal combustion engine, for passenger car [RER]: 1 kg
  Europe

## Inputs from technosphere
- Disposal, plastics, mixture, 15.3% water, to municipal incineration [CH]: 0.13508 kg; lognormal SD95 1.5667
  (2,3,5,4,3,na)
  Sum of plastic materials in ICE dataset. The final output has been calculated based on ecoinvent transfer coefficients from weee shredding (ecoinvent report 18, p.21). Details on the materialization of the ICE are given in Althaus and Gauch 2010.
  Production Volume Amount: 2228881050
- Disposal, residues, shredder fraction from manual dismantling, in MSWI [CH]: 0.153 kg; lognormal SD95 1.514
  (2,3,5,4,2,na)
  Residue calculated after applying on 1 kg of glider the recovery fractions given in ecoinvent report 18, p.21. Deatails on the materialization of the ICE are given in Althaus and Gauch: ""Vergleichende Oekobilanz der Elektromobilität: Elektromobilität bersus konventionelle Mobilität mit Bio- und fossilen Treibstoffen"".
  Production Volume Amount: 2524500000
- Mechanical treatment plant, WEEE scrap [GLO]: 8e-10 p; lognormal SD95 4.3722
  (4,5,4,3,5,na)
  Value taken from shredding of electric waste. Pedigree matrix changed accordingly. Original comment: (4,5,1,3,5,4,9), rough estimation of infrastructure
- Electricity, medium voltage, production ENTSO-E, at grid: 0.066 kWh; lognormal SD95 1.2495
  (2,3,4,3,1,na)
  Value taken from shredding of electric waste. Pedigree matrix changed accordingly. Original comment: (2,3,1,3,1,5,2), literature values - based on survey of European companies
- Transport, freight, lorry, fleet average [RER]: 0.0028808 tkm; lognormal SD95 1.2495
  (2,3,3,4,3,na)
  Transport of all input materials and wastes calculated based on ecoinvent standard distances

## Emissions to nature
- Phosphorus [emissions to air, high. pop.]: 1.4e-8 kg; lognormal SD95 1.7488
  (1,4,4,3,3,na)
  Value taken from shredding of electric waste. Pedigree matrix changed accordingly. Original comment: values from Swiss Recycling company in Morf (2004)
- Antimony [emissions to air, high. pop.]: 1.19e-7 kg; lognormal SD95 1.7488
  (same comment as for Phosphorus)
- Chlorine [emissions to air, high. pop.]: 3.22e-7 kg; lognormal SD95 1.7488
  (same comment as for Phosphorus)
- Polychlorinated biphenyls [emissions to air, high. pop.]: 1.89e-9 kg; lognormal SD95 2.215
  (same comment as for Phosphorus)
- Iron [emissions to air, high. pop.]: 4.83e-6 kg; lognormal SD95 1.7488
  (same comment as for Phosphorus)
- Lead [emissions to air, high. pop.]: 4.13e-7 kg; lognormal SD95 1.7488
  (same comment as for Phosphorus)
- Nickel [emissions to air, high. pop.]: 1.61e-7 kg; lognormal SD95 1.7488
  (same comment as for Phosphorus)
- Chromium [emissions to air, high. pop.]: 5.18e-8 kg; lognormal SD95 1.7488
  (same comment as for Phosphorus)
- Tin [emissions to air, high. pop.]: 3.01e-7 kg; lognormal SD95 1.7488
  (same comment as for Phosphorus)
- Mercury [emissions to air, high. pop.]: 1.19e-10 kg; lognormal SD95 1.7488
  (same comment as for Phosphorus)
- Bromine [emissions to air, high. pop.]: 2.38e-7 kg; lognormal SD95 1.7488
  (same comment as for Phosphorus)
- Cadmium [emissions to air, high. pop.]: 2.38e-8 kg; lognormal SD95 1.7488
  (same comment as for Phosphorus)
- Zinc [emissions to air, high. pop.]: 1.309e-6 kg; lognormal SD95 1.7488
  (same comment as for Phosphorus)
- Aluminium [emissions to air, high. pop.]: 1.4e-6 kg; lognormal SD95 1.7488
  (same comment as for Phosphorus)
- Copper [emissions to air, high. pop.]: 4.2e-7 kg; lognormal SD95 1.7488
  (same comment as for Phosphorus)

## Sampling procedure
own estimation

## Sources
- Frischknecht R., Messmer A., Stolz P., 2016, 2016 - Mobitool - Frischknecht, Project Report, 0, treeze Ltd., Bern, CH
