# Silane, at plant

Dataset: EcoSpold 1, unit process
Functional unit: 1 kg
Category: chemicals / organic
Geography: RER
Time period: 2005-01 to 2007-12
Generated by: Philippe Stolz
accessRestrictedTo: 0
copyright: true

## General comment
Emissions are estimated with average silicon product.;
CAS number: 7803-62-5;
Formula: SiH4;
Synonyms: Silicon tetrahydride, Silicon hydride, Monosilane, Silicane;

## Included processes
Included are raw materials, energy use, transport expenditures, infrastructure and emissions.

## Time period
Time of publications.

## Reference product
- Silane, at plant [RER]: 1 kg
  Europe

## Inputs from technosphere
- Hydrogen, liquid, at plant [RER]: 0.084243 kg; lognormal SD95 1.2165
  (1,3,1,3,1,5,BU:1.05); reliable source
- Transport, freight, lorry, fleet average [RER]: 0.78734 tkm; lognormal SD95 2.095
  (4,5,na,na,na,na,BU:2); standard distances
- MG-silicon, at plant [NO]: 1 kg; lognormal SD95 1.2165
  (1,3,1,3,1,5,BU:1.05); reliable source
- Transport, freight, rail [RER]: 4.724 tkm; lognormal SD95 2.095
  (4,5,na,na,na,na,BU:2); standard distances
- Natural gas, burned in boiler condensing modulating 300kW [CH]: 179.36 MJ; lognormal SD95 1.2165
  (1,3,1,3,1,5,BU:1.05); reliable source
- Silicone plant [RER]: 1.0252e-11 p; lognormal SD95 3.0909
  (4,5,na,na,na,na,BU:3); estimated over Althaus (2007) for average Si product
- Lime, hydrated, packed, at plant [CH]: 0.5 kg; lognormal SD95 1.2165
  (1,3,1,3,1,5,BU:1.05); reliable source
- Electricity, medium voltage, production ENTSO-E, at grid: 25 kWh; lognormal SD95 1.2165
  (1,3,1,3,1,5,BU:1.05); reliable source
- Silicon tetrachloride, at plant [DE]: 0.081383 kg; lognormal SD95 1.2165
  (1,3,1,3,1,5,BU:1.05); reliable source
- Nitrogen, liquid, at plant [RER]: 6.2078 kg; lognormal SD95 1.2165
  (1,3,1,3,1,5,BU:1.05); reliable source

## Emissions to nature
- Iron [emissions to water, river]: 5.9175e-6 kg; lognormal SD95 5.1037
  (4,5,na,na,na,na,BU:5); estimated over Althaus (2007), emissions for average Si product
- Zinc [emissions to water, river]: 1.8291e-6 kg; lognormal SD95 5.1037
  (4,5,na,na,na,na,BU:5); estimated over Althaus (2007), emissions for average Si product
- Sulfate [emissions to water, river]: 0.00018601 kg; lognormal SD95 1.6169
  (4,5,na,na,na,na,BU:1.5); estimated over Althaus (2007), emissions for average Si product
- Chloride [emissions to water, river]: 0.038509 kg; lognormal SD95 3.0909
  (4,5,na,na,na,na,BU:3); estimated over Althaus (2007), emissions for average Si product
- DOC, Dissolved Organic Carbon [emissions to water, river]: 0.00071494 kg; lognormal SD95 1.6169
  (4,5,na,na,na,na,BU:1.5); estimated over Althaus (2007), emissions for average Si product
- Fluoride [emissions to water, river]: 3.7121e-5 kg; lognormal SD95 1.6169
  (4,5,na,na,na,na,BU:1.5); estimated over Althaus (2007), emissions for average Si product
- Lead [emissions to water, river]: 2.0369e-7 kg; lognormal SD95 5.1037
  (4,5,na,na,na,na,BU:5); estimated over Althaus (2007), emissions for average Si product
- Mercury [emissions to water, river]: 1.8601e-9 kg; lognormal SD95 5.1037
  (4,5,na,na,na,na,BU:5); estimated over Althaus (2007), emissions for average Si product
- Nitrogen [emissions to water, river]: 0.00028512 kg; lognormal SD95 1.6169
  (4,5,na,na,na,na,BU:1.5); estimated over Althaus (2007), emissions for average Si product
- Nickel [emissions to water, river]: 7.98e-7 kg; lognormal SD95 5.1037
  (4,5,na,na,na,na,BU:5); estimated over Althaus (2007), emissions for average Si product
- Phosphorus [emissions to water, river]: 4.6504e-7 kg; lognormal SD95 1.6169
  (4,5,na,na,na,na,BU:1.5); estimated over Althaus (2007), emissions for average Si product
- Cadmium [emissions to water, river]: 9.4682e-7 kg; lognormal SD95 3.0909
  (4,5,na,na,na,na,BU:3); estimated over Althaus (2007), emissions for average Si product
- BOD5, Biological Oxygen Demand [emissions to water, river]: 7.8542e-5 kg; lognormal SD95 1.6169
  (4,5,na,na,na,na,BU:1.5); estimated over Althaus (2007), emissions for average Si product
- Sodium [emissions to water, river]: 0.026951 kg; lognormal SD95 5.1037
  (4,5,na,na,na,na,BU:5); estimated over Althaus (2007), emissions for average Si product
- Heat, waste [emissions to air, high. pop.]: 90 MJ; lognormal SD95 1.3001
  (4,5,na,na,na,na,BU:1.05); estimated over Althaus (2007), emissions for average Si product
- AOX, Adsorbable Organic Halogen as Cl [emissions to water, river]: 1.0759e-5 kg; lognormal SD95 1.6169
  (4,5,na,na,na,na,BU:1.5); estimated over Althaus (2007), emissions for average Si product
- TOC, Total Organic Carbon [emissions to water, river]: 0.00071494 kg; lognormal SD95 1.6169
  (4,5,na,na,na,na,BU:1.5); estimated over Althaus (2007), emissions for average Si product
- Chromium [emissions to water, river]: 7.8684e-7 kg; lognormal SD95 3.0909
  (4,5,na,na,na,na,BU:3); estimated over Althaus (2007), emissions for average Si product
- Copper [emissions to water, river]: 6.8482e-7 kg; lognormal SD95 3.0909
  (4,5,na,na,na,na,BU:3); estimated over Althaus (2007), emissions for average Si product
- COD, Chemical Oxygen Demand [emissions to water, river]: 0.0008826 kg; lognormal SD95 1.6169
  (4,5,na,na,na,na,BU:1.5); estimated over Althaus (2007), emissions for average Si product
- Phosphate [emissions to water, river]: 4.3037e-6 kg; lognormal SD95 1.6169
  (4,5,na,na,na,na,BU:1.5); estimated over Althaus (2007), emissions for average Si product

## Sampling procedure
Literature and industry data.

## Sources
- Frischknecht R., Itten R., Sinha P., de Wild-Scholten M., Zhank J., 2020, 2015 - LCI and LCA photovoltaic systems - Frischknecht, Project report, 174, IEA PVPS Task 12, Petten, NL
Frischknecht R.,, Stolz P., Sinha P., de Wild-Scholten M. (2020) Life Cycle Inventories and Life Cycle Assessments of Photovoltaic Systems. Project report. Volume: 174. IEA PVPS Task 12.
Type: Separate publication
Source: Report
First author: Frischknecht R.,
Other authors: Stolz P., Sinha P., de Wild-Scholten M.
Year: 2020
Title of anthology: Project report
Publisher: IEA PVPS Task 12
Volume No: 174
Original title: Life Cycle Inventories and Life Cycle Assessments of Photovoltaic Systems

## Validation
Proof reading validation: 30.09.2020; Other validation: G:\Projekte laufend\174 Photovoltaic, IEA Task 12\2017 Global supply chain\EcoSpold\[174-photovoltaics-global-supply-chain-v2.5.xlsx]X-Process;
