# Chromium-nickel steel 18/8, secondary production (100% Rec.)

Dataset: EcoSpold 1, unit process
Functional unit: 1 kg
Category: construction materials / others
Geography: CH
Time period: 2010-01 to 2010-12
Share of production covered: 0 %
Generated by: Franziska Wyss
accessRestrictedTo: 0
copyright: true

## General comment
The materials reflect average construction materials in Switzerland and are based on Althaus H.-J., Lehmann M. (2010). Ökologische Baustoffliste (v2.2e).;

## Included processes
This data set includes the material use for the production or the disposal of building materials.

## Geography
Data for Switzerland

## Reference product
- Chromium-nickel steel 18/8, secondary production (100% Rec.) [CH]: 1 kg

## Inputs from technosphere
All rows: lognormal SD95 1.05
- Ferrochromium, high-carbon, 68% Cr, at plant [GLO]: -0.26471 kg
  (1,1,1,1,1,1,BU:1.05); ; Althaus H.-J., Lehmann M. (2010). Ökologische Baustoffliste (v2.2e),
- Steel, electric, chromium steel 18/8, at plant [RER]: 1 kg
  (same comment as for Ferrochromium, high-carbon, 68% Cr, at plant)
- Hot rolling, steel [RER]: 1 kg
  (same comment as for Ferrochromium, high-carbon, 68% Cr, at plant)
- Iron scrap, at plant [RER]: 0.58471 kg
  (same comment as for Ferrochromium, high-carbon, 68% Cr, at plant)
- Ferronickel, 25% Ni, at plant [GLO]: -0.32 kg
  (same comment as for Ferrochromium, high-carbon, 68% Cr, at plant)

## Sources
- Wyss F., 2015, 2015 - Case studies buildings - Wyss, Project report, 494, treeze Ltd., Uster, CH
Frischknecht R., Itten R., Wyss F. (2013) IEA Annex 57 Buildings. Project report. Volume: 494. treeze Ltd.. Uster, CH.
Type: Separate publication
Source: Report
First author: Frischknecht R.
Other authors: Itten R., Wyss F.
Year: 2013
Title of anthology: Project report
Place of publication: Uster, CH
Publisher: treeze Ltd.
Volume No: 494

## Validation
Proof reading validation: 11.12.2013; Other validation: \\Server\e\ESU-Docs\Projekte laufend\494 IEA Annex 57\EcoSpold\KBOB Liste\[494-Entsorgung-KBOB-Liste-Baumaterialien-EMPA-v0.11.xlsx]X-Process;
