# Facade substructure, integrated, medium, GFT, at plant

Dataset: EcoSpold 1, unit process, infrastructure
Functional unit: 1 m2
Category: photovoltaic / production of components
Geography: CH
Time period: 2018-01 to 2020-12
Generated by: Philippe Stolz
accessRestrictedTo: 0
copyright: true

## Included processes
Included is the production of the individual parts used for the facade construction as well as the transport from the production sites to Switzerland.

## Geography
Data apply to the supply in Switzerland. Production occurs at SAPA Building Systems AG in Bellenberg (DE).

## Technology
Industry data.

## Time period
Time of publications.

## Reference product
- Facade substructure, integrated, medium, GFT, at plant [CH]: 1 m2
  SWITZERLAND

## Inputs from technosphere
- Polyvinylchloride, at regional storage [RER]: 0.0098269 kg; lognormal SD95 1.113
  (3,1,1,1,1,1,BU:1.05); ; data provided by gft Fassaden AG, 2019
- Anodising, aluminium sheet [RER]: 1.4599 m2; lognormal SD95 1.2077
  (4,1,1,1,1,1,BU:1.05); assumption of aluminium profile thickness: 1 mm; data provided by gft Fassaden AG, 2019
- Aluminium profile, uncoated [CH]: 5.2032 kg; lognormal SD95 1.113
  (3,1,1,1,1,1,BU:1.05); ; data provided by gft Fassaden AG, 2019
- Injection moulding [RER]: 0.0098269 kg; lognormal SD95 1.113
  (3,1,1,1,1,1,BU:1.05); ;
- Glass fibre reinforced plastic, polyamide, injection moulding, at plant [RER]: 0.05 kg; lognormal SD95 1.113
  (3,1,1,1,1,1,BU:1.05); ; data provided by gft Fassaden AG, 2019
- Transport, freight, lorry, 16t-32t gross weight, fleet average [CH]: 0.30556 tkm; lognormal SD95 2.0477
  (4,1,1,1,1,1,BU:2); based on standard distances ecoinvent 2, report 1;
- Transport, freight, rail, electricity with shunting [CH]: 1.4171 tkm; lognormal SD95 2.0477
  (4,1,1,1,1,1,BU:2); based on standard distances ecoinvent 2, report 1;
- Chromium steel product manufacturing, average metal working [RER]: 0.48222 kg; lognormal SD95 1.113
  (3,1,1,1,1,1,BU:1.05); ;
- Synthetic rubber, at plant [RER]: 0.0061001 kg; lognormal SD95 1.113
  (3,1,1,1,1,1,BU:1.05); ; data provided by gft Fassaden AG, 2019
- Silicone product, at plant [RER]: 0.3696 kg; lognormal SD95 1.2077
  (4,1,1,1,1,1,BU:1.05); approximation for silicone adhesive; data provided by gft Fassaden AG, 2019
- Chromium steel sheet 18/8, recycling share 2000 (37% Rec.) [CH]: 0.48222 kg; lognormal SD95 1.113
  (3,1,1,1,1,1,BU:1.05); ; data provided by gft Fassaden AG, 2019

## Inputs from nature
- Aluminium, resource correction [resources, in ground]: -2.6654 kg; lognormal SD95 1.2077
  (4,1,1,1,1,1,BU:1.05); ;
- Chromium, resource correction [resources, in ground]: -0.072286 kg; lognormal SD95 1.2077
  (4,1,1,1,1,1,BU:1.05); ;
- Iron, resource correction [resources, in ground]: -0.23152 kg; lognormal SD95 1.2077
  (4,1,1,1,1,1,BU:1.05); ;

## Sampling procedure
Data survey at SAPA Building Systems AG.

## Extrapolations
Some generic datasets from ecoinvent have been used.

## Sources
- Stolz P., Krebs L., Frischknecht R., Hunziker D.U., Muntwyler U., 2021, 2021 - LCA active glass facades - Stolz, Project report, 674, treeze Ltd., BFH, Uster, CH
Stolz P., Frischknecht R., Krebs L. (2020) Life Cycle Assessment of Active Glass Façades. Project report. Volume: 674. treeze Ltd.. Uster, CH.
Type: Separate publication
Source: Report
First author: Stolz P.
Other authors: Frischknecht R., Krebs L.
Year: 2020
Title of anthology: Project report
Place of publication: Uster, CH
Publisher: treeze Ltd.
Volume No: 674

## Validation
Proof reading validation: 10.12.2020; Other validation: G:\Projekte laufend\674 Ökobilanzen gebäudeintegrierte PV\EcoSpold\[674-Unterkonstruktionen_v0.4.xlsx]X-Process;
