# Water, deionised, at plant

Dataset: EcoSpold 1, unit process
Functional unit: 1 kg
Category: water / industry water
Geography: CH
Time period: 2000-01 to 2000-12
Generated by: Alex Primas
accessRestrictedTo: 0
copyright: true

## General comment
Large uncertainties exist due to influence of raw water quality and operation mode on regeneration chemical demand and electricity used.;
CAS number: 007732-18-5;
Formula: H2O;
Synonyms: demineralised water;

## Included processes
Energy for operation, chemicals used for regeneration, transport of chemicals to plant, emissions from regeneration chemicals, infrastructure of plant and replacement of spent exchane resin. Process does not include very small units (cartridges) or very large units with >>100 m3/h (power stations). Other production methods as reverse osmosis electrodialysis or distillation are not covered with this process (only ion exchange).

## Technology
Process includes a strong cation exchanger a degasser and a strong anion exchanger. unit is operated with counterflow regeneration. Obtained water quality about 1 uS/cm for the conductivity and a silica content (as SiO2) of 5-25 ug/l. As water resource tap water from a public supply with a total hardnes of 1.71 mol/m3 (range 0.7 - 3.2) was assumed. No lime decarbonation as pre treatment is used.

## Time period
Time of literature publication. Measurements took place partly before this period.

## Reference product
- Water, deionised, at plant [CH]: 1 kg
  SWITZERLAND

## Inputs from technosphere
- Hydrochloric acid, 30% in H2O, at plant [RER]: 0.00024 kg; lognormal SD95 2.04
  (nA,nA,nA,nA,nA,nA); CV calculated from range of resin and raw water
- Electricity, medium voltage, at grid [CH]: 0.00045 kWh; lognormal SD95 1.85
  (nA,nA,nA,nA,nA,nA); CV calculated from range of the reported values
- Sodium hydroxide, 50% in H2O, production mix, at plant [RER]: 0.00012 kg; lognormal SD95 2.02
  (nA,nA,nA,nA,nA,nA); CV calculated from range of resin and raw water
- Transport, freight, rail [RER]: 0.000624 tkm; lognormal SD95 2.09
  (4,5,nA,nA,nA,nA); Estimated with standard distances
- Tap water, at user [RER]: 1.11 kg; lognormal SD95 1.09
  (nA,nA,nA,nA,nA,nA); CV calculated from range of the reported values
- Water treatment plant, deionisation [CH]: 9e-11 p; lognormal SD95 3.18
  (4,5,1,2,3,5); Estimated with weak data on plant operation
- Transport, freight, lorry, 16t-32t gross weight, fleet average [CH]: 5.2e-5 tkm; lognormal SD95 2.09
  (4,5,nA,nA,nA,nA); Estimated with standard distances

## Emissions to nature
- Chloride [emissions to water, river]: 0.00023 kg; lognormal SD95 2.04
  (nA,nA,nA,nA,nA,nA); Calculated from data of chemical demand
- Sodium [emissions to water, river]: 7e-5 kg; lognormal SD95 2.02
  (nA,nA,nA,nA,nA,nA); Calculated from data of chemical demand
- Heat, waste [emissions to air, high. pop.]: 0.00162 MJ; lognormal SD95 1.85
  (nA,nA,nA,nA,nA,nA); Calculated from electricity demand
- Carbon dioxide, biogenic [emissions to air, high. pop.]: 0.00023 kg; lognormal SD95 2.04
  (nA,nA,nA,nA,nA,nA); Calculated from data of chemical demand

## Sampling procedure
Data for regeneration chemical demand based mainly on design calculations for the specified water quality. Data on energy demand based on few literature sources. Emissions calculated from process input. Standard distances used for transports.

## Sources
- Althaus H.-J., Chudacoff M., Hellweg S., Hischier R., Jungbluth N., Osses M., Primas A., 2007, 2007 - LCI chemicals - Althaus, Final report ecoinvent data v2.0, 8, Swiss Centre for LCI, Empa - TSL, ETH, ESU-services Ltd., Chudacoff Oekoscience, Duebendorf, CH
Althaus H.-J., Chudacoff M., Hischier R., Jungbluth N., Osses M., Primas A. (2007) Life Cycle Inventories of Chemicals. Final report ecoinvent data v2.0. Volume: 8. Swiss Centre for LCI, Empa - TSL. Dübendorf, CH.
Type: Measurement on site
Source: CD-ROM
First author: Althaus H.-J.
Other authors: Chudacoff M., Hischier R., Jungbluth N., Osses M., Primas A.
Year: 2007
Title of anthology: Final report ecoinvent data v2.0
Place of publication: Dübendorf, CH
Publisher: Swiss Centre for LCI, Empa - TSL
Volume No: 8

## Validation
Proof reading validation: Passed.; Other validation: none;
