# Electricity, hydropower, at reservoir power plant

Dataset: EcoSpold 1, unit process
Functional unit: 1 kWh
Category: electricity by fuel / hydro\reservoir
Geography: BR
Time period: 2005-01 to 2005-12
Generated by: Karin Flury
accessRestrictedTo: 0
copyright: true

## General comment
The dataset consists of figures of the Itaipu hydropower station complemented with European data. Considered are the area used, the amount of turbined water and the greenhouse gas emissions. The lifetime is assumed to be 150 years for the dams and 80 years for the other material. The data describe a mix and can therefore not be used for an individual storage hydropower station. This dataset is recalculated based on Itaipu Binacional, Frischknecht et al. (1996) and Bauer (2007), complemented with data from Vattenfall (2008) and Diem et al. (2008).;

## Included processes
Operation of an average storage hydropower station in Brazil. It includes the area transformed and occupied, the volume of the reservoir, greenhouse gas emissions, the consumption of lubricant oil and the amount of turbined water.

## Geography
Average Brazilian electricity production in storage hydropower station

## Technology
Average installed technology. Efficiency 0.78. Annual production volume: 190GWh/a.

## Reference product
- Electricity, hydropower, at reservoir power plant [BR]: 1 kWh
  BRAZIL

## Inputs from technosphere
- Lubricating oil, at plant [RER]: 3.244e-8 kg; lognormal SD95 1.65108
  (5,5,3,5,1,5,BU:1.05); Turbines; based on Vattenfall (2008)
- Reservoir hydropower plant [BR]: 8.88889e-14 p; lognormal SD95 3.14947
  (4,5,3,3,1,5,BU:3); Infrastructure of the storage power station producing the electricity
- Sulphur hexafluoride, liquid, at plant [RER]: 3.4e-13 kg; lognormal SD95 1.65108
  (5,5,3,5,1,5,BU:1.05); In electric insulation (e.g. switches); based on Vattenfall (2008)

## Inputs from nature
- Water, turbine use, unspecified natural origin [resources, in water]: 0.290131 m3; lognormal SD95 1.30104
  (4,1,1,3,1,5,BU:1.05); Amount of water turbined for the generation of electricity; based on data of the Itaipu
- Energy, potential (in hydropower reservoir), converted [resources, in water]: 3.79 MJ; lognormal SD95 1.11301
  (3,1,1,1,1,1,BU:1.05); Potential energy of the water
- Transformation, to water bodies, artificial [resources, land]: 0.00012 m2; lognormal SD95 2.09555
  (4,1,1,3,1,5,BU:2); Area covered by the reservoir; based on data of the Itaipu
- Volume occupied, reservoir [resources, in water]: 0.253333 m3y; lognormal SD95 1.30104
  (4,1,1,3,1,5,BU:1.05); Volume occupied by the reservoir; ; based on data of the Itaipu
- Occupation, industrial area, built up [resources, land]: 0.00018 m2a; lognormal SD95 1.61755
  (4,1,1,3,1,5,BU:1.5); Area occupied by the infrastructure; based on data of the Itaipu
- Occupation, water bodies, artificial [resources, land]: 0.018 m2a; lognormal SD95 1.61755
  (4,1,1,3,1,5,BU:1.5); Area occupied by the reservoir; based on data of the Itaipu
- Transformation, to industrial area, built up [resources, land]: 1.2e-6 m2; lognormal SD95 2.09555
  (4,1,1,3,1,5,BU:2); Area covered by infrastructures other than held-back river; recalculated based on Frischknecht et al. (1996)
- Transformation, from tropical rain forest [resources, land]: 0.0001212 m2; lognormal SD95 2.09555
  (4,1,1,3,1,5,BU:2); Original area before the construction of the power station; based on data of the Itaipu

## Emissions to nature
- Sulfur hexafluoride [emissions to air, low. pop.]: 3.4e-13 kg; lognormal SD95 1.90219
  (5,5,3,5,1,5,BU:1.5); From electric insulations (e.g. switches); based on Vattenfall (2008)
- Oils, unspecified [emissions to water, river]: 2.268e-8 kg; lognormal SD95 1.90219
  (5,5,3,5,1,5,BU:1.5); From turbines; based on Vattenfall (2008)
- Methane, biogenic [emissions to air, low. pop.]: 0.000556068 kg; lognormal SD95 4
  (4,3,3,3,1,3,BU:1.5); Methane emissions due to the biomass in the reservoirs; calculated based on Diem et al. (2008)
- Oils, unspecified [emissions to soil, industrial]: 9.76e-9 kg; lognormal SD95 1.90219
  (5,5,3,5,1,5,BU:1.5); From turbines; based on Vattenfall (2008)
- Carbon dioxide, land transformation [emissions to air, low. pop.]: 0.0308511 kg; lognormal SD95 2
  (4,3,3,3,1,3,BU:1.4); Carbon dioxide emissions due to the biomass in the reservoirs; calculated based on Diem et al. (2008)
- Water, BR [emissions to air, unspecified]: 25 kg; lognormal SD95 1.8924
  (4,3,3,2,4,5,BU:1.5); Water evaporated from reservoir; calculated based on Pfister et al. (2011)
- Water [emissions to water, unspecified]: 290.131 kg; lognormal SD95 2.5196
  (5,5,5,5,5,BU:1.05); All uncertainty-values set to 5.0 by default. Balance of input water

## Sampling procedure
literature

## Sources
- Flury K., Frischknecht R., 2012, 2012 - LCI hydroelectric power generation - Flury, Project report, 349, ESU-services Ltd., Uster, CH
Flury K., Frischknecht R. (2011) Life Cycle Inventory of hydropower. Project report. Volume: 349. ESU-services Ltd.. Uster, CH.
Type: Separate publication
Source: Report
First author: Flury K.
Other authors: Frischknecht R.
Year: 2011
Title of anthology: Project report
Place of publication: Uster, CH
Publisher: ESU-services Ltd.
Volume No: 349

## Validation
Proof reading validation: 22.10.2012; Other validation: \\Server\e\ESU-Docs\Projektablage\349 Sachbilanzen erneuerbare Energie DE\DatenErgebnisse\[Ecospold_reservoir_CH_v2.2.xlsx]X-Process;
