# xxx Particle board, outdoor use, at plant

Dataset: EcoSpold 1, unit process
Functional unit: 1 m3
Category: material, obsolete / wood, obsolete\products, obsolete
Geography: RER
Generated by: Hans-Joerg Althaus
accessRestrictedTo: 0
copyright: true

## Included processes
Includes the inputs to the production processes, transports of those inputs and the process emissions as far as they are available.; Geography: Data for Germany used for central Europe

## Technology
Average German Technology (1996)

## Reference product
- xxx Particle board, outdoor use, at plant [RER]: 1 m3
  Europe

## Inputs from technosphere
- Light fuel oil, burned in industrial furnace 1MW, non-modulating [RER]: 86 MJ; lognormal SD95 1.13
  (1,3,3,3,1,1);
- xxx Wood chips, softwood, from industry, u=40%, at plant [RER]: -0.34653 m3; lognormal SD95 1
  calculated
- Treatment, particle board production effluent, to wastewater treatment, class 3 [CH]: 0.19 m3; lognormal SD95 1.51
  (1,3,2,3,1,1);
- Hydrochloric acid, 30% in H2O, at plant [RER]: 1.36 kg; lognormal SD95 2.07
  (3,3,1,3,5,5);
- Wooden board manufacturing plant, organic bonded boards [RER]: 3.33e-8 p; lognormal SD95 3.36
  (4,5,2,3,4,5);
- xxx Industrial wood, hardwood, under bark, u=80%, at forest road [RER]: 0.128 m3; lognormal SD95 1.13
  (1,3,3,3,1,1);
- xxx Industrial residue wood, mix, hardwood, u=40%, at plant [RER]: 0.217 m3; lognormal SD95 1.13
  (1,3,3,3,1,1);
- Ammonia, liquid, at regional storehouse [RER]: 0.64 kg; lognormal SD95 2.07
  (3,3,1,3,5,5);
- Phenolic resin, at plant [RER]: 51 kg; lognormal SD95 2.07
  (3,3,1,3,5,5);
- Transport, freight, lorry, fleet average [RER]: 63.3 tkm; lognormal SD95 2.09
  (4,5,nA,nA,nA,nA);
- Natural gas, burned in industrial furnace 1MWth [CH]: 154 MJ; lognormal SD95 1.13
  (1,3,3,3,1,1);
- Electricity, medium voltage, production ENTSO-E, at grid: 104 kWh; lognormal SD95 1.13
  (1,3,3,3,1,1);
- Transport, freight, rail [RER]: 152 tkm; lognormal SD95 2.09
  (4,5,nA,nA,nA,nA);
- Wood chips, from industry, softwood, burned in furnace 300kW [CH]: 1100 MJ; lognormal SD95 1.13
  (1,3,3,3,1,1);
- Paraffin, at plant [RER]: 11 kg; lognormal SD95 2.07
  (3,3,1,3,5,5);
- xxx Industrial wood, softwood, under bark, u=140%, at forest road [RER]: 0.215 m3; lognormal SD95 1.13
  (1,3,3,3,1,1);
- Heavy fuel oil, burned in industrial furnace 1MW, non-modulating [RER]: 86 MJ; lognormal SD95 1.13
  (1,3,3,3,1,1);
- xxx Industrial residue wood, mix, softwood, u=40%, at plant [RER]: 0.823 m3; lognormal SD95 1.13
  (1,3,3,3,1,1);

## Inputs from nature
- Water, cooling, unspecified natural origin/m3 [resources, in water]: 0.304 m3; lognormal SD95 1.08
  (1,3,2,3,1,1);

## Emissions to nature
- Formaldehyde [emissions to air, unspecified]: 0.003 kg; lognormal SD95 2.01
  (1,3,2,3,1,1);
- Particulates, > 2.5 um, and < 10um [emissions to air, unspecified]: 0.0351 kg; lognormal SD95 2.11
  (3,3,1,3,3,5);
- Particulates, > 10 um [emissions to air, unspecified]: 0.039 kg; lognormal SD95 1.64
  (3,3,1,3,3,5);
- NMVOC, non-methane volatile organic compounds, unspecified origin [emissions to air, unspecified]: 0.166 kg; lognormal SD95 2.02
  (1,3,3,3,1,1);
- Particulates, < 2.5 um [emissions to air, unspecified]: 0.0039 kg; lognormal SD95 3.11
  (3,3,1,3,3,5);
- Heat, waste [emissions to air, unspecified]: 375 MJ; lognormal SD95 1.13
  (1,3,3,3,1,1);
- Water [emissions to water, unspecified]: 288.8 kg; lognormal SD95 2.5196
  (5,5,5,5,5,BU:1.05); All uncertainty-values set to 5.0 by default. Balance of input water

## Sampling procedure
Literature

## Extrapolations
see Geography and Technology

## Uncertainty adjustments
The assumption that the technology is representative for central Europe is considered in the uncertainties.

## Sources
- Werner F., Althaus H.-J., Kuenniger T., Richter K., Jungbluth N., 2007, 2007 - LCI wood as fuel and const. mat. - Werner, Final report ecoinvent data v2.0, 9, Swiss Centre for LCI, Empa - TSL, ESU-services Ltd., Duebendorf, CH
Werner F., Althaus H.-J., Künniger T., Richter K., Jungbluth N. (2007) 1Life Cycle Inventories of Wood as Fuel and Construction Material. Final report ecoinvent data v2.0. Volume: 9. Issue: 0. Swiss Centre for LCI, Empa - TSL. Dübendorf, CH.
Type: Measurement on site
Source: CD-ROM
First author: Werner F.
Other authors: Althaus H.-J., Künniger T., Richter K., Jungbluth N.
Year: 2007
Title of anthology: Final report ecoinvent data v2.0
Place of publication: Dübendorf, CH
Publisher: Swiss Centre for LCI, Empa - TSL
Volume No: 9
Issue No: 0

## Validation
Proof reading validation: passed; Other validation: none;
