# Open cast mine, hard coal

Dataset: EcoSpold 1, unit process, infrastructure
Functional unit: 1 p
Category: fuels / coal\produced coal\mined coal\infrastructure
Geography: GLO
Time period: 2000-01 to 2000-12
Generated by: Christian Bauer
accessRestrictedTo: 0
copyright: true

## General comment
Information was available only for a few mines. For the preparation of this module only amounts per tonne were available. The module has to be considered as a first approximation and may not reflect specific mines. Lifetime is assumed to be 30 years to take into account the lifetime of machinery. For defining the total production of a unit model mine, one million tonne per year has been estimated as an average worldwide (excluding small mines in China). This estimation includes open pit as well as underground mines. Therefore the total lifetime production of 30 million tonne shall be considered as a normalisation factor more than an actual average value for the real open pit mines. Explosives are assumed to be used only during operation.;

## Included processes
This module includes an estimation of the most important construction materials and energy use for a model mine. The landuse for the infrastructure is also included. The machinery used for mining operation has been included in this module, because the relevant material use is not separated from the total material use in the available references.

## Geography
Average European conditions.

## Technology
No specific information available.

## Reference product
- Open cast mine, hard coal [GLO]: 1 p
  Global

## Inputs from technosphere
- Plywood, outdoor use, at plant [RER]: 165 m3; lognormal SD95 3
  own assumption
- Copper, at regional storage [RER]: 90000 kg; lognormal SD95 3
  own assumption
- Transport, freight, lorry, fleet average [RER]: 4.21e6 tkm; lognormal SD95 2
  standard for transports
- Reinforcing steel, at plant [RER]: 2.1e6 kg; lognormal SD95 3
  own assumption
- Transport, freight, rail [RER]: 8.42e6 tkm; lognormal SD95 2
  standard for transports
- Diesel, burned in building machine, average [CH]: 1.2e8 MJ; lognormal SD95 3
  own assumption
- Disposal, wood untreated, 20% water, to sanitary landfill [CH]: 89900 kg; lognormal SD95 3
  own assumption
- Steel, low-alloyed, at plant [RER]: 900000 kg; lognormal SD95 3
  own assumption
- Heat, heavy fuel oil, at industrial furnace 1MW [RER]: 1.8e8 MJ; lognormal SD95 3
  own assumption
- Synthetic rubber, at plant [RER]: 3e6 kg; lognormal SD95 3
  own assumption
- Electricity, medium voltage, production ENTSO-E, at grid: 9e6 kWh; lognormal SD95 3
  own assumption
- Blasting [RER]: 3.6e7 kg; lognormal SD95 3
  own assumption
- Concrete, normal, at plant [CH]: 3750 m3; lognormal SD95 3
  own assumption

## Inputs from nature
- Occupation, industrial area [resources, land]: 1.14e7 m2a; lognormal SD95 5
  large spread in data
- Transformation, from unknown [resources, land]: 570000 m2; lognormal SD95 5
  large spread in data
- Transformation, to industrial area [resources, land]: 570000 m2; lognormal SD95 5
  large spread in data

## Emissions to nature
- Heat, waste [emissions to air, low. pop.]: 3.24e7 MJ; lognormal SD95 3
  own assumption

## Sampling procedure
literature

## Extrapolations
see Geography/Text

## Sources
- Dones R., Bauer C., Roeder A., 2007, 2007 - Coal - Dones, Sachbilanzen von Energiesystemen. Final report No. 6 ecoinvent data v2.0, 6, Swiss Centre for LCI, PSI, Duebendorf and Villigen, CH
Röder, A., Ch. Bauer, R. Dones (2007) Kohle. Sachbilanzen von Energiesystemen. Final report No. 6 ecoinvent data v2.0. Editors: Dones R.. Volume: 6. Swiss Centre for LCI, PSI. Dübendorf and Villigen, CH.
Type: Measurement on site
Source: CD-ROM
First author: Röder, A.
Other authors: Ch. Bauer, R. Dones
Year: 2007
Name of editors: Dones R.
Title of anthology: Sachbilanzen von Energiesystemen. Final report No. 6 ecoinvent data v2.0
Place of publication: Dübendorf and Villigen, CH
Publisher: Swiss Centre for LCI, PSI
Volume No: 6

## Validation
Proof reading validation: passed; Other validation: none;
