# Fuel in building machine, excavation hydraulic digger

Dataset: EcoSpold 1, unit process
Functional unit: 1 MJ
Category: energy supply, kbob recommendation / fuels (motors), fossil
Geography: CH
Time period: 2004-01 to 2004-12
Share of production covered: 0 %
Generated by: Niels Jungbluth
accessRestrictedTo: 0
copyright: true

## General comment
Inventory refers to the entire transport life cycle. For road infrastructure, expenditures and environmental interventions due to construction, renewal and disposal of roads have been allocated based on the Gross tonne kilometre performance. Expenditures due to operation of the road infrastructure, as well as land use have been allocated based on the yearly vehicle kilometre performance. For the attribution of vehicle share to the transport performance a vehicle life time performance of 2.39E05 pkm/vehicle have been assumed. Average utilization of 1.59 passengers/car.;

## Included processes
operation, passenger car, methane, 96 vol-%, from biogas; passenger car; maintenance, passenger car; disposal, passenger car; road; operation, maintenance, road; disposal, road

## Geography
The data for vehicle operation and road infrastructure reflect Swiss conditions. Data for vehicle manufacturing and maintenance represents generic European data. Data for the vehicle disposal reflect Swiss situation.

## Technology
Vehicle operation: Euro3. Road construction comprises bitumen and concrete roads. For the manufacturing of vehicles, the data reflects current modern technologies.

## Reference product
- Fuel in building machine, excavation hydraulic digger [CH]: 1 MJ

## Inputs from technosphere
- Excavation, hydraulic digger, without infrastructure [CH]: 0.16926 m3; lognormal SD95 2
  (1,1,1,1,1,1); calculation based on ecoinvent reports

## Sources
- Jungbluth N., Chudacoff M., Dauriat A., Dinkel F., Doka G., Faist Emmenegger M., Gnansounou E., Kljun N., Spielmann M., Stettler C., Sutter J., 2007, 2007 - LCI bioenergy - Jungbluth, Final report ecoinvent data v2.0, 17, Swiss Centre for LCI, ESU-services Ltd., Duebendorf and Uster, CH
Jungbluth N., Chudacoff M., Dauriat A., Dinkel F., Doka G., Faist Emmenegger M., Gnansounou E., Kljun N., Spielmann M., Stettler C., Sutter J. (2007) Life Cycle Inventories of Bioenergy. Final report ecoinvent data v2.0. Volume: 17. Swiss Centre for LCI, ESU. Duebendorf and Uster, CH.
Type: Measurement on site
Source: CD-ROM
First author: Jungbluth N.
Other authors: Chudacoff M., Dauriat A., Dinkel F., Doka G., Faist Emmenegger M., Gnansounou E., Kljun N., Spielmann M., Stettler C., Sutter J.
Year: 2007
Title of anthology: Final report ecoinvent data v2.0
Place of publication: Duebendorf and Uster, CH
Publisher: Swiss Centre for LCI, ESU
Volume No: 17

## Validation
Proof reading validation: automatic validation in Excel; Other validation: none;
