# Cogen unit 1MWe, common components for heat+electricity

Dataset: EcoSpold 1, unit process, infrastructure
Functional unit: 1 p
Category: heat / natural gas\cogeneration\power unit\infrastructure
Geography: RER
Time period: 1990-01 to 2000-12
Generated by: Thomas Heck
accessRestrictedTo: 0
copyright: true

## General comment
The module summarises infrastructure components of a cogeneration unit. ;

## Included processes
The module includes all shared components for heat and electricity production.

## Geography
Extrapolated from data of a plant in Switzerland, assumed valid for Europe (RER).

## Technology
Extrapolated from data of a 160kWe lambda=1 plant, adjusted to lean burn technology currently available on market, no catalytic converters.

## Reference product
- Cogen unit 1MWe, common components for heat+electricity [RER]: 1 p
  Europe

## Inputs from technosphere
- Supply air input/spent air output cogen unit 160kWe [RER]: 2.61 p; lognormal SD95 1.5
  uncertainty of life time and extrapolation
- Control cabinet cogen unit 160kWe [RER]: 2.61 p; lognormal SD95 1.5
  uncertainty of life time and extrapolation
- Planning, cogen unit 160kWe [RER]: 2.61 p; lognormal SD95 1.5
  uncertainty of life time and extrapolation
- Gas motor 206kW [RER]: 5.26 p; lognormal SD95 1.7
  uncertainty of life time and extrapolation
- Assembly, module cogen unit 160kWe [RER]: 2.61 p; lognormal SD95 1.5
  uncertainty of life time and extrapolation
- Maintenance, cogen unit 160kWe [RER]: 2.89 p; lognormal SD95 1.5
  uncertainty of life time and extrapolation
- Construction work, cogen unit 160kWe [RER]: 2.61 p; lognormal SD95 1.5
  uncertainty of life time and extrapolation
- Operation start, cogen unit 160kWe [RER]: 2.61 p; lognormal SD95 1.5
  uncertainty of life time and extrapolation
- Sound insulation cogen unit 160kWe [RER]: 2.61 p; lognormal SD95 1.5
  uncertainty of life time and extrapolation

## Sampling procedure
Operator and manufacturer information

## Extrapolations
see Geography/Text, see Technolgy Text

## Sources
- Heck T., 2007, 2007 - Combined heat power generation - Heck, Sachbilanzen von Energiesystemen. Final report No. 6 ecoinvent data v2.0, 6, Swiss Centre for LCI, PSI, Duebendorf and Villigen, CH
Heck, T. (2007) Wärme-Kraft-Kopplung. Sachbilanzen von Energiesystemen. Final report No. 6 ecoinvent data v2.0. Editors: Dones R.. Volume: 6. Swiss Centre for LCI, PSI. Dübendorf and Villigen, CH.
Type: Measurement on site
Source: CD-ROM
First author: Heck, T.
Year: 2007
Name of editors: Dones R.
Title of anthology: Sachbilanzen von Energiesystemen. Final report No. 6 ecoinvent data v2.0
Place of publication: Dübendorf and Villigen, CH
Publisher: Swiss Centre for LCI, PSI
Volume No: 6

## Validation
Proof reading validation: passed; Other validation: none;
