# Disposal, heat pump, Limmatschulhaus

Dataset: EcoSpold 1, unit process
Functional unit: 1 p
Category: energy supply, kbob recommendation / heat pumps, waste water
Geography: CH
Time period: 2004-01 to 2004-12
Share of production covered: 0 %
Generated by: Matthias Tuchschmid
accessRestrictedTo: 0
copyright: true

## General comment
This data set describes the disposal of the heat pump and its components as well as the emissions of cooling agent.;

## Included processes
This data set includes the disposal of the heat pump and its components.

## Geography
This data represent the dissembling in Switzerland.

## Technology
Data set for a brine-water heat pump.

## Time period
Data from literature.

## Reference product
- Disposal, heat pump, Limmatschulhaus [CH]: 1 p

## Inputs from technosphere
- Disposal, polyethylene, 0.4% water, to municipal incineration [CH]: 900 kg; lognormal SD95 1.2323
  (2,3,2,1,3,3); Literature
- Disposal, plastics, mixture, 15.3% water, to municipal incineration [CH]: 2.224 kg; lognormal SD95 1.2252
  (1,3,2,1,3,3); Literature
- Disposal, plastic, industr. electronics, 15.3% water, to municipal incineration [CH]: 0.22131 kg; lognormal SD95 1.2252
  (1,3,2,1,3,3); Literature
- Disposal, used mineral oil, 10% water, to hazardous waste incineration [CH]: 15 kg; lognormal SD95 1.2323
  (2,3,2,1,3,3); Literature
- Disposal, polyvinylchloride, 0.2% water, to municipal incineration [CH]: 0.1612 kg; lognormal SD95 1.2252
  (1,3,2,1,3,3); Literature

## Emissions to nature
- Ethane, 1,1,1,2-tetrafluoro-, HFC-134a [emissions to air, high. pop.]: 1.5 kg; lognormal SD95 1.5697
  (1,3,2,1,3,3); Literature

## Extrapolations
Extrapolated from a 50 kW heat pump

## Sources
- Faist Emmenegger M., Frischknecht R., 2005, 2005 - LCA heat pump raw sewage - Faist Emmenegger, -, ESU-services Ltd., Uster, CH
Rolf Frischknecht, Mireille Faist Emmenegger (2004) Nutzwärmebereitstellung mit Wärmepumpe für Rohabwasser. Uster.
Type: Separate publication
Source: Interner Bericht
First author: Rolf Frischknecht
Other authors: Mireille Faist Emmenegger
Year: 2004
Place of publication: Uster

## Validation
Proof reading validation: automatic validation in Excel; Other validation: none;
