# xxx Electricity, production mix CN

Dataset: EcoSpold 1, unit process
Functional unit: 1 kWh
Category: electricity / notMaintained
Geography: CN
Time period: 2005-01 to 2005-12
Production volume: 3457 TWh
Share of production covered: 100 %
Generated by: René Itten
accessRestrictedTo: 0
copyright: true

## General comment
Electricity domestic net production shares are based on IEA statistics for the year 2008.;

## Included processes
It includes the shares of domestic electricity production by technology at the busbar. It does not include transformation, transport nor distribution losses. Photovoltaic electricity modelled with country-specific dataset that was created within project 174; Philippe Stolz, June 2020.

## Geography
Data apply to public and self producers in China.

## Technology
No technology description is provided because the dataset just describes the power plant portfolio of the respective country using current (2004) average technology per energy carrier.

## Time period
Time period of statistics used (2008).

## Reference product
- xxx Electricity, production mix CN [CN]: 1 kWh
  CHINA

## Inputs from technosphere
- Electricity, hydropower, at reservoir power plant, non alpine regions [RER]: 0.13946 kWh; lognormal SD95 1.0511
  (1,1,1,2,1,1); estimated share of reservoir hydropower production in China: 75%
- Electricity, from natural gas [CN]: 0.0087763 kWh; lognormal SD95 1.05
  (1,1,1,1,1,1); assumption for natural gas power production in China, value: IEA statistics 2008
- Electricity, hydropower, at run-of-river power plant [RER]: 0.046485 kWh; lognormal SD95 1.0511
  (1,1,1,2,1,1); estimated share of ROR hydropower production in China: 25%
- Electricity, industrial gas, at power plant [CENTREL]: 0.0061145 kWh; lognormal SD95 1.0511
  (1,1,1,2,1,1); assumption for industrial, coke and blast furnace gas power production in China, value: IEA statistics 2008
- Electricity, oil, at power plant [SK]: 0.0066218 kWh; lognormal SD95 1.0541
  (1,1,1,3,1,1); assumption for petroleum product and fuel oil power production in China, value: IEA statistics 2008
- Electricity, hard coal, at power plant [CN]: 0.76699 kWh; lognormal SD95 1.0541
  (1,1,1,3,1,1); assumption for hard coal power production in China, value: IEA statistics 2008
- Electricity, at wind farm [RER]: 0.0041978 kWh; lognormal SD95 1.0511
  (1,1,1,2,1,1); assumption for geothermal power production in China, value: IEA statistics 2008
- Electricity, nuclear, at power plant pressure water reactor [CN]: 0.020634 kWh; lognormal SD95 1.0511
  (1,1,1,2,1,1); assumption for nuclear power production in China using PWR, value: IEA statistics 2008, fraction: IAEA Database 2010 (PRIS)
- Electricity, production mix photovoltaic, at plant [CN]: 5.1892e-5 kWh; lognormal SD95 1.05
  (1,1,1,1,1,1); assumption for solar power production in China, value: IEA statistics 2008
- Electricity, at cogen 1MWth, wood chips, allocation exergy [CH]: 0.00066724 kWh; lognormal SD95 1.0541
  (1,1,1,3,1,1); assumption for cogeneration power production in China, value: IEA statistics 2008

## Sampling procedure
Statistical data

## Sources
- Frischknecht R., Itten R., Flury K., 2012, 2012 - GHG emis. from Swiss elec. mixes - Frischknecht, Project reports, 401, ESU-services Ltd., Uster, CH
Itten, R., Frischknecht, R. (2012) Life Cycle Inventories of electricity mixes. Project reports. Volume: 401. ESU-services Ltd.. Uster, CH.
Type: Separate publication
First author: Itten, R.
Other authors: Frischknecht, R.
Year: 2012
Title of anthology: Project reports
Place of publication: Uster, CH
Publisher: ESU-services Ltd.
Volume No: 401

## Validation
Proof reading validation: automatic validation in Excel; Other validation: Z:\ESU-Docs\Projekte laufend\401 Update Strommix v3.0\EcoSpold\_Asien\[401-electricity-mix-china-CN-v1.0.xlsx]X-Process;
