# Operation, tram track

Dataset: EcoSpold 1, unit process, infrastructure
Functional unit: 1 my
Category: transport systems / road\operations\infrastructure
Geography: CH
Time period: 2000-01 to 2000-12
Generated by: Michael Spielmann
accessRestrictedTo: 0
copyright: true

## General comment
Material consumption due to tram track renewal are not included. The consumption of these materials are included in the module "tram track". (assumed life span of infrastructure = 15 years);

## Included processes
The inventory includes energy consumption for signals. Furthermore, land occupation and transformation are included.

## Geography
Data refers to average conditions in Switzerland. For de icing activities, a recent Austrian has been applied.

## Technology
Swiss state of the art technology

## Time period
Tram track length is based on current statistical data (2000).

## Reference product
- Operation, tram track [CH]: 1 my
  SWITZERLAND

## Inputs from technosphere
- Electricity, medium voltage, at grid [CH]: 79.5 kWh; lognormal SD95 1.27
  (3,3,3,1,1,5); literature studies

## Inputs from nature
- Occupation, traffic area, road network [resources, land]: 6.5 m2a; lognormal SD95 1.51
  (2,2,1,1,na,2); literature studies
- Transformation, to traffic area, road network [resources, land]: 0.0065 m2; lognormal SD95 2.02
  (2,2,1,1,na,4); literature studies
- Transformation, from unknown [resources, land]: 0.0065 m2; lognormal SD95 2.01
  (2,2,1,1,na,3); literature studies

## Emissions to nature
- Heat, waste [emissions to air, unspecified]: 286 MJ; lognormal SD95 1.27
  (3,3,3,1,1,5); literature studies

## Sampling procedure
national statistics, data published in literature and expert estimates

## Sources
- Spielmann M., Bauer C., Dones R., Tuchschmid M., 2007, 2007 - Transport services - Spielmann, Final report ecoinvent Data v2.0, 14, Swiss Centre for LCI, PSI, ESU-services Ltd., Duebendorf, Villigen and Uster, CH
Spielmann M., Dones R; Bauer C. (2007) Life Cycle Inventories of Transport Services. Final report ecoinvent Data v2.0. Volume: 14. Issue: 0. Swiss Centre for LCI, PSI. Dübendorf and Villigen, CH.
Type: Measurement on site
Source: CD-ROM
First author: Spielmann M.
Other authors: Dones R; Bauer C.
Year: 2007
Title of anthology: Final report ecoinvent Data v2.0
Place of publication: Dübendorf and Villigen, CH
Publisher: Swiss Centre for LCI, PSI
Volume No: 14
Issue No: 0

## Validation
Proof reading validation: Passed.; Other validation: none;
