# Residual wood, dry, from three layered laminated board production, for outdoor use, measured as dry mass, at plant

Dataset: EcoSpold 1, unit process
Functional unit: 1 kg
Category: wood / wooden materials\new processes\other material
Geography: RER
Time period: 2000-01 to 2016-12
Generated by: default
accessRestrictedTo: 0
copyright: true

## Reference product
- Residual wood, dry, from three layered laminated board production, for outdoor use, measured as dry mass, at plant [RER]: 1 kg

## Inputs from technosphere
- Transport, freight, lorry, fleet average [RER]: 0.004115 tkm
  Pedigree: (1,1,4,5,4).
- Transport, freight, rail [RER]: 0.008488 tkm
  Pedigree: (1,1,4,5,4).
- Sawnwood, board, softwood, raw, dried (u=10%), at sawmill [RER]: 0.0005151 m3
  Pedigree: (2,4,5,3,1).
- Lubricating oil, at plant [RER]: 8.672e-7 kg
  Pedigree: (2,4,5,3,1).
- Electricity, medium voltage, production ENTSO-E, at grid: 0.03994 kWh
  Pedigree: (2,4,5,3,1).
- Heat, hardwood chips from industry, at furnace 50kW [CH]: 0.2864 MJ
  Pedigree: (2,4,5,3,1).
- Wooden board manufacturing plant, organic bonded boards [RER]: 6.859e-12 p
  Pedigree: (4,5,5,3,4).
- Vinyl acetate, at plant [RER]: 0.00165 kg
  Pedigree: (2,4,5,3,1).
- Diesel, burned in building machine, average [CH]: 0.003705 MJ
  Pedigree: (2,4,5,3,1).

## Inputs from nature
- Energy, gross calorific value, in biomass [resources, biotic]: 18.21 MJ
  Pedigree: (1,1,2,1,1).
- Carbon dioxide, in air [resources, in air]: 1.616 kg
  Pedigree: (1,1,2,1,1).

## Sources
- Werner F., 2017, 2017 - LCI wood and wood based products - Werner, Project Report, 0, Environment & Development, Zuerich, CH
