# Ventilation duct, PE corrugated tube, DN 75, at plant

Dataset: EcoSpold 1, unit process
Functional unit: 1 m
Category: construction / ventilation\components
Geography: RER
Time period: 2003-01 to 2003-12
Generated by: Alex Primas
accessRestrictedTo: 0
copyright: true

## General comment
Production of a typical component used for a ventilation system in a multi family house. The house considered in the investigation includes 6 flats with 130 m2 floor area each and a ventilation rate of 120 m3/h.;

## Technology
Extruded polyethylene tube with a weight of 0.33 kg/m. Outside corrugated, inside plane

## Time period
Materials investigated in 2003

## Reference product
- Ventilation duct, PE corrugated tube, DN 75, at plant [RER]: 1 m
  Europe

## Inputs from technosphere
- Transport, freight, rail [RER]: 0.0693 tkm; lognormal SD95 2.09
  (4,5,nA,nA,nA,nA); Standard distance of ecoinvent used
- Light fuel oil, burned in industrial furnace 1MW, non-modulating [RER]: 0.478 MJ; lognormal SD95 1.38
  4,5,1,1,1,5; Data estimated from related companies
- Extrusion, plastic pipes [RER]: 0.347 kg; lognormal SD95 1.24
  (2,4,1,1,1,5); Questionnaire
- Electricity, medium voltage, production ENTSO-E, at grid: 0.0363 kWh; lognormal SD95 1.69
  (3,5,5,1,3,5); Data estimated from related processes
- Transport, freight, lorry, fleet average [RER]: 0.0348 tkm; lognormal SD95 2.09
  (4,5,nA,nA,nA,nA); Standard distance of ecoinvent used
- Natural gas, burned in industrial furnace 1MWth [CH]: 0.478 MJ; lognormal SD95 1.38
  (4,5,1,1,1,5); Data estimated from related companies
- Plastics processing factory [RER]: 2.44e-10 p; lognormal SD95 3.18
  (4,5,1,1,3,5); Calculated with data of a similar company
- Disposal, polyethylene, 0.4% water, to municipal incineration [CH]: 0.0165 kg; lognormal SD95 1.32
  (4,4,1,1,1,5); Estimations on precentage material disposed
- Polyethylene, HDPE, granulate, at plant [RER]: 0.347 kg; lognormal SD95 1.24
  (2,4,1,1,1,5); Questionnaire

## Emissions to nature
- Heat, waste [emissions to air, high. pop.]: 0.131 MJ; lognormal SD95 1.69
  (3,5,5,1,3,5); Calculated from electricity use

## Sampling procedure
Sampling procedure: Questionnaire and technical information of producer. Data of one common product used.

## Sources
- Haessig W., Primas A., 2007, 2007 - LCI comfort ventilation in dwellings - Haessig, Final report ecoinvent Data v2.0, 25, Swiss Centre for LCI, B+H, Duebendorf and Zuerich, CH
Hässig, W., Primas, A. (2007) Ökologische Aspekte der Komfortlüftungen im Wohnbereich. Final report ecoinvent Data v2.0. Volume: 25. Swiss Centre for LCI, B+H. Dübendorf and Zürich, CH.
Type: Measurement on site
Source: CD-ROM
First author: Hässig, W.
Other authors: Primas, A.
Year: 2007
Title of anthology: Final report ecoinvent Data v2.0
Place of publication: Dübendorf and Zürich, CH
Publisher: Swiss Centre for LCI, B+H
Volume No: 25

## Validation
Proof reading validation: passed; Other validation: none;
