# Disposal, heat production system, specific heat demand 10W

Dataset: EcoSpold 1, unit process
Functional unit: 1 m2
Category: waste management / building demolition
Geography: CH
Time period: 1994-01 to 2008-12
Generated by: Alex Primas
accessRestrictedTo: 0
copyright: true

## General comment
Disposal of an average heat production system for a building with a specific heat demand of 10 W per m2 heated gross floor area;

## Included processes
Metals not included (cut-off to recycling); for other materials: disposal process according to waste material type; no transports included.

## Geography
Specific to the technology mix for waste treatment encountered in Switzerland.

## Technology
Metal parts are recycled (cut off), plastic parts are incinerated, paint to final disposal, inert wastes (e.g. rock or glass wool) are landfilled.

## Time period
Amount of material for average investigated in 2008. Process information partly from 1994 to 2003. Disposal technology mix as used in late 1990ies

## Reference product
- Disposal, heat production system, specific heat demand 10W [CH]: 1 m2
  SWITZERLAND

## Inputs from technosphere
All rows: lognormal SD95 1.3117
- Disposal, hazardous waste, 25% water, to hazardous waste incineration [CH]: 0.0012225 kg
  (2,3,4,1,1,5); Average based on assumptions, older data sources used
- Disposal, building, mineral wool, to final disposal [CH]: 0.061038 kg
  (2,3,4,1,1,5); Average based on assumptions, older data sources used
- Disposal, plastics, mixture, 15.3% water, to municipal incineration [CH]: 0.0025654 kg
  (2,3,4,1,1,5); Average based on assumptions, older data sources used
- Disposal, inert waste, 5% water, to construction waste landfill [CH]: 0.16065 kg
  (2,3,4,1,1,5); Average based on assumptions, older data sources used
- Disposal, packaging cardboard, 19.6% water, to municipal incineration [CH]: 0.002625 kg
  (2,3,4,1,1,5); Average based on assumptions, older data sources used

## Sampling procedure
Waste-specific calculation based on production input data

## Sources
- Primas A., 2008, 2008 - LCA building tech. inst. SIA 2032 - Primas, Schlussbericht, B&H AG, Zuerich, CH
Primas A. (2008) Ökologische Bewertung von Gebäudetechnikanlagen für SIA 2032. Schlussbericht. Amt für Hochbauten der Stadt Zürich. Zürich.
Type: Separate publication
Source: Report
First author: Primas A.
Year: 2008
Title of anthology: Schlussbericht
Place of publication: Zürich
Publisher: Amt für Hochbauten der Stadt Zürich
