# Ventilation system, Schulhaus Heslibach

Dataset: EcoSpold 1, unit process, infrastructure
Functional unit: 1 p
Category: ventilation / production of components
Geography: CH
Time period: 2014-01 to 2014-12
Generated by: Alex Primas
accessRestrictedTo: 0
copyright: true

## General comment
Production of a ventilation system for a school with schoolrooms and recreation room. The inventory is based on a building with a total heated gross floor area of 2849 m2 and a total nominal air flow of 13630 m3/h, total weight of the components: 3822 kg/Unit, building with a specific air flow rate of 4.8 m3/h per m2 heated gross floor area. Data from call of bid including components for air handling units, ducts including insulation, air valves, roof-hoods, dampers, fire dampers, silencers. The data represent a ductwork mainly made of galvanized steel and includes air handling units mainly with heat recovery. System with central and decentral air handling units. Building without ground heat exchanger.;

## Included processes
Materials used for the production. Energy use for the different production steps and for heating the production building. Transport of raw materials to the plant. Estimation for infrastructure of the production site included.

## Technology
Technology, materials and components used for ventilation systems in commercial and public buildings

## Time period
Amount of material investigated in 2013. Process information partly from 2003 to 2012

## Reference product
- Ventilation system, Schulhaus Heslibach [CH]: 1 p
  SWITZERLAND

## Inputs from technosphere
- Ventilation unit 13000 m3/h, w. rotary heat exchanger, at plant [CH]: 0.737 p; lognormal SD95 1.26
  (3,4,1,1,1,5); Data from building considered, estimations
- Ventilation duct, steel, zinc coated, s= 0.62mm, at plant [CH]: 596.23 m2; lognormal SD95 1.24
  (2,4,1,1,1,5); Data from building considered, typical installation
- Ventilation unit 3500 m3/h, w. cross plate heat excanger, at plant [CH]: 0.729 p; lognormal SD95 1.26
  (3,4,1,1,1,5); Data from building considered, estimations
- Ventilation duct, steel, zinc coated, s= 1.25mm, at plant [CH]: 55.867 m2; lognormal SD95 1.24
  (2,4,1,1,1,5); Data from building considered, typical installation
- Ventilation duct, steel, zinc coated, s= 1.0mm, at plant [CH]: 2.8746 m2; lognormal SD95 1.24
  (2,4,1,1,1,5); Data from building considered, typical installation
- Spiral-seam duct, steel, zinc coated, s= 1.0mm, at plant [CH]: 2.5308 m2; lognormal SD95 1.24
  (2,4,1,1,1,5); Data from building considered, typical installation
- Spiral-seam duct, steel, zinc coated, s= 0.6mm, at plant [CH]: 465.53 m2; lognormal SD95 1.24
  (2,4,1,1,1,5); Data from building considered, typical installation
- Thermal insulation, 30mm, 40kg/m3, stainless steel cladding, at plant [CH]: 21.393 m2; lognormal SD95 1.24
  (2,4,1,1,1,5); Data from building considered, typical installation
- Flexible duct, aluminum/PET, DN of 125, at plant [RER]: 4.7814 m; lognormal SD95 1.24
  (2,4,1,1,1,5); Data from building considered, typical installation
- Ventilation system, Schulhaus Heslibach, various components [CH]: 1 p; lognormal SD95 1.24
  (2,4,1,1,1,5); Data from building considered, typical installation
- Ventilation duct, PE corrugated tube, DN 75, at plant [RER]: 827.92 m; lognormal SD95 1.24
  (2,4,1,1,1,5); Data from building considered, typical installation
- Spiral-seam duct, steel, zinc coated, s= 0.8mm, at plant [CH]: 44.772 m2; lognormal SD95 1.24
  (2,4,1,1,1,5); Data from building considered, typical installation
- Thermal insulation, 30mm, 40kg/m3, reinforced alumium foil, at plant [CH]: 801.91 m2; lognormal SD95 1.24
  (2,4,1,1,1,5); Data from building considered, typical installation
- EI 30 fire insulation, 50mm, 120kg/m3, reinforced alumium foil, at plant [CH]: 710.01 m2; lognormal SD95 1.24
  (2,4,1,1,1,5); Data from building considered, typical installation
- Ventilation duct, steel, zinc coated, s= 0.75mm, at plant [CH]: 397.65 m2; lognormal SD95 1.24
  (2,4,1,1,1,5); Data from building considered, typical installation
- Ventilation duct, steel, zinc coated, s= 0.87mm, at plant [CH]: 280.69 m2; lognormal SD95 1.24
  (2,4,1,1,1,5); Data from building considered, typical installation
- Spiral-seam duct, steel, zinc coated, s= 0.5mm, at plant [CH]: 351.16 m2; lognormal SD95 1.24
  (2,4,1,1,1,5); Data from building considered, typical installation
- Ventilation equipment, central, 600-1200 m3/h, at plant [RER]: 2 p; lognormal SD95 1.26
  (3,4,1,1,1,5); Data from building considered, estimations

## Sampling procedure
Data from call of bids for a ventilation system of a specific building used. Data completed with information from literature and from manufacturers

## Sources
- Klingler M., Kasser U., Savi D., Primas A., Stettler Y., Gujer P., 2014, 2014 - LCA ventilation and heating systems - Klingler, Schlussbericht, BFE, Buero fuer Umweltchemie, B&H AG, Zuerich, CH
Klingler M., Kasser U., Savi D., Primas A., Stettler Y., Gujer P. (2014) Ökobilanzdaten für Lüftungs- und Wärmeanlagen. Schlussbericht, BFE. Bundesamt für Energie (BFE). Bern.
Type: Separate publication
Source: Report
First author: Klingler M.
Other authors: Kasser U., Savi D., Primas A., Stettler Y., Gujer P.
Year: 2014
Title of anthology: Schlussbericht, BFE
Place of publication: Bern
Publisher: Bundesamt für Energie (BFE)
