# Sorting plant for construction waste

Dataset: EcoSpold 1, unit process, infrastructure
Functional unit: 1 p
Category: waste / infrastructure
Geography: CH
Time period: 2000-01 to 2000-12
Generated by: Gabor Doka
accessRestrictedTo: 0
copyright: true

## General comment
Sorting plant with a construction waste throughput of 200'000 tons per year. Operation time 50 years.;

## Included processes
infrastructure materials including replacement parts during operation, transport and disposal of infastructure. Land use. Fuel oil demand from small administrative building. Operation time 50 years.

## Technology
Construction waste sorting plants usually feature a jaw or impact crusher. Here materials from a cone crusher are inventoried. Infrastructure materials are adapted from LCI for a rock crusher for gravel production. Reduced wear and tear from lower annual throughput in construction waste sorting plant (200kt/a) is heeded.

## Reference product
- Sorting plant for construction waste [CH]: 1 p
  SWITZERLAND

## Inputs from technosphere
- Disposal, plastics, mixture, 15.3% water, to municipal incineration [CH]: 160 kg; lognormal SD95 3.3
  (1,4,1,1,4,5) & basic uncertainty of 3; Data from one inventory study for rock crusher (Landfield & Karra 2000)
- Cast iron, at plant [RER]: 3470 kg; lognormal SD95 3.3
  (same comment as for Disposal, plastics, mixture, 15.3% water, to municipal incineration)
- Brass, at plant [CH]: 1.28 kg; lognormal SD95 3.3
  (same comment as for Disposal, plastics, mixture, 15.3% water, to municipal incineration)
- Epoxy resin, liquid, at plant [RER]: 160 kg; lognormal SD95 3.3
  (same comment as for Disposal, plastics, mixture, 15.3% water, to municipal incineration)
- Ferromanganese, high-coal, 74.5% Mn, at regional storage [RER]: 12600 kg; lognormal SD95 3.3
  (same comment as for Disposal, plastics, mixture, 15.3% water, to municipal incineration)
- Aluminium, production mix, cast alloy, at plant [RER]: 34 kg; lognormal SD95 3.3
  (same comment as for Disposal, plastics, mixture, 15.3% water, to municipal incineration)
- Steel, converter, unalloyed, at plant [RER]: 103000 kg; lognormal SD95 3.3
  (same comment as for Disposal, plastics, mixture, 15.3% water, to municipal incineration)
- Transport, freight, rail [RER]: 74700 tkm; lognormal SD95 2.3
  uncertainty calculated from uncertainty of transported infrastructure masses and uncertainty of default transport distances
- Disposal, used mineral oil, 10% water, to hazardous waste incineration [CH]: 5000 kg; lognormal SD95 3.3
  (same comment as for Disposal, plastics, mixture, 15.3% water, to municipal incineration)
- Light fuel oil, burned in boiler 10kW, non-modulating [CH]: 161000 MJ; lognormal SD95 1.4
  Fuel oil demand for administrative heating. Uncertainty estimated from climate variation
- Bronze, at plant [CH]: 676 kg; lognormal SD95 3.3
  (same comment as for Disposal, plastics, mixture, 15.3% water, to municipal incineration)
- Lubricating oil, at plant [RER]: 5000 kg; lognormal SD95 3.3
  (same comment as for Disposal, plastics, mixture, 15.3% water, to municipal incineration)
- Transport, freight, lorry, 16t-32t gross weight, fleet average [CH]: 6480 tkm; lognormal SD95 2.3
  (same comment as for Transport, freight, rail)

## Inputs from nature
- Transformation, from unknown [resources, land]: 15000 m2; lognormal SD95 2.1
  (4,5,2,3,1,5) & basic uncertainty of 2; typical size given for planning data in one source for Germany.
- Occupation, industrial area [resources, land]: 750000 m2a; lognormal SD95 1.7
  (4,5,2,3,1,5) & basic uncertainty of 1.5; typical size given for planning data in one source for Germany. Estimate on operation time
- Transformation, to industrial area [resources, land]: 15000 m2; lognormal SD95 2.1
  (same comment as for Transformation, from unknown)

## Sampling procedure
Literature data

## Extrapolations
See Technology/Text

## Sources
- Doka G., 2009, 2009 - LCI waste treatment services - Doka, Final report ecoinvent data v2.0, 13, Swiss Centre for LCI, Doka LCA, Duebendorf and St. Gallen, CH
Doka G. (2007) Life Cycle Inventories of Waste Treatment Services. Final report ecoinvent data v2.0. Volume: 13. Swiss Centre for LCI, Empa - TSL. Dübendorf, CH.
Type: Separate publication
Source: CD-ROM
First author: Doka G.
Year: 2007
Title of anthology: Final report ecoinvent data v2.0
Place of publication: Dübendorf, CH
Publisher: Swiss Centre for LCI, Empa - TSL
Volume No: 13

## Validation
Proof reading validation: Passed.; Other validation: none;
