# Rolling mill

Dataset: EcoSpold 1, unit process, infrastructure
Functional unit: 1 p
Category: metals / infrastructure
Geography: RER
Time period: 2000-01 to 2000-12
Share of production covered: 0 %
Generated by: Silvio Blaser
accessRestrictedTo: 0
copyright: true

## General comment
The values for plant area were taken from a map recieved during the visit to a electro-steel manufacturing and forming plant in Gerlafingen, Switzerland. The output was 616000 tonnes of formed steel in 2002. The Lifetime is assumed to be 50 years for infrastructure like buildings and routes, and 25 years for machinery and furnaces;

## Included processes
Includes land occupation data for and land transformation data to buildings, asphalted and green surroundings; land transformation data from unknown; the buildings; company internal roads, parking lots etc.; the main material of which the machinery is composed and their disposal.

## Technology
The visited plant produces hot rolled merchant bars, wire rod, concrete reinforcing bars, mats and cold rolled topar-S, topar-Rc and topar-Rs

## Reference product
- Rolling mill [RER]: 1 p
  Europe

## Inputs from technosphere
- Building, multi-storey [RER]: 40 m3; lognormal SD95 3.1
  (4,5,1,3,1,n.a.);
- Building, hall, steel construction [CH]: 73.5 m2; lognormal SD95 3.1
  (4,5,1,3,1,n.a.);
- Steel, electric, un- and low-alloyed, at plant [RER]: 57700 kg; lognormal SD95 1.3
  (4,5,1,3,1,n.a.);
- Disposal, building, concrete, not reinforced, to final disposal [CH]: 57700 kg; lognormal SD95 1.3
  (4,5,1,3,1,n.a.);
- Transport, freight, lorry, fleet average [RER]: 37500 tkm; lognormal SD95 2.1
  (4,5,n.a.,n.a.,n.a.,n.a.);
- Concrete, normal, at plant [CH]: 25.1 m3; lognormal SD95 1.3
  (4,5,1,3,1,n.a.);

## Inputs from nature
- Occupation, industrial area [resources, land]: 11000 m2a; lognormal SD95 1.6
  (4,5,1,3,1,n.a.);
- Transformation, from unknown [resources, land]: 310 m2; lognormal SD95 2.1
  (4,5,1,3,1,n.a.);
- Occupation, industrial area, built up [resources, land]: 3880 m2a; lognormal SD95 1.6
  (4,5,1,3,1,n.a.);
- Occupation, industrial area, vegetation [resources, land]: 581 m2a; lognormal SD95 1.6
  (4,5,1,3,1,n.a.);
- Transformation, to industrial area, vegetation [resources, land]: 11.6 m2; lognormal SD95 2.1
  (4,5,1,3,1,n.a.);
- Transformation, to industrial area, built up [resources, land]: 77.5 m2; lognormal SD95 2.1
  (4,5,1,3,1,n.a.);
- Transformation, to industrial area [resources, land]: 221 m2; lognormal SD95 2.1
  (4,5,1,3,1,n.a.);

## Sampling procedure
plant map and estimation

## Extrapolations
see technology and geography

## Uncertainty adjustments
The extrapolatin made for the description of the technology process, the geografical extrapolations, the estimations for machinery weight and the fact that no data were available about the percentage of companies represented by the study citated are considered in the uncertainties.

## Sources
- Werner F., Althaus H.-J., Kuenniger T., Richter K., Jungbluth N., 2007, 2007 - LCI wood as fuel and const. mat. - Werner, Final report ecoinvent data v2.0, 9, Swiss Centre for LCI, Empa - TSL, ESU-services Ltd., Duebendorf, CH
Werner F., Althaus H.-J., Künniger T., Richter K., Jungbluth N. (2007) 1Life Cycle Inventories of Wood as Fuel and Construction Material. Final report ecoinvent data v2.0. Volume: 9. Issue: 0. Swiss Centre for LCI, Empa - TSL. Dübendorf, CH.
Type: Measurement on site
Source: CD-ROM
First author: Werner F.
Other authors: Althaus H.-J., Künniger T., Richter K., Jungbluth N.
Year: 2007
Title of anthology: Final report ecoinvent data v2.0
Place of publication: Dübendorf, CH
Publisher: Swiss Centre for LCI, Empa - TSL
Volume No: 9
Issue No: 0

## Validation
Proof reading validation: Passed.; Other validation: none;
