# EKG I, electrical system, residental building, construction

Dataset: EcoSpold 1, unit process, infrastructure
Functional unit: 1 m2
Category: construction processes / buildings
Geography: CH
Time period: 2013-01 to 2013-12
Share of production covered: 0 %
Generated by: Franziska Wyss
accessRestrictedTo: 0
copyright: true

## General comment
Elektroanlagen, tiefer Installationsgrad;

## Included processes
This data set includes the material use for the manufacturing of the electronic installations in the residental building according to Klingler and Kasser, 2011. The source states that 95 % of the mass volume is accounted for, which covers about 100 individual components. 5 newly constructed multi-familiy residental buildings were taken into account. The connection to the public electricity grid was not taken into account. Only the basic equipment was accounted for (light in staircase and basement). The neon tubes and lamp fitting, as well as the control gear (EVG and VVG) were modelled with an energy saving light bulb. The electrical system has a life-span of 30 years. Transport is included.

## Geography
Data for Zurich, Switzerland

## Technology
Average technology

## Reference product
- EKG I, electrical system, residental building, construction [CH]: 1 m2
  SWITZERLAND

## Inputs from technosphere
All rows: lognormal SD95 1
- Sheet rolling, aluminium [RER]: 0.00043728 kg
- Steel, low-alloyed, at plant [RER]: 0.21794 kg
- Connector, computer, peripherical type, at plant [GLO]: 0.13988 kg
- Electricity, medium voltage, production ENTSO-E, at grid: 1.3775 kWh
- Sheet rolling, copper [RER]: 0.0073886 kg
- Transport, freight, rail, electricity with shunting [CH]: 0.40865 tkm
- Polyethylene, HDPE, granulate, at plant [RER]: 0.83232 kg
- Switch, toggle type, at plant [GLO]: 0.01406 kg
- Tap water, at user [CH]: 19.67 kg
- Disposal, plastics, mixture, 15.3% water, to municipal incineration [CH]: 0.024338 kg
- Copper, at regional storage [RER]: 0.59138 kg
- Sawnwood, production mix, softwood, dried (u=10%), planed, at sawmill [RER]: 2.6093e-6 m3
- Aluminium, production mix, at plant [RER]: 0.02445 kg
- Polyvinylchloride, at regional storage [RER]: 0.32343 kg
- Electronics for control units [RER]: 0.024819 kg
- Propane, butane, at refinery [RER]: 0.00018068 kg
- Extrusion, plastic pipes [RER]: 0.13282, 1.209 kg (2 entries)
- Acrylonitrile-butadiene-styrene copolymer, ABS, at plant [RER]: 0.029172 kg
- Wire drawing, copper [RER]: 0.58399 kg
- Wire drawing, steel [RER]: 0.085241 kg
- Energy-saving bulb, 11W, incl. integrated adapter, at plant [RER]: 0.21828 p
- Transport, freight, lorry, fleet average [RER]: 0.20412 tkm
- Printed wiring board mounting plant [GLO]: 2.0279e-7 p
- Section bar extrusion, aluminium [RER]: 0.02445 kg
- Zinc coating, pieces [RER]: 0.013033 m2
- Chromium steel 18/8, at plant [RER]: 0.00069375 kg
- Heat, heavy fuel oil, at industrial furnace 1MW [CH]: 0.61252 MJ
- Polypropylene, granulate, at plant [RER]: 0.011542 kg
- Polystyrene, high impact, HIPS, at plant [RER]: 0.0091105 kg
- Glass fibre reinforced plastic, polyamide, injection moulding, at plant [RER]: 0.0030274 kg

## Sources
- Klingler M., Kasser U., 2011, 2011 - Grey energy sanitary and elec. systems - Klingler, Project report, Buero fuer Umweltchemie, Zuerich, CH
Klingler, Kasser (2011) Graue Energie von Sanitär- und Elektroanlagen. Project report. Page: 100. BfE. BfE.
Type: Separate publication
Source: Report
First author: Klingler
Other authors: Kasser
Year: 2011
Title of anthology: Project report
Place of publication: BfE
Publisher: BfE

## Validation
Proof reading validation: 12.11.2013; Other validation: \\Server\E\ESU-Docs\Projekte laufend\494 IEA Annex 57\EcoSpold\Haustechnik\[494_ecospold_Sanitär_Elektro_v0.4.xlsx]X-Process;
