# Natural gas, burned in boiler condensing modulating 15kW

Dataset: EcoSpold 1, unit process
Functional unit: 1 MJ
Category: heat / natural gas\heating systems
Geography: CH
Time period: 2012-01 to 2020-12
Generated by: Livia Waldburger
accessRestrictedTo: 0
copyright: true

## General comment
Inventory for 1 MJ natural gas, burned in a gas boiler condensing modulating with a capacity of 15 kW for an one- family house with 2100 operating hours;
Synonyms: In UVEK2018 enthalten;

## Included processes
The module includes fuel input from (CH) network, infrastructure (boiler), emissions to air and water, and electricity needed for operation.

## Geography
Data apply to the combustion in Switzerland.

## Time period
Time of publications.

## Reference product
- Natural gas, burned in boiler condensing modulating 15kW [CH]: 1 MJ
  SWITZERLAND

## Inputs from technosphere
- Chimney [CH]: 8.82e-7 m; lognormal SD95 3.0499
  (1,3,2,1,1,5,BU:3); ;
- Electricity, low voltage, production ENTSO-E, at grid: 0.00073446 kWh; lognormal SD95 1.218
  (1,3,2,1,1,5,BU:1.05); ;
- Natural gas, low pressure, at consumer [CH]: 1 MJ; lognormal SD95 1.218
  (1,3,2,1,1,5,BU:1.05); ;
- Gas boiler 15kW [RER]: 4.41e-7 p; lognormal SD95 3.0499
  (1,3,2,1,1,5,BU:3); ;

## Emissions to nature
- Propionic acid [emissions to air, high. pop.]: 2e-8 kg; lognormal SD95 1.8324
  (2,3,5,1,1,5,BU:1.5); ;
- Ammonia [emissions to air, high. pop.]: 1e-9 kg; lognormal SD95 1.6249
  (2,3,5,1,1,5,BU:1.2); ;
- Acetic acid [emissions to air, high. pop.]: 1.5e-7 kg; lognormal SD95 1.8324
  (2,3,5,1,1,5,BU:1.5); ;
- Cadmium [emissions to air, high. pop.]: 2.5e-13 kg; lognormal SD95 5.3182
  (2,3,5,1,1,5,BU:5); ;
- Carbon dioxide, fossil [emissions to air, high. pop.]: 0.056 kg; lognormal SD95 1.2152
  (2,1,1,1,1,5,BU:1.05); ;
- Lead [emissions to air, high. pop.]: 1.5e-12 kg; lognormal SD95 5.3182
  (2,3,5,1,1,5,BU:5); ;
- Nitrogen oxides [emissions to air, high. pop.]: 1.8e-5 kg; lognormal SD95 1.8324
  (2,3,5,1,1,5,BU:1.5); ;
- Dinitrogen monoxide [emissions to air, high. pop.]: 3.83e-8 kg; lognormal SD95 1.8324
  (2,3,5,1,1,5,BU:1.5); ;
- Sulfate [emissions to water, river]: 5e-8 kg; lognormal SD95 1.8324
  (2,3,5,1,1,5,BU:1.5); ;
- Sulfur dioxide [emissions to air, high. pop.]: 5e-7 kg; lognormal SD95 1.2491
  (2,3,3,1,1,5,BU:1.05); ;
- Mercury [emissions to air, high. pop.]: 1e-10 kg; lognormal SD95 5.3182
  (2,3,5,1,1,5,BU:5); ;
- Acetaldehyde [emissions to air, high. pop.]: 1e-9 kg; lognormal SD95 1.8324
  (2,3,5,1,1,5,BU:1.5); ;
- Sulfite [emissions to water, river]: 5e-8 kg; lognormal SD95 1.8324
  (2,3,5,1,1,5,BU:1.5); ;
- Dioxin, 2,3,7,8 Tetrachlorodibenzo-p- [emissions to air, high. pop.]: 3e-17 kg; lognormal SD95 3.0644
  (2,3,3,1,1,5,BU:3); ;
- Heat, waste [emissions to air, high. pop.]: 1.0823 MJ; lognormal SD95 1.2491
  (2,3,3,1,1,5,BU:1.05); ;
- Particulates, < 2.5 um [emissions to air, high. pop.]: 1e-7 kg; lognormal SD95 3.0644
  (2,3,3,1,1,5,BU:3); ;
- Methane, fossil [emissions to air, high. pop.]: 6e-6 kg; lognormal SD95 1.5839
  (2,3,3,1,1,5,BU:1.5); ;
- Nitrite [emissions to water, river]: 3e-9 kg; lognormal SD95 1.8324
  (2,3,5,1,1,5,BU:1.5); ;
- Toluene [emissions to air, high. pop.]: 2e-7 kg; lognormal SD95 1.8324
  (2,3,5,1,1,5,BU:1.5); ;
- Nitrate [emissions to water, river]: 1.3e-7 kg; lognormal SD95 1.8324
  (2,3,5,1,1,5,BU:1.5); ;
- PAH, polycyclic aromatic hydrocarbons [emissions to air, high. pop.]: 1e-8 kg; lognormal SD95 3.2778
  (2,3,5,1,1,5,BU:3); ;
- Benzo(a)pyrene [emissions to air, high. pop.]: 5.6e-13 kg; lognormal SD95 3.2778
  (2,3,5,1,1,5,BU:3); ;
- Butane [emissions to air, high. pop.]: 7e-7 kg; lognormal SD95 1.5839
  (2,3,3,1,1,5,BU:1.5); ;
- Pentane [emissions to air, high. pop.]: 1.2e-6 kg; lognormal SD95 1.8324
  (2,3,5,1,1,5,BU:1.5); ;
- Carbon monoxide, fossil [emissions to air, high. pop.]: 1.4e-5 kg; lognormal SD95 5.0733
  (2,3,3,1,1,5,BU:5); ;
- Benzene [emissions to air, high. pop.]: 4e-7 kg; lognormal SD95 3.2778
  (2,3,5,1,1,5,BU:3); ;
- Propane [emissions to air, high. pop.]: 2e-7 kg; lognormal SD95 1.8324
  (2,3,5,1,1,5,BU:1.5); ;
- Formaldehyde [emissions to air, high. pop.]: 1e-7 kg; lognormal SD95 1.8324
  (2,3,5,1,1,5,BU:1.5); ;

## Sampling procedure
based on literature

## Sources
- Kaegi T., Waldburger L., Kern C., Roberts G., Zschokke M., Conte F., Weber L., 2021, 2021 - LCI heating systems - Kaegi, Project report, Carbotech AG, Zuerich, CH
T. Kägi, L. Waldburger, C. Kern (2020) Life cycle inventories of heating systems. Project report. carbotech. Zurich, CH.
Type: Separate publication
Source: Report
First author: T. Kägi
Other authors: L. Waldburger, C. Kern
Year: 2020
Title of anthology: Project report
Place of publication: Zurich, CH
Publisher: carbotech

## Validation
Proof reading validation: 14.07.2021; Other validation: Z:\Schreibtisch\WinShare\BAFU Heizsysteme\A zum Konvertieren\[EcoSpold_nat gas, burned in v0.5.xlsx]X-Process;
