# Blast furnace gas, burned in power plant

Dataset: EcoSpold 1, unit process
Functional unit: 1 MJ
Category: heat / natural gas\power plants
Geography: RER
Time period: 1990-01 to 2000-12
Generated by: Mischa Zschokke
accessRestrictedTo: 0
copyright: true

## General comment
na;
Synonyms: In UVEK2018 enthalten;

## Included processes
The module does not include input of fuel (blast furnace gas) because blast furnace gas is treated as a waste product of steel production (i.e. zero allocation to blast furnace gas). Nevertheless, the module includes the emissions caused by the burning of the gas in the power plant. It includes also power plant infrastructure.; Geography: Data from literature, referring to Europe

## Technology
Industry data.

## Time period
Time of publications.

## Reference product
- Blast furnace gas, burned in power plant [RER]: 1 MJ
  Europe

## Inputs from technosphere
- Gas power plant, 100MWe [RER]: 1.2125e-12 p; lognormal SD95 3.0162
  (2,2,3,1,1,nA,BU:3); ; Remus (2013)

## Emissions to nature
- Zinc [emissions to air, unspecified]: 2.5893e-8 kg; lognormal SD95 5.0184
  (2,2,3,1,1,nA,BU:5); ; Remus (2013), only CO2 emissions allocated to steelwork
- Carbon dioxide, fossil [emissions to air, unspecified]: 0.14054 kg; lognormal SD95 1.1267
  (2,2,3,1,1,nA,BU:1.05); ; Remus (2013)
- Particulates, < 2.5 um [emissions to air, unspecified]: 1.875e-6 kg; lognormal SD95 3.0162
  (2,2,3,1,1,nA,BU:3); dust after abatement (< 2.5 um); Remus (2013)
- Manganese [emissions to air, unspecified]: 5.2679e-8 kg; lognormal SD95 5.0184
  (2,2,3,1,1,nA,BU:5); ; Remus (2013)
- Lead [emissions to air, unspecified]: 8.0357e-9 kg; lognormal SD95 5.0184
  (2,2,3,1,1,nA,BU:5); ; Remus (2013)
- Hydrogen sulfide [emissions to air, unspecified]: 3.8393e-6 kg; lognormal SD95 1.5217
  (2,2,3,1,1,nA,BU:1.5); ; Remus (2013)
- Hydrogen [emissions to air, unspecified]: 0.00075893 kg; lognormal SD95 1.5217
  (2,2,3,1,1,nA,BU:1.5); ; Remus (2013)

## Sampling procedure
Data from literature

## Extrapolations
Some generic datasets from ecoinvent have been used.

## Sources
- Zschokke M., Bolt P., Conrad S., 2021, 2021 - LCI steel and iron processes - Zschokke, Project report, Carbotech AG, Zuerich, CH
M. Zschokke, S. Conrad, P. Bolt (2020) Life cycle inventories of steel and iron processes for UVEK:2020. Project report. carbotech. Zurich, CH.
Type: Separate publication
Source: Report
First author: M. Zschokke
Other authors: S. Conrad, P. Bolt
Year: 2020
Title of anthology: Project report
Place of publication: Zurich, CH
Publisher: carbotech
Original title: Life cycle inventories of steel and iron processes for UVEK:2020

## Validation
Proof reading validation: 10.02.2021; Other validation: \\tsclient\mischa\UBTeam\AKTUELLE Projekte\BAFU Update Eisenmetalle fu¨r UVEK-2020 - 287.65\Daten\Excel2EcoSpold\A_zum_Konvertieren\Updated February 2021\[blast furnace gas, burned in power plant, RER v0.3.xlsx]X-Process;
