# Oxide, for Li-ion NMC111 battery

Dataset: EcoSpold 1, unit process
Functional unit: 1 kg
Category: electronics / batteries
Geography: GLO
Time period: 2023-01 to 2029-12
Synonyms: Herstellung von NMC111-Oxid für Li-Ion-Batterien
Generated by: Lugas Raka Adrianto, Maulana Permana Ajie, Didier Beloin-Saint-Pierre
accessRestrictedTo: 0
copyright: false

## General comment
Original LCI reference from Crenna et al (2021). Towards more flexibility and transparency in life cycle inventories for Lithium-ion batteries. Geography: Data for global average oxide production;

## Included processes
This dataset represents the production of 1 kg of oxide used e.g. for lihtium ion battery of an electric vehicle or portable consumer electronics. The inventory is modelled according to the publication of Crenna et al. (2021), in which a battery pack with gross pack energy of 23.5 kWh made of 140 3.6 V- 46Ah prismatic cells is presented. Cells are made of nickel-manganese-cobalt (NMC111) cathode and a graphite-based anode, liquid electrolyte and a porous plastic separator. Infrastructure is included as well in this dataset as "electronic component factory". This dataset is a copy of the corresponding regional dataset. Production volume was adjusted.
None;

## Geography
Data for global average oxide production

## Technology
Oxide, lithium ion battery, NMC 111

## Reference product
- Oxide, for Li-ion NMC111 battery [GLO]: 1 kg

## Inputs from technosphere
- Chemical plant, organics [RER]: 7.41e-10 p; lognormal SD95 3.06
  (3,3,1,4,1,5,BU:3.00); Literature. Crenna et al (2021).
- Lithium carbonate, at plant [GLO]: 0.383 kg; lognormal SD95 1.25
  (3,3,1,4,1,5,BU:1.05); Literature. Crenna et al (2021).
- Hydroxide, for Li-ion NMC111 battery [GLO]: 0.949 kg; lognormal SD95 1.25
  (3,3,1,4,1,5,BU:1.05); Literature. Crenna et al (2021).
- Electricity, medium voltage, production GLO, at grid [GLO]: 6.87369 kWh; lognormal SD95 1.25
  (3,3,1,4,1,5,BU:1.05); Literature. Crenna et al (2021).
- Transport, freight, rail [RER]: 0.309 tkm; lognormal SD95 2.07
  (3,3,1,4,1,5,BU:2.00);
- Transport, freight, lorry, fleet average [RER]: 0.025 tkm; lognormal SD95 2.07
  (3,3,1,4,1,5,BU:2.00);
- Transport, barge [RER]: 0.209 tkm; lognormal SD95 2.07
  (3,3,1,4,1,5,BU:2.00);
- Transport, transoceanic container ship [OCE]: 0.599 tkm; lognormal SD95 2.07
  (3,3,1,4,1,5,BU:2.00);

## Emissions to nature
- Carbon dioxide, fossil [emissions to air, unspecified]: 0.207 kg; lognormal SD95 1.58
  (3,3,1,4,1,5,BU:1.50); Literature. Crenna et al (2021).
- Water/m3 [emissions to air, low. pop.]: 0.000125044 m3; lognormal SD95 2.79
  (5,5,5,5,5,5,BU:1.50); Literature. Crenna et al (2021).

## Sampling procedure
Literature & own estimations

## Sources
- Raka Adrianto L., Permana Ajie M., Beloin-Saint-Pierre D., 2024, 2024 - LCI ICT sector - Raka Adrianto, Empa, St. Gallen, CH

## Validation
Proof reading validation: Passed, Other validation: none, Validator: Mischa Zschokke, Company: Carbotech, Country: CH
