# Transport, passenger car, fleet average

Dataset: EcoSpold 1, unit process
Functional unit: 1 km
Category: transport systems / road\Transformation
Geography: CH
Time period: 2020-01 to 2020-12
Generated by: Romain Sacchi
accessRestrictedTo: 0
copyright: False

## General comment
Fleet average vehicle, based on HBEFA 4.1 fleet composition for 2020..

## Time period
Base technology year of 2020

## Reference product
- Transport, passenger car, fleet average [CH]: 1 km

## Inputs from technosphere
All rows: lognormal SD95 1.02
- Transport, passenger car, battery electric, NMC-622 battery, Compact, 2021 [CH]: 1.45e-6 km
  Uncertainty from pedigree matrix: (1, 2, 1, 1, 1, 1)
- Transport, passenger car, battery electric, NMC-622 battery, Large, 2021 [CH]: 0.00515 km
  Uncertainty from pedigree matrix: (1, 2, 1, 1, 1, 1)
- Transport, passenger car, battery electric, NMC-622 battery, Large SUV, 2021 [CH]: 0.00142 km
  Uncertainty from pedigree matrix: (1, 2, 1, 1, 1, 1)
- Transport, passenger car, battery electric, NMC-622 battery, Medium, 2021 [CH]: 0.00113 km
  Uncertainty from pedigree matrix: (1, 2, 1, 1, 1, 1)
- Transport, passenger car, diesel, Compact, 2003, EURO-3 [CH]: 0.000107 km
  Uncertainty from pedigree matrix: (1, 2, 1, 1, 1, 1)
- Transport, passenger car, diesel, Large, 2003, EURO-3 [CH]: 0.0049 km
  Uncertainty from pedigree matrix: (1, 2, 1, 1, 1, 1)
- Transport, passenger car, diesel, Large SUV, 2003, EURO-3 [CH]: 0.00149 km
  Uncertainty from pedigree matrix: (1, 2, 1, 1, 1, 1)
- Transport, passenger car, diesel, Medium, 2003, EURO-3 [CH]: 0.00281 km
  Uncertainty from pedigree matrix: (1, 2, 1, 1, 1, 1)
- Transport, passenger car, diesel, Compact, 2008, EURO-4 [CH]: 8.69e-5 km
  Uncertainty from pedigree matrix: (1, 2, 1, 1, 1, 1)
- Transport, passenger car, diesel, Large, 2008, EURO-4 [CH]: 0.0284 km
  Uncertainty from pedigree matrix: (1, 2, 1, 1, 1, 1)
- Transport, passenger car, diesel, Large SUV, 2008, EURO-4 [CH]: 0.00843 km
  Uncertainty from pedigree matrix: (1, 2, 1, 1, 1, 1)
- Transport, passenger car, diesel, Medium, 2008, EURO-4 [CH]: 0.0112 km
  Uncertainty from pedigree matrix: (1, 2, 1, 1, 1, 1)
- Transport, passenger car, diesel, Compact, 2013, EURO-5 [CH]: 5.91e-5 km
  Uncertainty from pedigree matrix: (1, 2, 1, 1, 1, 1)
- Transport, passenger car, diesel, Large, 2013, EURO-5 [CH]: 0.0907 km
  Uncertainty from pedigree matrix: (1, 2, 1, 1, 1, 1)
- Transport, passenger car, diesel, Large SUV, 2013, EURO-5 [CH]: 0.0218 km
  Uncertainty from pedigree matrix: (1, 2, 1, 1, 1, 1)
- Transport, passenger car, diesel, Medium, 2013, EURO-5 [CH]: 0.0294 km
  Uncertainty from pedigree matrix: (1, 2, 1, 1, 1, 1)
- Transport, passenger car, diesel, Compact, 2016, EURO-6ab [CH]: 1.77e-5 km
  Uncertainty from pedigree matrix: (1, 2, 1, 1, 1, 1)
- Transport, passenger car, diesel, Large, 2016, EURO-6ab [CH]: 0.0974 km
  Uncertainty from pedigree matrix: (1, 2, 1, 1, 1, 1)
- Transport, passenger car, diesel, Large SUV, 2016, EURO-6ab [CH]: 0.0318 km
  Uncertainty from pedigree matrix: (1, 2, 1, 1, 1, 1)
- Transport, passenger car, diesel, Medium, 2016, EURO-6ab [CH]: 0.0252 km
  Uncertainty from pedigree matrix: (1, 2, 1, 1, 1, 1)
- Transport, passenger car, diesel, Compact, 2018, EURO-6c [CH]: 1.5e-6 km
  Uncertainty from pedigree matrix: (1, 2, 1, 1, 1, 1)
- Transport, passenger car, diesel, Large, 2018, EURO-6c [CH]: 0.0152 km
  Uncertainty from pedigree matrix: (1, 2, 1, 1, 1, 1)
- Transport, passenger car, diesel, Large SUV, 2018, EURO-6c [CH]: 0.00546 km
  Uncertainty from pedigree matrix: (1, 2, 1, 1, 1, 1)
- Transport, passenger car, diesel, Medium, 2018, EURO-6c [CH]: 0.00245 km
  Uncertainty from pedigree matrix: (1, 2, 1, 1, 1, 1)
- Transport, passenger car, diesel, Compact, 2019, EURO-6d-TEMP [CH]: 3.42e-6 km
  Uncertainty from pedigree matrix: (1, 2, 1, 1, 1, 1)
- Transport, passenger car, diesel, Large, 2019, EURO-6d-TEMP [CH]: 0.0207 km
  Uncertainty from pedigree matrix: (1, 2, 1, 1, 1, 1)
- Transport, passenger car, diesel, Large SUV, 2019, EURO-6d-TEMP [CH]: 0.00918 km
  Uncertainty from pedigree matrix: (1, 2, 1, 1, 1, 1)
- Transport, passenger car, diesel, Medium, 2019, EURO-6d-TEMP [CH]: 0.00217 km
  Uncertainty from pedigree matrix: (1, 2, 1, 1, 1, 1)
- Transport, passenger car, diesel, Compact, 2021, EURO-6d [CH]: 3.25e-7 km
  Uncertainty from pedigree matrix: (1, 2, 1, 1, 1, 1)
- Transport, passenger car, diesel, Large, 2021, EURO-6d [CH]: 0.0035 km
  Uncertainty from pedigree matrix: (1, 2, 1, 1, 1, 1)
- Transport, passenger car, diesel, Large SUV, 2021, EURO-6d [CH]: 0.00184 km
  Uncertainty from pedigree matrix: (1, 2, 1, 1, 1, 1)
- Transport, passenger car, diesel, Medium, 2021, EURO-6d [CH]: 0.000368 km
  Uncertainty from pedigree matrix: (1, 2, 1, 1, 1, 1)
- Transport, passenger car, compressed gas, Compact, 2008, EURO-4 [CH]: 2.42e-6 km
  Uncertainty from pedigree matrix: (1, 2, 1, 1, 1, 1)
- Transport, passenger car, compressed gas, Large, 2008, EURO-4 [CH]: 0.000192 km
  Uncertainty from pedigree matrix: (1, 2, 1, 1, 1, 1)
- Transport, passenger car, compressed gas, Large SUV, 2008, EURO-4 [CH]: 4.99e-6 km
  Uncertainty from pedigree matrix: (1, 2, 1, 1, 1, 1)
- Transport, passenger car, compressed gas, Medium, 2008, EURO-4 [CH]: 0.000201 km
  Uncertainty from pedigree matrix: (1, 2, 1, 1, 1, 1)
- Transport, passenger car, compressed gas, Compact, 2013, EURO-5 [CH]: 2.74e-6 km
  Uncertainty from pedigree matrix: (1, 2, 1, 1, 1, 1)
- Transport, passenger car, compressed gas, Large, 2013, EURO-5 [CH]: 0.000201 km
  Uncertainty from pedigree matrix: (1, 2, 1, 1, 1, 1)
- Transport, passenger car, compressed gas, Large SUV, 2013, EURO-5 [CH]: 4.67e-6 km
  Uncertainty from pedigree matrix: (1, 2, 1, 1, 1, 1)
- Transport, passenger car, compressed gas, Medium, 2013, EURO-5 [CH]: 0.000291 km
  Uncertainty from pedigree matrix: (1, 2, 1, 1, 1, 1)
- Transport, passenger car, compressed gas, Compact, 2016, EURO-6ab [CH]: 1.21e-6 km
  Uncertainty from pedigree matrix: (1, 2, 1, 1, 1, 1)
- Transport, passenger car, compressed gas, Large, 2016, EURO-6ab [CH]: 0.000246 km
  Uncertainty from pedigree matrix: (1, 2, 1, 1, 1, 1)
- Transport, passenger car, compressed gas, Large SUV, 2016, EURO-6ab [CH]: 2.42e-6 km
  Uncertainty from pedigree matrix: (1, 2, 1, 1, 1, 1)
- Transport, passenger car, compressed gas, Medium, 2016, EURO-6ab [CH]: 0.000951 km
  Uncertainty from pedigree matrix: (1, 2, 1, 1, 1, 1)
- Transport, passenger car, gasoline, Compact, 2003, EURO-3 [CH]: 0.00217 km
  Uncertainty from pedigree matrix: (1, 2, 1, 1, 1, 1)
- Transport, passenger car, gasoline, Large, 2003, EURO-3 [CH]: 0.00856 km
  Uncertainty from pedigree matrix: (1, 2, 1, 1, 1, 1)
- Transport, passenger car, gasoline, Large SUV, 2003, EURO-3 [CH]: 0.000739 km
  Uncertainty from pedigree matrix: (1, 2, 1, 1, 1, 1)
- Transport, passenger car, gasoline, Medium, 2003, EURO-3 [CH]: 0.0203 km
  Uncertainty from pedigree matrix: (1, 2, 1, 1, 1, 1)
- Transport, passenger car, gasoline, Compact, 2008, EURO-4 [CH]: 0.0076 km
  Uncertainty from pedigree matrix: (1, 2, 1, 1, 1, 1)
- Transport, passenger car, gasoline, Large, 2008, EURO-4 [CH]: 0.0332 km
  Uncertainty from pedigree matrix: (1, 2, 1, 1, 1, 1)
- Transport, passenger car, gasoline, Large SUV, 2008, EURO-4 [CH]: 0.00311 km
  Uncertainty from pedigree matrix: (1, 2, 1, 1, 1, 1)
- Transport, passenger car, gasoline, Medium, 2008, EURO-4 [CH]: 0.0685 km
  Uncertainty from pedigree matrix: (1, 2, 1, 1, 1, 1)
- Transport, passenger car, gasoline, Compact, 2013, EURO-5 [CH]: 0.0105 km
  Uncertainty from pedigree matrix: (1, 2, 1, 1, 1, 1)
- Transport, passenger car, gasoline, Large, 2013, EURO-5 [CH]: 0.0484 km
  Uncertainty from pedigree matrix: (1, 2, 1, 1, 1, 1)
- Transport, passenger car, gasoline, Large SUV, 2013, EURO-5 [CH]: 0.0041 km
  Uncertainty from pedigree matrix: (1, 2, 1, 1, 1, 1)
- Transport, passenger car, gasoline, Medium, 2013, EURO-5 [CH]: 0.114 km
  Uncertainty from pedigree matrix: (1, 2, 1, 1, 1, 1)
- Transport, passenger car, gasoline, Compact, 2016, EURO-6ab [CH]: 0.00912 km
  Uncertainty from pedigree matrix: (1, 2, 1, 1, 1, 1)
- Transport, passenger car, gasoline, Large, 2016, EURO-6ab [CH]: 0.0484 km
  Uncertainty from pedigree matrix: (1, 2, 1, 1, 1, 1)
- Transport, passenger car, gasoline, Large SUV, 2016, EURO-6ab [CH]: 0.00481 km
  Uncertainty from pedigree matrix: (1, 2, 1, 1, 1, 1)
- Transport, passenger car, gasoline, Medium, 2016, EURO-6ab [CH]: 0.101 km
  Uncertainty from pedigree matrix: (1, 2, 1, 1, 1, 1)
- Transport, passenger car, gasoline, Compact, 2018, EURO-6c [CH]: 0.00125 km
  Uncertainty from pedigree matrix: (1, 2, 1, 1, 1, 1)
- Transport, passenger car, gasoline, Large, 2018, EURO-6c [CH]: 0.0115 km
  Uncertainty from pedigree matrix: (1, 2, 1, 1, 1, 1)
- Transport, passenger car, gasoline, Large SUV, 2018, EURO-6c [CH]: 0.00134 km
  Uncertainty from pedigree matrix: (1, 2, 1, 1, 1, 1)
- Transport, passenger car, gasoline, Medium, 2018, EURO-6c [CH]: 0.0168 km
  Uncertainty from pedigree matrix: (1, 2, 1, 1, 1, 1)
- Transport, passenger car, gasoline, Compact, 2019, EURO-6d-TEMP [CH]: 0.00139 km
  Uncertainty from pedigree matrix: (1, 2, 1, 1, 1, 1)
- Transport, passenger car, gasoline, Large, 2019, EURO-6d-TEMP [CH]: 0.0196 km
  Uncertainty from pedigree matrix: (1, 2, 1, 1, 1, 1)
- Transport, passenger car, gasoline, Large SUV, 2019, EURO-6d-TEMP [CH]: 0.00205 km
  Uncertainty from pedigree matrix: (1, 2, 1, 1, 1, 1)
- Transport, passenger car, gasoline, Medium, 2019, EURO-6d-TEMP [CH]: 0.0234 km
  Uncertainty from pedigree matrix: (1, 2, 1, 1, 1, 1)
- Transport, passenger car, gasoline, Compact, 2021, EURO-6d [CH]: 0.000234 km
  Uncertainty from pedigree matrix: (1, 2, 1, 1, 1, 1)
- Transport, passenger car, gasoline, Large, 2021, EURO-6d [CH]: 0.0036 km
  Uncertainty from pedigree matrix: (1, 2, 1, 1, 1, 1)
- Transport, passenger car, gasoline, Large SUV, 2021, EURO-6d [CH]: 0.000395 km
  Uncertainty from pedigree matrix: (1, 2, 1, 1, 1, 1)
- Transport, passenger car, gasoline, Medium, 2021, EURO-6d [CH]: 0.00407 km
  Uncertainty from pedigree matrix: (1, 2, 1, 1, 1, 1)
- Transport, passenger car, plugin gasoline hybrid, Large, 2013, EURO-5 [CH]: 0.000283 km
  Uncertainty from pedigree matrix: (1, 2, 1, 1, 1, 1)
- Transport, passenger car, plugin gasoline hybrid, Large SUV, 2013, EURO-5 [CH]: 1.67e-5 km
  Uncertainty from pedigree matrix: (1, 2, 1, 1, 1, 1)
- Transport, passenger car, plugin gasoline hybrid, Large, 2016, EURO-6ab [CH]: 0.00269 km
  Uncertainty from pedigree matrix: (1, 2, 1, 1, 1, 1)
- Transport, passenger car, plugin gasoline hybrid, Large SUV, 2016, EURO-6ab [CH]: 0.00131 km
  Uncertainty from pedigree matrix: (1, 2, 1, 1, 1, 1)
- Transport, passenger car, plugin gasoline hybrid, Compact, 2021, EURO-6d [CH]: 3.98e-8 km
  Uncertainty from pedigree matrix: (1, 2, 1, 1, 1, 1)
- Transport, passenger car, plugin gasoline hybrid, Large, 2021, EURO-6d [CH]: 0.000159 km
  Uncertainty from pedigree matrix: (1, 2, 1, 1, 1, 1)
- Transport, passenger car, plugin gasoline hybrid, Large SUV, 2021, EURO-6d [CH]: 0.000141 km
  Uncertainty from pedigree matrix: (1, 2, 1, 1, 1, 1)

## Sources
- Sacchi R., Bauer C., 2023, 2023 - LCI on-road vehicles - Sacchi, PSI, Villigen, CH
doi: 10.5281/ZENODO.5156043
