# Heat, at cogen with biogas engine, methane 96%-vol allocation exergy

Dataset: EcoSpold 1, unit process
Functional unit: 1 MJ
Category: energy supply, kbob recommendation / fuels, renewable
Geography: CH
Time period: 2011-01 to 2011-12
Share of production covered: 0 %
Generated by: Thomas Heck
accessRestrictedTo: 0
copyright: true

## Included processes
This dataset contains the generation of heat in a biomethane driven CHP based on PSI data (BFE project 407, Christian Bauer, April 2012).; Geography: PSI data (BFE project 407). Emissions and efficiencies adjusted to Swiss emission regulation (LRV, Luftreinhalteverordnung) valid in year 2000.

## Technology
Average technology available on market.

## Time period
Time of publications.

## Reference product
- Heat, at cogen with biogas engine, methane 96%-vol allocation exergy [CH]: 1 MJ
  SWITZERLAND

## Inputs from technosphere
- Cogen unit 200kWe, components for heat only [RER]: 8.3273e-9 p; lognormal SD95 1.2634
  (1,4,2,1,3,4,BU:3); own calculations based onlower heating value of biogas
- Cogen unit 200kWe, common components for heat+electricity [RER]: 1.8828e-9 p; lognormal SD95 3.0715
  (1,4,2,1,3,4,BU:3); ecoinvent V1.1. cogeneration of natural gas
- Methane, 96 vol-%, from biogas, low pressure, at consumer [CH]: 0.41109 MJ; lognormal SD95 3.0715
  (1,4,2,1,3,4,BU:1.05); ecoinvent V1.1. cogeneration of natural gas
- Disposal, used mineral oil, 10% water, to hazardous waste incineration [CH]: 1.2333e-5 kg; lognormal SD95 1.2634
  (1,4,2,1,3,4,BU:1.05); value of cogeneration of natural gas used as approximination
- Lubricating oil, at plant [RER]: 1.2333e-5 kg; lognormal SD95 1.2634
  (1,4,2,1,3,4,BU:1.05); value of cogeneration of natural gas used as approximination

## Emissions to nature
- Dinitrogen monoxide [emissions to air, high. pop.]: 2.0555e-6 kg; lognormal SD95 3.0715
  (1,4,2,1,3,4,BU:1.5); value for cogeneration of natural gas used as approximination
- Heat, waste [emissions to air, high. pop.]: 1.1929 MJ; lognormal SD95 5.0815
  (1,4,2,1,3,4,BU:1.05); value for cogeneration of natural gas used as approximination
- Methane, biogenic [emissions to air, high. pop.]: 3.2887e-5 kg; lognormal SD95 1.2634
  (1,4,2,1,3,4,BU:1.5); own calculations based on carbon content in biogas
- Carbon dioxide, biogenic [emissions to air, high. pop.]: 0.023021 kg; lognormal SD95 2.0748
  (1,4,2,1,3,4,BU:1.05); value for cogeneration of natural gas used as approximination
- Sulfur dioxide [emissions to air, high. pop.]: 2.261e-7 kg; lognormal SD95 3.0715
  (1,4,2,1,3,4,BU:1.05); value for cogeneration of natural gas used as approximination
- Nitrogen oxides [emissions to air, high. pop.]: 2.8776e-5 kg; lognormal SD95 1.2634
  (1,4,2,1,3,4,BU:1.5); own calculations
- NMVOC, non-methane volatile organic compounds, unspecified origin [emissions to air, high. pop.]: 4.1109e-6 kg; lognormal SD95 3.0703
  (1,4,2,1,3,4,BU:1.5); calculated from company data on water usage and amount of water to treatment
- Carbon monoxide, biogenic [emissions to air, high. pop.]: 6.5775e-5 kg; lognormal SD95 2.0748
  (1,4,2,1,3,4,BU:5); value for cogeneration of natural gas used as approximination
- Particulates, < 2.5 um [emissions to air, high. pop.]: 6.1664e-8 kg; lognormal SD95 1.2634
  (1,4,2,1,3,4,BU:3); own calculations based on sulphur content in biogas

## Sampling procedure
Literature. Manufacturer information.

## Sources
- Bauer C., Frischknecht R., Eckle P., Flury K., Neal T., Papp K., Schori S., Simons A., Stucki M., Treyer K., 2012, 2012 - LCA electricity generation in Switzerland - Uster, -, 407, Swiss Centre for LCI, ESU-services Ltd., PSI, Uster and Villigen, CH
Ch. Bauer, Frischknecht (2012) Umweltauswirkungen Strom. Volume: 407. PSI. Uster und Villigen, CH.
Type: Separate publication
Source: CD-ROM
First author: Ch. Bauer
Other authors: Frischknecht
Year: 2012
Place of publication: Uster und Villigen, CH
Publisher: PSI
Volume No: 407

## Validation
Proof reading validation: 19.12.2013; Other validation: \\Server\e\ESU-Docs\Projekte laufend\388 Aktualisierung PEF Energie\EcoSpold\[388_BHKW_Biogas-update-Erdgas-v0.2.xlsx]X-Process;
