# Flat glass, uncoated, at plant

Dataset: EcoSpold 1, unit process
Functional unit: 1 kg
Category: glass / construction
Geography: RER
Time period: 2000-01 to 2000-12
Generated by: Daniel Kellenberger
accessRestrictedTo: 0
copyright: true

## General comment
The amount of raw materials is calculated based on the composition of flat glass. The total amount of energy is partitioned in 58% from natural gas, 38% heavy fuel oil and 5% electrical. The amount of tin yearly added to the tin bath is assumed to leave the system by air, as part of the particulates. The same with lead. Both emissions are double counted: as particulate and as emission to air. Most other emissions are a mean value of plants with and plants without abatment. It is assumed that half of water evaporates and other half is treated.;
Synonyms: plate, float, Flach;

## Included processes
includes the whole manufacturing process to produce flat glass (raw material provision, cullet addition, melting process, forming process (on float bath), cooling process (annealing lehr), cutting process and storage), internal processes (transport, etc.) and infrastructure. No administration and packing is included.

## Geography
For some exchanges CH- and DE-modules have been used as proxy

## Technology
Basic principle is pouring molten glass onto a bath of molten tin and forming a ribbon with the upper and lower surfaces becoming parallel under the influence of gravity and surface tension. Average technique used in European flat glas production.

## Reference product
- Flat glass, uncoated, at plant [RER]: 1 kg
  Europe

## Inputs from technosphere
- Heavy fuel oil, at regional storage [RER]: 0.0738 kg; lognormal SD95 1.32
  (3,5,1,1,n.a.,5);
- Nitrogen, liquid, at plant [RER]: 0.00495 kg; lognormal SD95 5
  Estimation of standard deviation
- Soda, powder, at plant [RER]: 0.229 kg; lognormal SD95 1.62
  (1,5,5,1,1,5);
- Refractory, fireclay, packed, at plant [DE]: 0.00107 kg; lognormal SD95 10
  Estimation of standard deviation
- Natural gas, high pressure, at consumer [RER]: 4.56 MJ; lognormal SD95 1.32
  (3,5,1,1,n.a.,5);
- Silica sand, at plant [DE]: 0.578 kg; lognormal SD95 1.62
  (1,5,5,1,1,5);
- Disposal, municipal solid waste, 22.9% water, to municipal incineration [CH]: 0.0011 kg; lognormal SD95 1.22
  (1,3,1,1,3,1);
- Flat glass plant [RER]: 2.41e-10 p; lognormal SD95 3.14
  (4,5,1,3,1,5);
- Transport, freight, lorry, fleet average [RER]: 0.0603 tkm; lognormal SD95 2.09
  (4,5,n.a,n.a,n.a,n.a);
- Hydrogen, liquid, at plant [RER]: 3.6e-6 kg; lognormal SD95 5
  (3,5,1,1,n.a.,5);
- Steel, converter, unalloyed, at plant [RER]: 1.37e-5 kg; lognormal SD95 1.26
  (3,4,1,3,1,5);
- Tin, at regional storage [RER]: 9.16e-6 kg; lognormal SD95 12
  Estimation of standard deviation
- Limestone, milled, packed, at plant [CH]: 0.4 kg; lognormal SD95 1.62
  (1,5,5,1,1,5);
- Treatment, sewage, from residence, to wastewater treatment, class 2 [CH]: 0.00035 m3; lognormal SD95 5
  Calculation of standard deviation based on min. and max. values
- Electricity, medium voltage, production ENTSO-E, at grid: 0.111 kWh; lognormal SD95 1.32
  (3,5,1,1,n.a.,5);

## Inputs from nature
- Water, cooling, unspecified natural origin/m3 [resources, in water]: 0.0007 m3; lognormal SD95 2.1
  (2,5,3,n.a.,n.a.,n.a.);

## Emissions to nature
- Particulates, < 2.5 um [emissions to air, unspecified]: 0.000184 kg; lognormal SD95 52.6
  Calculation of standard deviation based on min. and max. values
- Tin [emissions to air, unspecified]: 9.13e-6 kg; lognormal SD95 12
  Estimation of standard deviation
- Sulfur dioxide [emissions to air, unspecified]: 0.00404 kg; lognormal SD95 2.63
  Calculation of standard deviation based on min. and max. values
- Particulates, > 10 um [emissions to air, unspecified]: 2.3e-5 kg; lognormal SD95 2.61
  Calculation of standard deviation based on min. and max. values
- Particulates, > 2.5 um, and < 10um [emissions to air, unspecified]: 2.3e-5 kg; lognormal SD95 2.61
  Calculation of standard deviation based on min. and max. values
- Carbon monoxide, fossil [emissions to air, unspecified]: 5e-5 kg; lognormal SD95 5
  Calculation of standard deviation based on min. and max. values
- Carbon dioxide, fossil [emissions to air, unspecified]: 0.693 kg; lognormal SD95 1.38
  (4,5,1,1,n.a.,5);
- Hydrogen fluoride [emissions to air, unspecified]: 2.1e-5 kg; lognormal SD95 3.33
  Calculation of standard deviation based on min. and max. values
- Hydrogen chloride [emissions to air, unspecified]: 9.25e-5 kg; lognormal SD95 2.38
  Calculation of standard deviation based on min. and max. values
- Nitrogen oxides [emissions to air, unspecified]: 0.00327 kg; lognormal SD95 2.26
  Calculation of standard deviation based on min. and max. values
- NMVOC, non-methane volatile organic compounds, unspecified origin [emissions to air, unspecified]: 5e-5 kg; lognormal SD95 2
  Calculation of standard deviation based on min. and max. values
- Water [emissions to water, unspecified]: 0.665 kg; lognormal SD95 2.5196
  (5,5,5,5,5,BU:1.05); All uncertainty-values set to 5.0 by default. Balance of input water

## Sampling procedure
Literature

## Extrapolations
See geography

## Sources
- Kellenberger D., Althaus H.-J., Jungbluth N., Kuenniger T., Lehmann M., Thalmann P., 2007, 2007 - LCI building products - Kellenberger, Final report ecoinvent data v2.0, 7, Swiss Centre for LCI, Empa - TSL, ESU-services Ltd., Bau- und Umweltchimie, Duebendorf, CH
Kellenberger D., Althaus H.-J., Jungbluth N., Künniger T. (2007) Life Cycle Inventories of Building Products. Final report ecoinvent data v2.0. Volume: 7. Swiss Centre for LCI, Empa - TSL. Dübendorf, CH.
Type: Measurement on site
Source: CD-ROM
First author: Kellenberger D.
Other authors: Althaus H.-J., Jungbluth N., Künniger T.
Year: 2007
Title of anthology: Final report ecoinvent data v2.0
Place of publication: Dübendorf, CH
Publisher: Swiss Centre for LCI, Empa - TSL
Volume No: 7

## Validation
Proof reading validation: passed; Other validation: none;
