# Paper mill, integrated

Dataset: EcoSpold 1, unit process, infrastructure
Functional unit: 1 p
Category: paper+ board / graphic paper\infrastructure
Geography: RER
Time period: 2000-01 to 2000-12
Generated by: Roland Hischier
accessRestrictedTo: 0
copyright: true

## General comment
The dataset represents an integrated paper mill with a annual production of 368 kt and a total life time of 50 years.;

## Included processes
This module includes land-use, buildings (hall and multi-story) and streets within the mill area, machineries for pulp, paper and energy production as well as the dismanteling/disposal of the whole infrastructure (without the paper machine)

## Geography
Average land-use from European paper mills, valable for whole Europe

## Technology
Typical European paper mill

## Reference product
- Paper mill, integrated [RER]: 1 p
  Europe

## Inputs from technosphere
- Disposal, facilities, chemical production [RER]: 6.25e6 kg; lognormal SD95 3.5
  (5,4,1,3,4,5); calculated from input facilities
- Building, hall, steel construction [CH]: 121000 m2; lognormal SD95 3.5
  (5,4,1,3,4,5); Estimated, based on photos
- Wastewater treatment plant, class 5 [CH]: 1.67 p; lognormal SD95 3.5
  (5,4,1,3,4,5); Approximation
- Building, multi-storey [RER]: 151000 m3; lognormal SD95 3.5
  (5,4,1,3,4,5); Estimated, based on photos
- Roads, company, internal [CH]: 755000 m2a; lognormal SD95 3.5
  (5,4,1,3,4,5); Estimated, based on photos
- Facilities, chemical production [RER]: 6.25e6 kg; lognormal SD95 3.5
  (5,4,1,3,4,5); rough estimation
- Paper machine, at paper mill [RER]: 2 p; lognormal SD95 3
  (1,3,1,1,1,3); Information from several european mills
- Industrial furnace 1MW, oil [CH]: 2.5 p; lognormal SD95 3.5
  (5,4,1,3,4,5); approximation for energy system

## Inputs from nature
- Transformation, to industrial area, vegetation [resources, land]: 109000 m2; lognormal SD95 2
  (1,3,1,1,1,3); Information from several european mills
- Occupation, industrial area, built up [resources, land]: 7.55e6 m2a; lognormal SD95 1.5
  (1,3,1,1,1,3); Information from several european mills
- Occupation, construction site [resources, land]: 302000 m2a; lognormal SD95 2.1
  (5,4,1,3,4,5); Estimation
- Transformation, to industrial area, built up [resources, land]: 151000 m2; lognormal SD95 2
  (1,3,1,1,1,3); Information from several european mills
- Occupation, industrial area, vegetation [resources, land]: 5.45e6 m2a; lognormal SD95 1.5
  (1,3,1,1,1,3); Information from several european mills
- Transformation, from unknown [resources, land]: 260000 m2; lognormal SD95 2
  (1,3,1,1,1,3); Information from several european mills

## Sampling procedure
literature

## Extrapolations
Only land-use data are average data from European paper mills. Other information is estimated, based on photos and literature

## Sources
- Hischier R., 2007, 2007 - LCI packagings and graphical papers - Hischier, Final report ecoinvent data v2.0, 11, Swiss Centre for LCI, Empa - TSL, Duebendorf and St. Gallen, CH
Hischier R. (2007) Life Cycle Inventories of Packaging and Graphical Paper. Final report ecoinvent data v2.0. Volume: 11. Swiss Centre for LCI, Empa - TSL. Dübendorf, CH.
Type: Measurement on site
Source: CD-ROM
First author: Hischier R.
Year: 2007
Title of anthology: Final report ecoinvent data v2.0
Place of publication: Dübendorf, CH
Publisher: Swiss Centre for LCI, Empa - TSL
Volume No: 11

## Validation
Proof reading validation: passed; Other validation: none;
