# Calcium chloride, CaCl2, at regional storage

Dataset: EcoSpold 1, unit process
Functional unit: 1 kg
Category: chemicals / inorganic
Geography: CH
Time period: 2000-01 to 2000-12
Generated by: Alex Primas
accessRestrictedTo: 0
copyright: true

## General comment
For this inventory it was assumed that the main source of calcium chloride used in Switzerland is originating from soda ash plants in europe.;
CAS number: 010043-52-4;
Formula: CaCl2;

## Included processes
Transport to Switzerland and storage area included. Transport as bulk material assumed and therefore no package materials or package processes included. This module includes no calcium chloride produced from brine as used in the U.S.

## Geography
No production of calcium chloride in Switzerland. Import from Europe assumed.

## Technology
Only calcium chloride from soda ash production considered. Standard transport distances for soda ash used. Infrastructure based on sodium chloride storage.

## Reference product
- Calcium chloride, CaCl2, at regional storage [CH]: 1 kg
  SWITZERLAND

## Inputs from technosphere
- Transport, freight, rail [RER]: 0.78 tkm; lognormal SD95 2.09
  (4,5,nA,nA,nA,nA); Estimated with standard distances for soda ash
- Storage building, chemicals, solid [CH]: 1.13e-10 p; lognormal SD95 3.18
  (4,5,1,1,3,5); Approximation from data of NaCl production
- Transport, freight, lorry, 16t-32t gross weight, fleet average [CH]: 0.065 tkm; lognormal SD95 2.09
  (4,5,nA,nA,nA,nA); Estimated with standard distances for soda ash
- Calcium chloride, CaCl2, at plant [RER]: 1 kg; lognormal SD95 1
  exact value

## Sampling procedure
No validated information available on representativness of used processes.

## Extrapolations
Assumed that 100% of the total calcium chloride consumption in Switzerland origins from the soda ash process.

## Sources
- Althaus H.-J., Chudacoff M., Hellweg S., Hischier R., Jungbluth N., Osses M., Primas A., 2007, 2007 - LCI chemicals - Althaus, Final report ecoinvent data v2.0, 8, Swiss Centre for LCI, Empa - TSL, ETH, ESU-services Ltd., Chudacoff Oekoscience, Duebendorf, CH
Althaus H.-J., Chudacoff M., Hischier R., Jungbluth N., Osses M., Primas A. (2007) Life Cycle Inventories of Chemicals. Final report ecoinvent data v2.0. Volume: 8. Swiss Centre for LCI, Empa - TSL. Dübendorf, CH.
Type: Measurement on site
Source: CD-ROM
First author: Althaus H.-J.
Other authors: Chudacoff M., Hischier R., Jungbluth N., Osses M., Primas A.
Year: 2007
Title of anthology: Final report ecoinvent data v2.0
Place of publication: Dübendorf, CH
Publisher: Swiss Centre for LCI, Empa - TSL
Volume No: 8

## Validation
Proof reading validation: passed.; Other validation: none;
