# Disposal, frame extension, particle board, to final disposal

Dataset: EcoSpold 1, unit process
Functional unit: 1 m2
Category: waste management / building demolition
Geography: CH
Time period: 2018-01 to 2019-12
Generated by: Livia Ramseier
accessRestrictedTo: 0
copyright: true

## General comment
The amount of materials to be disposed of at the end of life was estimated based on the bill of materials.;

## Included processes
Included processes are the disposal of covering foil, wood, PUR rigid foam and glue. The transport to the municipal incineration plant is included.

## Geography
Data apply to the supply in Switzerland.

## Technology
Industry data.

## Time period
Time of publications.

## Reference product
- Disposal, frame extension, particle board, to final disposal [CH]: 1 m2
  SWITZERLAND

## Inputs from technosphere
All rows: lognormal SD95 1.1892
- Disposal, wood particle board, 10% binder, as building waste [CH]: 13.513 kg
  (3,4,1,3,1,4,BU:1.05); disposal particle board; Average of data from manufacturers
- Disposal, building, paint on wood, to final disposal [CH]: 0.26 kg
  (3,4,1,3,1,4,BU:1.05); disposal coating foil; Average of data from manufacturers
- Disposal, polyurethane, 0.2% water, to municipal incineration [CH]: 0.32667 kg
  (3,4,1,3,1,4,BU:1.05); disposal glue; Average of data from manufacturers
- Disposal, solid wood, as building waste [CH]: 1.4685 kg
  (3,4,1,3,1,4,BU:1.05); disposal bridge sawnwood, lath; Average of data from manufacturers
- Disposal, building, polyurethane foam, to final disposal [CH]: 1.3277 kg
  (3,4,1,3,1,4,BU:1.05); disposal PUR rigid foam; Average of data from manufacturers
- Disposal, wood particle board, 10% binder, as building waste [CH]: 0.90667 kg
  (3,4,1,3,1,4,BU:1.05); disposal bridge particle board; Average of data from manufacturers
- Transport, municipal waste collection, lorry 21t [CH]: 0.17803 tkm
  (3,4,1,3,1,4,BU:1.05); transportation to municipal incineration; Frischknecht et al. 2007

## Sampling procedure
Data survey at frame extenstion manufactures in Switzerland.

## Extrapolations
Some generic datasets from ecoinvent have been used.

## Sources
- Ramseier L., Stolz P., Frischknecht R., 2020, 2020 - LCA wooden windows and doors - Ramseier, Project report, 634, treeze Ltd., Uster, CH
Ramseier L., Stolz P., Frischknecht R. (2020) Ökobilanz von Holzfenstern und Holztüren. Project report. Volume: 634. treeze Ltd.. Uster, CH.
Type: Separate publication
Source: Report
First author: Ramseier L.
Other authors: Stolz P., Frischknecht R.
Year: 2020
Title of anthology: Project report
Place of publication: Uster, CH
Publisher: treeze Ltd.
Volume No: 634

## Validation
Proof reading validation: 16.06.2021; Other validation: G:\Projekte laufend\634 Holzfenster u.-türen, energieSchweiz\EcoSpold\UVEK2021\[634_EcoSpold_R_Verbreiterung_v1.2_UVEK2021-v0.1.xlsx]X-Process;
