# Disposal, lignite ash, 0% water, to opencast refill

Dataset: EcoSpold 1, unit process
Functional unit: 1 kg
Category: Others / unspecified
Geography: SI
Time period: 2000-01 to 2000-12
Generated by: Gabor Doka
accessRestrictedTo: 0
copyright: true

## General comment
backfilled waste composition is (in ppm): H2O n.a.;
Synonyms: ashes form lignite incineration disposed as backfill in opencast lignite mines;

## Included processes
This module contains only direct emissions from lignite ash used as backfill in opencast lignite mines: short-term emissions (0-100a) and long-term emissions (>100a) both to ground water. E.g. land-use and energy consumption is *not* included.

## Geography
Ash composition calculated from country-specific coal composition (SI) and technology-specific transfer coefficients in power plant.

## Technology
Lignite ash as backfill in lignite opencast mine (together with tailings)

## Reference product
- Disposal, lignite ash, 0% water, to opencast refill [SI]: 1 kg
  SLOVENIA

## Emissions to nature
- Sodium [emissions to water, groundwater]: 0.0016087 kg; lognormal SD95 4.4241
  Short-term emission from lignite ash backfill. Uncertainty derived from uncertainty in ash composition and uncertainty in transfer coefficients.
- Vanadium [emissions to water, groundwater, long-term]: 4.8441e-5 kg; lognormal SD95 7.9276
  Long-term emission from lignite ash backfill. Uncertainty derived from uncertainty in ash composition and uncertainty in transfer coefficients.
- Sodium [emissions to water, groundwater, long-term]: 0.00071325 kg; lognormal SD95 4.4853
  (same comment as for Vanadium)
- Bromine [emissions to water, groundwater, long-term]: 6.9807e-8 kg; lognormal SD95 10.728
  (same comment as for Vanadium)
- Thallium [emissions to water, groundwater]: 7.7839e-11 kg; lognormal SD95 24.33
  (same comment as for Sodium)
- Molybdenum [emissions to water, groundwater, long-term]: 2.4511e-11 kg; lognormal SD95 9.0547
  (same comment as for Vanadium)
- Tungsten [emissions to water, groundwater, long-term]: 1.585e-6 kg; lognormal SD95 11.136
  (same comment as for Vanadium)
- Zinc [emissions to water, groundwater]: 3.6504e-9 kg; lognormal SD95 17.539
  (same comment as for Sodium)
- Tin [emissions to water, groundwater]: 3.2764e-10 kg; lognormal SD95 21.744
  (same comment as for Sodium)
- Cadmium [emissions to water, groundwater, long-term]: 1.5491e-6 kg; lognormal SD95 11.702
  (same comment as for Vanadium)
- Iron [emissions to water, groundwater]: 1.1657e-7 kg; lognormal SD95 12.665
  (same comment as for Sodium)
- Thallium [emissions to water, groundwater, long-term]: 5.1252e-8 kg; lognormal SD95 16.3
  (same comment as for Vanadium)
- Cobalt [emissions to water, groundwater, long-term]: 3.8672e-5 kg; lognormal SD95 8.0568
  (same comment as for Vanadium)
- Titanium [emissions to water, groundwater]: 3.2079e-7 kg; lognormal SD95 11.214
  (same comment as for Sodium)
- Iodide [emissions to water, groundwater, long-term]: 5.16e-14 kg; lognormal SD95 13.345
  (same comment as for Vanadium)
- Phosphate [emissions to water, groundwater, long-term]: 0.0001769 kg; lognormal SD95 7.7008
  (same comment as for Vanadium)
- Nickel [emissions to water, groundwater, long-term]: 3.8409e-5 kg; lognormal SD95 8.063
  (same comment as for Vanadium)
- Copper [emissions to water, groundwater]: 2.4875e-9 kg; lognormal SD95 18.179
  (same comment as for Sodium)
- Manganese [emissions to water, groundwater, long-term]: 5.1598e-5 kg; lognormal SD95 7.764
  (same comment as for Vanadium)
- Molybdenum [emissions to water, groundwater]: 1.8013e-5 kg; lognormal SD95 8.8616
  (same comment as for Sodium)
- Sulfate [emissions to water, groundwater]: 0.026335 kg; lognormal SD95 2.8671
  (same comment as for Sodium)
- Calcium [emissions to water, groundwater]: 1.9529e-5 kg; lognormal SD95 7.127
  (same comment as for Sodium)
- Magnesium [emissions to water, groundwater, long-term]: 0.0077363 kg; lognormal SD95 3.5332
  (same comment as for Vanadium)
- Manganese [emissions to water, groundwater]: 1.7853e-9 kg; lognormal SD95 18.727
  (same comment as for Sodium)
- Boron [emissions to water, groundwater, long-term]: 0.0003395 kg; lognormal SD95 5.9313
  (same comment as for Vanadium)
- Nickel [emissions to water, groundwater]: 5.8333e-8 kg; lognormal SD95 13.446
  (same comment as for Sodium)
- Antimony [emissions to water, groundwater]: 3.9488e-6 kg; lognormal SD95 9.6931
  (same comment as for Sodium)
- Arsenic [emissions to water, groundwater]: 1.2684e-5 kg; lognormal SD95 9.2435
  (same comment as for Sodium)
- Strontium [emissions to water, groundwater]: 2.7351e-7 kg; lognormal SD95 11.419
  (same comment as for Sodium)
- Potassium [emissions to water, groundwater]: 0.00087352 kg; lognormal SD95 4.7715
  (same comment as for Sodium)
- Sulfate [emissions to water, groundwater, long-term]: 0.071498 kg; lognormal SD95 2.6421
  (same comment as for Vanadium)
- Titanium [emissions to water, groundwater, long-term]: 0.00025768 kg; lognormal SD95 6.2258
  (same comment as for Vanadium)
- Mercury [emissions to water, groundwater]: 5.1142e-12 kg; lognormal SD95 30.113
  (same comment as for Sodium)
- Lead [emissions to water, groundwater, long-term]: 1.2731e-5 kg; lognormal SD95 9.2394
  (same comment as for Vanadium)
- Chromium VI [emissions to water, groundwater, long-term]: 3.5823e-6 kg; lognormal SD95 8.6518
  (same comment as for Vanadium)
- Boron [emissions to water, groundwater]: 4.2561e-6 kg; lognormal SD95 8.3919
  (same comment as for Sodium)
- Fluoride [emissions to water, groundwater, long-term]: 1.1217e-5 kg; lognormal SD95 9.2343
  (same comment as for Vanadium)
- Strontium [emissions to water, groundwater, long-term]: 0.00018009 kg; lognormal SD95 6.5533
  (same comment as for Vanadium)
- Magnesium [emissions to water, groundwater]: 3.6836e-6 kg; lognormal SD95 8.5242
  (same comment as for Sodium)
- Barium [emissions to water, groundwater, long-term]: 0.00025799 kg; lognormal SD95 6.2258
  (same comment as for Vanadium)
- Arsenic [emissions to water, groundwater, long-term]: 1.2684e-14 kg; lognormal SD95 9.4412
  (same comment as for Vanadium)
- Scandium [emissions to water, groundwater]: 3.6457e-7 kg; lognormal SD95 12.338
  (same comment as for Sodium)
- Chromium VI [emissions to water, groundwater]: 5.4476e-6 kg; lognormal SD95 8.8085
  (same comment as for Sodium)
- Selenium [emissions to water, groundwater]: 1.6569e-6 kg; lognormal SD95 10.698
  (same comment as for Sodium)
- Beryllium [emissions to water, groundwater]: 3.9124e-9 kg; lognormal SD95 17.465
  (same comment as for Sodium)
- Aluminium [emissions to water, groundwater, long-term]: 0.012111 kg; lognormal SD95 3.2344
  (same comment as for Vanadium)
- Zinc [emissions to water, groundwater, long-term]: 7.1104e-5 kg; lognormal SD95 7.444
  (same comment as for Vanadium)
- Aluminium [emissions to water, groundwater]: 1.5077e-5 kg; lognormal SD95 7.1628
  (same comment as for Sodium)
- Tin [emissions to water, groundwater, long-term]: 4.1276e-6 kg; lognormal SD95 10.52
  (same comment as for Vanadium)
- Antimony [emissions to water, groundwater, long-term]: 6.2903e-6 kg; lognormal SD95 9.5328
  (same comment as for Vanadium)
- Mercury [emissions to water, groundwater, long-term]: 2.5862e-8 kg; lognormal SD95 17.317
  (same comment as for Vanadium)
- Silicon [emissions to water, groundwater]: 0.00069877 kg; lognormal SD95 4.3269
  (same comment as for Sodium)
- Selenium [emissions to water, groundwater, long-term]: 2.6395e-6 kg; lognormal SD95 10.528
  (same comment as for Vanadium)
- Scandium [emissions to water, groundwater, long-term]: 9.2542e-7 kg; lognormal SD95 11.967
  (same comment as for Vanadium)
- Copper [emissions to water, groundwater, long-term]: 1.5425e-5 kg; lognormal SD95 9.0293
  (same comment as for Vanadium)
- Bromine [emissions to water, groundwater]: 4.0582e-6 kg; lognormal SD95 10.52
  (same comment as for Sodium)
- Cadmium [emissions to water, groundwater]: 4.4051e-11 kg; lognormal SD95 25.695
  (same comment as for Sodium)
- Silicon [emissions to water, groundwater, long-term]: 0.088306 kg; lognormal SD95 2.0632
  (same comment as for Vanadium)
- Fluoride [emissions to water, groundwater]: 1.6829e-6 kg; lognormal SD95 10.055
  (same comment as for Sodium)
- Beryllium [emissions to water, groundwater, long-term]: 2.5761e-6 kg; lognormal SD95 11.079
  (same comment as for Vanadium)
- Phosphate [emissions to water, groundwater]: 2.9533e-7 kg; lognormal SD95 12.746
  (same comment as for Sodium)
- Cobalt [emissions to water, groundwater]: 2.7713e-8 kg; lognormal SD95 14.466
  (same comment as for Sodium)
- Potassium [emissions to water, groundwater, long-term]: 0.00067447 kg; lognormal SD95 4.7785
  (same comment as for Vanadium)
- Calcium [emissions to water, groundwater, long-term]: 0.05158 kg; lognormal SD95 2.3605
  (same comment as for Vanadium)
- Lead [emissions to water, groundwater]: 2.7661e-10 kg; lognormal SD95 22.07
  (same comment as for Sodium)
- Chloride [emissions to water, groundwater, long-term]: 1.662e-6 kg; lognormal SD95 10.694
  (same comment as for Vanadium)
- Chloride [emissions to water, groundwater]: 2.208e-6 kg; lognormal SD95 10.679
  (same comment as for Sodium)
- Iron [emissions to water, groundwater, long-term]: 0.0093102 kg; lognormal SD95 3.3688
  (same comment as for Vanadium)
- Barium [emissions to water, groundwater]: 8.9265e-9 kg; lognormal SD95 16.119
  (same comment as for Sodium)
- Tungsten [emissions to water, groundwater]: 9.9498e-7 kg; lognormal SD95 11.311
  (same comment as for Sodium)
- Vanadium [emissions to water, groundwater]: 5.5354e-7 kg; lognormal SD95 10.652
  (same comment as for Sodium)
- Iodide [emissions to water, groundwater]: 5.16e-7 kg; lognormal SD95 13.102
  (same comment as for Sodium)

## Sampling procedure
country-specific calculation based on literature data

## Extrapolations
Ash composition calculated from coal composition and transfer coefficients in power plant (cf. ecoinvent coal report Röder 2003). Transfer coefficients in backfill estimated from data of residual material landfills and estimated carbonate phase of lignite ashes

## Uncertainty adjustments
uncertainty of waste input composition data derived from generic formula GSD(c) = N*ln(c)+1. Mean long-term emissions are the emissions until the next glacial period occurs (in 60'000a) and the landfill is eroded. Maximal long-term emissions are the complete emissions of all landfilled material (except Cr). Minimal long-term emissions are derived implicitly from the mean and maximal values assuming a lognormal distribution.

## Sources
- Doka G., 2009, 2009 - LCI waste treatment services - Doka, Final report ecoinvent data v2.1, 13, Swiss Centre for LCI, Doka LCA, Duebendorf and St. Gallen, CH
Doka G. (2008) Life Cycle Inventories of Waste Treatment Services. Final report ecoinvent data v2.1. Volume: 13. Issue: 0. Swiss Centre for LCI, Empa - TSL. Dübendorf, CH.
Type: Measurement on site
Source: CD-ROM
First author: Doka G.
Year: 2008
Title of anthology: Final report ecoinvent data v2.1
Place of publication: Dübendorf, CH
Publisher: Swiss Centre for LCI, Empa - TSL
Volume No: 13
Issue No: 0

## Validation
Proof reading validation: passed.; Other validation: none;
