# Kitchen worktop, melamin coated worktop, at plant

Dataset: EcoSpold 1, unit process
Functional unit: 1 m2
Category: construction / kitchen
Geography: CH
Time period: 2014-01 to 2014-12
Share of production covered: 0 %
Generated by: Franziska Wyss
accessRestrictedTo: 0
copyright: true

## Included processes
This data set includes the materials and resources needed for producing melamin covered kitchen countertops per m2. The worktop has a thickness of 19 mm. An average kitchen countertop has the measures of 2400 mm x 600 mm (1.44 m2). The sink is not included. Transport is estimated according to the ecoinvent standard distances for Switzerland. Linked to updated LCI of particle boards from Ecoinvent data v3.2 for KBOB recommendation 2016.; Geography: Data valid for Switzerland

## Geography
Data valid for Switzerland

## Technology
Average production

## Reference product
- Kitchen worktop, melamin coated worktop, at plant [CH]: 1 m2
  SWITZERLAND

## Inputs from technosphere
- Disposal, particle board, melamin coated (200 g/m2) [CH]: 0.44716 m2; lognormal SD95 1.1194
  (1,1,2,3,1,4,BU:1.05); Entsorgung Verschnitt melaminbeschichtete Platte;
- Polyurethane, flexible foam, at plant [RER]: 0.019688 kg; lognormal SD95 1.1194
  (1,1,2,3,1,4,BU:1.05); Kunststoffschutz (PU-Schaum);
- Particleboard, uncoated, average glue mix, at regional storage, with resource correction [CH]: 19.84 kg; lognormal SD95 1.1194
  (1,1,2,3,1,4,BU:1.05); Holzunterbau (Spanplatte); ; Dichte: 640 kg/m3
- Particle board, melamin coated, doubleside coated (200 g [CH]: 1.1111 m2; lognormal SD95 1.2459
  (4,3,2,3,1,4,BU:1.05); melaminbeschichtete Platte;
- Corrugated board, mixed fibre, single wall, at plant [CH]: 0.34767 kg; lognormal SD95 1.1194
  (1,1,2,3,1,4,BU:1.05); Kartonverpackung;
- Transport, freight, rail, electricity with shunting [CH]: 2.832 tkm; lognormal SD95 2.095
  (4,5,na,na,na,na,BU:2); Zug;
- Electricity, medium voltage, at grid [CH]: 0.95556 kWh; lognormal SD95 1.1194
  (1,1,2,3,1,4,BU:1.05); Elektrizität (CH-Mix), Verarbeitung Platte;
- Transport, freight, lorry, 16t-32t gross weight, fleet average [CH]: 0.70603 tkm; lognormal SD95 2.095
  (4,5,na,na,na,na,BU:2); LKW;

## Sources
- Kasser U., R. Frischknecht, M. Klingler, D. Savi, R. Itten, F. Wyss,P. Stolz, L. Tschuemperlin, 2016, 2016 - Renewal and exp. of LCA data in KBOB - Kasser, Project report, 489, Buero fuer Umweltchemie, treeze Ltd., Zuerich and Uster, CH
Franziska Wyss, Rolf Frischknecht, Philippe Stolz (2014) Ökobilanzen von Kücheneinbauten und -möbeln. Project report. Volume: 489. treeze Ltd.. Uster, CH.
Type: Separate publication
Source: Report
First author: Franziska Wyss
Other authors: Rolf Frischknecht, Philippe Stolz
Year: 2014
Title of anthology: Project report
Place of publication: Uster, CH
Publisher: treeze Ltd.
Volume No: 489

## Validation
Proof reading validation: 05.11.2015; Other validation: \\SRV01\ESU-Docs\Projekte laufend\489 Erweiterung KBOB-Liste BFE\EcoSpold\Küche\[489_Küche_v1.10.xlsx]X-Process;
