# Transport, natural gas, offshore pipeline, long distance

Dataset: EcoSpold 1, unit process
Functional unit: 1 tkm
Category: pipeline / natural gas
Geography: NG
Time period: 2000-01 to 2020-01
Production volume: 0 million tons of directly imported natural gas globally in 2019.
Share of production covered: 100 %
Generated by: Niels Jungbluth
accessRestrictedTo: 0
copyright: true

## General comment
Infrastructure requirements are based on estimated standard capacity.;

## Included processes
This dataset describes the energy consumption and the emissions linked to the transport of Nigerian natural gas in an offshore pipeline.

## Geography
The data for emissions are based on European data and for energy requirements on German data.

## Technology
Long-distance transport offshore with average compressor station.

## Time period
The data for emissions is from 2006, the data for energy requirements from 2001

## Reference product
- Transport, natural gas, offshore pipeline, long distance [NG]: 1 tkm

## Inputs from technosphere
- Natural gas, burned in gas turbine [NG]: 0.82044 MJ; lognormal SD95 1.2117
  (4,2,2,1,1,BU:1.05); Qualified estimates from different gas companies
- Disposal, used mineral oil, 10% water, to hazardous waste incineration [CH]: 1.16e-6 kg; lognormal SD95 1.596
  (3,4,5,3,3,BU:1.05); based on dutch data
- Pipeline, natural gas, long distance, high capacity, offshore [GLO]: 1.78e-9 km; lognormal SD95 3.2745
  (4,3,5,1,1,BU:3); based on estimated standard capacity
- Transport, freight, lorry, 16t-32t gross weight, fleet average [RER]: 1.16e-7 tkm; lognormal SD95 2.304
  (3,4,5,3,3,BU:2); estimates for waste transport
- Natural gas, at production [NG]: 0.0026842 Nm3; lognormal SD95 1.209
  (4,2,1,1,1,BU:1.05); Imports via pipeline + losses

## Emissions to nature
- Mercury [emissions to air, low. pop.]: 2.6842e-11 kg; lognormal SD95 5.0592
  (2,3,4,1,1,BU:5); Calculated based on leakage and average gas composition
- Carbon dioxide, fossil [emissions to air, low. pop.]: 6.1548e-5 kg; lognormal SD95 1.2226
  (2,3,4,1,1,BU:1.05); Calculated based on leakage and average gas composition
- Ethane [emissions to air, low. pop.]: 0.00014737 kg; lognormal SD95 1.5681
  (2,3,4,1,1,BU:1.5); Calculated based on leakage and average gas composition
- Methane, trifluoro-, HFC-23 [emissions to air, low. pop.]: 8.946e-8 kg; lognormal SD95 2.1136
  (5,5,5,3,3,BU:1.5); assuming 90% HFC-23 compared to Schori 2012
- Propane [emissions to air, low. pop.]: 3.3157e-5 kg; lognormal SD95 1.5681
  (2,3,4,1,1,BU:1.5); Calculated based on leakage and average gas composition
- Methane, bromochlorodifluoro-, Halon 1211 [emissions to air, low. pop.]: 2.24e-9 kg; lognormal SD95 2.1136
  (5,5,5,3,3,BU:1.5); assuming 10% halon compared to Schori 2012
- NMVOC, non-methane volatile organic compounds, unspecified origin [emissions to air, low. pop.]: 1.2277e-6 kg; lognormal SD95 1.5681
  (2,3,4,1,1,BU:1.5); Calculated based on leakage and average gas composition
- Methane, fossil [emissions to air, low. pop.]: 0.0017793 kg; lognormal SD95 1.5681
  (2,3,4,1,1,BU:1.5); Calculated based on leakage and average gas composition
- Butane [emissions to air, low. pop.]: 1.705e-5 kg; lognormal SD95 1.5681
  (2,3,4,1,1,BU:1.5); Calculated based on leakage and average gas composition

## Sampling procedure
Literature.

## Sources
- Bussa M., Jungbluth N., Meili C., 2021, 2021 - LCI long-dist. transp. and distrib. natural gas - Bussa, Project report, 565, ESU-services Ltd., Schaffhausen, CH
Bussa M., Meili C., Jungbluth N. (2021) Life cycle inventories for long-distance transport of natural gas. Project report. Volume: 565. ESU-services Ltd.. Schaffhausen, CH.
Type: Separate publication
Source: Report
First author: Bussa M.
Other authors: Meili C., Jungbluth N.
Year: 2021
Title of anthology: Project report
Place of publication: Schaffhausen, CH
Publisher: ESU-services Ltd.
Volume No: 565

## Validation
Passed. https://esuservices-my.sharepoint.com/personal/jungbluth_esuservices_onmicrosoft_com/Documents/ESU-intern/565 LCI oil and gas sector CH BAFU/EcoSpold/[EcoSpold-oil¬gas-transport-2020-v2.0.xlsb]X-Process
