# Operation, passenger car, petrol, 15% vol. ETBE with ethanol from biomass, EURO4

Dataset: EcoSpold 1, unit process
Functional unit: 1 km
Category: transport systems / road\operations
Geography: CH
Time period: 2000-01 to 2000-12
Share of production covered: 1 %
Generated by: Michael Spielmann
accessRestrictedTo: 0
copyright: true

## General comment
Biogenic shares of CO,-CO2 and CH4 emissions are determined based on the bigenic/fossil ratio of the used fuel. Regulated emissions and related species are adopted from average data for the operation of a newly registered Euro4 car in Switzerland in the year 2006.;

## Included processes
Fuel consumption is included. Direct airborne emissions of gaseous substances, particulate matters and heavy metals are accounted for. Particulate emissions comprise exhaust- and abrasions emissions. Heavy metal emissions to soil and water caused by tyre abrasion are included.

## Geography
Data refer to the Swiss conditions

## Technology
Petrol with 15% ETBE with EtOH from biomass, Euro4

## Time period
Year in which Euro-standard is coming into effect.

## Reference product
- Operation, passenger car, petrol, 15% vol. ETBE with ethanol from biomass, EURO4 [CH]: 1 km
  SWITZERLAND

## Inputs from technosphere
- Petrol, 15% vol. ETBE additive, EtOH f. biomass, prod. RER, at service station [CH]: 0.060379 kg; lognormal SD95 1.0714
  (2,1,1,1,1,1); own calculations

## Emissions to nature
- Nickel [emissions to water, unspecified]: 1.23e-9 kg; lognormal SD95 5.6287
  (5,5,5,1,1,5); abrasion of tyres, quantity derived from tyre composition
- Methane, fossil [emissions to air, unspecified]: 5.2607e-6 kg; lognormal SD95 1.7823
  (2,3,1,1,4,2); adopeted from Euro4 petrol car
- NMVOC, non-methane volatile organic compounds, unspecified origin [emissions to air, unspecified]: 9.3291e-5 kg; lognormal SD95 1.7823
  (2,3,1,1,4,2); adopeted from Euro4 petrol car
- Methane, biogenic [emissions to air, unspecified]: 2.4086e-7 kg; lognormal SD95 1.7823
  (2,3,1,1,4,2); adopeted from Euro4 petrol car
- Noise, road, passenger car, average [non material emissions, unspecified]: 1 km
- Copper [emissions to air, unspecified]: 9.8183e-8 kg; lognormal SD95 5.4168
  (4,5,5,1,1,5); abrasion of tyres and trace elements in fuel
- Zinc [emissions to soil, unspecified]: 2.7e-7 kg; lognormal SD95 2.113
  (5,5,5,1,1,5); abrasion of tyres, quantity derived from tyre composition
- PAH, polycyclic aromatic hydrocarbons [emissions to air, unspecified]: 4e-10 kg; lognormal SD95 12.414
  (2,3,1,1,4,2); rough estimate for petrol cars derived from corineair
- Heat, waste [emissions to air, unspecified]: 2.7231 MJ; lognormal SD95 1.2152
  (2,1,1,1,1,5); own calculation; based on HHV.
- Selenium [emissions to air, unspecified]: 5.1322e-10 kg; lognormal SD95 5.4168
  (4,5,5,1,1,5); abrasion of tyres and trace elements in fuel
- Chromium [emissions to soil, unspecified]: 4.55e-10 kg; lognormal SD95 2.113
  (5,5,5,1,1,5); abrasion of tyres, quantity derived from tyre composition
- Cadmium [emissions to air, unspecified]: 1.2422e-9 kg; lognormal SD95 5.4168
  (4,5,5,1,1,5); abrasion of tyres and trace elements in fuel
- Copper [emissions to soil, unspecified]: 6.39e-9 kg; lognormal SD95 2.113
  (5,5,5,1,1,5); abrasion of tyres, quantity derived from tyre composition
- Zinc [emissions to air, unspecified]: 6.3671e-7 kg; lognormal SD95 5.4168
  (4,5,5,1,1,5); abrasion of tyres and trace elements in fuel
- Carbon dioxide, fossil [emissions to air, unspecified]: 0.17673 kg; lognormal SD95 1.0714
  (2,1,1,1,1,1); own calculations, based on fuel consumption and fossil C-content in fuel
- Nickel [emissions to soil, unspecified]: 1.23e-9 kg; lognormal SD95 2.113
  (5,5,5,1,1,5); abrasion of tyres, quantity derived from tyre composition
- Cadmium [emissions to soil, unspecified]: 9.55e-11 kg; lognormal SD95 2.113
  (5,5,5,1,1,5); abrasion of tyres, quantity derived from tyre composition
- Xylene [emissions to air, unspecified]: 7.681e-6 kg; lognormal SD95 1.7823
  (2,3,1,1,4,2); adopeted from Euro4 petrol car
- Mercury [emissions to air, unspecified]: 4.2265e-12 kg; lognormal SD95 5.4168
  (4,5,5,1,1,5); abrasion of tyres and trace elements in fuel
- Toluene [emissions to air, unspecified]: 7.681e-6 kg; lognormal SD95 1.7823
  (2,3,1,1,4,2); adopeted from Euro4 petrol car
- Lead [emissions to soil, unspecified]: 3.93e-9 kg; lognormal SD95 2.113
  (5,5,5,1,1,5); abrasion of tyres, quantity derived from tyre composition
- Carbon monoxide, biogenic [emissions to air, unspecified]: 3.307e-5 kg; lognormal SD95 5.266
  (2,3,1,1,4,2); based on NEDC values of Euro4 car and biogenic C-content in fuel
- Cadmium [emissions to water, unspecified]: 9.55e-11 kg; lognormal SD95 3.5459
  (5,5,5,1,1,5); abrasion of tyres, quantity derived from tyre composition
- Chromium [emissions to water, unspecified]: 4.55e-10 kg; lognormal SD95 3.5459
  (5,5,5,1,1,5); abrasion of tyres, quantity derived from tyre composition
- Chromium [emissions to air, unspecified]: 9.1271e-9 kg; lognormal SD95 5.4168
  (4,5,5,1,1,5); abrasion of tyres and trace elements in fuel
- Particulates, > 2.5 um, and < 10um [emissions to air, unspecified]: 1.3548e-5 kg; lognormal SD95 2.2614
  (3,3,3,1,4,2); includes exhaust- and abrasions emissions. (exhaust emissions representing NEDC)
- Lead [emissions to water, unspecified]: 3.93e-9 kg; lognormal SD95 5.6287
  (5,5,5,1,1,5); abrasion of tyres, quantity derived from tyre composition
- Lead [emissions to air, unspecified]: 3.645e-9 kg; lognormal SD95 5.4168
  (4,5,5,1,1,5); abrasion of tyres and trace elements in fuel
- Carbon monoxide, fossil [emissions to air, unspecified]: 0.00072231 kg; lognormal SD95 5.266
  (2,3,1,1,4,2); based on NEDC values of Euro4 car and fossil C-content in fuel
- Carbon dioxide, biogenic [emissions to air, unspecified]: 0.0080914 kg; lognormal SD95 1.0714
  (2,1,1,1,1,1); own calculations, based on fuel consumption and biogenic C-content in fuel
- Zinc [emissions to water, unspecified]: 2.7e-7 kg; lognormal SD95 5.6287
  (5,5,5,1,1,5); abrasion of tyres, quantity derived from tyre composition
- Dinitrogen monoxide [emissions to air, unspecified]: 1.3297e-6 kg; lognormal SD95 1.7956
  (2,3,1,1,4,4); adopeted from Euro4 petrol car
- Particulates, > 10 um [emissions to air, unspecified]: 7.8076e-5 kg; lognormal SD95 1.8065
  (same comment as for Particulates, > 2.5 um, and < 10um)
- Ammonia [emissions to air, unspecified]: 2.3067e-5 kg; lognormal SD95 1.5839
  (2,3,1,1,4,4); adopeted from Euro4 petrol car
- Copper [emissions to water, unspecified]: 6.39e-9 kg; lognormal SD95 3.5459
  (5,5,5,1,1,5); abrasion of tyres, quantity derived from tyre composition
- Particulates, < 2.5 um [emissions to air, unspecified]: 8.48e-6 kg; lognormal SD95 3.2542
  (same comment as for Particulates, > 2.5 um, and < 10um)
- Nickel [emissions to air, unspecified]: 9.4246e-9 kg; lognormal SD95 5.4168
  (4,5,5,1,1,5); abrasion of tyres and trace elements in fuel
- Chromium VI [emissions to air, unspecified]: 6.0379e-12 kg; lognormal SD95 5.4168
  (4,5,5,1,1,5); own calculation
- Sulfur dioxide [emissions to air, unspecified]: 5.1322e-6 kg; lognormal SD95 1.1249
  (3,3,1,1,1,1); own calculations, based on fuel consumption and S-content in fuel
- Benzene [emissions to air, unspecified]: 8.8915e-6 kg; lognormal SD95 1.7823
  (2,3,1,1,4,2); adopeted from Euro4 petrol car
- Nitrogen oxides [emissions to air, unspecified]: 3.5636e-5 kg; lognormal SD95 1.7823
  (2,3,1,1,4,2); based on NEDC values of Euro4 petrol car

## Sampling procedure
Literature data.

## Sources
- Jungbluth N., Chudacoff M., Dauriat A., Dinkel F., Doka G., Faist Emmenegger M., Gnansounou E., Kljun N., Spielmann M., Stettler C., Sutter J., 2007, 2007 - LCI bioenergy - Jungbluth, Final report ecoinvent data v2.0, 17, Swiss Centre for LCI, ESU-services Ltd., Duebendorf and Uster, CH
Jungbluth N., Chudacoff M., Dauriat A., Dinkel F., Doka G., Faist Emmenegger M., Gnansounou E., Kljun N., Spielmann M., Stettler C., Sutter J. (2007) Life Cycle Inventories of Bioenergy. Final report ecoinvent data v2.0. Volume: 17. Swiss Centre for LCI, ESU. Duebendorf and Uster, CH.
Type: Measurement on site
Source: CD-ROM
First author: Jungbluth N.
Other authors: Chudacoff M., Dauriat A., Dinkel F., Doka G., Faist Emmenegger M., Gnansounou E., Kljun N., Spielmann M., Stettler C., Sutter J.
Year: 2007
Title of anthology: Final report ecoinvent data v2.0
Place of publication: Duebendorf and Uster, CH
Publisher: Swiss Centre for LCI, ESU
Volume No: 17

## Validation
Proof reading validation: Passed.; Other validation: none;
