# xxx Disposal, railway track, ICE

Dataset: EcoSpold 1, unit process, infrastructure
Functional unit: 1 my
Category: waste treatment, obsolete / unspecified
Geography: DE
Generated by: default
accessRestrictedTo: 0
copyright: true

## Reference product
- xxx Disposal, railway track, ICE [DE]: 1 my
  ...

## Sources
- Created for EcoSpold 1 compatibility, Final report ecoinvent data v2.0, 7
Kellenberger D., Althaus H.-J., Jungbluth N., Künniger T. (2007) Life Cycle Inventories of Building Products. Final report ecoinvent data v2.0. Volume: 7. Swiss Centre for LCI, Empa - TSL. Dübendorf, CH.
Type: Measurement on site
Source: CD-ROM
First author: Kellenberger D.
Other authors: Althaus H.-J., Jungbluth N., Künniger T.
Year: 2007
Title of anthology: Final report ecoinvent data v2.0
Place of publication: Dübendorf, CH
Publisher: Swiss Centre for LCI, Empa - TSL
Volume No: 7
