# Surface treatment, wood-metal window, natural/varnished, wall opening, at plant

Dataset: EcoSpold 1, unit process
Functional unit: 1 m2
Category: building components / windows
Geography: CH
Generated by: Livia Ramseier
accessRestrictedTo: 0
copyright: true

## General comment
The measures of the window are 1.75m (width) x 1.3m (height). The wall opening is 1.8 m2 (assumption width of frame 0.12m, 2/3 of frame are behind the wall opening). The bill of materials is based on data from 4 window producers.;

## Included processes
Included are the materials used for the surface treatment (natural/varnished) for a wood-metal window. Production losses and transport of the materials are included.

## Technology
Industry data.

## Time period
Time of publications

## Reference product
- Surface treatment, wood-metal window, natural/varnished, wall opening, at plant [CH]: 1 m2
  SWITZERLAND

## Inputs from technosphere
- Acrylic dispersion, 65% in H2O, at plant [RER]: 0.0037745 kg; lognormal SD95 1.1635
  (3,3,1,1,1,4,BU:1.05); Wood preservative glaze; Average of data from manufacturers
- Transport, freight, rail, electricity with shunting [CH]: 0.33955 tkm; lognormal SD95 2.0296
  (3,3,1,1,1,4,BU:2); Transport of materials to production site; Standard distances
- Acrylic dispersion, 65% in H2O, at plant [RER]: 0.21063 kg; lognormal SD95 1.1635
  (3,3,1,1,1,4,BU:1.05); Wood glaze; Average of data from manufacturers
- Alkyd paint, white, 60% in H2O, at plant [RER]: 0.24743 kg; lognormal SD95 1.1635
  (3,3,1,1,1,4,BU:1.05); Primer / impregnation; Average of data from manufacturers
- Alkyd resin, long oil, 70% in white spirit, at plant [RER]: 0.11323 kg; lognormal SD95 1.1635
  (3,3,1,1,1,4,BU:1.05); Natural oil; Average of data from manufacturers
- Transport, freight, lorry, fleet average [CH]: 0.03207 tkm; lognormal SD95 2.0296
  (3,3,1,1,1,4,BU:2); Transport of materials to production site; Standard distances
- Disposal, building, paint on wood, to final disposal [CH]: 0.034575 kg; lognormal SD95 1.1635
  (3,3,1,1,1,4,BU:1.05); Disposal production waste paint; Average of data from manufacturers
- Alkyd paint, white, 60% in H2O, at plant [RER]: 0.066329 kg; lognormal SD95 1.1635
  (3,3,1,1,1,4,BU:1.05); Wood preservative; Average of data from manufacturers

## Sampling procedure
Data survey at 4 window manufacturers in Switzerland.

## Extrapolations
Some generic datasets from ecoinvent have been used.

## Sources
- Ramseier L., Stolz P., Frischknecht R., 2020, 2020 - LCA wooden windows and doors - Ramseier, Project report, 634, treeze Ltd., Uster, CH
Ramseier L., Stolz P., Frischknecht R. (2020) Ökobilanz von Holzfenstern und Holztüren. Project report. Volume: 634. treeze Ltd.. Uster, CH.
Type: Separate publication
Source: Report
First author: Ramseier L.
Other authors: Stolz P., Frischknecht R.
Year: 2020
Title of anthology: Project report
Place of publication: Uster, CH
Publisher: treeze Ltd.
Volume No: 634

## Validation
Proof reading validation: 13.10.2021; Other validation: G:\Projekte laufend\634 Holzfenster u.-türen, energieSchweiz\EcoSpold\UVEK2021\[634_EcoSpold_Fensterrahmen_v1.4_UVEK2021_v0.2_R_corr.xlsx]X-Process;
