# Acrylic filler, at plant

Dataset: EcoSpold 1, unit process
Functional unit: 1 kg
Category: construction / coverings
Geography: RER
Time period: 2000-01 to 2000-12
Generated by: Hans-Joerg Althaus
accessRestrictedTo: 0
copyright: true

## General comment
Acrylates are part of a large family of diverse polyesters and acrylic fillers can contain varying amounts of different filler materials. This dataset stands for one specific acrylic filler ready to apply (including water) and should not be used for other acrylic fillers if their contribution to the overall result of an assessment might be relevant. The data quality is not sufficient to allow for e.g. a comparative assessment of different fillers.;

## Included processes
Transport of raw materials and production of filler. The requirements of raw materials, the electricity and the infrastructure are inventoried. Packaging is neglected.

## Geography
data for Switzerland

## Technology
The dataset models a mixing process with its electricity consumption.

## Reference product
- Acrylic filler, at plant [RER]: 1 kg
  Europe

## Inputs from technosphere
- Electricity, medium voltage, production ENTSO-E, at grid: 0.00183 kWh; lognormal SD95 2.56
  (5,5,5,5,5,5,2)
- Transport, freight, lorry, fleet average [RER]: 0.0555 tkm; lognormal SD95 3.22
  (5,5,5,5,5,5,5)
- Transport, freight, rail [RER]: 0.126 tkm; lognormal SD95 3.22
  (5,5,5,5,5,5,5)
- Acrylic binder, 34% in H2O, at plant [RER]: 0.15 kg; lognormal SD95 1.68
  (4,5,5,2,1,5,3)
- Concrete mixing plant [CH]: 1.92e-10 p; lognormal SD95 4.25
  (5,5,5,5,5,5,9)
- Silica sand, at plant [DE]: 0.69 kg; lognormal SD95 1.68
  (4,5,5,2,1,5,3)
- Chemicals organic, at plant [GLO]: 0.04 kg; lognormal SD95 1.68
  (4,5,5,2,1,5,3)
- Titanium dioxide, production mix, at plant [RER]: 0.02 kg; lognormal SD95 1.68
  (4,5,5,2,1,5,3)
- Tap water, at user [CH]: 0.1 kg; lognormal SD95 1.68
  (4,5,5,2,1,5,3)

## Emissions to nature
- Heat, waste [emissions to air, unspecified]: 0.00659 MJ; lognormal SD95 2.56
  (5,5,5,5,5,5,14)

## Sampling procedure
Raw material consumption for a "typical" acrylic filler is chosen. Energy data are taken from a similar process.

## Sources
- Kellenberger D., Althaus H.-J., Jungbluth N., Kuenniger T., Lehmann M., Thalmann P., 2007, 2007 - LCI building products - Kellenberger, Final report ecoinvent data v2.0, 7, Swiss Centre for LCI, Empa - TSL, ESU-services Ltd., Bau- und Umweltchimie, Duebendorf, CH
Kellenberger D., Althaus H.-J., Jungbluth N., Künniger T. (2007) Life Cycle Inventories of Building Products. Final report ecoinvent data v2.0. Volume: 7. Swiss Centre for LCI, Empa - TSL. Dübendorf, CH.
Type: Measurement on site
Source: CD-ROM
First author: Kellenberger D.
Other authors: Althaus H.-J., Jungbluth N., Künniger T.
Year: 2007
Title of anthology: Final report ecoinvent data v2.0
Place of publication: Dübendorf, CH
Publisher: Swiss Centre for LCI, Empa - TSL
Volume No: 7

## Validation
Proof reading validation: passed; Other validation: none;
