# Aluminium oxide, plant

Dataset: EcoSpold 1, unit process, infrastructure
Functional unit: 1 p
Category: metals / non ferro\production\infrastructure
Geography: RER
Time period: 2000-01 to 2000-12
Generated by: Hans-Joerg Althaus
accessRestrictedTo: 0
copyright: true

## General comment
Medium sized plant. Output: 800'000 t/a, life time: 50 years;

## Included processes
Part of the Al2O3 plant needed only for Al2O3 fabrication (= calcination and Al2O3 storage) including disposal

## Geography
Some Swiss datasets are used for European processes.

## Technology
Technology of one medium sized plant in Germany

## Reference product
- Aluminium oxide, plant [RER]: 1 p
  Europe

## Inputs from technosphere
All rows: lognormal SD95 3
- Steel, low-alloyed, at plant [RER]: 61500 kg
  (3,4,1,1,1,4);
- Reinforcing steel, at plant [RER]: 980000 kg
  (3,4,1,1,1,4);
- Conveyor belt, at plant [RER]: 200 m
  (3,4,1,1,1,4);
- Concrete, normal, at plant [CH]: 1420 m3
  (3,4,1,1,1,4);
- Disposal, building, reinforced concrete, to final disposal [CH]: 4.09e6 kg
  (3,4,1,1,1,4);
- Chromium steel 18/8, at plant [RER]: 40000 kg
  (3,4,1,1,1,4);

## Inputs from nature
- Transformation, from unknown [resources, land]: 27500 m2; lognormal SD95 2
  (1,4,1,1,1,4);
- Occupation, industrial area, vegetation [resources, land]: 275000 m2a; lognormal SD95 1.5
  (2,4,1,1,1,4);
- Transformation, to industrial area, built up [resources, land]: 22000 m2; lognormal SD95 2
  (2,4,1,1,1,4);
- Occupation, industrial area, built up [resources, land]: 1.1e6 m2a; lognormal SD95 1.5
  (2,4,1,1,1,4);
- Transformation, to industrial area, vegetation [resources, land]: 5500 m2; lognormal SD95 2
  (2,4,1,1,1,4);

## Sampling procedure
Internet search

## Extrapolations
see Geography

## Uncertainty adjustments
Uncertainty is adjusted for geographical mismatch (using the pedigree matrix).

## Sources
- Classen M., Althaus H.-J., Blaser S., Scharnhorst W., Tuchschmid M., Jungbluth N., Faist Emmenegger M., 2009, 2009 - LCI metals - Classen, Final report ecoinvent data v2.1, 10, Swiss Centre for LCI, Empa, ESU-services Ltd., Duebendorf, CH
Classen M., Althaus H.-J., Blaser S., Doka G., Jungbluth N., Tuchschmid M. (2008) Life Cycle Inventories of Metals. Final report ecoinvent data v2.1. Volume: 10. Issue: 0. Swiss Centre for LCI, Empa - TSL. Dübendorf, CH.
Type: Measurement on site
Source: CD-ROM
First author: Classen M.
Other authors: Althaus H.-J., Blaser S., Doka G., Jungbluth N., Tuchschmid M.
Year: 2008
Title of anthology: Final report ecoinvent data v2.1
Place of publication: Dübendorf, CH
Publisher: Swiss Centre for LCI, Empa - TSL
Volume No: 10
Issue No: 0

## Validation
Proof reading validation: Passed.; Other validation: none;
