# Packing, fibre cement products

Dataset: EcoSpold 1, unit process
Functional unit: 1 kg
Category: Others / unspecified
Geography: CH
Time period: 2000-01 to 2000-12
Generated by: Daniel Kellenberger
accessRestrictedTo: 0
copyright: true

## General comment
The production amount used for normalization is 20'000t/a. This module is assumed to be valid also for plants up to 100'000t/a. The lifespan of the infrastructure and the land occupation are assumed to be 50 years.;

## Included processes
Includes the process of packing, transportation, and loading of the bags on paletts. The machines, the waste treatment after use by the end-user of the fibre cement products and the transports of the packing materials are included.

## Geography
Data from a company producing lime products in Switzerland are adjusted

## Technology
Assumed that packaging is the same as for lime products

## Reference product
- Packing, fibre cement products [CH]: 1 kg
  SWITZERLAND

## Inputs from technosphere
- Packaging film, LDPE, at plant [RER]: 9.84e-5 kg; lognormal SD95 1.21
  (4,na,na,na,na,na);
- Conveyor belt, at plant [RER]: 2.5e-8 m; lognormal SD95 3.23
  (5,na,na,na,na,na);
- Kraft paper, unbleached, at plant [RER]: 0.00787 kg; lognormal SD95 1.24
  (1,4,1,2,1,5);
- Steel, low-alloyed, at plant [RER]: 0.0011 kg; lognormal SD95 1.24
  (2,1,3,1,1,5);
- Electricity, medium voltage, at grid [CH]: 0.00309 kWh; lognormal SD95 1.05
  (1,2,1,1,1,1);
- EUR-flat pallet [RER]: 0.0001 p; lognormal SD95 1.44
  (4,5,1,1,3,5);
- Transport, freight, lorry, 7.5t-16t gross weight, fleet average [RER]: 7.99e-5 tkm; lognormal SD95 1.5
  (5,na,na,na,na,na);
- Transport, freight, rail, electricity with shunting [CH]: 0.006 tkm; lognormal SD95 2.23
  (5,na,na,na,na,na);
- Transport, freight, lorry, 16t-32t gross weight, fleet average [CH]: 0.0015 tkm; lognormal SD95 2.23
  (5,na,na,na,na,na);
- Disposal, polyethylene, 0.4% water, to municipal incineration [CH]: 0.000123 kg; lognormal SD95 1.21
  (4,na,na,na,na,na);
- Section bar rolling, steel [RER]: 0.0011 kg; lognormal SD95 1.24
  (2,1,3,1,1,5);
- Industrial machine, heavy, unspecified, at plant [RER]: 6e-5 kg; lognormal SD95 3.23
  (5,na,na,na,na,na);
- Disposal, paper, 11.2% water, to municipal incineration [CH]: 0.00787 kg; lognormal SD95 1.24
  (1,4,1,2,1,5);
- Disposal, wood untreated, 20% water, to municipal incineration [CH]: 0.0029254 kg; lognormal SD95 1.44
  (4,5,1,1,3,5);

## Emissions to nature
- Heat, waste [emissions to air, unspecified]: 0.0111 MJ; lognormal SD95 1.05
  (1,2,1,1,1,1);

## Sampling procedure
Assumption

## Extrapolations
See geography

## Sources
- Kellenberger D., Althaus H.-J., Jungbluth N., Kuenniger T., Lehmann M., Thalmann P., 2007, 2007 - LCI building products - Kellenberger, Final report ecoinvent data v2.0, 7, Swiss Centre for LCI, Empa - TSL, ESU-services Ltd., Bau- und Umweltchimie, Duebendorf, CH
Kellenberger D., Althaus H.-J., Jungbluth N., Künniger T. (2007) Life Cycle Inventories of Building Products. Final report ecoinvent data v2.0. Volume: 7. Swiss Centre for LCI, Empa - TSL. Dübendorf, CH.
Type: Measurement on site
Source: CD-ROM
First author: Kellenberger D.
Other authors: Althaus H.-J., Jungbluth N., Künniger T.
Year: 2007
Title of anthology: Final report ecoinvent data v2.0
Place of publication: Dübendorf, CH
Publisher: Swiss Centre for LCI, Empa - TSL
Volume No: 7

## Validation
Proof reading validation: passed; Other validation: none;
