# Electricity, residential, by conversion of methanol using fuel cell, DMFC allocated by exergy, distributed by truck, produced by Electrolysis, PEM using electricity from Solar PV + Wind (MA) and carbon sourced from DAC

Dataset: EcoSpold 1, unit process
Functional unit: 1 kWh
Category: heat / synthetic\transformation
Geography: CH
Time period: 2024-01 to 2024-01
Generated by: Romain Sacchi
accessRestrictedTo: 0
copyright: true

## General comment
This dataset represents the supply of 1 kilowatt hour of electricity in a residence, by methanol conversion in a fuel cell, DMFC. The methanol is distributed by truck from regional storage. The methanol is produced from hydrogen supplied by Electrolysis, PEM, with electricity from Solar PV + Wind (MA) as feedstock. The carbon is sourced from DAC. Electricity conversion efficiency [% LHV input]: 30%. LHV [kWh/kg]: 5.56. Market price [Euro/MJ]: 0.03. Distribution loss [% output]: 0%. Storage loss [% output]: 0%. Synthesis efficiency [% LHV input]: 0%. Hydrogen production efficiency [% LHV input]: 0. Total cap. Input-related [kW]: 3.33. CO2 biogenic share [%]: 100%. Power [kW]: 1.67. Lifetime [years]: 2.93. Annual operation [hours]: 4100. : . For more information, refer to: Sacchi, R. and Bauer, C. LCA of Power-to-X processes and applications in the residential sector. Paul Scherrer Institut, 2023. Source: Sacchi, R. and Bauer, C. LCA of Power-to-X processes and applications in the residential sector. Paul Scherrer Institut, 2023.

## Reference product
- Electricity, residential, by conversion of methanol using fuel cell, DMFC allocated by exergy, distributed by truck, produced by Electrolysis, PEM using electricity from Solar PV + Wind (MA) and carbon sourced from DAC [CH]: 1 kWh
  not defined

## Inputs from technosphere
- Oil storage 3000l [CH]: 4.409e-7 p; lognormal SD95 3.14
  {2;5;1;2;3;5;3;}
- Methanol supply, produced with hydrogen from Electrolysis, PEM using electricity from Solar PV + Wind (MA), and carbon from DAC [CH]: 0.4954 kg; lognormal SD95 1.382
  Methanol input. 1 [MJ]/ 19.9 [MJ/kg methanol]/ eff.(th) {2;5;1;2;3;5;1.05;}
- Fuel cell system assembly, 1 kWe, proton exchange membrane (PEM) [GLO]: 2.064e-5 p; lognormal SD95 3.14
  Operational time of 20,000 hours at power of 1 kWe. Due to the degradation effects the hydrogen consumption must be increased to always generate the power of 1 kWe. Because of dynamic operational regime 5 replacements of the PEMFC stack are included (lifetime of 3'800 hours per stack), while the BoP lasts the whole operational time. {2;5;1;2;3;5;3;}

## Emissions to nature
- Water [emissions to air, stratosphere + troposphere]: 0.5574 kg; lognormal SD95 1.676
  1.125kg water per kg methanol {2;5;1;2;3;5;1.5;}
- Carbon dioxide, biogenic [emissions to air, high. pop.]: 0.6798 kg; lognormal SD95 1.382
  Adapted from "heat production, light fuel oil, at boiler 10kW condensing, non-modulating" {2;5;1;2;3;5;1.05;}

## Sampling procedure
Sampling procedure: Literature data

## Sources
- Sacchi R., Bauer C., 2024, 2024 - LCA power-to-X in residential sector - Sacchi, Project report, PSI, Villigen, CH

## Validation
Proof reading validation: Passed, Other validation: none, Validator: Rolf Frischknecht, Telephone: 0041 44 940 61 91, E-mail: frischknecht@treeze.ch, Company: treeze, Country: CH
