# Disposal, catalyst base CH2O production, 0% water, to residual material landfill

Dataset: EcoSpold 1, unit process
Functional unit: 1 kg
Category: landfill / residual material landfill
Geography: CH
Time period: 2000-01 to 2000-12
Generated by: Gabor Doka
accessRestrictedTo: 0
copyright: true

## General comment
Inventoried waste contains 100% Formox catalyst carrier; . waste composition (wet, in ppm): H2O n.a.; O 506660; H n.a.; C n.a.; S n.a.; N n.a.; P n.a.; B n.a.; Cl n.a.; Br n.a.; F n.a.; I n.a.; Ag n.a.; As n.a.; Ba n.a.; Cd n.a.; Co n.a.; Cr n.a.; Cu n.a.; Hg n.a.; Mn n.a.; Mo 5; Ni n.a.; Pb n.a.; Sb n.a.; Se n.a.; Sn n.a.; V 5; Zn n.a.; Be n.a.; Sc n.a.; Sr n.a.; Ti n.a.; Tl n.a.; W n.a.; Si 443330; Fe 50000; Ca n.a.; Al n.a.; K n.a.; Mg n.a.; Na n.a.; Share of carbon in waste that is biogenic 60.4%. ;;

## Included processes
Waste-specific short-term emissions to water from leachate. Long-term emissions from landfill to ground water.

## Geography
Technology encountered in Switzerland in 2000. Landfill includes base seal and leachate collection system.

## Technology
Swiss residual material landfill for polluted, inorganic waste. With base seal and leachate collection system. Recultivation after closure.

## Time period
Waste composition as given in literature reference, theoretical data or other source. Transfer coefficients from prospective model.

## Reference product
- Disposal, catalyst base CH2O production, 0% water, to residual material landfill [CH]: 1 kg
  SWITZERLAND

## Inputs from technosphere
- Process-specific burdens, residual material landfill [CH]: 1 kg; lognormal SD95 1
  demands per kilogram waste. uncertainty is heeded in the module
- Residual material landfill facility [CH]: 2.0833e-9 p; lognormal SD95 1
  demands per kilogram waste. uncertainty is heeded in the module

## Emissions to nature
- Molybdenum [emissions to water, groundwater, long-term]: 2.2955e-8 kg; lognormal SD95 10.505
  uncertainty is calculated from uncertainties in waste composition and transfer coefficients in incinerator and landfills.
- Vanadium [emissions to water, groundwater, long-term]: 3.8431e-6 kg; lognormal SD95 10.449
  (same comment as for Molybdenum)
- Iron [emissions to water, groundwater, long-term]: 0.0002506 kg; lognormal SD95 214.07
  (same comment as for Molybdenum)
- Vanadium [emissions to water, river]: 1.2271e-8 kg; lognormal SD95 15.714
  uncertainty is calculated from uncertainties in waste composition and transfer coefficients in residual landfill
- Iron [emissions to water, river]: 4.1836e-7 kg; lognormal SD95 11.309
  (same comment as for Vanadium)
- Molybdenum [emissions to water, river]: 4.977e-6 kg; lognormal SD95 10.296
  (same comment as for Vanadium)
- Silicon [emissions to water, groundwater, long-term]: 0.44233 kg; lognormal SD95 1.3161
  (same comment as for Molybdenum)
- Silicon [emissions to water, river]: 0.00099702 kg; lognormal SD95 4.512
  (same comment as for Vanadium)

## Sampling procedure
Landfill model based on observed leachate concentrations in literature. Extrapolated to 60'000 years heeding chemical characteristics. Initial waste composition from various literature sources.

## Uncertainty adjustments
uncertainty of waste input composition data derived from generic formula GSD(c) = N*ln(c)+1. Mean long-term emissions are the emissions until the next glacial period occurs (in 60'000a) and the landfill is eroded. Maximal long-term emissions are the complete emissions of all landfilled material (except Cr). Minimal long-term emissions are derived implicitly from the mean and maximal values assuming a lognormal distribution.

## Sources
- Doka G., 2009, 2009 - LCI waste treatment services - Doka, Final report ecoinvent data v2.1, 13, Swiss Centre for LCI, Doka LCA, Duebendorf and St. Gallen, CH
Doka G. (2009) Life Cycle Inventories of Waste Treatment Services. Final report ecoinvent data v2.1. Volume: 13. Swiss Centre for LCI, Empa - TSL. Dübendorf, CH.
Type: Measurement on site
Source: CD-ROM
First author: Doka G.
Year: 2009
Title of anthology: Final report ecoinvent data v2.1
Place of publication: Dübendorf, CH
Publisher: Swiss Centre for LCI, Empa - TSL
Volume No: 13

## Validation
Proof reading validation: passed.; Other validation: none;
