# Sodium sulphate from sulfuric acid digestion of spodumene

Dataset: EcoSpold 1, unit process
Functional unit: 1 kg
Category: chemicals / inorganic
Geography: GLO
Time period: 2000-01 to 2007-12
Share of production covered: 100 %
Generated by: Juergen Sutter
accessRestrictedTo: 0
copyright: true

## General comment
The multioutput-process "Sulfuric acid digestion of spodumene" delivers the co-products lithium carbonate and sodium sulfate. The allocation is based on stoechiometric calculation. Energy consumptions and emissions are estimated. Infrastructure and transports are calculated with standard values.;

## Included processes
Sulfuric acid digestion of spodumene including materials, energy uses, infrastructure and emissions.

## Technology
Sulfuric acid digestion of spodumene

## Time period
Time of publications.

## Reference product
- Sodium sulphate from sulfuric acid digestion of spodumene [GLO]: 1 kg
  Global

## Inputs from technosphere
- Spodumene, at plant [RER]: 1.91358 kg; lognormal SD95 1.3765
  (4,5,1,1,1,5); Stoechiometric calculation
- Transport, freight, rail [RER]: 1.74463 tkm; lognormal SD95 2.095
  (4,5,na,na,na,na); Standard distance 600km
- Heat, natural gas, at industrial furnace 1MW [CH]: 1.65999 MJ; lognormal SD95 1.1267
  (1,2,3,1,1,3); Kim 2003
- Electricity, medium voltage, production ENTSO-E, at grid: 0.28055 kWh; lognormal SD95 1.1267
  (1,2,3,1,1,3); Kim 2003
- Soda, powder, at plant [RER]: 0.51657 kg; lognormal SD95 1.3765
  (4,5,1,1,1,5); Stoechiometric calculation
- Disposal, inert waste, 5% water, to construction waste landfill [CH]: 1.55247 kg; lognormal SD95 1.3001
  (4,5,na,na,na,na); Estimation
- Transport, freight, lorry, fleet average [RER]: 0.29077 tkm; lognormal SD95 2.095
  (4,5,na,na,na,na); Standard distance 100km
- Sulphuric acid, liquid, at plant [RER]: 0.47759 kg; lognormal SD95 1.3765
  (4,5,1,1,1,5); Stoechiometric calculation
- Chemical plant, organics [RER]: 4e-10 p; lognormal SD95 3.0909
  (4,5,na,na,na,na); Estimation

## Inputs from nature
- Water, cooling, unspecified natural origin/m3 [resources, in water]: 0.024 m3; lognormal SD95 1.3001
  (4,5,na,na,na,na); Estimation

## Emissions to nature
- Sodium [emissions to water, river]: 0.011209 kg; lognormal SD95 5.1037
  (4,5,na,na,na,na); Estimation
- Sulfate [emissions to air, high. pop.]: 4.6783e-5 kg; lognormal SD95 1.3001
  (4,5,na,na,na,na); Estimation
- Sulfate [emissions to water, river]: 0.023346 kg; lognormal SD95 1.3001
  (4,5,na,na,na,na); Estimation
- Heat, waste [emissions to air, high. pop.]: 1.01001 MJ; lognormal SD95 1.1267
  (1,2,3,1,1,3); Calculated from the electricity input
- Carbonate [emissions to water, river]: 0.01462 kg; lognormal SD95 3.0909
  (4,5,na,na,na,na); Estimation
- Water [emissions to water, unspecified]: 22.8 kg; lognormal SD95 2.5196
  (5,5,5,5,5,BU:1.05); All uncertainty-values set to 5.0 by default. Balance of input water

## Sampling procedure
Literature data

## Sources
- Sutter J., 2007, 2007 - LCI highly pure chemicals - Sutter, Final report ecoinvent Data v2.0, 19, Swiss Centre for LCI, ETH, Duebendorf and Uster, CH
Sutter, J., 0 (2007) Life Cycle Inventories of Highly Pure Chemicals. Final report ecoinvent Data v2.0. Editors: 0. Volume: 19. Swiss Centre for LCI, ETHZ. Duebendorf and St. Gallen, CH.
Type: Measurement on site
Source: CD-ROM
First author: Sutter, J.
Other authors: 0
Year: 2007
Name of editors: 0
Title of anthology: Final report ecoinvent Data v2.0
Place of publication: Duebendorf and St. Gallen, CH
Publisher: Swiss Centre for LCI, ETHZ
Volume No: 19

## Validation
Proof reading validation: passed.; Other validation: none;
