# Disposal, newspaper, 14.7% water, to municipal incineration

Dataset: EcoSpold 1, unit process
Functional unit: 1 kg
Category: waste management / municipal incineration
Geography: CH
Time period: 2000-01 to 2000-12
Generated by: Gabor Doka
accessRestrictedTo: 0
copyright: true

## General comment
This dataset represents the activity of waste disposal of waste newspaper in a municipal solid waste incinerator (MSWI) Recommended use of this dataset: For newspaper, which goes to disposal as part of communal waste mixture. Larger amounts of separated newspaper will likely not be disposed in incinerators or landfills, but rather go to recycling. Waste composition (wet, in ppm): upper heating value 15.19 MJ/kg; lower heating value 14.11 MJ/kg; H2O 109440; O 386620; H 53858; C 408310; S 1631.1; N 678.41; P 12.167; B n.a.; Cl 1343.3; Br n.a.; F n.a.; I n.a.; Ag 0.47733; As n.a.; Ba 13.571; Cd 0.13891; Co 0.91253; Cr 10.31; Cu 29.989; Hg 0.081846; Mn 46.797; Mo n.a.; Ni 2.319; Pb 90.284; Sb n.a.; Se n.a.; Sn n.a.; V n.a.; Zn 55.563; Be n.a.; Sc n.a.; Sr n.a.; Ti n.a.; Tl n.a.; W n.a.; Si 20871; Fe 139.03; Ca n.a.; Al 12167; K 4679.7; Mg n.a.; Na n.a.; Share of carbon in waste that is biogenic 100%. Share of metals in waste not oxidised and bulk-recyclable (exclude very small or thin parts) Iron: 0%; Alu: 0%; Copper: 0%. One kg of this waste produces 0.08324 kg of slag and 0.0157 kg of residues, which are landfilled. Additional solidification with 0.006278 kg of cement. Net energy production: 1.74MJ/kg electric energy and 3.5MJ/kg thermal energy. Recovery of metal scrap to recycling: 0g iron scrap, 0g aluminium scrap, 0g copper scrap.;;

## Included processes
Waste incineration from waste reception gate further downstream (excluding transport to the MSWI plant). Waste-specific air and water emisions from incineration, auxiliary material consumption for flue gas cleaning. Short-term emissions to river water and long-term emisisons to ground water from slag compartment (from bottom ash) and residual material landfill (from solidified fly ashes and scrubber slugde). Waste-specific process energy demands for MSWI and net energy generation.

## Geography
Specific to the technology mix encountered in Switzerland in 2010. Well applicable to modern incineration practices in Europe, North America or Japan.

## Technology
average Swiss MSWI plants in 2010 (grate incinerators) with electrostatic precipitator for fly ash (ESP), wet flue gas scrubber and 25% SNCR , 42.77% SCR-high dust , 32.68% SCR-low dust -DeNOx facilities and 0% without Denox (weighted according to mass of burnt waste, representing Swiss average). Efficiency of iron scrap separation from slag : 58%. Efficiency of non-ferrous scrap separation from slag : 31%. Gross electric efficiency technology mix 15.84% and Gross thermal efficiency technology mix 28.51%

## Time period
Waste composition as given in literature reference, theoretical data or other source. Transfer coefficients for modern MSWI.

## Reference product
- Disposal, newspaper, 14.7% water, to municipal incineration [CH]: 1 kg
  SWITZERLAND

## Inputs from technosphere
- Slag compartment [CH]: 1.4653e-10 p; lognormal SD95 1.4529
  landfill infrastructure required for landfilling of bottom ash. uncertainty is calculated from uncertainties in waste composition and transfer coefficients in incinerator
- Chemicals inorganic, at plant [GLO]: 7.0453e-5 kg; lognormal SD95 2.4628
  auxilliary inputs for the wastewater treatment stage of the incinerator plant. Proxy for Polyelectrolyte. uncertainty calculated from uncertainty in average Polyelectrolyte input, of transfer coefficients in the incinerator, and the uncertainty of the waste composition of this waste
- Quicklime, milled, packed, at plant [CH]: 0.00071615 kg; lognormal SD95 4.8151
  auxilliary inputs for the flue gas treatment stage of the incinerator plant. uncertainty calculated from uncertainty in average CaO input, of transfer coefficients in the incinerator, and the uncertainty of the waste composition of this waste
- Water, decarbonised, at plant [RER]: 0.44922 kg; lognormal SD95 3.3889
  Incinerator process water used in flue gas scrubber stage. uncertainty calculated from uncertainty in average water input, and the uncertainty of the waste composition of this waste
- Process-specific burdens, residual material landfill [CH]: 0.015695 kg; lognormal SD95 1.4077
  mass-specific expenditures required for landfilling of incineration residues. uncertainty is calculated from uncertainties in waste composition and transfer coefficients in incinerator
- Transport, freight, lorry, 16t-32t gross weight, fleet average [CH]: 0.0081385 tkm; lognormal SD95 1.2162
  Transport services to transport incineration residues to landfills and to transport auxilliary inputs of the incinerator plant. uncertainty calculated from uncertainty in average auxiliary material input, the uncertainty of the waste composition of this waste and the uncertainty in generic transportation distances
- Disposal, cement, hydrated, 0% water, to residual material landfill [CH]: 0.015695 kg; lognormal SD95 1.4792
  Hydrated cement output for solidification of landfilled residual material. Uncertainty calculated from uncertainty of the waste composition of this waste and transfer coefficients in the incinerator and of the solidification recipe.
- Sodium hydroxide, 50% in H2O, production mix, at plant [RER]: 0.00070063 kg; lognormal SD95 2.7752
  auxilliary inputs for the flue gas treatment stage of the incinerator plant. uncertainty calculated from uncertainty in average NaOH input, of transfer coefficients in the incinerator, and the uncertainty of the waste composition of this waste
- Transport, freight, rail [RER]: 0.0041859 tkm; lognormal SD95 1.2435
  (same comment as for Transport, freight, lorry, 16t-32t gross weight, fleet average)
- Chemicals organic, at plant [GLO]: 1.3913e-6 kg; lognormal SD95 15.511
  auxilliary inputs for the wastewater treatment stage of the incinerator plant. Proxy for (pure) Trisodium-trimercapto-s-triazine (CAS 17766-26-6), used as 15% diluted solution, aka TMT15. uncertainty calculated from uncertainty in average TMT15 input, of transfer coefficients in the incinerator, and the uncertainty of the waste composition of this waste
- Cement, unspecified, at plant [CH]: 0.0062782 kg; lognormal SD95 1.4792
  Cement required for solidification of landfilled residual material. Uncertainty calculated from uncertainty of the waste composition of this waste, of transfer coefficients in the incinerator and of the solidification recipe.
- Process-specific burdens, slag compartment [CH]: 0.082423 kg; lognormal SD95 1.4529
  mass-specific expenditures required for landfilling of bottom ash. uncertainty is calculated from uncertainties in waste composition and transfer coefficients in incinerator
- Ammonia, liquid, at regional storehouse [CH]: 0.00045437 kg; lognormal SD95 2.9371
  Input to DeNOx stage (100% NH3). uncertainty calculated from uncertainty in average DeNOx input, uncertainty in the share of thermal NOx, uncertainty of nitrogen content in average municipal waste and the uncertainty in nitrogen content in *this* waste.
- Iron (III) chloride, 40% in H2O, at plant [CH]: 4.7359e-6 kg; lognormal SD95 3.3889
  auxilliary inputs for the wastewater treatment stage of the incinerator plant. uncertainty calculated from uncertainty in average FeCl3 input, of transfer coefficients in the incinerator, and the uncertainty of the waste composition of this waste
- Residual material landfill facility [CH]: 3.2699e-11 p; lognormal SD95 1.4077
  landfill infrastructure required for landfilling of incineration residues. uncertainty is calculated from uncertainties in waste composition and transfer coefficients in incinerator
- Titanium dioxide, production mix, at plant [RER]: 2.8467e-5 kg; lognormal SD95 4.6706
  Input to DeNOx stage (TiO2 catalyst carrier) uncertainty calculated from uncertainty in average DeNOx input, uncertainty in the share of thermal NOx, uncertainty of nitrogen content in average municipal waste and the uncertainty in nitrogen content in *this* waste.
- Municipal waste incineration plant [CH]: 2.5e-10 p; lognormal SD95 1
  demands per kilogram waste. uncertainty is heeded in the module
- Chromium oxide, flakes, at plant [RER]: 5.8096e-7 kg; lognormal SD95 4.6706
  Input to DeNOx stage. uncertainty calculated from uncertainty in average DeNOx input, uncertainty in the share of thermal NOx, uncertainty of nitrogen content in average municipal waste and the uncertainty in nitrogen content in *this* waste.
- Hydrochloric acid, 30% in H2O, at plant [RER]: 1.8518e-5 kg; lognormal SD95 2.4628
  auxilliary inputs for the wastewater treatment stage of the incinerator plant. uncertainty calculated from uncertainty in average HCl input, of transfer coefficients in the incinerator, and the uncertainty of the waste composition of this waste
- Natural gas, burned in industrial furnace 1MW [CH]: 0.084966 MJ; lognormal SD95 2.9371
  Input to DeNOx stage, to heat up flue gas in low-dust SCR. uncertainty calculated from uncertainty in average DeNOx input, uncertainty in the share of thermal NOx, uncertainty of nitrogen content in average municipal waste and the uncertainty in nitrogen content in *this* waste.

## Emissions to nature
- Sulfate [emissions to water, river]: 0.00082746 kg; lognormal SD95 2.8587
  Emissions to water from waste composition and transfer coefficients in incinerator and landfills. uncertainty is calculated from uncertainties in waste composition and transfer coefficients in incinerator and landfills
- Dioxin, 2,3,7,8 Tetrachlorodibenzo-p- [emissions to air, high. pop.]: 6.579e-14 kg; lognormal SD95 3.6795
  Incomplete combustion product emitted to air. uncertainty calculated from uncertainty in average operation emissions, and the uncertainty of the flue gas volume from this waste.
- Nickel [emissions to water, groundwater, long-term]: 2.226e-6 kg; lognormal SD95 10.916
  Long-term emissions from landfilling of incineration residues. uncertainty is calculated from uncertainties in waste composition and transfer coefficients in incinerator and landfills.
- Potassium [emissions to air, high. pop.]: 2.312e-5 kg; lognormal SD95 3.9601
  Emission to air from waste composition and transfer coefficients. uncertainty is calculated from uncertainties in waste composition and transfer coefficients in incinerator
- Zinc [emissions to water, river]: 5.013e-9 kg; lognormal SD95 6.3376
  (same comment as for Sulfate)
- Nickel [emissions to air, high. pop.]: 2.9132e-9 kg; lognormal SD95 11.357
  (same comment as for Potassium)
- Sulfate [emissions to water, groundwater, long-term]: 0.0040398 kg; lognormal SD95 3.1811
  (same comment as for Nickel)
- Silicon [emissions to water, river]: 5.1172e-6 kg; lognormal SD95 4.6148
  (same comment as for Sulfate)
- Nitrate [emissions to water, groundwater, long-term]: 2.44e-5 kg; lognormal SD95 5.4163
  (same comment as for Nickel)
- Nitrate [emissions to water, river]: 8.648e-6 kg; lognormal SD95 4.0871
  (same comment as for Sulfate)
- Chromium [emissions to air, high. pop.]: 9.003e-9 kg; lognormal SD95 9.6721
  (same comment as for Potassium)
- Cadmium [emissions to water, river]: 1.3314e-11 kg; lognormal SD95 11.712
  (same comment as for Sulfate)
- Manganese [emissions to water, groundwater, long-term]: 2.887e-5 kg; lognormal SD95 17.437
  (same comment as for Nickel)
- Chloride [emissions to water, groundwater, long-term]: 0.00031128 kg; lognormal SD95 4.8061
  (same comment as for Nickel)
- Benzene [emissions to air, high. pop.]: 3.2897e-8 kg; lognormal SD95 1.8398
  (same comment as for Dioxin, 2,3,7,8 Tetrachlorodibenzo-p-)
- Aluminium [emissions to water, groundwater, long-term]: 0.0087987 kg; lognormal SD95 3.0449
  (same comment as for Nickel)
- Heat, waste [emissions to air, high. pop.]: 11.19 MJ; lognormal SD95 1.5761
  Waste heat generated from heating value of this waste plus any electricity required to process it. uncertainty is calculated from uncertainties in waste composition and uncertainties in energy efficiency and the uncertainty in internal energy demand
- Potassium [emissions to water, groundwater, long-term]: 0.0036379 kg; lognormal SD95 2.588
  (same comment as for Nickel)
- Chloride [emissions to water, river]: 0.0010313 kg; lognormal SD95 4.14
  (same comment as for Sulfate)
- Silicon [emissions to air, high. pop.]: 3.2507e-8 kg; lognormal SD95 3.24
  (same comment as for Potassium)
- Lead [emissions to air, high. pop.]: 7.438e-9 kg; lognormal SD95 7.4529
  (same comment as for Potassium)
- Benzo(a)pyrene [emissions to air, high. pop.]: 7.3206e-13 kg; lognormal SD95 3.6795
  (same comment as for Dioxin, 2,3,7,8 Tetrachlorodibenzo-p-)
- Chromium VI [emissions to water, groundwater, long-term]: 9.4578e-7 kg; lognormal SD95 13.804
  (same comment as for Nickel)
- Toluene [emissions to air, high. pop.]: 6.5794e-8 kg; lognormal SD95 1.8398
  (same comment as for Dioxin, 2,3,7,8 Tetrachlorodibenzo-p-)
- Phosphate [emissions to water, groundwater, long-term]: 1.6303e-6 kg; lognormal SD95 103.5
  (same comment as for Nickel)
- Zinc [emissions to air, high. pop.]: 3.7242e-8 kg; lognormal SD95 7.84
  (same comment as for Potassium)
- Silver [emissions to water, river]: 1.7714e-9 kg; lognormal SD95 13.01
  (same comment as for Sulfate)
- Mercury [emissions to water, river]: 8.8887e-11 kg; lognormal SD95 10.656
  (same comment as for Sulfate)
- Phosphate [emissions to water, river]: 6.8404e-9 kg; lognormal SD95 6.5386
  (same comment as for Sulfate)
- Mercury [emissions to air, high. pop.]: 2.3206e-9 kg; lognormal SD95 16.08
  (same comment as for Potassium)
- Benzene, pentachloro- [emissions to air, high. pop.]: 1.7381e-10 kg; lognormal SD95 1.8398
  (same comment as for Dioxin, 2,3,7,8 Tetrachlorodibenzo-p-)
- Phosphorus [emissions to air, high. pop.]: 1.2365e-8 kg; lognormal SD95 9.4864
  (same comment as for Potassium)
- Aluminium [emissions to water, river]: 1.3167e-6 kg; lognormal SD95 5.7675
  (same comment as for Sulfate)
- Hydrogen chloride [emissions to air, high. pop.]: 7.6656e-7 kg; lognormal SD95 4.9687
  (same comment as for Potassium)
- Lead [emissions to water, groundwater, long-term]: 4.3651e-5 kg; lognormal SD95 57.924
  (same comment as for Nickel)
- Copper [emissions to water, river]: 3.886e-9 kg; lognormal SD95 7.4116
  (same comment as for Sulfate)
- Barium [emissions to water, groundwater, long-term]: 6.8346e-6 kg; lognormal SD95 23.433
  (same comment as for Nickel)
- Manganese [emissions to air, high. pop.]: 8.9371e-9 kg; lognormal SD95 8.0656
  (same comment as for Potassium)
- Chromium VI [emissions to water, river]: 2.8815e-7 kg; lognormal SD95 10.085
  (same comment as for Sulfate)
- Mercury [emissions to water, groundwater, long-term]: 5.2128e-9 kg; lognormal SD95 40.517
  (same comment as for Nickel)
- Sulfur dioxide [emissions to air, high. pop.]: 1.7346e-5 kg; lognormal SD95 4.7442
  (same comment as for Potassium)
- TOC, Total Organic Carbon [emissions to water, groundwater, long-term]: 0.0012133 kg; lognormal SD95 1.3644
  (same comment as for Nickel)
- Nickel [emissions to water, river]: 1.5582e-9 kg; lognormal SD95 16.96
  (same comment as for Sulfate)
- Iron [emissions to water, river]: 3.655e-9 kg; lognormal SD95 8.387
  (same comment as for Sulfate)
- Barium [emissions to water, river]: 1.8266e-9 kg; lognormal SD95 11.445
  (same comment as for Sulfate)
- Particulates, > 2.5 um, and < 10um [emissions to air, high. pop.]: 1.9737e-8 kg; lognormal SD95 2.453
  (same comment as for Dioxin, 2,3,7,8 Tetrachlorodibenzo-p-)
- Heat, waste [emissions to water, river]: 2.7599 MJ; lognormal SD95 1.5761
  (same comment as for Heat, waste)
- Cobalt [emissions to water, groundwater, long-term]: 7.4335e-7 kg; lognormal SD95 11.53
  (same comment as for Nickel)
- Silicon [emissions to water, groundwater, long-term]: 0.002108 kg; lognormal SD95 84.818
  (same comment as for Nickel)
- Particulates, < 2.5 um [emissions to air, high. pop.]: 3.9276e-6 kg; lognormal SD95 3.6795
  (same comment as for Dioxin, 2,3,7,8 Tetrachlorodibenzo-p-)
- Chromium [emissions to water, river]: 8.0056e-10 kg; lognormal SD95 9.777
  (same comment as for Sulfate)
- TOC, Total Organic Carbon [emissions to water, river]: 0.00020858 kg; lognormal SD95 1.5262
  (same comment as for Sulfate)
- Cadmium [emissions to air, high. pop.]: 7.0803e-11 kg; lognormal SD95 15.132
  (same comment as for Potassium)
- Iron [emissions to air, high. pop.]: 2.4917e-10 kg; lognormal SD95 7.29
  (same comment as for Potassium)
- Cadmium [emissions to water, groundwater, long-term]: 1.0136e-8 kg; lognormal SD95 220.18
  (same comment as for Nickel)
- Nitrogen oxides [emissions to air, high. pop.]: 0.00016917 kg; lognormal SD95 3.1706
  sum of fuel-Nox and thermal-NOx emitted to air after DeNOx stage. uncertainty calculated from uncertainty in average N-emissions and uncertainty in the share of thermal NOx and the uncertainty in nitrogen content in *this* waste.
- Copper [emissions to water, groundwater, long-term]: 2.6787e-5 kg; lognormal SD95 8.1683
  (same comment as for Nickel)
- Cobalt [emissions to water, river]: 1.6533e-10 kg; lognormal SD95 15.256
  (same comment as for Sulfate)
- Cobalt [emissions to air, high. pop.]: 1.6596e-9 kg; lognormal SD95 12.532
  (same comment as for Potassium)
- Cyanide [emissions to air, high. pop.]: 2.1738e-6 kg; lognormal SD95 11.417
  Nitrogen species emitted to air after DeNOx stage. uncertainty calculated from uncertainty in average N-emissions and uncertainty in the share of thermal NOx and the uncertainty in nitrogen content in *this* waste.
- Carbon dioxide, biogenic [emissions to air, high. pop.]: 1.488 kg; lognormal SD95 1.3505
  (same comment as for Potassium)
- BOD5, Biological Oxygen Demand [emissions to water, river]: 0.00047149 kg; lognormal SD95 1.5338
  (same comment as for Sulfate)
- Dinitrogen monoxide [emissions to air, high. pop.]: 1.0118e-5 kg; lognormal SD95 11.417
  (same comment as for Cyanide)
- Barium [emissions to air, high. pop.]: 5.3267e-8 kg; lognormal SD95 9.3025
  (same comment as for Potassium)
- Manganese [emissions to water, river]: 7.2844e-9 kg; lognormal SD95 6.7639
  (same comment as for Sulfate)
- NMVOC, non-methane volatile organic compounds, unspecified origin [emissions to air, high. pop.]: 1.4971e-6 kg; lognormal SD95 1.8398
  (same comment as for Dioxin, 2,3,7,8 Tetrachlorodibenzo-p-)
- Zinc [emissions to water, groundwater, long-term]: 1.6897e-5 kg; lognormal SD95 34.946
  (same comment as for Nickel)
- Carbon monoxide, biogenic [emissions to air, high. pop.]: 5.5921e-5 kg; lognormal SD95 6.1325
  (same comment as for Dioxin, 2,3,7,8 Tetrachlorodibenzo-p-)
- DOC, Dissolved Organic Carbon [emissions to water, groundwater, long-term]: 0.0012133 kg; lognormal SD95 1.3644
  (same comment as for Nickel)
- Phenol, pentachloro- [emissions to air, high. pop.]: 1.4326e-11 kg; lognormal SD95 1.8398
  (same comment as for Dioxin, 2,3,7,8 Tetrachlorodibenzo-p-)
- Potassium [emissions to water, river]: 0.0010187 kg; lognormal SD95 2.8343
  (same comment as for Sulfate)
- BOD5, Biological Oxygen Demand [emissions to water, groundwater, long-term]: 0.001003 kg; lognormal SD95 1.3644
  (same comment as for Nickel)
- COD, Chemical Oxygen Demand [emissions to water, river]: 0.00047763 kg; lognormal SD95 1.5251
  (same comment as for Sulfate)
- Lead [emissions to water, river]: 8.6362e-9 kg; lognormal SD95 6.1042
  (same comment as for Sulfate)
- Iron [emissions to water, groundwater, long-term]: 7.014e-5 kg; lognormal SD95 8.068
  (same comment as for Nickel)
- Aluminium [emissions to air, high. pop.]: 9.92e-9 kg; lognormal SD95 3.6481
  (same comment as for Potassium)
- Copper [emissions to air, high. pop.]: 2.7467e-9 kg; lognormal SD95 8.5849
  (same comment as for Potassium)
- Silver [emissions to water, groundwater, long-term]: 3.1043e-7 kg; lognormal SD95 12.808
  (same comment as for Nickel)
- DOC, Dissolved Organic Carbon [emissions to water, river]: 0.00020858 kg; lognormal SD95 1.5262
  (same comment as for Sulfate)
- Methane, biogenic [emissions to air, high. pop.]: 4.9346e-7 kg; lognormal SD95 1.8398
  (same comment as for Dioxin, 2,3,7,8 Tetrachlorodibenzo-p-)
- Ammonia [emissions to air, high. pop.]: 5.3422e-7 kg; lognormal SD95 3.1706
  (same comment as for Cyanide)
- Benzene, hexachloro- [emissions to air, high. pop.]: 6.8786e-11 kg; lognormal SD95 1.8398
  (same comment as for Dioxin, 2,3,7,8 Tetrachlorodibenzo-p-)
- COD, Chemical Oxygen Demand [emissions to water, groundwater, long-term]: 0.0030662 kg; lognormal SD95 1.3644
  (same comment as for Nickel)

## Sampling procedure
fully waste-specific calculation based on literature data for average MSWI operation performance

## Extrapolations
Typical elemental transfer coefficients from current studies for modern MSWI, completed with data from coal power plants and estimates, adapted for inert/burnable waste.

## Uncertainty adjustments
uncertainty of waste input composition data derived from generic formula GSD(c) = N*ln(c)+1

## Sources
- Doka G., 2013, 2013 - Updates LCI waste treatment services - Doka, -, Doka LCA, Zuerich, CH
Doka G. (2013) Updates to Life Cycle Inventories of Waste Treatment Services - part II: waste incineration. Doka LCA. Zurich.
Type: Separate publication
Source: Report to document the 2013 changes to the MSWI incinerator model and datasets (URL: http://www.doka.ch/ecoinventMSWIupdateLCI2013.pdf). To be read with the ecoinvent Nr 13 report (Doka 2009, Life Cycle Inventories of Waste Treatment Services) for ecoinvent v2.2.
First author: Doka G.
Year: 2013
Place of publication: Zurich
Publisher: Doka LCA
Original title: Updates to Life Cycle Inventories of Waste Treatment Services - part II: waste incineration

## Validation
Proof reading validation: Passed.; Other validation: none;
