# Stirling cogen unit 3kWe, wood pellets, future

Dataset: EcoSpold 1, unit process, infrastructure
Functional unit: 1 p
Category: heat / biomass\cogeneration\infrastructure
Geography: CH
Time period: 2000-01 to 2005-12
Generated by: Alex Primas
accessRestrictedTo: 0
copyright: true

## General comment
The module reflects a Stirling cogeneration unit with 3 kW electrical output. Operation of the unit with wood pellets. Inventory based on information of a pilot unit from literature and from one manufacturer. Life time operation is 80'000 h or 15 years.;

## Included processes
The module includes the most important materials used for production, the energy needed for production, planning and engineering. Also included is the transport of the raw materials the installation on the site.

## Technology
Stirling motor for combustion of wood pellets. Power range: 1-3 kW electrical output, 4.5-10.5 kW heat output. Includes pellet storage volume for one day of operation. Electrical efficiency 23%, total efficiency 90%. Performance and lifetime according to expected future values for a serial product.

## Reference product
- Stirling cogen unit 3kWe, wood pellets, future [CH]: 1 p
  SWITZERLAND

## Inputs from technosphere
- Polyethylene, HDPE, granulate, at plant [RER]: 12.6 kg; lognormal SD95 1.2451
  (2,4,2,2,1,5); data from pilot plant design
- Tin, at regional storage [RER]: 0.26 kg; lognormal SD95 1.2451
  (2,4,2,2,1,5); data from pilot plant design
- Electricity, low voltage, at grid [CH]: 40 kWh; lognormal SD95 1.2872
  (3,4,2,1,3,4); estimation based on specific energy demand of engineering hours
- Heating, sanitary equipment Mini CHP plant [CH]: 0.75 p; lognormal SD95 3.1626
  (4,4,2,5,3,5); approximation based on similar process
- Building, multi-storey [RER]: 0.073 m3; lognormal SD95 3.117
  (4,4,2,5,1,5); rough estimation based on company data
- Sheet rolling, aluminium [RER]: 2.4 kg; lognormal SD95 1.2451
  (2,4,2,2,1,5); based on material input
- Zinc, primary, at regional storage [RER]: 0.04 kg; lognormal SD95 1.2451
  (2,4,2,2,1,5); data from pilot plant design
- Chromium steel 18/8, at plant [RER]: 31 kg; lognormal SD95 1.2637
  (3,4,2,2,1,5); data from pilot plant design, assumption
- Rock wool, packed, at plant [CH]: 12 kg; lognormal SD95 1.2451
  (2,4,2,2,1,5); data from pilot plant design
- Light fuel oil, burned in boiler 100kW, non-modulating [CH]: 300 MJ; lognormal SD95 1.2872
  (3,4,2,1,3,4); estimation based on specific energy demand of engineering hours
- Reinforcing steel, at plant [RER]: 136 kg; lognormal SD95 1.2451
  (2,4,2,2,1,5); data from pilot plant design
- Sheet rolling, steel [RER]: 136 kg; lognormal SD95 1.2451
  (2,4,2,2,1,5); data from pilot plant design
- Transport, freight, lorry, fleet average [RER]: 105 tkm; lognormal SD95 2.095
  (4,5,nA,nA,nA,nA); standard distances used
- Copper, at regional storage [RER]: 4.5 kg; lognormal SD95 1.2451
  (2,4,2,2,1,5); data from pilot plant design
- Transport, passenger car, fleet average [CH]: 250 km; lognormal SD95 2.1559
  (4,4,2,1,3,5); estimation
- Sheet rolling, chromium steel [RER]: 31 kg; lognormal SD95 1.2451
  (2,4,2,2,1,5); based on material input
- Aluminium, production mix, wrought alloy, at plant [RER]: 2.4 kg; lognormal SD95 1.2451
  (2,4,2,2,1,5); data from pilot plant design
- Polyvinylchloride, at regional storage [RER]: 1.2 kg; lognormal SD95 1.2451
  (2,4,2,2,1,5); data from pilot plant design
- Disposal, building, polyvinylchloride products, to final disposal [CH]: 1.2 kg; lognormal SD95 1.3488
  (2,4,3,2,3,5); approximation for disposal of plastic parts
- Wire drawing, copper [RER]: 4.2 kg; lognormal SD95 1.2451
  (2,4,2,2,1,5); based on material input
- Disposal, inert waste, 5% water, to construction waste landfill [CH]: 0.525 kg; lognormal SD95 1.3221
  (4,4,1,1,1,5); based on material input of ceramic parts
- Disposal, building, polyethylene/polypropylene products, to final disposal [CH]: 12.6 kg; lognormal SD95 1.3488
  (2,4,3,2,3,5); approximation for disposal of plastic parts
- Nickel, 99.5%, at plant [GLO]: 0.06 kg; lognormal SD95 1.2451
  (2,4,2,2,1,5); data from pilot plant design
- Ceramic tiles, at regional storage [CH]: 0.5 kg; lognormal SD95 1.3221
  (4,4,1,1,1,5); estimation
- Lead, at regional storage [RER]: 0.12 kg; lognormal SD95 1.2451
  (2,4,2,2,1,5); data from pilot plant design
- Natural gas, burned in industrial furnace 1MWth [CH]: 1340 MJ; lognormal SD95 1.5841
  (2,4,1,2,4,5); approximation with company data of similar branch
- Cast iron, at plant [RER]: 148 kg; lognormal SD95 1.2451
  (2,4,2,2,1,5); data from pilot plant design
- Electricity, medium voltage, production ENTSO-E, at grid: 186 kWh; lognormal SD95 1.5841
  (2,4,1,2,4,5); approximation with company data of similar branch
- Transport, freight, rail [RER]: 70 tkm; lognormal SD95 2.095
  (4,5,nA,nA,nA,nA); standard distances used
- Treatment, sewage, from residence, to wastewater treatment, class 2 [CH]: 0.427 m3; lognormal SD95 1.6362
  (4,4,1,2,4,5); approximation for waste water treatment
- Building, hall, steel construction [CH]: 0.012 m2; lognormal SD95 3.117
  (4,4,2,5,1,5); rough estimation based on company data
- Disposal, building, mineral wool, to final disposal [CH]: 12 kg; lognormal SD95 1.3488
  (2,4,3,2,3,5); approximation for disposal of insulation material

## Inputs from nature
- Transformation, from unknown [resources, land]: 0.044 m2; lognormal SD95 2.1219
  (4,4,2,5,1,5); rough estimation based on company data
- Occupation, industrial area [resources, land]: 2.19 m2a; lognormal SD95 1.6486
  (4,4,2,5,1,5); rough estimation based on company data
- Transformation, to industrial area, built up [resources, land]: 0.044 m2; lognormal SD95 2.1219
  (4,4,2,5,1,5); rough estimation based on company data
- Water, unspecified natural origin/m3 [resources, in water]: 0.427 m3; lognormal SD95 1.5841
  (2,4,1,2,4,5); approximation with company data of similar branch

## Emissions to nature
- Heat, waste [emissions to air, high. pop.]: 813.6 MJ; lognormal SD95 1.5841
  (2,4,1,2,4,5); uncertainty electricity demand
- Water [emissions to water, unspecified]: 405.65 kg; lognormal SD95 2.5196
  (5,5,5,5,5,BU:1.05); All uncertainty-values set to 5.0 by default. Balance of input water

## Sampling procedure
Literature data and manufacturer information

## Sources
- Primas A., 2007, 2007 - LCI new CHP systems - Primas, Final report ecoinvent Data v2.0, 20, Swiss Centre for LCI, B&H AG, Duebendorf and Zuerich, CH
Primas A., 0 (2007) Life Cycle Inventories of new CHP systems. Final report ecoinvent Data v2.0. Editors: 0. Volume: 20. Swiss Centre for LCI, B&H AG. Duebendorf and Zurich, CH.
Type: Measurement on site
Source: CD-ROM
First author: Primas A.
Other authors: 0
Year: 2007
Name of editors: 0
Title of anthology: Final report ecoinvent Data v2.0
Place of publication: Duebendorf and Zurich, CH
Publisher: Swiss Centre for LCI, B&H AG
Volume No: 20

## Validation
Proof reading validation: passed; Other validation: none;
