# Disposal, polypropylene, 15.9% water, to municipal incineration

Dataset: EcoSpold 1, unit process
Functional unit: 1 kg
Category: waste management / municipal incineration
Geography: CH
Time period: 2000-01 to 2000-12
Generated by: Gabor Doka
accessRestrictedTo: 0
copyright: true

## General comment
This dataset represents the activity of waste disposal of waste polypropylene in a municipal solid waste incinerator (MSWI) Recommended use of this dataset: For PP, which goes to disposal as part of communal waste mixture. Waste composition (wet, in ppm): upper heating value 36.16 MJ/kg; lower heating value 32.78 MJ/kg; H2O 159000; O 32454; H 103430; C 694120; S 360.46; N 1095.3; P n.a.; B n.a.; Cl 1234.1; Br 8.0972; F 12.146; I n.a.; Ag n.a.; As 1.5385; Ba 202.43; Cd 28.663; Co 1.417; Cr 10.526; Cu 34.93; Hg 0.040486; Mn 25.371; Mo n.a.; Ni 0.80972; Pb 19.079; Sb 8.5021; Se 1.7004; Sn 3.2205; V 1862.4; Zn 288.78; Be 0.40486; Sc n.a.; Sr 71.661; Ti 809.72; Tl 0.32389; W n.a.; Si n.a.; Fe 1295.6; Ca 2186.3; Al 161.94; K n.a.; Mg 80.972; Na 1186.6; Share of carbon in waste that is biogenic 0%. Share of metals in waste not oxidised and bulk-recyclable (exclude very small or thin parts) Iron: 0%; Alu: 0%; Copper: 0%. One kg of this waste produces 0.02025 kg of slag and 0.008463 kg of residues, which are landfilled. Additional solidification with 0.003385 kg of cement. Net energy production: 4.2MJ/kg electric energy and 8.15MJ/kg thermal energy. Recovery of metal scrap to recycling: 0g iron scrap, 0g aluminium scrap, 0g copper scrap.; Formula: (CH2-CH2-CH2)n;;

## Included processes
Waste incineration from waste reception gate further downstream (excluding transport to the MSWI plant). Waste-specific air and water emisions from incineration, auxiliary material consumption for flue gas cleaning. Short-term emissions to river water and long-term emisisons to ground water from slag compartment (from bottom ash) and residual material landfill (from solidified fly ashes and scrubber slugde). Waste-specific process energy demands for MSWI and net energy generation.

## Geography
Specific to the technology mix encountered in Switzerland in 2010. Well applicable to modern incineration practices in Europe, North America or Japan.

## Technology
average Swiss MSWI plants in 2010 (grate incinerators) with electrostatic precipitator for fly ash (ESP), wet flue gas scrubber and 25% SNCR , 42.77% SCR-high dust , 32.68% SCR-low dust -DeNOx facilities and 0% without Denox (weighted according to mass of burnt waste, representing Swiss average). Efficiency of iron scrap separation from slag : 58%. Efficiency of non-ferrous scrap separation from slag : 31%. Gross electric efficiency technology mix 15.84% and Gross thermal efficiency technology mix 28.51%

## Time period
Waste composition as given in literature reference, theoretical data or other source. Transfer coefficients for modern MSWI.

## Reference product
- Disposal, polypropylene, 15.9% water, to municipal incineration [CH]: 1 kg
  SWITZERLAND

## Inputs from technosphere
- Water, decarbonised, at plant [RER]: 0.49526 kg; lognormal SD95 3.8034
  Incinerator process water used in flue gas scrubber stage. uncertainty calculated from uncertainty in average water input, and the uncertainty of the waste composition of this waste
- Natural gas, burned in industrial furnace 1MW [CH]: 0.18335 MJ; lognormal SD95 2.5346
  Input to DeNOx stage, to heat up flue gas in low-dust SCR. uncertainty calculated from uncertainty in average DeNOx input, uncertainty in the share of thermal NOx, uncertainty of nitrogen content in average municipal waste and the uncertainty in nitrogen content in *this* waste.
- Transport, freight, rail [RER]: 0.0058522 tkm; lognormal SD95 1.2185
  Transport services to transport incineration residues to landfills and to transport auxilliary inputs of the incinerator plant. uncertainty calculated from uncertainty in average auxiliary material input, the uncertainty of the waste composition of this waste and the uncertainty in generic transportation distances
- Municipal waste incineration plant [CH]: 2.5e-10 p; lognormal SD95 1
  demands per kilogram waste. uncertainty is heeded in the module
- Slag compartment [CH]: 3.3528e-11 p; lognormal SD95 1.683
  landfill infrastructure required for landfilling of bottom ash. uncertainty is calculated from uncertainties in waste composition and transfer coefficients in incinerator
- Process-specific burdens, residual material landfill [CH]: 0.0084627 kg; lognormal SD95 1.5768
  mass-specific expenditures required for landfilling of incineration residues. uncertainty is calculated from uncertainties in waste composition and transfer coefficients in incinerator
- Chemicals organic, at plant [GLO]: 8.2147e-6 kg; lognormal SD95 7.3652
  auxilliary inputs for the wastewater treatment stage of the incinerator plant. Proxy for (pure) Trisodium-trimercapto-s-triazine (CAS 17766-26-6), used as 15% diluted solution, aka TMT15. uncertainty calculated from uncertainty in average TMT15 input, of transfer coefficients in the incinerator, and the uncertainty of the waste composition of this waste
- Chemicals inorganic, at plant [GLO]: 7.7674e-5 kg; lognormal SD95 2.5179
  auxilliary inputs for the wastewater treatment stage of the incinerator plant. Proxy for Polyelectrolyte. uncertainty calculated from uncertainty in average Polyelectrolyte input, of transfer coefficients in the incinerator, and the uncertainty of the waste composition of this waste
- Sodium hydroxide, 50% in H2O, production mix, at plant [RER]: 0.00025102 kg; lognormal SD95 3.1034
  auxilliary inputs for the flue gas treatment stage of the incinerator plant. uncertainty calculated from uncertainty in average NaOH input, of transfer coefficients in the incinerator, and the uncertainty of the waste composition of this waste
- Hydrochloric acid, 30% in H2O, at plant [RER]: 2.0416e-5 kg; lognormal SD95 2.5179
  auxilliary inputs for the wastewater treatment stage of the incinerator plant. uncertainty calculated from uncertainty in average HCl input, of transfer coefficients in the incinerator, and the uncertainty of the waste composition of this waste
- Iron (III) chloride, 40% in H2O, at plant [CH]: 0.0002705 kg; lognormal SD95 3.8034
  auxilliary inputs for the wastewater treatment stage of the incinerator plant. uncertainty calculated from uncertainty in average FeCl3 input, of transfer coefficients in the incinerator, and the uncertainty of the waste composition of this waste
- Process-specific burdens, slag compartment [CH]: 0.018859 kg; lognormal SD95 1.683
  mass-specific expenditures required for landfilling of bottom ash. uncertainty is calculated from uncertainties in waste composition and transfer coefficients in incinerator
- Titanium dioxide, production mix, at plant [RER]: 6.1429e-5 kg; lognormal SD95 4.2121
  Input to DeNOx stage (TiO2 catalyst carrier) uncertainty calculated from uncertainty in average DeNOx input, uncertainty in the share of thermal NOx, uncertainty of nitrogen content in average municipal waste and the uncertainty in nitrogen content in *this* waste.
- Disposal, cement, hydrated, 0% water, to residual material landfill [CH]: 0.0084627 kg; lognormal SD95 1.6384
  Hydrated cement output for solidification of landfilled residual material. Uncertainty calculated from uncertainty of the waste composition of this waste and transfer coefficients in the incinerator and of the solidification recipe.
- Ammonia, liquid, at regional storehouse [CH]: 0.00098047 kg; lognormal SD95 2.5346
  Input to DeNOx stage (100% NH3). uncertainty calculated from uncertainty in average DeNOx input, uncertainty in the share of thermal NOx, uncertainty of nitrogen content in average municipal waste and the uncertainty in nitrogen content in *this* waste.
- Residual material landfill facility [CH]: 1.7631e-11 p; lognormal SD95 1.5768
  landfill infrastructure required for landfilling of incineration residues. uncertainty is calculated from uncertainties in waste composition and transfer coefficients in incinerator
- Quicklime, milled, packed, at plant [CH]: 0.00066148 kg; lognormal SD95 4.8477
  auxilliary inputs for the flue gas treatment stage of the incinerator plant. uncertainty calculated from uncertainty in average CaO input, of transfer coefficients in the incinerator, and the uncertainty of the waste composition of this waste
- Chromium oxide, flakes, at plant [RER]: 1.2537e-6 kg; lognormal SD95 4.2121
  Input to DeNOx stage. uncertainty calculated from uncertainty in average DeNOx input, uncertainty in the share of thermal NOx, uncertainty of nitrogen content in average municipal waste and the uncertainty in nitrogen content in *this* waste.
- Cement, unspecified, at plant [CH]: 0.0033851 kg; lognormal SD95 1.6384
  Cement required for solidification of landfilled residual material. Uncertainty calculated from uncertainty of the waste composition of this waste, of transfer coefficients in the incinerator and of the solidification recipe.
- Transport, freight, lorry, 16t-32t gross weight, fleet average [CH]: 0.0098634 tkm; lognormal SD95 1.2048
  (same comment as for Transport, freight, rail)

## Emissions to nature
- Antimony [emissions to water, groundwater, long-term]: 5.4067e-6 kg; lognormal SD95 9.3697
  Long-term emissions from landfilling of incineration residues. uncertainty is calculated from uncertainties in waste composition and transfer coefficients in incinerator and landfills.
- Nickel [emissions to water, groundwater, long-term]: 7.7724e-7 kg; lognormal SD95 12.198
  (same comment as for Antimony)
- Iron [emissions to water, river]: 3.4058e-8 kg; lognormal SD95 6.6058
  Emissions to water from waste composition and transfer coefficients in incinerator and landfills. uncertainty is calculated from uncertainties in waste composition and transfer coefficients in incinerator and landfills
- Carbon monoxide, fossil [emissions to air, high. pop.]: 2.1776e-5 kg; lognormal SD95 5.8433
  Incomplete combustion product emitted to air. uncertainty calculated from uncertainty in average operation emissions, and the uncertainty of the flue gas volume from this waste.
- Benzo(a)pyrene [emissions to air, high. pop.]: 2.8507e-13 kg; lognormal SD95 3.506
  (same comment as for Carbon monoxide, fossil)
- Tin [emissions to water, river]: 8.52e-11 kg; lognormal SD95 17.365
  (same comment as for Iron)
- Cobalt [emissions to air, high. pop.]: 2.5771e-9 kg; lognormal SD95 11.972
  Emission to air from waste composition and transfer coefficients. uncertainty is calculated from uncertainties in waste composition and transfer coefficients in incinerator
- Nitrate [emissions to water, river]: 1.3963e-5 kg; lognormal SD95 3.8281
  (same comment as for Iron)
- Chromium VI [emissions to water, groundwater, long-term]: 9.6562e-7 kg; lognormal SD95 13.777
  (same comment as for Antimony)
- Hydrogen chloride [emissions to air, high. pop.]: 7.0424e-7 kg; lognormal SD95 5.0371
  (same comment as for Cobalt)
- Dioxin, 2,3,7,8 Tetrachlorodibenzo-p- [emissions to air, high. pop.]: 2.5619e-14 kg; lognormal SD95 3.506
  (same comment as for Carbon monoxide, fossil)
- Cyanide [emissions to air, high. pop.]: 3.5097e-6 kg; lognormal SD95 10.838
  Nitrogen species emitted to air after DeNOx stage. uncertainty calculated from uncertainty in average N-emissions and uncertainty in the share of thermal NOx and the uncertainty in nitrogen content in *this* waste.
- Manganese [emissions to water, river]: 3.9493e-9 kg; lognormal SD95 7.2416
  (same comment as for Iron)
- Copper [emissions to water, river]: 4.5261e-9 kg; lognormal SD95 7.2917
  (same comment as for Iron)
- Iron [emissions to air, high. pop.]: 2.3218e-9 kg; lognormal SD95 5.2441
  (same comment as for Cobalt)
- Sodium [emissions to air, high. pop.]: 9.7426e-6 kg; lognormal SD95 4.9729
  (same comment as for Cobalt)
- Cadmium [emissions to water, river]: 2.7472e-9 kg; lognormal SD95 7.0124
  (same comment as for Iron)
- Chloride [emissions to water, groundwater, long-term]: 0.00028597 kg; lognormal SD95 4.873
  (same comment as for Antimony)
- Mercury [emissions to water, river]: 4.3969e-11 kg; lognormal SD95 10.656
  (same comment as for Iron)
- Aluminium [emissions to air, high. pop.]: 1.3204e-10 kg; lognormal SD95 7.1824
  (same comment as for Cobalt)
- Selenium [emissions to water, river]: 5.7443e-7 kg; lognormal SD95 8.8984
  (same comment as for Iron)
- Beryllium [emissions to water, groundwater, long-term]: 3.7002e-7 kg; lognormal SD95 12.603
  (same comment as for Antimony)
- Titanium [emissions to water, river]: 3.019e-7 kg; lognormal SD95 4.2756
  (same comment as for Iron)
- Barium [emissions to air, high. pop.]: 7.9455e-7 kg; lognormal SD95 6.5536
  (same comment as for Cobalt)
- Chromium VI [emissions to water, river]: 2.9419e-7 kg; lognormal SD95 10.062
  (same comment as for Iron)
- Beryllium [emissions to water, river]: 2.5357e-10 kg; lognormal SD95 19.418
  (same comment as for Iron)
- Benzene [emissions to air, high. pop.]: 1.281e-8 kg; lognormal SD95 1.753
  (same comment as for Carbon monoxide, fossil)
- Arsenic [emissions to water, groundwater, long-term]: 4.6071e-7 kg; lognormal SD95 11.717
  (same comment as for Antimony)
- Magnesium [emissions to water, river]: 3.7781e-7 kg; lognormal SD95 8.1935
  (same comment as for Iron)
- Zinc [emissions to water, river]: 2.6055e-8 kg; lognormal SD95 5.2538
  (same comment as for Iron)
- Lead [emissions to air, high. pop.]: 1.5719e-9 kg; lognormal SD95 9.0601
  (same comment as for Cobalt)
- Thallium [emissions to air, high. pop.]: 3.2389e-10 kg; lognormal SD95 13.913
  (same comment as for Cobalt)
- Vanadium [emissions to water, groundwater, long-term]: 0.00086815 kg; lognormal SD95 3.7647
  (same comment as for Antimony)
- Thallium [emissions to water, river]: 1.9842e-10 kg; lognormal SD95 15.602
  (same comment as for Iron)
- Zinc [emissions to water, groundwater, long-term]: 8.7819e-5 kg; lognormal SD95 30.94
  (same comment as for Antimony)
- Methane, fossil [emissions to air, high. pop.]: 1.9215e-7 kg; lognormal SD95 1.753
  (same comment as for Carbon monoxide, fossil)
- Antimony [emissions to air, high. pop.]: 6.8107e-12 kg; lognormal SD95 10.304
  (same comment as for Cobalt)
- Dinitrogen monoxide [emissions to air, high. pop.]: 1.6336e-5 kg; lognormal SD95 10.838
  (same comment as for Cyanide)
- Cadmium [emissions to water, groundwater, long-term]: 2.0916e-6 kg; lognormal SD95 169.31
  (same comment as for Antimony)
- Heat, waste [emissions to water, river]: 6.6896 MJ; lognormal SD95 1.3457
  Waste heat generated from heating value of this waste plus any electricity required to process it. uncertainty is calculated from uncertainties in waste composition and uncertainties in energy efficiency and the uncertainty in internal energy demand
- Barium [emissions to water, river]: 2.7246e-8 kg; lognormal SD95 8.7034
  (same comment as for Iron)
- Calcium [emissions to water, river]: 2.4203e-5 kg; lognormal SD95 3.6919
  (same comment as for Iron)
- Particulates, > 2.5 um, and < 10um [emissions to air, high. pop.]: 7.6857e-9 kg; lognormal SD95 2.3373
  (same comment as for Carbon monoxide, fossil)
- Copper [emissions to air, high. pop.]: 3.1992e-9 kg; lognormal SD95 8.41
  (same comment as for Cobalt)
- Sodium [emissions to water, river]: 0.00032242 kg; lognormal SD95 3.1231
  (same comment as for Iron)
- Fluoride [emissions to water, groundwater, long-term]: 1.089e-5 kg; lognormal SD95 5.6247
  (same comment as for Antimony)
- Zinc [emissions to air, high. pop.]: 1.9356e-7 kg; lognormal SD95 6.3001
  (same comment as for Cobalt)
- DOC, Dissolved Organic Carbon [emissions to water, river]: 0.00035459 kg; lognormal SD95 1.389
  (same comment as for Iron)
- Magnesium [emissions to water, groundwater, long-term]: 7.1708e-5 kg; lognormal SD95 7.1
  (same comment as for Antimony)
- Ammonia [emissions to air, high. pop.]: 1.1528e-6 kg; lognormal SD95 2.7581
  (same comment as for Cyanide)
- Manganese [emissions to air, high. pop.]: 4.8454e-9 kg; lognormal SD95 8.7616
  (same comment as for Cobalt)
- Particulates, < 2.5 um [emissions to air, high. pop.]: 1.5294e-6 kg; lognormal SD95 3.506
  (same comment as for Carbon monoxide, fossil)
- Lead [emissions to water, groundwater, long-term]: 9.2248e-6 kg; lognormal SD95 63.907
  (same comment as for Antimony)
- Calcium [emissions to water, groundwater, long-term]: 0.0016285 kg; lognormal SD95 4.2175
  (same comment as for Antimony)
- Nickel [emissions to water, river]: 5.4405e-10 kg; lognormal SD95 18.622
  (same comment as for Iron)
- Carbon dioxide, fossil [emissions to air, high. pop.]: 2.5298 kg; lognormal SD95 1.1365
  (same comment as for Cobalt)
- Selenium [emissions to water, groundwater, long-term]: 1.1044e-6 kg; lognormal SD95 8.1497
  (same comment as for Antimony)
- Lead [emissions to water, river]: 1.8251e-9 kg; lognormal SD95 7.343
  (same comment as for Iron)
- Chromium [emissions to air, high. pop.]: 9.1918e-9 kg; lognormal SD95 9.61
  (same comment as for Cobalt)
- Bromine [emissions to air, high. pop.]: 4.0446e-9 kg; lognormal SD95 9.9225
  (same comment as for Cobalt)
- Sulfate [emissions to water, groundwater, long-term]: 0.00089277 kg; lognormal SD95 3.9196
  (same comment as for Antimony)
- BOD5, Biological Oxygen Demand [emissions to water, groundwater, long-term]: 0.001705 kg; lognormal SD95 1.2738
  (same comment as for Antimony)
- Nickel [emissions to air, high. pop.]: 1.0172e-9 kg; lognormal SD95 12.674
  (same comment as for Cobalt)
- Tin [emissions to water, groundwater, long-term]: 1.2326e-6 kg; lognormal SD95 20.197
  (same comment as for Antimony)
- Barium [emissions to water, groundwater, long-term]: 0.00010195 kg; lognormal SD95 19.893
  (same comment as for Antimony)
- Nitrate [emissions to water, groundwater, long-term]: 3.9395e-5 kg; lognormal SD95 5.023
  (same comment as for Antimony)
- Sulfate [emissions to water, river]: 0.00018286 kg; lognormal SD95 3.4385
  (same comment as for Iron)
- Fluoride [emissions to water, river]: 9.2871e-7 kg; lognormal SD95 6.0035
  (same comment as for Iron)
- Chloride [emissions to water, river]: 0.00094743 kg; lognormal SD95 4.1951
  (same comment as for Iron)
- Bromine [emissions to water, groundwater, long-term]: 7.8045e-7 kg; lognormal SD95 9.7435
  (same comment as for Antimony)
- Heat, waste [emissions to air, high. pop.]: 26.255 MJ; lognormal SD95 1.3457
  (same comment as for Heat, waste)
- Iron [emissions to water, groundwater, long-term]: 0.00065359 kg; lognormal SD95 5.9825
  (same comment as for Antimony)
- Manganese [emissions to water, groundwater, long-term]: 1.5652e-5 kg; lognormal SD95 18.343
  (same comment as for Antimony)
- TOC, Total Organic Carbon [emissions to water, river]: 0.00035459 kg; lognormal SD95 1.389
  (same comment as for Iron)
- Cobalt [emissions to water, river]: 2.5673e-10 kg; lognormal SD95 14.669
  (same comment as for Iron)
- Antimony [emissions to water, river]: 2.9304e-6 kg; lognormal SD95 9.6729
  (same comment as for Iron)
- Arsenic [emissions to water, river]: 1.0657e-6 kg; lognormal SD95 10.65
  (same comment as for Iron)
- Arsenic [emissions to air, high. pop.]: 1.2051e-8 kg; lognormal SD95 11.834
  (same comment as for Cobalt)
- Strontium [emissions to water, groundwater, long-term]: 7.1567e-5 kg; lognormal SD95 7.4328
  (same comment as for Antimony)
- Thallium [emissions to water, groundwater, long-term]: 1.89e-7 kg; lognormal SD95 9.6705
  (same comment as for Antimony)
- Mercury [emissions to air, high. pop.]: 1.1479e-9 kg; lognormal SD95 16.08
  (same comment as for Cobalt)
- Benzene, hexachloro- [emissions to air, high. pop.]: 2.6786e-11 kg; lognormal SD95 1.753
  (same comment as for Carbon monoxide, fossil)
- DOC, Dissolved Organic Carbon [emissions to water, groundwater, long-term]: 0.0020627 kg; lognormal SD95 1.2738
  (same comment as for Antimony)
- Vanadium [emissions to air, high. pop.]: 3.9499e-5 kg; lognormal SD95 4.6225
  (same comment as for Cobalt)
- Cadmium [emissions to air, high. pop.]: 1.461e-8 kg; lognormal SD95 8.5849
  (same comment as for Cobalt)
- Magnesium [emissions to air, high. pop.]: 8.5408e-8 kg; lognormal SD95 7.4529
  (same comment as for Cobalt)
- Toluene [emissions to air, high. pop.]: 2.5621e-8 kg; lognormal SD95 1.753
  (same comment as for Carbon monoxide, fossil)
- Benzene, pentachloro- [emissions to air, high. pop.]: 6.7681e-11 kg; lognormal SD95 1.753
  (same comment as for Carbon monoxide, fossil)
- COD, Chemical Oxygen Demand [emissions to water, groundwater, long-term]: 0.0052126 kg; lognormal SD95 1.2738
  (same comment as for Antimony)
- Tin [emissions to air, high. pop.]: 2.1036e-12 kg; lognormal SD95 11.492
  (same comment as for Cobalt)
- Sodium [emissions to water, groundwater, long-term]: 0.00085449 kg; lognormal SD95 3.0823
  (same comment as for Antimony)
- BOD5, Biological Oxygen Demand [emissions to water, river]: 0.00080154 kg; lognormal SD95 1.3938
  (same comment as for Iron)
- Titanium [emissions to water, groundwater, long-term]: 0.00024206 kg; lognormal SD95 6.058
  (same comment as for Antimony)
- NMVOC, non-methane volatile organic compounds, unspecified origin [emissions to air, high. pop.]: 5.8299e-7 kg; lognormal SD95 1.753
  (same comment as for Carbon monoxide, fossil)
- Cobalt [emissions to water, groundwater, long-term]: 1.1543e-6 kg; lognormal SD95 11.01
  (same comment as for Antimony)
- Strontium [emissions to air, high. pop.]: 7.1661e-9 kg; lognormal SD95 7.6729
  (same comment as for Cobalt)
- Mercury [emissions to water, groundwater, long-term]: 2.5786e-9 kg; lognormal SD95 40.517
  (same comment as for Antimony)
- Chromium [emissions to water, river]: 8.1735e-10 kg; lognormal SD95 9.7534
  (same comment as for Iron)
- Strontium [emissions to water, river]: 4.512e-8 kg; lognormal SD95 13.756
  (same comment as for Iron)
- Nitrogen oxides [emissions to air, high. pop.]: 0.00036505 kg; lognormal SD95 2.7581
  sum of fuel-Nox and thermal-NOx emitted to air after DeNOx stage. uncertainty calculated from uncertainty in average N-emissions and uncertainty in the share of thermal NOx and the uncertainty in nitrogen content in *this* waste.
- Sulfur dioxide [emissions to air, high. pop.]: 3.8333e-6 kg; lognormal SD95 6.0069
  (same comment as for Cobalt)
- Phenol, pentachloro- [emissions to air, high. pop.]: 5.5787e-12 kg; lognormal SD95 1.753
  (same comment as for Carbon monoxide, fossil)
- Aluminium [emissions to water, river]: 1.7526e-8 kg; lognormal SD95 8.3596
  (same comment as for Iron)
- TOC, Total Organic Carbon [emissions to water, groundwater, long-term]: 0.0020627 kg; lognormal SD95 1.2738
  (same comment as for Antimony)
- Selenium [emissions to air, high. pop.]: 2.0286e-8 kg; lognormal SD95 11.696
  (same comment as for Cobalt)
- Aluminium [emissions to water, groundwater, long-term]: 0.00011711 kg; lognormal SD95 6.1135
  (same comment as for Antimony)
- Bromine [emissions to water, river]: 7.3127e-6 kg; lognormal SD95 5.1002
  (same comment as for Iron)
- Calcium [emissions to air, high. pop.]: 1.7206e-5 kg; lognormal SD95 4.4944
  (same comment as for Cobalt)
- COD, Chemical Oxygen Demand [emissions to water, river]: 0.00081198 kg; lognormal SD95 1.3883
  (same comment as for Iron)
- Copper [emissions to water, groundwater, long-term]: 3.12e-5 kg; lognormal SD95 8.0132
  (same comment as for Antimony)
- Titanium [emissions to air, high. pop.]: 6.7179e-7 kg; lognormal SD95 5.3824
  (same comment as for Cobalt)
- Hydrogen fluoride [emissions to air, high. pop.]: 8.1944e-8 kg; lognormal SD95 9.384
  (same comment as for Cobalt)
- Vanadium [emissions to water, river]: 2.9734e-6 kg; lognormal SD95 5.8241
  (same comment as for Iron)

## Sampling procedure
fully waste-specific calculation based on literature data for average MSWI operation performance

## Extrapolations
Typical elemental transfer coefficients from current studies for modern MSWI, completed with data from coal power plants and estimates, adapted for inert/burnable waste.

## Uncertainty adjustments
uncertainty of waste input composition data derived from generic formula GSD(c) = N*ln(c)+1

## Sources
- Doka G., 2013, 2013 - Updates LCI waste treatment services - Doka, -, Doka LCA, Zuerich, CH
Doka G. (2013) Updates to Life Cycle Inventories of Waste Treatment Services - part II: waste incineration. Doka LCA. Zurich.
Type: Separate publication
Source: Report to document the 2013 changes to the MSWI incinerator model and datasets (URL: http://www.doka.ch/ecoinventMSWIupdateLCI2013.pdf). To be read with the ecoinvent Nr 13 report (Doka 2009, Life Cycle Inventories of Waste Treatment Services) for ecoinvent v2.2.
First author: Doka G.
Year: 2013
Place of publication: Zurich
Publisher: Doka LCA
Original title: Updates to Life Cycle Inventories of Waste Treatment Services - part II: waste incineration

## Validation
Proof reading validation: Passed.; Other validation: none;
