# Crude oil, production AZ, at long distance transport

Dataset: EcoSpold 1, unit process
Functional unit: 1 kg
Category: fuels / oil\transport
Geography: RER
Time period: 1992-01 to 2015-12
Generated by: Philippe Stolz
accessRestrictedTo: 0
copyright: true

## General comment
Transport of crude oil from Azerbaijan (e.g. Azeri) by pipeline to the Black Sea (Noworossiysk) followed by tanker transport to European sites at the Mediterranean Sea. The crude oil is then transported by pipeline to a European refinery.;

## Included processes
Transportation of crude oil from exploration site to refinery in Europe. Includes transport service requirements and emissions from oil handling and evaporation.

## Geography
Calculations based on assumptions for supply to European refineries.

## Technology
Use of different generic transport devices (pipelines and tanker).

## Reference product
- Crude oil, production AZ, at long distance transport [RER]: 1 kg
  Europe

## Inputs from technosphere
- Transport, transoceanic tanker [OCE]: 3.7 tkm; lognormal SD95 2.0483
  (4,1,1,3,1,na); Transport from the Black Sea to ports at the Mediterranean Sea according to Meili et al. 2018
- Transport, crude oil pipeline, onshore [RER]: 1.5 tkm; lognormal SD95 2.0612
  (4,1,3,3,1,na); Calculation based on information from Jungbluth (2007) and Google Maps; Transport by pipeline from extraction sites in Azerbaijan (e.g. Azeri) to the Black Sea (Noworossiysk) (1400 km), and from the Mediterranean Sea to refineries (100 km)
- Transport, crude oil pipeline, offshore [OCE]: 0.2 tkm; lognormal SD95 1.209
  (4,1,1,3,1,na); Estimation by Meili et al. 2018 (high share of offshore production)
- Crude oil, at production offshore [AZ]: 1.0003 kg; lognormal SD95 1.05
  (1,1,1,1,1,1); Transported good

## Emissions to nature
- Ethane [emissions to air, unspecified]: 1.601e-6 kg; lognormal SD95 1.6321
  (3,5,4,1,1,na); Meili et al. 2018
- Pentane [emissions to air, unspecified]: 9.558e-5 kg; lognormal SD95 1.6321
  (3,5,4,1,1,na); Meili et al. 2018
- Toluene [emissions to air, unspecified]: 2.7e-7 kg; lognormal SD95 1.6321
  (3,5,4,1,1,na); Meili et al. 2018
- Hydrocarbons, aliphatic, alkanes, unspecified [emissions to air, unspecified]: 1.35e-6 kg; lognormal SD95 1.6321
  (3,5,4,1,1,na); Meili et al. 2018
- Propane [emissions to air, unspecified]: 6.1296e-5 kg; lognormal SD95 1.6321
  (3,5,4,1,1,na); Meili et al. 2018
- Butane [emissions to air, unspecified]: 0.00012642 kg; lognormal SD95 1.6321
  (3,5,4,1,1,na); Meili et al. 2018
- Methane, fossil [emissions to air, unspecified]: 1.498e-6 kg; lognormal SD95 1.6321
  (3,5,4,1,1,na); Meili et al. 2018
- Hexane [emissions to air, high. pop.]: 5.3876e-5 kg; lognormal SD95 1.6321
  (3,5,4,1,1,na); Meili et al. 2018
- Benzene [emissions to air, unspecified]: 4.5e-7 kg; lognormal SD95 3.1033
  (3,5,4,1,1,na); Meili et al. 2018

## Sampling procedure
Literature, statistics and own calculations.

## Sources
- Frischknecht R., 2022, 2016 - Energy label for passenger cars - Frischknecht, -, 579, treeze Ltd., Bern, CH
Stolz P., Frischknecht R. (2016) Aktualisierung Energieetikette BFE. Volume: 579. treeze Ltd.. Uster, CH.
Type: Measurement on site
First author: Stolz P.
Other authors: Frischknecht R.
Year: 2016
Place of publication: Uster, CH
Publisher: treeze Ltd.
Volume No: 579
