# xx Methylcyclohexane, at plant

Dataset: EcoSpold 1, unit process
Functional unit: 1 kg
Category: material, obsolete / chemicals, obsolete\organic, obsolete
Geography: RER
Time period: 2000-01 to 2005-12
Production volume: No current world market
Share of production covered: 100 %
Generated by: Juergen Sutter
accessRestrictedTo: 0
copyright: true

## General comment
The process "methylcyclohexane, at plant, RER" is modelled for the production of methylcyclohexane from toluene in Europe. Raw materials are modelled with a stoechiometric calculation. Energy consumptions are modelled with literature data. The emissions are estimated. Infrastructure and transports are calculated with standard values.;
CAS number: 000108-87-2;
Formula: C7H14;
Synonyms: hexahydrotoluene, cyclohexyl methane;

## Included processes
Production of methylcyclohexane including materials, energy uses, infrastructure and emissions.

## Geography
The inventory is modelled for Europe.

## Technology
Hydrgenation of toluene

## Time period
Time of publications

## Reference product
- xx Methylcyclohexane, at plant [RER]: 1 kg
  Europe

## Inputs from technosphere
- Heat, unspecific, in chemical plant [RER]: 28.325 MJ; lognormal SD95 1.3001
  (4,5,na,na,na,na); Estimation
- Hydrogen, liquid, at plant [RER]: 0.068027 kg; lognormal SD95 1.3765
  (4,5,1,1,1,5); Stoechiometric calculation
- Toluene, liquid, at plant [RER]: 1.0431 kg; lognormal SD95 1.3765
  (4,5,1,1,1,5); Stoechiometric calculation
- Nickel, 99.5%, at plant [GLO]: 3.1e-5 kg; lognormal SD95 1.5095
  (1,2,5,1,1,3); Estimation
- Water, deionised, at plant [CH]: 0.95 kg; lognormal SD95 1.3001
  (4,5,na,na,na,na); Estimation
- Aluminium, production mix, at plant [RER]: 3.1e-5 kg; lognormal SD95 1.5095
  (1,2,5,1,1,3); Estimation
- Transport, freight, lorry, fleet average [RER]: 0.10771 tkm; lognormal SD95 2.095
  (4,5,na,na,na,na); Standard distances
- Chemical plant, organics [RER]: 4e-10 p; lognormal SD95 3.0909
  (4,5,na,na,na,na); Estimation
- Electricity, medium voltage, production ENTSO-E, at grid: 0.242 kWh; lognormal SD95 1.1557
  (1,4,1,3,1,4); Wurster 1994
- Transport, freight, rail [RER]: 0.63266 tkm; lognormal SD95 2.095
  (4,5,na,na,na,na); Standard distances

## Inputs from nature
- Water, cooling, unspecified natural origin/m3 [resources, in water]: 0.008 m3; lognormal SD95 1.3001
  (4,5,na,na,na,na); Estimation

## Emissions to nature
- BOD5, Biological Oxygen Demand [emissions to water, river]: 0.025 kg; lognormal SD95 1.6169
  (4,5,na,na,na,na); Calculated from the water emissions
- Carbon dioxide, fossil [emissions to air, high. pop.]: 0.020862 kg; lognormal SD95 1.3001
  (4,5,na,na,na,na); Calculated from the water treatment
- Toluene [emissions to air, high. pop.]: 0.0068027 kg; lognormal SD95 1.6169
  (4,5,na,na,na,na); Estimation
- DOC, Dissolved Organic Carbon [emissions to water, river]: 0.00761 kg; lognormal SD95 1.6169
  (4,5,na,na,na,na); Calculated from the water emissions
- COD, Chemical Oxygen Demand [emissions to water, river]: 0.025 kg; lognormal SD95 1.6169
  (4,5,na,na,na,na); Calculated from the water emissions
- Heat, waste [emissions to air, high. pop.]: 0.8712 MJ; lognormal SD95 1.1557
  (1,4,1,3,1,4); Calculated from the electricity input
- TOC, Total Organic Carbon [emissions to water, river]: 0.00761 kg; lognormal SD95 1.6169
  (4,5,na,na,na,na); Calculated from the water emissions
- Toluene [emissions to water, river]: 0.0083447 kg; lognormal SD95 3.0909
  (4,5,na,na,na,na); Estimation
- Hydrogen [emissions to air, high. pop.]: 0.25143 kg; lognormal SD95 1.6169
  (4,5,na,na,na,na); Estimation
- Water [emissions to water, unspecified]: 7.6 kg; lognormal SD95 2.5196
  (5,5,5,5,5,BU:1.05); All uncertainty-values set to 5.0 by default. Balance of input water

## Sampling procedure
Literature data

## Extrapolations
Transports and emissions are modelled with standard methods.

## Sources
- Sutter J., 2007, 2007 - LCI petrochemical solvents - Sutter, Final report ecoinvent Data v2.0, 22, Swiss Centre for LCI, ETH, Duebendorf and Uster, CH
Sutter, J., 0 (2007) Life Cycle Inventories of Petrochemical Solvents. Final report ecoinvent Data v2.0. Editors: 0. 0. Volume: 22. Issue: 0. Swiss Centre for LCI, ETHZ. Duebendorf and St. Gallen, CH.
Type: Measurement on site
Source: CD-ROM
First author: Sutter, J.
Other authors: 0
Year: 2007
Name of editors: 0
Title of anthology: Final report ecoinvent Data v2.0
Place of publication: Duebendorf and St. Gallen, CH
Publisher: Swiss Centre for LCI, ETHZ
Journal: 0
Volume No: 22
Issue No: 0

## Validation
Proof reading validation: passed.; Other validation: none;
