# Pedestrian overpass, over 2 tracks

Dataset: EcoSpold 1, unit process
Functional unit: 1 m2a
Category: transport systems / train\operations\infrastructure
Geography: CH
Time period: 2017 to 2024
Synonyms: 0
Generated by: Stefanie Conrad
accessRestrictedTo: 0
copyright: true

## General comment
A standard hybrid overpass was considered, which crosses 2 railway tracks. The overpass measures 6 m wide and 49 m long. On both sides there is a staircase (2.75 m x 20 m) and two ramps (2.75 m x 37 m) that end on a plateau (6 m x 5 m). In total (including stairs, ramps and plateau), the area of such an overpasse is 642m2. For larger (over three or more tracks) overpasses, it is assumed that the materialisation per m2 is similar, as it usually also requires an additional ramp and stairs. The data for the material requirements comes from SBB (pers. comm. SBB, 2019). Offcuts and rejects are not taken into account. It is assumed that the excavated material will be used elsewhere and not deposited. The energy requirement for the construction work (excluding excavation) was derived from an SBB LCA study on the construction of a platform per tonne of material installed (Rüegsegger & Schori, 2017). The ecoinvent standard values were used for transport distances for material deliveries by lorry (Frischknecht et al., 2007).

According to SBB, the service life of such an overpass is 78 years (pers. comm., SBB, 2024). Maintenance work, refurbishment and dismantling of the overpass are not taken into account.;

## Included processes
The inventory includes all the materials, energy and transport necessary for constructing a pedestrian overpass over 2 railway tracks. Excluded are maintenance and disposal

## Geography
Data apply to construction in Switzerland.

## Technology
Average technology available on the market

## Time period
Time of publications.

## Reference product
- Pedestrian overpass, over 2 tracks [CH]: 1 m2a

## Inputs from technosphere
- Steel, low-alloyed, at plant [RER]: 1.88 kg; lognormal SD95 1.3001
  (4,1,1,1,1,5,BU:1.05); Assumption for picket railing, sheet steel ramp;
- Aluminium, production mix, wrought alloy, at plant [RER]: 0.0743 kg; lognormal SD95 1.3001
  (4,1,1,1,1,5,BU:1.05); Assumption for trapezoidal sheet metal;
- Iron-nickel-chromium alloy, at plant [RER]: 0.022 kg; lognormal SD95 1.3001
  (4,1,1,1,1,5,BU:1.05); Assumption for roof edge trims;
- Zinc coating, pieces [RER]: 0.0112 m2; lognormal SD95 1.3001
  (4,1,1,1,1,5,BU:1.05); Assumption for hot-dip galvanising, duplex process;
- Polystyrene, extruded (XPS) CO2 blown, at plant [RER]: 0.0239 kg; lognormal SD95 1.3001
  (4,1,1,1,1,5,BU:1.05); Approximation for Swisspor XPS 500;
- Reinforcing steel, at plant [RER]: 0.128 kg; lognormal SD95 1.3001
  (4,1,1,1,1,5,BU:1.05); Assumption of reinforcing bars in reinforced concrete;
- Concrete, normal, at plant [CH]: 0.00349 m3; lognormal SD95 1.3001
  (4,1,1,1,1,5,BU:1.05); ;
- Concrete, normal, at plant [CH]: 0.00395 m3; lognormal SD95 1.3001
  (4,1,1,1,1,5,BU:1.05); Foundation;
- Poor concrete, at plant [CH]: 0.000281 m3; lognormal SD95 1.3001
  (4,1,1,1,1,5,BU:1.05); Foundation;
- Mastic asphalt, at plant [CH]: 4.89 kg; lognormal SD95 1.3001
  (4,1,1,1,1,5,BU:1.05); Foundation;
- Excavation, hydraulic digger, with particle filter [CH]: 0.0144 m3; lognormal SD95 2.095
  (4,1,1,1,1,5,BU:2); Foundation;
- Transport, freight, lorry, 16t-32t gross weight, fleet average [RER]: 1.999 tkm; lognormal SD95 2.095
  (4,1,1,1,1,5,BU:2); ;
- Transport, freight, rail, electricity with shunting [CH]: 23.097 tkm; lognormal SD95 2.095
  (4,1,1,1,1,5,BU:2); ;
- Diesel, burned in building machine, with particle filter [CH]: 5.32 MJ; lognormal SD95 2.095
  (4,1,1,1,1,5,BU:2); ;

## Inputs from nature
- Occupation, sealed soil [resources, land]: 1 m2a; lognormal SD95 1.6169
  (4,1,1,1,1,5,BU:1.5); Only ramps;
- Transformation, to sealed soil [resources, land]: 0.0128 m2; lognormal SD95 2.095
  (4,1,1,1,1,5,BU:2); ;
- Transformation, from unspecified [resources, land]: 0.0128 m2; lognormal SD95 2.095
  (4,1,1,1,1,5,BU:2); ;

## Sampling procedure
based on literature

## Sources
- Conrad S., Roberts G., Kaegi T., Stettler C., Frick R., Walther U., Althaus H.-J., 2024, 2024 - LCA railway infrastructure - Kaegi, Carbotech und INFRAS im Auftrag des BAV, Carbotech AG, INFRAS, Basel, CH

## Validation
01.10.2024
\\tsclient\Schreibtisch\WinShare\BAV Gleisinfrastruktur\Ecospold\[EcoSpold_Pedestrian overpass v0.2.xlsx]X-Process
