# Uranium natural, at underground mine

Dataset: EcoSpold 1, unit process
Functional unit: 1 kg
Category: fuels / uranium\enriched
Geography: RU
Time period: 2011-01 to 2011-12
Generated by: Gabor Doka
accessRestrictedTo: 0
copyright: true

## General comment
PSI data (BFE project 407, Christian Bauer, April 2012).;

## Included processes
The module includes: diesel used in generators for all mining uses; transport of the diesel fuel; radioactive and non-radioactive emissions to air and water; water use (mining water).

## Technology
Average conditions in early 1980s.

## Reference product
- Uranium natural, at underground mine [RU]: 1 kg
  RUSSIAN FEDERATION

## Inputs from technosphere
- Diesel, burned in diesel-electric generating set [GLO]: 12.5 MJ
  Axpo data;backup
- Transport, freight, lorry, 32t-40t gross weight, fleet average [RER]: 0.55 tkm
  own estimation: diesel + explosives 1000km
- Electricity, hard coal, at power plant [RU]: 77.7 kWh
  Axpo data; 66% of total electricity for mining and milling
- Blasting [RER]: 0.26 kg
  v2.2
- Transport, freight, rail, diesel [US]: 0.55 tkm
  own estimation: diesel + explosives 1000km
- Uranium underground mine [US]: 2.78e-7 p
  v2.2; no specific info about lifetime of mining infra available
- Diesel, burned in building machine, average [CH]: 162.6 MJ
  original data: 3.8 kg diesel per kg U, previous input "operation, lorry 7.5-16t, EURO3/RER" changed by using the net calorific value of diesel (42.8 MJ/kg)

## Inputs from nature
- Transformation, from mineral extraction site [resources, land]: 0.15 m2
  Axpo data
- Transformation, to unknown [resources, land]: 0.15 m2
  Axpo data
- Transformation, from unknown [resources, land]: 0.15 m2
  Axpo data
- Uranium [resources, in ground]: 1.03 kg
  Axpo data
- Transformation, to mineral extraction site [resources, land]: 0.15 m2
  Axpo data
- Occupation, mineral extraction site [resources, land]: 3 m2a
  Axpo data

## Emissions to nature
- Sulfate [emissions to water, lake]: 3.4 kg; lognormal SD95 3
  v2.2
- Radium-226 [emissions to water, lake]: 0.4274 kBq
  Axpo data
- Aluminium [emissions to water, lake]: 0.0023 kg; lognormal SD95 3
  v2.2
- Vanadium [emissions to water, lake]: 0.0048 kg; lognormal SD95 3
  v2.2
- Uranium alpha [emissions to air, low. pop.]: 23 kBq
  v2.2
- Barium [emissions to water, lake]: 0.0014 kg; lognormal SD95 3
  v2.2
- Ammonium, ion [emissions to water, lake]: 0.065 kg; lognormal SD95 3
  v2.2
- Sodium [emissions to water, lake]: 4.7 kg; lognormal SD95 3
  v2.2
- Thorium-230 [emissions to water, lake]: 0.57 kBq
  Axpo data
- Benzo(a)pyrene [emissions to air, low. pop.]: 6.7e-8 kg
  v2.2
- Lead [emissions to air, low. pop.]: 2e-5 kg
  v2.2
- Chloride [emissions to water, lake]: 0.6 kg; lognormal SD95 10
  v2.2
- Arsenic [emissions to water, lake]: 6.8e-5 kg; lognormal SD95 3
  v2.2
- Radon-222 [emissions to air, low. pop.]: 162000 kBq
  Axpo data
- Magnesium [emissions to water, lake]: 0.082 kg; lognormal SD95 3
  v2.2
- Cadmium [emissions to water, lake]: 6.8e-5 kg; lognormal SD95 3
  v2.2
- Lead [emissions to water, lake]: 0.013 kg; lognormal SD95 3
  v2.2
- Uranium alpha [emissions to water, lake]: 310 kBq; lognormal SD95 10
  v2.2
- Beryllium [emissions to air, low. pop.]: 9.8e-7 kg
  v2.2
- Zinc [emissions to air, low. pop.]: 2e-5 kg
  v2.2
- Zinc [emissions to water, lake]: 0.00089 kg; lognormal SD95 3
  v2.2
- Particulates, > 10 um [emissions to air, low. pop.]: 0.033 kg
  v2.2
- Manganese [emissions to water, lake]: 0.00075 kg; lognormal SD95 3
  v2.2
- Nitrate [emissions to water, lake]: 0.041 kg; lognormal SD95 3
  v2.2
- Selenium [emissions to water, lake]: 0.00041 kg; lognormal SD95 3
  v2.2
- Iron [emissions to water, lake]: 0.11 kg; lognormal SD95 10
  v2.2
- Radium-226 [emissions to air, low. pop.]: 13 kBq
  v2.2
- Suspended solids, unspecified [emissions to water, lake]: 0.15 kg; lognormal SD95 3
  v2.2
- Cadmium [emissions to air, low. pop.]: 2e-6 kg
  v2.2
- Molybdenum [emissions to water, lake]: 0.003333 kg
  Axpo data

## Sampling procedure
Literature

## Sources
- Bauer C., Frischknecht R., Eckle P., Flury K., Neal T., Papp K., Schori S., Simons A., Stucki M., Treyer K., 2012, 2012 - LCA electricity generation in Switzerland - Uster, -, 407, Swiss Centre for LCI, ESU-services Ltd., PSI, Uster and Villigen, CH
Ch. Bauer, Frischknecht (2012) Umweltauswirkungen Strom. Volume: 407. PSI. Uster und Villigen, CH.
Type: Separate publication
Source: CD-ROM
First author: Ch. Bauer
Other authors: Frischknecht
Year: 2012
Place of publication: Uster und Villigen, CH
Publisher: PSI
Volume No: 407

## Validation
Proof reading validation: Unknown; Other validation: \\Server\E\ESU-Docs\Projektablage\407 Update LCI Energiesysteme\EcoSpold\import in unit process library\[uranium natural.xls]X-Process;
