# Methane, 96 vol-%, from biogas, high pressure, at consumer

Dataset: EcoSpold 1, unit process
Functional unit: 1 MJ
Category: fuels / biofuels\methane
Geography: CH
Time period: 1999-01 to 2004-12
Production volume: 20 PJ natural gas at 39 MJ/m3 in high and medium pressure network
Share of production covered: 100 %
Generated by: Mireille Faist Emmenegger
accessRestrictedTo: 0
copyright: true

## General comment
Total network losses are based on published data, repartition of losses on high and low pressure network on calculations with data for other countries.;
Synonyms: Kompogas, Naturgas;

## Included processes
This dataset describes the energy requirement and the emissions of the high pressure distribution network in Switzerland.

## Geography
Energy requirements is based on environmental report of Italian company. Total leakages are specific for CH, HD-leakages are calculated out of the total with German data.

## Technology
The quantity of gas delivered in the high and medium pressure network is estimated. Industry, power plants and half of commercial and of others are assumed to be connected to the high and medium pressure network .

## Reference product
- Methane, 96 vol-%, from biogas, high pressure, at consumer [CH]: 1 MJ
  SWITZERLAND

## Inputs from technosphere
- Electricity, medium voltage, at grid [CH]: 7.2431e-5 kWh; lognormal SD95 1.0907
  (1,3,1,3,1,3); environmental report of an Italian company
- Methane, 96 vol-%, from biogas, at purification [CH]: 0.029042 m3; lognormal SD95 1.0907
  (2,1,1,3,1,3); leakage based on German data
- Pipeline, natural gas, high pressure distribution network [CH]: 9.503e-10 km; lognormal SD95 3.0077
  (2,1,2,1,1,3); based on statistics
- Natural gas, burned in boiler atm. low-NOx condensing non-modulating <100kW [RER]: 0.0016685 MJ; lognormal SD95 1.0907
  (1,3,1,3,1,3); environmental report of an Italian company

## Emissions to nature
- Methane, biogenic [emissions to air, high. pop.]: 9.9524e-6 kg; lognormal SD95 2.0165
  (3,1,1,1,1,3); calculation based on gas composition and leakages
- Hydrogen sulfide [emissions to air, high. pop.]: 2.2016e-10 kg; lognormal SD95 1.521
  (3,1,1,1,1,3); calculation based on gas composition and leakages
- Heat, waste [emissions to air, high. pop.]: 0.00026075 MJ; lognormal SD95 1.0907
  (1,3,1,3,1,3); environmental report of an Italian company
- Carbon dioxide, biogenic [emissions to air, high. pop.]: 5.6977e-7 kg; lognormal SD95 1.1249
  (3,1,1,1,1,3); calculation based on gas composition and leakages

## Sampling procedure
statistics

## Sources
- Jungbluth N., Chudacoff M., Dauriat A., Dinkel F., Doka G., Faist Emmenegger M., Gnansounou E., Kljun N., Spielmann M., Stettler C., Sutter J., 2007, 2007 - LCI bioenergy - Jungbluth, Final report ecoinvent data v2.0, 17, Swiss Centre for LCI, ESU-services Ltd., Duebendorf and Uster, CH
Jungbluth N., Chudacoff M., Dauriat A., Dinkel F., Doka G., Faist Emmenegger M., Gnansounou E., Kljun N., Spielmann M., Stettler C., Sutter J. (2007) Life Cycle Inventories of Bioenergy. Final report ecoinvent data v2.0. Volume: 17. Swiss Centre for LCI, ESU. Duebendorf and Uster, CH.
Type: Measurement on site
Source: CD-ROM
First author: Jungbluth N.
Other authors: Chudacoff M., Dauriat A., Dinkel F., Doka G., Faist Emmenegger M., Gnansounou E., Kljun N., Spielmann M., Stettler C., Sutter J.
Year: 2007
Title of anthology: Final report ecoinvent data v2.0
Place of publication: Duebendorf and Uster, CH
Publisher: Swiss Centre for LCI, ESU
Volume No: 17

## Validation
Proof reading validation: Passed.; Other validation: none;
