# Packaging box production unit

Dataset: EcoSpold 1, unit process, infrastructure
Functional unit: 1 p
Category: paper+ board / packagings\infrastructure
Geography: RER
Time period: 2000-01 to 2000-12
Generated by: Roland Hischier
accessRestrictedTo: 0
copyright: true

## General comment
The dataset represents a packaging production site with a annual production of 14 kt and a total life time of 50 years.;

## Included processes
this module includes the land-use, buildings (hall), machineries for box production as well as the dismanteling/disposal of the whole infrastructure

## Geography
Land-use from 1 Swiss packaging box producer, used here for whole Europe

## Technology
estimation of typical technology for packaging box production

## Reference product
- Packaging box production unit [RER]: 1 p
  Europe

## Inputs from technosphere
- Steel, low-alloyed, at plant [RER]: 156000 kg; lognormal SD95 1.8
  (5,4,1,3,4,5); rough estimation
- Chromium steel 18/8, at plant [RER]: 438000 kg; lognormal SD95 1.8
  (5,4,1,3,4,5); rough estimation
- Disposal, electronics for control units [RER]: 6250 kg; lognormal SD95 1.8
  (5,4,1,3,4,5); calculated, based on input
- Electronics for control units [RER]: 6250 kg; lognormal SD95 1.8
  (5,4,1,3,4,5); rough estimation
- Disposal, polyethylene, 0.4% water, to municipal incineration [CH]: 25000 kg; lognormal SD95 1.8
  (5,4,1,3,4,5); calculated, based on input
- Polyethylene, HDPE, granulate, at plant [RER]: 25000 kg; lognormal SD95 1.8
  (5,4,1,3,4,5); rough estimation
- Building, hall, steel construction [CH]: 9600 m2; lognormal SD95 3.5
  (5,4,1,3,4,5); rough estimation

## Inputs from nature
- Occupation, industrial area, built up [resources, land]: 600000 m2a; lognormal SD95 1.6
  (1,4,1,3,1,5); Estimated, based on data from one CH site
- Occupation, construction site [resources, land]: 24000 m2a; lognormal SD95 1.6
  (1,4,1,3,1,5); Estimated, based on data from one CH site
- Transformation, to industrial area, vegetation [resources, land]: 1200 m2; lognormal SD95 2.1
  (1,4,1,3,1,5); Estimated, based on data from one CH site
- Occupation, industrial area, vegetation [resources, land]: 60000 m2a; lognormal SD95 1.6
  (1,4,1,3,1,5); Estimated, based on data from one CH site
- Transformation, from unknown [resources, land]: 13200 m2; lognormal SD95 2.1
  (1,4,1,3,1,5); Estimated, based on data from one CH site
- Transformation, to industrial area, built up [resources, land]: 12000 m2; lognormal SD95 2.1
  (1,4,1,3,1,5); Estimated, based on data from one CH site

## Sampling procedure
literature and estimations from similar processes

## Extrapolations
Land-use data are based on one production site. Other information is rough estimation.

## Sources
- Hischier R., 2007, 2007 - LCI packagings and graphical papers - Hischier, Final report ecoinvent data v2.0, 11, Swiss Centre for LCI, Empa - TSL, Duebendorf and St. Gallen, CH
Hischier R. (2007) Life Cycle Inventories of Packaging and Graphical Paper. Final report ecoinvent data v2.0. Volume: 11. Swiss Centre for LCI, Empa - TSL. Dübendorf, CH.
Type: Measurement on site
Source: CD-ROM
First author: Hischier R.
Year: 2007
Title of anthology: Final report ecoinvent data v2.0
Place of publication: Dübendorf, CH
Publisher: Swiss Centre for LCI, Empa - TSL
Volume No: 11

## Validation
Proof reading validation: passed; Other validation: none;
