# xxx Wood wool, u=20%, at plant

Dataset: EcoSpold 1, unit process
Functional unit: 1 kg
Category: material, obsolete / wood, obsolete\products, obsolete
Geography: RER
Generated by: Hans-Joerg Althaus
accessRestrictedTo: 0
copyright: true

## General comment
Covers high quality wood wool without shives. The multi-output process "wood wool production, u=20%" delivers the two coproducts "wood wool, u=20%, at plant" and "industrial residue wood, wood wool production, softwood, u=20%, at plant". Allocation is based on the over-all proceeds of the process.;

## Included processes
Includes all processes of wood wool production from industrial softwood (debarked), including air drying (from u=70 - 20%), external and internal transports, sucktion, air compression, sawmill production

## Technology
Medium enterprise technology (2000)

## Reference product
- xxx Wood wool, u=20%, at plant [RER]: 1 kg
  Europe

## Inputs from technosphere
- Transport, freight, lorry, fleet average [RER]: 0.0811 tkm; lognormal SD95 2.09
  (4,5,nA,nA,nA,nA,5)
- Softwood, allocation correction, 1 [RER]: -9.26e-5 m3; lognormal SD95 1
  calculated correction term
- xxx Industrial residue wood, softwood, forest-debarked, u=70%, at plant [RER]: 0.00212 m3; lognormal SD95 1.12
  (1,4,1,3,1,1,3)
- Transport, freight, rail [RER]: 0.162 tkm; lognormal SD95 2.09
  (4,5,nA,nA,nA,nA,5)
- Sawmill [RER]: 8.48e-10 p; lognormal SD95 3.36
  (4,5,2,3,4,5,9)
- Electricity, medium voltage, production ENTSO-E, at grid: 0.0592 kWh; lognormal SD95 1.12
  (1,4,1,3,1,1,2)

## Emissions to nature
- Heat, waste [emissions to air, unspecified]: 0.0592 MJ; lognormal SD95 1.12
  (1,4,1,3,1,1,2)

## Sampling procedure
personal communication

## Extrapolations
see Geography and Technology

## Uncertainty adjustments
The assumption that the technology is representative for central Europe is considered in the uncertainties.

## Sources
- Werner F., Althaus H.-J., Kuenniger T., Richter K., Jungbluth N., 2007, 2007 - LCI wood as fuel and const. mat. - Werner, Final report ecoinvent data v2.0, 9, Swiss Centre for LCI, Empa - TSL, ESU-services Ltd., Duebendorf, CH
Werner F., Althaus H.-J., Künniger T., Richter K., Jungbluth N. (2007) 1Life Cycle Inventories of Wood as Fuel and Construction Material. Final report ecoinvent data v2.0. Volume: 9. Issue: 0. Swiss Centre for LCI, Empa - TSL. Dübendorf, CH.
Type: Measurement on site
Source: CD-ROM
First author: Werner F.
Other authors: Althaus H.-J., Künniger T., Richter K., Jungbluth N.
Year: 2007
Title of anthology: Final report ecoinvent data v2.0
Place of publication: Dübendorf, CH
Publisher: Swiss Centre for LCI, Empa - TSL
Volume No: 9
Issue No: 0

## Validation
Proof reading validation: passed; Other validation: none;
