# Disposal, spoil from lignite mining, in surface landfill

Dataset: EcoSpold 1, unit process
Functional unit: 1 kg
Category: landfill / residual material landfill
Geography: GLO
Time period: 1985-01 to 2009-12
Production volume: Approx. 8580 Mio t/a lignite spoil generation
Share of production covered: 1 %
Generated by: Gabor Doka
accessRestrictedTo: 0
copyright: true

## General comment
na;
Synonyms: lignite mine overburden, lignite mine waste rock;

## Included processes
Waste-specific emissions from lignite spoil leachate. Short- and long-term emissions to groundwater from rainwater infiltration leaching. Leaching by lateral groundwater flow not included.; Geography: Data represents a worldwide average. Generic water infiltration rate according to weighted mean of major sites of lignite spoil production in the world.

## Technology
Mechanically stable and revegetated lignite spoil backfill or heap.

## Time period
Average lignite spoil composition from literature references. Transfer coefficients from prospective model, specific to lignite spoil.

## Reference product
- Disposal, spoil from lignite mining, in surface landfill [GLO]: 1 kg
  Global

## Emissions to nature
- Arsenic [emissions to water, groundwater, long-term]: 5.2241e-7 kg; lognormal SD95 21.902
  Uncertainty is calculated from uncertainties in waste composition and transfer coefficients
- Zinc [emissions to water, groundwater, long-term]: 1.5816e-5 kg; lognormal SD95 9.1101
  (same comment as for Arsenic)
- Chloride [emissions to water, groundwater]: 1.2256e-5 kg; lognormal SD95 2.8232
  (same comment as for Arsenic)
- Sodium [emissions to water, groundwater, long-term]: 0.0017701 kg; lognormal SD95 2.4873
  (same comment as for Arsenic)
- Sodium [emissions to water, groundwater]: 5.2813e-6 kg; lognormal SD95 5.5671
  (same comment as for Arsenic)
- Chromium VI [emissions to water, groundwater, long-term]: 1.1223e-6 kg; lognormal SD95 50.21
  (same comment as for Arsenic)
- Vanadium [emissions to water, groundwater, long-term]: 5.834e-7 kg; lognormal SD95 91.066
  (same comment as for Arsenic)
- Calcium [emissions to water, groundwater]: 4.6947e-5 kg; lognormal SD95 18.715
  (same comment as for Arsenic)
- Cobalt [emissions to water, groundwater]: 5.8685e-9 kg; lognormal SD95 12.552
  (same comment as for Arsenic)
- Titanium [emissions to water, groundwater]: 2.2097e-9 kg; lognormal SD95 14.635
  (same comment as for Arsenic)
- Aluminium [emissions to water, groundwater, long-term]: 7.0848e-5 kg; lognormal SD95 335.29
  (same comment as for Arsenic)
- Vanadium [emissions to water, groundwater]: 9.8203e-10 kg; lognormal SD95 16.766
  (same comment as for Arsenic)
- Sulfate [emissions to water, groundwater]: 0.00024329 kg; lognormal SD95 16.784
  (same comment as for Arsenic)
- Scandium [emissions to water, groundwater]: 4.886e-10 kg; lognormal SD95 9.844
  (same comment as for Arsenic)
- Copper [emissions to water, groundwater]: 3.0842e-9 kg; lognormal SD95 10.138
  (same comment as for Arsenic)
- Fluoride [emissions to water, groundwater]: 1.2485e-7 kg; lognormal SD95 2.2088
  (same comment as for Arsenic)
- Magnesium [emissions to water, groundwater]: 1.872e-5 kg; lognormal SD95 11.266
  (same comment as for Arsenic)
- Tungsten [emissions to water, groundwater, long-term]: 1.8649e-8 kg; lognormal SD95 1.8652
  (same comment as for Arsenic)
- Nitrate [emissions to water, groundwater, long-term]: 0.0001865 kg; lognormal SD95 1.0275
  (same comment as for Arsenic)
- Nitrate [emissions to water, groundwater]: 2.3076e-6 kg; lognormal SD95 3.2146
  (same comment as for Arsenic)
- Beryllium [emissions to water, groundwater]: 3.646e-10 kg; lognormal SD95 6.6241
  (same comment as for Arsenic)
- Calcium [emissions to water, groundwater, long-term]: 0.0031802 kg; lognormal SD95 14.907
  (same comment as for Arsenic)
- Beryllium [emissions to water, groundwater, long-term]: 2.1839e-7 kg; lognormal SD95 5.5669
  (same comment as for Arsenic)
- Antimony [emissions to water, groundwater]: 9.3786e-11 kg; lognormal SD95 8.8992
  (same comment as for Arsenic)
- Arsenic [emissions to water, groundwater]: 8.9564e-10 kg; lognormal SD95 8.6738
  (same comment as for Arsenic)
- Iron [emissions to water, groundwater, long-term]: 0.00023559 kg; lognormal SD95 43.235
  (same comment as for Arsenic)
- Cadmium [emissions to water, groundwater]: 1.4827e-10 kg; lognormal SD95 8.8421
  (same comment as for Arsenic)
- Potassium [emissions to water, groundwater]: 1.8572e-6 kg; lognormal SD95 9.1787
  (same comment as for Arsenic)
- Molybdenum [emissions to water, groundwater, long-term]: 7.0348e-7 kg; lognormal SD95 7.6123
  (same comment as for Arsenic)
- Phosphate [emissions to water, groundwater]: 6.5699e-5 kg; lognormal SD95 5.0312
  (same comment as for Arsenic)
- Tin [emissions to water, groundwater, long-term]: 1.7093e-8 kg; lognormal SD95 132.07
  (same comment as for Arsenic)
- Silicon [emissions to water, groundwater, long-term]: 0.0014108 kg; lognormal SD95 270.93
  (same comment as for Arsenic)
- Barium [emissions to water, groundwater]: 5.0269e-9 kg; lognormal SD95 13.05
  (same comment as for Arsenic)
- Silicon [emissions to water, groundwater]: 2.3552e-6 kg; lognormal SD95 10.101
  (same comment as for Arsenic)
- Cadmium [emissions to water, groundwater, long-term]: 8.8814e-8 kg; lognormal SD95 4.781
  (same comment as for Arsenic)
- Mercury [emissions to water, groundwater, long-term]: 4.8499e-8 kg; lognormal SD95 4.3185
  (same comment as for Arsenic)
- Lead [emissions to water, groundwater]: 8.7195e-11 kg; lognormal SD95 18.741
  (same comment as for Arsenic)
- Sulfate [emissions to water, groundwater, long-term]: 0.014252 kg; lognormal SD95 13.411
  (same comment as for Arsenic)
- Manganese [emissions to water, groundwater]: 8.9128e-7 kg; lognormal SD95 14.519
  (same comment as for Arsenic)
- Magnesium [emissions to water, groundwater, long-term]: 0.0017607 kg; lognormal SD95 8.2085
  (same comment as for Arsenic)
- Silver [emissions to water, groundwater, long-term]: 3.1241e-9 kg; lognormal SD95 1.1395
  (same comment as for Arsenic)
- Mercury [emissions to water, groundwater]: 9.9924e-11 kg; lognormal SD95 8.1091
  (same comment as for Arsenic)
- Tungsten [emissions to water, groundwater]: 4.4526e-11 kg; lognormal SD95 4.8403
  (same comment as for Arsenic)
- Scandium [emissions to water, groundwater, long-term]: 2.8324e-7 kg; lognormal SD95 20.211
  (same comment as for Arsenic)
- Lead [emissions to water, groundwater, long-term]: 5.223e-8 kg; lognormal SD95 127.27
  (same comment as for Arsenic)
- Nickel [emissions to water, groundwater]: 3.3029e-8 kg; lognormal SD95 7.3179
  (same comment as for Arsenic)
- Chromium VI [emissions to water, groundwater]: 1.8966e-9 kg; lognormal SD95 11.004
  (same comment as for Arsenic)
- Manganese [emissions to water, groundwater, long-term]: 0.00014113 kg; lognormal SD95 10.382
  (same comment as for Arsenic)
- Selenium [emissions to water, groundwater, long-term]: 5.0752e-7 kg; lognormal SD95 11.061
  (same comment as for Arsenic)
- Copper [emissions to water, groundwater, long-term]: 1.7993e-6 kg; lognormal SD95 5.7027
  (same comment as for Arsenic)
- Phosphate [emissions to water, groundwater, long-term]: 0.00056438 kg; lognormal SD95 4.3461
  (same comment as for Arsenic)
- Strontium [emissions to water, groundwater]: 4.9465e-7 kg; lognormal SD95 5.0583
  (same comment as for Arsenic)
- Aluminium [emissions to water, groundwater]: 1.1828e-7 kg; lognormal SD95 11.895
  (same comment as for Arsenic)
- Selenium [emissions to water, groundwater]: 1.4229e-9 kg; lognormal SD95 16.661
  (same comment as for Arsenic)
- Cobalt [emissions to water, groundwater, long-term]: 3.47e-6 kg; lognormal SD95 7.4984
  (same comment as for Arsenic)
- Thallium [emissions to water, groundwater, long-term]: 1.2629e-8 kg; lognormal SD95 26.33
  (same comment as for Arsenic)
- Tin [emissions to water, groundwater]: 2.8535e-11 kg; lognormal SD95 9.1819
  (same comment as for Arsenic)
- Iron [emissions to water, groundwater]: 3.933e-7 kg; lognormal SD95 13.36
  (same comment as for Arsenic)
- Fluoride [emissions to water, groundwater, long-term]: 1.7351e-6 kg; lognormal SD95 1.0953
  (same comment as for Arsenic)
- Silver [emissions to water, groundwater]: 4.1588e-10 kg; lognormal SD95 1.9195
  (same comment as for Arsenic)
- Thallium [emissions to water, groundwater]: 2.1083e-11 kg; lognormal SD95 7.5074
  (same comment as for Arsenic)
- Antimony [emissions to water, groundwater, long-term]: 5.3508e-8 kg; lognormal SD95 13.657
  (same comment as for Arsenic)
- Nickel [emissions to water, groundwater, long-term]: 1.6046e-5 kg; lognormal SD95 3.7123
  (same comment as for Arsenic)
- Titanium [emissions to water, groundwater, long-term]: 1.3236e-6 kg; lognormal SD95 1818.3
  (same comment as for Arsenic)
- Molybdenum [emissions to water, groundwater]: 1.3182e-9 kg; lognormal SD95 8.9098
  (same comment as for Arsenic)
- Strontium [emissions to water, groundwater, long-term]: 6.1426e-5 kg; lognormal SD95 2.8035
  (same comment as for Arsenic)
- Chloride [emissions to water, groundwater, long-term]: 0.00043275 kg; lognormal SD95 1.3381
  (same comment as for Arsenic)
- Zinc [emissions to water, groundwater]: 2.6404e-8 kg; lognormal SD95 14.795
  (same comment as for Arsenic)
- Potassium [emissions to water, groundwater, long-term]: 0.001015 kg; lognormal SD95 9.0065
  (same comment as for Arsenic)
- Barium [emissions to water, groundwater, long-term]: 3.0111e-6 kg; lognormal SD95 91.054
  (same comment as for Arsenic)

## Sampling procedure
Disposal model based on observed leachate concentrations in literature. Extrapolated to 60'000 years heeding chemical characteristics. Initial spoil composition from various literature sources.

## Sources
- Dones R., Bauer C., Bolliger R., Burger B., Heck T., Roeder A., Faist Emmenegger M., Frischknecht R., Jungbluth N., Tuchschmid M., 2007, 2007 - LCI energy systems - Dones, Final report ecoinvent data v2.0, 6, Swiss Centre for LCI, PSI, Duebendorf, Villigen and Uster, CH
Dones R., Bauer C., Bolliger R., Burger B., Faist Emmenegger M., Frischknecht R., Heck T., Jungbluth N., Röder A. (2007) Sachbilanzen von Energiesystemen. Final report ecoinvent data v2.0. Volume: 6. Swiss Centre for LCI, PSI. Dübendorf and Villigen, CH.
Type: Measurement on site
Source: CD-ROM
First author: Dones R.
Other authors: Bauer C., Bolliger R., Burger B., Faist Emmenegger M., Frischknecht R., Heck T., Jungbluth N., Röder A.
Year: 2007
Title of anthology: Final report ecoinvent data v2.0
Place of publication: Dübendorf and Villigen, CH
Publisher: Swiss Centre for LCI, PSI
Volume No: 6

## Validation
Proof reading validation: passed.; Other validation: none;
