# Soybeans, at farm

Dataset: EcoSpold 1, unit process
Functional unit: 1 kg
Category: agricultural / plant production
Geography: BR
Time period: 2004-01 to 2006-12
Production volume: Total production in Brazill is around 50 Million tons.
Share of production covered: 100 %
Generated by: Juergen Sutter
accessRestrictedTo: 0
copyright: true

## General comment
The inventory for the cultivation of soybeans in Brazil is modelled with data from literature. Some data are extrapolated from Europe (production of fertilizers and pesticides) or Switzerland , (machine use). The transports are modelled with standard distances. The functional unit is 1 kg soybeans (fresh mass with a water content of 11 %). Carbon content: 0.388 kg/kg fresh mass. Biomass energy content: 20.45 MJ/kg fresh mass. Yield: 2544 kg/ha. The emissions of N2O and NH3 to air are calculated standard factors for mineral fertilizers from Nemecek et al. 2004 and standard factors for the emission from the crop residue from Ostermayer 2002. The emission of nitrate to water is calculated with a nitrogen loss factor of 30%. The CO2 emissions caused by the transformation from tropical rainforest are calculated as "carbon dioxide, land transformation". The carbon which is bound in the tropical rainforest soil is calculated as "carbon organic matter, soil". ;

## Included processes
Cultivation of soybeans in Brazil including use of diesel, machines, fertilizers, and pesticides.

## Technology
Cultivation of soybeans

## Time period
Time of publications

## Reference product
- Soybeans, at farm [BR]: 1 kg
  BRAZIL

## Inputs from technosphere
- Triple superphosphate, as P2O5, at regional storehouse [RER]: 0.00189 kg; lognormal SD95 1.16
  (3,3,1,1,1,4); FAO 2004
- Combine harvesting [CH]: 0.000125 ha; lognormal SD95 1.27
  (3,3,3,3,1,5); Cederberg 2001; Ostermayer 2007
- Single superphosphate, as P2O5, at regional storehouse [RER]: 0.00342 kg; lognormal SD95 1.16
  (3,3,1,1,1,4); FAO 2004
- Pea seed IP, at regional storehouse [CH]: 0.0417 kg; lognormal SD95 1.68
  (4,5,na,na,4,5); Nemecek 2004
- Transport, freight, lorry, fleet average [CH]: 0.0157 tkm; lognormal SD95 2.09
  (4,5,na,na,na,na); Standard Distances
- Phosphate rock, as P2O5, beneficiated, dry, at plant [MA]: 0.00059 kg; lognormal SD95 1.16
  (3,3,1,1,1,4); FAO 2004
- Transport, freight, lorry, 16t-32t gross weight, fleet average [CH]: 0.00236 tkm; lognormal SD95 2.09
  (4,5,na,na,na,na); Standard Distances
- Application of plant protection products, by field sprayer [CH]: 0.000299 ha; lognormal SD95 1.27
  (3,3,3,3,1,5); Cederberg 2001; Ostermayer 2007
- Potassium chloride, as K2O, at regional storehouse [RER]: 0.0118 kg; lognormal SD95 1.16
  (3,3,1,1,1,4); FAO 2004
- Pesticide unspecified, at regional storehouse [RER]: 2.59e-5 kg; lognormal SD95 1.33
  (3,3,4,1,1,5); Cederberg 2001
- Tillage, harrowing, by spring tine harrow [CH]: 0.000349 ha; lognormal SD95 1.27
  (3,3,3,3,1,5); Cederberg 2001; Ostermayer 2007
- Transport, freight, rail [RER]: 0.00236 tkm; lognormal SD95 2.09
  (4,5,na,na,na,na); Standard Distances
- Provision, stubbed land [BR]: 0.0622 m2; lognormal SD95 1.05
  (1,1,1,1,1,1); FAOSTAT 2006; USDA 2004
- Diammonium phosphate, as P2O5, at regional storehouse [RER]: 0.00531 kg; lognormal SD95 1.16
  (3,3,1,1,1,4); FAO 2004
- [sulfonyl]urea-compounds, at regional storehouse [RER]: 0.000256 kg; lognormal SD95 1.33
  (3,3,4,1,1,5); Cederberg 2001
- Organophosphorus-compounds, at regional storehouse [RER]: 2.2e-6 kg; lognormal SD95 1.33
  (3,3,4,1,1,5); Cederberg 2001
- Ammonium nitrate phosphate, as P2O5, at regional storehouse [RER]: 0.00059 kg; lognormal SD95 1.16
  (3,3,1,1,1,4); FAO 2004
- Phenoxy-compounds, at regional storehouse [RER]: 0.000295 kg; lognormal SD95 1.33
  (3,3,4,1,1,5); Cederberg 2001
- Tillage, ploughing [CH]: 0.000109 ha; lognormal SD95 1.27
  (3,3,3,3,1,5); Cederberg 2001; Ostermayer 2007
- Sowing [CH]: 0.000239 ha; lognormal SD95 1.27
  (3,3,3,3,1,5); Cederberg 2001; Ostermayer 2006
- Fertilising, by broadcaster [CH]: 6.28e-5 ha; lognormal SD95 1.27
  (3,3,3,3,1,5); Cederberg 2001; Ostermayer 2007
- Transport, barge [RER]: 0.0059 tkm; lognormal SD95 2.09
  (4,5,na,na,na,na); Standard Distances

## Inputs from nature
- Transformation, to annual crop, non-irrigated [resources, land]: 3.93 m2; lognormal SD95 1.2
  (1,1,1,1,1,1); FAOSTAT 2006
- Carbon, organic, in soil or biomass stock [resources, in ground]: 0.0766 kg; lognormal SD95 1.24
  (4,3,1,1,1,4); calculated from the deforestation
- Transformation, from shrub land, sclerophyllous [resources, land]: 0.103 m2; lognormal SD95 2
  (1,1,1,1,1,1); FAOSTAT 2006; USDA 2004
- Energy, gross calorific value, in biomass [resources, biotic]: 20.5 MJ; lognormal SD95 1.24
  (4,3,1,1,1,4); calculated from the energy balance
- Transformation, from forest, intensive, clear-cutting [resources, land]: 0.0622 m2; lognormal SD95 2
  (1,1,1,1,1,1); FAOSTAT 2006; USDA 2004
- Occupation, annual crop, non-irrigated [resources, land]: 1.97 m2a; lognormal SD95 1.1
  (1,1,1,3,1,1); FAOSTAT 2006; Nemecek 2004
- Carbon dioxide, in air [resources, in air]: 1.37 kg; lognormal SD95 1.24
  (4,3,1,1,1,4); calculated from the carbon balance
- Transformation, from annual crop, non-irrigated [resources, land]: 3.77 m2; lognormal SD95 1.2
  (1,1,1,1,1,1); FAOSTAT 2006; USDA 2004

## Emissions to nature
- Nitrogen oxides [emissions to air, low. pop.]: 0.000182 kg; lognormal SD95 1.58
  (4,3,1,3,1,4); Calculated with standard method
- Nitrate [emissions to water, groundwater]: 0.0366 kg; lognormal SD95 1.58
  (4,3,1,3,1,4); Ostermayer 2002
- 2,4-D [emissions to soil, agricultural]: 0.000295 kg; lognormal SD95 1.32
  (4,3,1,1,1,4); Calculated from the pesticide application
- Nickel [emissions to soil, agricultural]: -3.68e-6 kg; lognormal SD95 1.58
  (4,3,1,1,1,4); Calculated from the fertilizer application
- Zinc [emissions to soil, agricultural]: -3.55e-5 kg; lognormal SD95 1.58
  (4,3,1,1,1,4); Calculated from the fertilizer application
- Monocrotophos [emissions to soil, agricultural]: 2.59e-5 kg; lognormal SD95 1.32
  (4,3,1,1,1,4); Calculated from the pesticide application
- Glyphosate [emissions to soil, agricultural]: 2.2e-6 kg; lognormal SD95 1.32
  (4,3,1,1,1,4); Calculated from the pesticide application
- Endosulfan [emissions to soil, agricultural]: 4.4e-5 kg; lognormal SD95 1.32
  (4,3,1,1,1,4); Calculated from the pesticide application
- Chromium [emissions to soil, agricultural]: 2.28e-6 kg; lognormal SD95 1.58
  (4,3,1,1,1,4); Calculated from the fertilizer application
- Dinitrogen monoxide [emissions to air, low. pop.]: 0.000865 kg; lognormal SD95 1.58
  (4,3,1,3,1,4); Calculated with standard method
- Phosphorus [emissions to water, river]: 0.000315 kg; lognormal SD95 1.58
  (4,3,1,3,1,4); Calculated with standard method
- Cadmium [emissions to soil, agricultural]: 3.73e-7 kg; lognormal SD95 1.58
  (4,3,1,1,1,4); Calculated from the fertilizer application
- Carbon dioxide, land transformation [emissions to air, low. pop.]: 0.281 kg; lognormal SD95 1.49
  (4,3,1,3,1,4); Carbon loss from soil after deforestation
- Copper [emissions to soil, agricultural]: -1.21e-5 kg; lognormal SD95 1.58
  (4,3,1,1,1,4); Calculated from the fertilizer application
- Ammonia [emissions to air, low. pop.]: 0.000905 kg; lognormal SD95 1.32
  (4,3,1,3,1,4); Calculated with standard method
- Lead [emissions to soil, agricultural]: 2.09e-6 kg; lognormal SD95 1.58
  (4,3,1,1,1,4); Calculated from the fertilizer application
- Diflubenzuron [emissions to soil, agricultural]: 0.000212 kg; lognormal SD95 1.32
  (4,3,1,1,1,4); Calculated from the pesticide application
- Phosphorus [emissions to water, groundwater]: 2.75e-5 kg; lognormal SD95 1.58
  (4,3,1,3,1,4); Calculated with standard method

## Sampling procedure
Literature data

## Extrapolations
The usage of agricultural machines is extrapolated with Swiss equipment and Brazilian diesel consumption. Transports are modelled with standard distances. Emissions are calculated with standard methods.

## Uncertainty adjustments
en

## Sources
- Jungbluth N., Chudacoff M., Dauriat A., Dinkel F., Doka G., Faist Emmenegger M., Gnansounou E., Kljun N., Spielmann M., Stettler C., Sutter J., 2007, 2007 - LCI bioenergy - Jungbluth, Final report ecoinvent data v2.0, 17, Swiss Centre for LCI, ESU-services Ltd., Duebendorf and Uster, CH
Jungbluth N., Chudacoff M., Dauriat A., Dinkel F., Doka G., Faist Emmenegger M., Gnansounou E., Kljun N., Spielmann M., Stettler C., Sutter J. (2007) Life Cycle Inventories of Bioenergy. Final report ecoinvent data v2.0. Volume: 17. Swiss Centre for LCI, ESU. Duebendorf and Uster, CH.
Type: Measurement on site
Source: CD-ROM
First author: Jungbluth N.
Other authors: Chudacoff M., Dauriat A., Dinkel F., Doka G., Faist Emmenegger M., Gnansounou E., Kljun N., Spielmann M., Stettler C., Sutter J.
Year: 2007
Title of anthology: Final report ecoinvent data v2.0
Place of publication: Duebendorf and Uster, CH
Publisher: Swiss Centre for LCI, ESU
Volume No: 17

## Validation
Proof reading validation: passed.; Other validation: none;
