# Ethanol, from wheat straw pellets, at fuelling station

Dataset: EcoSpold 1, unit process
Functional unit: 1 kg
Category: fuels / biofuels\Ethanol\Transformation
Geography: RER
Time period: 2020-01 to 2020-12
Generated by: Romain Sacchi
accessRestrictedTo: 3
copyright: False

## General comment
Inventories on first, second and third generation biofuels production.Based on Masters thesis at PSI in 2018. Has not been thoroughly peer reviewed, though datasets have been used in several peer reviewed publications. Original source: Life Cycle Assessment of Biofuels in EU/CH, F. Cozzolini 2018, PSI.

## Time period
Base technology year of 2020

## Reference product
- Ethanol, from wheat straw pellets, at fuelling station [RER]: 1 kg

## Inputs from technosphere
All rows: lognormal SD95 1.26103
- Heat, heavy fuel oil, at industrial furnace 1MW [CH]: 0.000584 MJ
  Uncertainty from pedigree matrix: (3, 5, 3, 1, 1, 3)
- Transport, freight, rail [RER]: 0.0336 tkm
  Uncertainty from pedigree matrix: (3, 5, 3, 1, 1, 3)
- Regional distribution, oil products [RER]: 2.6e-10 p
  Uncertainty from pedigree matrix: (3, 5, 3, 1, 1, 3)
- Electricity, low voltage, production ENTSO-E, at grid [ENTSO-E]: 0.0067 kWh
  Uncertainty from pedigree matrix: (3, 5, 3, 1, 1, 3)
- Tap water, at user [RER]: 0.000689 kg
  Uncertainty from pedigree matrix: (3, 5, 3, 1, 1, 3)
- Transport, freight, lorry, 16t-32t gross weight, fleet average [RER]: 0.0326 tkm
  Uncertainty from pedigree matrix: (3, 5, 3, 1, 1, 3)
- Ethanol from wheat straw pellets [RER]: 1 kg
  Uncertainty from pedigree matrix: (3, 5, 3, 1, 1, 3)
- Treatment, rainwater mineral oil storage, to wastewater treatment, class 2 [CH]: 7.5e-5 m3
  Uncertainty from pedigree matrix: (3, 5, 3, 1, 1, 3)
- Disposal, municipal solid waste, 22.9% water, to municipal incineration [CH]: 6.27e-6 kg
  Uncertainty from pedigree matrix: (3, 5, 3, 1, 1, 3)
- Treatment, sewage, from residence, to wastewater treatment, class 2 [CH]: 6.89e-7 m3
  Uncertainty from pedigree matrix: (3, 5, 3, 1, 1, 3)

## Sources
- Sacchi R., Bauer C., 2023, 2023 - LCI on-road vehicles - Sacchi, PSI, Villigen, CH
doi: 10.5281/ZENODO.5156043
