# Cyanazine, at regional storehouse

Dataset: EcoSpold 1, unit process
Functional unit: 1 kg
Category: chemicals / pesticides
Geography: RER
Time period: 1987-01 to 1987-12
Share of production covered: 100 %
Generated by: Juergen Sutter
accessRestrictedTo: 0
copyright: true

## General comment
Production of cyanazine estimated with triazine-compounds production.;

## Geography
The inventory is modelled for Europe.

## Technology
cyanazine

## Time period
Time of publications

## Reference product
- Cyanazine, at regional storehouse [RER]: 1 kg
  Europe

## Inputs from technosphere
- Chlorine, liquid, production mix, at plant [RER]: 1.2455 kg; lognormal SD95 1.3765
  (4,5,1,1,1,5); Stoechiometric calculation
- Sodium hydroxide, 50% in H2O, production mix, at plant [RER]: 1.2453 kg; lognormal SD95 1.3765
  (4,5,1,1,1,5); Stoechiometric calculation
- Electricity, medium voltage, production ENTSO-E, at grid: 1.4244 kWh; lognormal SD95 1.3765
  (4,5,1,1,1,5); Estimation
- Butene, mixed, at plant [RER]: 0.095074 kg; lognormal SD95 1.3765
  (4,5,1,1,1,5); Stoechiometric calculation
- Water, decarbonised, at plant [RER]: 0.059591 kg; lognormal SD95 1.3765
  (4,5,1,1,1,5); Stoechiometric calculation
- Hydrogen cyanide, at plant [RER]: 0.52623 kg; lognormal SD95 1.3765
  (4,5,1,1,1,5); Stoechiometric calculation
- Chemical plant, organics [RER]: 1.6987e-9 p; lognormal SD95 3.0909
  (4,5,na,na,na,na); Estimation
- Transport, freight, rail [RER]: 3.9198 tkm; lognormal SD95 2.095
  (4,5,na,na,na,na); Standard distances
- Sulphuric acid, liquid, at plant [RER]: 0.31654 kg; lognormal SD95 1.3765
  (4,5,1,1,1,5); Stoechiometric calculation
- Isopropanol, at plant [RER]: 0.1088 kg; lognormal SD95 1.3765
  (4,5,1,1,1,5); Stoechiometric calculation
- Transport, freight, lorry, fleet average [RER]: 0.6533 tkm; lognormal SD95 2.095
  (4,5,na,na,na,na); Standard distances
- Heat, unspecific, in chemical plant [RER]: 8.3967 MJ; lognormal SD95 1.3765
  (4,5,1,1,1,5); Estimation
- Ammonia, liquid, at regional storehouse [RER]: 0.12208 kg; lognormal SD95 1.3765
  (4,5,1,1,1,5); Stoechiometric calculation
- Ethanol from ethylene, at plant [RER]: 0.34868 kg; lognormal SD95 1.3765
  (4,5,1,1,1,5); Stoechiometric calculation

## Inputs from nature
- Water, cooling, unspecified natural origin/m3 [resources, in water]: 0.10192 m3; lognormal SD95 1.3765
  (4,5,1,1,1,5); Estimation

## Emissions to nature
- Ethanol [emissions to air, high. pop.]: 0.00069737 kg; lognormal SD95 1.6169
  (4,5,na,na,na,na); Estimation
- Chlorine [emissions to air, high. pop.]: 0.0024937 kg; lognormal SD95 1.6169
  (4,5,na,na,na,na); Estimation
- Ammonium, ion [emissions to water, river]: 0.0030701 kg; lognormal SD95 1.6169
  (4,5,na,na,na,na); Estimation
- Ammonia [emissions to air, high. pop.]: 0.00030257 kg; lognormal SD95 1.3713
  (4,5,na,na,na,na); Estimation
- Sulfur dioxide [emissions to air, high. pop.]: 1.0866e-5 kg; lognormal SD95 1.3001
  (4,5,na,na,na,na); Estimation
- Ethylamine [emissions to water, river]: 0.0014736 kg; lognormal SD95 3.0909
  (4,5,na,na,na,na); Estimation
- Heat, waste [emissions to air, high. pop.]: 5.1278 MJ; lognormal SD95 1.3765
  (4,5,1,1,1,5); Calculated from the electricity input
- Formate [emissions to water, river]: 0.06895 kg; lognormal SD95 3.0909
  (4,5,na,na,na,na); Estimation
- Carbon dioxide, fossil [emissions to air, high. pop.]: 0.31377 kg; lognormal SD95 1.3001
  (4,5,na,na,na,na); Estimation
- Sulfate [emissions to water, river]: 0.31008 kg; lognormal SD95 1.6169
  (4,5,na,na,na,na); Estimation
- Ethanol [emissions to water, river]: 0.0034171 kg; lognormal SD95 3.0909
  (4,5,na,na,na,na); Estimation
- 2-Propanol [emissions to water, river]: 0.0010662 kg; lognormal SD95 3.0909
  (4,5,na,na,na,na); Estimation
- Isopropylamine [emissions to water, river]: 0.00046218 kg; lognormal SD95 3.0909
  (4,5,na,na,na,na); Estimation
- Isopropylamine [emissions to air, high. pop.]: 0.00019257 kg; lognormal SD95 1.6169
  (4,5,na,na,na,na); Estimation
- Ethylamine [emissions to air, high. pop.]: 0.00061399 kg; lognormal SD95 1.6169
  (4,5,na,na,na,na); Estimation
- t-Butylamine [emissions to air, high. pop.]: 0.0002237 kg; lognormal SD95 1.6169
  (4,5,na,na,na,na); Estimation
- t-Butylamine [emissions to water, river]: 0.00053689 kg; lognormal SD95 3.0909
  (4,5,na,na,na,na); Estimation
- 2-Propanol [emissions to air, high. pop.]: 0.0002176 kg; lognormal SD95 1.6169
  (4,5,na,na,na,na); Estimation
- Sodium [emissions to water, river]: 0.53946 kg; lognormal SD95 5.1037
  (4,5,na,na,na,na); Estimation
- Chloride [emissions to water, river]: 1.0847 kg; lognormal SD95 3.0909
  (4,5,na,na,na,na); Estimation
- Water [emissions to water, unspecified]: 96.824 kg; lognormal SD95 2.5196
  (5,5,5,5,5,BU:1.05); All uncertainty-values set to 5.0 by default. Balance of input water

## Sampling procedure
Literature data

## Extrapolations
Transports and emissions are modelled with standard methods.

## Sources
- Nemecek T., Kaegi T., 2007, 2007 - LCI agricultural prod. systems - Nemecek, Ecoinvent report version 2.0, 15, Swiss Centre for LCI, ART, Duebendorf and Zuerich, CH
Nemecek, T., Kägi, T., Blaser, S. (2007) Life Cycle Inventories of Agricultural Production Systems. Ecoinvent report version 2.0. Editors: 0. Volume: 15. Swiss Centre for LCI, ART. Duebendorf and Zurich, CH.
Type: Measurement on site
Source: CD-ROM
First author: Nemecek, T.
Other authors: Kägi, T., Blaser, S.
Year: 2007
Name of editors: 0
Title of anthology: Ecoinvent report version 2.0
Place of publication: Duebendorf and Zurich, CH
Publisher: Swiss Centre for LCI, ART
Volume No: 15

## Validation
Proof reading validation: Passed.; Other validation: none;
