# Steel, electric, low-alloyed, at plant

Dataset: EcoSpold 1, unit process
Functional unit: 1 kg
Category: metals / extraction
Geography: CH
Time period: 2018-01 to 2020-12
Synonyms: 0
Generated by: Mischa Zschokke
accessRestrictedTo: 0
copyright: true

## General comment
Inventory for 1 kg steel, based on data from (Haupt, 2020)
economical allocation of EAF slag. Allocation factor of steel: 0.99. Remark: represents Swiss production (100 % electric arc furnace). 33.46% iron scrap from EU; 66.54% iron scrap from CH. Geography: Data relate to the plant in Switzerland

## Included processes
Included processes: Transports of scrap metal and other input materials to electric arc furnace, steel making process and casting.
Remark: This process produces secondary steel. Only scrap is used as iron bearing input.

## Geography
Switzerland

## Technology
Industry data.

## Time period
Time of publications.

## Reference product
- Steel, electric, low-alloyed, at plant [CH]: 1 kg

## Inputs from technosphere
All rows: lognormal SD95 1
- Anode, aluminium electrolysis [RER]: 0.0017086 kg
- Electric arc furnace converter [RER]: 4.2715e-11 p
- Hard coal mix, at regional storage [UCTE]: 0.0164 kg
- Iron scrap, at plant [CH]: 0.74857 kg
- Iron scrap, at plant [RER]: 0.37643 kg
- Natural gas, high pressure, at consumer [CH]: 0.75112 MJ
- Oxygen, liquid, at plant [RER]: 0.037863 kg
- Quicklime, in pieces, loose, at plant [CH]: 0.047991 kg
- Refractory, basic, packed, at plant [DE]: 0.010803 kg
- Transport, freight, rail, electricity without shunting [CH]: 0.13562 tkm
- Transport, freight, lorry, fleet average [CH]: 0.13393 tkm
- Aluminium alloy, AlMg3, at plant [RER]: 0.0013021 kg
- Chemicals inorganic, at plant [GLO]: 2.1835e-5 kg
- Ferromanganese, high-coal, 74.5% Mn, at regional storage [RER]: 0.011593 kg
- Sulphite, at plant [RER]: 0.0055082 kg
- Hydrochloric acid, 30% in H2O, at plant [RER]: 0.00014821 kg
- Sulphuric acid, liquid, at plant [RER]: 8.0959e-5 kg
- Disposal, slag, unalloyed electr. steel, 0% water, to residual material landfill [CH]: 0.015393 kg
- Disposal, dust, unalloyed EAF steel, 15.4% water, to residual material landfill [CH]: 0.016027 kg
- Disposal, inert waste, 5% water, to construction waste landfill [CH]: 0.019191, 0.0083383 kg (2 entries)
- Electricity, medium voltage, at grid [CH]: 0.44874 kWh
- Heat, light fuel oil, at industrial furnace 1MW [CH]: 0.039091 MJ

## Inputs from nature
- Water, cooling, unspecified natural origin/m3 [resources, in water]: 0.00095599 m3; lognormal SD95 1
- Water, unspecified natural origin, CH [resources, in water]: 9.0744e-5 m3; lognormal SD95 1

## Emissions to nature
- Cadmium [emissions to air, unspecified]: 1.4558e-8 kg; lognormal SD95 1
- Carbon monoxide, fossil [emissions to air, unspecified]: 0.0004928 kg; lognormal SD95 1
- Chromium [emissions to air, unspecified]: 3.5586e-8 kg; lognormal SD95 1
- Copper [emissions to air, unspecified]: 5.0144e-8 kg; lognormal SD95 1
- Dioxin, 2,3,7,8 Tetrachlorodibenzo-p- [emissions to air, unspecified]: 6.4702e-14 kg; lognormal SD95 1
- Hydrogen chloride [emissions to air, unspecified]: 6.8423e-7 kg; lognormal SD95 1
- Lead [emissions to water, unspecified]: 5.9041e-7, 1.9411e-8 kg (2 entries); lognormal SD95 1
- Mercury [emissions to water, unspecified]: 9.5436e-8, 3.8821e-10 kg (2 entries); lognormal SD95 1
- Nickel [emissions to air, unspecified]: 3.2351e-9 kg; lognormal SD95 1
- Nitrogen oxides [emissions to air, unspecified]: 8.7643e-5 kg; lognormal SD95 1
- PAH, polycyclic aromatic hydrocarbons [emissions to air, unspecified]: 1.3749e-7 kg; lognormal SD95 1
- Particulates, < 2.5 um [emissions to air, unspecified]: 8.5328e-6 kg; lognormal SD95 1
- Particulates, > 10 um [emissions to air, unspecified]: 3.0116e-6 kg; lognormal SD95 1
- Particulates, > 2.5 um, and < 10um [emissions to air, unspecified]: 8.5328e-6 kg; lognormal SD95 1
- Polychlorinated biphenyls [emissions to air, unspecified]: 8.8966e-10 kg; lognormal SD95 1
- Sulfur dioxide [emissions to air, unspecified]: 2.2791e-6 kg; lognormal SD95 1
- Zinc [emissions to air, unspecified]: 8.6847e-6 kg; lognormal SD95 1
- Carbon dioxide, fossil [emissions to air, unspecified]: 0.096619 kg; lognormal SD95 1
- Methane, fossil [emissions to air, unspecified]: 2.4422e-5 kg; lognormal SD95 1
- NMVOC, non-methane volatile organic compounds, unspecified origin [emissions to air, unspecified]: 2.4422e-5 kg; lognormal SD95 1
- Cadmium [emissions to water, unspecified]: 1.9411e-10 kg; lognormal SD95 1
- Copper [emissions to water, unspecified]: 9.5436e-8 kg; lognormal SD95 1
- Nickel [emissions to water, unspecified]: 3.8821e-9 kg; lognormal SD95 1
- Zinc [emissions to water, unspecified]: 3.1866e-7 kg; lognormal SD95 1
- Water [emissions to water, unspecified]: 0.908191 kg; lognormal SD95 2.5196
  (5,5,5,5,5,BU:1.05); All uncertainty-values set to 5.0 by default. Balance of input water

## Sampling procedure
Data from literature

## Extrapolations
Some generic datasets from ecoinvent have been used.

## Sources
- Zschokke M., Bolt P., Conrad S., 2021, 2021 - LCI steel and iron processes - Zschokke, Project report, Carbotech AG, Zuerich, CH

## Validation
27.02.2023
[steel, electric, low-alloyed, CH-v0.92.xlsx]X-Process
