# xxx Softwood, standing, under bark, in forest

Dataset: EcoSpold 1, unit process
Functional unit: 1 m3
Category: material, obsolete / wood, obsolete\extraction, obsolete
Geography: RER
Generated by: Hans-Joerg Althaus
accessRestrictedTo: 0
copyright: true

## General comment
The volume does not include the bark. CO2 assimilation is based on 49.4% carbon in the wood including the bark (10%). Biomass energy equals gross calorific value including bark.;
Synonyms: Spruce, Fichte;

## Included processes
Includes the CO2 absorption from air and the land use for the trees to grow. Forest road area is not included in the land use

## Technology
Natural growth. Relates to the forest area and CO2 from air needed to produce spruce. It is assumed, that other softwood species need similar time and area to grow.

## Reference product
- xxx Softwood, standing, under bark, in forest [RER]: 1 m3
  Europe

## Inputs from nature
- Wood, soft, standing [resources, biotic]: 1.1 m3; lognormal SD95 1.3
  (4,1,1,1,3,1,12)
- Transformation, from forest, extensive [resources, land]: 8.14 m2; lognormal SD95 2.1
  (2,3,1,3,3,5,8)
- Energy, gross calorific value, in biomass [resources, biotic]: 10100 MJ; lognormal SD95 1.3
  (4,1,1,1,3,1,12)
- Carbon dioxide, in air [resources, in air]: 897 kg; lognormal SD95 1.3
  (4,1,1,1,3,1,12)
- Transformation, to forest, intensive, normal [resources, land]: 8.14 m2; lognormal SD95 2.1
  (2,3,1,3,3,5,8)
- Occupation, forest, intensive, normal [resources, land]: 977 m2a; lognormal SD95 1.63
  (2,3,1,3,3,5,7)

## Sampling procedure
Literature

## Extrapolations
see Geography and Technology

## Uncertainty adjustments
The assumptions that different species are growing at the same rate as spruce and that Germany is representative for central Europe are considered in the uncertainties.

## Sources
- Werner F., Althaus H.-J., Kuenniger T., Richter K., Jungbluth N., 2007, 2007 - LCI wood as fuel and const. mat. - Werner, Final report ecoinvent data v2.0, 9, Swiss Centre for LCI, Empa - TSL, ESU-services Ltd., Duebendorf, CH
Werner F., Althaus H.-J., Künniger T., Richter K., Jungbluth N. (2007) 1Life Cycle Inventories of Wood as Fuel and Construction Material. Final report ecoinvent data v2.0. Volume: 9. Issue: 0. Swiss Centre for LCI, Empa - TSL. Dübendorf, CH.
Type: Measurement on site
Source: CD-ROM
First author: Werner F.
Other authors: Althaus H.-J., Künniger T., Richter K., Jungbluth N.
Year: 2007
Title of anthology: Final report ecoinvent data v2.0
Place of publication: Dübendorf, CH
Publisher: Swiss Centre for LCI, Empa - TSL
Volume No: 9
Issue No: 0

## Validation
Proof reading validation: passed; Other validation: none;
