# Crude oil, market mix, at long distance transport

Dataset: EcoSpold 1, unit process
Functional unit: 1 kg
Category: oil / transport
Geography: SG
Time period: 2023 to 2025
Production volume: 41.2 million tons of directly imported crude oil to SG region in 2023.
Generated by: Maresa Bussa
accessRestrictedTo: 0
copyright: true

## General comment
Calculation for transport distances assuming transport by pipeline offshore and onshore as well as sea transport in tanker. Sites and modes of transportation based on the supply situation in 2023.

## Included processes
Transportation of crude oil from exploration sites to refineries in SG-region. Includes transport service requirements and emissions from oil handling and evaporation.

## Geography
Calculations include production and transport of crude oil from 27 countries.

## Technology
Operation of crude oil pipelines by electricity.

## Time period
Transport modes investigated for 2023.

## Reference product
- Crude oil, market mix, at long distance transport [SG]: 1 kg

## Inputs from technosphere
- Crude oil, at production [AE]: 0.27012 kg; lognormal SD95 1.209
  (1,1,1,3,3,BU:1.05); In 2023, 11.132 megatons of crude oil are imported from United Arab Emirates to Singapore, assuming 44% offshore production. Assumed transport distances: Offshore, at origin: 100km by pipeline. Onshore, at origin: 100km by pipeline. For transport to destination: 6504km by ship plus additional 100km by onshore pipeline at destination. Port of origin for shipping is assumed to be Dubai or Abu Dhabi .
- Crude oil, at production [AO]: 0.0098612 kg; lognormal SD95 1.209
  (1,1,1,3,3,BU:1.05); In 2023, 0.406 megatons of crude oil are imported from Angola to Singapore, assuming 30% offshore production. Assumed transport distances: Offshore, at origin: 100km by pipeline. Onshore, at origin: 100km by pipeline. For transport to destination: 13338km by ship plus additional 100km by onshore pipeline at destination. Port of origin for shipping is assumed to be 0.
- Crude oil, at production [AR]: 0.0080626 kg; lognormal SD95 1.209
  (1,1,1,3,3,BU:1.05); In 2023, 0.332 megatons of crude oil are imported from Argentina to Singapore, assuming 30% offshore production. Assumed transport distances: Offshore, at origin: 100km by pipeline. Onshore, at origin: 500km by pipeline. For transport to destination: 17168km by ship plus additional 100km by onshore pipeline at destination. Port of origin for shipping is assumed to be Buenos Aires.
- Crude oil, at production [AU]: 0.035725 kg; lognormal SD95 1.209
  (1,1,1,3,3,BU:1.05); In 2023, 1.472 megatons of crude oil are imported from Australia to Singapore, assuming 75% offshore production. Assumed transport distances: Offshore, at origin: 268km by pipeline. Onshore, at origin: 800km by pipeline. For transport to destination: 4111km by ship plus additional 100km by onshore pipeline at destination. Port of origin for shipping is assumed to be Perth.
- Crude oil, at production [BR]: 0.028901 kg; lognormal SD95 1.209
  (1,1,1,3,3,BU:1.05); In 2023, 1.191 megatons of crude oil are imported from Brazil to Singapore, assuming 96.7% offshore production. Assumed transport distances: Offshore, at origin: 140km by pipeline. Onshore, at origin: 800km by pipeline. For transport to destination: 16609km by ship plus additional 100km by onshore pipeline at destination. Port of origin for shipping is assumed to be Santos.
- Crude oil, at production [CO]: 0.0064408 kg; lognormal SD95 1.209
  (1,1,1,3,3,BU:1.05); In 2023, 0.265 megatons of crude oil are imported from Colombia to Singapore, assuming 12.5% offshore production. Assumed transport distances: Offshore, at origin: 100km by pipeline. Onshore, at origin: 800km by pipeline. For transport to destination: 19998km by ship plus additional 100km by onshore pipeline at destination. Port of origin for shipping is assumed to be Tumaco.
- Crude oil, at production [DZ]: 0.0018394 kg; lognormal SD95 1.209
  (1,1,1,3,3,BU:1.05); In 2023, 0.076 megatons of crude oil are imported from Algeria to Singapore, assuming 0% offshore production. Assumed transport distances: Offshore, at origin: 100km by pipeline. Onshore, at origin: 700km by pipeline. For transport to destination: 12071km by ship plus additional 100km by onshore pipeline at destination. Port of origin for shipping is assumed to be Algiers.
- Crude oil, at production [EC]: 0.0040079 kg; lognormal SD95 1.209
  (1,1,1,3,3,BU:1.05); In 2023, 0.165 megatons of crude oil are imported from Ecuador to Singapore, assuming 2.4% offshore production. Assumed transport distances: Offshore, at origin: 100km by pipeline. Onshore, at origin: 300km by pipeline. For transport to destination: 19598km by ship plus additional 100km by onshore pipeline at destination. Port of origin for shipping is assumed to be Guayaquil.
- Crude oil, at production [GB]: 0.0011214 kg; lognormal SD95 1.209
  (1,1,1,3,3,BU:1.05); In 2023, 0.046 megatons of crude oil are imported from United Kingdom to Singapore, assuming 98% offshore production. Assumed transport distances: Offshore, at origin: 166km by pipeline. Onshore, at origin: 100km by pipeline. For transport to destination: 15349km by ship plus additional 100km by onshore pipeline at destination. Port of origin for shipping is assumed to be Southampton.
- Crude oil, at production [ID]: 0.017254 kg; lognormal SD95 1.209
  (1,1,1,3,3,BU:1.05); In 2023, 0.711 megatons of crude oil are imported from Indonesia to Singapore, assuming 36% offshore production. Assumed transport distances: Offshore, at origin: 100km by pipeline. Onshore, at origin: 100km by pipeline. For transport to destination: 976km by ship plus additional 100km by onshore pipeline at destination. Port of origin for shipping is assumed to be Tanjung Priok.
- Crude oil, at production [IQ]: 0.022546 kg; lognormal SD95 1.2077
  (1,1,1,1,3,BU:1.05); In 2023, 0.929 megatons of crude oil are imported from Iraq to Singapore, assuming 0% offshore production. Assumed transport distances: Offshore, at origin: 0km by pipeline. Onshore, at origin: 500km by pipeline. For transport to destination: 7200km by ship plus additional 100km by onshore pipeline at destination. Port of origin for shipping is assumed to be Basrah.
- Crude oil, at production [IR]: 0.080588 kg; lognormal SD95 1.209
  (1,1,1,3,3,BU:1.05); In 2023, 3.321 megatons of crude oil are imported from Iran to Singapore, assuming 15.8% offshore production. Assumed transport distances: Offshore, at origin: 100km by pipeline. Onshore, at origin: 400km by pipeline. For transport to destination: 7012km by ship plus additional 100km by onshore pipeline at destination. Port of origin for shipping is assumed to be Bahregan Sar Oilfield.
- Crude oil, at production [KR]: 0.0092714 kg; lognormal SD95 1.209
  (1,1,1,3,3,BU:1.05); In 2023, 0.382 megatons of crude oil are imported from South Korea to Singapore, assuming 30% offshore production. Assumed transport distances: Offshore, at origin: 100km by pipeline. Onshore, at origin: 100km by pipeline. For transport to destination: 4726km by ship plus additional 100km by onshore pipeline at destination. Port of origin for shipping is assumed to be Inchon.
- Crude oil, at production [KW]: 0.0014476 kg; lognormal SD95 1.209
  (1,1,1,3,3,BU:1.05); In 2023, 0.06 megatons of crude oil are imported from Kuwait to Singapore, assuming 1% offshore production. Assumed transport distances: Offshore, at origin: 100km by pipeline. Onshore, at origin: 20km by pipeline. For transport to destination: 7121km by ship plus additional 100km by onshore pipeline at destination. Port of origin for shipping is assumed to be Shuaiba.
- Crude oil, at production [KZ]: 0.002206 kg; lognormal SD95 1.2077
  (1,1,1,1,3,BU:1.05); In 2023, 0.091 megatons of crude oil are imported from Kazakhstan to Singapore, assuming 12.7% offshore production. Assumed transport distances: Offshore, at origin: 100km by pipeline. Onshore, at origin: 3400km by pipeline. For transport to destination: 11586km by ship plus additional 100km by onshore pipeline at destination. Port of origin for shipping is assumed to be Novorossiysk.
- Crude oil, at production [LY]: 0.0018189 kg; lognormal SD95 1.209
  (1,1,1,3,3,BU:1.05); In 2023, 0.075 megatons of crude oil are imported from Libya to Singapore, assuming 20% offshore production. Assumed transport distances: Offshore, at origin: 100km by pipeline. Onshore, at origin: 200km by pipeline. For transport to destination: 10736km by ship plus additional 100km by onshore pipeline at destination. Port of origin for shipping is assumed to be Sirtica Terminal.
- Crude oil, at production [MY]: 0.014127 kg; lognormal SD95 1.209
  (1,1,1,3,3,BU:1.05); In 2023, 0.582 megatons of crude oil are imported from Malaysia to Singapore, assuming 99% offshore production. Assumed transport distances: Offshore, at origin: 100km by pipeline. Onshore, at origin: 100km by pipeline. For transport to destination: 226km by ship plus additional 100km by onshore pipeline at destination. Port of origin for shipping is assumed to be Sungai UdangPort.
- Crude oil, at production [NG]: 0.013065 kg; lognormal SD95 1.209
  (1,1,1,3,3,BU:1.05); In 2023, 0.538 megatons of crude oil are imported from Nigeria to Singapore, assuming 90% offshore production. Assumed transport distances: Offshore, at origin: 60km by pipeline. Onshore, at origin: 140km by pipeline. For transport to destination: 15200km by ship plus additional 100km by onshore pipeline at destination. Port of origin for shipping is assumed to be Lagos.
- Crude oil, at production [NO]: 0.0031767 kg; lognormal SD95 1.209
  (1,1,1,3,3,BU:1.05); In 2023, 0.131 megatons of crude oil are imported from Norway to Singapore, assuming 100% offshore production. Assumed transport distances: Offshore, at origin: 195km by pipeline. Onshore, at origin: 200km by pipeline. For transport to destination: 16200km by ship plus additional 100km by onshore pipeline at destination. Port of origin for shipping is assumed to be Bergen.
- Crude oil, at production [OM]: 0.019019 kg; lognormal SD95 1.2077
  (1,1,1,1,3,BU:1.05); In 2023, 0.784 megatons of crude oil are imported from Oman to Singapore, assuming 0% offshore production. Assumed transport distances: Offshore, at origin: 100km by pipeline. Onshore, at origin: 100km by pipeline. For transport to destination: 5819km by ship plus additional 100km by onshore pipeline at destination. Port of origin for shipping is assumed to be Muscat.
- Crude oil, at production [QA]: 0.027871 kg; lognormal SD95 1.209
  (1,1,1,3,3,BU:1.05); In 2023, 1.149 megatons of crude oil are imported from Qatar to Singapore, assuming 69.3% offshore production. Assumed transport distances: Offshore, at origin: 50km by pipeline. Onshore, at origin: 100km by pipeline. For transport to destination: 6588km by ship plus additional 100km by onshore pipeline at destination. Port of origin for shipping is assumed to be Halul Island.
- Crude oil, at production [RU]: 0.0067413 kg; lognormal SD95 1.2077
  (1,1,1,1,3,BU:1.05); In 2023, 0.278 megatons of crude oil are imported from Russian Federation to Singapore, assuming 17.8% offshore production. Assumed transport distances: Offshore, at origin: 100km by pipeline. Onshore, at origin: 3800km by pipeline. For transport to destination: 17300km by ship plus additional 100km by onshore pipeline at destination. Port of origin for shipping is assumed to be St. Petersburg.
- Crude oil, at production [SA]: 0.1181 kg; lognormal SD95 1.2077
  (1,1,1,1,3,BU:1.05); In 2023, 4.867 megatons of crude oil are imported from Saudi Arabia to Singapore, assuming 34.6% offshore production. Assumed transport distances: Offshore, at origin: 100km by pipeline. Onshore, at origin: 1300km by pipeline. For transport to destination: 7200km by ship plus additional 100km by onshore pipeline at destination. Port of origin for shipping is assumed to be Ju' aimah.
- Crude oil, at production [TH]: 0.0062017 kg; lognormal SD95 1.2077
  (1,1,1,1,3,BU:1.05); In 2023, 0.256 megatons of crude oil are imported from Thailand to Singapore, assuming 80% offshore production. Assumed transport distances: Offshore, at origin: 100km by pipeline. Onshore, at origin: 100km by pipeline. For transport to destination: 1452km by ship plus additional 100km by onshore pipeline at destination. Port of origin for shipping is assumed to be Sriracha Oil terminals.
- Crude oil, at production [TR]: 0.0028255 kg; lognormal SD95 1.2077
  (1,1,1,1,3,BU:1.05); In 2023, 0.116 megatons of crude oil are imported from Turkey to Singapore, assuming 5% offshore production. Assumed transport distances: Offshore, at origin: 100km by pipeline. Onshore, at origin: 100km by pipeline. For transport to destination: 10742km by ship plus additional 100km by onshore pipeline at destination. Port of origin for shipping is assumed to be Gemlik.
- Crude oil, at production [US]: 0.28112 kg; lognormal SD95 1.2077
  (1,1,1,1,3,BU:1.05); In 2023, 11.585 megatons of crude oil are imported from United States to Singapore, assuming 14.6% offshore production. Assumed transport distances: Offshore, at origin: 286km by pipeline. Onshore, at origin: 1100km by pipeline. For transport to destination: 21700km by ship plus additional 100km by onshore pipeline at destination. Port of origin for shipping is assumed to be Houston.
- Crude oil, at production [VE]: 0.0068798 kg; lognormal SD95 1.209
  (1,1,1,3,3,BU:1.05); In 2023, 0.284 megatons of crude oil are imported from Venezuela to Singapore, assuming 30% offshore production. Assumed transport distances: Offshore, at origin: 100km by pipeline. Onshore, at origin: 100km by pipeline. For transport to destination: 19474km by ship plus additional 100km by onshore pipeline at destination. Port of origin for shipping is assumed to be Puerto La Cruz / Jose Petroterminal.
- Transport, transoceanic tanker [OCE]: 11.537 tkm; lognormal SD95 2.0618
  (3,2,1,3,3,BU:2); Calculation based on estimated shipping route and pipelines according to searates.com and export data for 2023.
- Transport, crude oil pipeline, offshore [OCE]: 0.046302 tkm; lognormal SD95 1.2377
  (3,2,1,3,3,BU:1.05); Calculation based on estimated shipping route and pipelines according to searates.com and export data for 2023.
- Transport, crude oil pipeline, onshore [RER]: 0.53434 tkm; lognormal SD95 1.2377
  (same comment as for Transport, crude oil pipeline, offshore)

## Emissions to nature
- Hydrocarbons, aliphatic, alkanes, unspecified [emissions to air, low. pop.]: 1.35e-6 kg; lognormal SD95 1.5913
  (3,4,4,1,1,BU:1.5); Evaporation losses for storage and handling
- Benzene [emissions to air, low. pop.]: 4.5e-7 kg; lognormal SD95 3.0703
  (3,4,4,1,1,BU:3); Evaporation losses for storage and handling
- Butane [emissions to air, low. pop.]: 0.00012642 kg; lognormal SD95 1.5913
  (3,4,4,1,1,BU:1.5); Evaporation losses for storage and handling
- Methane, fossil [emissions to air, low. pop.]: 1.498e-6 kg; lognormal SD95 1.5913
  (3,4,4,1,1,BU:1.5); Evaporation losses for storage and handling
- Ethane [emissions to air, low. pop.]: 1.601e-6 kg; lognormal SD95 1.5913
  (3,4,4,1,1,BU:1.5); Evaporation losses for storage and handling
- Hexane [emissions to air, low. pop.]: 5.3876e-5 kg; lognormal SD95 1.5913
  (3,4,4,1,1,BU:1.5); Evaporation losses for storage and handling
- Pentane [emissions to air, low. pop.]: 9.558e-5 kg; lognormal SD95 1.5913
  (3,4,4,1,1,BU:1.5); Evaporation losses for storage and handling
- Propane [emissions to air, low. pop.]: 6.1296e-5 kg; lognormal SD95 1.5913
  (3,4,4,1,1,BU:1.5); Evaporation losses for storage and handling
- Toluene [emissions to air, low. pop.]: 2.7e-7 kg; lognormal SD95 1.5913
  (3,4,4,1,1,BU:1.5); Evaporation losses for storage and handling

## Sampling procedure
Literature. Online calculators for distances. The consumption mix is calculated based on international trade statistics for 2023.

## Sources
- Meili C., Jungbluth N., Bussa M., Stefanel A., 2025, 2025 - LCI long-distance transport crude oil - Meili, Project report, 565, ESU-services Ltd., Schaffhausen, CH

## Validation
Passed.
https://esuservices-my.sharepoint.com/personal/jungbluth_esu-services_ch/Documents/ESU-intern/565 Beratung BAFU/EcoSpoldDataXML/[EcoSpold-oil-transport-2025-v1.0.xlsb]X-Process
