# Wind turbine 10MW, offshore, monopile substructure

Dataset: EcoSpold 1, unit process, infrastructure
Functional unit: 1 unit
Category: wind power / production of components
Geography: RER
Time period: 2024 to 2024
Share of production covered: 100 %
Generated by: Hanna Kroehnert
accessRestrictedTo: 0
copyright: true

## Included processes
Wind turbine substructure (including transition piece), at site including manufacturing, transports, installation, replacements, decommission and waste treatement. Calculated for FU of 1p.
Data of material inputs are based on the IEA reference 10MW offshore wind turbine using a monopile substructure.
The distance to installation port is assumed to be 80 km. The average water depth is 34 m.
Assumed lifetime is 25 years.

Main data source:
Kainz, S. (2025). Life Cycle Inventory of the IEA Wind 740-10-MW Reference Offshore Wind Plant with irregular layout [Dataset]. Zenodo. https://doi.org/10.5281/ZENODO.15880601

## Reference product
- Wind turbine 10MW, offshore, monopile substructure [RER]: 1 unit

## Inputs from technosphere
- Aluminium, production mix, at plant [RER]: 7035.3 kg; lognormal SD95 1.1466
  (2,3,3,2,1,3,BU:1.05); Input based on Kainz, S. (2025)
- Steel, low-alloyed, at plant [RER]: 1.0468e6 kg; lognormal SD95 1.1466
  (2,3,3,2,1,3,BU:1.05); Input based on Kainz, S. (2025)
- Coating powder, at plant [RER]: 12409 kg; lognormal SD95 1.1466
  (2,3,3,2,1,3,BU:1.05); Input based on Kainz, S. (2025)
- Gravel, crushed, at mine [CH]: 2.0057e6 kg; lognormal SD95 1.1466
  (2,3,3,2,1,3,BU:1.05); Input based on Kainz, S. (2025)
- Aluminium product manufacturing, average metal working [RER]: 7035.3 kg; lognormal SD95 1.1466
  (2,3,3,2,1,3,BU:1.05); Input based on Kainz, S. (2025)
- Sheet rolling, steel [RER]: 1.0468e6 kg; lognormal SD95 1.1466
  (2,3,3,2,1,3,BU:1.05); Input based on Kainz, S. (2025)
- Welding, arc, steel [RER]: 128.33 m; lognormal SD95 1.1466
  (2,3,3,2,1,3,BU:1.05); Input based on Kainz, S. (2025)
- Transport, freight, lorry, fleet average [RER]: 1.536e6 tkm; lognormal SD95 2.0675
  (4,3,3,1,1,3,BU:2); Includes the transportation of components to port of installation.
- Transport, freight, lorry, diesel, 26t gross weight, 2010, EURO-V, regional delivery [RER]: 279440 tkm; lognormal SD95 2.0675
  (4,3,3,1,1,3,BU:2); Includes the transportation of materials to component manufacturing site and components to waste treatement site.
- Transport, transoceanic freight ship [OCE]: 8.3284e7 tkm; lognormal SD95 2.2975
  (4,3,3,1,4,3,BU:2); Includes the transportation of components to installation port and vessel activiy for installation, replacements and decommissioning.
- Operation, freight train, diesel [RER]: 213260 tkm; lognormal SD95 2.0675
  (4,3,3,1,1,3,BU:2); Includes the transportation of components to port of installation.
- Diesel, burned in building machine, average [CH]: 30137 MJ; lognormal SD95 2.2975
  (4,3,3,1,4,3,BU:2); Refers to port crane operation during installation and decommissioning.
- Recycling steel and iron [RER]: 994500 kg; lognormal SD95 1.2748
  (2,4,3,3,3,3,BU:1.05); Own calculation; recycling of steel and iron; assumed recycling rate: 95%
- Disposal, steel, 0% water, to construction waste landfill [CH]: 52342 kg; lognormal SD95 1.2748
  (2,4,3,3,3,3,BU:1.05); Own calculation; landfill of steel and iron; assumed landfill rate: 5%
- Disposal, aluminium, 0% water, to sanitary landfill [CH]: 351.76 kg; lognormal SD95 1.2748
  (2,4,3,3,3,3,BU:1.05); Own calculation; landfill of aluminum; assumed landfill rate: 5%
- Disposal, inert material, 0% water, to sanitary landfill [CH]: 2.0181e6 kg; lognormal SD95 1.2748
  (2,4,3,3,3,3,BU:1.05); Own calculation; landfill of remaining materials (which are not classified as steel and iron, aluminum, copper or plastics); assumed landfill rate 100%

## Inputs from nature
- Transformation, from sea and ocean [resources, land]: 127.17 m2; lognormal SD95 2.095
  (4,1,1,1,1,5,BU:2); Own estimation
- Transformation, to industrial area, built up [resources, land]: 127.17 m2; lognormal SD95 2.095
  (4,1,1,1,1,5,BU:2); Own estimation
- Occupation, seabed, infrastructure [resources, land]: 3179.2 m2a; lognormal SD95 1.3164
  (4,1,1,1,1,5,BU:1.1); Own estimation

## Sources
- Kroehnert H., Frehner A., Stucki M., 2025, 2025 - LCI wind Energy - Kroehnert, Project report, 0, ZHAW, Waedenswil, CH

## Validation
22.07.2025
"S:\pools\n\N-IUNR-FG-LCA\Projekte\Wind LCA\LCI-Update\Sachbilanz"
