# Cable, printer cable, without plugs, at plant

Dataset: EcoSpold 1, unit process
Functional unit: 1 m
Category: electronics / devices
Geography: GLO
Time period: 2023-01 to 2029-12
Synonyms: Printer cord
Generated by: Lugas Raka Adrianto, Maulana Permana Ajie, Didier Beloin-Saint-Pierre
accessRestrictedTo: 0
copyright: false

## General comment
This dataset can be applied to describe the production of a typical printer cable to connect to the desktop or laptop computer. The total weight of 1 m of printer cable is 0.072 kg (without the belonging plugs). The information for this dataset is based on weighing, measurements and analysis at EMPA Laboratories. In 2023, only production efforts data are updated. Furthermore, material and energy input are now represented by global inventory flows;

## Included processes
Describes the production of a typical printer cable (connector). Calculated per 1 m of printer cable. Included are the materials copper, PVC, and aluminium with their attributed manufacturing processes like wire drawing or extrusion. The infrastructure is calculated via the proxy "electronic component production plant". Further inventoried are the electricity for the assembly of the connector, the fuel oil, propane and water input, the disposal of plastic and rubber parts, the VOC and methanol emissions created during the processing, plus the road and rail transportation for input materials from the regional storage to the production site. The accumulated hazardous waste is also reported.

## Geography
The data describes a typical printer cable in 2006. The kind of printer cable is produced by international manufacturers and available all over the world. Therefore a global dataset is justifiable.

## Technology
The manufacturing process is represented through plastic extrusion (PVC), sheet rolling (aluminium), and wire drawing (copper).

## Reference product
- Cable, printer cable, without plugs, at plant [GLO]: 1 m
  Global

## Inputs from technosphere
- Aluminium, primary, at plant [RER]: 0.0009 kg; lognormal SD95 1.33
  (1,4,4,3,1,5,BU:1.06)
- Copper, primary, at refinery [GLO]: 0.0196 kg; lognormal SD95 1.33
  (2,4,4,3,1,5,BU:1.06)
- Electricity, medium voltage, production GLO, at grid [GLO]: 0.074832 kWh; lognormal SD95 1.33
  (2,4,4,3,1,5,BU:1.06)
- Extrusion, plastic pipes [RER]: 0.0525 kg; lognormal SD95 1.33
  (2,4,4,3,1,5,BU:1.06)
- Heat, heavy fuel oil, at industrial furnace 1MW [RER]: 0.0360464 MJ; lognormal SD95 1.33
  (2,4,4,3,1,5,BU:1.06)
- Polyvinylchloride, at regional storage [RER]: 0.0525 kg; lognormal SD95 1.33
  (2,4,4,3,1,5,BU:1.06)
- Printed wiring board mounting plant [GLO]: 1.4976e-8 p; lognormal SD95 3.11
  (2,4,4,3,1,5,BU:3.00)
- Propane, butane, at refinery [RER]: 1.3355e-5 kg; lognormal SD95 1.33
  (2,4,4,3,1,5,BU:1.06)
- Sheet rolling, aluminium [RER]: 0.0009 kg; lognormal SD95 1.33
  (1,4,4,3,1,5,BU:1.06)
- Tap water, at user [RER]: 1.452 kg; lognormal SD95 1.33
  (2,4,4,3,1,5,BU:1.06)
- Transport, freight, rail [RER]: 0.0146 tkm; lognormal SD95 2.12
  (3,4,4,3,1,5,BU:2.00)
- Transport, freight, lorry, fleet average [RER]: 0.0073 tkm; lognormal SD95 2.12
  (3,4,4,3,1,5,BU:2.00)
- Wire drawing, copper [RER]: 0.0196 kg; lognormal SD95 1.33
  (2,4,4,3,1,5,BU:1.06)
- Disposal, hazardous waste, 25% water, to hazardous waste incineration [CH]: 0.00022065 kg; lognormal SD95 1.33
  (1,4,4,3,1,5,BU:1.06)
- Disposal, plastics, mixture, 15.3% water, to municipal incineration [CH]: 0.0018194 kg; lognormal SD95 1.33
  (2,4,4,3,1,5,BU:1.06)

## Emissions to nature
- Methanol [emissions to air, low. pop.]: 9.2903e-6 kg; lognormal SD95 2.11
  (1,4,4,3,1,5,BU:2.00)
- NMVOC, non-methane volatile organic compounds, unspecified origin [emissions to air, low. pop.]: 6.9677e-6 kg; lognormal SD95 2.11
  (1,4,4,3,1,5,BU:2.00)

## Sampling procedure
Weighing and measuring of materials. Literature for electricity consumption (assembly), emissions and waste.

## Extrapolations
see Geography and Technology

## Sources
- Raka Adrianto L., Permana Ajie M., Beloin-Saint-Pierre D., 2024, 2024 - LCI ICT sector - Raka Adrianto, Empa, St. Gallen, CH

## Validation
Proof reading validation: Passed, Other validation: none, Validator: Mischa Zschokke, Company: Carbotech, Country: CH
