# xx Aircraft, freight

Dataset: EcoSpold 1, unit process, infrastructure
Functional unit: 1 p
Category: transport systems / transport, obsolete\air, obsolete\infrastucture, obsolete
Geography: RER
Time period: 2000-01 to 2000-12
Production volume: 50% of the world wide commercial airliner orders.
Generated by: Michael Spielmann
accessRestrictedTo: 0
copyright: true

## General comment
Material consumption values refer to the production of one average aircraft in the referring class (net weight 234t). Interventions for manufacturing processes of vehicles are derived from specific exchanges per seat. (367 seats/unit). Data represent 16 European sites of Airbus.;

## Included processes
The inventory includes processes of material, energy and water use in vehicle manufacturing. Also, VOC emissions are accounted for. Rail and road transport of materials are considered. Plant infrastructure is not included. Energy consumption for de-ionised water is included in the electricty value. Material expenditures are not accounted for. Transport of vehicle parts between the different sites is excluded.

## Geography
Vehicle manufacturing data are taken from 16 production site in Germany, France, Spain and the UK

## Technology
Current production technology, environmental issues have been addressed in the past.

## Reference product
- xx Aircraft, freight [RER]: 1 p
  Europe

## Inputs from technosphere
- Natural gas, burned in industrial furnace 1MWth [CH]: 1.74e7 MJ; lognormal SD95 1.07
  (1,2,1,1,1,1); environmental report
- Transport, freight, lorry, fleet average [RER]: 11700 tkm; lognormal SD95 2.28
  (4,5,na,na,na,na); standard transport distances
- Treatment, sewage, unpolluted, to wastewater treatment, class 3 [CH]: 3.93e6 m3; lognormal SD95 1.22
  (4,2,1,1,1,1); environmental report and own assumptions
- Transport, freight, rail [RER]: 46800 tkm; lognormal SD95 2.28
  (4,5,na,na,na,na); standard transport distances
- Light fuel oil, burned in industrial furnace 1MW, non-modulating [RER]: 917000 MJ; lognormal SD95 1.09
  (1,2,2,1,1,1); environmental report
- Electricity, medium voltage, production ENTSO-E, at grid: 3.4e6 kWh; lognormal SD95 1.07
  (1,2,1,1,1,1); environmental report
- Aluminium, production mix, at plant [RER]: 210000 kg; lognormal SD95 1.5
  (5,na,na,na,na,na); estimate from literature
- Polyethylene, HDPE, granulate, at plant [RER]: 23700 kg; lognormal SD95 1.5
  (5,na,na,na,na,na); estimate from literature
- Tap water, at user [RER]: 1.1e7 kg; lognormal SD95 1.22
  (4,2,1,1,1,1); environmental report and own assumptions

## Emissions to nature
- Heat, waste [emissions to air, unspecified]: 1.22e7 MJ; lognormal SD95 1.07
  (1,2,1,1,1,1); standard values
- NMVOC, non-methane volatile organic compounds, unspecified origin [emissions to air, unspecified]: 15400 kg; lognormal SD95 2
  (1,2,1,1,1,1); environmental report

## Sampling procedure
Manufacturing data is taken from an environmental report of 16 production site. Additional data was generated via oral communication.

## Sources
- Spielmann M., Bauer C., Dones R., Tuchschmid M., 2007, 2007 - Transport services - Spielmann, Final report ecoinvent Data v2.0, 14, Swiss Centre for LCI, PSI, ESU-services Ltd., Duebendorf, Villigen and Uster, CH
Spielmann M., Dones R; Bauer C. (2007) Life Cycle Inventories of Transport Services. Final report ecoinvent Data v2.0. Volume: 14. Issue: 0. Swiss Centre for LCI, PSI. Dübendorf and Villigen, CH.
Type: Measurement on site
Source: CD-ROM
First author: Spielmann M.
Other authors: Dones R; Bauer C.
Year: 2007
Title of anthology: Final report ecoinvent Data v2.0
Place of publication: Dübendorf and Villigen, CH
Publisher: Swiss Centre for LCI, PSI
Volume No: 14
Issue No: 0

## Validation
Proof reading validation: passed.; Other validation: none;
