# Glass fibre, at plant

Dataset: EcoSpold 1, unit process
Functional unit: 1 kg
Category: glass / construction
Geography: RER
Time period: 2000-01 to 2000-12
Production volume: 475000 tonnes.
Share of production covered: 100 %
Generated by: Niels Jungbluth
accessRestrictedTo: 0
copyright: true

## General comment
Inventory based on a state of the art report for the European glass manufacturing industry. Data had to be estimated from ranges given for different parameters.;
CAS number: 065997-17-3;
Synonyms: fibreglass, fiberglass, fibrous glass filter media;

## Included processes
Gate to gate inventory for the production of glass fibre.

## Geography
26 furnaces operating at 12 sites in Europe

## Technology
Recuperative or oxy-fuel fired furnaces.

## Time period
Time of publication

## Reference product
- Glass fibre, at plant [RER]: 1 kg
  Europe

## Inputs from technosphere
- Nylon 6, at plant [RER]: 0.0283 kg; lognormal SD95 1.41
  For polymers
- Disposal, mineral wool, 0% water, to construction waste landfill [CH]: 0.122 kg; lognormal SD95 2.04
  Fibre glas production waste
- Flat glass plant [RER]: 4e-10 p; lognormal SD95 3.05
  (2,2,1,3,1,5); Estimation
- Silicone product, at plant [RER]: 0.00141 kg; lognormal SD95 1.41
  Silane
- Lubricating oil, at plant [RER]: 0.00224 kg; lognormal SD95 2.24
  Binder
- Boric acid, anhydrous, powder, at plant [RER]: 0.188 kg; lognormal SD95 1.33
  Estimation for colemanite CaB3O4(OH)3-H2O, Hydrated Calcium Borate Hydroxide
- Electricity, medium voltage, production ENTSO-E, at grid: 1.61 kWh; lognormal SD95 1.12
  (1,4,1,1,1,2); Forming, utilities and processes
- Aluminium oxide, at plant [RER]: 0.0214 kg; lognormal SD95 7.14
  For other raw materials
- Tap water, at user [RER]: 8.94 kg; lognormal SD95 2.24
  IPPC 2000
- Natural gas, burned in industrial furnace 1MW [CH]: 16 MJ; lognormal SD95 1.43
  Melting
- Limestone, milled, loose, at plant [CH]: 0.351 kg; lognormal SD95 1.17
  Calcium carbonate
- Transport, freight, rail [RER]: 0.149 tkm; lognormal SD95 2.1
  (4,5,na,na,na,na); Standard distance materials 600km
- Clay, at mine [CH]: 0.464 kg; lognormal SD95 1.17
  IPPC 2000
- Treatment, glass production effluent, to wastewater treatment, class 2 [CH]: 0.003 m3; lognormal SD95 2
  Sewage
- Chemicals organic, at plant [GLO]: 0.00316 kg; lognormal SD95 3.16
  Other binders
- Transport, freight, lorry, fleet average [RER]: 0.102 tkm; lognormal SD95 2.1
  (4,5,na,na,na,na); Standard distance sand and lime 50km, other materials 100km
- Fluorspar, 97%, at plant [GLO]: 0.00447 kg; lognormal SD95 4.47
  IPPC 2000
- Silica sand, at plant [DE]: 0.37 kg; lognormal SD95 1.23
  IPPC 2000
- Disposal, paint, 0% water, to municipal incineration [CH]: 0.00361 kg; lognormal SD95 3.61
  Binder wastes
- Disposal, used mineral oil, 10% water, to hazardous waste incineration [CH]: 0.00224 kg; lognormal SD95 7.14
  For other raw materials

## Emissions to nature
- Hydrogen chloride [emissions to air, high. pop.]: 6e-5 kg; lognormal SD95 2
  IPPC 2000
- Cadmium [emissions to air, high. pop.]: 7e-6 kg; lognormal SD95 1.52
  (1,4,na,3,1,na); Emission limit in Belgium
- Heat, waste [emissions to air, high. pop.]: 5.8 MJ; lognormal SD95 1.12
  (1,4,1,1,1,2); Calculation
- Particulates, > 10 um [emissions to air, high. pop.]: 6.93e-6 kg; lognormal SD95 3.46
  Berdowski 2002, waste gas purification
- Antimony [emissions to air, high. pop.]: 3.5e-5 kg; lognormal SD95 1.52
  (1,4,na,3,1,na); Emission limit in Belgium
- Particulates, < 2.5 um [emissions to air, high. pop.]: 4.85e-5 kg; lognormal SD95 3.46
  Berdowski 2002, waste gas purification
- Arsenic [emissions to air, high. pop.]: 2.1e-5 kg; lognormal SD95 1.52
  (1,4,na,3,1,na); Emission limit in Belgium
- Hydrogen fluoride [emissions to air, high. pop.]: 3.46e-5 kg; lognormal SD95 2
  IPPC 2000
- Sulfur dioxide [emissions to air, high. pop.]: 0.00283 kg; lognormal SD95 2.83
  IPPC 2000
- Particulates, > 2.5 um, and < 10um [emissions to air, high. pop.]: 1.39e-5 kg; lognormal SD95 3.46
  Berdowski 2002, waste gas purification
- Carbon dioxide, fossil [emissions to air, high. pop.]: 0.155 kg; lognormal SD95 1.29
  From raw material decomposition
- Nitrogen oxides [emissions to air, high. pop.]: 0.00417 kg; lognormal SD95 1.61
  IPPC 2000
- NMVOC, non-methane volatile organic compounds, unspecified origin [emissions to air, high. pop.]: 0.000224 kg; lognormal SD95 2.24
  IPPC 2000

## Sampling procedure
Literature

## Extrapolations
From ranges to mean values.

## Sources
- Kellenberger D., Althaus H.-J., Jungbluth N., Kuenniger T., Lehmann M., Thalmann P., 2007, 2007 - LCI building products - Kellenberger, Final report ecoinvent data v2.0, 7, Swiss Centre for LCI, Empa - TSL, ESU-services Ltd., Bau- und Umweltchimie, Duebendorf, CH
Kellenberger D., Althaus H.-J., Jungbluth N., Künniger T. (2007) Life Cycle Inventories of Building Products. Final report ecoinvent data v2.0. Volume: 7. Swiss Centre for LCI, Empa - TSL. Dübendorf, CH.
Type: Measurement on site
Source: CD-ROM
First author: Kellenberger D.
Other authors: Althaus H.-J., Jungbluth N., Künniger T.
Year: 2007
Title of anthology: Final report ecoinvent data v2.0
Place of publication: Dübendorf, CH
Publisher: Swiss Centre for LCI, Empa - TSL
Volume No: 7

## Validation
Proof reading validation: Passed.; Other validation: none;
