# Roundwood, meranti (SFM), under bark, u=70%, at forest road

Dataset: EcoSpold 1, unit process
Functional unit: 1 m3
Category: wood / extraction
Geography: MY
Time period: 2000-01 to 2005-12
Generated by: Frank Werner
accessRestrictedTo: 0
copyright: true

## General comment
dataset represents well-documented, legally operating logging company with modern equipment;
Synonyms: Shorea ssp., Seraya, Lauan;

## Included processes
includes harvesting and hauling operations as well as fuel used for forest road construction, including burning of branchings; land use of forest roads and gravel are distregarded; branchings are left to rot on the ground. logging impacts on further vegetation and environmental impacts from post-harvest processes (potential forest degradation/deforestation) are not covered.

## Technology
average technology; forest operations largely based on manual labor. fuel consumption is interpolated by Collins et al 2002 assumed to lie between azobe dataset and European average consumption

## Reference product
- Roundwood, meranti (SFM), under bark, u=70%, at forest road [MY]: 1 m3
  MALAYSIA

## Inputs from technosphere
- Lubricating oil, at plant [RER]: 0.511 kg; lognormal SD95 1.323
  composite
- Meranti, standing, under bark, u=70%, in rainforest [MY]: 2 m3; lognormal SD95 1.2621
  (3,4,1,3,1,5)
- Diesel, burned in building machine, average [CH]: 309.63 MJ; lognormal SD95 1.323
  composite
- Power sawing, without catalytic converter [RER]: 0.056154 hr; lognormal SD95 1.323
  (4,4,1,3,1,5)

## Inputs from nature
- Energy, gross calorific value, in biomass [resources, biotic]: -18332 MJ; lognormal SD95 1.2621
  (3,4,1,3,1,5)
- Wood, hard, standing [resources, biotic]: -1.11 m3; lognormal SD95 1.2621
  (3,4,1,3,1,5)

## Emissions to nature
- Carbon dioxide, biogenic [emissions to air, unspecified]: 1182.5 kg; lognormal SD95 1.2621
  (3,4,1,3,1,5)
- Dinitrogen monoxide [emissions to air, low. pop.]: 0.0071077 kg; lognormal SD95 1.592
  (3,4,1,3,1,5)
- Particulates, > 2.5 um, and < 10um [emissions to air, low. pop.]: 3 kg; lognormal SD95 1.592
  (3,4,1,3,1,5)
- Methane, biogenic [emissions to air, low. pop.]: 1.0338 kg; lognormal SD95 1.592
  (3,4,1,3,1,5)
- Particulates, < 2.5 um [emissions to air, low. pop.]: 3.6 kg; lognormal SD95 1.592
  (3,4,1,3,1,5)
- Particulates, > 10 um [emissions to air, low. pop.]: 2.4 kg; lognormal SD95 1.592
  (3,4,1,3,1,5)

## Sampling procedure
literature, partly relying on estimates (fuel consumption)

## Sources
- Althaus H.-J., Werner F., Stettler C., Dinkel F., 2007, 2007 - LCI renewable materials - Althaus, Final report ecoinvent Data v2.0, 21, Swiss Centre for LCI, Empa - TSL, Umwelt & Entwicklung, Carbotech AG, Duebendorf, CH
Althaus H.J., Dinkel F., Werner F. (2007) Life Cycle Inventories of Renewable Materials. Final report ecoinvent Data v2.0. Editors: 0. 0. Volume: 21. Issue: 0. Swiss Centre for LCI, Empa - TSL. Duebendorf, CH.
Type: Measurement on site
Source: CD-ROM
First author: Althaus H.J.
Other authors: Dinkel F., Werner F.
Year: 2007
Name of editors: 0
Title of anthology: Final report ecoinvent Data v2.0
Place of publication: Duebendorf, CH
Publisher: Swiss Centre for LCI, Empa - TSL
Journal: 0
Volume No: 21
Issue No: 0

## Validation
Proof reading validation: Passed; Other validation: none;
