# Chopping, palm wood bunches, in forest

Dataset: EcoSpold 1, unit process
Functional unit: 1 kg
Category: wood / unspecified
Geography: RER
Time period: 2000-01 to 2000-12
Generated by: Hans-Joerg Althaus
accessRestrictedTo: 0
copyright: true

## Included processes
Chopping of wood in mobile chopper and transport of the chopper to the place of use, per kg chopped wood (dry mass); inkl. fuel lubricating oil and spare parts; Geography: Data for Switzerland used for central Europe

## Technology
carrier with chopper

## Reference product
- Chopping, palm wood bunches, in forest [RER]: 1 kg
  Europe

## Inputs from technosphere
- Chipper, mobile, diesel [RER]: 1.33e-8 p; lognormal SD95 3.36
  (4,5,2,3,4,5);
- Steel, low-alloyed, at plant [RER]: 8.67e-5 kg; lognormal SD95 1.35
  (3,3,3,3,3,5);
- Lubricating oil, at plant [RER]: 5.12e-5 kg; lognormal SD95 1.35
  (3,3,3,3,3,5);
- Building machine [RER]: -1.89e-8 p; lognormal SD95 1
  calculated
- Synthetic rubber, at plant [RER]: 7.94e-5 kg; lognormal SD95 1.35
  (3,3,3,3,3,5);
- Diesel, burned in building machine, average [CH]: 0.141 MJ; lognormal SD95 2.12
  (3,3,3,3,3,5);

## Sampling procedure
Literature

## Sources
- Werner F., Althaus H.-J., Kuenniger T., Richter K., Jungbluth N., 2007, 2007 - LCI wood as fuel and const. mat. - Werner, Final report ecoinvent data v2.0, 9, Swiss Centre for LCI, Empa - TSL, ESU-services Ltd., Duebendorf, CH
Werner F., Althaus H.-J., Künniger T., Richter K., Jungbluth N. (2007) 1Life Cycle Inventories of Wood as Fuel and Construction Material. Final report ecoinvent data v2.0. Volume: 9. Issue: 0. Swiss Centre for LCI, Empa - TSL. Dübendorf, CH.
Type: Measurement on site
Source: CD-ROM
First author: Werner F.
Other authors: Althaus H.-J., Künniger T., Richter K., Jungbluth N.
Year: 2007
Title of anthology: Final report ecoinvent data v2.0
Place of publication: Dübendorf, CH
Publisher: Swiss Centre for LCI, Empa - TSL
Volume No: 9
Issue No: 0

## Validation
Proof reading validation: passed; Other validation: none;
