# Gold, from combined gold-silver production, at refinery

Dataset: EcoSpold 1, unit process
Functional unit: 1 kg
Category: metals / non ferro
Geography: CL
Time period: 2002-01 to 2006-12
Production volume: 2.99 t gold and 112 t silver per year
Generated by: Matthias Tuchschmid
accessRestrictedTo: 0
copyright: true

## General comment
This multi-output process 'mining and refining, gold-silver deposit' delivers the two co-products 'gold, from combined gold-silver-production, at refinery' and 'silver, from combined gold-silver-production, at refinery'. This data set includes the mining in Chile in open pit mine incl. land use. Air emissions are estimated.;

## Included processes
This data set includes the combined mining and refining of gold and silver in an open pit mine in Chile incl. energy and material use, water and air emissions of metals and land use.

## Geography
Material requirements are estimated with Australian data

## Technology
Refinement is estimated with electrolysis-data.

## Time period
Period of public environmental report

## Reference product
- Gold, from combined gold-silver production, at refinery [CL]: 1 kg
  CHILE

## Inputs from technosphere
- Facilities precious metal refinery [SE]: 6.1785e-6 p; lognormal SD95 3.0909
  (4,5,na,na,na,na); Environmental report
- Zinc, primary, at regional storage [RER]: 1.76282 kg; lognormal SD95 1.1498
  (2,3,2,5,1,3); Calculation, based on thesis on Australian precious metal production, data for 1999
- Sodium cyanide, at plant [RER]: 435.873 kg; lognormal SD95 1.1414
  (2,4,2,3,1,3); Calculation, based on thesis on Australian precious metal production, data for 1999
- Electricity, medium voltage, production BA, at grid [BA]: 32602.9 kWh; lognormal SD95 1.1414
  (2,4,2,3,1,3); Environmental report (Placer-Dome, 2002)
- Limestone, milled, packed, at plant [CH]: 38.4974 kg; lognormal SD95 1.1414
  (same comment as for Sodium cyanide, at plant)
- Sodium hydroxide, 50% in H2O, production mix, at plant [RER]: 7.09169 kg; lognormal SD95 1.1498
  (same comment as for Zinc, primary, at regional storage)
- Diesel, burned in building machine, average [CH]: 19227.3 MJ; lognormal SD95 1.1414
  (2,4,2,3,1,3); Environmental report (Placer-Dome, 2002)
- Sulphuric acid, liquid, at plant [RER]: 0.40524 kg; lognormal SD95 1.1498
  (same comment as for Zinc, primary, at regional storage)
- Charcoal, at plant [GLO]: 10.3337 kg; lognormal SD95 1.1498
  (same comment as for Zinc, primary, at regional storage)
- Mine, gold and silver [CL]: 4.0736e-6 p; lognormal SD95 3.0115
  (2,3,2,3,1,3); Environmental report
- Disposal, sulfidic tailings, off-site [GLO]: 458502 kg; lognormal SD95 1.1094
  (2,3,2,3,1,3); Estimation
- Diesel, burned in diesel-electric generating set [GLO]: 85137.8 MJ; lognormal SD95 1.1414
  (2,4,2,3,1,3); Environmental report (Placer-Dome, 2002)
- Blasting [RER]: 350.694 kg; lognormal SD95 1.1094
  (2,3,2,3,1,3); Estimation, based on peruvian Data
- Transport, freight, lorry, fleet average [RER]: 511.78 tkm; lognormal SD95 2.0165
  (2,4,na,na,na,na); Calculation, based on estimated distance of 600km
- Hydrochloric acid, 30% in H2O, at plant [RER]: 8.30745 kg; lognormal SD95 1.1094
  (2,3,2,3,1,3); Calculation, based on thesis on Australian precious metal production, data for 1999

## Inputs from nature
- Gold, Au 1.1E-4%, Ag 4.2E-3%, in ore [resources, in ground]: 1.17645 kg; lognormal SD95 1.1414
  (2,4,2,3,1,3); Estimation
- Water, unspecified natural origin/m3 [resources, in water]: 5.85516 m3; lognormal SD95 1.1414
  (2,4,2,3,1,3); Estimation, based on PG-Data

## Emissions to nature
- Copper [emissions to air, low. pop.]: 0.0005159 kg; lognormal SD95 5.0235
  (2,4,2,3,1,3); Estimation, based on Swedish Data
- Heat, waste [emissions to air, low. pop.]: 117372 MJ; lognormal SD95 1.1414
  (2,4,2,3,1,3); Calculation
- Cyanide [emissions to water, ocean]: 10.6221 kg; lognormal SD95 3.0206
  (2,4,2,3,1,3); Estimation, based on PG-Data
- Nickel [emissions to water, ocean]: 1.56847 kg; lognormal SD95 5.0235
  (2,4,2,3,1,3); Estimation, based on PG-Data
- Copper [emissions to water, ocean]: 6.54787 kg; lognormal SD95 3.0206
  (2,4,2,3,1,3); Estimation, based on PG-Data
- Lead [emissions to air, low. pop.]: 0.00016775 kg; lognormal SD95 5.0235
  (2,4,2,3,1,3); Estimation, based on Swedish Data
- Arsenic [emissions to water, ocean]: 0.025234 kg; lognormal SD95 5.0235
  (2,4,2,3,1,3); Estimation, based on PG-Data
- Cadmium [emissions to water, ocean]: 0.11814 kg; lognormal SD95 3.0206
  (2,4,2,3,1,3); Estimation, based on PG-Data
- Mercury [emissions to water, ocean]: 0.00026804 kg; lognormal SD95 5.0235
  (2,4,2,3,1,3); Estimation, based on PG-Data
- Zinc [emissions to air, low. pop.]: 0.00014242 kg; lognormal SD95 5.0235
  (2,4,2,3,1,3); Estimation, based on Swedish Data
- Zinc [emissions to water, ocean]: 41.7094 kg; lognormal SD95 5.0235
  (2,4,2,3,1,3); Estimation, based on PG-Data
- Lead [emissions to water, ocean]: 0.01729 kg; lognormal SD95 5.0235
  (2,4,2,3,1,3); Estimation, based on PG-Data
- Carbon dioxide, fossil [emissions to air, low. pop.]: 56.1115 kg; lognormal SD95 1.1414
  (2,4,2,3,1,3); Estimation, based on Swedish Data
- Water [emissions to water, unspecified]: 5562.4 kg; lognormal SD95 2.5196
  (5,5,5,5,5,BU:1.05); All uncertainty-values set to 5.0 by default. Balance of input water

## Sampling procedure
environmental report

## Extrapolations
See Geography

## Sources
- Classen M., Althaus H.-J., Blaser S., Scharnhorst W., Tuchschmid M., Jungbluth N., Faist Emmenegger M., 2009, 2009 - LCI metals - Classen, Final report ecoinvent data v2.1, 10, Swiss Centre for LCI, Empa, ESU-services Ltd., Duebendorf, CH
Classen M., Althaus H.-J., Blaser S., Doka G., Jungbluth N., Tuchschmid M. (2008) Life Cycle Inventories of Metals. Final report ecoinvent data v2.1. Volume: 10. Issue: 0. Swiss Centre for LCI, Empa - TSL. Dübendorf, CH.
Type: Measurement on site
Source: CD-ROM
First author: Classen M.
Other authors: Althaus H.-J., Blaser S., Doka G., Jungbluth N., Tuchschmid M.
Year: 2008
Title of anthology: Final report ecoinvent data v2.1
Place of publication: Dübendorf, CH
Publisher: Swiss Centre for LCI, Empa - TSL
Volume No: 10
Issue No: 0

## Validation
Proof reading validation: passed; Other validation: none;
