# xxx Electricity, low voltage, production CS, at grid

Dataset: EcoSpold 1, unit process
Functional unit: 1 kWh
Category: electricity / notMaintained
Geography: CS
Time period: 2000-01 to 2000-12
Production volume: 18 TWh
Share of production covered: 100 %
Generated by: René Itten
accessRestrictedTo: 0
copyright: true

## General comment
This dataset describes the transformation from medium to low voltage as well as the distribution of electricity at low voltage.;

## Included processes
Included are the electricity production in Serbia, the transmission network as well as direct SF6-emissions to air. Electricity losses during low-voltage transmission and transformation from medium-voltage are accounted for.

## Geography
Data apply to public and self producers. Geographical classification according to IEA. Assumptions for transmission network, losses and emissions are based on UTCE data.

## Technology
Average technology used to distribute electricity. Includes underground and overhead lines, as well as air- and SF6-insulated medium-to-low voltage switching stations. Electricity production according to related datasets

## Time period
Time of publications.

## Reference product
- xxx Electricity, low voltage, production CS, at grid [CS]: 1 kWh
  SERBIA

## Inputs from technosphere
- xxx Electricity, medium voltage, production CS, at grid [CS]: 1.162 kWh; lognormal SD95 1.2355
  (3,1,1,1,3,1); specific losses of network estimated based on statistics
- Distribution network, electricity, low voltage [CH]: 8.74e-8 km; lognormal SD95 3.1614
  (3,1,4,5,3,5); based on consumption statistics
- Sulphur hexafluoride, liquid, at plant [RER]: 6.5691e-9 kg; lognormal SD95 1.078
  (1,1,2,1,1,3); based on emission data

## Emissions to nature
- Sulfur hexafluoride [emissions to air, unspecified]: 6.5691e-9 kg; lognormal SD95 1.506
  (1,1,2,1,1,3); national statistics
- Heat, waste [emissions to air, unspecified]: 0.14583 MJ; lognormal SD95 1.3221
  (4,1,3,1,1,5); estimations based on losses
- Heat, waste [emissions to soil, unspecified]: 0.4375 MJ; lognormal SD95 1.3221
  (4,1,3,1,1,5); estimations based on losses

## Sampling procedure
statistics

## Sources
- Frischknecht R., Itten R., Flury K., 2012, 2012 - GHG emis. from Swiss elec. mixes - Frischknecht, Project reports, 401, ESU-services Ltd., Uster, CH
Itten, R., Frischknecht, R. (2012) Life Cycle Inventories of electricity mixes. Project reports. Volume: 401. ESU-services Ltd.. Uster, CH.
Type: Separate publication
First author: Itten, R.
Other authors: Frischknecht, R.
Year: 2012
Title of anthology: Project reports
Place of publication: Uster, CH
Publisher: ESU-services Ltd.
Volume No: 401

## Validation
Proof reading validation: automatic validation in Excel; Other validation: Z:\ESU-Docs\Projekte laufend\401 Update Strommix v3.0\EcoSpold\_Europa\[401-electricity-mix-serbia-CS-v1.0.xlsx]X-Process;
