# Gypsum plaster and gypsum fibre board, packaging

Dataset: EcoSpold 1, unit process
Functional unit: 1 m2
Category: construction materials / gypsum materials
Geography: DE
Generated by: Daniel Savi
accessRestrictedTo: 0
copyright: true

## General comment
Gipskarton-, Gipsfaserplatte, Verpackung
Transportverpackung der Gipsplatten auf Mehrwegpaletten
Version: 0.0

Local category: construction materials
Local subcategory: Gipswerkstoffe

## Reference product
- Gypsum plaster and gypsum fibre board, packaging [DE]: 1 m2
  GERMANY

## Inputs from technosphere
- EUR-flat pallet [RER]: 0.0007287 p; lognormal SD95 1.12487
  (3;3;1;1;1)

## Sources
- Kasser U., R. Frischknecht, M. Klingler, D. Savi, R. Itten, F. Wyss,P. Stolz, L. Tschuemperlin, 2016, 2016 - Renewal and exp. of LCA data in KBOB - Kasser, -, Buero fuer Umweltchemie, treeze Ltd., Zuerich and Uster, CH
U. Kasser, R. Frischknecht, M. Klingler, D. Savi, R. Itten, F. Wyss,P. Stolz, L. Tschümperlin 2016 (2015Z) Erneuerung und Erweiterung der Ökobilanzdaten in der KBOB-Liste "Ökobilanzdaten im Baubereich", Projekt QualiBOB. unknown.

First author: U. Kasser, R. Frischknecht, M. Klingler, D. Savi, R. Itten, F. Wyss,P. Stolz, L. Tschümperlin 2016
Year: 2015Z
Place of publication: unknown
Original title: Erneuerung und Erweiterung der Ökobilanzdaten in der KBOB-Liste "Ökobilanzdaten im Baubereich", Projekt QualiBOB
