# Glass sorting site

Dataset: EcoSpold 1, unit process, infrastructure
Functional unit: 1 p
Category: glass / waste glass\infrastructure
Geography: RER
Time period: 2000-01 to 2000-12
Generated by: Roland Hischier
accessRestrictedTo: 0
copyright: true

## General comment
A production site with a sorting capacity of 100 kt per year and a total life span of 50 a is assumed.;

## Included processes
This module includes the land-use, the material and construction efforts of the machineries the buildings. Dismantling of the machineries and the buildings are accounted for as well.

## Geography
european sorting site, based on few information from different Swiss sorting sites

## Technology
Assumptions based on few information about the technology in Switzerland in the mid 90"s

## Reference product
- Glass sorting site [RER]: 1 p
  Europe

## Inputs from technosphere
- Disposal, polyethylene, 0.4% water, to municipal incineration [CH]: 10000 kg; lognormal SD95 1.84
  (5,4,1,3,4,5); own estimation
- Polyethylene, HDPE, granulate, at plant [RER]: 10000 kg; lognormal SD95 1.84
  (5,4,1,3,4,5); own estimation
- Steel, low-alloyed, at plant [RER]: 112000 kg; lognormal SD95 1.84
  (5,4,1,3,4,5); own estimation
- Electronics for control units [RER]: 2500 kg; lognormal SD95 1.84
  (5,4,1,3,4,5); own estimation
- Building, hall, steel construction [CH]: 4560 m2; lognormal SD95 3.51
  (5,4,1,3,4,5); own estimation
- Concrete, sole plate and foundation, at plant [CH]: 41.8 m3; lognormal SD95 1.84
  (5,4,1,3,4,5); own estimation
- Disposal, building, concrete, not reinforced, to sorting plant [CH]: 50000 kg; lognormal SD95 1.84
  (5,4,1,3,4,5); own estimation
- Chromium steel 18/8, at plant [RER]: 125000 kg; lognormal SD95 1.84
  (5,4,1,3,4,5); own estimation
- Disposal, electronics for control units [RER]: 2500 kg; lognormal SD95 1.84
  (5,4,1,3,4,5); own estimation
- Disposal, building, concrete, not reinforced, to final disposal [CH]: 50000 kg; lognormal SD95 1.84
  (5,4,1,3,4,5); own estimation

## Inputs from nature
- Occupation, industrial area, vegetation [resources, land]: 28500 m2a; lognormal SD95 1.58
  (4,3,2,3,1,4); based on data from 3 sites
- Occupation, industrial area, built up [resources, land]: 285000 m2a; lognormal SD95 1.58
  (4,3,2,3,1,4); based on data from 3 sites
- Transformation, from unknown [resources, land]: 6270 m2; lognormal SD95 2.07
  (4,3,2,3,1,4); based on data from 3 sites
- Occupation, construction site [resources, land]: 12500 m2a; lognormal SD95 1.58
  (4,3,2,3,1,4); based on data from 3 sites
- Transformation, to industrial area, built up [resources, land]: 5700 m2; lognormal SD95 2.07
  (4,3,2,3,1,4); based on data from 3 sites
- Transformation, to industrial area, vegetation [resources, land]: 570 m2; lognormal SD95 2.07
  (4,3,2,3,1,4); based on data from 3 sites

## Sources
- Hischier R., 2007, 2007 - LCI packagings and graphical papers - Hischier, Final report ecoinvent data v2.0, 11, Swiss Centre for LCI, Empa - TSL, Duebendorf and St. Gallen, CH
Hischier R. (2007) Life Cycle Inventories of Packaging and Graphical Paper. Final report ecoinvent data v2.0. Volume: 11. Swiss Centre for LCI, Empa - TSL. Dübendorf, CH.
Type: Measurement on site
Source: CD-ROM
First author: Hischier R.
Year: 2007
Title of anthology: Final report ecoinvent data v2.0
Place of publication: Dübendorf, CH
Publisher: Swiss Centre for LCI, Empa - TSL
Volume No: 11

## Validation
Proof reading validation: passed; Other validation: none;
