# Polymer electrolyte membrane (Nafion) production

Dataset: EcoSpold 1, unit process
Functional unit: 1 kg
Category: fuels / synthetic\infrastructure
Geography: RER
Time period: 2024-01 to 2024-01
Generated by: Romain Sacchi
accessRestrictedTo: 0
copyright: true

## General comment
Production of a polymer electrlyte membrane (Nafion) Source: Notter et al., 2015. Life cycle assessment of PEM FC applications: electric mobility and Î¼-CHP. Energy Environ. Sci., 2015,8, 1969-1985. https://doi.org/10.1039/C5EE01082A

## Reference product
- Polymer electrolyte membrane (Nafion) production [RER]: 1 kg
  not defined

## Inputs from technosphere
- Steam, for chemical processes, at plant [RER]: 0.0108 kg; lognormal SD95 2.565
  heat required for the production of potassium amide {5;5;5;5;5;5;1.05;}
- Electricity, low voltage, production ENTSO-E, at grid: 1.1 kWh; lognormal SD95 2.565
  electricity required for the production of potassium amide {5;5;5;5;5;5;1.05;}
- Tetrafluoroethylene film, on glass [RER]: 0.93 kg; lognormal SD95 2.565
  copolymer tetrafluorethylene; mol-ratio copolymer 1:copolymer 2 equals 7.5:1 {5;5;5;5;5;5;1.05;}
- Acrylonitrile-butadiene-styrene copolymer, ABS, at plant [RER]: 0.031 kg; lognormal SD95 2.565
  represents copolymer 2: 3,6-dioxa-4-methyl-7-octene sulfonyl fluoride with equal shares for each copolymer, mol-ratio copolymer 1:copolymer 2 equals 7.5:1 {5;5;5;5;5;5;1.05;}
- Styrene-acrylonitrile copolymer, SAN, at plant [RER]: 0.031 kg; lognormal SD95 2.565
  (same comment as for Acrylonitrile-butadiene-styrene copolymer, ABS, at plant)
- Ethylene vinyl acetate copolymer, at plant [RER]: 0.031 kg; lognormal SD95 2.565
  (same comment as for Acrylonitrile-butadiene-styrene copolymer, ABS, at plant)
- [sulfonyl]urea-compounds, at regional storehouse [CH]: 0.031 kg; lognormal SD95 2.565
  (same comment as for Acrylonitrile-butadiene-styrene copolymer, ABS, at plant)
- Thermoforming, with calendering [RER]: 1 kg; lognormal SD95 2.565
  {5;5;5;5;5;5;1.05;}
- Ammonia, liquid, at regional storehouse [CH]: 0.0093 kg; lognormal SD95 2.565
  represents the production of potassium amide {5;5;5;5;5;5;1.05;}
- Potassium chloride, as K2O, at regional storehouse [RER]: 0.041 kg; lognormal SD95 2.565
  represents the production of potassium amide {5;5;5;5;5;5;1.05;}
- Sodium chloride, powder, at plant [RER]: 0.013 kg; lognormal SD95 2.565
  represents the production of potassium amide {5;5;5;5;5;5;1.05;}
- Chemical plant, organics [RER]: 4e-10 p; lognormal SD95 4.247
  {5;5;5;5;5;5;3;}
- Transport, freight, rail [RER]: 0.83 tkm; lognormal SD95 3.217
  Transportation by rail {5;5;5;5;5;5;2;}
- Transport, freight, lorry, 16t-32t gross weight, fleet average [RER]: 0.21 tkm; lognormal SD95 3.217
  Transportation by truck {5;5;5;5;5;5;2;}
- Transport, freight, rail [RER]: 0.01178 tkm; lognormal SD95 2.208
  Generic transport distances calculated based on Table 4.2 of the ecoinvent v.2 Methodology report. Distribution: 0.01 kg over 800.0 km.
- Transport, freight, lorry, 16t-32t gross weight, fleet average [RER]: 0.6505 tkm; lognormal SD95 2.208
  Generic transport distances calculated based on Table 4.2 of the ecoinvent v.2 Methodology report. Distribution: 0.17 kg over 3810.0 km.
- Transport, barge tanker [RER]: 0.1077 tkm; lognormal SD95 2.208
  Generic transport distances calculated based on Table 4.2 of the ecoinvent v.2 Methodology report. Distribution: 0.18 kg over 600.0 km.
- Disposal, hazardous waste, 25% water, to hazardous waste incineration [CH]: 0.032 kg; lognormal SD95 2.565
  {5;5;5;5;5;5;1.05;}

## Emissions to nature
- Hydrogen [emissions to air, unspecified]: 0.00055 kg; lognormal SD95 2.785
  {5;5;5;5;5;5;1.5;}

## Sampling procedure
Sampling procedure: Literature data

## Sources
- Sacchi R., Bauer C., 2024, 2024 - LCA power-to-X in residential sector - Sacchi, Project report, PSI, Villigen, CH

## Validation
Proof reading validation: Passed, Other validation: none, Validator: Rolf Frischknecht, Telephone: 0041 44 940 61 91, E-mail: frischknecht@treeze.ch, Company: treeze, Country: CH
