# Disposal, plastics, mixture, 15.3% water, to sanitary landfill

Dataset: EcoSpold 1, unit process
Functional unit: 1 kg
Category: landfill / sanitary landfill
Geography: CH
Time period: 2000-01 to 2000-12
Generated by: Gabor Doka
accessRestrictedTo: 0
copyright: true

## General comment
Inventoried waste contains 100% Mixed various plastics; . waste composition (wet, in ppm): upper heating value 34.05 MJ/kg; lower heating value 30.79 MJ/kg; H2O 153000; O 73717; H 105910; C 633590; S 1406.7; N 6112; P n.a.; B n.a.; Cl 18131; Br 65.319; F 13.717; I n.a.; Ag n.a.; As 1.7729; Ba 174.03; Cd 75.786; Co 29.478; Cr 38.132; Cu 296.41; Hg 0.79234; Mn 74.574; Mo n.a.; Ni 19.222; Pb 435.81; Sb 40.093; Se 1.9596; Sn 24.453; V 268.88; Zn 521.69; Be 0.46656; Sc n.a.; Sr 82.582; Ti 933.13; Tl 0.37325; W n.a.; Si n.a.; Fe 3476.5; Ca n.a.; Al 186.63; K n.a.; Mg n.a.; Na 1367.5; Share of carbon in waste that is biogenic 0%. Overall degradability of waste during 100 years: 1%.;;

## Included processes
Waste-specific short-term emissions to air via landfill gas incineration and landfill leachate. Burdens from treatment of short-term leachate (0-100a) in wastewater treatment plant (including WWTP sludge disposal in municipal incinerator). Long-term emissions from landfill to groundwater (after base lining failure).

## Geography
Technology encountered in Switzerland in 2000. Landfill includes base seal, leachate collection system, treatment of leachate in municipal wastewater treatment plant.

## Technology
Swiss municipal sanitary landfill for biogenic or untreated municipal waste ("reactive organic landfill"). Landfill gas and leachate collection system. Recultivation and monitoring for 150 years after closure.

## Reference product
- Disposal, plastics, mixture, 15.3% water, to sanitary landfill [CH]: 1 kg
  SWITZERLAND

## Inputs from technosphere
- Light fuel oil, burned in boiler 100kW, non-modulating [CH]: 4.61e-5 MJ; lognormal SD95 1.74
  burden from wastewater treatment of the short-term leachate (0-100a). Uncertainty calculated from unertainty of the waste composition of this waste, uncertainty in waste decomposition and short-term leaching in sanitary landfill
- Slag compartment [CH]: 6.92e-15 p; lognormal SD95 4.22
  burden from incineration of sludge from wastewater treatment of the short-term leachate (0-100a). uncertainty is calculated from uncertainties in waste composition and transfer coefficients in incinerator and uncertainty of waste decomposition and short-term leaching in sanitary landfill
- Sewer grid, class 3 [CH]: 5.45e-10 km; lognormal SD95 1.1
  (same comment as for Light fuel oil, burned in boiler 100kW, non-modulating)
- Heat from waste, at municipal waste incineration plant [CH]: 0.000103 MJ; lognormal SD95 4.8
  (same comment as for Slag compartment)
- Disposal, plastics, mixture, 15.3% water, to municipal incineration [CH]: 3.88e-5 kg; lognormal SD95 1.13
  (same comment as for Light fuel oil, burned in boiler 100kW, non-modulating)
- Transport, freight, lorry, 16t-32t gross weight, fleet average [CH]: 3.89e-6 tkm; lognormal SD95 3.71
  (same comment as for Slag compartment)
- Hydrochloric acid, 30% in H2O, at plant [RER]: 1.73e-10 kg; lognormal SD95 6.22
  (same comment as for Slag compartment)
- Process-specific burdens, residual material landfill [CH]: 8.69e-7 kg; lognormal SD95 3.61
  (same comment as for Slag compartment)
- Quicklime, milled, packed, at plant [CH]: 1.93e-9 kg; lognormal SD95 3.96
  (same comment as for Slag compartment)
- Residual material landfill facility [CH]: 1.81e-15 p; lognormal SD95 3.61
  (same comment as for Slag compartment)
- Electricity, low voltage, at grid [CH]: 0.000897 kWh; lognormal SD95 3.17
  (same comment as for Light fuel oil, burned in boiler 100kW, non-modulating)
- Municipal waste incineration plant [CH]: 3.07e-14 p; lognormal SD95 4.8
  burden from incineration of sludge from wastewater treatment of the short-term leachate (0-100a).
- Chromium oxide, flakes, at plant [RER]: 1.25e-10 kg; lognormal SD95 5.97
  burden from incineration of sludge from wastewater treatment of the short-term leachate (0-100a). Proxy for vanadium pentoxide V2O5 in SCR catalyst, uncertainty calculated from uncertainty in average DeNOx input, uncertainty in the share of thermal NOx, uncertainty of nitrogen content in average municipal waste and the unertainty in nitrogen content in *this* waste and uncertainty of waste decomposition and short-term leaching in sanitary landfill
- Process-specific burdens, municipal waste incineration [CH]: 0.000123 kg; lognormal SD95 4.8
  (same comment as for Municipal waste incineration plant)
- Titanium dioxide, production mix, at plant [RER]: 6.15e-9 kg; lognormal SD95 5.97
  (same comment as for Slag compartment)
- Disposal, paper, 11.2% water, to municipal incineration [CH]: 3.88e-5 kg; lognormal SD95 1.13
  (same comment as for Light fuel oil, burned in boiler 100kW, non-modulating)
- Chemicals inorganic, at plant [GLO]: 2.88e-10 kg; lognormal SD95 6.22
  (same comment as for Slag compartment)
- Sanitary landfill facility [CH]: 5.56e-10 p; lognormal SD95 1
  demands per kilogram waste. uncertainty is heeded in the module
- Disposal, cement, hydrated, 0% water, to residual material landfill [CH]: 8.69e-7 kg; lognormal SD95 3.63
  (same comment as for Slag compartment)
- Natural gas, burned in boiler modulating >100kW [RER]: 6.23e-5 MJ; lognormal SD95 1.74
  (same comment as for Light fuel oil, burned in boiler 100kW, non-modulating)
- Wastewater treatment plant, class 3 [CH]: 1.42e-11 p; lognormal SD95 1.1
  (same comment as for Light fuel oil, burned in boiler 100kW, non-modulating)
- Ammonia, liquid, at regional storehouse [CH]: 2.15e-7 kg; lognormal SD95 4.41
  (same comment as for Slag compartment)
- Transport, freight, rail [RER]: 1.47e-6 tkm; lognormal SD95 7.57
  (same comment as for Slag compartment)
- Natural gas, burned in industrial furnace 1MW [CH]: 2.09e-5 MJ; lognormal SD95 4.41
  (same comment as for Slag compartment)
- Sodium hydroxide, 50% in H2O, production mix, at plant [RER]: 1.07e-8 kg; lognormal SD95 3.95
  (same comment as for Slag compartment)
- Iron (III) chloride, 40% in H2O, at plant [CH]: 4.88e-8 kg; lognormal SD95 6.67
  (same comment as for Slag compartment)
- Cement, unspecified, at plant [CH]: 3.48e-7 kg; lognormal SD95 3.63
  (same comment as for Slag compartment)
- Process-specific burdens, slag compartment [CH]: 3.89e-6 kg; lognormal SD95 4.22
  (same comment as for Slag compartment)
- Chemicals organic, at plant [GLO]: 2.05e-7 kg; lognormal SD95 12.5
  (same comment as for Slag compartment)
- Electricity from waste, at municipal waste incineration plant [CH]: 1.77e-5 kWh; lognormal SD95 7.32
  (same comment as for Slag compartment)
- Process-specific burdens, sanitary landfill [CH]: 1 kg; lognormal SD95 1
  demands per kilogram waste. uncertainty is heeded in the module

## Emissions to nature
- Copper [emissions to water, groundwater, long-term]: 0.000296 kg; lognormal SD95 6.1
  Emissions from long-term leachate (>100a) directly from MSW landfill and indirectly via incineration of treatement sludge from leachate treatement. Uncertainty calculated depending on waste input and uncertainty of long-term transfer coefficents in landfill.
- Cadmium [emissions to water, groundwater, long-term]: 7.57e-5 kg; lognormal SD95 7.38
  (same comment as for Copper)
- Carbon monoxide, fossil [emissions to air, low. pop.]: 8.99e-7 kg; lognormal SD95 7.57
  burden from direct release or incineration of landfill biogas. Uncertainty calculated from unertainty of the waste composition of this waste, uncertainty in waste decomposition and short-term leaching in sanitary landfill
- Aluminium [emissions to water, river]: 5.6e-9 kg; lognormal SD95 12.8
  Emissions from short-term leachate treatment and incineration of resulting sludge. Uncertainty calculated depending on waste input and uncertainty of transfer coefficents in landfill, wastewater treatment and incineration model.
- Chloride [emissions to water, groundwater, long-term]: 0.0177 kg; lognormal SD95 2.98
  (same comment as for Copper)
- Aluminium [emissions to water, groundwater, long-term]: 0.000187 kg; lognormal SD95 6.52
  (same comment as for Copper)
- Chromium [emissions to air, low. pop.]: 1.09e-12 kg; lognormal SD95 33.8
  (same comment as for Carbon monoxide, fossil)
- Aluminium [emissions to air, high. pop.]: 1.37e-10 kg; lognormal SD95 13.2
  (same comment as for Aluminium)
- Selenium [emissions to air, high. pop.]: 5e-18 kg; lognormal SD95 20.4
  (same comment as for Aluminium)
- Selenium [emissions to water, groundwater, long-term]: 5.53e-7 kg; lognormal SD95 15.5
  (same comment as for Copper)
- Lead [emissions to water, river]: 2.82e-9 kg; lognormal SD95 14.6
  (same comment as for Aluminium)
- Heat, waste [emissions to soil, industrial]: 0.2 MJ; lognormal SD95 2.92
  burden from short-term decomposition of waste (0-100a). Uncertainty calculated from unertainty of the waste composition of this waste, uncertainty in waste decomposition and short-term leaching in sanitary landfill
- Arsenic [emissions to water, river]: 2.81e-9 kg; lognormal SD95 17.8
  (same comment as for Aluminium)
- Antimony [emissions to air, low. pop.]: 1.06e-11 kg; lognormal SD95 28.7
  (same comment as for Carbon monoxide, fossil)
- Barium [emissions to air, high. pop.]: 1.87e-9 kg; lognormal SD95 9.59
  (same comment as for Aluminium)
- Fluoride [emissions to water, river]: 1.01e-8 kg; lognormal SD95 16
  Emissions from short-term leachate treatment. Uncertainty calculated depending on waste input and uncertainty of transfer coefficents in landfill and wastewater treatment.
- Zinc [emissions to air, low. pop.]: 5.49e-11 kg; lognormal SD95 25
  (same comment as for Carbon monoxide, fossil)
- Arsenic [emissions to air, high. pop.]: 8.96e-13 kg; lognormal SD95 18.3
  (same comment as for Aluminium)
- Bromine [emissions to water, river]: 1.64e-6 kg; lognormal SD95 9.59
  (same comment as for Fluoride)
- Copper [emissions to water, river]: 3.77e-9 kg; lognormal SD95 15.4
  (same comment as for Aluminium)
- Strontium [emissions to water, river]: 2.44e-8 kg; lognormal SD95 13.7
  (same comment as for Aluminium)
- Cyanide [emissions to air, high. pop.]: 3.83e-9 kg; lognormal SD95 4.51
  (same comment as for Aluminium)
- Cobalt [emissions to water, groundwater, long-term]: 2.94e-5 kg; lognormal SD95 8.32
  (same comment as for Copper)
- Nickel [emissions to air, high. pop.]: 1.9e-16 kg; lognormal SD95 17.2
  (same comment as for Aluminium)
- Cobalt [emissions to water, river]: 4.81e-8 kg; lognormal SD95 12.8
  (same comment as for Aluminium)
- Titanium [emissions to water, groundwater, long-term]: 0.000933 kg; lognormal SD95 5.12
  (same comment as for Copper)
- Ammonium, ion [emissions to water, river]: 7.39e-5 kg; lognormal SD95 4.03
  (same comment as for Aluminium)
- Vanadium [emissions to water, river]: 1.44e-7 kg; lognormal SD95 11.4
  (same comment as for Aluminium)
- Antimony [emissions to water, groundwater, long-term]: 4.03e-6 kg; lognormal SD95 22.2
  (same comment as for Copper)
- Cadmium [emissions to air, high. pop.]: 3.65e-12 kg; lognormal SD95 12.9
  (same comment as for Aluminium)
- Carbon dioxide, fossil [emissions to air, low. pop.]: 0.0159 kg; lognormal SD95 3.42
  (same comment as for Carbon monoxide, fossil)
- Mercury [emissions to air, low. pop.]: 2.17e-10 kg; lognormal SD95 22.5
  (same comment as for Carbon monoxide, fossil)
- Nickel [emissions to water, groundwater, long-term]: 1.92e-5 kg; lognormal SD95 8.79
  (same comment as for Copper)
- Iron [emissions to air, high. pop.]: 7.85e-12 kg; lognormal SD95 11.3
  (same comment as for Aluminium)
- Titanium [emissions to air, low. pop.]: 1.17e-10 kg; lognormal SD95 23.5
  (same comment as for Carbon monoxide, fossil)
- Iron [emissions to water, groundwater, long-term]: 0.000244 kg; lognormal SD95 20.3
  (same comment as for Copper)
- Nickel [emissions to water, river]: 6.78e-9 kg; lognormal SD95 15.8
  (same comment as for Aluminium)
- Carbon dioxide, fossil [emissions to air, high. pop.]: 0.00053 kg; lognormal SD95 6.15
  (same comment as for Aluminium)
- Ammonia [emissions to air, high. pop.]: 1.36e-7 kg; lognormal SD95 3.94
  (same comment as for Aluminium)
- Hydrogen sulfide [emissions to water, groundwater, long-term]: 0.000102 kg; lognormal SD95 4.79
  (same comment as for Copper)
- Nitrite [emissions to water, groundwater, long-term]: 0.000132 kg; lognormal SD95 3.7
  (same comment as for Copper)
- Nitrite [emissions to water, river]: 1.55e-6 kg; lognormal SD95 5.29
  (same comment as for Aluminium)
- Bromine [emissions to water, groundwater, long-term]: 6.37e-5 kg; lognormal SD95 7.53
  (same comment as for Copper)
- Heat, waste [emissions to water, river]: 0.00337 MJ; lognormal SD95 6.14
  (same comment as for Slag compartment)
- Vanadium [emissions to air, high. pop.]: 1.4e-11 kg; lognormal SD95 11.9
  (same comment as for Aluminium)
- Copper [emissions to air, high. pop.]: 7.94e-14 kg; lognormal SD95 16.2
  (same comment as for Aluminium)
- Heat, waste [emissions to water, groundwater, long-term]: 33.7 MJ; lognormal SD95 1.35
  burden from long-term decomposition of waste (>100a). Uncertainty calculated from unertainty of the waste composition of this waste, uncertainty in waste decomposition and short-term leaching in sanitary landfill
- Thallium [emissions to water, groundwater, long-term]: 3.73e-7 kg; lognormal SD95 13.5
  (same comment as for Copper)
- Manganese [emissions to air, low. pop.]: 2.14e-10 kg; lognormal SD95 22.5
  (same comment as for Carbon monoxide, fossil)
- Nitrogen oxides [emissions to air, high. pop.]: 1.33e-6 kg; lognormal SD95 3.86
  (same comment as for Aluminium)
- Titanium [emissions to water, river]: 2.37e-7 kg; lognormal SD95 10.8
  (same comment as for Aluminium)
- COD, Chemical Oxygen Demand [emissions to water, groundwater, long-term]: 0.176 kg; lognormal SD95 3.96
  (same comment as for Copper)
- Nitrate [emissions to water, river]: 0.000269 kg; lognormal SD95 3.71
  (same comment as for Aluminium)
- Beryllium [emissions to water, groundwater, long-term]: 4.66e-7 kg; lognormal SD95 13.2
  (same comment as for Copper)
- Thallium [emissions to air, low. pop.]: 5.42e-14 kg; lognormal SD95 42.2
  (same comment as for Carbon monoxide, fossil)
- Arsenic [emissions to water, groundwater, long-term]: 1.77e-6 kg; lognormal SD95 11.5
  (same comment as for Copper)
- Cobalt [emissions to air, low. pop.]: 2.37e-11 kg; lognormal SD95 27
  (same comment as for Carbon monoxide, fossil)
- Fluoride [emissions to water, groundwater, long-term]: 1.37e-5 kg; lognormal SD95 9.16
  (same comment as for Copper)
- Tin [emissions to air, low. pop.]: 3.6e-13 kg; lognormal SD95 36.6
  (same comment as for Carbon monoxide, fossil)
- Iron [emissions to water, river]: 2.42e-7 kg; lognormal SD95 10.8
  (same comment as for Aluminium)
- Mercury [emissions to water, river]: 1.72e-10 kg; lognormal SD95 20.8
  (same comment as for Aluminium)
- Vanadium [emissions to water, groundwater, long-term]: 7.82e-5 kg; lognormal SD95 9.03
  (same comment as for Copper)
- Bromine [emissions to air, low. pop.]: 2.31e-8 kg; lognormal SD95 14.7
  (same comment as for Carbon monoxide, fossil)
- Chromium [emissions to air, high. pop.]: 1.58e-16 kg; lognormal SD95 18.7
  (same comment as for Aluminium)
- Titanium [emissions to air, high. pop.]: 2.3e-10 kg; lognormal SD95 11.1
  (same comment as for Aluminium)
- Nickel [emissions to air, low. pop.]: 2.79e-12 kg; lognormal SD95 31.7
  (same comment as for Carbon monoxide, fossil)
- Nitrogen, organic bound [emissions to water, groundwater, long-term]: 0.00397 kg; lognormal SD95 3.7
  (same comment as for Copper)
- Thallium [emissions to water, river]: 1.1e-10 kg; lognormal SD95 22.5
  (same comment as for Aluminium)
- Sulfur dioxide [emissions to air, low. pop.]: 1.84e-6 kg; lognormal SD95 9.97
  (same comment as for Carbon monoxide, fossil)
- Lead [emissions to air, low. pop.]: 8.56e-12 kg; lognormal SD95 28.8
  (same comment as for Carbon monoxide, fossil)
- Aluminium [emissions to air, low. pop.]: 2.33e-11 kg; lognormal SD95 26.8
  (same comment as for Carbon monoxide, fossil)
- Antimony [emissions to air, high. pop.]: 2.08e-12 kg; lognormal SD95 21.8
  (same comment as for Aluminium)
- NMVOC, non-methane volatile organic compounds, unspecified origin [emissions to air, low. pop.]: 1.7e-8 kg; lognormal SD95 3.65
  (same comment as for Carbon monoxide, fossil)
- Barium [emissions to water, river]: 1.2e-7 kg; lognormal SD95 9.45
  (same comment as for Aluminium)
- TOC, Total Organic Carbon [emissions to water, groundwater, long-term]: 0.161 kg; lognormal SD95 3.96
  (same comment as for Copper)
- DOC, Dissolved Organic Carbon [emissions to water, groundwater, long-term]: 0.161 kg; lognormal SD95 3.96
  (same comment as for Copper)
- Ammonium, ion [emissions to water, groundwater, long-term]: 0.00243 kg; lognormal SD95 3.7
  (same comment as for Copper)
- Tin [emissions to air, high. pop.]: 1.11e-12 kg; lognormal SD95 19.6
  (same comment as for Aluminium)
- Strontium [emissions to air, low. pop.]: 1.2e-11 kg; lognormal SD95 28.3
  (same comment as for Carbon monoxide, fossil)
- Mercury [emissions to water, groundwater, long-term]: 7.92e-7 kg; lognormal SD95 12.5
  (same comment as for Copper)
- Carbon monoxide, fossil [emissions to air, high. pop.]: 3.43e-7 kg; lognormal SD95 6.5
  (same comment as for Aluminium)
- Sulfate [emissions to water, river]: 1.6e-5 kg; lognormal SD95 8.13
  (same comment as for Fluoride)
- Tin [emissions to water, groundwater, long-term]: 2.45e-5 kg; lognormal SD95 8.53
  (same comment as for Copper)
- Manganese [emissions to air, high. pop.]: 2.29e-15 kg; lognormal SD95 11.5
  (same comment as for Aluminium)
- Beryllium [emissions to water, river]: 1.38e-10 kg; lognormal SD95 22.1
  (same comment as for Aluminium)
- Barium [emissions to water, groundwater, long-term]: 0.000174 kg; lognormal SD95 6.49
  (same comment as for Copper)
- Copper [emissions to air, low. pop.]: 4.15e-12 kg; lognormal SD95 30.4
  (same comment as for Carbon monoxide, fossil)
- Tin [emissions to water, river]: 6.03e-10 kg; lognormal SD95 19.1
  (same comment as for Aluminium)
- Sodium [emissions to water, groundwater, long-term]: 0.00131 kg; lognormal SD95 4.81
  (same comment as for Copper)
- Methane, fossil [emissions to air, high. pop.]: 1.04e-6 kg; lognormal SD95 6.49
  (same comment as for Aluminium)
- Nitrogen [emissions to water, river]: 2e-6 kg; lognormal SD95 3.77
  (same comment as for Aluminium)
- BOD5, Biological Oxygen Demand [emissions to water, river]: 3.66e-5 kg; lognormal SD95 6.16
  (same comment as for Aluminium)
- Vanadium [emissions to air, low. pop.]: 7.09e-11 kg; lognormal SD95 24.6
  (same comment as for Carbon monoxide, fossil)
- Hydrogen fluoride [emissions to air, low. pop.]: 5.47e-8 kg; lognormal SD95 13.7
  (same comment as for Carbon monoxide, fossil)
- Iron [emissions to air, low. pop.]: 1.19e-10 kg; lognormal SD95 23.4
  (same comment as for Carbon monoxide, fossil)
- Strontium [emissions to air, high. pop.]: 2.36e-12 kg; lognormal SD95 14.2
  (same comment as for Aluminium)
- Heat, waste [emissions to air, low. pop.]: 0.0863 MJ; lognormal SD95 4.08
  (same comment as for Carbon monoxide, fossil)
- Cadmium [emissions to water, river]: 6.77e-8 kg; lognormal SD95 12.3
  (same comment as for Aluminium)
- Arsenic [emissions to air, low. pop.]: 4.46e-11 kg; lognormal SD95 25.7
  (same comment as for Carbon monoxide, fossil)
- Barium [emissions to air, low. pop.]: 4.98e-10 kg; lognormal SD95 20.9
  (same comment as for Carbon monoxide, fossil)
- TOC, Total Organic Carbon [emissions to water, river]: 2.94e-5 kg; lognormal SD95 6.14
  (same comment as for Aluminium)
- Heat, waste [emissions to air, high. pop.]: 0.00443 MJ; lognormal SD95 3.16
  (same comment as for Slag compartment)
- Sodium [emissions to water, river]: 5.66e-5 kg; lognormal SD95 6.13
  (same comment as for Fluoride)
- Strontium [emissions to water, groundwater, long-term]: 8.26e-5 kg; lognormal SD95 7.29
  (same comment as for Copper)
- Thallium [emissions to air, high. pop.]: 1.07e-13 kg; lognormal SD95 23
  (same comment as for Aluminium)
- Cobalt [emissions to air, high. pop.]: 1.48e-15 kg; lognormal SD95 14.1
  (same comment as for Aluminium)
- COD, Chemical Oxygen Demand [emissions to water, river]: 0.000116 kg; lognormal SD95 6.14
  (same comment as for Aluminium)
- Zinc [emissions to water, groundwater, long-term]: 0.000431 kg; lognormal SD95 5.67
  (same comment as for Copper)
- Lead [emissions to air, high. pop.]: 8.49e-13 kg; lognormal SD95 15.2
  (same comment as for Aluminium)
- Nitrogen oxides [emissions to air, low. pop.]: 3.94e-8 kg; lognormal SD95 7.86
  (same comment as for Carbon monoxide, fossil)
- Selenium [emissions to air, low. pop.]: 5.17e-13 kg; lognormal SD95 36
  (same comment as for Carbon monoxide, fossil)
- Sodium [emissions to air, low. pop.]: 1.41e-8 kg; lognormal SD95 15.4
  (same comment as for Carbon monoxide, fossil)
- Manganese [emissions to water, groundwater, long-term]: 7.25e-5 kg; lognormal SD95 7.34
  (same comment as for Copper)
- Lead [emissions to water, groundwater, long-term]: 0.000436 kg; lognormal SD95 5.76
  (same comment as for Copper)
- Chromium VI [emissions to water, groundwater, long-term]: 1.73e-7 kg; lognormal SD95 326
  (same comment as for Copper)
- Particulates, < 2.5 um [emissions to air, low. pop.]: 3.02e-7 kg; lognormal SD95 5.2
  (same comment as for Carbon monoxide, fossil)
- Chromium VI [emissions to water, river]: 2.28e-9 kg; lognormal SD95 17.3
  (same comment as for Aluminium)
- Beryllium [emissions to air, low. pop.]: 6.78e-14 kg; lognormal SD95 41.6
  (same comment as for Carbon monoxide, fossil)
- Manganese [emissions to water, river]: 4.33e-7 kg; lognormal SD95 10.2
  (same comment as for Aluminium)
- Beryllium [emissions to air, high. pop.]: 1.34e-13 kg; lognormal SD95 22.6
  (same comment as for Aluminium)
- Nitrate [emissions to water, groundwater, long-term]: 0.000256 kg; lognormal SD95 3.69
  (same comment as for Copper)
- Methane, fossil [emissions to air, low. pop.]: 0.00243 kg; lognormal SD95 3.65
  (same comment as for Carbon monoxide, fossil)
- NMVOC, non-methane volatile organic compounds, unspecified origin [emissions to air, high. pop.]: 4.71e-9 kg; lognormal SD95 7.32
  (same comment as for Aluminium)
- Cadmium [emissions to air, low. pop.]: 8.89e-10 kg; lognormal SD95 19.9
  (same comment as for Carbon monoxide, fossil)
- Antimony [emissions to water, river]: 2.87e-8 kg; lognormal SD95 13.9
  (same comment as for Aluminium)
- Zinc [emissions to water, river]: 7.64e-8 kg; lognormal SD95 11.5
  (same comment as for Aluminium)
- Sulfate [emissions to water, groundwater, long-term]: 0.00391 kg; lognormal SD95 4.79
  (same comment as for Copper)
- BOD5, Biological Oxygen Demand [emissions to water, groundwater, long-term]: 0.0416 kg; lognormal SD95 3.96
  (same comment as for Copper)
- Hydrogen chloride [emissions to air, low. pop.]: 6.58e-6 kg; lognormal SD95 8.04
  (same comment as for Carbon monoxide, fossil)
- Dinitrogen monoxide [emissions to air, high. pop.]: 3.76e-7 kg; lognormal SD95 3.6
  (same comment as for Aluminium)
- Mercury [emissions to air, high. pop.]: 9.19e-16 kg; lognormal SD95 21.6
  (same comment as for Aluminium)
- Zinc [emissions to air, high. pop.]: 2.79e-12 kg; lognormal SD95 12.2
  (same comment as for Aluminium)
- Selenium [emissions to water, river]: 1.38e-9 kg; lognormal SD95 18.5
  (same comment as for Aluminium)
- Chromium [emissions to water, river]: 6.82e-12 kg; lognormal SD95 17.7
  (same comment as for Aluminium)
- DOC, Dissolved Organic Carbon [emissions to water, river]: 2.83e-5 kg; lognormal SD95 6.16
  (same comment as for Aluminium)
- Chloride [emissions to water, river]: 0.000457 kg; lognormal SD95 4.44
  (same comment as for Fluoride)

## Sampling procedure
Landfill model based on observed leachate concentrations in literature. Extrapolated to 60'000 years heeding chemical characteristics. Initial waste composition from various literature sources.

## Uncertainty adjustments
uncertainty of waste input composition data derived from generic formula GSD(c) = N*ln(c)+1. Minimal long-term emissions are the emissions until the carbonate buffer in the landfill is used up. Mean long-term emissions are the emissions until the next glacial period occurs (in 60'000a) and the landfill is eroded. Maximal long-term emissions are the complete emissions of all landfilled material (except Cr).

## Sources
- Doka G., 2009, 2009 - LCI waste treatment services - Doka, Final report ecoinvent data v2.0, 13, Swiss Centre for LCI, Doka LCA, Duebendorf and St. Gallen, CH
Doka G. (2007) Life Cycle Inventories of Waste Treatment Services. Final report ecoinvent data v2.0. Volume: 13. Swiss Centre for LCI, Empa - TSL. Dübendorf, CH.
Type: Separate publication
Source: CD-ROM
First author: Doka G.
Year: 2007
Title of anthology: Final report ecoinvent data v2.0
Place of publication: Dübendorf, CH
Publisher: Swiss Centre for LCI, Empa - TSL
Volume No: 13

## Validation
Proof reading validation: Passed. Calculation for standard deviation 95 of, i.e., infrastructure, ; Other validation: none;
