# Ventilation system, centralized, average for 2 m3/(h m2)

Dataset: EcoSpold 1, unit process
Functional unit: 1 m2
Category: ventilation / production of components
Geography: CH
Time period: 2014-01 to 2014-12
Generated by: Alex Primas
accessRestrictedTo: 0
copyright: true

## General comment
Production of a ventilation system for a building with a specific air flow rate of 2 m3/h per m2 heated gross floor area. The reference value of the inventory is 1 m2 heated gross floor area. The inventory is based on average data of 4 office buildings, 3 schools and 3 residential care homes with a total heated gross floor area of 61719 m2 and a total nominal air flow of 302190 m3/h, specific weight of the components: 5.61 kg/m2, including average components for air handling units, ducts including insulation, air valves, roof-hoods, dampers, fire dampers, silencers. The data represent a ductwork mainly made of galvanized steel and includes air handling units mainly with heat recovery and a nominal air flow rate of 5'000-20'000 m3/h per unit. No ground heat exchanger is included.;

## Included processes
Materials used for the production. Energy use for the different production steps and for heating the production building. Transport of raw materials to the plant. Estimation for infrastructure of the production site included.

## Technology
Typical technology, materials and components used for ventilation systems in commercial and public buildings

## Time period
Amount of material investigated in 2013. Process information partly from 2003 to 2012

## Reference product
- Ventilation system, centralized, average for 2 m3/(h m2) [CH]: 1 m2
  SWITZERLAND

## Inputs from technosphere
- Ventilation duct, stainless steel, s= 0.75mm, at plant [CH]: 9.1357e-5 m2; lognormal SD95 1.24
  (2,4,1,1,1,5); Data for average installation
- Thermal insulation, 60mm, 40kg/m3, stainless steel cladding, at plant [CH]: 0.00082644 m2; lognormal SD95 1.24
  (2,4,1,1,1,5); Data for average installation
- Thermal insulation, 30mm, 40kg/m3, stainless steel cladding, at plant [CH]: 0.0018184 m2; lognormal SD95 1.24
  (2,4,1,1,1,5); Data for average installation
- Silencer for ventilator unit 13000 m3/h, modular, at plant [CH]: 0.00039266 p; lognormal SD95 1.26
  (3,4,1,1,1,5); Data for average unit, estimations
- Ventilation duct, stainless steel, s= 1.25mm, at plant [CH]: 0.0013371 m2; lognormal SD95 1.24
  (2,4,1,1,1,5); Data for average installation
- Ventilation duct, stainless steel, s= 1.5mm, at plant [CH]: 0.00098826 m2; lognormal SD95 1.24
  (2,4,1,1,1,5); Data for average installation
- Ventilator unit 3500 m3/h, modular, w. filter, without silencer, at plant [CH]: 2.2994e-5 p; lognormal SD95 1.26
  (3,4,1,1,1,5); Data for average unit, estimations
- Ventilation duct, stainless steel, s= 1.0mm, at plant [CH]: 0.001794 m2; lognormal SD95 1.24
  (2,4,1,1,1,5); Data for average installation
- Spiral-seam duct, steel, zinc coated, s= 0.6mm, at plant [CH]: 0.029293 m2; lognormal SD95 1.24
  (2,4,1,1,1,5); Data for average installation
- Ventilation duct, PE corrugated tube, DN 75, at plant [RER]: 0.11555 m; lognormal SD95 1.24
  (2,4,1,1,1,5); Data for average installation
- Ventilation unit 13000 m3/h, w. circuit connected heat exchanger, at plant [CH]: 6.1511e-5 p; lognormal SD95 1.26
  (3,4,1,1,1,5); Data for average unit, estimations
- Spiral-seam duct, stainless steel, s= 0.5mm, at plant [CH]: 0.00011047 m2; lognormal SD95 1.24
  (2,4,1,1,1,5); Data for average installation
- Spiral-seam duct, steel, zinc coated, s= 0.5mm, at plant [CH]: 0.049692 m2; lognormal SD95 1.24
  (2,4,1,1,1,5); Data for average installation
- Ventilation unit 6700 m3/h, w. circuit connected heat exchanger, at plant [CH]: 3.6276e-5 p; lognormal SD95 1.26
  (3,4,1,1,1,5); Data for average unit, estimations
- Ventilation unit 3500 m3/h, w. cross plate heat excanger, at plant [CH]: 6.7156e-5 p; lognormal SD95 1.26
  (3,4,1,1,1,5); Data for average unit, estimations
- Ventilation duct, stainless steel, s= 0.62mm, at plant [CH]: 0.00046666 m2; lognormal SD95 1.24
  (2,4,1,1,1,5); Data for average installation
- Ventilation unit 3500 m3/h, w. circuit connected heat exchanger, at plant [CH]: 6.1795e-6 p; lognormal SD95 1.26
  (3,4,1,1,1,5); Data for average unit, estimations
- Ventilation duct, stainless steel, s= 0.87mm, at plant [CH]: 0.0006829 m2; lognormal SD95 1.24
  (2,4,1,1,1,5); Data for average installation
- Ventilation duct, steel, zinc coated, s= 0.62mm, at plant [CH]: 0.077357 m2; lognormal SD95 1.24
  (2,4,1,1,1,5); Data for average installation
- Ventilation unit 6700 m3/h, w. rotary heat exchanger, at plant [CH]: 2.1883e-5 p; lognormal SD95 1.26
  (3,4,1,1,1,5); Data for average unit, estimations
- Thermal insulation, 60mm, 40kg/m3, reinforced alumium foil, at plant [CH]: 0.0072389 m2; lognormal SD95 1.24
  (2,4,1,1,1,5); Data for average installation
- Ventilation duct, steel, zinc coated, s= 1.25mm, at plant [CH]: 0.014226 m2; lognormal SD95 1.24
  (2,4,1,1,1,5); Data for average installation
- Ventilation unit 13000 m3/h, w. rotary heat exchanger, at plant [CH]: 4.5954e-5 p; lognormal SD95 1.26
  (3,4,1,1,1,5); Data for average unit, estimations
- Ventilation duct, steel, zinc coated, s= 1.0mm, at plant [CH]: 0.035074 m2; lognormal SD95 1.24
  (2,4,1,1,1,5); Data for average installation
- Ventilation equipment, central, 600-1200 m3/h, at plant [RER]: 2.5856e-5 p; lognormal SD95 1.26
  (3,4,1,1,1,5); Data for average unit, estimations
- Silencer for ventilator unit 6700 m3/h, modular, at plant, Device [CH]: 0.00025694 p; lognormal SD95 1.26
  (3,4,1,1,1,5); Data for average unit, estimations
- Ventilation duct, steel, zinc coated, s= 0.87mm, at plant [CH]: 0.048431 m2; lognormal SD95 1.24
  (2,4,1,1,1,5); Data for average installation
- Flexible duct, aluminum/PET, DN of 125, at plant [RER]: 0.019767 m; lognormal SD95 1.24
  (2,4,1,1,1,5); Data for average installation
- Ventilation unit 1800 m3/h, w. cross plate heat excanger, at plant [CH]: 2.0348e-5 p; lognormal SD95 1.26
  (3,4,1,1,1,5); Data for average unit, estimations
- Ventilation duct, steel, zinc coated, s= 1.5mm, at plant [CH]: 0.0052899 m2; lognormal SD95 1.24
  (2,4,1,1,1,5); Data for average installation
- EI 30 fire insulation, 50mm, 120kg/m3, reinforced alumium foil, at plant [CH]: 0.083546 m2; lognormal SD95 1.24
  (2,4,1,1,1,5); Data for average installation
- Spiral-seam duct, stainless steel, s= 0.8mm, at plant [CH]: 0.00029242 m2; lognormal SD95 1.24
  (2,4,1,1,1,5); Data for average installation
- Ventilator unit 13000 m3/h, modular, w. filter, without silencer, at plant [CH]: 1.5246e-5 p; lognormal SD95 1.26
  (3,4,1,1,1,5); Data for average unit, estimations
- Silencer for ventilator unit 1800 m3/h, modular, at plant, Device [CH]: 6.445e-5 p; lognormal SD95 1.26
  (3,4,1,1,1,5); Data for average unit, estimations
- Silencer for ventilator unit 3500 m3/h, modular, at plant [CH]: 0.00014722 p; lognormal SD95 1.26
  (3,4,1,1,1,5); Data for average unit, estimations
- Ventilation unit 6700 m3/h, w. cross plate heat excanger, at plant [CH]: 3.6931e-5 p; lognormal SD95 1.26
  (3,4,1,1,1,5); Data for average unit, estimations
- Spiral-seam duct, steel, zinc coated, s= 0.8mm, at plant [CH]: 0.0012418 m2; lognormal SD95 1.24
  (2,4,1,1,1,5); Data for average installation
- Ventilation unit 13000 m3/h, w. cross plate heat excanger, at plant [CH]: 1.3324e-5 p; lognormal SD95 1.26
  (3,4,1,1,1,5); Data for average unit, estimations
- Ventilation duct, steel, zinc coated, s= 0.75mm, at plant [CH]: 0.099793 m2; lognormal SD95 1.24
  (2,4,1,1,1,5); Data for average installation
- EI 60 fire insulation, 70mm, 120kg/m3, reinforced alumium foil, at plant [CH]: 0.017045 m2; lognormal SD95 1.24
  (2,4,1,1,1,5); Data for average installation
- Thermal insulation, 30mm, 40kg/m3, reinforced alumium foil, at plant [CH]: 0.1157 m2; lognormal SD95 1.24
  (2,4,1,1,1,5); Data for average installation
- Thermal insulation, 100mm, 40kg/m3, reinforced alumium foil, at plant [CH]: 0.0022137 m2; lognormal SD95 1.24
  (2,4,1,1,1,5); Data for average installation
- Ventilation system, various components, m2 [CH]: 1 m2; lognormal SD95 1.24
  (2,4,1,1,1,5); Data for average installation
- Spiral-seam duct, steel, zinc coated, s= 1.0mm, at plant [CH]: 2.1812e-5 m2; lognormal SD95 1.24
  (2,4,1,1,1,5); Data for average installation
- Thermal insulation, 100mm, 40kg/m3, alumium cladding, at plant [CH]: 0.0070241 m2; lognormal SD95 1.24
  (2,4,1,1,1,5); Data for average installation

## Sampling procedure
Data from different call of bids for ventilation system used. Data completed with information from literature and from manufacturers

## Sources
- Klingler M., Kasser U., Savi D., Primas A., Stettler Y., Gujer P., 2014, 2014 - LCA ventilation and heating systems - Klingler, Schlussbericht, BFE, Buero fuer Umweltchemie, B&H AG, Zuerich, CH
Klingler M., Kasser U., Savi D., Primas A., Stettler Y., Gujer P. (2014) Ökobilanzdaten für Lüftungs- und Wärmeanlagen. Schlussbericht, BFE. Bundesamt für Energie (BFE). Bern.
Type: Separate publication
Source: Report
First author: Klingler M.
Other authors: Kasser U., Savi D., Primas A., Stettler Y., Gujer P.
Year: 2014
Title of anthology: Schlussbericht, BFE
Place of publication: Bern
Publisher: Bundesamt für Energie (BFE)
