# xx Disposal, packaging paper, 13.7% water, to sanitary landfill

Dataset: EcoSpold 1, unit process
Functional unit: 1 kg
Category: waste treatment, obsolete / landfill, obsolete\sanitary landfill, obsolete
Geography: CH
Time period: 2000-01 to 2000-12
Generated by: Gabor Doka
accessRestrictedTo: 0
copyright: true

## General comment
Inventoried waste contains 100% packaging paper; . waste composition (wet, in ppm): upper heating value 16.77 MJ/kg; lower heating value 14.12 MJ/kg; H2O 110980; O 377790; H 53851; C 403520; S 1381.8; N 4098.6; P 124.15; B 19.101; Cl 1892.4; Br n.a.; F 21.631; I n.a.; Ag n.a.; As 2.2761; Ba 125.43; Cd 1.8323; Co 0.71627; Cr 14.922; Cu 64.327; Hg 0.14537; Mn 39.49; Mo 4.7751; Ni 10.235; Pb 79.273; Sb 0.7879; Se 2.8651; Sn n.a.; V n.a.; Zn 132.49; Be 1.0824; Sc n.a.; Sr 64.751; Ti 191.01; Tl 1.9101; W n.a.; Si 21297; Fe 1305; Ca 3820.1; Al 12415; K 955.03; Mg 4775.1; Na 1020.9; Share of carbon in waste that is biogenic 100%. Overall degradability of waste during 100 years: 27%.;;

## Included processes
Waste-specific short-term emissions to air via landfill gas incineration and landfill leachate. Burdens from treatment of short-term leachate (0-100a) in wastewater treatment plant (including WWTP sludge disposal in municipal incinerator). Long-term emissions from landfill to groundwater (after base lining failure).

## Geography
Technology encountered in Switzerland in 2000. Landfill includes base seal, leachate collection system, treatment of leachate in municipal wastewater treatment plant.

## Technology
Swiss municipal sanitary landfill for biogenic or untreated municipal waste ("reactive organic landfill"). Landfill gas and leachate collection system. Recultivation and monitoring for 150 years after closure.

## Reference product
- xx Disposal, packaging paper, 13.7% water, to sanitary landfill [CH]: 1 kg
  SWITZERLAND

## Inputs from technosphere
- Chromium oxide, flakes, at plant [RER]: 2.27e-9 kg; lognormal SD95 4.92
  burden from incineration of sludge from wastewater treatment of the short-term leachate (0-100a). Proxy for vanadium pentoxide V2O5 in SCR catalyst, uncertainty calculated from uncertainty in average DeNOx input, uncertainty in the share of thermal NOx, uncertainty of nitrogen content in average municipal waste and the unertainty in nitrogen content in *this* waste and uncertainty of waste decomposition and short-term leaching in sanitary landfill
- Process-specific burdens, residual material landfill [CH]: 0.000124 kg; lognormal SD95 2.64
  burden from incineration of sludge from wastewater treatment of the short-term leachate (0-100a). uncertainty is calculated from uncertainties in waste composition and transfer coefficients in incinerator and uncertainty of waste decomposition and short-term leaching in sanitary landfill
- Electricity, low voltage, at grid [CH]: 0.0152 kWh; lognormal SD95 2.63
  burden from wastewater treatment of the short-term leachate (0-100a). Uncertainty calculated from unertainty of the waste composition of this waste, uncertainty in waste decomposition and short-term leaching in sanitary landfill
- Natural gas, burned in industrial furnace 1MW [CH]: 0.000379 MJ; lognormal SD95 3.55
  (same comment as for Process-specific burdens, residual material landfill)
- Quicklime, milled, packed, at plant [CH]: 3.56e-8 kg; lognormal SD95 3.08
  (same comment as for Process-specific burdens, residual material landfill)
- Chemicals inorganic, at plant [GLO]: 1.14e-8 kg; lognormal SD95 7.53
  (same comment as for Process-specific burdens, residual material landfill)
- Chemicals organic, at plant [GLO]: 1.39e-7 kg; lognormal SD95 12.8
  (same comment as for Process-specific burdens, residual material landfill)
- Natural gas, burned in boiler modulating >100kW [RER]: 0.00104 MJ; lognormal SD95 2.4
  (same comment as for Electricity, low voltage, at grid)
- Electricity from waste, at municipal waste incineration plant [CH]: 0.000521 kWh; lognormal SD95 3.25
  (same comment as for Process-specific burdens, residual material landfill)
- Ammonia, liquid, at regional storehouse [CH]: 3.89e-6 kg; lognormal SD95 3.55
  (same comment as for Process-specific burdens, residual material landfill)
- Sewer grid, class 3 [CH]: 5.45e-10 km; lognormal SD95 1.1
  (same comment as for Electricity, low voltage, at grid)
- Process-specific burdens, sanitary landfill [CH]: 1 kg; lognormal SD95 1
  demands per kilogram waste. uncertainty is heeded in the module
- Residual material landfill facility [CH]: 2.58e-13 p; lognormal SD95 2.64
  (same comment as for Process-specific burdens, residual material landfill)
- Municipal waste incineration plant [CH]: 9.06e-13 p; lognormal SD95 2.2
  burden from incineration of sludge from wastewater treatment of the short-term leachate (0-100a).
- Light fuel oil, burned in boiler 100kW, non-modulating [CH]: 0.000769 MJ; lognormal SD95 2.4
  (same comment as for Electricity, low voltage, at grid)
- Slag compartment [CH]: 1.76e-12 p; lognormal SD95 2.88
  (same comment as for Process-specific burdens, residual material landfill)
- Titanium dioxide, production mix, at plant [RER]: 1.11e-7 kg; lognormal SD95 4.92
  (same comment as for Process-specific burdens, residual material landfill)
- Transport, freight, lorry, 16t-32t gross weight, fleet average [CH]: 0.000126 tkm; lognormal SD95 2.23
  (same comment as for Process-specific burdens, residual material landfill)
- Aluminium sulphate, powder, at plant [RER]: 2.4e-6 kg; lognormal SD95 9.49
  (same comment as for Electricity, low voltage, at grid)
- Heat from waste, at municipal waste incineration plant [CH]: 0.00304 MJ; lognormal SD95 2.21
  (same comment as for Process-specific burdens, residual material landfill)
- Iron sulphate, at plant [RER]: 8.89e-6 kg; lognormal SD95 9.49
  (same comment as for Electricity, low voltage, at grid)
- Iron (III) chloride, 40% in H2O, at plant [CH]: 1.23e-5 kg; lognormal SD95 9.31
  (same comment as for Process-specific burdens, residual material landfill)
- Wastewater treatment plant, class 3 [CH]: 1.42e-11 p; lognormal SD95 1.1
  (same comment as for Electricity, low voltage, at grid)
- Process-specific burdens, municipal waste incineration [CH]: 0.00362 kg; lognormal SD95 2.2
  (same comment as for Municipal waste incineration plant)
- Sodium hydroxide, 50% in H2O, production mix, at plant [RER]: 1.96e-7 kg; lognormal SD95 3.07
  (same comment as for Process-specific burdens, residual material landfill)
- Process-specific burdens, slag compartment [CH]: 0.000991 kg; lognormal SD95 2.88
  (same comment as for Process-specific burdens, residual material landfill)
- Transport, freight, rail [RER]: 2.96e-5 tkm; lognormal SD95 4.57
  (same comment as for Process-specific burdens, residual material landfill)
- Cement, unspecified, at plant [CH]: 4.96e-5 kg; lognormal SD95 2.66
  (same comment as for Process-specific burdens, residual material landfill)
- Sanitary landfill facility [CH]: 5.56e-10 p; lognormal SD95 1
  demands per kilogram waste. uncertainty is heeded in the module
- Disposal, cement, hydrated, 0% water, to residual material landfill [CH]: 0.000124 kg; lognormal SD95 2.66
  (same comment as for Process-specific burdens, residual material landfill)
- Hydrochloric acid, 30% in H2O, at plant [RER]: 6.84e-9 kg; lognormal SD95 7.53
  (same comment as for Process-specific burdens, residual material landfill)
- Disposal, plastics, mixture, 15.3% water, to municipal incineration [CH]: 3.88e-5 kg; lognormal SD95 1.13
  (same comment as for Electricity, low voltage, at grid)
- Disposal, paper, 11.2% water, to municipal incineration [CH]: 3.88e-5 kg; lognormal SD95 1.13
  (same comment as for Electricity, low voltage, at grid)

## Emissions to nature
- Heat, waste [emissions to water, groundwater, long-term]: 12.2 MJ; lognormal SD95 1.73
  burden from long-term decomposition of waste (>100a). Uncertainty calculated from unertainty of the waste composition of this waste, uncertainty in waste decomposition and short-term leaching in sanitary landfill
- Magnesium [emissions to water, river]: 0.000718 kg; lognormal SD95 4.32
  Emissions from short-term leachate treatment and incineration of resulting sludge. Uncertainty calculated depending on waste input and uncertainty of transfer coefficents in landfill, wastewater treatment and incineration model.
- Nitrogen, organic bound [emissions to water, groundwater, long-term]: 0.000889 kg; lognormal SD95 4.12
  Emissions from long-term leachate (>100a) directly from MSW landfill and indirectly via incineration of treatement sludge from leachate treatement. Uncertainty calculated depending on waste input and uncertainty of long-term transfer coefficents in landfill.
- Chromium [emissions to air, high. pop.]: 1.67e-15 kg; lognormal SD95 15
  (same comment as for Magnesium)
- Sodium [emissions to air, low. pop.]: 2.55e-7 kg; lognormal SD95 11.5
  burden from direct release or incineration of landfill biogas. Uncertainty calculated from unertainty of the waste composition of this waste, uncertainty in waste decomposition and short-term leaching in sanitary landfill
- Manganese [emissions to water, river]: 6.2e-6 kg; lognormal SD95 8.33
  (same comment as for Magnesium)
- Arsenic [emissions to water, river]: 9.73e-8 kg; lognormal SD95 13.1
  (same comment as for Magnesium)
- Hydrogen fluoride [emissions to air, low. pop.]: 2.33e-6 kg; lognormal SD95 9.64
  (same comment as for Sodium)
- Aluminium [emissions to air, high. pop.]: 2.47e-7 kg; lognormal SD95 5.37
  (same comment as for Magnesium)
- Arsenic [emissions to air, high. pop.]: 3.11e-11 kg; lognormal SD95 13.5
  (same comment as for Magnesium)
- Manganese [emissions to air, low. pop.]: 3.05e-9 kg; lognormal SD95 17.8
  (same comment as for Sodium)
- Nitrogen oxides [emissions to air, low. pop.]: 7.13e-7 kg; lognormal SD95 5.47
  (same comment as for Sodium)
- Strontium [emissions to air, low. pop.]: 2.54e-10 kg; lognormal SD95 22.2
  (same comment as for Sodium)
- Carbon dioxide, biogenic [emissions to air, low. pop.]: 0.273 kg; lognormal SD95 1.72
  (same comment as for Sodium)
- TOC, Total Organic Carbon [emissions to water, groundwater, long-term]: 0.0755 kg; lognormal SD95 4.56
  (same comment as for Nitrogen, organic bound)
- Nickel [emissions to air, low. pop.]: 4.02e-11 kg; lognormal SD95 25.9
  (same comment as for Sodium)
- Thallium [emissions to air, low. pop.]: 7.5e-12 kg; lognormal SD95 29.6
  (same comment as for Sodium)
- Cobalt [emissions to air, low. pop.]: 1.55e-11 kg; lognormal SD95 27.9
  (same comment as for Sodium)
- Manganese [emissions to air, high. pop.]: 3.27e-14 kg; lognormal SD95 9.48
  (same comment as for Magnesium)
- Selenium [emissions to air, low. pop.]: 2.04e-11 kg; lognormal SD95 27.3
  (same comment as for Sodium)
- Chromium VI [emissions to water, groundwater, long-term]: 6.98e-8 kg; lognormal SD95 341
  (same comment as for Nitrogen, organic bound)
- Molybdenum [emissions to water, river]: 8.04e-8 kg; lognormal SD95 12.7
  (same comment as for Magnesium)
- Sulfate [emissions to water, river]: 0.000432 kg; lognormal SD95 5.41
  Emissions from short-term leachate treatment. Uncertainty calculated depending on waste input and uncertainty of transfer coefficents in landfill and wastewater treatment.
- Zinc [emissions to air, low. pop.]: 3.77e-10 kg; lognormal SD95 21.4
  (same comment as for Sodium)
- Silicon [emissions to water, river]: 1.73e-5 kg; lognormal SD95 4.91
  (same comment as for Magnesium)
- Fluoride [emissions to water, groundwater, long-term]: 1.9e-5 kg; lognormal SD95 8.68
  (same comment as for Nitrogen, organic bound)
- Barium [emissions to air, high. pop.]: 3.65e-8 kg; lognormal SD95 7.46
  (same comment as for Magnesium)
- Cadmium [emissions to water, groundwater, long-term]: 1.75e-6 kg; lognormal SD95 11.6
  (same comment as for Nitrogen, organic bound)
- Titanium [emissions to air, high. pop.]: 1.27e-9 kg; lognormal SD95 9.3
  (same comment as for Magnesium)
- Silicon [emissions to air, high. pop.]: 6.29e-7 kg; lognormal SD95 4.98
  (same comment as for Magnesium)
- Chromium [emissions to water, river]: 7.21e-11 kg; lognormal SD95 14.2
  (same comment as for Magnesium)
- Copper [emissions to water, river]: 2.21e-8 kg; lognormal SD95 12.9
  (same comment as for Magnesium)
- Selenium [emissions to air, high. pop.]: 2.02e-16 kg; lognormal SD95 14.8
  (same comment as for Magnesium)
- COD, Chemical Oxygen Demand [emissions to water, groundwater, long-term]: 0.0826 kg; lognormal SD95 4.56
  (same comment as for Nitrogen, organic bound)
- Lead [emissions to air, low. pop.]: 4.2e-11 kg; lognormal SD95 25.7
  (same comment as for Sodium)
- Strontium [emissions to water, groundwater, long-term]: 6.42e-5 kg; lognormal SD95 7.45
  (same comment as for Nitrogen, organic bound)
- Nickel [emissions to water, groundwater, long-term]: 1.01e-5 kg; lognormal SD95 9.4
  (same comment as for Nitrogen, organic bound)
- Iron [emissions to water, groundwater, long-term]: 9.57e-5 kg; lognormal SD95 21
  (same comment as for Nitrogen, organic bound)
- Potassium [emissions to air, low. pop.]: 4.71e-8 kg; lognormal SD95 13.7
  (same comment as for Sodium)
- Nitrate [emissions to water, groundwater, long-term]: 6e-5 kg; lognormal SD95 3.91
  (same comment as for Nitrogen, organic bound)
- Beryllium [emissions to water, river]: 8.63e-9 kg; lognormal SD95 15.4
  (same comment as for Magnesium)
- Sulfur dioxide [emissions to air, low. pop.]: 4.87e-5 kg; lognormal SD95 6.77
  (same comment as for Sodium)
- Iron [emissions to air, high. pop.]: 3.28e-10 kg; lognormal SD95 7.4
  (same comment as for Magnesium)
- Cyanide [emissions to air, high. pop.]: 6.94e-8 kg; lognormal SD95 3.64
  (same comment as for Magnesium)
- Boron [emissions to water, groundwater, long-term]: 6.2e-6 kg; lognormal SD95 8.97
  (same comment as for Nitrogen, organic bound)
- DOC, Dissolved Organic Carbon [emissions to water, groundwater, long-term]: 0.0755 kg; lognormal SD95 4.56
  (same comment as for Nitrogen, organic bound)
- Silicon [emissions to air, low. pop.]: 7.19e-8 kg; lognormal SD95 13.4
  (same comment as for Sodium)
- Sodium [emissions to water, river]: 0.00102 kg; lognormal SD95 5.05
  (same comment as for Sulfate)
- Chloride [emissions to water, groundwater, long-term]: 0.000588 kg; lognormal SD95 4.66
  (same comment as for Nitrogen, organic bound)
- Particulates, < 2.5 um [emissions to air, low. pop.]: 5.19e-6 kg; lognormal SD95 3.4
  (same comment as for Sodium)
- Beryllium [emissions to air, low. pop.]: 4.25e-12 kg; lognormal SD95 30.9
  (same comment as for Sodium)
- DOC, Dissolved Organic Carbon [emissions to water, river]: 0.000486 kg; lognormal SD95 3.66
  (same comment as for Magnesium)
- Calcium [emissions to water, groundwater, long-term]: 0.0037 kg; lognormal SD95 4.02
  (same comment as for Nitrogen, organic bound)
- Potassium [emissions to water, groundwater, long-term]: 0.000766 kg; lognormal SD95 5.11
  (same comment as for Nitrogen, organic bound)
- Heat, waste [emissions to soil, industrial]: 2.11 MJ; lognormal SD95 2.33
  burden from short-term decomposition of waste (0-100a). Uncertainty calculated from unertainty of the waste composition of this waste, uncertainty in waste decomposition and short-term leaching in sanitary landfill
- NMVOC, non-methane volatile organic compounds, unspecified origin [emissions to air, high. pop.]: 8.1e-8 kg; lognormal SD95 4.63
  (same comment as for Magnesium)
- Barium [emissions to air, low. pop.]: 9.7e-9 kg; lognormal SD95 16
  (same comment as for Sodium)
- Chromium VI [emissions to water, river]: 2.4e-8 kg; lognormal SD95 13.8
  (same comment as for Magnesium)
- Iron [emissions to water, river]: 2.46e-6 kg; lognormal SD95 8.22
  (same comment as for Magnesium)
- Antimony [emissions to water, river]: 1.52e-8 kg; lognormal SD95 15.2
  (same comment as for Magnesium)
- Methane, biogenic [emissions to air, high. pop.]: 1.78e-5 kg; lognormal SD95 3.94
  (same comment as for Magnesium)
- Nickel [emissions to air, high. pop.]: 2.73e-15 kg; lognormal SD95 13.5
  (same comment as for Magnesium)
- Phosphorus [emissions to air, high. pop.]: 1.19e-9 kg; lognormal SD95 9.65
  (same comment as for Magnesium)
- Thallium [emissions to air, high. pop.]: 1.48e-11 kg; lognormal SD95 15
  (same comment as for Magnesium)
- Titanium [emissions to water, river]: 1.31e-6 kg; lognormal SD95 9
  (same comment as for Magnesium)
- Cobalt [emissions to air, high. pop.]: 9.72e-16 kg; lognormal SD95 15.4
  (same comment as for Magnesium)
- Magnesium [emissions to water, groundwater, long-term]: 0.00405 kg; lognormal SD95 3.8
  (same comment as for Nitrogen, organic bound)
- Mercury [emissions to air, high. pop.]: 4.55e-15 kg; lognormal SD95 19
  (same comment as for Magnesium)
- Nitrite [emissions to water, river]: 2.81e-5 kg; lognormal SD95 4.02
  (same comment as for Magnesium)
- Carbon monoxide, biogenic [emissions to air, low. pop.]: 1.55e-5 kg; lognormal SD95 5.46
  (same comment as for Sodium)
- Chloride [emissions to water, river]: 0.00129 kg; lognormal SD95 4.54
  (same comment as for Sulfate)
- Strontium [emissions to water, river]: 5.16e-7 kg; lognormal SD95 10.1
  (same comment as for Magnesium)
- Fluoride [emissions to water, river]: 4.29e-7 kg; lognormal SD95 11.1
  (same comment as for Sulfate)
- Lead [emissions to water, groundwater, long-term]: 7.92e-5 kg; lognormal SD95 7.37
  (same comment as for Nitrogen, organic bound)
- Nitrate [emissions to water, river]: 0.00488 kg; lognormal SD95 2.92
  (same comment as for Magnesium)
- Copper [emissions to air, high. pop.]: 4.65e-13 kg; lognormal SD95 13.7
  (same comment as for Magnesium)
- Beryllium [emissions to air, high. pop.]: 8.37e-12 kg; lognormal SD95 15.9
  (same comment as for Magnesium)
- Cadmium [emissions to air, low. pop.]: 5.8e-10 kg; lognormal SD95 20.7
  (same comment as for Sodium)
- Magnesium [emissions to air, high. pop.]: 1.07e-7 kg; lognormal SD95 4.52
  (same comment as for Magnesium)
- Carbon dioxide, biogenic [emissions to air, high. pop.]: 0.00911 kg; lognormal SD95 3.66
  (same comment as for Magnesium)
- Thallium [emissions to water, river]: 1.52e-8 kg; lognormal SD95 14.6
  (same comment as for Magnesium)
- Iron [emissions to air, low. pop.]: 1.21e-9 kg; lognormal SD95 19.3
  (same comment as for Sodium)
- Heat, waste [emissions to air, high. pop.]: 0.0752 MJ; lognormal SD95 2.41
  (same comment as for Process-specific burdens, residual material landfill)
- TOC, Total Organic Carbon [emissions to water, river]: 0.000506 kg; lognormal SD95 3.65
  (same comment as for Magnesium)
- Nitrogen oxides [emissions to air, high. pop.]: 2.41e-5 kg; lognormal SD95 3.05
  (same comment as for Magnesium)
- Zinc [emissions to water, river]: 5.24e-7 kg; lognormal SD95 9.45
  (same comment as for Magnesium)
- Cobalt [emissions to water, river]: 3.16e-8 kg; lognormal SD95 14.1
  (same comment as for Magnesium)
- BOD5, Biological Oxygen Demand [emissions to water, river]: 0.00063 kg; lognormal SD95 3.67
  (same comment as for Magnesium)
- Boron [emissions to water, river]: 1.12e-5 kg; lognormal SD95 8.81
  (same comment as for Magnesium)
- Methane, biogenic [emissions to air, low. pop.]: 0.0418 kg; lognormal SD95 1.96
  (same comment as for Sodium)
- Cobalt [emissions to water, groundwater, long-term]: 6.81e-7 kg; lognormal SD95 12
  (same comment as for Nitrogen, organic bound)
- Carbon monoxide, biogenic [emissions to air, high. pop.]: 6.24e-6 kg; lognormal SD95 3.68
  (same comment as for Magnesium)
- Ammonium, ion [emissions to water, river]: 0.00134 kg; lognormal SD95 3.14
  (same comment as for Magnesium)
- Ammonia [emissions to air, high. pop.]: 2.47e-6 kg; lognormal SD95 3.13
  (same comment as for Magnesium)
- Boron [emissions to air, high. pop.]: 1.13e-6 kg; lognormal SD95 8.97
  (same comment as for Magnesium)
- Calcium [emissions to air, high. pop.]: 2.2e-8 kg; lognormal SD95 5.6
  (same comment as for Magnesium)
- Molybdenum [emissions to air, high. pop.]: 1.34e-10 kg; lognormal SD95 13
  (same comment as for Magnesium)
- Cadmium [emissions to water, river]: 4.42e-8 kg; lognormal SD95 13.4
  (same comment as for Magnesium)
- Copper [emissions to water, groundwater, long-term]: 6.43e-5 kg; lognormal SD95 7.53
  (same comment as for Nitrogen, organic bound)
- Cadmium [emissions to air, high. pop.]: 2.38e-12 kg; lognormal SD95 14
  (same comment as for Magnesium)
- Aluminium [emissions to water, groundwater, long-term]: 0.0124 kg; lognormal SD95 3.18
  (same comment as for Nitrogen, organic bound)
- Phosphate [emissions to water, river]: 2.02e-6 kg; lognormal SD95 9.36
  (same comment as for Magnesium)
- Barium [emissions to water, groundwater, long-term]: 0.000119 kg; lognormal SD95 5.13
  (same comment as for Nitrogen, organic bound)
- Mercury [emissions to water, river]: 8.51e-10 kg; lognormal SD95 18.3
  (same comment as for Magnesium)
- Magnesium [emissions to air, low. pop.]: 1.99e-7 kg; lognormal SD95 11.9
  (same comment as for Sodium)
- Titanium [emissions to air, low. pop.]: 6.44e-10 kg; lognormal SD95 20.5
  (same comment as for Sodium)
- Nickel [emissions to water, river]: 9.75e-8 kg; lognormal SD95 12.3
  (same comment as for Magnesium)
- Hydrogen sulfide [emissions to water, groundwater, long-term]: 8.88e-5 kg; lognormal SD95 4.81
  (same comment as for Nitrogen, organic bound)
- Barium [emissions to water, river]: 2.33e-6 kg; lognormal SD95 7.34
  (same comment as for Magnesium)
- Calcium [emissions to water, river]: 0.000121 kg; lognormal SD95 5.38
  (same comment as for Magnesium)
- Molybdenum [emissions to air, low. pop.]: 3.4e-11 kg; lognormal SD95 26.3
  (same comment as for Sodium)
- Silicon [emissions to water, groundwater, long-term]: 0.000426 kg; lognormal SD95 56
  (same comment as for Nitrogen, organic bound)
- Aluminium [emissions to water, river]: 1.01e-5 kg; lognormal SD95 5.19
  (same comment as for Magnesium)
- Zinc [emissions to air, high. pop.]: 1.91e-11 kg; lognormal SD95 10
  (same comment as for Magnesium)
- Copper [emissions to air, low. pop.]: 2.43e-11 kg; lognormal SD95 26.8
  (same comment as for Sodium)
- Mercury [emissions to air, low. pop.]: 1.08e-9 kg; lognormal SD95 19.6
  (same comment as for Sodium)
- Phosphate [emissions to water, groundwater, long-term]: 2.67e-6 kg; lognormal SD95 211
  (same comment as for Nitrogen, organic bound)
- Antimony [emissions to water, groundwater, long-term]: 8.38e-8 kg; lognormal SD95 29.2
  (same comment as for Nitrogen, organic bound)
- Aluminium [emissions to air, low. pop.]: 4.19e-8 kg; lognormal SD95 14
  (same comment as for Sodium)
- Hydrogen chloride [emissions to air, low. pop.]: 1.85e-5 kg; lognormal SD95 6.99
  (same comment as for Sodium)
- Lead [emissions to air, high. pop.]: 4.17e-12 kg; lognormal SD95 13
  (same comment as for Magnesium)
- Selenium [emissions to water, river]: 5.45e-8 kg; lognormal SD95 13.4
  (same comment as for Magnesium)
- Lead [emissions to water, river]: 1.39e-8 kg; lognormal SD95 12.5
  (same comment as for Magnesium)
- Potassium [emissions to water, river]: 0.000189 kg; lognormal SD95 5.52
  (same comment as for Sulfate)
- Strontium [emissions to air, high. pop.]: 5.01e-11 kg; lognormal SD95 10.5
  (same comment as for Magnesium)
- NMVOC, non-methane volatile organic compounds, unspecified origin [emissions to air, low. pop.]: 2.93e-7 kg; lognormal SD95 1.96
  (same comment as for Sodium)
- Nitrogen [emissions to water, river]: 3.63e-5 kg; lognormal SD95 2.98
  (same comment as for Magnesium)
- Dinitrogen monoxide [emissions to air, high. pop.]: 6.8e-6 kg; lognormal SD95 2.86
  (same comment as for Magnesium)
- Heat, waste [emissions to air, low. pop.]: 1.48 MJ; lognormal SD95 2.03
  (same comment as for Sodium)
- COD, Chemical Oxygen Demand [emissions to water, river]: 0.002 kg; lognormal SD95 3.65
  (same comment as for Magnesium)
- Zinc [emissions to water, groundwater, long-term]: 0.000108 kg; lognormal SD95 6.9
  (same comment as for Nitrogen, organic bound)
- BOD5, Biological Oxygen Demand [emissions to water, groundwater, long-term]: 0.0196 kg; lognormal SD95 4.56
  (same comment as for Nitrogen, organic bound)
- Thallium [emissions to water, groundwater, long-term]: 1.89e-6 kg; lognormal SD95 11.4
  (same comment as for Nitrogen, organic bound)
- Selenium [emissions to water, groundwater, long-term]: 8.12e-7 kg; lognormal SD95 14.6
  (same comment as for Nitrogen, organic bound)
- Titanium [emissions to water, groundwater, long-term]: 0.000189 kg; lognormal SD95 6.48
  (same comment as for Nitrogen, organic bound)
- Nitrite [emissions to water, groundwater, long-term]: 2.96e-5 kg; lognormal SD95 4.12
  (same comment as for Nitrogen, organic bound)
- Arsenic [emissions to water, groundwater, long-term]: 2.18e-6 kg; lognormal SD95 11.1
  (same comment as for Nitrogen, organic bound)
- Antimony [emissions to air, high. pop.]: 1.1e-12 kg; lognormal SD95 23.5
  (same comment as for Magnesium)
- Beryllium [emissions to water, groundwater, long-term]: 1.07e-6 kg; lognormal SD95 12
  (same comment as for Nitrogen, organic bound)
- Manganese [emissions to water, groundwater, long-term]: 3.19e-5 kg; lognormal SD95 6.57
  (same comment as for Nitrogen, organic bound)
- Arsenic [emissions to air, low. pop.]: 1.55e-9 kg; lognormal SD95 19
  (same comment as for Sodium)
- Antimony [emissions to air, low. pop.]: 5.61e-12 kg; lognormal SD95 30.2
  (same comment as for Sodium)
- Molybdenum [emissions to water, groundwater, long-term]: 1.89e-6 kg; lognormal SD95 12
  (same comment as for Nitrogen, organic bound)
- Mercury [emissions to water, groundwater, long-term]: 1.42e-7 kg; lognormal SD95 14.8
  (same comment as for Nitrogen, organic bound)
- Sodium [emissions to water, groundwater, long-term]: 1.02e-12 kg; lognormal SD95 24.8
  (same comment as for Nitrogen, organic bound)
- Chromium [emissions to air, low. pop.]: 1.15e-11 kg; lognormal SD95 28.6
  (same comment as for Sodium)
- Calcium [emissions to air, low. pop.]: 3.36e-8 kg; lognormal SD95 14.2
  (same comment as for Sodium)
- Ammonium, ion [emissions to water, groundwater, long-term]: 0.000544 kg; lognormal SD95 4.12
  (same comment as for Nitrogen, organic bound)
- Sulfate [emissions to water, groundwater, long-term]: 0.0034 kg; lognormal SD95 4.81
  (same comment as for Nitrogen, organic bound)
- Heat, waste [emissions to water, river]: 0.058 MJ; lognormal SD95 3.65
  (same comment as for Process-specific burdens, residual material landfill)

## Sampling procedure
Landfill model based on observed leachate concentrations in literature. Extrapolated to 60'000 years heeding chemical characteristics. Initial waste composition from various literature sources.

## Uncertainty adjustments
uncertainty of waste input composition data derived from generic formula GSD(c) = N*ln(c)+1. Minimal long-term emissions are the emissions until the carbonate buffer in the landfill is used up. Mean long-term emissions are the emissions until the next glacial period occurs (in 60'000a) and the landfill is eroded. Maximal long-term emissions are the complete emissions of all landfilled material (except Cr).

## Sources
- Doka G., 2009, 2009 - LCI waste treatment services - Doka, Final report ecoinvent data v2.0, 13, Swiss Centre for LCI, Doka LCA, Duebendorf and St. Gallen, CH
Doka G. (2007) Life Cycle Inventories of Waste Treatment Services. Final report ecoinvent data v2.0. Volume: 13. Swiss Centre for LCI, Empa - TSL. Dübendorf, CH.
Type: Separate publication
Source: CD-ROM
First author: Doka G.
Year: 2007
Title of anthology: Final report ecoinvent data v2.0
Place of publication: Dübendorf, CH
Publisher: Swiss Centre for LCI, Empa - TSL
Volume No: 13

## Validation
Proof reading validation: Passed. Calculation for standard deviation 95 of, i.e., infrastructure, ; Other validation: none;
