# Distribution sheds

Dataset: EcoSpold 1, unit process
Functional unit: 1 p
Category: transport systems / road\Transformation\Infrastructure
Geography: RER
Time period: 2020-01 to 2020-12
Generated by: Romain Sacchi
accessRestrictedTo: 0
copyright: False

## General comment
Housing sheds for tranformers and other electrical equipment, per km. Original source: https://doi.org/10.3390/su10041148.

## Time period
Base technology year of 2020

## Reference product
- Distribution sheds [RER]: 1 p

## Inputs from technosphere
- Steel, low-alloyed, at plant [RER]: 145 kg; lognormal SD95 1.25585
  Uncertainty from pedigree matrix: (4, 4, 3, 2, 1, 2)
- Steel product manufacturing, average metal working [RER]: 145 kg; lognormal SD95 1.25585
  Uncertainty from pedigree matrix: (4, 4, 3, 2, 1, 2)
- Transport, freight, rail [RER]: 29 tkm; lognormal SD95 1.25585
  Uncertainty from pedigree matrix: (4, 4, 3, 2, 1, 2)
- Transport, freight, lorry, 16t-32t gross weight, fleet average [RER]: 14.5 tkm; lognormal SD95 1.25585
  Uncertainty from pedigree matrix: (4, 4, 3, 2, 1, 2)

## Sources
- Sacchi R., Bauer C., 2023, 2023 - LCI on-road vehicles - Sacchi, PSI, Villigen, CH
doi: 10.5281/ZENODO.5156043
