# Disposal, heat pump, brine-water, per kg

Dataset: EcoSpold 1, unit process
Functional unit: 1 kg
Category: waste management / building demolition
Geography: CH
Time period: 1994-01 to 2008-12
Generated by: Cyrill Kern
accessRestrictedTo: 0
copyright: true

## General comment
Inventory for the disposal of a brine-water heat pump, 7kW.;

## Included processes
Disposal of the heat pump (158 kg). Transport to WEEE dismantling facilities, machines for handling in sorting plant, electricity demand for sorting plant, final disposal of waste material. Cut-off to recycling for metals.

## Geography
Data apply to the supply in Switzerland.

## Technology
average technology available on the market

## Reference product
- Disposal, heat pump, brine-water, per kg [CH]: 1 kg
  SWITZERLAND

## Inputs from technosphere
- Disposal, heat pump, brine-water, 7kW [CH]: 0.006329 p
  (2,3,1,1,1,5); uncertainty of average value, Basic uncertainty: 1.05

## Sources
- Kaegi T., Waldburger L., Kern C., Roberts G., Zschokke M., Conte F., Weber L., 2021, 2021 - LCI heating systems - Kaegi, Carbotech im Auftrag des BAFU, Carbotech AG, Zuerich, CH
Kägi Thomas, Livia Waldburger, Cyril Kern, Gavin Roberts, Mischa Zschokke, Flora Conte, Lea Weber (2020) LCI of heating systems. Carbotech im Auftrag des BAFU. Carbotech AG. Zürich. CH.
Type: Separate publication
Source: Report
First author: Kägi Thomas
Other authors: Livia Waldburger, Cyril Kern, Gavin Roberts, Mischa Zschokke, Flora Conte, Lea Weber
Year: 2020
Title of anthology: Carbotech im Auftrag des BAFU
Place of publication: Zürich. CH
Publisher: Carbotech AG

## Validation
Proof reading validation: 19.02.2021; Other validation: Z:\Schreibtisch\WinShare\BAFU Heizsysteme\A_zum konvertieren\WP\[EcoSpold_disposal_heat pump, brine-water _NEU 7kW_v0.2.xlsx]X-Process;
