# Locomotive

Dataset: EcoSpold 1, unit process, infrastructure
Functional unit: 1 p
Category: transport systems / train\operations\infrastructure
Geography: RER
Time period: 2000-01 to 2000-12
Generated by: Michael Spielmann
accessRestrictedTo: 0
copyright: true

## General comment
The exchanges of the locomotive manufacturing are derived from an assessment of the RE 460, a locomotive which is currently used for goods transportation in Switzerland and also in Germany. The life span of the locomotive Re 460 is assumed to be 40 years resulting in a life time performance of 9.6 Mio. kilometres. The materials with a weight above 200 kg are accounted for. A detailed specification of electronic components was not possible. Total weight of the locomotive is about 84t.;

## Included processes
This inventory calls processes of material production, representing the material composition of one locomotive. For manufacturing, electricity and light oil burned in industrial furnance are included. For the transportation of materials standandard distance are applied.

## Geography
Manufacturing data represents a locomotive produced in Germany

## Technology
The modelled locomotive is a rather modern locomotive. For older locomotives, which are still in operation, aluminium and plastic share may be lower.

## Reference product
- Locomotive [RER]: 1 p
  Europe

## Inputs from technosphere
- Glued laminated timber, average glue mix, at plant [RER]: 0.594 m3; lognormal SD95 1.27
  (4,3,2,1,1,3); oral communication
- Polyethylene, HDPE, granulate, at plant [RER]: 6340 kg; lognormal SD95 1.27
  (4,3,2,1,1,3); oral communication
- Chromium steel 18/8, at plant [RER]: 2810 kg; lognormal SD95 1.27
  (4,3,2,1,1,3); oral communication
- Polyvinylchloride, at regional storage [RER]: 351 kg; lognormal SD95 1.27
  (4,3,2,1,1,3); oral communication
- Copper, at regional storage [RER]: 6810 kg; lognormal SD95 1.27
  (4,3,2,1,1,3); oral communication
- Electricity, medium voltage, production ENTSO-E, at grid: 152000 kWh; lognormal SD95 1.27
  (4,3,2,1,1,3); oral communication
- Rock wool, packed, at plant [CH]: 32 kg; lognormal SD95 1.27
  (4,3,2,1,1,3); oral communication
- Reinforcing steel, at plant [RER]: 34200 kg; lognormal SD95 1.27
  (4,3,2,1,1,3); oral communication
- Transport, freight, lorry, fleet average [RER]: 3530 tkm; lognormal SD95 2.28
  (4,5,na,na,na,na); calculation based on standadard distances
- Lubricating oil, at plant [RER]: 3560 kg; lognormal SD95 1.27
  (4,3,2,1,1,3); oral communication
- Steel, low-alloyed, at plant [RER]: 16400 kg; lognormal SD95 1.27
  (4,3,2,1,1,3); oral communication
- Alkyd paint, white, 60% in solvent, at plant [RER]: 385 kg; lognormal SD95 1.27
  (4,3,2,1,1,3); oral communication
- Aluminium, production mix, at plant [RER]: 5550 kg; lognormal SD95 1.27
  (4,3,2,1,1,3); oral communication
- Light fuel oil, burned in industrial furnace 1MW, non-modulating [RER]: 1.44e6 MJ; lognormal SD95 1.27
  (4,3,2,1,1,3); oral communication
- Flat glass, uncoated, at plant [RER]: 235 kg; lognormal SD95 1.27
  (4,3,2,1,1,3); oral communication
- Transport, freight, rail [RER]: 14400 tkm; lognormal SD95 2.28
  (4,5,na,na,na,na); calculation based on standadard distances
- Lead, at regional storage [RER]: 263 kg; lognormal SD95 1.27
  (4,3,2,1,1,3); oral communication

## Emissions to nature
- Heat, waste [emissions to air, unspecified]: 547000 MJ; lognormal SD95 1.27
  (4,3,2,1,1,3); standard value

## Sampling procedure
The data of the material composition and energy consumption is based on oral communication with an expert of one company.

## Extrapolations
Data for one locomotive in operation in Switzerland is used as an estimate for Europe

## Sources
- Spielmann M., Bauer C., Dones R., Tuchschmid M., 2007, 2007 - Transport services - Spielmann, Final report ecoinvent Data v2.0, 14, Swiss Centre for LCI, PSI, ESU-services Ltd., Duebendorf, Villigen and Uster, CH
Spielmann M., Dones R; Bauer C. (2007) Life Cycle Inventories of Transport Services. Final report ecoinvent Data v2.0. Volume: 14. Issue: 0. Swiss Centre for LCI, PSI. Dübendorf and Villigen, CH.
Type: Measurement on site
Source: CD-ROM
First author: Spielmann M.
Other authors: Dones R; Bauer C.
Year: 2007
Title of anthology: Final report ecoinvent Data v2.0
Place of publication: Dübendorf and Villigen, CH
Publisher: Swiss Centre for LCI, PSI
Volume No: 14
Issue No: 0

## Validation
Proof reading validation: passed; Other validation: none;
