# Silencer for ventilator unit 1800 m3/h, modular, at plant, Device

Dataset: EcoSpold 1, unit process
Functional unit: 1 p
Category: ventilation / production of components
Geography: CH
Time period: 2014-01 to 2014-12
Generated by: Alex Primas
accessRestrictedTo: 0
copyright: true

## General comment
Production of a silencer for a air handling unit with 1800 m3/h nominal air flow rate (at 2 m/s air speed in cross section of air filter or heat exchanger), total weight: 90 kg/Unit, including a frame construction, casing, silencer baffle with section length 900mm. The frame construction made of aluminium-profiles, casing made of hot-dip galvanized and powder coated steel sheets insulated with polyurethane foam, rock wool as sound-absorbing media.;

## Included processes
Materials used for the production. Energy use for the different production steps and for heating the production building. Transport of raw materials to the plant. Estimation for infrastructure of the production site included.

## Technology
Typical technology, materials and components used for ventilation systems in commercial and public buildings

## Time period
Amount of material investigated in 2013. Process information from 2003 to 2012

## Reference product
- Silencer for ventilator unit 1800 m3/h, modular, at plant, Device [CH]: 1 p
  SWITZERLAND

## Inputs from technosphere
- Transport, freight, lorry, 16t-32t gross weight, fleet average [CH]: 4.5 tkm; lognormal SD95 2.14
  (4,5,1,1,1,5); Standard distance of ecoinvent used
- Steel, converter, unalloyed, at plant [RER]: 43.379 kg; lognormal SD95 1.24
  (2,4,1,1,1,5); Data for typical product
- Section bar extrusion, aluminium [RER]: 7.2 kg; lognormal SD95 1.26
  (3,4,1,1,1,5); Data related to material input
- Aluminium, production mix, wrought alloy, at plant [RER]: 7.2 kg; lognormal SD95 1.24
  (2,4,1,1,1,5); Data for typical product
- Sheet rolling, steel [RER]: 68.856 kg; lognormal SD95 1.26
  (3,4,1,1,1,5); Data related to material input
- Transport, freight, rail [RER]: 45.543 tkm; lognormal SD95 2.14
  (4,5,1,1,1,5); Standard distance of ecoinvent used
- Polyurethane, rigid foam, at plant [RER]: 3.3912 kg; lognormal SD95 1.24
  (2,4,1,1,1,5); Data for typical product
- Zinc coating, pieces, adjustment per um [RER]: -120.55 m2; lognormal SD95 1.26
  (3,4,1,1,1,5); Data for typical product, estimations
- Electricity, medium voltage, production ENTSO-E, at grid: 54 kWh; lognormal SD95 1.34
  (3,4,1,1,3,5); Data from similar processes, companies
- Steel, electric, un- and low-alloyed, at plant [RER]: 25.477 kg; lognormal SD95 1.24
  (2,4,1,1,1,5); Data for typical product
- Powder coating, steel [RER]: 4.32 m2; lognormal SD95 1.26
  (3,4,1,1,1,5); Data related to material input, estimations
- Rock wool, at plant [CH]: 10.552 kg; lognormal SD95 1.26
  (3,4,1,1,1,5); Data for typical product, estimations
- Metal working factory operation, average heat energy [RER]: 90 kg; lognormal SD95 1.38
  (4,5,1,1,1,5); Avarage value for similar production
- Metal working factory [RER]: 4.122e-8 p; lognormal SD95 3.18
  (4,5,1,1,3,5); Avarage value for similar production
- Zinc coating, coils [RER]: 7.8792 m2; lognormal SD95 1.26
  (3,4,1,1,1,5); Data for typical product, estimations

## Emissions to nature
- Heat, waste [emissions to air, high. pop.]: 194.4 MJ; lognormal SD95 1.34
  (3,4,1,1,3,5); Calculated from electricity use

## Sampling procedure
Manufacturer informations and literature data. Data of typical product used.

## Sources
- Klingler M., Kasser U., Savi D., Primas A., Stettler Y., Gujer P., 2014, 2014 - LCA ventilation and heating systems - Klingler, Schlussbericht, BFE, Buero fuer Umweltchemie, B&H AG, Zuerich, CH
Klingler M., Kasser U., Savi D., Primas A., Stettler Y., Gujer P. (2014) Ökobilanzdaten für Lüftungs- und Wärmeanlagen. Schlussbericht, BFE. Bundesamt für Energie (BFE). Bern.
Type: Separate publication
Source: Report
First author: Klingler M.
Other authors: Kasser U., Savi D., Primas A., Stettler Y., Gujer P.
Year: 2014
Title of anthology: Schlussbericht, BFE
Place of publication: Bern
Publisher: Bundesamt für Energie (BFE)
