# xxx Fibreboard soft, latex bonded, at plant (u=7%)

Dataset: EcoSpold 1, unit process
Functional unit: 1 m3
Category: material, obsolete / wood, obsolete\products, obsolete
Geography: CH
Share of production covered: 1 %
Generated by: Frank Werner
accessRestrictedTo: 0
copyright: true

## General comment
240 kg/m3;

## Included processes
includes all inputs to the production processes, transport, wastes and emissions to air and water; does not include any packaging material; 100% allocation as a default

## Technology
wet process, medium enterprise technology (2008)

## Reference product
- xxx Fibreboard soft, latex bonded, at plant (u=7%) [CH]: 1 m3
  SWITZERLAND

## Inputs from technosphere
- Transport, freight, lorry, 16t-32t gross weight, fleet average [RER]: 0.098 tkm; lognormal SD95 2
  (1,1,1,1,1,1,5)
- Wood chips, from industry, softwood, burned in furnace 1000kW [CH]: 482.4 MJ; lognormal SD95 1.05
  (1,1,1,1,1,1,1)
- xxx Heat, natural gas, at industrial furnace low-NOx >100kW [RER]: 316.8 MJ; lognormal SD95 1.05
  (1,1,1,1,1,1,1)
- Tap water, at user [CH]: 640 kg; lognormal SD95 1.05
  (1,1,1,1,1,1,4)
- Electricity, medium voltage, at grid [CH]: 130 kWh; lognormal SD95 1.05
  (1,1,1,1,1,1,2)
- Light fuel oil, at regional storage [CH]: -13.102 kg; lognormal SD95 1.05
  (1,1,1,1,1,1,1)
- xxx Wood chips, softwood, from industry, u=40%, at plant [RER]: 0.4722 m3; lognormal SD95 1.05
  (1,1,1,1,1,1,1)
- Aluminium sulphate, powder, at plant [RER]: 0.2856 kg; lognormal SD95 1.05
  (1,1,1,1,1,1,4)
- Heat, light fuel oil, at industrial furnace 1MW [CH]: 532.8 MJ; lognormal SD95 1.0714
  (1,1,1,1,1,3,1)
- Paraffin, at plant [RER]: 1.872 kg; lognormal SD95 1.05
  (1,1,1,1,1,1,4)
- Vinyl acetate, at plant [RER]: 3.6 kg; lognormal SD95 1.05
  (1,1,1,1,1,1,4)
- Transport, freight, lorry, 32t-40t gross weight, fleet average [RER]: 34.3 tkm; lognormal SD95 2
  (1,1,1,1,1,1,5)
- Latex, at plant [RER]: 5.4 kg; lognormal SD95 1.05
  (1,1,1,1,1,1,4)
- Wooden board manufacturing plant, organic bonded boards [RER]: 6.6667e-9 p; lognormal SD95 3
  (1,1,1,1,1,1,9)
- xxx Industrial residue wood, softwood, forest-debarked, air dried, u=20%, at plant [RER]: 0.047556 m3; lognormal SD95 1.05
  (1,1,1,1,1,1,4)
- xxx Industrial wood, softwood, under bark, u=140%, at forest road [RER]: 0.0021578 m3; lognormal SD95 1.05
  (1,1,1,1,1,1,4)
- Treatment, soft fibreboard production effluent, to wastewater treatment, class 3 [CH]: 0.411 m3; lognormal SD95 1.2077
  (1,1,1,1,1,5,6)
- Heavy fuel oil, burned in industrial furnace 1MW, non-modulating [CH]: 272.16 MJ; lognormal SD95 1.05
  (1,1,1,1,1,1,1)
- Disposal, wood ash mixture, pure, 0% water, to sanitary landfill [CH]: 0.53 kg; lognormal SD95 1.05
  (1,1,1,1,1,1,6)
- Disposal, municipal solid waste, 22.9% water, to municipal incineration [CH]: 2.29 kg; lognormal SD95 1.05
  (1,1,1,1,1,1,6)
- Disposal, raw sewage sludge, to municipal incineration [CH]: 4.62 kg; lognormal SD95 1.05
  (1,1,1,1,1,1,6)
- Disposal, inert waste, 5% water, to construction waste landfill [CH]: 0.155 kg; lognormal SD95 1.05
  (1,1,1,1,1,1,6)

## Inputs from nature
- Water, cooling, unspecified natural origin/m3 [resources, in water]: 0.72 m3; lognormal SD95 1.05
  (1,1,1,1,1,1,4)

## Emissions to nature
- Carbon dioxide, biogenic [emissions to air, low. pop.]: 41.399 kg; lognormal SD95 1.05
  (1,1,1,1,1,1,1)
- Carbon dioxide, fossil [emissions to air, high. pop.]: -41.399 kg; lognormal SD95 1.05
  (1,1,1,1,1,1,1)
- Particulates, > 10 um [emissions to air, high. pop.]: 0.00929 kg; lognormal SD95 2
  (1,1,1,1,1,1,26)
- NMVOC, non-methane volatile organic compounds, unspecified origin [emissions to air, high. pop.]: 0.00845 kg; lognormal SD95 2
  (1,1,1,1,1,1,23)
- Heat, waste [emissions to air, high. pop.]: 468 MJ; lognormal SD95 1.05
  (1,1,1,1,1,1,2)
- Water [emissions to water, unspecified]: 684 kg; lognormal SD95 2.5196
  (5,5,5,5,5,BU:1.05); All uncertainty-values set to 5.0 by default. Balance of input water

## Sampling procedure
plant data

## Extrapolations
see Geography and Technology

## Uncertainty adjustments
highly representative data with generally low uncertainty. Uncertainty related to emissions into water and related to two proxy processes related to heat production exist.

## Sources
- Althaus H.-J., Bauer C., Doka G., Frischknecht R., Jungbluth N., Nemecek T., Simons A., Stucki M., Sutter J., Tuchschmid M., 2010, 2010 - Changes in ecoinvent v2.1 and v2.2 - Althaus, Final report ecoinvent data v2.1, 16, Swiss Centre for LCI, Duebendorf and St. Gallen, CH
Hischier, R., Althaus H.-J., Bauer, Chr., Doka, G., Frischknecht R., Jungbluth N., Margni M., Nemecek, T., Simons A., Spielmann M. (2009) Documentation of changes implemented in ecoinvent Data v2.1. Final report ecoinvent data v2.1. Volume: 16. Swiss Centre for LCI. Dübendorf. CH.
Type: Measurement on site
Source: CD-ROM
First author: Hischier, R.
Other authors: Althaus H.-J., Bauer, Chr., Doka, G., Frischknecht R., Jungbluth N., Margni M., Nemecek, T., Simons A., Spielmann M.
Year: 2009
Title of anthology: Final report ecoinvent data v2.1
Place of publication: Dübendorf. CH
Publisher: Swiss Centre for LCI
Volume No: 16

## Validation
Proof reading validation: passed; Other validation: none;
