# Uranium enrichment centrifuge plant

Dataset: EcoSpold 1, unit process, infrastructure
Functional unit: 1 p
Category: fuels / uranium\enriched\infrastructure
Geography: RU
Time period: 1999-01 to 2002-12
Generated by: Roberto Dones
accessRestrictedTo: 0
copyright: true

## General comment
The material and energy requirements for construction have been roughly estimated on the basis of the data from an old US reference and scaling them down by the ratio of the capacities (centrifuge process is modular, therefore in first approximation linearity can be assumed for requirements). It is assumed that 75% of reinforced concrete is dumped as non-contaminated waste from decommissioning. Although Russian facilities have higher capacity, the original dataset developed for URENCO plants has been directly used herewith for the previously explained reason, with the only difference of electricity requirements from the Russian mix. This mix has been approximated using existing ecoinvent v2.0 electricity datasets for Europe.;

## Included processes
The module includes: estimated land use of a plant with capacity of 1500 t SWU (separative work unit); energy (electricity, diesel, and light oil) and material requirements for the construction of the facility; transport requirements during construction; energy and transport requirements (for non-contaminated inerts concrete with reinforcing bars) during decommissioning; disposal of the non-contaminated inerts. The non contaminated metals are assumed to be recycled.

## Technology
Available construction material and energy data refer to a model plant in early 1980s.

## Reference product
- Uranium enrichment centrifuge plant [RU]: 1 p
  RUSSIAN FEDERATION

## Inputs from technosphere
- Diesel, burned in diesel-electric generating set [GLO]: 6.9e8 MJ; lognormal SD95 2
  old reference
- Transport, freight, lorry, fleet average [RER]: 1.65e7 tkm; lognormal SD95 2.1
  standard
- Electricity, oil, at power plant [CZ]: 161000 kWh; lognormal SD95 2
  old US reference for total electricity
- Electricity, at cogen ORC 1400kWth, wood, allocation exergy [CH]: 11300 kWh; lognormal SD95 2
  old US reference for total electricity
- Steel, low-alloyed, at plant [RER]: 1.63e7 kg; lognormal SD95 2
  old reference
- Aluminium, primary, at plant [RER]: 6.5e6 kg; lognormal SD95 2
  old reference
- Transport, freight, rail [RER]: 9.79e6 tkm; lognormal SD95 2.1
  standard
- Chromium steel 18/8, at plant [RER]: 1.63e7 kg
- Electricity, hydropower, at reservoir power plant, non alpine regions [RER]: 1.14e6 kWh; lognormal SD95 2
  old US reference for total electricity
- Brass, at plant [CH]: 26000 kg; lognormal SD95 2
  old reference
- Zinc, primary, at regional storage [RER]: 33000 kg; lognormal SD95 2
  old reference
- Diesel, burned in building machine, average [CH]: 6.9e8 MJ; lognormal SD95 2
  old reference
- Disposal, building, reinforced concrete, to final disposal [CH]: 6.8e7 kg; lognormal SD95 2
  old reference
- Reinforcing steel, at plant [RER]: 9e6 kg; lognormal SD95 2
  old reference
- Electricity, from natural gas [RU]: 2.69e6 kWh; lognormal SD95 2
  old US reference for total electricity
- Copper, at regional storage [RER]: 770000 kg; lognormal SD95 2
  old reference
- Electricity, hard coal, at power plant [PL]: 1.03e6 kWh; lognormal SD95 2
  old US reference for total electricity
- Lubricating oil, at plant [RER]: 48000 kg; lognormal SD95 2
  old reference
- Electricity, nuclear, at power plant [UCTE]: 925000 kWh; lognormal SD95 2
  old US reference for total electricity
- Concrete, normal, at plant [CH]: 75000 m3; lognormal SD95 2
  old reference

## Inputs from nature
All rows: lognormal SD95 2
- Transformation, from industrial area [resources, land]: 150000 m2
  own estimation
- Transformation, to unknown [resources, land]: 150000 m2
  own estimation
- Transformation, to industrial area, vegetation [resources, land]: 50000 m2
  own estimation
- Transformation, to industrial area, built up [resources, land]: 100000 m2
  own estimation
- Transformation, from unknown [resources, land]: 150000 m2
  own estimation
- Occupation, industrial area, built up [resources, land]: 3e6 m2a
  own estimation
- Occupation, industrial area, vegetation [resources, land]: 1.5e6 m2a
  own estimation

## Emissions to nature
- Heat, waste [emissions to air, low. pop.]: 2.12e7 MJ; lognormal SD95 2
  same as for electricity

## Sampling procedure
Literature

## Sources
- Dones R., Bauer C., Doka G., 2009, 2009 - Nuclear energy - Dones, Sachbilanzen von Energiesystemen. Final report No. 6 ecoinvent v2.1, 6, Swiss Centre for LCI, PSI, Doka LCA, Duebendorf and Villigen, CH
Dones, R., Doka G. (2009) Kernenergie. Sachbilanzen von Energiesystemen. Final report No. 6 ecoinvent v2.1. Editors: Bauer C.. Volume: 6. Swiss Centre for LCI, PSI. Dübendorf and Villigen, CH.
Type: Measurement on site
Source: CD-ROM
First author: Dones, R.
Other authors: Doka G.
Year: 2009
Name of editors: Bauer C.
Title of anthology: Sachbilanzen von Energiesystemen. Final report No. 6 ecoinvent v2.1
Place of publication: Dübendorf and Villigen, CH
Publisher: Swiss Centre for LCI, PSI
Volume No: 6

## Validation
Proof reading validation: Passed.; Other validation: none;
