# Natural gas, production RU, at evaporation plant

Dataset: EcoSpold 1, unit process
Functional unit: 1 Nm3
Category: natural gas / transport
Geography: RER
Time period: 2000-01 to 2020-01
Share of production covered: 100 %
Generated by: Niels Jungbluth
accessRestrictedTo: 0
copyright: true

## General comment
In 2019 90% of the imported Russian natural gas to RER was imported by pipeline and 10% as LNG. An average distance of 4300 km is estimated for the pipeline export from Russian Federation, of which are 410 km offshore pipeline. The estimated shipping distance for LNG are 11700 km.;

## Included processes
This dataset describes the transport needed for an average export of Russian natural gas. Gas losses and emissions during seasonal storage are included.

## Geography
The data for storage emissions are based on global data. The amount of gas stored is a rough estimate based on European data. The average weighted transport distance is based on the trade movements 2019.

## Technology
The distance is an European average based on the European long-distance pipeline network and LNG shipping routes.

## Time period
Transport modes investigated for 2019.

## Reference product
- Natural gas, production RU, at evaporation plant [RER]: 1 Nm3

## Inputs from technosphere
- Natural gas, burned in gas turbine [RU]: 0.25561 MJ; lognormal SD95 1.301
  (4,1,1,3,3,BU:1.05); Based on technology average
- Natural gas, liquefied, at freight ship [RU]: 1 Nm3; lognormal SD95 1.05
  (1,1,1,1,1,BU:1.05);
- Sodium hypochlorite, 15% in H2O, at plant [RER]: 0.0336 kg; lognormal SD95 1.3966
  (4,5,3,3,3,BU:1.05); Environmental report of Greek site
- Production plant, natural gas [GLO]: 7.89e-13 p; lognormal SD95 3.2876
  (5,3,3,3,3,BU:3); Estimate for Europe

## Inputs from nature
- Water, salt, ocean [resources, in water]: 6.42 m3; lognormal SD95 1.3966
  (4,5,3,3,3,BU:1.05); Environmental report of Greek site

## Emissions to nature
- Water [emissions to water, unspecified]: 6420 kg; lognormal SD95 1.6872
  (4,5,3,3,3,BU:1.5); Environmental report of Greek site
- Methane, fossil [emissions to air, low. pop.]: 0.00035 kg; lognormal SD95 1.5798
  (4,3,3,1,1,BU:1.5); Based on data from IMO (2015) and Sternersen (2017)

## Sampling procedure
Literature. Online calculators for distances.

## Sources
- Bussa M., Jungbluth N., Meili C., 2021, 2021 - LCI long-dist. transp. and distrib. natural gas - Bussa, Project report, 565, ESU-services Ltd., Schaffhausen, CH
Bussa M., Meili C., Jungbluth N. (2021) Life cycle inventories for long-distance transport of natural gas. Project report. Volume: 565. ESU-services Ltd.. Schaffhausen, CH.
Type: Separate publication
Source: Report
First author: Bussa M.
Other authors: Meili C., Jungbluth N.
Year: 2021
Title of anthology: Project report
Place of publication: Schaffhausen, CH
Publisher: ESU-services Ltd.
Volume No: 565

## Validation
Passed. https://esuservices-my.sharepoint.com/personal/jungbluth_esuservices_onmicrosoft_com/Documents/ESU-intern/565 LCI oil and gas sector CH BAFU/EcoSpold/[EcoSpold-oil¬gas-transport-2020-v2.0.xlsb]X-Process
