# xx Hydrogen cyanide from Sohio process, at plant

Dataset: EcoSpold 1, unit process
Functional unit: 1 kg
Category: material, obsolete / chemicals, obsolete\gases, obsolete
Geography: RER
Time period: 2000-01 to 2005-12
Share of production covered: 100 %
Generated by: Juergen Sutter
accessRestrictedTo: 0
copyright: true

## General comment
The multioutput-process "Sohio process" delivers the co-products acrylonitrile, hydrigen cyanide, and acetoinitrile. The allocation is based on mass balance.;

## Included processes
Sohio process including materials, energy uses, infrastructure and emissions.

## Geography
The inventory is modelled for Europe.

## Technology
Sohio process

## Time period
Time of publications.

## Reference product
- xx Hydrogen cyanide from Sohio process, at plant [RER]: 1 kg
  Europe

## Inputs from technosphere
- Transport, freight, rail [RER]: 0.80487 tkm; lognormal SD95 2.095
  (4,5,na,na,na,na); Standard distance 600km
- Water, deionised, at plant [CH]: 3.88002 kg; lognormal SD95 1.2238
  (1,3,4,3,1,3); Chauvel 1989
- Ammonia, liquid, at regional storehouse [RER]: 0.38773 kg; lognormal SD95 1.2238
  (1,3,4,3,1,3); Chauvel 1989
- Sulphuric acid, liquid, at plant [RER]: 0.0388 kg; lognormal SD95 1.2238
  (1,3,4,3,1,3); Chauvel 1989
- Transport, freight, lorry, fleet average [RER]: 0.13415 tkm; lognormal SD95 2.095
  (4,5,na,na,na,na); Standard distance 100km
- Chemical plant, organics [RER]: 3.9999e-10 p; lognormal SD95 3.0909
  (4,5,na,na,na,na); Estimation
- Propylene, at plant [RER]: 0.91493 kg; lognormal SD95 1.2238
  (1,3,4,3,1,3); Chauvel 1989
- Heat, unspecific, in chemical plant [RER]: 2.13077 MJ; lognormal SD95 1.2238
  (1,3,4,3,1,3); Chauvel 1989
- Electricity, medium voltage, production ENTSO-E, at grid: 0.20935 kWh; lognormal SD95 1.2238
  (1,3,4,3,1,3); Chauvel 1989

## Inputs from nature
- Water, cooling, unspecified natural origin/m3 [resources, in water]: 0.031012 m3; lognormal SD95 1.2238
  (1,3,4,3,1,3); Chauvel 1989

## Emissions to nature
- Ammonia [emissions to air, high. pop.]: 0.003504 kg; lognormal SD95 1.3713
  (4,5,na,na,na,na); Estimation
- BOD5, Biological Oxygen Demand [emissions to water, river]: 0.039982 kg; lognormal SD95 1.6169
  (4,5,na,na,na,na); Calculated from the water emissions
- Propene [emissions to water, river]: 0.013504 kg; lognormal SD95 3.0909
  (4,5,na,na,na,na); Estimation
- Carbon dioxide, fossil [emissions to air, high. pop.]: 0.48798 kg; lognormal SD95 1.3001
  (4,5,na,na,na,na); Calculated from the water treatment
- Sulfate [emissions to water, river]: 0.038009 kg; lognormal SD95 1.6169
  (4,5,na,na,na,na); Estimation
- DOC, Dissolved Organic Carbon [emissions to water, river]: 0.011986 kg; lognormal SD95 1.6169
  (4,5,na,na,na,na); Calculated from the water emissions
- COD, Chemical Oxygen Demand [emissions to water, river]: 0.039982 kg; lognormal SD95 1.6169
  (4,5,na,na,na,na); Calculated from the water emissions
- Propene [emissions to air, high. pop.]: 3.3761e-5 kg; lognormal SD95 1.6169
  (4,5,na,na,na,na); Estimation
- Heat, waste [emissions to air, high. pop.]: 0.75368 MJ; lognormal SD95 1.2238
  (1,3,4,3,1,3); Calculated from the electricity input
- TOC, Total Organic Carbon [emissions to water, river]: 0.011986 kg; lognormal SD95 1.6169
  (4,5,na,na,na,na); Calculated from the water emissions
- Ammonium, ion [emissions to water, river]: 0.014016 kg; lognormal SD95 1.6169
  (4,5,na,na,na,na); Estimation
- Water [emissions to water, unspecified]: 29.4614 kg; lognormal SD95 2.5196
  (5,5,5,5,5,BU:1.05); All uncertainty-values set to 5.0 by default. Balance of input water

## Sampling procedure
Literature data

## Extrapolations
Transports and emissions are modelled with standard methods.

## Sources
- Sutter J., 2007, 2007 - LCI petrochemical solvents - Sutter, Final report ecoinvent Data v2.0, 22, Swiss Centre for LCI, ETH, Duebendorf and Uster, CH
Sutter, J., 0 (2007) Life Cycle Inventories of Petrochemical Solvents. Final report ecoinvent Data v2.0. Editors: 0. 0. Volume: 22. Issue: 0. Swiss Centre for LCI, ETHZ. Duebendorf and St. Gallen, CH.
Type: Measurement on site
Source: CD-ROM
First author: Sutter, J.
Other authors: 0
Year: 2007
Name of editors: 0
Title of anthology: Final report ecoinvent Data v2.0
Place of publication: Duebendorf and St. Gallen, CH
Publisher: Swiss Centre for LCI, ETHZ
Journal: 0
Volume No: 22
Issue No: 0

## Validation
Proof reading validation: passed.; Other validation: none;
