# Rhodium, primary, at refinery

Dataset: EcoSpold 1, unit process
Functional unit: 1 kg
Category: metals / non ferro
Geography: RU
Time period: 2000-01 to 2000-12
Production volume: 81 t / a
Share of production covered: 23 %
Generated by: Mischa Classen
accessRestrictedTo: 0
copyright: true

## General comment
The multioutput-process "platinum group metal production, primary" delivers the co-products "platinum, primary, at refinery", "palladium, primary, at refinery", "rhodium, primary, at refinery", "nickel, primary, from platinum group metal production" and "copper, primary, from platinum group metal production" in the Russian Federation (RU). The module is designed for the use of the metal in technical systems, where it plays a minor role like the use in manufacturing of electronic or technical chemistry using certain catalysts. It is not to be used if the impact of the PGM within the modelled process in scope is considered to be high. In such cases, a more detailed analysis depending on scope and allocation procedures has to be conducted. The data used is mainly based on a LCA study for autocatalysts in Germany.;

## Included processes
The module includes a mining and a beneficiation step with the mining infrastructure and disposal of overburden and tailings. Subsequently it includes the metallurgy step with the disposal of slag, the infrastructure and the separation of the co-products nickel and copper, and the refining step yielding the desired PGM-mix inclusively the refining infrastructure. Production, application and emissions of most agents used in beneficiation and metallurgy are also included.

## Technology
Mining is done underground, followed by beneficiation trough flotation where considerable amounts of agents are added. Overburden and tailings are disposed on the mining site and partly refilled. In RU a Outokumpu flash furnace followed by a Pierce-Smith-Converter is used. The resulting nickel matte is treated by elektrorefining. No recovery of sulphur dioxide in the off gas. The refining is done by selective precipitation, using data from the ZA process as proxy. For electricity mix the UCTE production mix is inventoried

## Reference product
- Rhodium, primary, at refinery [RU]: 1 kg
  RUSSIAN FEDERATION

## Inputs from technosphere
- Chemical plant, organics [RER]: 1.117e-9 p; lognormal SD95 3.3
  (4,2,1,5,4,4,9)
- Chemicals organic, at plant [GLO]: 19.0617 kg; lognormal SD95 2
  reported values
- Hydrogen cyanide, at plant [RER]: 2.96724 kg; lognormal SD95 2
  reported values
- Natural gas, burned in industrial furnace 1MWth [CH]: 123500 MJ; lognormal SD95 1.13
  (2,2,1,1,1,4,1)
- Non-ferrous metal smelter [GLO]: 1.3615e-7 p; lognormal SD95 3.3
  (4,2,1,5,4,4,9)
- Transport, transoceanic freight ship [OCE]: 177.324 tkm; lognormal SD95 2.07
  (2,2,2,1,3,4,5)
- Chemicals inorganic, at plant [GLO]: 3953.19 kg; lognormal SD95 2
  reported values
- Diesel, burned in building machine, average [CH]: 6479.1 MJ; lognormal SD95 1.63
  (4,3,2,2,4,5,5)
- Non-ferrous metal mine, underground [GLO]: 4.6856e-6 p; lognormal SD95 3.07
  (3,2,1,1,3,4,9)
- Limestone, milled, packed, at plant [CH]: 168.081 kg; lognormal SD95 2
  reported values
- Blasting [RER]: 0.042161 kg; lognormal SD95 1.26
  (3,2,1,1,3,4,3)
- Electricity, medium voltage, production ENTSO-E, at grid: 25537.3 kWh; lognormal SD95 1.26
  (3,2,1,1,3,4) 2;
- Disposal, nickel smelter slag, 0% water, to residual material landfill [CH]: 38968.5 kg; lognormal SD95 1.13
  (2,2,2,3,1,4) 6;
- Disposal, sulfidic tailings, off-site [GLO]: 22723.8 kg; lognormal SD95 1.13
  (2,2,2,3,1,4) 6;
- Conveyor belt, at plant [RER]: 0.0018686 m; lognormal SD95 2.91
  (5,4,3,3,5,6,5)

## Inputs from nature
- Rhodium, Rh 2.0E-5%, Pt 2.5E-4%, Pd 7.3E-4%, Ni 2.3E+0%, Cu 3.2E+0% in ore [resources, in ground]: 1.11 kg; lognormal SD95 1.12
  reported values
- Transformation, from unknown [resources, land]: 0.21034 m2; lognormal SD95 2.03
  (3,2,3,1,1,2,8); calculation based on reported value
- Water, river [resources, in water]: 879.843 m3; lognormal SD95 1.13
  (2,2,1,1,1,4,12)
- Occupation, mineral extraction site [resources, land]: 14.9301 m2a; lognormal SD95 1.53
  (3,2,3,1,1,2,7); calculation based on reported value
- Transformation, to mineral extraction site [resources, land]: 0.21034 m2; lognormal SD95 2.03
  (3,2,3,1,1,2,8); calculation based on reported value
- Water, well [resources, in water]: 11.8314 m3; lognormal SD95 1.26
  (3,2,1,1,3,4,12)

## Emissions to nature
- Nitrogen, organic bound [emissions to water, river]: 1.07985 kg; lognormal SD95 10
  (,,,,,) ; reported values
- Cadmium [emissions to air, low. pop.]: 3.7936e-6 kg; lognormal SD95 1.59
  (3,2,1,1,3,4,31)
- Zinc [emissions to water, river]: 0.019531 kg; lognormal SD95 10
  (,,,,,) ; reported values
- Nickel [emissions to air, low. pop.]: 0.16339 kg; lognormal SD95 1.59
  (3,2,1,1,3,4) 31;
- Tin [emissions to water, river]: 0.0019156 kg; lognormal SD95 10
  reported values
- Zinc [emissions to air, low. pop.]: 0.5296 kg; lognormal SD95 5.08
  (3,2,1,1,3,4) 22;
- Particulates, > 2.5 um, and < 10um [emissions to air, low. pop.]: 16.8171 kg; lognormal SD95 2.69
  (3,2,1,1,5,4) 19;
- DOC, Dissolved Organic Carbon [emissions to water, river]: 0.22151 kg; lognormal SD95 10
  (,,,,,) ; reported values
- Heat, waste [emissions to air, low. pop.]: 263891 MJ; lognormal SD95 1.26
  (3,2,1,1,3,4) 2;
- Particulates, > 10 um [emissions to air, low. pop.]: 18.0384 kg; lognormal SD95 2.26
  (3,2,1,1,5,4) 18;
- Aluminium [emissions to water, river]: 0.004094 kg; lognormal SD95 10
  (,,,,,) ; reported values
- Calcium [emissions to water, river]: 32.5833 kg; lognormal SD95 10
  reported values
- Antimony [emissions to air, low. pop.]: 0.0068923 kg; lognormal SD95 1.59
  (3,2,1,1,3,4,31)
- Cobalt [emissions to water, river]: 3.7091e-5 kg; lognormal SD95 10
  (,,,,,) ; reported values
- TOC, Total Organic Carbon [emissions to water, river]: 0.22151 kg; lognormal SD95 10
  (,,,,,) ; reported values
- Chromium [emissions to water, river]: 0.0019437 kg; lognormal SD95 10
  (,,,,,) ; reported values
- Carbon disulfide [emissions to air, low. pop.]: 8.42283 kg; lognormal SD95 2.31
  (4,2,2,5,4,4,23)
- Manganese [emissions to water, river]: 0.0011738 kg; lognormal SD95 10
  (,,,,,) ; reported values
- Iron [emissions to water, river]: 0.013803 kg; lognormal SD95 10
  (,,,,,) ; reported values
- Mercury [emissions to water, river]: 2.3135e-5 kg; lognormal SD95 10
  (,,,,,) ; reported values
- Manganese [emissions to air, low. pop.]: 0.032771 kg; lognormal SD95 1.59
  (3,2,1,1,3,4,31)
- Chromium [emissions to air, low. pop.]: 0.0034461 kg; lognormal SD95 1.59
  (3,2,1,1,3,4,31)
- Cyanide [emissions to water, river]: 0.32677 kg; lognormal SD95 3.84
  (4,2,2,3,4,4,33); including stdev of sodium cyanide
- Sulfate [emissions to water, river]: 111.741 kg; lognormal SD95 10
  (,,,,,) ; reported values
- Sulfur dioxide [emissions to air, low. pop.]: 27700.5 kg; lognormal SD95 1.38
  (4,2,2,1,3,5) 15;
- Particulates, < 2.5 um [emissions to air, low. pop.]: 1.70412 kg; lognormal SD95 3.69
  (3,2,1,1,5,4) 20;
- Mercury [emissions to air, low. pop.]: 1.7184e-6 kg; lognormal SD95 1.59
  (3,2,1,1,3,4,31)
- Boron [emissions to air, low. pop.]: 0.00034461 kg; lognormal SD95 1.59
  (3,2,1,1,3,4,31)
- Beryllium [emissions to air, low. pop.]: 8.9581e-5 kg; lognormal SD95 1.59
  (3,2,1,1,3,4,31)
- COD, Chemical Oxygen Demand [emissions to water, river]: 0.5671 kg; lognormal SD95 10
  (,,,,,) ; reported values
- Lead [emissions to water, river]: 0.0015055 kg; lognormal SD95 10
  (,,,,,) ; reported values
- Selenium [emissions to air, low. pop.]: 1.7184e-6 kg; lognormal SD95 1.59
  (3,2,1,1,3,4,31)
- Nitrogen oxides [emissions to air, low. pop.]: 0.098296 kg; lognormal SD95 1.59
  (3,2,1,1,3,4,16)
- Cadmium [emissions to water, river]: 6.5354e-5 kg; lognormal SD95 10
  (,,,,,) ; reported values
- Tin [emissions to air, low. pop.]: 0.033804 kg; lognormal SD95 5.08
  (3,2,1,1,3,4,22)
- Arsenic [emissions to water, river]: 0.00028639 kg; lognormal SD95 10
  (,,,,,) ; reported values
- BOD5, Biological Oxygen Demand [emissions to water, river]: 0.37738 kg; lognormal SD95 10
  (,,,,,) ; reported values
- Arsenic [emissions to air, low. pop.]: 0.030236 kg; lognormal SD95 5.08
  (3,2,1,1,3,4) 22;
- Cobalt [emissions to air, low. pop.]: 0.15587 kg; lognormal SD95 5.08
  (3,2,1,1,3,4) 22;
- Dioxin, 2,3,7,8 Tetrachlorodibenzo-p- [emissions to air, low. pop.]: 5.1739e-8 kg; lognormal SD95 3.07
  (3,2,1,1,3,4,21)
- NMVOC, non-methane volatile organic compounds, unspecified origin [emissions to air, low. pop.]: 1.0329 kg; lognormal SD95 1.59
  (3,2,1,1,3,4,16)
- Suspended solids, unspecified [emissions to water, river]: 0.24508 kg; lognormal SD95 10
  (,,,,,) ; reported values
- Carbon dioxide, fossil [emissions to air, unspecified]: 928.671 kg; lognormal SD95 1.58
  (4,2,1,1,4,4) 14; excluding stdev of lime addition
- Copper [emissions to air, low. pop.]: 0.20846 kg; lognormal SD95 5.08
  (3,2,1,1,3,4) 22;
- Nickel [emissions to water, river]: 0.0040829 kg; lognormal SD95 10
  (,,,,,) ; reported values
- Fluorine [emissions to air, low. pop.]: 0.032771 kg; lognormal SD95 1.59
  (3,2,1,1,3,4,31)
- Copper [emissions to water, river]: 0.0093412 kg; lognormal SD95 10
  (,,,,,) ; reported values
- Lead [emissions to air, low. pop.]: 0.16151 kg; lognormal SD95 5.08
  (3,2,1,1,3,4) 22;
- Water [emissions to water, unspecified]: 835851, 10648.3 kg (2 entries); lognormal SD95 2.5196
  (5,5,5,5,5,BU:1.05); All uncertainty-values set to 5.0 by default. Balance of input water

## Sampling procedure
Literature

## Extrapolations
see Geography and Technology

## Sources
- Classen M., Althaus H.-J., Blaser S., Scharnhorst W., Tuchschmid M., Jungbluth N., Faist Emmenegger M., 2009, 2009 - LCI metals - Classen, Final report ecoinvent data v2.1, 10, Swiss Centre for LCI, Empa, ESU-services Ltd., Duebendorf, CH
Classen M., Althaus H.-J., Blaser S., Doka G., Jungbluth N., Tuchschmid M. (2008) Life Cycle Inventories of Metals. Final report ecoinvent data v2.1. Volume: 10. Issue: 0. Swiss Centre for LCI, Empa - TSL. Dübendorf, CH.
Type: Measurement on site
Source: CD-ROM
First author: Classen M.
Other authors: Althaus H.-J., Blaser S., Doka G., Jungbluth N., Tuchschmid M.
Year: 2008
Title of anthology: Final report ecoinvent data v2.1
Place of publication: Dübendorf, CH
Publisher: Swiss Centre for LCI, Empa - TSL
Volume No: 10
Issue No: 0

## Validation
Proof reading validation: passed; Other validation: none;
