# Transport, freight, lorry, 16t-32t gross weight, fleet average

Dataset: EcoSpold 1, unit process
Functional unit: 1 tkm
Category: transport systems / road\Transformation
Geography: CH
Time period: 2020-01 to 2020-12
Generated by: Brian Cox
accessRestrictedTo: 0
copyright: False

## General comment
Average of other Mobitool datasets created with the purpose of replacing older datasets in the database. Basis for fleet shares: Switzerland year 2020. Source: HBEFA 5.1, INFRAS.

## Time period
Technology and fleet shares valid for year 2020

## Reference product
- Transport, freight, lorry, 16t-32t gross weight, fleet average [CH]: 1 tkm

## Inputs from technosphere
All rows: lognormal SD95 1.06225
- Transport, freight, lorry, battery electric, NMC-622 battery, 18t gross weight, 2020, regional delivery [CH]: 0.000124563 tkm
  Uncertainty from pedigree matrix: (2,1,2,3,1,1); Share of technologies from HBEFA 5.1 for CH 2020. Assume 10% Urban, 10% Rural, 80% Long-haul. Assume NMC battery technology dominant.
- Transport, freight, lorry, battery electric, NMC-622 battery, 18t gross weight, 2020, urban delivery [CH]: 0.000124563 tkm
  (same comment as for Transport, freight, lorry, battery electric, NMC-622 battery, 18t gros)
- Transport, freight, lorry, battery electric, NMC-622 battery, 26t gross weight, 2020, regional delivery [CH]: 0.000375153 tkm
  (same comment as for Transport, freight, lorry, battery electric, NMC-622 battery, 18t gros)
- Transport, freight, lorry, battery electric, NMC-622 battery, 26t gross weight, 2020, urban delivery [CH]: 0.000375153 tkm
  (same comment as for Transport, freight, lorry, battery electric, NMC-622 battery, 18t gros)
- Transport, freight, lorry, battery electric, NMC-622 battery, 32t gross weight, 2020, regional delivery [CH]: 0.000188003 tkm
  (same comment as for Transport, freight, lorry, battery electric, NMC-622 battery, 18t gros)
- Transport, freight, lorry, battery electric, NMC-622 battery, 32t gross weight, 2020, urban delivery [CH]: 0.000188003 tkm
  (same comment as for Transport, freight, lorry, battery electric, NMC-622 battery, 18t gros)
- Transport, freight, lorry, compressed gas, 100% biomethane, 18t gross weight, 2020, EURO-VI, long haul [CH]: 4.37576e-5 tkm
  (same comment as for Transport, freight, lorry, battery electric, NMC-622 battery, 18t gros)
- Transport, freight, lorry, compressed gas, 100% biomethane, 18t gross weight, 2020, EURO-VI, regional delivery [CH]: 5.4697e-6 tkm
  (same comment as for Transport, freight, lorry, battery electric, NMC-622 battery, 18t gros)
- Transport, freight, lorry, compressed gas, 100% biomethane, 18t gross weight, 2020, EURO-VI, urban delivery [CH]: 5.4697e-6 tkm
  (same comment as for Transport, freight, lorry, battery electric, NMC-622 battery, 18t gros)
- Transport, freight, lorry, compressed gas, 100% biomethane, 26t gross weight, 2020, EURO-VI, long haul [CH]: 0.00044307 tkm
  (same comment as for Transport, freight, lorry, battery electric, NMC-622 battery, 18t gros)
- Transport, freight, lorry, compressed gas, 100% biomethane, 26t gross weight, 2020, EURO-VI, regional delivery [CH]: 5.53837e-5 tkm
  (same comment as for Transport, freight, lorry, battery electric, NMC-622 battery, 18t gros)
- Transport, freight, lorry, compressed gas, 100% biomethane, 26t gross weight, 2020, EURO-VI, urban delivery [CH]: 5.53837e-5 tkm
  (same comment as for Transport, freight, lorry, battery electric, NMC-622 battery, 18t gros)
- Transport, freight, lorry, compressed gas, 100% biomethane, 32t gross weight, 2020, EURO-VI, long haul [CH]: 0.000369202 tkm
  (same comment as for Transport, freight, lorry, battery electric, NMC-622 battery, 18t gros)
- Transport, freight, lorry, compressed gas, 100% biomethane, 32t gross weight, 2020, EURO-VI, regional delivery [CH]: 4.61503e-5 tkm
  (same comment as for Transport, freight, lorry, battery electric, NMC-622 battery, 18t gros)
- Transport, freight, lorry, compressed gas, 100% biomethane, 32t gross weight, 2020, EURO-VI, urban delivery [CH]: 4.61503e-5 tkm
  (same comment as for Transport, freight, lorry, battery electric, NMC-622 battery, 18t gros)
- Transport, freight, lorry, compressed gas, 18t gross weight, 2020, EURO-VI, long haul [CH]: 0.000116485 tkm
  (same comment as for Transport, freight, lorry, battery electric, NMC-622 battery, 18t gros)
- Transport, freight, lorry, compressed gas, 18t gross weight, 2020, EURO-VI, regional delivery [CH]: 1.45607e-5 tkm
  (same comment as for Transport, freight, lorry, battery electric, NMC-622 battery, 18t gros)
- Transport, freight, lorry, compressed gas, 18t gross weight, 2020, EURO-VI, urban delivery [CH]: 1.45607e-5 tkm
  (same comment as for Transport, freight, lorry, battery electric, NMC-622 battery, 18t gros)
- Transport, freight, lorry, compressed gas, 26t gross weight, 2020, EURO-VI, long haul [CH]: 0.00117948 tkm
  (same comment as for Transport, freight, lorry, battery electric, NMC-622 battery, 18t gros)
- Transport, freight, lorry, compressed gas, 26t gross weight, 2020, EURO-VI, regional delivery [CH]: 0.000147435 tkm
  (same comment as for Transport, freight, lorry, battery electric, NMC-622 battery, 18t gros)
- Transport, freight, lorry, compressed gas, 26t gross weight, 2020, EURO-VI, urban delivery [CH]: 0.000147435 tkm
  (same comment as for Transport, freight, lorry, battery electric, NMC-622 battery, 18t gros)
- Transport, freight, lorry, compressed gas, 32t gross weight, 2020, EURO-VI, long haul [CH]: 0.000982839 tkm
  (same comment as for Transport, freight, lorry, battery electric, NMC-622 battery, 18t gros)
- Transport, freight, lorry, compressed gas, 32t gross weight, 2020, EURO-VI, regional delivery [CH]: 0.000122855 tkm
  (same comment as for Transport, freight, lorry, battery electric, NMC-622 battery, 18t gros)
- Transport, freight, lorry, compressed gas, 32t gross weight, 2020, EURO-VI, urban delivery [CH]: 0.000122855 tkm
  (same comment as for Transport, freight, lorry, battery electric, NMC-622 battery, 18t gros)
- Transport, freight, lorry, diesel, 18t gross weight, fleet average, long haul [CH]: 0.16304 tkm
  (same comment as for Transport, freight, lorry, battery electric, NMC-622 battery, 18t gros)
- Transport, freight, lorry, diesel, 18t gross weight, fleet average, regional delivery [CH]: 0.0203799 tkm
  (same comment as for Transport, freight, lorry, battery electric, NMC-622 battery, 18t gros)
- Transport, freight, lorry, diesel, 18t gross weight, fleet average, urban delivery [CH]: 0.0203799 tkm
  (same comment as for Transport, freight, lorry, battery electric, NMC-622 battery, 18t gros)
- Transport, freight, lorry, diesel, 26t gross weight, fleet average, long haul [CH]: 0.227205 tkm
  (same comment as for Transport, freight, lorry, battery electric, NMC-622 battery, 18t gros)
- Transport, freight, lorry, diesel, 26t gross weight, fleet average, regional delivery [CH]: 0.0284007 tkm
  (same comment as for Transport, freight, lorry, battery electric, NMC-622 battery, 18t gros)
- Transport, freight, lorry, diesel, 26t gross weight, fleet average, urban delivery [CH]: 0.0284007 tkm
  (same comment as for Transport, freight, lorry, battery electric, NMC-622 battery, 18t gros)
- Transport, freight, lorry, diesel, 32t gross weight, fleet average, long haul [CH]: 0.40552 tkm
  (same comment as for Transport, freight, lorry, battery electric, NMC-622 battery, 18t gros)
- Transport, freight, lorry, diesel, 32t gross weight, fleet average, regional delivery [CH]: 0.05069 tkm
  (same comment as for Transport, freight, lorry, battery electric, NMC-622 battery, 18t gros)
- Transport, freight, lorry, diesel, 32t gross weight, fleet average, urban delivery [CH]: 0.05069 tkm
  (same comment as for Transport, freight, lorry, battery electric, NMC-622 battery, 18t gros)

## Sources
- Cox B., 2025, 2025 - Mobitool integration project - Cox, INFRAS, Bern, CH

## Validation
Data from HBEFA 5.1 for the year 2020. Some technologies with very small shares in the fleet removed for simplicity. Technology shares normalised to ensure sum of 100%
