# Heat, at system cogen 160kWe Jakobsberg, allocation electricity

Dataset: EcoSpold 1, unit process
Functional unit: 1 MJ
Category: heat / natural gas\cogeneration
Geography: CH
Time period: 2000-01 to 2000-12
Generated by: Thomas Heck
accessRestrictedTo: 0
copyright: true

## General comment
Heat at system i.e. distribution is not included.;

## Included processes
The module includes heat from module cogen (i.e. the cogeneration unit and a heat pump) and from two oil boilers.

## Geography
Efficiencies refer to a specific plant in Switzerland.

## Technology
Specific cogeneration unit installed in Switzerland.

## Reference product
- Heat, at system cogen 160kWe Jakobsberg, allocation electricity [CH]: 1 MJ
  SWITZERLAND

## Inputs from technosphere
- Heat, light fuel oil, at boiler 100kW, non-modulating [CH]: 0.4 MJ; lognormal SD95 1.05
  data from operators; basic uncertainty
- Heat, at module cogen 160kWe Jakobsberg, allocation electricity [CH]: 0.6 MJ; lognormal SD95 1.05
  data from operators; basic uncertainty

## Sampling procedure
Operator information

## Sources
- Heck T., 2007, 2007 - Combined heat power generation - Heck, Sachbilanzen von Energiesystemen. Final report No. 6 ecoinvent data v2.0, 6, Swiss Centre for LCI, PSI, Duebendorf and Villigen, CH
Heck, T. (2007) Wärme-Kraft-Kopplung. Sachbilanzen von Energiesystemen. Final report No. 6 ecoinvent data v2.0. Editors: Dones R.. Volume: 6. Swiss Centre for LCI, PSI. Dübendorf and Villigen, CH.
Type: Measurement on site
Source: CD-ROM
First author: Heck, T.
Year: 2007
Name of editors: Dones R.
Title of anthology: Sachbilanzen von Energiesystemen. Final report No. 6 ecoinvent data v2.0
Place of publication: Dübendorf and Villigen, CH
Publisher: Swiss Centre for LCI, PSI
Volume No: 6

## Validation
Proof reading validation: prepared; Other validation: none;
