# xx Nylon 6, glass-filled, at plant

Dataset: EcoSpold 1, unit process
Functional unit: 1 kg
Category: material, obsolete / plastics, obsolete\thermoplasts, obsolete
Geography: RER
Time period: 1993-01 to 1991-12
Generated by: Roland Hischier
accessRestrictedTo: 0
copyright: true

## General comment
Data are from the Eco-profiles of the European plastics industry (PlasticsEurope). Not included are the values reported for: recyclable wastes, amount of air / N2 / O2 consumed, unspecified metal emission to air and to water, mercaptan emission to air, unspecified CFC/HCFC emission to air, dioxin to water. The amount of "sulphur (bonded)" is assumed to be included into the amount of raw oil.;

## Included processes
Aggregated data for all processes from raw material extraction until delivery at plant

## Geography
3 European production sites

## Technology
production by different ways out of caprolactam and filled with glass fibers

## Time period
time to which data refer

## Reference product
- xx Nylon 6, glass-filled, at plant [RER]: 1 kg
  Europe

## Inputs from technosphere
- Disposal, wood untreated, 20% water, to municipal incineration [CH]: 9.7553e-5 kg
  Uncertainty for LCI results cannot be determined
- Disposal, plastics, mixture, 15.3% water, to municipal incineration [CH]: 4.3599e-5 kg
  Uncertainty for LCI results cannot be determined
- Disposal, tailings from hard coal milling, in impoundment [GLO]: 8.3924e-5 kg
  Uncertainty for LCI results cannot be determined
- Disposal, hazardous waste, 25% water, to hazardous waste incineration [CH]: 0.019689 kg
  Uncertainty for LCI results cannot be determined
- Disposal, municipal solid waste, 22.9% water, to municipal incineration [CH]: 0.0073043 kg
  Uncertainty for LCI results cannot be determined
- Disposal, average incineration residue, 0% water, to residual material landfill [CH]: 0.044605 kg
  Uncertainty for LCI results cannot be determined
- Disposal, facilities, chemical production [RER]: 1.6586e-5 kg
  Uncertainty for LCI results cannot be determined
- Disposal, spoil from coal mining, in surface landfill [GLO]: 0.21852 kg
  Uncertainty for LCI results cannot be determined

## Inputs from nature
- Manganese [resources, in ground]: 1.7693e-6 kg
  Uncertainty for LCI results cannot be determined
- Calcite [resources, in ground]: 0.12685 kg
  Uncertainty for LCI results cannot be determined
- Sand [resources, in ground]: 0.19328 kg
  Uncertainty for LCI results cannot be determined
- Lead [resources, in ground]: 9.764e-6 kg
  Uncertainty for LCI results cannot be determined
- Oil, crude [resources, in ground]: 0.63502 kg
  Uncertainty for LCI results cannot be determined
- Fluorspar [resources, in ground]: 3.7914e-6 kg
  Uncertainty for LCI results cannot be determined
- Gravel [resources, in ground]: 5.3013e-6 kg
  Uncertainty for LCI results cannot be determined
- Phosphorus [resources, in ground]: 0.00011831 kg
  Uncertainty for LCI results cannot be determined
- Borax [resources, in ground]: 0.00017297 kg
  Uncertainty for LCI results cannot be determined
- Sulfur [resources, in ground]: 0.084607 kg
  Uncertainty for LCI results cannot be determined
- Water, unspecified natural origin/m3 [resources, in water]: 0.041337 m3
  Uncertainty for LCI results cannot be determined
- Barite [resources, in ground]: 1.7358e-6 kg
  Uncertainty for LCI results cannot be determined
- Water, river [resources, in water]: 0.0019867 m3
  Uncertainty for LCI results cannot be determined
- Clay [resources, in ground]: 9.5558e-8 kg
  Uncertainty for LCI results cannot be determined
- Water, well [resources, in water]: 0.00062312 m3
  Uncertainty for LCI results cannot be determined
- Sodium chloride [resources, in ground]: 0.16961 kg
  Uncertainty for LCI results cannot be determined
- Nickel, 1.98% in silicates, 1.04% in crude ore [resources, in ground]: 1.3407e-11 kg
  Uncertainty for LCI results cannot be determined
- Water, cooling, unspecified natural origin/m3 [resources, in water]: 0.26847 m3
  Uncertainty for LCI results cannot be determined
- Magnesite [resources, in ground]: 7.477e-7 kg
  Uncertainty for LCI results cannot be determined
- Shale [resources, in ground]: 1.7351e-5 kg
  Uncertainty for LCI results cannot be determined
- Water, salt, ocean [resources, in water]: 0.00026964 m3
  Uncertainty for LCI results cannot be determined
- Granite [resources, in ground]: 1.7897e-11 kg
  Uncertainty for LCI results cannot be determined
- Chromium [resources, in ground]: 2.7641e-7 kg
  Uncertainty for LCI results cannot be determined
- Gas, natural/m3 [resources, in ground]: 1.4421 m3
  Uncertainty for LCI results cannot be determined
- Sodium nitrate [resources, in ground]: 8.4e-16 kg
  Uncertainty for LCI results cannot be determined
- Uranium [resources, in ground]: 1.7392e-5 kg
  Uncertainty for LCI results cannot be determined
- Coal, hard [resources, in ground]: 0.52034 kg
  Uncertainty for LCI results cannot be determined
- Copper, 0.99% in sulfide, Cu 0.36% and Mo 8.2E-3% in crude ore [resources, in ground]: 1.1999e-6 kg
  Uncertainty for LCI results cannot be determined
- Dolomite [resources, in ground]: 0.067218 kg
  Uncertainty for LCI results cannot be determined
- Energy, potential (in hydropower reservoir), converted [resources, in water]: 0.2778 MJ
  Uncertainty for LCI results cannot be determined
- Clay, bentonite [resources, in ground]: 6.2244e-5 kg
  Uncertainty for LCI results cannot be determined
- Zinc [resources, in ground]: 1.7263e-5 kg
  Uncertainty for LCI results cannot be determined
- Potassium chloride [resources, in ground]: 2.1173e-7 kg
  Uncertainty for LCI results cannot be determined
- Peat [resources, biotic]: 0.00013937 kg
  Uncertainty for LCI results cannot be determined
- Anhydrite [resources, in ground]: 6.1289e-6 kg
  Uncertainty for LCI results cannot be determined
- Cinnabar [resources, in ground]: 6.1029e-8 kg
  Uncertainty for LCI results cannot be determined
- Olivine [resources, in ground]: 1.335e-5 kg
  Uncertainty for LCI results cannot be determined
- Coal, brown [resources, in ground]: 0.096718 kg
  Uncertainty for LCI results cannot be determined
- Aluminium [resources, in ground]: 1.2985e-5 kg
  Uncertainty for LCI results cannot be determined
- Feldspar [resources, in ground]: 5.9426e-12 kg
  Uncertainty for LCI results cannot be determined
- Energy, gross calorific value, in biomass [resources, biotic]: 0.56286 MJ
  Uncertainty for LCI results cannot be determined
- Ulexite [resources, in ground]: 0.0192 kg
  Uncertainty for LCI results cannot be determined
- TiO2, 95% in rutile, 0.40% in crude ore [resources, in ground]: 3.3396e-12 kg
  Uncertainty for LCI results cannot be determined
- Talc [resources, in ground]: 0 kg
  Uncertainty for LCI results cannot be determined
- Iron [resources, in ground]: 0.001435 kg
  Uncertainty for LCI results cannot be determined
- Wood, unspecified, standing/m3 [resources, biotic]: 1.0927e-5 m3
  Uncertainty for LCI results cannot be determined

## Emissions to nature
- Nickel [emissions to water, river]: 5.4379e-6 kg
  Uncertainty for LCI results cannot be determined
- Cadmium [emissions to air, high. pop.]: 1.0304e-10 kg
  Uncertainty for LCI results cannot be determined
- Lead [emissions to air, high. pop.]: 3.5145e-9 kg
  Uncertainty for LCI results cannot be determined
- Acidity, unspecified [emissions to water, river]: 2.0664e-5 kg
  Uncertainty for LCI results cannot be determined
- Hydrocarbons, aromatic [emissions to air, high. pop.]: 5.2349e-5 kg
  Uncertainty for LCI results cannot be determined
- Arsenic [emissions to air, high. pop.]: 9.4832e-11 kg
  Uncertainty for LCI results cannot be determined
- Methane, dichloro-, HCC-30 [emissions to air, high. pop.]: 4.5881e-11 kg
  Uncertainty for LCI results cannot be determined
- Lead [emissions to water, river]: 1.048e-9 kg
  Uncertainty for LCI results cannot be determined
- Nitrogen oxides [emissions to air, high. pop.]: 0.015383 kg
  Uncertainty for LCI results cannot be determined
- Chlorinated solvents, unspecified [emissions to water, river]: 5.3825e-7 kg
  Uncertainty for LCI results cannot be determined
- Silicon [emissions to water, river]: 2.957e-15 kg
  Uncertainty for LCI results cannot be determined
- Carbonate [emissions to water, river]: 7.5891e-5 kg
  Uncertainty for LCI results cannot be determined
- Fluorine [emissions to air, high. pop.]: 2.2419e-6 kg
  Uncertainty for LCI results cannot be determined
- COD, Chemical Oxygen Demand [emissions to water, river]: 0.0044983 kg
  Uncertainty for LCI results cannot be determined
- Sodium [emissions to water, river]: 0.0069707 kg
  Uncertainty for LCI results cannot be determined
- Chlorate [emissions to water, river]: 8.7729e-6 kg
  Uncertainty for LCI results cannot be determined
- Chlorine [emissions to air, high. pop.]: 2.022e-8 kg
  Uncertainty for LCI results cannot be determined
- Hydrogen sulfide [emissions to air, high. pop.]: 1.0561e-7 kg
  Uncertainty for LCI results cannot be determined
- Ammonium, ion [emissions to water, river]: 0.00080421 kg
  Uncertainty for LCI results cannot be determined
- Ethene, chloro- [emissions to air, high. pop.]: 9.2743e-9 kg
  Uncertainty for LCI results cannot be determined
- Carbon monoxide, fossil [emissions to air, high. pop.]: 0.008656 kg
  Uncertainty for LCI results cannot be determined
- BOD5, Biological Oxygen Demand [emissions to water, river]: 0.00039711 kg
  Uncertainty for LCI results cannot be determined
- Chromium [emissions to air, high. pop.]: 1.0261e-6 kg
  Uncertainty for LCI results cannot be determined
- Dinitrogen monoxide [emissions to air, high. pop.]: 0.0035769 kg
  Uncertainty for LCI results cannot be determined
- Propene [emissions to air, high. pop.]: 1.8134e-6 kg
  Uncertainty for LCI results cannot be determined
- Benzene [emissions to water, river]: 5.2488e-13 kg
  Uncertainty for LCI results cannot be determined
- Suspended solids, unspecified [emissions to water, river]: 0.0023401, 0.016525 kg (2 entries)
  Uncertainty for LCI results cannot be determined
- Aluminium [emissions to water, river]: 6.1392e-7 kg
  Uncertainty for LCI results cannot be determined
- AOX, Adsorbable Organic Halogen as Cl [emissions to water, river]: 4.1583e-9 kg
  Uncertainty for LCI results cannot be determined
- Hydrocarbons, chlorinated [emissions to air, high. pop.]: 6.0613e-9 kg
  Uncertainty for LCI results cannot be determined
- Sulfate [emissions to air, high. pop.]: 4.4371e-12 kg
  Uncertainty for LCI results cannot be determined
- TOC, Total Organic Carbon [emissions to water, river]: 0.0012349 kg
  Uncertainty for LCI results cannot be determined
- Aldehydes, unspecified [emissions to air, high. pop.]: 1.7558e-5 kg
  Uncertainty for LCI results cannot be determined
- Hydrocarbons, unspecified [emissions to water, river]: 0.00016783 kg
  Uncertainty for LCI results cannot be determined
- Potassium [emissions to water, river]: 6.5675e-9 kg
  Uncertainty for LCI results cannot be determined
- Zinc [emissions to air, high. pop.]: 2.2825e-9 kg
  Uncertainty for LCI results cannot be determined
- Methane, biogenic [emissions to air, high. pop.]: 9.8542e-5 kg
  Uncertainty for LCI results cannot be determined
- NMVOC, non-methane volatile organic compounds, unspecified origin [emissions to air, high. pop.]: 0.0058594 kg
  Uncertainty for LCI results cannot be determined
- Chromium [emissions to water, river]: 9.9069e-11 kg
  Uncertainty for LCI results cannot be determined
- Nitrogen [emissions to water, river]: 0.00051301 kg
  Uncertainty for LCI results cannot be determined
- Toluene [emissions to air, high. pop.]: 1.0544e-6 kg
  Uncertainty for LCI results cannot be determined
- Particulates, > 2.5 um, and < 10um [emissions to air, high. pop.]: 0.0018512 kg
  Uncertainty for LCI results cannot be determined
- Cyanide [emissions to air, high. pop.]: 1.5904e-6 kg
  Uncertainty for LCI results cannot be determined
- Tin [emissions to water, river]: 1.0902e-12 kg
  Uncertainty for LCI results cannot be determined
- Chloride [emissions to water, river]: 0.002133 kg
  Uncertainty for LCI results cannot be determined
- Carbon dioxide, fossil [emissions to air, high. pop.]: 5.2687 kg
  Uncertainty for LCI results cannot be determined
- Styrene [emissions to air, high. pop.]: 6.2295e-8 kg
  Uncertainty for LCI results cannot be determined
- Mercury [emissions to water, river]: 1.655e-9 kg
  Uncertainty for LCI results cannot be determined
- Hydrogen [emissions to air, high. pop.]: 0.00024695 kg
  Uncertainty for LCI results cannot be determined
- Carbon monoxide, biogenic [emissions to air, high. pop.]: 2.3267e-5 kg
  Uncertainty for LCI results cannot be determined
- Iron [emissions to water, river]: 1.293e-6 kg
  Uncertainty for LCI results cannot be determined
- Hydrogen fluoride [emissions to air, high. pop.]: 7.2619e-6 kg
  Uncertainty for LCI results cannot be determined
- Bromate [emissions to water, river]: 2.2255e-9 kg
  Uncertainty for LCI results cannot be determined
- Methane, fossil [emissions to air, high. pop.]: 0.036661 kg
  Uncertainty for LCI results cannot be determined
- Benzene, ethyl- [emissions to air, high. pop.]: 3.5143e-7 kg
  Uncertainty for LCI results cannot be determined
- Boron [emissions to water, river]: 0.00044257 kg
  Uncertainty for LCI results cannot be determined
- Chlorine [emissions to water, river]: 4.5371e-9 kg
  Uncertainty for LCI results cannot be determined
- Heat, waste [emissions to air, high. pop.]: 80.039 MJ
  Uncertainty for LCI results cannot be determined
- Nitrate [emissions to water, river]: 0.0072866 kg
  Uncertainty for LCI results cannot be determined
- Copper [emissions to water, river]: 6.2023e-6 kg
  Uncertainty for LCI results cannot be determined
- Ammonia [emissions to air, high. pop.]: 9.7747e-5 kg
  Uncertainty for LCI results cannot be determined
- Zinc [emissions to water, river]: 1.8583e-8 kg
  Uncertainty for LCI results cannot be determined
- Magnesium [emissions to water, river]: 4.3945e-6 kg
  Uncertainty for LCI results cannot be determined
- Cadmium [emissions to water, river]: 1.9754e-11 kg
  Uncertainty for LCI results cannot be determined
- Antimony [emissions to air, high. pop.]: 9.2494e-12 kg
  Uncertainty for LCI results cannot be determined
- Nickel [emissions to air, high. pop.]: 1.8653e-6 kg
  Uncertainty for LCI results cannot be determined
- Ethane, 1,2-dichloro- [emissions to air, high. pop.]: 6.8811e-10 kg
  Uncertainty for LCI results cannot be determined
- Sulfur dioxide [emissions to air, high. pop.]: 0.016832 kg
  Uncertainty for LCI results cannot be determined
- Oils, unspecified [emissions to water, river]: 1.3564e-5 kg
  Uncertainty for LCI results cannot be determined
- Dioxin, 2,3,7,8 Tetrachlorodibenzo-p- [emissions to air, high. pop.]: 0 kg
  Uncertainty for LCI results cannot be determined
- Ethene, chloro- [emissions to water, river]: 1.6894e-10 kg
  Uncertainty for LCI results cannot be determined
- Hydrogen chloride [emissions to air, high. pop.]: 0.0001959 kg
  Uncertainty for LCI results cannot be determined
- Particulates, < 2.5 um [emissions to air, high. pop.]: 0.0010763 kg
  Uncertainty for LCI results cannot be determined
- Xylene [emissions to air, high. pop.]: 4.3553e-7 kg
  Uncertainty for LCI results cannot be determined
- Ethene [emissions to air, high. pop.]: 2.4482e-6 kg
  Uncertainty for LCI results cannot be determined
- Selenium [emissions to air, high. pop.]: 2.2484e-13 kg
  Uncertainty for LCI results cannot be determined
- Ethane, 1,2-dichloro- [emissions to water, river]: 1.0943e-11 kg
  Uncertainty for LCI results cannot be determined
- Phenol [emissions to water, river]: 8.8004e-7 kg
  Uncertainty for LCI results cannot be determined
- Cyanide [emissions to water, river]: 2.2927e-10 kg
  Uncertainty for LCI results cannot be determined
- Carbon dioxide, biogenic [emissions to air, high. pop.]: 0.014162 kg
  Uncertainty for LCI results cannot be determined
- Particulates, > 10 um [emissions to air, high. pop.]: 0.0013776 kg
  Uncertainty for LCI results cannot be determined
- Phosphorus [emissions to water, river]: 7.3686e-5 kg
  Uncertainty for LCI results cannot be determined
- Strontium [emissions to water, river]: 9.8759e-10 kg
  Uncertainty for LCI results cannot be determined
- Benzene [emissions to air, high. pop.]: 6.2216e-6 kg
  Uncertainty for LCI results cannot be determined
- Arsenic [emissions to water, river]: 2.4588e-9 kg
  Uncertainty for LCI results cannot be determined
- Fluoride [emissions to water, river]: 1.0792e-8 kg
  Uncertainty for LCI results cannot be determined
- Sulfide [emissions to water, river]: 1.3416e-8 kg
  Uncertainty for LCI results cannot be determined
- Carbon disulfide [emissions to air, high. pop.]: 5.8048e-11 kg
  Uncertainty for LCI results cannot be determined
- Mercury [emissions to air, high. pop.]: 7.9038e-9 kg
  Uncertainty for LCI results cannot be determined
- Silver [emissions to air, high. pop.]: 6.492e-12 kg
  Uncertainty for LCI results cannot be determined
- Manganese [emissions to water, river]: 8.9957e-11 kg
  Uncertainty for LCI results cannot be determined
- Hydrocarbons, aliphatic, alkanes, cyclic [emissions to air, high. pop.]: 1.8653e-6 kg
  Uncertainty for LCI results cannot be determined
- Copper [emissions to air, high. pop.]: 1.9702e-9 kg
  Uncertainty for LCI results cannot be determined
- Sulfate [emissions to water, river]: 0.016364 kg
  Uncertainty for LCI results cannot be determined
- Calcium [emissions to water, river]: 2.3127e-5 kg
  Uncertainty for LCI results cannot be determined
- Water [emissions to water, unspecified]: 39.2702, 1.88736, 0.560808, 255.047 kg (4 entries); lognormal SD95 2.5196
  (5,5,5,5,5,BU:1.05); All uncertainty-values set to 5.0 by default. Balance of input water

## Sampling procedure
literature values based on company survey

## Extrapolations
no extrapolation

## Sources
- Hischier R., 2007, 2007 - LCI packagings and graphical papers - Hischier, Final report ecoinvent data v2.0, 11, Swiss Centre for LCI, Empa - TSL, Duebendorf and St. Gallen, CH
Hischier R. (2007) Life Cycle Inventories of Packaging and Graphical Paper. Final report ecoinvent data v2.0. Volume: 11. Swiss Centre for LCI, Empa - TSL. Dübendorf, CH.
Type: Measurement on site
Source: CD-ROM
First author: Hischier R.
Year: 2007
Title of anthology: Final report ecoinvent data v2.0
Place of publication: Dübendorf, CH
Publisher: Swiss Centre for LCI, Empa - TSL
Volume No: 11

## Validation
Proof reading validation: passed.; Other validation: none;
