# Production of heat distribution system, apartment building MCS Leimbach

Dataset: EcoSpold 1, unit process
Functional unit: 1 m2
Category: heating / heating systems
Geography: CH
Time period: 1994-01 to 2008-12
Generated by: Matthias Klingler
accessRestrictedTo: 0
copyright: true

## General comment
Production of components for the heat distribution system;

## Included processes
Materials used for the production. Energy use for the different production steps. Transport of raw materials to the plant.

## Technology
Technology, materials and components used for heating systems in apartment buildings

## Time period
Amount of material investigated in 2013.

## Reference product
- Production of heat distribution system, apartment building MCS Leimbach [CH]: 1 m2
  SWITZERLAND

## Inputs from technosphere
All rows: lognormal SD95 1.0714
- Mineral wool insulation 50mm, cladding with structured aluminium foil [CH]: 0.03908 m2
  (1,1,1,1,1,1); Data from call of bid of building considered, Basic uncertainty: 1.05
- Branch connections and fittings, stainless steel [CH]: 0.007712 kg
  (1,1,1,1,1,1); Data from call of bid of building considered, Basic uncertainty: 1.05
- Steel pipe, black, primed [CH]: 0.7644 kg
  (1,1,1,1,1,1); Data from call of bid of building considered, Basic uncertainty: 1.05
- Mineral wool insulation 60mm, cladding with structured aluminium foil [CH]: 0.009716 m2
  (1,1,1,1,1,1); Data from call of bid of building considered, Basic uncertainty: 1.05
- Mineral wool insulation 50mm, cladding with aluminium sheet [CH]: 0.003369 m2
  (1,1,1,1,1,1); Data from call of bid of building considered, Basic uncertainty: 1.05
- Pipe, stainless steel [CH]: 0.08037 kg
  (1,1,1,1,1,1); Data from call of bid of building considered, Basic uncertainty: 1.05
- Mineral wool insulation 60mm, cladding with aluminium sheet [CH]: 0.01916 m2
  (1,1,1,1,1,1); Data from call of bid of building considered, Basic uncertainty: 1.05
- Various components for heating system [CH]: 0.1477 kg
  (1,1,1,1,1,1); Data from call of bid of building considered, Basic uncertainty: 1.05
- Mineral wool insulation 80mm, cladding with aluminium sheet [CH]: 0.0155 m2
  (1,1,1,1,1,1); Data from call of bid of building considered, Basic uncertainty: 1.05
- Branch connections and fittings, steel [CH]: 0.03026 kg
  (1,1,1,1,1,1); Data from call of bid of building considered, Basic uncertainty: 1.05

## Sampling procedure
Data from call of bids for a heating system of a specific building used. Data completed with information from literature and from manufacturers

## Sources
- Klingler M., Kasser U., Savi D., Primas A., Stettler Y., Gujer P., 2014, 2014 - LCA ventilation and heating systems - Klingler, Schlussbericht, BFE, Buero fuer Umweltchemie, B&H AG, Zuerich, CH
Klingler M., Kasser U., Savi D., Primas A., Stettler Y., Gujer P. (2014) Ökobilanzdaten für Lüftungs- und Wärmeanlagen. Schlussbericht, BFE. Bundesamt für Energie (BFE). Bern.
Type: Separate publication
Source: Report
First author: Klingler M.
Other authors: Kasser U., Savi D., Primas A., Stettler Y., Gujer P.
Year: 2014
Title of anthology: Schlussbericht, BFE
Place of publication: Bern
Publisher: Bundesamt für Energie (BFE)
