# Asparagus, conventional

Dataset: EcoSpold 1, unit process
Functional unit: 1 kg
Category: agricultural / agricultural production\plant production
Geography: PE
Time period: 2015-01 to 2022-12
Generated by: Tanja Laube
accessRestrictedTo: 0
copyright: true

## General comment
The inventory refers to the average production of 1 kg of conventional asparagus in Peru

## Geography
The inventory is modelled for Peru.

## Reference product
- Asparagus, conventional [PE]: 1 kg

## Inputs from technosphere
- Poultry manure, dried, at regional storehouse [CH]: 0.0057246 kg; lognormal SD95 1.218
  (2,1,2,1,1,5,BU:1.05);
- Asparagus seedling, open field, at production site [GLO]: 0.83333 p; lognormal SD95 1.6906
  (4,4,4,2,4,5,BU:1.05);
- xx Vinasse, at fermentation plant [CH]: 0.0071014 kg; lognormal SD95 1.218
  (2,1,2,1,1,5,BU:1.05);
- Pesticide unspecified, at regional storehouse [CH]: 0.001442 kg; lognormal SD95 1.218
  (2,1,2,1,1,5,BU:1.05);
- Electricity, low voltage, production MX, at grid [MX]: 0.53116 kWh; lognormal SD95 1.2165
  (2,1,1,3,1,5,BU:1.05);
- Boric acid, anhydrous, powder, at plant [RER]: 0.00085507 kg; lognormal SD95 1.21919
  (2,1,2,3,1,5,BU:1.05);
- Installation for drip irrigation [CH]: 1.4648 m3; lognormal SD95 3.10352
  (4,1,3,2,1,5,BU:3);
- Diesel, burned in agricultural machine [CH]: 0.0096051 kg; lognormal SD95 1.2165
  (2,1,1,3,1,5,BU:1.05);
- Potassium nitrate, as N, at regional storehouse [RER]: 0.0032174 kg; lognormal SD95 1.21919
  (2,1,2,3,1,5,BU:1.05);
- Calcium nitrate, as N, at regional storehouse [RER]: 0.0012029 kg; lognormal SD95 1.21919
  (2,1,2,3,1,5,BU:1.05);
- xx Urea ammonium nitrate, as N, at regional storehouse [RER]: 0.013043 kg; lognormal SD95 1.21919
  (2,1,2,3,1,5,BU:1.05);
- Ammonium nitrate, as N, at regional storehouse [RER]: 0.0092464 kg; lognormal SD95 1.21919
  (2,1,2,3,1,5,BU:1.05);
- Magnesium sulphate, at plant [RER]: 0.0039855 kg; lognormal SD95 1.21919
  (2,1,2,3,1,5,BU:1.05);
- Potassium sulphate, as K2O, at regional storehouse [RER]: 0.021696 kg; lognormal SD95 1.21919
  (2,1,2,3,1,5,BU:1.05);
- Phosphoric acid, fertiliser grade, 70% in H2O, at plant [GLO]: 0.035116 kg; lognormal SD95 1.21919
  (2,1,2,3,1,5,BU:1.05);
- Transport, freight, lorry, fleet average [RER]: 0.029087 tkm; lognormal SD95 2.05171
  (2,1,1,3,1,5,BU:2);

## Inputs from nature
- Occupation, annual crop [resources, land]: 1.4493 m2a; lognormal SD95 1.33791
  (4,1,3,2,1,5,BU:1.1);
- Energy, gross calorific value, in biomass [resources, biotic]: 1.476 MJ; lognormal SD95 1.32229
  (4,1,3,2,1,5,BU:1.05);
- Transformation, from annual crop, non-irrigated [resources, land]: 1.4493 m2; lognormal SD95 1.33791
  (4,1,3,2,1,5,BU:1.1);
- Carbon dioxide, in air [resources, in air]: 0.13934 kg; lognormal SD95 1.32229
  (4,1,3,2,1,5,BU:1.05);
- Transformation, to annual crop, non-irrigated [resources, land]: 1.4493 m2; lognormal SD95 1.33791
  (4,1,3,2,1,5,BU:1.1);
- Water, unspecified natural origin, PE [resources, in water]: 1.4648 m3; lognormal SD95 1.32229
  (4,1,3,2,1,5,BU:1.05);

## Emissions to nature
- Chromium [emissions to water, river]: 1.4493e-6 kg; lognormal SD95 3.09092
  (4,1,1,1,1,5,BU:3);
- Mercury [emissions to soil, agricultural]: 9.5652e-10 kg; lognormal SD95 1.26099
  (2,1,3,1,1,5,BU:1.1);
- Phosphorus [emissions to water, groundwater]: 1.0145e-5 kg; lognormal SD95 1.61689
  (4,1,1,1,1,5,BU:1.5);
- Water, PE [emissions to air, unspecified]: 679.28 kg; lognormal SD95 1.63229
  (4,1,3,2,1,5,BU:1.5);
- Chlorpyrifos [emissions to soil, agricultural]: 0.0011884 kg; lognormal SD95 1.3022
  (2,1,2,1,1,5,BU:1.2);
- Lead [emissions to water, river]: 1.3478e-8 kg; lognormal SD95 5.10371
  (4,1,1,1,1,5,BU:5);
- Methomyl [emissions to soil, agricultural]: 0.00021739 kg; lognormal SD95 1.3022
  (2,1,2,1,1,5,BU:1.2);
- Ammonia [emissions to air, low. pop.]: 0.0017826 kg; lognormal SD95 1.3032
  (2,2,2,1,1,5,BU:1.2);
- Tebuconazole [emissions to soil, agricultural]: 2.5362e-5 kg; lognormal SD95 1.3022
  (2,1,2,1,1,5,BU:1.2);
- Nitrate [emissions to water, groundwater]: 0.023623 kg; lognormal SD95 1.61689
  (4,1,1,1,1,5,BU:1.5);
- Water, embodied in product, PE [economic issues, unspecified]: 0.93 kg; lognormal SD95 1.3001
  (4,1,1,1,1,5,BU:1.05);
- Nickel [emissions to water, river]: 1.2029e-9 kg; lognormal SD95 5.10371
  (4,1,1,1,1,5,BU:5);
- Sulfur [emissions to soil, agricultural]: 7.2464e-6 kg; lognormal SD95 1.5657
  (2,1,2,2,1,5,BU:1.5);
- Phosphorus [emissions to water, river]: 0.00010725 kg; lognormal SD95 1.61689
  (4,1,1,1,1,5,BU:1.5);
- Zinc [emissions to water, groundwater]: 1.7391e-6 kg; lognormal SD95 5.10371
  (4,1,1,1,1,5,BU:5);
- Dinitrogen monoxide [emissions to air, low. pop.]: 0.00047971 kg; lognormal SD95 1.5662
  (2,2,2,1,1,5,BU:1.5);
- Copper [emissions to water, river]: 3.913e-7 kg; lognormal SD95 3.09092
  (4,1,1,1,1,5,BU:3);
- Nitrogen oxides [emissions to air, low. pop.]: 0.00010072 kg; lognormal SD95 1.61689
  (4,1,1,1,1,5,BU:1.5);
- Water, PE [emissions to water, unspecified]: 0.78458 m3; lognormal SD95 1.61689
  (4,1,1,1,1,5,BU:1.5);
- Cadmium [emissions to water, river]: 5.6522e-10 kg; lognormal SD95 3.09092
  (4,1,1,1,1,5,BU:3);
- Carbon dioxide, fossil [emissions to air, low. pop.]: 0.0087826 kg; lognormal SD95 1.21919
  (2,2,2,1,1,5,BU:1.05);
- Mercury [emissions to water, river]: 2.3188e-11 kg; lognormal SD95 5.10371
  (4,1,1,1,1,5,BU:5);
- Nickel [emissions to soil, agricultural]: 4.4928e-7 kg; lognormal SD95 1.26099
  (2,1,3,1,1,5,BU:1.1);

## Sampling procedure
Based on literature and producer interviews

## Sources
- Kaegi T., Conte F., Laube T., Roberts G., 2022, 2022 - LCA strawberry and asparagus production - Kaegi, Carbotech on behalf of BAFU, Carbotech AG, Zuerich, CH

## Validation
15.08.2022 \\tsclient\Schreibtisch\WinShare\BAFU Gemuese\Spargeln und Erdbeeren\[EcoSpold_Bafu_Gemuese_Asparagus conventional_PE v1.xlsx]X-Process
