# Sodium silicate, hydrothermal liquor, 48% in H2O, at plant

Dataset: EcoSpold 1, unit process
Functional unit: 1 kg
Category: chemicals / inorganic
Geography: RER
Time period: 2000-01 to 2000-12
Production volume: 260'000 t
Generated by: Roland Hischier
accessRestrictedTo: 0
copyright: true

## General comment
data based on a EMPA study, commissioned by the CEES.;
CAS number: 001344-09-8;

## Included processes
This module contains material and energy input, production of waste and emissions for the production of sodium phosphate out of phosphoric aicd. Transport and infrastructure have been estimated. The input of 0.015 m3 air is not reported in the data according to the methodology of the study.

## Technology
average technology used from these European producers

## Time period
date of published literature

## Reference product
- Sodium silicate, hydrothermal liquor, 48% in H2O, at plant [RER]: 1 kg
  Europe

## Inputs from technosphere
- Sodium hydroxide, 50% in H2O, production mix, at plant [RER]: 0.435 kg; lognormal SD95 1.1
  (2,2,2,1,1,4); Average data from 6 European producers
- Silica sand, at plant [DE]: 0.676 kg; lognormal SD95 1.1
  (2,2,2,1,1,4); Average data from 6 European producers
- Disposal, average incineration residue, 0% water, to residual material landfill [CH]: 4.16e-5 kg; lognormal SD95 1.1
  (2,2,2,1,1,4); Average data from 6 European producers
- Disposal, inert waste, 5% water, to construction waste landfill [CH]: 0.0181 kg; lognormal SD95 1.1
  (2,2,2,1,1,4); Average data from 6 European producers
- Electricity, medium voltage, production ENTSO-E, at grid: 0.0308 kWh; lognormal SD95 1.1
  (2,2,2,1,1,4); Average data from 6 European producers
- Transport, freight, lorry, fleet average [RER]: 0.155 tkm; lognormal SD95 2.1
  (4,5,na,na,na,na); standard distances
- Steam, for chemical processes, at plant [RER]: 0.297 kg; lognormal SD95 1.1
  (2,2,2,1,1,4); Average data from 6 European producers
- Chemical plant, organics [RER]: 4e-10 p; lognormal SD95 3.8
  (4,5,1,3,5,4); estimation
- Heat, at hard coal industrial furnace 1-10MW [RER]: 0.0541 MJ; lognormal SD95 1.1
  (2,2,2,1,1,4); Average data from 6 European producers
- Disposal, residue from cooling tower, 30% water, to sanitary landfill [CH]: 0.0025 kg; lognormal SD95 1.1
  (2,2,2,1,1,4); Average data from 6 European producers
- Chemicals organic, at plant [GLO]: 0.00146 kg; lognormal SD95 1.1
  (2,2,2,1,1,4); Average data from 6 European producers
- Heat, natural gas, at industrial furnace 1MW [CH]: 0.732 MJ; lognormal SD95 1.1
  (2,2,2,1,1,4); Average data from 6 European producers
- Transport, freight, rail [RER]: 0.928 tkm; lognormal SD95 2.1
  (4,5,na,na,na,na); standard distances
- Heat, heavy fuel oil, at industrial furnace 1MW [RER]: 0.00857 MJ; lognormal SD95 1.1
  (2,2,2,1,1,4); Average data from 6 European producers

## Inputs from nature
- Water, cooling, unspecified natural origin/m3 [resources, in water]: 2.08e-5 m3; lognormal SD95 1.1
  (2,2,2,1,1,4); Average data from 6 European producers
- Water, unspecified natural origin/m3 [resources, in water]: 0.0016 m3; lognormal SD95 1.1
  (2,2,2,1,1,4); Average data from 6 European producers

## Emissions to nature
- Heat, waste [emissions to air, high. pop.]: 3.22 MJ; lognormal SD95 1.1
  (2,2,2,1,1,4); Average data from 6 European producers
- Suspended solids, unspecified [emissions to water, river]: 0.00127 kg; lognormal SD95 1.5
  (2,2,2,1,1,4); Average data from 6 European producers
- COD, Chemical Oxygen Demand [emissions to water, river]: 1.31e-5 kg; lognormal SD95 1.5
  (2,2,2,1,1,4); Average data from 6 European producers
- Phosphate [emissions to water, river]: 2.08e-8 kg; lognormal SD95 1.5
  (2,2,2,1,1,4); Average data from 6 European producers
- Nitrate [emissions to water, river]: 2.91e-7 kg; lognormal SD95 1.5
  (2,2,2,1,1,4); Average data from 6 European producers
- Iron [emissions to water, river]: 8.32e-8 kg; lognormal SD95 5
  (2,2,2,1,1,4); Average data from 6 European producers
- Chloride [emissions to water, river]: 9.78e-5 kg; lognormal SD95 1.5
  (2,2,2,1,1,4); Average data from 6 European producers
- Silicon [emissions to water, river]: 0.00341 kg; lognormal SD95 1.5
  (2,2,2,1,1,4); Average data from 6 European producers
- Water [emissions to water, unspecified]: 0.01976, 1.52 kg (2 entries); lognormal SD95 2.5196
  (5,5,5,5,5,BU:1.05); All uncertainty-values set to 5.0 by default. Balance of input water

## Sources
- Zah R., Hischier R., 2007, 2007 - LCI detergents - Zah, Final report ecoinvent data v2.0, 12, Swiss Centre for LCI, Empa - TSL, Duebendorf and St. Gallen, CH
Zah R., Hischier R. (2007) Life Cycle Inventories of Detergents. Final report ecoinvent data v2.0. Volume: 12. Swiss Centre for LCI, Empa - TSL. Dübendorf, CH.
Type: Measurement on site
Source: CD-ROM
First author: Zah R.
Other authors: Hischier R.
Year: 2007
Title of anthology: Final report ecoinvent data v2.0
Place of publication: Dübendorf, CH
Publisher: Swiss Centre for LCI, Empa - TSL
Volume No: 12

## Validation
Proof reading validation: Passed; Other validation: Passed;
