# Electricity, residential, by combustion of hydrogen using CHP, allocated by exergy, distributed by truck, produced by Electrolysis, SOEC with steam input using electricity from grid

Dataset: EcoSpold 1, unit process
Functional unit: 1 kWh
Category: heat / synthetic\transformation
Geography: CH
Time period: 2024-01 to 2024-01
Generated by: Romain Sacchi
accessRestrictedTo: 0
copyright: true

## General comment
This dataset represents the supply of 1 kilowatt hour of electricity in a residence, by hydrogen combustion in a CHP. The hydrogen is produced by Electrolysis, SOEC with steam input, with electricity from grid as feedstock. Electricity conversion efficiency [% LHV input]: 39.4%. LHV [kWh/kg]: 33.33. Market price [Euro/MJ]: 0.03. Synthesis efficiency [% LHV input]: 0%. Total cap. Input-related [kW]: 443.9. CO2 biogenic share [%]: 0%. Power [kW]: 200. Lifetime [years]: 19.51. Annual operation [hours]: 4100. Allocation factor: 0.92. On-site storage loss [%]: 1.26. Use loss [%]: 0.5. For more information, refer to: Sacchi, R. and Bauer, C. LCA of Power-to-X processes and applications in the residential sector. Paul Scherrer Institut, 2023. Source: Sacchi, R. and Bauer, C. LCA of Power-to-X processes and applications in the residential sector. Paul Scherrer Institut, 2023.

## Reference product
- Electricity, residential, by combustion of hydrogen using CHP, allocated by exergy, distributed by truck, produced by Electrolysis, SOEC with steam input using electricity from grid [CH]: 1 kWh
  not defined

## Inputs from technosphere
- Hydrogen supply, distributed by truck, produced by Electrolysis, SOEC with steam input using electricity from grid [CH]: 0.06981 kg; lognormal SD95 1.382
  Hydrogen input. 1 [MJ H2]/120 [MJ/kg H2]/ eff.(th) {2;5;1;2;3;5;1.05;}
- Cogen unit 160kWe, common components for heat+electricity [RER]: 2.582e-8 p; lognormal SD95 3.14
  1/(Total cap. (input-related) [kW] * lifetime [y] * annual operation [h] * 1 or 3.6 [MJ/kWh])*allocation factor {2;5;1;2;3;5;3;}
- Transport, freight, rail, electricity with shunting [CH]: 3.439e-9 tkm; lognormal SD95 2.208
  Generic transport distances calculated based on Table 4.2 of the ecoinvent v.2 Methodology report. Distribution: 0.0 kg over 33.0 km.
- Cogen unit 160kWe, components for heat only [RER]: 2.582e-8 p; lognormal SD95 3.14
  (same comment as for Cogen unit 160kWe, common components for heat+electricity)
- High pressure hydrogen Type I storage tank production [GLO]: 1.661e-5 p; lognormal SD95 3.137
  No. of tanks/(annual hydrogen use x lifetime) {2;5;1;2;3;5;3;}
- Lubricating oil, at plant [RER]: 1.042e-7 kg; lognormal SD95 1.382
  {2;5;1;2;3;5;1.05;}
- Disposal, used mineral oil, 10% water, to hazardous waste incineration [CH]: 1.042e-7 kg
- Hydrogen supply, distributed by truck, produced by Electrolysis, SOEC with steam input using electricity from grid [CH]: 0.001233 kg; lognormal SD95 1.382
  ((1+storage loss)*(1+use loss)-1)*hydrogen input {2;5;1;2;3;5;1.05;}
- Transport, freight, lorry, 16t-32t gross weight, fleet average [CH]: 3.439e-9 tkm; lognormal SD95 2.208
  (same comment as for Transport, freight, rail, electricity with shunting)
- Cogen unit 160kWe, components for electricity only [RER]: 2.582e-8 p; lognormal SD95 3.14
  (same comment as for Cogen unit 160kWe, common components for heat+electricity)

## Emissions to nature
- Nitrogen oxides [emissions to air, unspecified]: 2.5e-5 kg; lognormal SD95 1.676
  Based on Greenstar 8000 Hydrogen-Ready specifications (25mg NOx/kWh). {2;5;1;2;3;5;1.5;}
- Water [emissions to air, stratosphere + troposphere]: 0.6283 kg; lognormal SD95 1.382
  9kg of water produced per kg of H2 combusted. {2;5;1;2;3;5;1.05;}
- Hydrogen [emissions to air, unspecified]: 0.001233 kg
  Hydrogen leakage.

## Sampling procedure
Sampling procedure: Literature data

## Sources
- Sacchi R., Bauer C., 2024, 2024 - LCA power-to-X in residential sector - Sacchi, Project report, PSI, Villigen, CH

## Validation
Proof reading validation: Passed, Other validation: none, Validator: Rolf Frischknecht, Telephone: 0041 44 940 61 91, E-mail: frischknecht@treeze.ch, Company: treeze, Country: CH
