# Burning of 1 g diesel in locomotive with particle filter (93%)

Dataset: EcoSpold 1, unit process, infrastructure
Functional unit: 1 p
Category: transport systems / train
Geography: CH
Time period: 2009-01 to 2015-12
Share of production covered: 100 %
Generated by: Annika Messmer
accessRestrictedTo: 0
copyright: true

## Included processes
The inventory includes the emissions of burning 1 gram of diesel in a locomotive. It is assumed that 93% of the locomotives have a particle filter; Geography: Switzerland

## Geography
Switzerland

## Technology
Average technology

## Time period
Time of publications

## Reference product
- Burning of 1 g diesel in locomotive with particle filter (93%) [CH]: 1 p
  SWITZERLAND

## Inputs from technosphere
- Diesel, at regional storage [CH]: 0.001 kg; lognormal SD95 1.5846
  (2,4,1,3,4,5,BU:1.05); ;

## Emissions to nature
- Chromium [emissions to air, unspecified]: 5e-11 kg; lognormal SD95 5.8584
  (3,3,2,5,5,5,BU:5); ; EMEP/EEA guidebook 2013, 1.A.2.f.ii, Tab. 3-1
- Butane [emissions to air, unspecified]: 7.6689e-9 kg; lognormal SD95 2.308
  (3,3,2,5,5,5,BU:1.5); ; BAFU 2015: Non-road database; EMEP/EEA guidebook 2013, Tab. 3-114
- Acetaldehyde [emissions to air, unspecified]: 2.3365e-7 kg; lognormal SD95 2.308
  (3,3,2,5,5,5,BU:1.5); ; BAFU 2015: Non-road database; EMEP/EEA guidebook 2013, Tab. 3-122
- Benzo(a)pyrene [emissions to air, unspecified]: 3e-11 kg; lognormal SD95 3.7429
  (3,3,2,5,5,5,BU:3); ; EMEP/EEA guidebook 2013, 1.A.2.f.ii, Tab. 3-1
- Nickel [emissions to air, unspecified]: 7e-11 kg; lognormal SD95 5.8584
  (3,3,2,5,5,5,BU:5); ; EMEP/EEA guidebook 2013, 1.A.2.f.ii, Tab. 3-1
- Particulates, < 2.5 um [emissions to air, unspecified]: 2.0098e-7 kg; lognormal SD95 3.7429
  (3,3,2,5,5,5,BU:3); ; own calculation with SBB tractions data and non road emission factor (BAFU 2015)
- Toluene [emissions to air, unspecified]: 5.1126e-10 kg; lognormal SD95 2.308
  (3,3,2,5,5,5,BU:1.5); ; BAFU 2015: Non-road database; EMEP/EEA guidebook 2013, Tab. 3-118
- Noise, rail, freight train [non material emissions, unspecified]: 1 tkm; lognormal SD95 2.532
  (3,3,5,5,5,5,BU:1.5); ;
- Pentane [emissions to air, unspecified]: 3.0676e-9 kg; lognormal SD95 2.308
  (3,3,2,5,5,5,BU:1.5); ; BAFU 2015: Non-road database; EMEP/EEA guidebook 2013, Tab. 3-115
- Sulfur dioxide [emissions to air, unspecified]: 2e-8 kg; lognormal SD95 2.0816
  (3,3,2,5,5,5,BU:1.05); ; HBEFA 3.1., CH
- Carbon dioxide, fossil [emissions to air, unspecified]: 0.0031501 kg; lognormal SD95 2.0816
  (3,3,2,5,5,5,BU:1.05); ; BAFU 2015: non road emission factor database
- Particulates, > 10 um [emissions to air, unspecified]: 8.492e-9 kg; lognormal SD95 2.308
  (3,3,2,5,5,5,BU:1.5); ; own calculation with SBB tractions data and non road emission factor (BAFU 2015)
- Acrolein [emissions to air, unspecified]: 9.0493e-8 kg; lognormal SD95 2.308
  (3,3,2,5,5,5,BU:1.5); ; BAFU 2015: Non-road database; EMEP/EEA guidebook 2013, Tab. 3-124
- Carbon monoxide, fossil [emissions to air, unspecified]: 2.495e-5 kg; lognormal SD95 5.8584
  (3,3,2,5,5,5,BU:5); ; BAFU 2015: non road emission factor database
- Lead [emissions to air, unspecified]: 5.2e-11 kg; lognormal SD95 5.8584
  (3,3,2,5,5,5,BU:5); ; EMEP/EEA guidebook 2013, 1.A.2.f.ii, Tab. 3-12
- Benzaldehyde [emissions to air, unspecified]: 7.0043e-8 kg; lognormal SD95 2.308
  (3,3,2,5,5,5,BU:1.5); ; BAFU 2015: Non-road database; EMEP/EEA guidebook 2013, Tab. 3-123
- Cadmium [emissions to air, unspecified]: 1e-11 kg; lognormal SD95 5.8584
  (3,3,2,5,5,5,BU:5); ; EMEP/EEA guidebook 2013, 1.A.2.f.ii, Tab. 3-1
- Propane [emissions to air, unspecified]: 5.1126e-9 kg; lognormal SD95 2.308
  (3,3,2,5,5,5,BU:1.5); ; BAFU 2015: Non-road database; EMEP/EEA guidebook 2013, Tab. 3-113
- Zinc [emissions to air, unspecified]: 1e-9 kg; lognormal SD95 5.8584
  (3,3,2,5,5,5,BU:5); ; EMEP/EEA guidebook 2013, 1.A.2.f.ii, Tab. 3-1
- Dinitrogen monoxide [emissions to air, unspecified]: 1.5128e-7 kg; lognormal SD95 2.308
  (3,3,2,5,5,5,BU:1.5); ; BAFU 2015: non road emission factor database
- Arsenic [emissions to air, unspecified]: 1e-13 kg; lognormal SD95 5.8584
  (3,3,2,5,5,5,BU:5); ; EMEP/EEA guidebook 2013, 1.A.2.f.ii, Tab. 3-1
- Styrene [emissions to air, unspecified]: 2.8631e-8 kg; lognormal SD95 2.308
  (3,3,2,5,5,5,BU:1.5); ; BAFU 2015: Non-road database; EMEP/EEA guidebook 2013, Tab. 3-125
- Ethane [emissions to air, unspecified]: 1.5338e-9 kg; lognormal SD95 2.308
  (3,3,2,5,5,5,BU:1.5); ; BAFU 2015: Non-road database; EMEP/EEA guidebook 2013, Tab. 3-112
- NMVOC, non-methane volatile organic compounds, unspecified origin [emissions to air, unspecified]: 4.153e-6 kg; lognormal SD95 2.308
  (3,3,2,5,5,5,BU:1.5); ; non road emission factor
- Particulates, > 2.5 um, and < 10um [emissions to air, unspecified]: 8.2743e-9 kg; lognormal SD95 2.7394
  (3,3,2,5,5,5,BU:2); ; own calculation with SBB tractions data and non road emission factor (BAFU 2015)
- Copper [emissions to air, unspecified]: 1.7e-9 kg; lognormal SD95 5.8584
  (3,3,2,5,5,5,BU:5); ; EMEP/EEA guidebook 2013, 1.A.2.f.ii, Tab. 3-1
- Nitrogen oxides [emissions to air, unspecified]: 4.5108e-5 kg; lognormal SD95 2.308
  (3,3,2,5,5,5,BU:1.5); ; BAFU 2015: non road emission factor database
- Benzene [emissions to air, unspecified]: 6.8762e-9 kg; lognormal SD95 3.7429
  (3,3,2,5,5,5,BU:3); ; BAFU 2015: non road emission factor database
- Mercury [emissions to air, unspecified]: 5.3e-12 kg; lognormal SD95 5.8584
  (3,3,2,5,5,5,BU:5); ; EMEP/EEA guidebook 2013, 1.A.2.f.ii, Tab. 3-1
- Heptane [emissions to air, unspecified]: 1.5338e-8 kg; lognormal SD95 2.308
  (3,3,2,5,5,5,BU:1.5); ; BAFU 2015: Non-road database; EMEP/EEA guidebook 2013, Tab. 3-116
- Formaldehyde [emissions to air, unspecified]: 4.2946e-7 kg; lognormal SD95 2.308
  (3,3,2,5,5,5,BU:1.5); ; BAFU 2015: Non-road database; EMEP/EEA guidebook 2013, Tab. 3-121
- m-Xylene [emissions to air, unspecified]: 5.0104e-8 kg; lognormal SD95 2.308
  (3,3,2,5,5,5,BU:1.5); ; BAFU 2015: Non-road database; EMEP/EEA guidebook 2013, Tab. 3-119
- Chromium VI [emissions to air, unspecified]: 1e-13 kg; lognormal SD95 5.8584
  (3,3,2,5,5,5,BU:5); ; EMEP/EEA guidebook 2013, 1.A.2.f.ii, Tab. 3-1
- Heat, waste [emissions to air, unspecified]: 4.28e-5 MJ; lognormal SD95 1.0907
  (2,3,1,3,1,1,BU:1.05); default value;
- o-Xylene [emissions to air, unspecified]: 2.045e-8 kg; lognormal SD95 2.308
  (3,3,2,5,5,5,BU:1.5); ; BAFU 2015: Non-road database; EMEP/EEA guidebook 2013, Tab. 3-120
- Ammonia [emissions to air, unspecified]: 1e-8 kg; lognormal SD95 2.1253
  (3,3,2,5,5,5,BU:1.2); ; EMEP/EEA guidebook 2013, 1.A.3.c, Tab. 3-3
- Methane, fossil [emissions to air, unspecified]: 5.501e-8 kg; lognormal SD95 2.308
  (3,3,2,5,5,5,BU:1.5); ; BAFU 2015: non road emission factor database
- PAH, polycyclic aromatic hydrocarbons [emissions to air, unspecified]: 3.29e-9 kg; lognormal SD95 3.7429
  (3,3,2,5,5,5,BU:3); ; EMEP/EEA guidebook 2013, 1.A.2.f.ii, Tab. 3-1
- Selenium [emissions to air, unspecified]: 1e-11 kg; lognormal SD95 5.8584
  (3,3,2,5,5,5,BU:5); ; EMEP/EEA guidebook 2013, 1.A.2.f.ii, Tab. 3-1

## Sampling procedure
Statistics

## Sources
- Messmer A., Frischknecht R., 2016, 2016 - LCI rail transport services - Messmer, Project report, 544, treeze Ltd., Uster, CH
A. Messmer, R. Frischknecht (2016) Life Cycle Inventory of Rail Transport Services. Project report. Volume: 544. treeze Ltd.. Uster, CH.
Type: Separate publication
Source: Report
First author: A. Messmer
Other authors: R. Frischknecht
Year: 2016
Title of anthology: Project report
Place of publication: Uster, CH
Publisher: treeze Ltd.
Volume No: 544

## Validation
Proof reading validation: 14.07.2016; Other validation: G:\Projekte laufend\544 Aktualisierung mobitool\Bahntransport\EcoSpold\Güter\[544_burning diesel in locomotive_EIV2_v0.1.xlsx]X-Process;
