# Electricity, nuclear, at power plant boiling water reactor

Dataset: EcoSpold 1, unit process
Functional unit: 1 kWh
Category: electricity by fuel / waste\nuclear\bwr
Geography: DE
Time period: 2000-01 to 2000-12
Generated by: Roberto Dones
accessRestrictedTo: 0
copyright: true

## General comment
The average burnup 48 MWd/kg heavy metal around year 2000 has been assumed representative for the lifetime of the modeled plant. The average burnup corresponds to an average enrichment of 3.8% U235 for fresh uranium fuel elements. The utilisation factor for the infrastructure is the inverse of the total net electricity delivered in 40 years lifetime;

## Included processes
The module includes fuel elements, chemicals, and diesel requirements as well as the relevant transport requirements. Water use (fresh and decarbonized) for cooling is included. Considered radioactive waste streams are: spent fuel to reprocessing and conditioning; operational low active waste for conditioning in the intermediate repository; and, contaminated waste from dismantling. Non-radioactive wastes are accounted for.

## Geography
Swiss data of one specific plant for requirements and all German BWRs for emissions.

## Technology
Standard technology for commercial operation.

## Reference product
- Electricity, nuclear, at power plant boiling water reactor [DE]: 1 kWh
  GERMANY

## Inputs from technosphere
- Oxygen, liquid, at plant [RER]: 1.58e-5 kg; lognormal SD95 1.15
  own estimation
- Chemicals organic, at plant [GLO]: 1.3e-6 kg; lognormal SD95 1.15
  own estimation
- Carbon dioxide liquid, at plant [RER]: 1.58e-7 kg; lognormal SD95 1.15
  own estimation
- Disposal, used mineral oil, 10% water, to hazardous waste incineration [CH]: 1.54e-6 kg; lognormal SD95 1.15
  own estimation
- Water, decarbonised, at plant [RER]: 3.27 kg; lognormal SD95 1.2
  own estimation
- Flat glass, coated, at plant [RER]: 4.13e-6 kg; lognormal SD95 1.15
  own estimation
- Steel, low-alloyed, at plant [RER]: 5.7e-6 kg; lognormal SD95 1.6
  own assumption
- Radioactive waste, in interim storage conditioning [CH]: 4.68e-10 m3; lognormal SD95 1.2
  own estimation
- Chemicals inorganic, at plant [GLO]: 6.3e-7 kg; lognormal SD95 1.15
  own estimation
- Cast iron, at plant [RER]: 1.21e-7 kg; lognormal SD95 1.2
  extrapolation from another plant type
- Radioactive waste, in interim storage, for final repository LLW [CH]: 1.61e-8 m3; lognormal SD95 1.2
  own estimation
- Cationic resin, at plant [CH]: 1.11e-6 kg; lognormal SD95 1.15
  own estimation
- Acetylene, at regional storehouse [CH]: 3.4e-8 kg; lognormal SD95 1.15
  own estimation
- Disposal, hazardous waste, 25% water, to hazardous waste incineration [CH]: 9.16e-7 kg; lognormal SD95 1.15
  own estimation
- Argon, liquid, at plant [RER]: 2.46e-5 kg; lognormal SD95 1.15
  own estimation
- Nuclear power plant, boiling water reactor 1000MW [DE]: 3.03e-12 p; lognormal SD95 1.05
  estimation of total net electricity over a lifetime
- Boric acid, anhydrous, powder, at plant [RER]: 2.42e-8 kg; lognormal SD95 1.15
  own estimation on a specific study
- Concrete, normal, at plant [CH]: 1.67e-8 m3; lognormal SD95 1.15
  own estimation
- Transport, freight, lorry, 16t-32t gross weight, fleet average [CH]: 4.85e-5 tkm; lognormal SD95 2.1
  standard
- Nuclear spent fuel, in conditioning, at plant [CH]: 1.58e-6 kg; lognormal SD95 1.5
  own assumption
- Nuclear spent fuel, in reprocessing, at plant [RER]: 1.05e-6 kg; lognormal SD95 1.5
  own assumption
- Radioactive waste, in final repository for nuclear waste LLW [CH]: 4.25e-8 m3; lognormal SD95 1.5
  estrapolation from a different reactor type
- Disposal, separator sludge, 90% water, to hazardous waste incineration [CH]: 2.06e-6 kg; lognormal SD95 1.15
  own estimation
- Reinforcing steel, at plant [RER]: 8.1e-7 kg; lognormal SD95 1.2
  extrapolation from another plant type
- Anionic resin, at plant [CH]: 1.11e-6 kg; lognormal SD95 1.15
  own estimation
- Lubricating oil, at plant [RER]: 1.53e-6 kg; lognormal SD95 1.15
  own estimation
- Hydrogen, liquid, at plant [RER]: 9.71e-6 kg; lognormal SD95 1.15
  own estimation
- Diesel, burned in diesel-electric generating set [GLO]: 0.000349 MJ; lognormal SD95 1.15
  own estimation
- Cement, unspecified, at plant [CH]: 8.1e-6 kg; lognormal SD95 1.15
  own estimation
- Borax, anhydrous, powder, at plant [RER]: 3.03e-8 kg; lognormal SD95 1.15
  own estimation on a specific study
- Fuel elements BWR, UO2 4.0% & MOX, at nuclear fuel fabrication plant [DE]: 2.63e-6 kg; lognormal SD95 1.2
  estimated variation over lifetime
- Paper, woodfree, coated, at integrated mill [RER]: 6.07e-7 kg; lognormal SD95 1.15
  own estimation
- Nitrogen, liquid, at plant [RER]: 5.83e-5 kg; lognormal SD95 1.15
  own estimation

## Inputs from nature
- Water, river [resources, in water]: 0.00473 m3; lognormal SD95 1.15
  own estimation

## Emissions to nature
- Hydrogen-3, Tritium [emissions to air, low. pop.]: 0.0367 kBq; lognormal SD95 1.5
  uncertainty declared in reports for radioactive releases
- Cobalt-60 [emissions to water, river]: 1.07e-5 kBq; lognormal SD95 1.5
  uncertainty declared in reports for radioactive releases
- Krypton-88 [emissions to air, low. pop.]: 0.00149 kBq; lognormal SD95 1.5
  uncertainty declared in reports for radioactive releases
- Xenon-135 [emissions to air, low. pop.]: 0.146 kBq; lognormal SD95 1.5
  uncertainty declared in reports for radioactive releases
- Xenon-135m [emissions to air, low. pop.]: 0.0972 kBq; lognormal SD95 1.5
  uncertainty declared in reports for radioactive releases
- Strontium-90 [emissions to water, river]: 1 kBq; lognormal SD95 1.5
  uncertainty declared in reports for radioactive releases
- Krypton-87 [emissions to air, low. pop.]: 0.00311 kBq; lognormal SD95 1.5
  uncertainty declared in reports for radioactive releases
- Xenon-133m [emissions to air, low. pop.]: 0.000764 kBq; lognormal SD95 1.5
  uncertainty declared in reports for radioactive releases
- Iodine-131 [emissions to air, low. pop.]: 0.0367 kBq; lognormal SD95 1.5
  uncertainty declared in reports for radioactive releases
- Silver-110 [emissions to water, river]: 2.25e-7 kBq; lognormal SD95 1.5
  uncertainty declared in reports for radioactive releases
- Antimony-125 [emissions to water, river]: 2.02e-7 kBq; lognormal SD95 1.5
  uncertainty declared in reports for radioactive releases
- Radioactive species, Nuclides, unspecified [emissions to water, river]: 1.65e-5 kBq; lognormal SD95 1.5
  uncertainty declared in reports for radioactive releases
- Cesium-137 [emissions to water, river]: 3.79e-6 kBq; lognormal SD95 1.5
  uncertainty declared in reports for radioactive releases
- Cesium-134 [emissions to water, river]: 1.64e-7 kBq; lognormal SD95 1.5
  uncertainty declared in reports for radioactive releases
- Krypton-85 [emissions to air, low. pop.]: 0.0172 kBq; lognormal SD95 1.5
  uncertainty declared in reports for radioactive releases
- Niobium-95 [emissions to water, river]: 5.62e-8 kBq; lognormal SD95 1.5
  uncertainty declared in reports for radioactive releases
- Heat, waste [emissions to air, low. pop.]: 7.31 MJ; lognormal SD95 1.03
  uncertainty on efficiency
- Strontium-89 [emissions to water, river]: 3.85e-8 kBq; lognormal SD95 1.5
  uncertainty declared in reports for radioactive releases
- Krypton-85m [emissions to air, low. pop.]: 0.00309 kBq; lognormal SD95 1.5
  uncertainty declared in reports for radioactive releases
- Tellurium-123m [emissions to water, river]: 4.94e-10 kBq; lognormal SD95 1.5
  uncertainty declared in reports for radioactive releases
- Argon-41 [emissions to air, low. pop.]: 0.00137 kBq; lognormal SD95 1.5
  uncertainty declared in reports for radioactive releases
- Krypton-89 [emissions to air, low. pop.]: 0.00011 kBq; lognormal SD95 1.5
  uncertainty declared in reports for radioactive releases
- Technetium-99m [emissions to water, river]: 1.15e-7 kBq; lognormal SD95 1.5
  uncertainty declared in reports for radioactive releases
- Xenon-133 [emissions to air, low. pop.]: 0.0585 kBq; lognormal SD95 1.5
  uncertainty declared in reports for radioactive releases
- Antimony-124 [emissions to water, river]: 5.58e-8 kBq; lognormal SD95 1.5
  uncertainty declared in reports for radioactive releases
- Xenon-131m [emissions to air, low. pop.]: 0.00126 kBq; lognormal SD95 1.5
  uncertainty declared in reports for radioactive releases
- Hydrogen-3, Tritium [emissions to water, river]: 0.245 kBq; lognormal SD95 1.5
  uncertainty declared in reports for radioactive releases
- Radioactive species, other beta emitters [emissions to air, low. pop.]: 3.39e-6 kBq; lognormal SD95 1.5
  uncertainty declared in reports for radioactive releases
- Iodine-131 [emissions to water, river]: 4.07e-6 kBq; lognormal SD95 1.5
  uncertainty declared in reports for radioactive releases
- Chromium-51 [emissions to water, river]: 1.89e-6 kBq; lognormal SD95 1.5
  uncertainty declared in reports for radioactive releases
- Xenon-138 [emissions to air, low. pop.]: 0.00996 kBq; lognormal SD95 1.5
  uncertainty declared in reports for radioactive releases
- Xenon-137 [emissions to air, low. pop.]: 0.000622 kBq; lognormal SD95 1.5
  uncertainty declared in reports for radioactive releases
- Cobalt-58 [emissions to water, river]: 7.97e-7 kBq; lognormal SD95 1.5
  uncertainty declared in reports for radioactive releases
- Water [emissions to water, unspecified]: 4.4935 kg; lognormal SD95 2.5196
  (5,5,5,5,5,BU:1.05); All uncertainty-values set to 5.0 by default. Balance of input water

## Sampling procedure
Literature and statistics of radioactive emissions.

## Sources
- Dones R., Bauer C., Doka G., 2009, 2009 - Nuclear energy - Dones, Sachbilanzen von Energiesystemen. Final report No. 6 ecoinvent v2.1, 6, Swiss Centre for LCI, PSI, Doka LCA, Duebendorf and Villigen, CH
Dones, R., Doka G. (2009) Kernenergie. Sachbilanzen von Energiesystemen. Final report No. 6 ecoinvent v2.1. Editors: Bauer C.. Volume: 6. Swiss Centre for LCI, PSI. Dübendorf and Villigen, CH.
Type: Measurement on site
Source: CD-ROM
First author: Dones, R.
Other authors: Doka G.
Year: 2009
Name of editors: Bauer C.
Title of anthology: Sachbilanzen von Energiesystemen. Final report No. 6 ecoinvent v2.1
Place of publication: Dübendorf and Villigen, CH
Publisher: Swiss Centre for LCI, PSI
Volume No: 6

## Validation
Proof reading validation: Corrected for v1.1; Other validation: none;
