# Disposal, silencer for ventilator unit 6700 m3/h, modular

Dataset: EcoSpold 1, unit process
Functional unit: 1 m3
Category: waste management / building demolition
Geography: CH
Time period: 2014-01 to 2014-12
Generated by: Alex Primas
accessRestrictedTo: 0
copyright: true

## General comment
Disposal of a silencer for a air handling unit with 6700 m3/h nominal air flow rate (at 2 m/s air speed in cross section of air filter or heat exchanger) kg/(m3/h), total weight: 0.024 kg/(m3/h), including a frame construction, casing, silencer baffle with section length 900mm. The frame construction made of aluminium-profiles, casing made of hot-dip galvanized and powder coated steel sheets insulated with polyurethane foam, rock wool as sound-absorbing media.

## Included processes
Transport to dismantling facilities, machines for handling in sorting plant, electricity demand for sorting plant, final disposal of waste material. Cut-off to recycling for metals.

## Geography
Specific to the technology mix encountered in sorting plants in Switzerland.

## Technology
Disposal to a sorting plant assumed. Metal pieces, copper in cables and electronic devices are recycled, plastic parts are incinerated, inert wastes (e.g. rock wool) are landfilled.

## Time period
Amount of material investigated in 2013. Disposal technology mix as used in late 1990ies

## Reference product
- Disposal, silencer for ventilator unit 6700 m3/h, modular [CH]: 1 m3
  SWITZERLAND

## Inputs from technosphere
- Disposal, building, bulk iron (excluding reinforcement), to sorting plant [CH]: 0.017508 kg; lognormal SD95 1.24
  (2,4,1,1,1,5); Data related to production process
- Disposal, building, mineral wool, to sorting plant [CH]: 0.005445 kg; lognormal SD95 1.24
  (2,4,1,1,1,5); Data related to production process
- Disposal, building, paint on metal, to sorting plant [CH]: 0.00011407 kg; lognormal SD95 1.32
  (4,4,1,1,1,5); Data related to production process
- Disposal, building, polyurethane foam, to final disposal [CH]: 0.00092794 kg; lognormal SD95 1.24
  (2,4,1,1,1,5); Data related to production process

## Sampling procedure
Waste-specific calculation based on production input data

## Sources
- Klingler M., Kasser U., Savi D., Primas A., Stettler Y., Gujer P., 2014, 2014 - LCA ventilation and heating systems - Klingler, Schlussbericht, BFE, Buero fuer Umweltchemie, B&H AG, Zuerich, CH
Klingler M., Kasser U., Savi D., Primas A., Stettler Y., Gujer P. (2014) Ökobilanzdaten für Lüftungs- und Wärmeanlagen. Schlussbericht, BFE. Bundesamt für Energie (BFE). Bern.
Type: Separate publication
Source: Report
First author: Klingler M.
Other authors: Kasser U., Savi D., Primas A., Stettler Y., Gujer P.
Year: 2014
Title of anthology: Schlussbericht, BFE
Place of publication: Bern
Publisher: Bundesamt für Energie (BFE)
