# Lignite power plant

Dataset: EcoSpold 1, unit process, infrastructure
Functional unit: 1 p
Category: electricity by fuel / lignite\power plant\infrastructure
Geography: RER
Time period: 2000-01 to 2000-12
Generated by: Christian Bauer
accessRestrictedTo: 0
copyright: true

## General comment
Estimation based on literature data. Two reference plants with 100 MW and 500 MW have been considered. The module represents a mix with a share of 30 % and 70 %, respectively. ;

## Included processes
The module includes materials, energy and transport requirements used for construction of the plant. Disposal of material after dismantling is also included.

## Geography
German data for the end of the 1980s and US data for early 1980s.

## Technology
Average technology in 1980s.

## Reference product
- Lignite power plant [RER]: 1 p
  Europe

## Inputs from technosphere
- Polyethylene, HDPE, granulate, at plant [RER]: 442000 kg; lognormal SD95 2
  own assumption
- Transport, freight, lorry, fleet average [RER]: 5.84e6 tkm; lognormal SD95 2.1
  standard for transports
- Reinforcing steel, at plant [RER]: 5.06e7 kg; lognormal SD95 2
  own assumption
- Disposal, building, polyethylene/polypropylene products, to final disposal [CH]: 442000 kg; lognormal SD95 2
  own assumption
- Electricity, medium voltage, production ENTSO-E, at grid: 1.86e7 kWh; lognormal SD95 2
  own assumption
- Disposal, building, reinforced concrete, to final disposal [CH]: 1.86e8 kg; lognormal SD95 2
  own assumption
- Heat, light fuel oil, at industrial furnace 1MW [RER]: 3.09e8 MJ; lognormal SD95 2
  0
- Aluminium, production mix, at plant [RER]: 370000 kg; lognormal SD95 2
  own assumption
- Diesel, burned in building machine, average [CH]: 3.09e8 MJ; lognormal SD95 2
  own assumption
- Disposal, building, mineral wool, to sorting plant [CH]: 607000 kg; lognormal SD95 2
  own assumption
- Transport, freight, rail [RER]: 1.17e7 tkm; lognormal SD95 2.1
  standard for transports
- Copper, at regional storage [RER]: 751000 kg; lognormal SD95 2
  own assumption
- Chromium steel 18/8, at plant [RER]: 576000 kg; lognormal SD95 2
  own assumption
- Concrete, normal, at plant [CH]: 80500 m3; lognormal SD95 2
  own assumption
- Steel, low-alloyed, at plant [RER]: 5.06e6 kg; lognormal SD95 2
  own assumption
- Rock wool, at plant [CH]: 607000 kg; lognormal SD95 2
  own assumption

## Inputs from nature
All rows: lognormal SD95 2
- Transformation, to traffic area, road network [resources, land]: 40000 m2
  own assumption
- Occupation, industrial area, vegetation [resources, land]: 998000 m2a
  own assumption
- Occupation, construction site [resources, land]: 188000 m2a
  own assumption
- Occupation, traffic area, road network [resources, land]: 998000 m2a
  own assumption
- Occupation, industrial area [resources, land]: 750000 m2a
  own assumption
- Transformation, from unknown [resources, land]: 110000 m2
  own assumption
- Transformation, to industrial area, vegetation [resources, land]: 40000 m2
  own assumption
- Transformation, to industrial area [resources, land]: 30000 m2
  own assumption

## Emissions to nature
- Heat, waste [emissions to air, low. pop.]: 6.7e7 MJ; lognormal SD95 2
  own assumption

## Sampling procedure
literature

## Extrapolations
see Geography/Text

## Sources
- Dones R., Bauer C., Roeder A., 2007, 2007 - Coal - Dones, Sachbilanzen von Energiesystemen. Final report No. 6 ecoinvent data v2.0, 6, Swiss Centre for LCI, PSI, Duebendorf and Villigen, CH
Röder, A., Ch. Bauer, R. Dones (2007) Kohle. Sachbilanzen von Energiesystemen. Final report No. 6 ecoinvent data v2.0. Editors: Dones R.. Volume: 6. Swiss Centre for LCI, PSI. Dübendorf and Villigen, CH.
Type: Measurement on site
Source: CD-ROM
First author: Röder, A.
Other authors: Ch. Bauer, R. Dones
Year: 2007
Name of editors: Dones R.
Title of anthology: Sachbilanzen von Energiesystemen. Final report No. 6 ecoinvent data v2.0
Place of publication: Dübendorf and Villigen, CH
Publisher: Swiss Centre for LCI, PSI
Volume No: 6

## Validation
Proof reading validation: passed; Other validation: none;
