# Palladium, primary, at refinery

Dataset: EcoSpold 1, unit process
Functional unit: 1 kg
Category: metals / non ferro
Geography: RU
Time period: 2000-01 to 2000-12
Production volume: 81 t / a
Share of production covered: 23 %
Generated by: Mischa Classen
accessRestrictedTo: 0
copyright: true

## General comment
The multioutput-process "platinum group metal production, primary" delivers the co-products "platinum, primary, at refinery", "palladium, primary, at refinery", "rhodium, primary, at refinery", "nickel, primary, from platinum group metal production" and "copper, primary, from platinum group metal production" in the Russian Federation (RU). The module is designed for the use of the metal in technical systems, where it plays a minor role like the use in manufacturing of electronic or technical chemistry using certain catalysts. It is not to be used if the impact of the PGM within the modelled process in scope is considered to be high. In such cases, a more detailed analysis depending on scope and allocation procedures has to be conducted. The data used is mainly based on a LCA study for autocatalysts in Germany.;

## Included processes
The module includes a mining and a beneficiation step with the mining infrastructure and disposal of overburden and tailings. Subsequently it includes the metallurgy step with the disposal of slag, the infrastructure and the separation of the co-products nickel and copper, and the refining step yielding the desired PGM-mix inclusively the refining infrastructure. Production, application and emissions of most agents used in beneficiation and metallurgy are also included.

## Geography
Some agents used like lime or sodium cyanide originate from data sets valid for Switzerland or Europe. Processes like blasting and transport originate from data sets valid for Switzerland or Europe.

## Technology
Mining is done underground, followed by beneficiation trough flotation where considerable amounts of agents are added. Overburden and tailings are disposed on the mining site and partly refilled. In RU a Outokumpu flash furnace followed by a Pierce-Smith-Converter is used. The resulting nickel matte is treated by elektrorefining. No recovery of sulphur dioxide in the off gas. The refining is done by selective precipitation, using data from the ZA process as proxy. For electricity mix the UCTE production mix is inventoried

## Reference product
- Palladium, primary, at refinery [RU]: 1 kg
  RUSSIAN FEDERATION

## Inputs from technosphere
- Limestone, milled, packed, at plant [CH]: 51.5594 kg; lognormal SD95 2
  reported values
- Chemicals organic, at plant [GLO]: 5.84723 kg; lognormal SD95 2
  reported values
- Non-ferrous metal smelter [GLO]: 4.1766e-8 p; lognormal SD95 3.3
  (4,2,1,5,4,4,9)
- Transport, transoceanic freight ship [OCE]: 54.4038 tkm; lognormal SD95 2.07
  (2,2,2,1,3,4,5)
- Non-ferrous metal mine, underground [GLO]: 1.4373e-6 p; lognormal SD95 3.07
  (3,2,1,1,3,4,9)
- Natural gas, burned in industrial furnace 1MWth [CH]: 37885.2 MJ; lognormal SD95 1.13
  (2,2,1,1,1,4,1)
- Blasting [RER]: 0.012933 kg; lognormal SD95 1.26
  (3,2,1,1,3,4,3)
- Diesel, burned in building machine, average [CH]: 1987.48 MJ; lognormal SD95 1.63
  (4,3,2,2,4,5,5)
- Electricity, medium voltage, production ENTSO-E, at grid: 7836.68 kWh; lognormal SD95 1.26
  (3,2,1,1,3,4) 2;
- Hydrogen cyanide, at plant [RER]: 0.91021 kg; lognormal SD95 2
  reported values
- Disposal, sulfidic tailings, off-site [GLO]: 6970.59 kg; lognormal SD95 1.13
  (2,2,2,3,1,4) 6;
- Disposal, nickel smelter slag, 0% water, to residual material landfill [CH]: 11953.7 kg; lognormal SD95 1.13
  (2,2,2,3,1,4) 6;
- Conveyor belt, at plant [RER]: 0.0005732 m; lognormal SD95 2.91
  (5,4,3,3,5,6,5)
- Chemicals inorganic, at plant [GLO]: 1212.65 kg; lognormal SD95 2
  reported values
- Chemical plant, organics [RER]: 3.427e-10 p; lognormal SD95 3.3
  (4,2,1,5,4,4,9)

## Inputs from nature
- Water, well [resources, in water]: 3.62932 m3; lognormal SD95 1.26
  (3,2,1,1,3,4,12)
- Palladium, Pd 7.3E-4%, Pt 2.5E-4%, Rh 2.0E-5%, Ni 2.3E+0%, Cu 3.2E+0% in ore [resources, in ground]: 1.11096 kg; lognormal SD95 1.12
  reported values
- Water, river [resources, in water]: 269.895 m3; lognormal SD95 1.13
  (2,2,1,1,1,4,12)
- Occupation, mineral extraction site [resources, land]: 4.57985 m2a; lognormal SD95 1.53
  (3,2,3,1,1,2,7); calculation based on reported value
- Transformation, to mineral extraction site [resources, land]: 0.064521 m2; lognormal SD95 2.03
  (3,2,3,1,1,2,8); calculation based on reported value
- Transformation, from unknown [resources, land]: 0.064521 m2; lognormal SD95 2.03
  (3,2,3,1,1,2,8); calculation based on reported value

## Emissions to nature
- Cobalt [emissions to air, low. pop.]: 0.047815 kg; lognormal SD95 5.08
  (3,2,1,1,3,4) 22;
- Arsenic [emissions to water, river]: 8.7853e-5 kg; lognormal SD95 10
  (,,,,,) ; reported values
- Dioxin, 2,3,7,8 Tetrachlorodibenzo-p- [emissions to air, low. pop.]: 1.5871e-8 kg; lognormal SD95 3.07
  (3,2,1,1,3,4,21)
- Heat, waste [emissions to air, low. pop.]: 80963.2 MJ; lognormal SD95 1.26
  (3,2,1,1,3,4) 2;
- Zinc [emissions to water, river]: 0.0059913 kg; lognormal SD95 10
  (,,,,,) ; reported values
- Copper [emissions to water, river]: 0.0028658 kg; lognormal SD95 10
  (,,,,,) ; reported values
- Tin [emissions to air, low. pop.]: 0.010369 kg; lognormal SD95 5.08
  (3,2,1,1,3,4,22)
- Sulfate [emissions to water, river]: 34.2769 kg; lognormal SD95 10
  (,,,,,) ; reported values
- Manganese [emissions to air, low. pop.]: 0.010053 kg; lognormal SD95 1.59
  (3,2,1,1,3,4,31)
- Particulates, < 2.5 um [emissions to air, low. pop.]: 0.52272 kg; lognormal SD95 3.69
  (3,2,1,1,5,4) 20;
- Zinc [emissions to air, low. pop.]: 0.16246 kg; lognormal SD95 5.08
  (3,2,1,1,3,4) 22;
- Sulfur dioxide [emissions to air, low. pop.]: 8497.21 kg; lognormal SD95 1.38
  (4,2,2,1,3,5) 15;
- Chromium [emissions to air, low. pop.]: 0.0010571 kg; lognormal SD95 1.59
  (3,2,1,1,3,4,31)
- DOC, Dissolved Organic Carbon [emissions to water, river]: 0.067963 kg; lognormal SD95 10
  (,,,,,) ; reported values
- Nickel [emissions to water, river]: 0.0012524 kg; lognormal SD95 10
  (,,,,,) ; reported values
- Particulates, > 10 um [emissions to air, low. pop.]: 5.53486 kg; lognormal SD95 2.26
  (3,2,1,1,5,4) 18;
- Manganese [emissions to water, river]: 0.00036005 kg; lognormal SD95 10
  (,,,,,) ; reported values
- Lead [emissions to water, river]: 0.00046189 kg; lognormal SD95 10
  (,,,,,) ; reported values
- Chromium [emissions to water, river]: 0.00059625 kg; lognormal SD95 10
  (,,,,,) ; reported values
- TOC, Total Organic Carbon [emissions to water, river]: 0.067963 kg; lognormal SD95 10
  (,,,,,) ; reported values
- Particulates, > 2.5 um, and < 10um [emissions to air, low. pop.]: 5.15912 kg; lognormal SD95 2.69
  (3,2,1,1,5,4) 19;
- Cobalt [emissions to water, river]: 1.1378e-5 kg; lognormal SD95 10
  (,,,,,) ; reported values
- Antimony [emissions to air, low. pop.]: 0.0021142 kg; lognormal SD95 1.59
  (3,2,1,1,3,4,31)
- Nitrogen, organic bound [emissions to water, river]: 0.33125 kg; lognormal SD95 10
  (,,,,,) ; reported values
- Suspended solids, unspecified [emissions to water, river]: 0.075179 kg; lognormal SD95 10
  (,,,,,) ; reported values
- Boron [emissions to air, low. pop.]: 0.00010571 kg; lognormal SD95 1.59
  (3,2,1,1,3,4,31)
- Lead [emissions to air, low. pop.]: 0.049543 kg; lognormal SD95 5.08
  (3,2,1,1,3,4) 22;
- Calcium [emissions to water, river]: 9.99503 kg; lognormal SD95 10
  reported values
- Nitrogen oxides [emissions to air, low. pop.]: 0.030158 kg; lognormal SD95 1.59
  (3,2,1,1,3,4,16)
- Cadmium [emissions to water, river]: 2.0048e-5 kg; lognormal SD95 10
  (,,,,,) ; reported values
- Cadmium [emissions to air, low. pop.]: 1.1637e-6 kg; lognormal SD95 1.59
  (3,2,1,1,3,4,31)
- Tin [emissions to water, river]: 0.0005876 kg; lognormal SD95 10
  reported values
- Arsenic [emissions to air, low. pop.]: 0.0092749 kg; lognormal SD95 5.08
  (3,2,1,1,3,4) 22;
- Mercury [emissions to air, low. pop.]: 5.2712e-7 kg; lognormal SD95 1.59
  (3,2,1,1,3,4,31)
- Nickel [emissions to air, low. pop.]: 0.050119 kg; lognormal SD95 1.59
  (3,2,1,1,3,4) 31;
- COD, Chemical Oxygen Demand [emissions to water, river]: 0.174 kg; lognormal SD95 10
  (,,,,,) ; reported values
- Carbon dioxide, fossil [emissions to air, unspecified]: 284.873 kg; lognormal SD95 1.58
  (4,2,1,1,4,4) 14; excluding stdev of lime addition
- Iron [emissions to water, river]: 0.0042342 kg; lognormal SD95 10
  (,,,,,) ; reported values
- Cyanide [emissions to water, river]: 0.10024 kg; lognormal SD95 3.84
  (4,2,2,3,4,4,33); including stdev of sodium cyanide
- Mercury [emissions to water, river]: 7.0993e-6 kg; lognormal SD95 10
  (,,,,,) ; reported values
- Beryllium [emissions to air, low. pop.]: 2.7479e-5 kg; lognormal SD95 1.59
  (3,2,1,1,3,4,31)
- Fluorine [emissions to air, low. pop.]: 0.010053 kg; lognormal SD95 1.59
  (3,2,1,1,3,4,31)
- Copper [emissions to air, low. pop.]: 0.063945 kg; lognormal SD95 5.08
  (3,2,1,1,3,4) 22;
- NMVOC, non-methane volatile organic compounds, unspecified origin [emissions to air, low. pop.]: 0.31685 kg; lognormal SD95 1.59
  (3,2,1,1,3,4,16)
- Aluminium [emissions to water, river]: 0.0012559 kg; lognormal SD95 10
  (,,,,,) ; reported values
- Selenium [emissions to air, low. pop.]: 5.2712e-7 kg; lognormal SD95 1.59
  (3,2,1,1,3,4,31)
- BOD5, Biological Oxygen Demand [emissions to water, river]: 0.11579 kg; lognormal SD95 10
  (,,,,,) ; reported values
- Carbon disulfide [emissions to air, low. pop.]: 2.58373 kg; lognormal SD95 2.31
  (4,2,2,5,4,4,23)
- Water [emissions to water, unspecified]: 3266.39, 256400 kg (2 entries); lognormal SD95 2.5196
  (5,5,5,5,5,BU:1.05); All uncertainty-values set to 5.0 by default. Balance of input water

## Sampling procedure
Literature

## Extrapolations
see Geography and Technology

## Sources
- Classen M., Althaus H.-J., Blaser S., Scharnhorst W., Tuchschmid M., Jungbluth N., Faist Emmenegger M., 2009, 2009 - LCI metals - Classen, Final report ecoinvent data v2.1, 10, Swiss Centre for LCI, Empa, ESU-services Ltd., Duebendorf, CH
Classen M., Althaus H.-J., Blaser S., Doka G., Jungbluth N., Tuchschmid M. (2008) Life Cycle Inventories of Metals. Final report ecoinvent data v2.1. Volume: 10. Issue: 0. Swiss Centre for LCI, Empa - TSL. Dübendorf, CH.
Type: Measurement on site
Source: CD-ROM
First author: Classen M.
Other authors: Althaus H.-J., Blaser S., Doka G., Jungbluth N., Tuchschmid M.
Year: 2008
Title of anthology: Final report ecoinvent data v2.1
Place of publication: Dübendorf, CH
Publisher: Swiss Centre for LCI, Empa - TSL
Volume No: 10
Issue No: 0

## Validation
Proof reading validation: passed; Other validation: none;
