# xx Petrol, 85% vol. ethanol, from biomass, at service station

Dataset: EcoSpold 1, unit process
Functional unit: 1 kg
Category: material, obsolete / fuels, obsolete\oil, obsolete\petrol, obsolete
Geography: CH
Time period: 2000-01 to 2000-12
Production volume: Ethanol for use as a fuel as a fuel was limited to 1-1.5 Ml/yr in CH, in 2005.
Share of production covered: 0 %
Generated by: Edgard Gnansounou
accessRestrictedTo: 0
copyright: true

## General comment
Inventory refers to the distribution of 1 kg of E85 (15% vol. low-sulphur gasoline blended with 85% vol. anhydrous ethanol from biomass). Ethanol is partly produced in CH (according to the production mix), and partly imported from RER and BR. Distribution to the final consumer (service station) including all necessary transports. Fossil and biogenic carbon contents are respectively 12.4% and 44.7%.;
CAS number: 000064-17-5;
Formula: C2H6O ;
Synonyms: Alkohol, alcohol dehydrated, algrain, Anhydrol, cologne spirit, cologne spirits (alcohol), Denatured alcohol, Ethyl alcohol, Ethanol, ethanol 200 proof, Ethanol absolute, ethyl hydrate, ethyl hydroxide, fermentation alcohol, grain alcohol, bioethanol, bio-ethanol, E85;

## Included processes
This process includes the distribution of E85 (15% vol. low-sulphur gasoline and 85% vol. anhydrous ethanol from biomass) to the end user at the filling station. Operation of storage tanks and petrol stations are taken into account. Emissions from evaporation and treatment of effluents are also included. Excluding emissions from car-washing at petrol stations. Mixing is supposed to be performed directly at the filling station (splash blending).

## Geography
The ethanol component is partly produced in Switzerland (25%) and partly imported from the EU (37.5%) and from Brazil (37.5%). The gasoline component corresponds to low-sulphur gasoline used in Switzerland.

## Technology
Distribution of fuels

## Reference product
- xx Petrol, 85% vol. ethanol, from biomass, at service station [CH]: 1 kg
  SWITZERLAND

## Inputs from technosphere
- Ethanol, 99.7% in H2O, from biomass, production BR, at service station [CH]: 0.32148 kg; lognormal SD95 1.209
  (1,2,1,1,1,5); Calculations, according to the assumed ethanol mix
- Petrol, at regional storage [CH]: 0.14272 kg; lognormal SD95 1.209
  (1,2,1,1,1,5); Calculations, according to the incorporation rate of ethanol and the respective densities of ethanol (0.795 kg/l) and gasoline (0.75 kg/l)
- Ethanol, 99.7% in H2O, from biomass, at service station [CH]: 0.21432 kg; lognormal SD95 1.209
  (1,2,1,1,1,5); Calculations, according to the assumed ethanol mix
- Ethanol, 99.7% in H2O, from biomass, production RER, at service station [CH]: 0.32148 kg; lognormal SD95 1.209
  (1,2,1,1,1,5); Calculations, according to the assumed ethanol mix

## Sampling procedure
Environmental reports and literature.

## Sources
- Jungbluth N., Chudacoff M., Dauriat A., Dinkel F., Doka G., Faist Emmenegger M., Gnansounou E., Kljun N., Spielmann M., Stettler C., Sutter J., 2007, 2007 - LCI bioenergy - Jungbluth, Final report ecoinvent data v2.0, 17, Swiss Centre for LCI, ESU-services Ltd., Duebendorf and Uster, CH
Jungbluth N., Chudacoff M., Dauriat A., Dinkel F., Doka G., Faist Emmenegger M., Gnansounou E., Kljun N., Spielmann M., Stettler C., Sutter J. (2007) Life Cycle Inventories of Bioenergy. Final report ecoinvent data v2.0. Volume: 17. Swiss Centre for LCI, ESU. Duebendorf and Uster, CH.
Type: Measurement on site
Source: CD-ROM
First author: Jungbluth N.
Other authors: Chudacoff M., Dauriat A., Dinkel F., Doka G., Faist Emmenegger M., Gnansounou E., Kljun N., Spielmann M., Stettler C., Sutter J.
Year: 2007
Title of anthology: Final report ecoinvent data v2.0
Place of publication: Duebendorf and Uster, CH
Publisher: Swiss Centre for LCI, ESU
Volume No: 17

## Validation
Proof reading validation: Passed.; Other validation: none;
