# Waste paper, sorted, for further treatment

Dataset: EcoSpold 1, unit process
Functional unit: 1 kg
Category: paper+ board / waste paper
Geography: CH
Time period: 2000-01 to 2000-12
Generated by: Roland Hischier
accessRestrictedTo: 0
copyright: true

## General comment
Personal communication with the European Paper & Pulp Industry, together with information from literature, is used in order to establish the dataset. All waste is assumed to be incinerated. The dataset represents the input material for DIP process, as delivered to the factory gate.;

## Included processes
This module includes the efforts for sorting collected paper (energy, materials), the treatment of the waste fractions extracted plus the subsequent transport to a paper production site.

## Technology
typical technology used in Europe arround 2005

## Reference product
- Waste paper, sorted, for further treatment [CH]: 1 kg
  SWITZERLAND

## Inputs from technosphere
- Disposal, packaging cardboard, 19.6% water, to municipal incineration [CH]: 0.0045 kg; lognormal SD95 1.31
  (4,3,1,3,1,5); personal communication of industry
- Lubricating oil, at plant [RER]: 1.2e-5 kg; lognormal SD95 1.34
  (3,4,4,3,1,5); based on data from 1 Swiss plant
- Disposal, wood untreated, 20% water, to municipal incineration [CH]: 0.00075 kg; lognormal SD95 1.31
  (4,3,1,3,1,5); personal communication of industry
- Transport, freight, lorry, 32t-40t gross weight, fleet average [CH]: 0.02 tkm; lognormal SD95 2.52
  (5,4,1,3,4,5); own estimation
- Waste paper, mixed, from public collection, for further treatment [CH]: 1.025 kg; lognormal SD95 1.31
  (4,3,1,3,1,5); personal communication of industry
- Transport, freight, lorry, 3.5t gross weight, fleet average [CH]: 0.00198 tkm; lognormal SD95 2.12
  (2,4,2,3,1,5); based on data from one CH plant
- Electricity, medium voltage, at grid [CH]: 0.0093 kWh; lognormal SD95 1.31
  (4,3,1,3,1,5); personal communication of industry
- Transport, freight, rail, electricity with shunting [CH]: 0.08 tkm; lognormal SD95 2.52
  (5,4,1,3,4,5); own estimation
- Disposal, plastics, mixture, 15.3% water, to municipal incineration [CH]: 0.009625 kg; lognormal SD95 1.31
  (4,3,1,3,1,5); personal communication of industry
- Steel, converter, unalloyed, at plant [RER]: 0.0012 kg; lognormal SD95 1.34
  (3,4,4,3,1,5); based on data from 1 Swiss plant
- Light fuel oil, burned in boiler 100kW, non-modulating [CH]: 0.0155 MJ; lognormal SD95 1.34
  (3,4,4,3,1,5); based on data from 1 Swiss plant
- Disposal, steel, 0% water, to municipal incineration [CH]: 0.00075 kg; lognormal SD95 1.31
  (4,3,1,3,1,5); personal communication of industry
- Waste paper sorting plant [RER]: 6.06e-10 p; lognormal SD95 3.05
  (4,na,na,na,na,na); own assumption
- Sheet rolling, steel [RER]: 0.0012 kg; lognormal SD95 1.34
  (3,4,4,3,1,5); based on data from 1 Swiss plant
- Disposal, paper, 11.2% water, to municipal incineration [CH]: 0.008625 kg; lognormal SD95 1.31
  (4,3,1,3,1,5); personal communication of industry
- Disposal, textiles, soiled, 25% water, to municipal incineration [CH]: 0.00075 kg; lognormal SD95 1.31
  (4,3,1,3,1,5); personal communication of industry

## Emissions to nature
- Heat, waste [emissions to air, high. pop.]: 0.03348 MJ; lognormal SD95 1.31
  (4,3,1,3,1,5); personal communication of industry

## Sampling procedure
literatue

## Extrapolations
see geography

## Sources
- Hischier R., 2007, 2007 - LCI packagings and graphical papers - Hischier, Final report ecoinvent data v2.0, 11, Swiss Centre for LCI, Empa - TSL, Duebendorf and St. Gallen, CH
Hischier R. (2007) Life Cycle Inventories of Packaging and Graphical Paper. Final report ecoinvent data v2.0. Volume: 11. Swiss Centre for LCI, Empa - TSL. Dübendorf, CH.
Type: Measurement on site
Source: CD-ROM
First author: Hischier R.
Year: 2007
Title of anthology: Final report ecoinvent data v2.0
Place of publication: Dübendorf, CH
Publisher: Swiss Centre for LCI, Empa - TSL
Volume No: 11

## Validation
Proof reading validation: passed.; Other validation: none;
