# Natural gas, at consumer

Dataset: EcoSpold 1, unit process
Functional unit: 1 MJ
Category: fuels / natural gas\gas to user
Geography: US
Time period: 2000-01 to 2005-12
Generated by: Thomas Heck
accessRestrictedTo: 0
copyright: true

## General comment
Based on NREL data (NREL 2007)
Technology: Average technology.
Version: 2.2

Local category: Erdgas
Local subcategory: Brenn- und Treibstoffe

## Included processes
The dataset describes approximatively the transport and distribution of natural gas.

## Technology
Average technology.

## Reference product
- Natural gas, at consumer [US]: 1 MJ
  North America

## Inputs from technosphere
- Pipeline, natural gas, long distance, high capacity, onshore [GLO]: 8.66e-11 km; lognormal SD95 1.5
  NREL 2007, Faist Emmenegger et al. 2003
- Natural gas, at production [US]: 0.0268 m3; lognormal SD95 1.05
  based on Natural Gas Annual, EIA 2005

## Emissions to nature
- Acrolein [emissions to air, unspecified]: 5.1e-10 kg; lognormal SD95 5
  based on NREL 2007 data
- NMVOC, non-methane volatile organic compounds, unspecified origin [emissions to air, unspecified]: 1.33e-6 kg; lognormal SD95 3
  based on NREL 2007 data
- Ethene, chloro- [emissions to air, unspecified]: 3.7e-15 kg; lognormal SD95 5
  based on NREL 2007 data
- Styrene [emissions to air, unspecified]: 2.31e-15 kg; lognormal SD95 5
  based on NREL 2007 data
- Aldehydes, unspecified [emissions to air, unspecified]: 3.75e-9 kg; lognormal SD95 5
  based on NREL 2007 data
- Benzene, hexachloro- [emissions to air, unspecified]: 2.03e-15 kg; lognormal SD95 5
  based on NREL 2007 data
- Chlorine [emissions to air, unspecified]: 7.73e-11 kg; lognormal SD95 5
  based on NREL 2007 data
- Carbon monoxide, fossil [emissions to air, unspecified]: 5.7e-6 kg; lognormal SD95 3
  based on NREL 2007 data
- Sulfur dioxide [emissions to air, unspecified]: 3.98e-5 kg; lognormal SD95 3
  based on NREL 2007 data
- Chromium VI [emissions to air, unspecified]: 1.36e-11 kg; lognormal SD95 5
  based on NREL 2007 data
- Methane, dichlorodifluoro-, CFC-12 [emissions to air, unspecified]: 9.84e-15 kg; lognormal SD95 5
  based on NREL 2007 data
- Beryllium [emissions to air, unspecified]: 5.72e-12 kg; lognormal SD95 5
  based on NREL 2007 data
- Benzo(a)pyrene [emissions to air, unspecified]: 6.56e-15 kg; lognormal SD95 5
  based on NREL 2007 data
- Xylene [emissions to air, unspecified]: 1.8e-6 kg; lognormal SD95 5
  based on NREL 2007 data
- Hydrogen fluoride [emissions to air, unspecified]: 2.59e-8 kg; lognormal SD95 5
  based on NREL 2007 data
- Ethane, 1,1,1-trichloro-, HCFC-140 [emissions to air, unspecified]: 1.01e-14 kg; lognormal SD95 5
  based on NREL 2007 data
- Carbon disulfide [emissions to air, unspecified]: 1.2e-14 kg; lognormal SD95 5
  based on NREL 2007 data
- Toluene [emissions to air, unspecified]: 3.08e-6 kg; lognormal SD95 5
  based on NREL 2007 data
- Phenol [emissions to air, unspecified]: 3.48e-11 kg; lognormal SD95 5
  based on NREL 2007 data
- Nickel [emissions to air, unspecified]: 4.33e-10 kg; lognormal SD95 5
  based on NREL 2007 data
- Benzal chloride [emissions to air, unspecified]: 6.47e-14 kg; lognormal SD95 5
  based on NREL 2007 data
- Magnesium [emissions to air, unspecified]: 1.9e-9 kg; lognormal SD95 5
  based on NREL 2007 data
- Chromium [emissions to air, unspecified]: 8.53e-11 kg; lognormal SD95 5
  based on NREL 2007 data
- Dioxin, 2,3,7,8 Tetrachlorodibenzo-p- [emissions to air, unspecified]: 1.64e-13 kg; lognormal SD95 5
  based on NREL 2007 data
- Methane, tetrachloro-, CFC-10 [emissions to air, unspecified]: 4.4e-12 kg; lognormal SD95 5
  based on NREL 2007 data
- Dinitrogen monoxide [emissions to air, unspecified]: 9.84e-8 kg; lognormal SD95 5
  based on NREL 2007 data
- Methane, bromo-, Halon 1001 [emissions to air, unspecified]: 1.48e-14 kg; lognormal SD95 5
  based on NREL 2007 data
- Cadmium [emissions to air, unspecified]: 3.86e-11 kg; lognormal SD95 5
  based on NREL 2007 data
- Bromine [emissions to air, unspecified]: 3.61e-15 kg; lognormal SD95 5
  based on NREL 2007 data
- Isoprene [emissions to air, unspecified]: 1.05e-14 kg; lognormal SD95 5
  based on NREL 2007 data
- Hexane [emissions to air, unspecified]: 6.2e-15 kg; lognormal SD95 5
  based on NREL 2007 data
- Ammonia [emissions to air, unspecified]: 1.83e-9 kg; lognormal SD95 5
  based on NREL 2007 data
- PAH, polycyclic aromatic hydrocarbons [emissions to air, unspecified]: 6e-11 kg; lognormal SD95 5
  based on NREL 2007 data
- Cobalt [emissions to air, unspecified]: 4.34e-11 kg; lognormal SD95 5
  based on NREL 2007 data
- Particulates, > 2.5 um, and < 10um [emissions to air, unspecified]: 1.14e-7 kg; lognormal SD95 3
  based on NREL 2007 data
- Mercury [emissions to air, unspecified]: 2.3e-11 kg; lognormal SD95 5
  based on NREL 2007 data
- Selenium [emissions to air, unspecified]: 2.36e-10 kg; lognormal SD95 5
  based on NREL 2007 data
- Carbon dioxide, fossil [emissions to air, unspecified]: 0.00483 kg; lognormal SD95 2
  based on NREL 2007 data
- Nitrogen oxides [emissions to air, unspecified]: 6.84e-6 kg; lognormal SD95 2
  based on NREL 2007 data
- Propene [emissions to air, unspecified]: 8.31e-10 kg; lognormal SD95 5
  based on NREL 2007 data
- Cumene [emissions to air, unspecified]: 4.9e-16 kg; lognormal SD95 5
  based on NREL 2007 data
- Formaldehyde [emissions to air, unspecified]: 7.87e-9 kg; lognormal SD95 5
  based on NREL 2007 data
- Acenaphthene [emissions to air, unspecified]: 8.8e-14 kg; lognormal SD95 5
  based on NREL 2007 data
- Antimony [emissions to air, unspecified]: 3.88e-12 kg; lognormal SD95 5
  based on NREL 2007 data
- Zinc [emissions to air, unspecified]: 2.12e-12 kg; lognormal SD95 5
  based on NREL 2007 data
- Propanal [emissions to air, unspecified]: 3.51e-14 kg; lognormal SD95 5
  based on NREL 2007 data
- Hydrogen chloride [emissions to air, unspecified]: 2.14e-7 kg; lognormal SD95 5
  based on NREL 2007 data
- Furan [emissions to air, unspecified]: 7.86e-16 kg; lognormal SD95 5
  based on NREL 2007 data
- Arsenic [emissions to air, unspecified]: 8.5e-11 kg; lognormal SD95 5
  based on NREL 2007 data
- Manganese [emissions to air, unspecified]: 2.65e-10 kg; lognormal SD95 5
  based on NREL 2007 data
- Particulates, < 2.5 um [emissions to air, unspecified]: 2.28e-7 kg; lognormal SD95 3
  based on NREL 2007 data
- Fluorine [emissions to air, unspecified]: 1.57e-13 kg; lognormal SD95 5
  based on NREL 2007 data
- Carbon dioxide, biogenic [emissions to air, unspecified]: 1.91e-5 kg; lognormal SD95 2
  based on NREL 2007 data
- Ethene, tetrachloro- [emissions to air, unspecified]: 8e-12 kg; lognormal SD95 5
  based on NREL 2007 data
- Copper [emissions to air, unspecified]: 3.19e-12 kg; lognormal SD95 5
  based on NREL 2007 data
- Chloroform [emissions to air, unspecified]: 5.46e-15 kg; lognormal SD95 5
  based on NREL 2007 data
- Acetaldehyde [emissions to air, unspecified]: 5.58e-10 kg; lognormal SD95 5
  based on NREL 2007 data
- Methane, fossil [emissions to air, unspecified]: 2.82e-5 kg; lognormal SD95 3
  based on NREL 2007 data
- Cyanide [emissions to air, unspecified]: 2.31e-13 kg; lognormal SD95 5
  based on NREL 2007 data
- Particulates, > 10 um [emissions to air, unspecified]: 2.52e-7 kg; lognormal SD95 3
  based on NREL 2007 data
- Lead [emissions to air, unspecified]: 1.01e-10 kg; lognormal SD95 5
  based on NREL 2007 data
- Benzene [emissions to air, unspecified]: 1.99e-6 kg; lognormal SD95 5
  based on NREL 2007 data

## Sampling procedure
Literature

## Sources
- Faist Emmenegger M., Heck T., Jungbluth N., Tuchschmid M., 2007, 2007 - Natural gas - Faist-Emmeneger, Sachbilanzen von Energiesystemen. Final report No. 6 ecoinvent data v2.0, 6, Swiss Centre for LCI, PSI, ESU-services Ltd., Duebendorf and Villigen, CH
Faist Emmenegger, M., Heck, T., Jungbluth, N. (2007) Erdgas. Sachbilanzen von Energiesystemen. Final report No. 6 ecoinvent data v2.0. Editors: Dones R.. Volume: 6. Swiss Centre for LCI, PSI. Dübendorf and Villigen, CH.
Type: Measurement on site
Source: CD-ROM
First author: Faist Emmenegger, M.
Other authors: Heck, T., Jungbluth, N.
Year: 2007
Name of editors: Dones R.
Title of anthology: Sachbilanzen von Energiesystemen. Final report No. 6 ecoinvent data v2.0
Place of publication: Dübendorf and Villigen, CH
Publisher: Swiss Centre for LCI, PSI
Volume No: 6

## Validation
Proof reading validation: passed; Other validation: none;
