# Disposal, hard coal ash, 0% water, to residual material landfill

Dataset: EcoSpold 1, unit process
Functional unit: 1 kg
Category: landfill / residual material landfill
Geography: NL
Time period: 2000-01 to 2000-12
Generated by: Gabor Doka
accessRestrictedTo: 0
copyright: true

## General comment
Inventoried waste contains 100% NL hard coal ash; . waste composition (wet, in ppm): H2O n.a.; O 503850; H n.a.; C n.a.; S 3442.2; N n.a.; P 1167.3; B 255.28; Cl 24.299; Br 40.767; F 92.402; I 3.0702; Ag n.a.; As 25.905; Ba 1446.7; Cd 1.2802; Co 34.801; Cr 152.46; Cu 79.504; Hg 0.10736; Mn 418.72; Mo 13.197; Ni 101.59; Pb 60.916; Sb 3.9052; Se 13.187; Sn 75.906; V 179.04; Zn 127.98; Be 12.963; Sc 49.192; Sr 1345.2; Ti 7701.5; Tl 6.7681; W 20.017; Si 199630; Fe 57245; Ca 16176; Al 137790; K 15538; Mg 44926; Na 7940.1; Share of carbon in waste that is biogenic 60.4%. ;;

## Included processes
Waste-specific short-term emissions to water from leachate. Long-term emissions from landfill to ground water.

## Geography
Technology encountered in Switzerland in 2000. Landfill includes base seal and leachate collection system.

## Technology
Swiss residual material landfill for polluted, inorganic waste. With base seal and leachate collection system. Recultivation after closure.

## Time period
Waste composition as given in literature reference, theoretical data or other source. Transfer coefficients from prospective model.

## Reference product
- Disposal, hard coal ash, 0% water, to residual material landfill [NL]: 1 kg
  NETHERLANDS

## Inputs from technosphere
- Residual material landfill facility [CH]: 2.0833e-9 p; lognormal SD95 1
  demands per kilogram waste. uncertainty is heeded in the module
- Process-specific burdens, residual material landfill [CH]: 1 kg; lognormal SD95 1
  demands per kilogram waste. uncertainty is heeded in the module

## Emissions to nature
- Iodide [emissions to water, river]: 3.0702e-6 kg; lognormal SD95 10.87
  uncertainty is calculated from uncertainties in waste composition and transfer coefficients in residual landfill
- Sulfate [emissions to water, river]: 0.0011079 kg; lognormal SD95 4.7859
  (same comment as for Iodide)
- Tin [emissions to water, groundwater, long-term]: 1.4384e-6 kg; lognormal SD95 84.874
  uncertainty is calculated from uncertainties in waste composition and transfer coefficients in incinerator and landfills.
- Bromine [emissions to water, groundwater, long-term]: 8.0187e-6 kg; lognormal SD95 8.1396
  (same comment as for Tin)
- Aluminium [emissions to water, groundwater, long-term]: 0.040904 kg; lognormal SD95 3.8976
  (same comment as for Tin)
- Arsenic [emissions to water, river]: 2.5905e-5 kg; lognormal SD95 8.4744
  (same comment as for Iodide)
- Phosphate [emissions to water, groundwater, long-term]: 0.0007996 kg; lognormal SD95 8.9315
  (same comment as for Tin)
- Potassium [emissions to water, groundwater, long-term]: 0.011158 kg; lognormal SD95 3.0962
  (same comment as for Tin)
- Lead [emissions to water, groundwater, long-term]: 3.1598e-7 kg; lognormal SD95 281.13
  (same comment as for Tin)
- Fluoride [emissions to water, groundwater, long-term]: 8.7395e-5 kg; lognormal SD95 7.1895
  (same comment as for Tin)
- Cobalt [emissions to water, river]: 9.9328e-9 kg; lognormal SD95 15.973
  (same comment as for Iodide)
- Mercury [emissions to water, river]: 8.4601e-12 kg; lognormal SD95 29.127
  (same comment as for Iodide)
- Phosphate [emissions to water, river]: 1.3349e-6 kg; lognormal SD95 10.832
  (same comment as for Iodide)
- Boron [emissions to water, groundwater, long-term]: 0.00025101 kg; lognormal SD95 6.2357
  (same comment as for Tin)
- Chloride [emissions to water, groundwater, long-term]: 1.735e-5 kg; lognormal SD95 8.5734
  (same comment as for Tin)
- Calcium [emissions to water, river]: 2.44e-6 kg; lognormal SD95 9.0411
  (same comment as for Iodide)
- Strontium [emissions to water, river]: 8.1303e-7 kg; lognormal SD95 10.104
  (same comment as for Iodide)
- Manganese [emissions to water, river]: 5.7742e-9 kg; lognormal SD95 16.793
  (same comment as for Iodide)
- Sodium [emissions to water, groundwater, long-term]: 0.0049603 kg; lognormal SD95 3.5492
  (same comment as for Tin)
- Arsenic [emissions to water, groundwater, long-term]: 2.5905e-14 kg; lognormal SD95 8.663
  (same comment as for Tin)
- Titanium [emissions to water, river]: 3.8167e-6 kg; lognormal SD95 8.4868
  (same comment as for Iodide)
- Scandium [emissions to water, groundwater, long-term]: 4.225e-5 kg; lognormal SD95 7.8221
  (same comment as for Tin)
- Cobalt [emissions to water, groundwater, long-term]: 5.9497e-6 kg; lognormal SD95 15.55
  (same comment as for Tin)
- Calcium [emissions to water, groundwater, long-term]: 0.0014616 kg; lognormal SD95 14.153
  (same comment as for Tin)
- Manganese [emissions to water, groundwater, long-term]: 3.4588e-6 kg; lognormal SD95 165.35
  (same comment as for Tin)
- Tungsten [emissions to water, groundwater, long-term]: 1.2958e-5 kg; lognormal SD95 8.792
  (same comment as for Tin)
- Chromium VI [emissions to water, river]: 9.1649e-6 kg; lognormal SD95 7.9431
  (same comment as for Iodide)
- Selenium [emissions to water, river]: 4.6504e-6 kg; lognormal SD95 9.4477
  (same comment as for Iodide)
- Mercury [emissions to water, groundwater, long-term]: 5.0676e-9 kg; lognormal SD95 59.844
  (same comment as for Tin)
- Selenium [emissions to water, groundwater, long-term]: 8.5363e-6 kg; lognormal SD95 9.2457
  (same comment as for Tin)
- Barium [emissions to water, groundwater, long-term]: 1.195e-5 kg; lognormal SD95 155.1
  (same comment as for Tin)
- Potassium [emissions to water, river]: 0.00438 kg; lognormal SD95 3.307
  (same comment as for Iodide)
- Molybdenum [emissions to water, groundwater, long-term]: 6.0589e-8 kg; lognormal SD95 9.3958
  (same comment as for Tin)
- Cadmium [emissions to water, groundwater, long-term]: 8.6914e-9 kg; lognormal SD95 263.6
  (same comment as for Tin)
- Cadmium [emissions to water, river]: 1.451e-11 kg; lognormal SD95 28.082
  (same comment as for Iodide)
- Barium [emissions to water, river]: 1.995e-8 kg; lognormal SD95 14.931
  (same comment as for Iodide)
- Nickel [emissions to water, river]: 6.1404e-8 kg; lognormal SD95 13.343
  (same comment as for Iodide)
- Sulfate [emissions to water, groundwater, long-term]: 0.0092186 kg; lognormal SD95 4.1107
  (same comment as for Tin)
- Tin [emissions to water, river]: 2.4013e-9 kg; lognormal SD95 18.226
  (same comment as for Iodide)
- Chloride [emissions to water, river]: 6.9499e-6 kg; lognormal SD95 8.8742
  (same comment as for Iodide)
- Boron [emissions to water, river]: 2.0002e-6 kg; lognormal SD95 9.1994
  (same comment as for Iodide)
- Antimony [emissions to water, river]: 1.3772e-6 kg; lognormal SD95 10.852
  (same comment as for Iodide)
- Chromium VI [emissions to water, groundwater, long-term]: 2.8951e-5 kg; lognormal SD95 6.7568
  (same comment as for Tin)
- Thallium [emissions to water, groundwater, long-term]: 2.4503e-6 kg; lognormal SD95 12.329
  (same comment as for Tin)
- Aluminium [emissions to water, river]: 6.8287e-5 kg; lognormal SD95 6.2415
  (same comment as for Iodide)
- Copper [emissions to water, river]: 5.1093e-9 kg; lognormal SD95 16.999
  (same comment as for Iodide)
- Antimony [emissions to water, groundwater, long-term]: 2.528e-6 kg; lognormal SD95 10.634
  (same comment as for Tin)
- Iodide [emissions to water, groundwater, long-term]: 3.0702e-13 kg; lognormal SD95 11.087
  (same comment as for Tin)
- Silicon [emissions to water, river]: 0.00044897 kg; lognormal SD95 4.7941
  (same comment as for Iodide)
- Beryllium [emissions to water, river]: 7.8349e-9 kg; lognormal SD95 16.351
  (same comment as for Iodide)
- Fluoride [emissions to water, river]: 5.0074e-6 kg; lognormal SD95 8.5438
  (same comment as for Iodide)
- Tungsten [emissions to water, river]: 7.0593e-6 kg; lognormal SD95 8.9885
  (same comment as for Iodide)
- Thallium [emissions to water, river]: 4.0907e-9 kg; lognormal SD95 17.376
  (same comment as for Iodide)
- Zinc [emissions to water, groundwater, long-term]: 1.5685e-6 kg; lognormal SD95 122.17
  (same comment as for Tin)
- Nickel [emissions to water, groundwater, long-term]: 3.6781e-5 kg; lognormal SD95 9.0902
  (same comment as for Tin)
- Titanium [emissions to water, groundwater, long-term]: 0.0022862 kg; lognormal SD95 5.7677
  (same comment as for Tin)
- Strontium [emissions to water, groundwater, long-term]: 0.000487 kg; lognormal SD95 6.508
  (same comment as for Tin)
- Copper [emissions to water, groundwater, long-term]: 3.0605e-6 kg; lognormal SD95 45.529
  (same comment as for Tin)
- Silicon [emissions to water, groundwater, long-term]: 0.19918 kg; lognormal SD95 1.6682
  (same comment as for Tin)
- Molybdenum [emissions to water, river]: 1.3137e-5 kg; lognormal SD95 9.1999
  (same comment as for Iodide)
- Beryllium [emissions to water, groundwater, long-term]: 4.6931e-6 kg; lognormal SD95 11.503
  (same comment as for Tin)
- Iron [emissions to water, river]: 4.7898e-7 kg; lognormal SD95 11.183
  (same comment as for Iodide)
- Zinc [emissions to water, river]: 2.6185e-9 kg; lognormal SD95 18.077
  (same comment as for Iodide)
- Sodium [emissions to water, river]: 0.0029797 kg; lognormal SD95 3.6642
  (same comment as for Iodide)
- Vanadium [emissions to water, river]: 4.394e-7 kg; lognormal SD95 10.86
  (same comment as for Iodide)
- Scandium [emissions to water, river]: 6.9424e-6 kg; lognormal SD95 8.5211
  (same comment as for Iodide)
- Magnesium [emissions to water, groundwater, long-term]: 0.0051046 kg; lognormal SD95 10.489
  (same comment as for Tin)
- Magnesium [emissions to water, river]: 8.5218e-6 kg; lognormal SD95 7.9111
  (same comment as for Iodide)
- Bromine [emissions to water, river]: 3.2748e-5 kg; lognormal SD95 8.015
  (same comment as for Iodide)
- Vanadium [emissions to water, groundwater, long-term]: 0.00013761 kg; lognormal SD95 6.6809
  (same comment as for Tin)
- Iron [emissions to water, groundwater, long-term]: 0.00028691 kg; lognormal SD95 212.99
  (same comment as for Tin)
- Lead [emissions to water, river]: 5.2751e-10 kg; lognormal SD95 20.856
  (same comment as for Iodide)

## Sampling procedure
Landfill model based on observed leachate concentrations in literature. Extrapolated to 60'000 years heeding chemical characteristics. Initial waste composition from various literature sources.

## Uncertainty adjustments
uncertainty of waste input composition data derived from generic formula GSD(c) = N*ln(c)+1. Mean long-term emissions are the emissions until the next glacial period occurs (in 60'000a) and the landfill is eroded. Maximal long-term emissions are the complete emissions of all landfilled material (except Cr). Minimal long-term emissions are derived implicitly from the mean and maximal values assuming a lognormal distribution.

## Sources
- Doka G., 2009, 2009 - LCI waste treatment services - Doka, Final report ecoinvent data v2.1, 13, Swiss Centre for LCI, Doka LCA, Duebendorf and St. Gallen, CH
Doka G. (2009) Life Cycle Inventories of Waste Treatment Services. Final report ecoinvent data v2.1. Volume: 13. Swiss Centre for LCI, Empa - TSL. Dübendorf, CH.
Type: Measurement on site
Source: CD-ROM
First author: Doka G.
Year: 2009
Title of anthology: Final report ecoinvent data v2.1
Place of publication: Dübendorf, CH
Publisher: Swiss Centre for LCI, Empa - TSL
Volume No: 13

## Validation
Proof reading validation: passed.; Other validation: none;
