# Disposal, polyvinylchloride, 0.2% water, to sanitary landfill

Dataset: EcoSpold 1, unit process
Functional unit: 1 kg
Category: landfill / sanitary landfill
Geography: CH
Time period: 2000-01 to 2000-12
Generated by: Gabor Doka
accessRestrictedTo: 0
copyright: true

## General comment
Inventoried waste contains 100% PVC; . waste composition (wet, in ppm): upper heating value 21.67 MJ/kg; lower heating value 21.51 MJ/kg; H2O 2000; O 16911; H 54921; C 440610; S 1057; N 1057; P n.a.; B n.a.; Cl 475290; Br 73.839; F 15.506; I n.a.; Ag n.a.; As 2.0042; Ba 196.73; Cd 2.7546; Co 33.322; Cr 43.106; Cu 28.223; Hg 0.89569; Mn 84.301; Mo n.a.; Ni 21.729; Pb 16.002; Sb 45.323; Se 2.2152; Sn 391.41; V 303.95; Zn 59.775; Be 0.52742; Sc n.a.; Sr 93.353; Ti 1054.8; Tl 0.42194; W n.a.; Si n.a.; Fe 3930; Ca n.a.; Al 210.97; K n.a.; Mg n.a.; Na 1545.9; Share of carbon in waste that is biogenic 0%. Overall degradability of waste during 100 years: 1%. CAS number: 009002-86-2; Formula: (CH2-CHCl)n;;

## Included processes
Waste-specific short-term emissions to air via landfill gas incineration and landfill leachate. Burdens from treatment of short-term leachate (0-100a) in wastewater treatment plant (including WWTP sludge disposal in municipal incinerator). Long-term emissions from landfill to groundwater (after base lining failure).

## Geography
Technology encountered in Switzerland in 2000. Landfill includes base seal, leachate collection system, treatment of leachate in municipal wastewater treatment plant.

## Technology
Swiss municipal sanitary landfill for biogenic or untreated municipal waste ("reactive organic landfill"). Landfill gas and leachate collection system. Recultivation and monitoring for 150 years after closure.

## Reference product
- Disposal, polyvinylchloride, 0.2% water, to sanitary landfill [CH]: 1 kg
  SWITZERLAND

## Inputs from technosphere
- Natural gas, burned in industrial furnace 1MW [CH]: 3.62e-6 MJ; lognormal SD95 5.45
  burden from incineration of sludge from wastewater treatment of the short-term leachate (0-100a). uncertainty is calculated from uncertainties in waste composition and transfer coefficients in incinerator and uncertainty of waste decomposition and short-term leaching in sanitary landfill
- Process-specific burdens, sanitary landfill [CH]: 1 kg; lognormal SD95 1
  demands per kilogram waste. uncertainty is heeded in the module
- Process-specific burdens, residual material landfill [CH]: 6.12e-7 kg; lognormal SD95 3.83
  (same comment as for Natural gas, burned in industrial furnace 1MW)
- Disposal, plastics, mixture, 15.3% water, to municipal incineration [CH]: 3.88e-5 kg; lognormal SD95 1.13
  burden from wastewater treatment of the short-term leachate (0-100a). Uncertainty calculated from unertainty of the waste composition of this waste, uncertainty in waste decomposition and short-term leaching in sanitary landfill
- Quicklime, milled, packed, at plant [CH]: 3.35e-10 kg; lognormal SD95 4.93
  (same comment as for Natural gas, burned in industrial furnace 1MW)
- Iron (III) chloride, 40% in H2O, at plant [CH]: 9.79e-9 kg; lognormal SD95 4.48
  (same comment as for Natural gas, burned in industrial furnace 1MW)
- Process-specific burdens, municipal waste incineration [CH]: 8.26e-5 kg; lognormal SD95 5
  burden from incineration of sludge from wastewater treatment of the short-term leachate (0-100a).
- Hydrochloric acid, 30% in H2O, at plant [RER]: 3.81e-11 kg; lognormal SD95 3.93
  (same comment as for Natural gas, burned in industrial furnace 1MW)
- Residual material landfill facility [CH]: 1.28e-15 p; lognormal SD95 3.83
  (same comment as for Natural gas, burned in industrial furnace 1MW)
- Transport, freight, lorry, 16t-32t gross weight, fleet average [CH]: 2.87e-6 tkm; lognormal SD95 3.64
  (same comment as for Natural gas, burned in industrial furnace 1MW)
- Cement, unspecified, at plant [CH]: 2.45e-7 kg; lognormal SD95 3.86
  (same comment as for Natural gas, burned in industrial furnace 1MW)
- Chemicals organic, at plant [GLO]: 8.72e-9 kg; lognormal SD95 14.4
  (same comment as for Natural gas, burned in industrial furnace 1MW)
- Slag compartment [CH]: 7.28e-15 p; lognormal SD95 4.42
  (same comment as for Natural gas, burned in industrial furnace 1MW)
- Sodium hydroxide, 50% in H2O, production mix, at plant [RER]: 1.85e-9 kg; lognormal SD95 4.92
  (same comment as for Natural gas, burned in industrial furnace 1MW)
- Process-specific burdens, slag compartment [CH]: 4.1e-6 kg; lognormal SD95 4.42
  (same comment as for Natural gas, burned in industrial furnace 1MW)
- Electricity from waste, at municipal waste incineration plant [CH]: 1.19e-5 kWh; lognormal SD95 7.61
  (same comment as for Natural gas, burned in industrial furnace 1MW)
- Disposal, cement, hydrated, 0% water, to residual material landfill [CH]: 6.12e-7 kg; lognormal SD95 3.86
  (same comment as for Natural gas, burned in industrial furnace 1MW)
- Light fuel oil, burned in boiler 100kW, non-modulating [CH]: 3.82e-5 MJ; lognormal SD95 1.5
  (same comment as for Disposal, plastics, mixture, 15.3% water, to municipal incineration)
- Electricity, low voltage, at grid [CH]: 0.000272 kWh; lognormal SD95 3.2
  (same comment as for Disposal, plastics, mixture, 15.3% water, to municipal incineration)
- Wastewater treatment plant, class 3 [CH]: 1.42e-11 p; lognormal SD95 1.1
  (same comment as for Disposal, plastics, mixture, 15.3% water, to municipal incineration)
- Sewer grid, class 3 [CH]: 5.45e-10 km; lognormal SD95 1.1
  (same comment as for Disposal, plastics, mixture, 15.3% water, to municipal incineration)
- Natural gas, burned in boiler modulating >100kW [RER]: 5.16e-5 MJ; lognormal SD95 1.5
  (same comment as for Disposal, plastics, mixture, 15.3% water, to municipal incineration)
- Municipal waste incineration plant [CH]: 2.06e-14 p; lognormal SD95 5
  (same comment as for Process-specific burdens, municipal waste incineration)
- Sanitary landfill facility [CH]: 5.56e-10 p; lognormal SD95 1
  demands per kilogram waste. uncertainty is heeded in the module
- Titanium dioxide, production mix, at plant [RER]: 1.06e-9 kg; lognormal SD95 7.23
  (same comment as for Natural gas, burned in industrial furnace 1MW)
- Ammonia, liquid, at regional storehouse [CH]: 3.71e-8 kg; lognormal SD95 5.45
  (same comment as for Natural gas, burned in industrial furnace 1MW)
- Heat from waste, at municipal waste incineration plant [CH]: 6.92e-5 MJ; lognormal SD95 5
  (same comment as for Natural gas, burned in industrial furnace 1MW)
- Transport, freight, rail [RER]: 1.67e-7 tkm; lognormal SD95 4.31
  (same comment as for Natural gas, burned in industrial furnace 1MW)
- Chemicals inorganic, at plant [GLO]: 6.35e-11 kg; lognormal SD95 3.93
  (same comment as for Natural gas, burned in industrial furnace 1MW)
- Disposal, paper, 11.2% water, to municipal incineration [CH]: 3.88e-5 kg; lognormal SD95 1.13
  (same comment as for Disposal, plastics, mixture, 15.3% water, to municipal incineration)
- Chromium oxide, flakes, at plant [RER]: 2.17e-11 kg; lognormal SD95 7.23
  burden from incineration of sludge from wastewater treatment of the short-term leachate (0-100a). Proxy for vanadium pentoxide V2O5 in SCR catalyst, uncertainty calculated from uncertainty in average DeNOx input, uncertainty in the share of thermal NOx, uncertainty of nitrogen content in average municipal waste and the unertainty in nitrogen content in *this* waste and uncertainty of waste decomposition and short-term leaching in sanitary landfill

## Emissions to nature
- Chromium [emissions to water, river]: 7.71e-12 kg; lognormal SD95 17.5
  Emissions from short-term leachate treatment and incineration of resulting sludge. Uncertainty calculated depending on waste input and uncertainty of transfer coefficents in landfill, wastewater treatment and incineration model.
- Beryllium [emissions to air, low. pop.]: 7.67e-14 kg; lognormal SD95 41.2
  burden from direct release or incineration of landfill biogas. Uncertainty calculated from unertainty of the waste composition of this waste, uncertainty in waste decomposition and short-term leaching in sanitary landfill
- Chromium VI [emissions to water, river]: 2.57e-9 kg; lognormal SD95 17.1
  (same comment as for Chromium)
- Cadmium [emissions to air, low. pop.]: 3.23e-11 kg; lognormal SD95 26.4
  (same comment as for Beryllium)
- Aluminium [emissions to water, river]: 6.33e-9 kg; lognormal SD95 12.7
  (same comment as for Chromium)
- Manganese [emissions to air, high. pop.]: 2.59e-15 kg; lognormal SD95 11.3
  (same comment as for Chromium)
- Nitrate [emissions to water, river]: 4.66e-5 kg; lognormal SD95 4.65
  (same comment as for Chromium)
- Selenium [emissions to water, river]: 1.56e-9 kg; lognormal SD95 18.3
  (same comment as for Chromium)
- Cadmium [emissions to water, river]: 2.46e-9 kg; lognormal SD95 17.1
  (same comment as for Chromium)
- Strontium [emissions to water, groundwater, long-term]: 9.33e-5 kg; lognormal SD95 7.17
  Emissions from long-term leachate (>100a) directly from MSW landfill and indirectly via incineration of treatement sludge from leachate treatement. Uncertainty calculated depending on waste input and uncertainty of long-term transfer coefficents in landfill.
- Carbon dioxide, fossil [emissions to air, low. pop.]: 0.011 kg; lognormal SD95 3.49
  (same comment as for Beryllium)
- Thallium [emissions to water, groundwater, long-term]: 4.22e-7 kg; lognormal SD95 13.4
  (same comment as for Strontium)
- Cadmium [emissions to water, groundwater, long-term]: 2.75e-6 kg; lognormal SD95 11
  (same comment as for Strontium)
- Hydrogen sulfide [emissions to water, groundwater, long-term]: 7.67e-5 kg; lognormal SD95 5.02
  (same comment as for Strontium)
- Cadmium [emissions to air, high. pop.]: 1.33e-13 kg; lognormal SD95 17.8
  (same comment as for Chromium)
- Heat, waste [emissions to water, river]: 0.00235 MJ; lognormal SD95 6.22
  (same comment as for Natural gas, burned in industrial furnace 1MW)
- Bromine [emissions to air, low. pop.]: 2.61e-8 kg; lognormal SD95 14.5
  (same comment as for Beryllium)
- Arsenic [emissions to air, high. pop.]: 1.01e-12 kg; lognormal SD95 18.1
  (same comment as for Chromium)
- Thallium [emissions to air, low. pop.]: 6.13e-14 kg; lognormal SD95 41.9
  (same comment as for Beryllium)
- Aluminium [emissions to water, groundwater, long-term]: 0.000211 kg; lognormal SD95 6.4
  (same comment as for Strontium)
- Strontium [emissions to air, low. pop.]: 1.36e-11 kg; lognormal SD95 28
  (same comment as for Beryllium)
- Nickel [emissions to air, low. pop.]: 3.16e-12 kg; lognormal SD95 31.4
  (same comment as for Beryllium)
- Carbon monoxide, fossil [emissions to air, low. pop.]: 6.25e-7 kg; lognormal SD95 7.67
  (same comment as for Beryllium)
- Thallium [emissions to air, high. pop.]: 1.21e-13 kg; lognormal SD95 22.8
  (same comment as for Chromium)
- Copper [emissions to water, river]: 3.59e-10 kg; lognormal SD95 19.2
  (same comment as for Chromium)
- Beryllium [emissions to water, river]: 1.56e-10 kg; lognormal SD95 21.8
  (same comment as for Chromium)
- Ammonia [emissions to air, high. pop.]: 2.36e-8 kg; lognormal SD95 4.91
  (same comment as for Chromium)
- Hydrogen fluoride [emissions to air, low. pop.]: 6.18e-8 kg; lognormal SD95 13.5
  (same comment as for Beryllium)
- Copper [emissions to water, groundwater, long-term]: 2.82e-5 kg; lognormal SD95 8.38
  (same comment as for Strontium)
- Lead [emissions to water, groundwater, long-term]: 1.6e-5 kg; lognormal SD95 8.99
  (same comment as for Strontium)
- COD, Chemical Oxygen Demand [emissions to water, groundwater, long-term]: 0.122 kg; lognormal SD95 4.04
  (same comment as for Strontium)
- Selenium [emissions to air, high. pop.]: 5e-18 kg; lognormal SD95 20.1
  (same comment as for Chromium)
- Sodium [emissions to air, low. pop.]: 1.6e-8 kg; lognormal SD95 15.3
  (same comment as for Beryllium)
- Chromium [emissions to air, low. pop.]: 1.23e-12 kg; lognormal SD95 33.5
  (same comment as for Beryllium)
- COD, Chemical Oxygen Demand [emissions to water, river]: 8.09e-5 kg; lognormal SD95 6.23
  (same comment as for Chromium)
- Cobalt [emissions to air, high. pop.]: 1.67e-15 kg; lognormal SD95 13.9
  (same comment as for Chromium)
- Heat, waste [emissions to soil, industrial]: 0.119 MJ; lognormal SD95 3.13
  burden from short-term decomposition of waste (0-100a). Uncertainty calculated from unertainty of the waste composition of this waste, uncertainty in waste decomposition and short-term leaching in sanitary landfill
- Tin [emissions to air, low. pop.]: 5.77e-12 kg; lognormal SD95 29.6
  (same comment as for Beryllium)
- NMVOC, non-methane volatile organic compounds, unspecified origin [emissions to air, high. pop.]: 3.28e-9 kg; lognormal SD95 7.42
  (same comment as for Chromium)
- Zinc [emissions to air, low. pop.]: 6.29e-12 kg; lognormal SD95 29.7
  (same comment as for Beryllium)
- DOC, Dissolved Organic Carbon [emissions to water, river]: 1.97e-5 kg; lognormal SD95 6.24
  (same comment as for Chromium)
- Chloride [emissions to water, river]: 0.012 kg; lognormal SD95 2.85
  Emissions from short-term leachate treatment. Uncertainty calculated depending on waste input and uncertainty of transfer coefficents in landfill and wastewater treatment.
- Thallium [emissions to water, river]: 1.25e-10 kg; lognormal SD95 22.3
  (same comment as for Chromium)
- Aluminium [emissions to air, high. pop.]: 1.55e-10 kg; lognormal SD95 13
  (same comment as for Chromium)
- Heat, waste [emissions to water, groundwater, long-term]: 21.5 MJ; lognormal SD95 1.42
  burden from long-term decomposition of waste (>100a). Uncertainty calculated from unertainty of the waste composition of this waste, uncertainty in waste decomposition and short-term leaching in sanitary landfill
- Zinc [emissions to water, river]: 8.76e-9 kg; lognormal SD95 14.4
  (same comment as for Chromium)
- Cyanide [emissions to air, high. pop.]: 6.62e-10 kg; lognormal SD95 5.57
  (same comment as for Chromium)
- Antimony [emissions to air, low. pop.]: 1.19e-11 kg; lognormal SD95 28.4
  (same comment as for Beryllium)
- Nitrogen oxides [emissions to air, high. pop.]: 2.3e-7 kg; lognormal SD95 4.82
  (same comment as for Chromium)
- Chromium [emissions to air, high. pop.]: 1.79e-16 kg; lognormal SD95 18.5
  (same comment as for Chromium)
- Arsenic [emissions to water, groundwater, long-term]: 2e-6 kg; lognormal SD95 11.4
  (same comment as for Strontium)
- Methane, fossil [emissions to air, high. pop.]: 7.21e-7 kg; lognormal SD95 6.58
  (same comment as for Chromium)
- Fluoride [emissions to water, river]: 1.14e-8 kg; lognormal SD95 15.8
  (same comment as for Chloride)
- Titanium [emissions to water, groundwater, long-term]: 0.00105 kg; lognormal SD95 5.02
  (same comment as for Strontium)
- Barium [emissions to air, low. pop.]: 5.63e-10 kg; lognormal SD95 20.7
  (same comment as for Beryllium)
- Copper [emissions to air, low. pop.]: 3.95e-13 kg; lognormal SD95 36.3
  (same comment as for Beryllium)
- BOD5, Biological Oxygen Demand [emissions to water, river]: 2.55e-5 kg; lognormal SD95 6.25
  (same comment as for Chromium)
- BOD5, Biological Oxygen Demand [emissions to water, groundwater, long-term]: 0.029 kg; lognormal SD95 4.04
  (same comment as for Strontium)
- Titanium [emissions to water, river]: 2.68e-7 kg; lognormal SD95 10.6
  (same comment as for Chromium)
- Mercury [emissions to water, groundwater, long-term]: 8.95e-7 kg; lognormal SD95 12.4
  (same comment as for Strontium)
- Sulfur dioxide [emissions to air, low. pop.]: 1.38e-6 kg; lognormal SD95 10.3
  (same comment as for Beryllium)
- Tin [emissions to air, high. pop.]: 1.78e-11 kg; lognormal SD95 15.1
  (same comment as for Chromium)
- Nickel [emissions to air, high. pop.]: 2.15e-16 kg; lognormal SD95 17
  (same comment as for Chromium)
- Beryllium [emissions to water, groundwater, long-term]: 5.27e-7 kg; lognormal SD95 13.1
  (same comment as for Strontium)
- Nitrite [emissions to water, river]: 2.69e-7 kg; lognormal SD95 6.79
  (same comment as for Chromium)
- Manganese [emissions to air, low. pop.]: 2.41e-10 kg; lognormal SD95 22.3
  (same comment as for Beryllium)
- Fluoride [emissions to water, groundwater, long-term]: 1.54e-5 kg; lognormal SD95 9.02
  (same comment as for Strontium)
- Strontium [emissions to water, river]: 2.76e-8 kg; lognormal SD95 13.5
  (same comment as for Chromium)
- Zinc [emissions to air, high. pop.]: 3.2e-13 kg; lognormal SD95 15.2
  (same comment as for Chromium)
- Iron [emissions to water, groundwater, long-term]: 0.000275 kg; lognormal SD95 20.1
  (same comment as for Strontium)
- Cobalt [emissions to air, low. pop.]: 2.68e-11 kg; lognormal SD95 26.7
  (same comment as for Beryllium)
- Carbon monoxide, fossil [emissions to air, high. pop.]: 2.38e-7 kg; lognormal SD95 6.6
  (same comment as for Chromium)
- Barium [emissions to air, high. pop.]: 2.12e-9 kg; lognormal SD95 9.45
  (same comment as for Chromium)
- Arsenic [emissions to air, low. pop.]: 5.05e-11 kg; lognormal SD95 25.4
  (same comment as for Beryllium)
- Ammonium, ion [emissions to water, groundwater, long-term]: 0.00042 kg; lognormal SD95 5.02
  (same comment as for Strontium)
- Nitrogen oxides [emissions to air, low. pop.]: 6.81e-9 kg; lognormal SD95 9.66
  (same comment as for Beryllium)
- Vanadium [emissions to water, groundwater, long-term]: 8.85e-5 kg; lognormal SD95 8.9
  (same comment as for Strontium)
- Methane, fossil [emissions to air, low. pop.]: 0.00169 kg; lognormal SD95 3.72
  (same comment as for Beryllium)
- Barium [emissions to water, river]: 1.35e-7 kg; lognormal SD95 9.32
  (same comment as for Chromium)
- Antimony [emissions to water, river]: 3.24e-8 kg; lognormal SD95 13.8
  (same comment as for Chromium)
- Ammonium, ion [emissions to water, river]: 1.28e-5 kg; lognormal SD95 5.08
  (same comment as for Chromium)
- Tin [emissions to water, river]: 9.65e-9 kg; lognormal SD95 14.7
  (same comment as for Chromium)
- Nitrogen [emissions to water, river]: 3.47e-7 kg; lognormal SD95 4.72
  (same comment as for Chromium)
- Nitrate [emissions to water, groundwater, long-term]: 4.42e-5 kg; lognormal SD95 5.01
  (same comment as for Strontium)
- Manganese [emissions to water, river]: 4.9e-7 kg; lognormal SD95 10.1
  (same comment as for Chromium)
- Sodium [emissions to water, groundwater, long-term]: 0.00148 kg; lognormal SD95 4.71
  (same comment as for Strontium)
- Nickel [emissions to water, groundwater, long-term]: 2.17e-5 kg; lognormal SD95 8.66
  (same comment as for Strontium)
- Vanadium [emissions to air, low. pop.]: 8.01e-11 kg; lognormal SD95 24.3
  (same comment as for Beryllium)
- Particulates, < 2.5 um [emissions to air, low. pop.]: 2.1e-7 kg; lognormal SD95 5.28
  (same comment as for Beryllium)
- Arsenic [emissions to water, river]: 3.17e-9 kg; lognormal SD95 17.6
  (same comment as for Chromium)
- Cobalt [emissions to water, river]: 5.44e-8 kg; lognormal SD95 12.7
  (same comment as for Chromium)
- Cobalt [emissions to water, groundwater, long-term]: 3.33e-5 kg; lognormal SD95 8.19
  (same comment as for Strontium)
- Sulfate [emissions to water, groundwater, long-term]: 0.00294 kg; lognormal SD95 5.02
  (same comment as for Strontium)
- DOC, Dissolved Organic Carbon [emissions to water, groundwater, long-term]: 0.112 kg; lognormal SD95 4.04
  (same comment as for Strontium)
- Sulfate [emissions to water, river]: 1.2e-5 kg; lognormal SD95 8.43
  (same comment as for Chloride)
- Selenium [emissions to air, low. pop.]: 5.84e-13 kg; lognormal SD95 35.7
  (same comment as for Beryllium)
- Bromine [emissions to water, river]: 1.86e-6 kg; lognormal SD95 9.45
  (same comment as for Chloride)
- Beryllium [emissions to air, high. pop.]: 1.51e-13 kg; lognormal SD95 22.4
  (same comment as for Chromium)
- Antimony [emissions to water, groundwater, long-term]: 4.56e-6 kg; lognormal SD95 22
  (same comment as for Strontium)
- Carbon dioxide, fossil [emissions to air, high. pop.]: 0.000368 kg; lognormal SD95 6.23
  (same comment as for Chromium)
- NMVOC, non-methane volatile organic compounds, unspecified origin [emissions to air, low. pop.]: 1.18e-8 kg; lognormal SD95 3.72
  (same comment as for Beryllium)
- Copper [emissions to air, high. pop.]: 7.56e-15 kg; lognormal SD95 20.1
  (same comment as for Chromium)
- Hydrogen chloride [emissions to air, low. pop.]: 0.000173 kg; lognormal SD95 6.02
  (same comment as for Beryllium)
- Heat, waste [emissions to air, high. pop.]: 0.00181 MJ; lognormal SD95 4.09
  (same comment as for Natural gas, burned in industrial furnace 1MW)
- Chloride [emissions to water, groundwater, long-term]: 0.463 kg; lognormal SD95 1.29
  (same comment as for Strontium)
- Mercury [emissions to water, river]: 1.94e-10 kg; lognormal SD95 20.6
  (same comment as for Chromium)
- Selenium [emissions to water, groundwater, long-term]: 6.25e-7 kg; lognormal SD95 15.4
  (same comment as for Strontium)
- Nitrogen, organic bound [emissions to water, groundwater, long-term]: 0.000687 kg; lognormal SD95 5.02
  (same comment as for Strontium)
- Titanium [emissions to air, low. pop.]: 1.32e-10 kg; lognormal SD95 23.3
  (same comment as for Beryllium)
- Heat, waste [emissions to air, low. pop.]: 0.06 MJ; lognormal SD95 4.17
  (same comment as for Beryllium)
- Mercury [emissions to air, high. pop.]: 1.04e-15 kg; lognormal SD95 21.3
  (same comment as for Chromium)
- Mercury [emissions to air, low. pop.]: 2.45e-10 kg; lognormal SD95 22.2
  (same comment as for Beryllium)
- Iron [emissions to air, low. pop.]: 1.35e-10 kg; lognormal SD95 23.2
  (same comment as for Beryllium)
- Manganese [emissions to water, groundwater, long-term]: 8.19e-5 kg; lognormal SD95 7.22
  (same comment as for Strontium)
- Tin [emissions to water, groundwater, long-term]: 0.000391 kg; lognormal SD95 5.85
  (same comment as for Strontium)
- Lead [emissions to air, high. pop.]: 3.12e-14 kg; lognormal SD95 20.7
  (same comment as for Chromium)
- Aluminium [emissions to air, low. pop.]: 2.64e-11 kg; lognormal SD95 26.5
  (same comment as for Beryllium)
- Nickel [emissions to water, river]: 7.66e-9 kg; lognormal SD95 15.6
  (same comment as for Chromium)
- Barium [emissions to water, groundwater, long-term]: 0.000196 kg; lognormal SD95 6.38
  (same comment as for Strontium)
- Sodium [emissions to water, river]: 6.4e-5 kg; lognormal SD95 6.03
  (same comment as for Chloride)
- Iron [emissions to water, river]: 2.74e-7 kg; lognormal SD95 10.6
  (same comment as for Chromium)
- Iron [emissions to air, high. pop.]: 8.88e-12 kg; lognormal SD95 11.2
  (same comment as for Chromium)
- Antimony [emissions to air, high. pop.]: 2.35e-12 kg; lognormal SD95 21.6
  (same comment as for Chromium)
- Titanium [emissions to air, high. pop.]: 2.6e-10 kg; lognormal SD95 11
  (same comment as for Chromium)
- Nitrite [emissions to water, groundwater, long-term]: 2.29e-5 kg; lognormal SD95 5.02
  (same comment as for Strontium)
- Strontium [emissions to air, high. pop.]: 2.67e-12 kg; lognormal SD95 14.1
  (same comment as for Chromium)
- Vanadium [emissions to air, high. pop.]: 1.58e-11 kg; lognormal SD95 11.7
  (same comment as for Chromium)
- Vanadium [emissions to water, river]: 1.63e-7 kg; lognormal SD95 11.2
  (same comment as for Chromium)
- Lead [emissions to water, river]: 1.04e-10 kg; lognormal SD95 19.9
  (same comment as for Chromium)
- Zinc [emissions to water, groundwater, long-term]: 4.94e-5 kg; lognormal SD95 7.68
  (same comment as for Strontium)
- Dinitrogen monoxide [emissions to air, high. pop.]: 6.5e-8 kg; lognormal SD95 4.49
  (same comment as for Chromium)
- TOC, Total Organic Carbon [emissions to water, groundwater, long-term]: 0.112 kg; lognormal SD95 4.04
  (same comment as for Strontium)
- Lead [emissions to air, low. pop.]: 3.14e-13 kg; lognormal SD95 37
  (same comment as for Beryllium)
- TOC, Total Organic Carbon [emissions to water, river]: 2.05e-5 kg; lognormal SD95 6.23
  (same comment as for Chromium)
- Chromium VI [emissions to water, groundwater, long-term]: 1.95e-7 kg; lognormal SD95 324
  (same comment as for Strontium)
- Bromine [emissions to water, groundwater, long-term]: 7.2e-5 kg; lognormal SD95 7.41
  (same comment as for Strontium)

## Sampling procedure
Landfill model based on observed leachate concentrations in literature. Extrapolated to 60'000 years heeding chemical characteristics. Initial waste composition from various literature sources.

## Uncertainty adjustments
uncertainty of waste input composition data derived from generic formula GSD(c) = N*ln(c)+1. Minimal long-term emissions are the emissions until the carbonate buffer in the landfill is used up. Mean long-term emissions are the emissions until the next glacial period occurs (in 60'000a) and the landfill is eroded. Maximal long-term emissions are the complete emissions of all landfilled material (except Cr).

## Sources
- Doka G., 2009, 2009 - LCI waste treatment services - Doka, Final report ecoinvent data v2.0, 13, Swiss Centre for LCI, Doka LCA, Duebendorf and St. Gallen, CH
Doka G. (2007) Life Cycle Inventories of Waste Treatment Services. Final report ecoinvent data v2.0. Volume: 13. Swiss Centre for LCI, Empa - TSL. Dübendorf, CH.
Type: Separate publication
Source: CD-ROM
First author: Doka G.
Year: 2007
Title of anthology: Final report ecoinvent data v2.0
Place of publication: Dübendorf, CH
Publisher: Swiss Centre for LCI, Empa - TSL
Volume No: 13

## Validation
Proof reading validation: Passed. Calculation for standard deviation 95 of, i.e., infrastructure, ; Other validation: none;
