# Peat, burned in power plant

Dataset: EcoSpold 1, unit process
Functional unit: 1 MJ
Category: electricity by fuel / peat\power plant
Geography: NORDEL
Time period: 2000-01 to 2000-12
Generated by: Christian Bauer
accessRestrictedTo: 0
copyright: true

## General comment
Due to lack of specific information, the emission data were assumed to be same as for German average lignite plants, whose fuel has a similar heating value. The following information refers to this German lignite plant. The module describes the average for the country. The plant is used for middle load with 6000 hours of operation at full capacity per year. The plant is assumed to operate 200000 hours during its lifetime. For the assessment of main characteristics (LHV, sulphur and ash content of coal, efficiency of the plant) and criteria emissions (SOx, NOx, particles, and CO2) a bottom-up approach has been used. It consists on the collection of information about single plants. Base data on all major UCTE power plants in 1993 have been integrated, to the extent possible, with updated information for year 2000. The size distribution of particles has been derived from German data. Halogene emissions have been estimated on the basis of the content of the species in the country-specific coal input mix, assuming average retention rates. For CO and VOC-emissions average values for UCTE are included. Two average values for N2O emissions from UCTE plants are considered for the two cases with or without DeNOx;

## Included processes
Energy conversion for electricity production. Particle removal is included in this module. No information about DeSOx and DeNOx installation is available. It is assumed that 25 % of the plants are river cooled, 75 % use cooling tower (average UCTE). The water treatment is described in separate modules. The disposal of non-recycled ashes is modelled separately.

## Geography
Country-specific data.

## Technology
Average installed technology.

## Reference product
- Peat, burned in power plant [NORDEL]: 1 MJ
  Nordic countries power association

## Inputs from technosphere
- Lignite power plant [RER]: 9.72e-13 p; lognormal SD95 3.5
  own estimation
- Peat, at mine [NORDEL]: 0.114 kg; lognormal SD95 1.07
  (2,1,1,1,1,1); see power plant data base for details
- Chlorine, liquid, production mix, at plant [RER]: 1e-5 kg; lognormal SD95 2.5
  own estimation
- Water, completely softened, at plant [RER]: 0.006 kg; lognormal SD95 2
  own estimation
- Transport, freight, rail [RER]: 7.5e-6 tkm; lognormal SD95 2.1
  (4,2,2,3,1,5); average distance is guesstimate
- Water, decarbonised, at plant [RER]: 0.15 kg; lognormal SD95 2
  own estimation
- Disposal, lignite ash, 0% water, to opencast refill [DE]: 0.00705 kg; lognormal SD95 1.5
  (5,1,1,1,1,1); calculated from mass balance

## Inputs from nature
- Water, cooling, unspecified natural origin/m3 [resources, in water]: 0.0035 m3; lognormal SD95 2
  own estimation

## Emissions to nature
- Propane [emissions to air, low. pop.]: 3.5e-8 kg; lognormal SD95 3
  own estimation
- Potassium-40 [emissions to air, low. pop.]: 8.12e-7 kBq; lognormal SD95 5
  own estimation
- Toluene [emissions to air, low. pop.]: 1.09e-7 kg; lognormal SD95 3
  own estimation
- Copper [emissions to air, low. pop.]: 2.01e-10 kg; lognormal SD95 7
  own estimation
- Selenium [emissions to air, low. pop.]: 2.98e-9 kg; lognormal SD95 7
  own estimation
- Ethane [emissions to air, low. pop.]: 4.1e-8 kg; lognormal SD95 3
  own estimation
- Hydrocarbons, aliphatic, unsaturated [emissions to air, low. pop.]: 2.16e-7 kg; lognormal SD95 3
  own estimation
- Thorium-232 [emissions to air, low. pop.]: 2.67e-7 kBq; lognormal SD95 5
  own estimation
- Arsenic [emissions to air, low. pop.]: 7.38e-10 kg; lognormal SD95 7
  own estimation
- Butane [emissions to air, low. pop.]: 1.9e-8 kg; lognormal SD95 3
  own estimation
- Vanadium [emissions to air, low. pop.]: 1.09e-10 kg; lognormal SD95 7
  own estimation
- Polonium-210 [emissions to air, low. pop.]: 2.29e-6 kBq; lognormal SD95 5
  own estimation
- Lead-210 [emissions to air, low. pop.]: 1.25e-6 kBq; lognormal SD95 5
  own estimation
- Cobalt [emissions to air, low. pop.]: 8.73e-11 kg; lognormal SD95 7
  own estimation
- Lead [emissions to air, low. pop.]: 5.24e-10 kg; lognormal SD95 7
  own estimation
- Dinitrogen monoxide [emissions to air, low. pop.]: 2.59e-6 kg; lognormal SD95 3
  own estimation
- Thorium-228 [emissions to air, low. pop.]: 1.7e-7 kBq; lognormal SD95 5
  own estimation
- Benzo(a)pyrene [emissions to air, low. pop.]: 2e-13 kg; lognormal SD95 3
  own estimation
- Particulates, < 2.5 um [emissions to air, low. pop.]: 1.78e-5 kg; lognormal SD95 3.27
  (5,1,1,1,1,5); see power plant data base for details
- Chromium [emissions to air, low. pop.]: 1.94e-10 kg; lognormal SD95 7
  own estimation
- Radon-220 [emissions to air, low. pop.]: 0.000138 kBq; lognormal SD95 5
  own estimation
- Particulates, > 2.5 um, and < 10um [emissions to air, low. pop.]: 2.22e-6 kg; lognormal SD95 2.28
  (5,1,1,1,1,5); see power plant data base for details
- Mercury [emissions to air, low. pop.]: 2.3e-9 kg; lognormal SD95 7
  own estimation
- Heat, waste [emissions to air, low. pop.]: 0.672 MJ; lognormal SD95 1.5
  own estimation
- Heat, waste [emissions to water, river]: 0.173 MJ; lognormal SD95 1.5
  own estimation
- Propene [emissions to air, low. pop.]: 1.6e-8 kg; lognormal SD95 3
  own estimation
- Uranium-238 [emissions to air, low. pop.]: 2.7e-7 kBq; lognormal SD95 5
  own estimation
- Molybdenum [emissions to air, low. pop.]: 8.73e-11 kg; lognormal SD95 7
  own estimation
- Xylene [emissions to air, low. pop.]: 9.22e-7 kg; lognormal SD95 3
  own estimation
- Nitrogen oxides [emissions to air, low. pop.]: 0.000118 kg; lognormal SD95 1.52
  (3,1,1,1,1,1); see power plant data base for details
- Radon-222 [emissions to air, low. pop.]: 0.000245 kBq; lognormal SD95 5
  own estimation
- Pentane [emissions to air, low. pop.]: 1.47e-7 kg; lognormal SD95 3
  own estimation
- Particulates, > 10 um [emissions to air, low. pop.]: 2.22e-6 kg; lognormal SD95 1.83
  (5,1,1,1,1,5); see power plant data base for details
- Strontium [emissions to air, low. pop.]: 4.58e-10 kg; lognormal SD95 7
  own estimation
- Iodine [emissions to air, low. pop.]: 2.59e-8 kg; lognormal SD95 4
  own estimation
- Carbon monoxide, fossil [emissions to air, low. pop.]: 2e-5 kg; lognormal SD95 7
  own estimation
- Antimony [emissions to air, low. pop.]: 1.31e-11 kg; lognormal SD95 7
  own estimation
- Barium [emissions to air, low. pop.]: 4.36e-9 kg; lognormal SD95 7
  own estimation
- Benzene [emissions to air, low. pop.]: 2.17e-7 kg; lognormal SD95 3
  own estimation
- Sulfur dioxide [emissions to air, low. pop.]: 0.000198 kg; lognormal SD95 1.11
  (3,1,1,1,1,1); see power plant data base for details
- Dioxin, 2,3,7,8 Tetrachlorodibenzo-p- [emissions to air, low. pop.]: 7e-15 kg; lognormal SD95 5
  own estimation
- Nickel [emissions to air, low. pop.]: 4.32e-10 kg; lognormal SD95 7
  own estimation
- Cadmium [emissions to air, low. pop.]: 1.53e-11 kg; lognormal SD95 7
  own estimation
- Bromine [emissions to air, low. pop.]: 2.76e-8 kg; lognormal SD95 3
  own estimation
- Formaldehyde [emissions to air, low. pop.]: 5.8e-8 kg; lognormal SD95 3
  own estimation
- Chromium VI [emissions to air, low. pop.]: 2.4e-11 kg; lognormal SD95 4
  based on range of data
- Zinc [emissions to air, low. pop.]: 7.64e-10 kg; lognormal SD95 7
  own estimation
- Hydrogen fluoride [emissions to air, low. pop.]: 8.17e-7 kg; lognormal SD95 3
  own estimation
- Manganese [emissions to air, low. pop.]: 1.09e-9 kg; lognormal SD95 7
  own estimation
- Carbon dioxide, fossil [emissions to air, low. pop.]: 0.105 kg; lognormal SD95 1.11
  (3,1,1,1,1,1); based on available literature
- Boron [emissions to air, low. pop.]: 2.07e-6 kg; lognormal SD95 7
  own estimation
- Methane, fossil [emissions to air, low. pop.]: 1e-6 kg; lognormal SD95 3
  own estimation
- Radium-226 [emissions to air, low. pop.]: 3.24e-7 kBq; lognormal SD95 5
  own estimation
- Radium-228 [emissions to air, low. pop.]: 3.16e-7 kBq; lognormal SD95 5
  own estimation
- Hydrogen chloride [emissions to air, low. pop.]: 2.93e-6 kg; lognormal SD95 3
  own estimation
- Hydrocarbons, aliphatic, alkanes, unspecified [emissions to air, low. pop.]: 2.19e-7 kg; lognormal SD95 3
  own estimation
- PAH, polycyclic aromatic hydrocarbons [emissions to air, low. pop.]: 1e-9 kg; lognormal SD95 5
  own estimation
- Water [emissions to water, unspecified]: 3.325 kg; lognormal SD95 2.5196
  (5,5,5,5,5,BU:1.05); All uncertainty-values set to 5.0 by default. Balance of input water

## Sampling procedure
literature and statistics

## Extrapolations
see Geography/Text

## Sources
- Dones R., Bauer C., Roeder A., 2007, 2007 - Coal - Dones, Sachbilanzen von Energiesystemen. Final report No. 6 ecoinvent data v2.0, 6, Swiss Centre for LCI, PSI, Duebendorf and Villigen, CH
Röder, A., Ch. Bauer, R. Dones (2007) Kohle. Sachbilanzen von Energiesystemen. Final report No. 6 ecoinvent data v2.0. Editors: Dones R.. Volume: 6. Swiss Centre for LCI, PSI. Dübendorf and Villigen, CH.
Type: Measurement on site
Source: CD-ROM
First author: Röder, A.
Other authors: Ch. Bauer, R. Dones
Year: 2007
Name of editors: Dones R.
Title of anthology: Sachbilanzen von Energiesystemen. Final report No. 6 ecoinvent data v2.0
Place of publication: Dübendorf and Villigen, CH
Publisher: Swiss Centre for LCI, PSI
Volume No: 6

## Validation
Proof reading validation: passed; Other validation: none;
