# Ventilation system, Geschäftshaus C, Esslingen, special components

Dataset: EcoSpold 1, unit process
Functional unit: 1 p
Category: ventilation / production of components
Geography: CH
Time period: 2014-01 to 2014-12
Generated by: Alex Primas
accessRestrictedTo: 0
copyright: true

## General comment
Production of special components of a ventilation system for an office building with offices only (no kitchen, restaurant or car park). The inventory is based on a building with a total heated gross floor area of 2621 m2 and a total nominal air flow of 4000 m3/h, total weight of the components: 121 kg/Unit, building with a specific air flow rate of 1.5 m3/h per m2 heated gross floor area. Data from call of bid including decental ventilation units between circulation area and offices. Components including fans, wiring and transformer but without surrounding light-weight wall.;

## Included processes
Materials used for the production. Energy use for the different production steps and for heating the production building. Transport of raw materials to the plant. Estimation for infrastructure of the production site included.

## Technology
Technology, materials and components used for ventilation systems in commercial and public buildings

## Time period
Amount of material investigated in 2013. Process information partly from 2003 to 2012

## Reference product
- Ventilation system, Geschäftshaus C, Esslingen, special components [CH]: 1 p
  SWITZERLAND

## Inputs from technosphere
- Zinc coating, coils [RER]: 0.34 m2; lognormal SD95 1.26
  (3,4,1,1,1,5); Data from building considered, estimations
- Acrylonitrile-butadiene-styrene copolymer, ABS, at plant [RER]: 4.5 kg; lognormal SD95 1.26
  (3,4,1,1,1,5); Data from building considered, estimations
- Transport, freight, rail [RER]: 18.6 tkm; lognormal SD95 2.14
  (4,5,1,1,1,5); Standard distance of ecoinvent used
- Fan, at plant [GLO]: 10 kg; lognormal SD95 1.34
  (3,4,1,1,3,5); Data for similar product, estimations
- Transport, freight, lorry, 16t-32t gross weight, fleet average [CH]: 4.25 tkm; lognormal SD95 2.14
  (4,5,1,1,1,5); Standard distance of ecoinvent used
- Sheet rolling, steel [RER]: 4 kg; lognormal SD95 1.26
  (3,4,1,1,1,5); Data related to material input
- Transformer, low voltage use, at plant [GLO]: 3.6 kg; lognormal SD95 1.26
  (3,4,1,1,1,5); Data from building considered, estimations
- Cable, connector for computer, without plugs, at plant [GLO]: 338.36 m; lognormal SD95 1.34
  (3,4,1,1,3,5); Data for similar product, estimations
- Steel, converter, unalloyed, at plant [RER]: 2.52 kg; lognormal SD95 1.26
  (3,4,1,1,1,5); Data from building considered, estimations
- Medium density fibreboard, uncoated, at plant [RER]: 0.098077 m3; lognormal SD95 1.26
  (3,4,1,1,1,5); Data from building considered, estimations
- Steel, electric, un- and low-alloyed, at plant [RER]: 1.48 kg; lognormal SD95 1.26
  (3,4,1,1,1,5); Data from building considered, estimations

## Sampling procedure
Data from call of bids for a ventilation system of a specific building used. Data completed with information from literature and from manufacturers

## Sources
- Klingler M., Kasser U., Savi D., Primas A., Stettler Y., Gujer P., 2014, 2014 - LCA ventilation and heating systems - Klingler, Schlussbericht, BFE, Buero fuer Umweltchemie, B&H AG, Zuerich, CH
Klingler M., Kasser U., Savi D., Primas A., Stettler Y., Gujer P. (2014) Ökobilanzdaten für Lüftungs- und Wärmeanlagen. Schlussbericht, BFE. Bundesamt für Energie (BFE). Bern.
Type: Separate publication
Source: Report
First author: Klingler M.
Other authors: Kasser U., Savi D., Primas A., Stettler Y., Gujer P.
Year: 2014
Title of anthology: Schlussbericht, BFE
Place of publication: Bern
Publisher: Bundesamt für Energie (BFE)
