# Solar system, 81 m2 Cu flat plate collector, multiple dwelling, hot water

Dataset: EcoSpold 1, unit process, infrastructure
Functional unit: 1 p
Category: heat / solar\infrastructure
Geography: CH
Time period: 2000-01 to 2010-12
Production volume: 10'433 systems with flat plate collectors were sold in 2008. 27.4% of the area is installed on multiple dwellings for hot water.
Generated by: Matthias Stucki
accessRestrictedTo: 0
copyright: true

## General comment
Solar system with a flat plate collector on a multiple family dwelling for hot water. 25 years life time, 141 m pipe length and 4200 l heat storage. ;

## Included processes
Production and disposal of a complete solar system (excluding auxiliary heating). Including different components, heat exchange fluid, warm water pipes, transports of parts to CH, and delivery with a van.

## Technology
Solar collector system for hot water installed on the roof of a house.

## Time period
Time of simulation.

## Reference product
- Solar system, 81 m2 Cu flat plate collector, multiple dwelling, hot water [CH]: 1 p
  SWITZERLAND

## Inputs from technosphere
- Flat plate collector, copper absorber, at plant [CH]: 81 m2; lognormal SD95 4.8073
  (3,5,3,1,1,na); Estimation
- Powder coating, aluminium sheet [RER]: 2.088 m2; lognormal SD95 3.0735
  (3,5,3,1,1,na); Foundation lacquering
- Treatment, heat carrier liquid, 40% C3H8O2, to wastewater treatment, class 2 [CH]: 0.12894 m3; lognormal SD95 3.0735
  (3,5,3,1,1,na); Estimation
- Heat storage 2000l, at plant [CH]: 1.3587 p; lognormal SD95 4.8073
  (3,5,3,1,1,na); Extrapolated by weight
- Rock wool, packed, at plant [CH]: 77.076 kg; lognormal SD95 3.0735
  (3,5,3,1,1,na); Tube insulation
- Transport, freight, lorry, 16t-32t gross weight, fleet average [CH]: 18.742 tkm; lognormal SD95 3.7597
  (4,5,na,na,na,na); Standard distance 50km
- Transport, freight, lorry, 3.5t gross weight, fleet average [CH]: 1782 tkm; lognormal SD95 3.7855
  (3,5,3,1,1,5); Questionnaire 50km per m2
- Expansion vessel 80l, at plant [CH]: 5 p; lognormal SD95 4.8073
  (3,5,3,1,1,na); Estimation
- Transport, freight, rail [RER]: 224.91 tkm; lognormal SD95 3.7597
  (4,5,na,na,na,na); Standard distance 600km
- Water, completely softened, at plant [RER]: 81.25 kg; lognormal SD95 3.0735
  (3,5,3,1,1,na); Plant data, exchange after 10a life time
- Aluminium, production mix, wrought alloy, at plant [RER]: 41.759 kg; lognormal SD95 3.0735
  (3,5,3,1,1,na); Foundation
- Propylene glycol, liquid, at plant [RER]: 47.687 kg; lognormal SD95 3.0735
  (3,5,3,1,1,na); Plant data, exchange after 10a life time
- Drawing of pipes, steel [RER]: 127.07 kg; lognormal SD95 3.1191
  (3,5,3,1,3,na); Estimation for pipes
- Sheet rolling, aluminium [RER]: 41.759 kg; lognormal SD95 3.0735
  (3,5,3,1,1,na); Foundation
- Copper, at regional storage [RER]: 127.07 kg; lognormal SD95 3.0735
  (3,5,3,1,1,na); Plant data, warm water pipes
- Pump 40W, at plant [CH]: 13.611 p; lognormal SD95 4.8073
  (3,5,3,1,1,na); Estimation, extrapolation for life time of 15a

## Sampling procedure
Own simulation.

## Sources
- Stucki M., Jungbluth N., 2012, 2012 - Update LCI solar collectors - Stucki, -, 352, ESU-services Ltd., Uster, CH
Stucki M., Jungbluth N. (2010) Update of the Life Cycle Inventories of Solar Collectors. Volume: 352. ESU-services Ltd.. Uster, CH.
Type: Separate publication
First author: Stucki M.
Other authors: Jungbluth N.
Year: 2010
Place of publication: Uster, CH
Publisher: ESU-services Ltd.
Volume No: 352

## Validation
Proof reading validation: 17.12.2010; Other validation: \\Server\E\ESU-Docs\Projekte laufend\352 Sonnenkollektoranlagen\Berechnung\[neueingabe-Kollektoren-2.2+V1.0.xlsx]X-Process;
