# Calcareous marl, at plant

Dataset: EcoSpold 1, unit process
Functional unit: 1 kg
Category: chemicals / inorganic
Geography: CH
Time period: 2000-01 to 2000-12
Generated by: Tina Kuenniger
accessRestrictedTo: 0
copyright: true

## General comment
na;
Synonyms: clay, lime, Kalk, Mergel, mergeliger;

## Included processes
includes a mix of 3/4 pure limestone and 1/4 clay

## Technology
composed from pure limestone and clay

## Reference product
- Calcareous marl, at plant [CH]: 1 kg
  SWITZERLAND

## Inputs from technosphere
- Clay, at mine [CH]: 0.25 kg; lognormal SD95 1.2
  (4,2,1,1,1,3);
- Limestone, crushed, washed [CH]: 0.75 kg; lognormal SD95 1.2
  (4,2,1,1,1,3);

## Sampling procedure
share of literature

## Extrapolations
See geography

## Sources
- Kellenberger D., Althaus H.-J., Jungbluth N., Kuenniger T., Lehmann M., Thalmann P., 2007, 2007 - LCI building products - Kellenberger, Final report ecoinvent data v2.0, 7, Swiss Centre for LCI, Empa - TSL, ESU-services Ltd., Bau- und Umweltchimie, Duebendorf, CH
Kellenberger D., Althaus H.-J., Jungbluth N., Künniger T. (2007) Life Cycle Inventories of Building Products. Final report ecoinvent data v2.0. Volume: 7. Swiss Centre for LCI, Empa - TSL. Dübendorf, CH.
Type: Measurement on site
Source: CD-ROM
First author: Kellenberger D.
Other authors: Althaus H.-J., Jungbluth N., Künniger T.
Year: 2007
Title of anthology: Final report ecoinvent data v2.0
Place of publication: Dübendorf, CH
Publisher: Swiss Centre for LCI, Empa - TSL
Volume No: 7

## Validation
Proof reading validation: Passed; Other validation: none;
