# Electricity, from natural gas

Dataset: EcoSpold 1, unit process
Functional unit: 1 kWh
Category: electricity by fuel / gas
Geography: RU
Time period: 2021-01-01 to 2023-12-31
Generated by: Christopher Oberschelp
accessRestrictedTo: 0
copyright: false

## General comment
Translated name: Strom, ab Erdgas
Included processes: Electricity mix for the region.

The mix of electricity generation technologies in the region is collected from international energy statistics.

Representativeness: 100 %

Local category: Erdgas
Local subcategory: Kraftwerke

Generator: Christopher Oberschelp
E-mail: contact@oberschelp-consulting.ch; Country: CH Former geography text: NA. ; UUID:

## Technology
Average technology mix

## Reference product
- Electricity, from natural gas [RU]: 1 kWh

## Inputs from technosphere
- Electricity, natural gas, at power plant [RU]: 0.0314561 kWh; lognormal SD95 1.21
  calculated from IEA Extended World Energy Balances for 2022; uncertainty own estimate
- Electricity, natural gas, at CHP power plant [RU]: 0.968544 kWh; lognormal SD95 1.21
  calculated from IEA Extended World Energy Balances for 2022; uncertainty own estimate

## Sampling procedure
Databases / literature data based on regional stat

## Sources
- Zschokke M., Elsener F., Oberschelp C., 2025, 2025 - Update LCI electricity from natural gas - Zschokke, Default Anthology, 0, Carbotech AG, Zuerich, CH
On behalf of the Federal Office for the Environment, Bern

## Validation
Proof reading validation: Proof reading validation: had passed; Other validation: none;
Validator: René Itten
Telephone: 0041 58 934 52 32; E-mail: rene.itten@zhaw.ch; Country: CH
