# Metaldehyde, at regional storage

Dataset: EcoSpold 1, unit process
Functional unit: 1 kg
Category: chemicals / pesticides
Geography: RER
Time period: 2008-01 to 2008-12
Share of production covered: 100 %
Generated by: Juergen Sutter
accessRestrictedTo: 0
copyright: true

## General comment
Production of metaldehyde including materials, energy uses, infrastructure and emissions.;

## Geography
The inventory is modelled for Europe.

## Technology
pesticides

## Time period
Time of publications

## Reference product
- Metaldehyde, at regional storage [RER]: 1 kg
  Europe

## Inputs from technosphere
- Transport, freight, lorry, fleet average [RER]: 0.10204 tkm; lognormal SD95 2.095
  (4,5,na,na,na,na); Standard distances
- Heat, unspecific, in chemical plant [RER]: 2.0825 MJ; lognormal SD95 1.3765
  (4,5,1,1,1,5); Estimation
- Chemical plant, organics [RER]: 4.1649e-10 p; lognormal SD95 3.0909
  (4,5,na,na,na,na); Estimation
- Acetaldehyde, at plant [RER]: 1.0204 kg; lognormal SD95 1.3765
  (4,5,1,1,1,5); Stoechiometric calculation
- Transport, freight, rail [RER]: 0.61224 tkm; lognormal SD95 2.095
  (4,5,na,na,na,na); Standard distances
- Electricity, medium voltage, production ENTSO-E, at grid: 0.34673 kWh; lognormal SD95 1.3765
  (4,5,1,1,1,5); Estimation

## Inputs from nature
- Water, cooling, unspecified natural origin/m3 [resources, in water]: 0.02499 m3; lognormal SD95 1.3765
  (4,5,1,1,1,5); Estimation

## Emissions to nature
- Carbon dioxide, fossil [emissions to air, high. pop.]: 0.033061 kg; lognormal SD95 1.3001
  (4,5,na,na,na,na); Estimation
- Acetaldehyde [emissions to water, river]: 0.0036735 kg; lognormal SD95 3.0909
  (4,5,na,na,na,na); Estimation
- Acetaldehyde [emissions to air, high. pop.]: 0.0020408 kg; lognormal SD95 1.6169
  (4,5,na,na,na,na); Estimation
- Heat, waste [emissions to air, high. pop.]: 1.2482 MJ; lognormal SD95 1.3765
  (4,5,1,1,1,5); Calculated from the electricity input
- Water [emissions to water, unspecified]: 23.7405 kg; lognormal SD95 2.5196
  (5,5,5,5,5,BU:1.05); All uncertainty-values set to 5.0 by default. Balance of input water

## Sampling procedure
Literature data

## Extrapolations
Transports and emissions are modelled with standard methods.

## Sources
- Nemecek T., Kaegi T., 2007, 2007 - LCI agricultural prod. systems - Nemecek, Ecoinvent report version 2.0, 15, Swiss Centre for LCI, ART, Duebendorf and Zuerich, CH
Nemecek, T., Kägi, T., Blaser, S. (2007) Life Cycle Inventories of Agricultural Production Systems. Ecoinvent report version 2.0. Editors: 0. Volume: 15. Swiss Centre for LCI, ART. Duebendorf and Zurich, CH.
Type: Measurement on site
Source: CD-ROM
First author: Nemecek, T.
Other authors: Kägi, T., Blaser, S.
Year: 2007
Name of editors: 0
Title of anthology: Ecoinvent report version 2.0
Place of publication: Duebendorf and Zurich, CH
Publisher: Swiss Centre for LCI, ART
Volume No: 15

## Validation
Proof reading validation: Passed.; Other validation: none;
