# Transport, aircraft, passenger, medium-haul, Betrieb

Dataset: EcoSpold 1, unit process
Functional unit: 1 personkm
Category: transport systems / airplane
Geography: RER
Time period: 2016-01 to 2019-12
Production volume: 33'060'000'000pkm
Share of production covered: 100 %
Generated by: Rolf Frischknecht
accessRestrictedTo: 0
copyright: true

## General comment
Inventory refers to the entire transport life cycle. Airport infrastructure expenditures and environmental interventions are accounted for using the yearly transport performance at Zurich airport (73'526'350'051 pkm/a). Aircraft manufacturing is allocated based on the total life span of an aircraft (50'000LTO), the average distance of a flight (2800km) and its average number of passengers (132p/unit);

## Included processes
The dataset describes the operation of aircrafts including taxying, take-off and landing covering fuel consumption and operation emissions. Aircraft manufacture and maintenance, airport construction, operation and dismantling are inputs to this dataset

## Technology
Aircraft operation modelled based on passenger aircrafts operated by Lufthansa Group in 2019. The emission profiles distinguish between LTO and cruise.

## Time period
Start date refers to emission factor data. End date refers to year of reporting fuel consumption and transport activities

## Reference product
- Transport, aircraft, passenger, medium-haul, Betrieb [RER]: 1 personkm
  Europe

## Inputs from technosphere
- Kerosene, at regional storage [RER]: 0.029148 kg; lognormal SD95 1.2435
  (2,4,1,3,1,5,BU:1.05); ; Lufthansa Balance 2015, BLD 2014, pers. communication Lufthasa, Mail 20.8.2015

## Emissions to nature
- Sulfur dioxide [emissions to air, low. pop.]: 2.0436e-6 kg; lognormal SD95 1.3297
  (2,5,2,5,1,5,BU:1.05); ; BAFU (2016) Switzerland’s Informative Inventory Report 2014 (IIR); pers. correspondence BAZL, 27.9.2016
- Water [emissions to air, low. pop.]: 0.00253 kg; lognormal SD95 1.6375
  (2,5,2,5,1,5,BU:1.5); ; Ecoinvent Report 14
- Carbon dioxide, fossil [emissions to air, stratosphere + troposphere]: 0.064042 kg; lognormal SD95 1.3297
  (2,5,2,5,1,5,BU:1.05); assumption: a share of of the cruise emission take place in the upper troposphere and lower stratosphere (this corresponds to a share of of the total emissions); BAFU (2016) Switzerland’s Informative Inventory Report 2014 (IIR); pers. correspondence BAZL, 27.9.2016
- Butadiene [emissions to air, stratosphere + troposphere]: 1.1645e-7 kg; lognormal SD95 1.6375
  (2,5,2,5,1,5,BU:1.5); ; VOC Profil wie ecoinvent 2.2, ecoinvent report 14
- Butadiene [emissions to air, unspecified]: 3.8815e-8 kg; lognormal SD95 1.6375
  (2,5,2,5,1,5,BU:1.5); ; VOC Profil wie ecoinvent 2.2, ecoinvent report 14
- Ethene [emissions to air, low. pop.]: 4.7591e-7 kg; lognormal SD95 1.6375
  (2,5,2,5,1,5,BU:1.5); ; VOC Profil wie ecoinvent 2.2, ecoinvent report 14
- Butadiene [emissions to air, low. pop.]: 4.9232e-8 kg; lognormal SD95 1.6375
  (2,5,2,5,1,5,BU:1.5); ; VOC Profil wie ecoinvent 2.2, ecoinvent report 14
- NMVOC, non-methane volatile organic compounds, unspecified origin [emissions to air, unspecified]: 2.1564e-6 kg; lognormal SD95 1.6375
  (2,5,2,5,1,5,BU:1.5); ; BAFU (2016) Switzerland’s Informative Inventory Report 2014 (IIR); pers. correspondence BAZL, 27.9.2016
- Heat, waste [emissions to air, unspecified]: 0.00030903 MJ; lognormal SD95 1.3297
  (2,5,2,5,1,5,BU:1.05); default value;
- Nitrogen oxides [emissions to air, low. pop.]: 2.5384e-5 kg; lognormal SD95 1.6375
  (same comment as for NMVOC, non-methane volatile organic compounds, unspecified origin)
- NMVOC, non-methane volatile organic compounds, unspecified origin [emissions to air, low. pop.]: 2.7351e-6 kg; lognormal SD95 1.6375
  (same comment as for NMVOC, non-methane volatile organic compounds, unspecified origin)
- Nitrogen oxides [emissions to air, stratosphere + troposphere]: 0.00026278 kg; lognormal SD95 1.6375
  (same comment as for NMVOC, non-methane volatile organic compounds, unspecified origin)
- Benzene [emissions to air, stratosphere + troposphere]: 1.2292e-7 kg; lognormal SD95 3.1078
  (2,5,2,5,1,5,BU:3); ; VOC Profil wie ecoinvent 2.2, ecoinvent report 14
- Sulfur dioxide [emissions to air, unspecified]: 6.7748e-6 kg; lognormal SD95 1.3297
  (same comment as for Sulfur dioxide)
- Benzene [emissions to air, unspecified]: 4.0972e-8 kg; lognormal SD95 3.1078
  (2,5,2,5,1,5,BU:3); ; VOC Profil wie ecoinvent 2.2, ecoinvent report 14
- Noise, aircraft, passenger [non material emissions, unspecified]: 1 personkm; lognormal SD95 1.5
  (1,1,1,1,1,1,BU:1.5); ; Ecological Scarcity method 2013; Frischknecht & Büsser Knöpfel 2013
- Particulates, < 2.5 um [emissions to air, low. pop.]: 2.0404e-7 kg; lognormal SD95 3.1078
  (2,5,2,5,1,5,BU:3); ; BAFU (2016) Switzerland’s Informative Inventory Report 2014 (IIR); pers. correspondence BAZL, 27.9.2016
- Water [emissions to air, unspecified]: 0.0084033 kg; lognormal SD95 1.6375
  (2,5,2,5,1,5,BU:1.5); ; Ecoinvent Report 14
- Carbon monoxide, fossil [emissions to air, stratosphere + troposphere]: 3.8577e-5 kg; lognormal SD95 5.123
  (2,5,2,5,1,5,BU:5); ; BAFU (2016) Switzerland’s Informative Inventory Report 2014 (IIR); pers. correspondence BAZL, 27.9.2016
- Formaldehyde [emissions to air, unspecified]: 3.2346e-7 kg; lognormal SD95 1.6375
  (2,5,2,5,1,5,BU:1.5); ; VOC Profil wie ecoinvent 2.2, ecoinvent report 14
- Carbon dioxide, fossil [emissions to air, unspecified]: 0.021347 kg; lognormal SD95 1.3297
  (2,5,2,5,1,5,BU:1.05); assumption: a share of of the cruise emission take place in the troposphere (this corresponds to a share of of the total emissions) ; BAFU (2016) Switzerland’s Informative Inventory Report 2014 (IIR); pers. correspondence BAZL, 27.9.2016
- Formaldehyde [emissions to air, stratosphere + troposphere]: 9.7038e-7 kg; lognormal SD95 1.6375
  (2,5,2,5,1,5,BU:1.5); ; VOC Profil wie ecoinvent 2.2, ecoinvent report 14
- Carbon dioxide, fossil [emissions to air, low. pop.]: 0.0064271 kg; lognormal SD95 1.3297
  (2,5,2,5,1,5,BU:1.05); assumption: a share of of the total emission occure during the LTO; for LTO emissions different emission factors are used than for cruise; BAFU (2016) Switzerland’s Informative Inventory Report 2014 (IIR); pers. correspondence BAZL, 27.9.2016
- Particulates, < 2.5 um [emissions to air, stratosphere + troposphere]: 4.8794e-7 kg; lognormal SD95 3.1078
  (same comment as for Particulates, < 2.5 um)
- Heat, waste [emissions to air, stratosphere + troposphere]: 0.00092708 MJ; lognormal SD95 1.3297
  (2,5,2,5,1,5,BU:1.05); ; default value
- Particulates, < 2.5 um [emissions to air, low. pop.]: 2.0587e-7 kg; lognormal SD95 3.1078
  (2,5,2,5,1,5,BU:3); PM2.5 Emission of the abrasion during LTO ; pers. correspondence BAZL, 27.9.2016
- Ethene [emissions to air, unspecified]: 3.7521e-7 kg; lognormal SD95 1.6375
  (2,5,2,5,1,5,BU:1.5); ; VOC Profil wie ecoinvent 2.2, ecoinvent report 14
- Carbon monoxide, fossil [emissions to air, low. pop.]: 2.6995e-5 kg; lognormal SD95 5.123
  (same comment as for Carbon monoxide, fossil)
- Water [emissions to air, stratosphere + troposphere]: 0.02521 kg; lognormal SD95 1.6375
  (2,5,2,5,1,5,BU:1.5); ; Ecoinvent Report 14
- Carbon monoxide, fossil [emissions to air, unspecified]: 1.2859e-5 kg; lognormal SD95 5.123
  (same comment as for Carbon monoxide, fossil)
- Ethene [emissions to air, stratosphere + troposphere]: 1.1256e-6 kg; lognormal SD95 1.6375
  (2,5,2,5,1,5,BU:1.5); ; VOC Profil wie ecoinvent 2.2, ecoinvent report 14
- Sulfur dioxide [emissions to air, stratosphere + troposphere]: 2.0325e-5 kg; lognormal SD95 1.3297
  (same comment as for Sulfur dioxide)
- Benzene [emissions to air, low. pop.]: 5.1967e-8 kg; lognormal SD95 3.1078
  (2,5,2,5,1,5,BU:3); ; VOC Profil wie ecoinvent 2.2, ecoinvent report 14
- Heat, waste [emissions to air, low. pop.]: 9.304e-5 MJ; lognormal SD95 1.3297
  (2,5,2,5,1,5,BU:1.05); default value;
- NMVOC, non-methane volatile organic compounds, unspecified origin [emissions to air, stratosphere + troposphere]: 6.4692e-6 kg; lognormal SD95 1.6375
  (same comment as for NMVOC, non-methane volatile organic compounds, unspecified origin)
- Nitrogen oxides [emissions to air, unspecified]: 8.7593e-5 kg; lognormal SD95 1.6375
  (same comment as for NMVOC, non-methane volatile organic compounds, unspecified origin)
- Formaldehyde [emissions to air, low. pop.]: 4.1026e-7 kg; lognormal SD95 1.6375
  (2,5,2,5,1,5,BU:1.5); ; VOC Profil wie ecoinvent 2.2, ecoinvent report 14
- Particulates, < 2.5 um [emissions to air, unspecified]: 1.6265e-7 kg; lognormal SD95 3.1078
  (same comment as for Particulates, < 2.5 um)

## Sampling procedure
fuel consumption is based on corporate data, emission profiles are based on FOEN statistics

## Extrapolations
Allocation between passengers and freight based on weight (average passenger weight between 158kg and 163kg); allocation between booking classes based on seat area.

## Sources
- Messmer A., Frischknecht R., 2016, 2016 - LCI air transport services - Messmer, Project report, 544, treeze Ltd., Uster, CH
Messmer A., Frischknecht R. (2015) Life cycle inventories of air transport services. Project report. Volume: 544. treeze Ltd.. Uster, CH.
Type: Separate publication
Source: Report
First author: Messmer A.
Other authors: Frischknecht R.
Year: 2015
Title of anthology: Project report
Place of publication: Uster, CH
Publisher: treeze Ltd.
Volume No: 544

## Validation
Proof reading validation: 09.03.2021; Other validation: G:\Projekte laufend\735 Aktualisierung Flugtransporte\EcoSpold\[735_aircraftTransport_2021_v0.10.xlsx]X-Process;
