# Production efforts, diodes

Dataset: EcoSpold 1, unit process
Functional unit: 1 kg
Category: electronics / manufacturing
Geography: GLO
Time period: 2023-01 to 2029-12
Generated by: Lugas Raka Adrianto, Maulana Permana Ajie, Didier Beloin-Saint-Pierre
accessRestrictedTo: 0
copyright: false

## General comment
Data are a rough estimation of the average production efforts over all types of diodes. Data for auxillaries, energy, emissions and waste are taken from a dataset ouf of an international LCI database. Infrastructure and transportation efforts are based on own assumptions. Updates were made in 2023, showing that 20% energy reduction is achieved;

## Included processes
This module includes auxillary and energy consumption, emissions (air, water) and waste amounts, as well as an estimation of the efforts for transportation and of the infrastructure for the production of diodes.

## Geography
Data from literature – here representing the global situation.

## Technology
average diode production technology, comprising the diode wafer production (cleaing, masking, etching, doping, oxidising, metal deposition) and the final assembly of the diode (wafer sawing, die bonding, moulding, trimming and forming)

## Reference product
- Production efforts, diodes [GLO]: 1 kg
  Global

## Inputs from technosphere
- Chemicals organic, at plant [GLO]: 0.871 kg; lognormal SD95 1.33
  (2,4,4,3,1,5,BU:1.05); value from 1 literature source
- Electricity, medium voltage, production GLO, at grid [GLO]: 195.2 kWh; lognormal SD95 1.33
  (2,4,4,3,1,5,BU:1.05); value from 1 literature source
- Electronic component production plant [GLO]: 2e-8 p; lognormal SD95 3.85
  (4,5,4,3,5,5,BU:3.00); rough assumption
- Heat, light fuel oil, at industrial furnace 1MW [RER]: 195.2 MJ; lognormal SD95 1.33
  (2,4,4,3,1,5,BU:1.05); value from 1 literature source
- Heat, natural gas, at industrial furnace 1MW [CH]: 224 MJ; lognormal SD95 1.33
  (2,4,4,3,1,5,BU:1.05); value from 1 literature source
- Hydrochloric acid, 30% in H2O, at plant [RER]: 0.099 kg; lognormal SD95 1.33
  (2,4,4,3,1,5,BU:1.05); value from 1 literature source
- Hydrogen fluoride, at plant [GLO]: 0.62 kg; lognormal SD95 1.33
  (2,4,4,3,1,5,BU:1.05); value from 1 literature source
- Hydrogen peroxide, 50% in H2O, at plant [RER]: 0.22 kg; lognormal SD95 1.33
  (2,4,4,3,1,5,BU:1.05); value from 1 literature source
- Hydrogen, liquid, at plant [RER]: 0.09 kg; lognormal SD95 1.33
  (2,4,4,3,1,5,BU:1.05); value from 1 literature source
- Methanol, at plant [GLO]: 0.55 kg; lognormal SD95 1.33
  (2,4,4,3,1,5,BU:1.05); value from 1 literature source
- Nitric acid, 50% in H2O, at plant [RER]: 0.28 kg; lognormal SD95 1.33
  (2,4,4,3,1,5,BU:1.05); value from 1 literature source
- Nitrogen, liquid, at plant [RER]: 92.6 kg; lognormal SD95 1.33
  (2,4,4,3,1,5,BU:1.05); value from 1 literature source
- Oxygen, liquid, at plant [RER]: 0.75 kg; lognormal SD95 1.33
  (2,4,4,3,1,5,BU:1.05); value from 1 literature source
- Sulphuric acid, liquid, at plant [RER]: 0.6 kg; lognormal SD95 1.33
  (2,4,4,3,1,5,BU:1.05); value from 1 literature source
- Tap water, at user [RER]: 253 kg; lognormal SD95 1.68
  (4,5,2,3,4,5,BU:1.05); estimation - based on data for microchip production
- Transport, freight, rail [RER]: 58.81 tkm; lognormal SD95 2.11
  (2,4,4,3,1,5,BU:2.00); standard distances
- Transport, freight, lorry, fleet average [RER]: 9.8016 tkm; lognormal SD95 2.11
  (2,4,4,3,1,5,BU:2.00); standard distances
- Water, ultrapure, at plant [GLO]: 286 kg; lognormal SD95 1.68
  (4,5,2,3,4,5,BU:1.05); estimation - based on data for microchip production
- Xylene, at plant [RER]: 0.296 kg; lognormal SD95 1.33
  (2,4,4,3,1,5,BU:1.05); value from 1 literature source
- Disposal, solvents mixture, 16.5% water, to hazardous waste incineration [CH]: 0.333 kg; lognormal SD95 1.33
  (2,4,4,3,1,5,BU:1.05); assumption, based on total waste information in 1 literature source
- Disposal, waste, Si waferprod., inorg, 9.4% water, to residual material landfill [CH]: 0.037 kg; lognormal SD95 1.33
  (2,4,4,3,1,5,BU:1.05); assumption, based on total waste information in 1 literature source
- Treatment, sewage, to wastewater treatment, class 2 [CH]: 0.286 m3; lognormal SD95 1.33
  (2,4,4,3,1,5,BU:1.05); assumption, based on literature

## Emissions to nature
- Acetone [emissions to air, high. pop.]: 0.073 kg; lognormal SD95 1.64
  (2,4,4,3,1,5,BU:1.50); value from 1 literature source
- Ammonia [emissions to air, high. pop.]: 0.011 kg; lognormal SD95 1.64
  (2,4,4,3,1,5,BU:1.50); value from 1 literature source
- Carbon monoxide, fossil [emissions to air, high. pop.]: 0.042 kg; lognormal SD95 5.12
  (2,4,4,3,1,5,BU:5.00); value from 1 literature source
- Heat, waste [emissions to air, high. pop.]: 867.6 MJ; lognormal SD95 1.64
  (2,4,4,3,1,5,BU:1.50); calculated, from electricity input
- Hydrogen fluoride [emissions to air, high. pop.]: 0.015 kg; lognormal SD95 1.64
  (2,4,4,3,1,5,BU:1.50); value from 1 literature source
- Nitrogen oxides [emissions to air, high. pop.]: 0.073 kg; lognormal SD95 1.64
  (2,4,4,3,1,5,BU:1.50); value from 1 literature source
- Sulfur dioxide [emissions to air, high. pop.]: 0.025 kg; lognormal SD95 1.64
  (2,4,4,3,1,5,BU:1.50); value from 1 literature source
- Xylene [emissions to air, high. pop.]: 0.101 kg; lognormal SD95 2.11
  (2,4,4,3,1,5,BU:2.00); value from 1 literature source
- BOD5, Biological Oxygen Demand [emissions to water, unspecified]: 0.04 kg; lognormal SD95 1.64
  (2,4,4,3,1,5,BU:1.50); value from 1 literature source
- Chloride [emissions to water, unspecified]: 0.0039 kg; lognormal SD95 3.11
  (2,4,4,3,1,5,BU:3.00); value from 1 literature source
- COD, Chemical Oxygen Demand [emissions to water, unspecified]: 0.0036 kg; lognormal SD95 1.64
  (2,4,4,3,1,5,BU:1.50); value from 1 literature source
- Fluoride [emissions to water, unspecified]: 0.012 kg; lognormal SD95 1.64
  (2,4,4,3,1,5,BU:1.50); value from 1 literature source
- Nitrite [emissions to water, unspecified]: 0.064 kg; lognormal SD95 1.64
  (2,4,4,3,1,5,BU:1.50); value from 1 literature source
- Phosphate [emissions to water, unspecified]: 0.003 kg; lognormal SD95 1.64
  (2,4,4,3,1,5,BU:1.50); value from 1 literature source
- Sulfate [emissions to water, unspecified]: 0.013 kg; lognormal SD95 1.64
  (2,4,4,3,1,5,BU:1.50); value from 1 literature source
- Suspended solids, unspecified [emissions to water, unspecified]: 0.11 kg; lognormal SD95 1.64
  (2,4,4,3,1,5,BU:1.50); value from 1 literature source
- Tin [emissions to water, unspecified]: 5e-5 kg; lognormal SD95 5.12
  (2,4,4,3,1,5,BU:5.00); value from 1 literature source

## Sampling procedure
own estimation

## Extrapolations
see Geography & Technology

## Sources
- Raka Adrianto L., Permana Ajie M., Beloin-Saint-Pierre D., 2024, 2024 - LCI ICT sector - Raka Adrianto, Empa, St. Gallen, CH

## Validation
Proof reading validation: Passed, Other validation: none, Validator: Mischa Zschokke, Company: Carbotech, Country: CH
