# Quicklime, milled, packed, at plant

Dataset: EcoSpold 1, unit process
Functional unit: 1 kg
Category: chemicals / inorganic
Geography: CH
Time period: 2000-01 to 2000-12
Production volume: 150'000t
Share of production covered: 50 %
Generated by: Daniel Kellenberger
accessRestrictedTo: 0
copyright: true

## General comment
Packed lime products do all use the module "packing, lime products";
CAS number: 001305-62-0;
Formula: CaO;
Synonyms: burnt, caustic, quick, lime, Calciumhydroxid, Calcium hydroxide;

## Included processes
includes the packing and one part of the total heating energy for "production" and "administration

## Technology
The company KFN works on a technically high level.

## Reference product
- Quicklime, milled, packed, at plant [CH]: 1 kg
  SWITZERLAND

## Inputs from technosphere
- Light fuel oil, burned in boiler 100kW, non-modulating [CH]: 0.0015 MJ; lognormal SD95 1.1
  (1,2,1,1,1,1);
- Quicklime, milled, loose, at plant [CH]: 1 kg; lognormal SD95 1.1
  (1,2,1,1,1,1);
- Packing, lime products [CH]: 1 kg; lognormal SD95 3.1
  (4,3,1,1,1,5);

## Sampling procedure
survey

## Sources
- Kellenberger D., Althaus H.-J., Jungbluth N., Kuenniger T., Lehmann M., Thalmann P., 2007, 2007 - LCI building products - Kellenberger, Final report ecoinvent data v2.0, 7, Swiss Centre for LCI, Empa - TSL, ESU-services Ltd., Bau- und Umweltchimie, Duebendorf, CH
Kellenberger D., Althaus H.-J., Jungbluth N., Künniger T. (2007) Life Cycle Inventories of Building Products. Final report ecoinvent data v2.0. Volume: 7. Swiss Centre for LCI, Empa - TSL. Dübendorf, CH.
Type: Measurement on site
Source: CD-ROM
First author: Kellenberger D.
Other authors: Althaus H.-J., Jungbluth N., Künniger T.
Year: 2007
Title of anthology: Final report ecoinvent data v2.0
Place of publication: Dübendorf, CH
Publisher: Swiss Centre for LCI, Empa - TSL
Volume No: 7

## Validation
Proof reading validation: Passed; Other validation: none;
