# Magnesium oxide, at plant

Dataset: EcoSpold 1, unit process
Functional unit: 1 kg
Category: chemicals / inorganic
Geography: RER
Time period: 2000-01 to 2000-12
Production volume: worldwide 10.1 Mt in 1989
Generated by: Roland Hischier
accessRestrictedTo: 0
copyright: true

## General comment
The functional unit represent 1 kg of magnesium oxide. Large uncertainty of the process data due to weak data on the production process.;
CAS number: 001309-48-4;
Formula: MgO;

## Included processes
Raw materials, machineries and energy consumption for production, estimated emissions to air from production and infrastructure of the site (approximation). No water emissions.

## Geography
Data are used here as European average.

## Technology
Data approximated with data from iron mining and benefication as well as lime crushing and milling.

## Reference product
- Magnesium oxide, at plant [RER]: 1 kg
  Europe

## Inputs from technosphere
- Industrial machine, heavy, unspecified, at plant [RER]: 0.000411 kg; lognormal SD95 3.8
  (4,3,1,3,5,5); approximation with data from iron mining & lime treatment
- Light fuel oil, burned in boiler 100kW, non-modulating [CH]: 0.00566 MJ; lognormal SD95 2.1
  (4,3,1,3,5,5); approximation with data from iron mining & lime treatment
- Diesel, burned in building machine, average [CH]: 0.0521 MJ; lognormal SD95 2.1
  (4,3,1,3,5,5); approximation with data from iron mining & lime treatment
- Conveyor belt, at plant [RER]: 5.68e-8 m; lognormal SD95 3.8
  (4,3,1,3,5,5); approximation with data from iron mining & lime treatment
- Heat, heavy fuel oil, at industrial furnace 1MW [RER]: 0.0914 MJ; lognormal SD95 2.1
  (4,3,1,3,5,5); approximation with data from iron mining & lime treatment
- Blasting [RER]: 0.000553 kg; lognormal SD95 2.1
  (4,3,1,3,5,5); approximation with data from iron mining & lime treatment
- Heat, light fuel oil, at industrial furnace 1MW [RER]: 0.155 MJ; lognormal SD95 2.1
  (4,3,1,3,5,5); approximation with data from iron mining & lime treatment
- Mine, iron [GLO]: 1.7e-12 p; lognormal SD95 3.8
  (4,3,1,3,5,5); approximation with data from iron mining & lime treatment
- Electricity, medium voltage, production ENTSO-E, at grid: 0.207 kWh; lognormal SD95 2.1
  (4,3,1,3,5,5); approximation with data from iron mining & lime treatment
- Recultivation, iron mine [GLO]: 4.35e-6 m2; lognormal SD95 3.8
  (4,3,1,3,5,5); approximation with data from iron mining & lime treatment

## Inputs from nature
- Water, unspecified natural origin/m3 [resources, in water]: 0.00263 m3; lognormal SD95 2.1
  (4,3,1,3,5,5); approximation with data from iron mining & lime treatment
- Magnesite [resources, in ground]: 2.27 kg; lognormal SD95 2.1
  (4,3,1,3,5,5); approximation with data from iron mining & lime treatment
- Water, well [resources, in water]: 5.98e-5 m3; lognormal SD95 2.1
  (4,3,1,3,5,5); approximation with data from iron mining & lime treatment
- Occupation, mineral extraction site [resources, land]: 0.000245 m2a; lognormal SD95 2.3
  (4,3,1,3,5,5); approximation with data from iron mining & lime treatment
- Transformation, from forest, unspecified [resources, land]: 4.35e-6 m2; lognormal SD95 2.8
  (4,3,1,3,5,5); approximation with data from iron mining & lime treatment
- Transformation, to mineral extraction site [resources, land]: 4.35e-6 m2; lognormal SD95 2.8
  (4,3,1,3,5,5); approximation with data from iron mining & lime treatment

## Emissions to nature
- Chromium VI [emissions to water, river]: 1.85e-5 kg; lognormal SD95 5.9
  (4,3,1,3,5,5); approximation with data from iron mining & lime treatment
- Arsenic [emissions to water, river]: 1.85e-5 kg; lognormal SD95 5.9
  (4,3,1,3,5,5); approximation with data from iron mining & lime treatment
- Cyanide [emissions to water, river]: 0.000185 kg; lognormal SD95 2.3
  (4,3,1,3,5,5); approximation with data from iron mining & lime treatment
- Sulfur dioxide [emissions to air, high. pop.]: 0.000336 kg; lognormal SD95 2.1
  (4,3,1,3,5,5); approximation with data from iron mining & lime treatment
- Particulates, < 2.5 um [emissions to air, high. pop.]: 0.000309 kg; lognormal SD95 3.8
  (4,3,1,3,5,5); approximation with data from iron mining & lime treatment
- Mercury [emissions to water, river]: 1.85e-6 kg; lognormal SD95 5.9
  (4,3,1,3,5,5); approximation with data from iron mining & lime treatment
- COD, Chemical Oxygen Demand [emissions to water, river]: 0.0277 kg; lognormal SD95 2.3
  (4,3,1,3,5,5); approximation with data from iron mining & lime treatment
- Particulates, > 10 um [emissions to air, high. pop.]: 0.00298 kg; lognormal SD95 2.3
  (4,3,1,3,5,5); approximation with data from iron mining & lime treatment
- Lead [emissions to water, river]: 3.7e-5 kg; lognormal SD95 5.9
  (4,3,1,3,5,5); approximation with data from iron mining & lime treatment
- Heat, waste [emissions to air, high. pop.]: 0.745 MJ; lognormal SD95 2.1
  (4,3,1,3,5,5); approximation with data from iron mining & lime treatment
- Nickel [emissions to water, river]: 9.24e-5 kg; lognormal SD95 5.9
  (4,3,1,3,5,5); approximation with data from iron mining & lime treatment
- Zinc [emissions to water, river]: 0.00037 kg; lognormal SD95 5.9
  (4,3,1,3,5,5); approximation with data from iron mining & lime treatment
- NMVOC, non-methane volatile organic compounds, unspecified origin [emissions to air, high. pop.]: 4.55e-5 kg; lognormal SD95 2.3
  (4,3,1,3,5,5); approximation with data from iron mining & lime treatment
- Iron [emissions to water, river]: 0.000647 kg; lognormal SD95 5.9
  (4,3,1,3,5,5); approximation with data from iron mining & lime treatment
- Particulates, > 2.5 um, and < 10um [emissions to air, high. pop.]: 0.0027 kg; lognormal SD95 2.8
  (4,3,1,3,5,5); approximation with data from iron mining & lime treatment
- Oils, unspecified [emissions to water, river]: 0.00185 kg; lognormal SD95 3.8
  (4,3,1,3,5,5); approximation with data from iron mining & lime treatment
- Nitrogen oxides [emissions to air, high. pop.]: 0.000336 kg; lognormal SD95 2.3
  (4,3,1,3,5,5); approximation with data from iron mining & lime treatment
- Cadmium [emissions to water, river]: 1.85e-5 kg; lognormal SD95 5.9
  (4,3,1,3,5,5); approximation with data from iron mining & lime treatment
- Carbon dioxide, fossil [emissions to air, high. pop.]: 0.909 kg; lognormal SD95 2.1
  (4,3,1,3,5,5); approximation with data from iron mining & lime treatment
- Copper [emissions to water, river]: 9.24e-5 kg; lognormal SD95 5.9
  (4,3,1,3,5,5); approximation with data from iron mining & lime treatment
- Carbon monoxide, fossil [emissions to air, high. pop.]: 0.00477 kg; lognormal SD95 5.9
  (4,3,1,3,5,5); approximation with data from iron mining & lime treatment
- Water [emissions to water, unspecified]: 2.4985, 0.05382 kg (2 entries); lognormal SD95 2.5196
  (5,5,5,5,5,BU:1.05); All uncertainty-values set to 5.0 by default. Balance of input water

## Extrapolations
see technology

## Sources
- Hischier R., 2007, 2007 - LCI packagings and graphical papers - Hischier, Final report ecoinvent data v2.0, 11, Swiss Centre for LCI, Empa - TSL, Duebendorf and St. Gallen, CH
Hischier R. (2007) Life Cycle Inventories of Packaging and Graphical Paper. Final report ecoinvent data v2.0. Volume: 11. Swiss Centre for LCI, Empa - TSL. Dübendorf, CH.
Type: Measurement on site
Source: CD-ROM
First author: Hischier R.
Year: 2007
Title of anthology: Final report ecoinvent data v2.0
Place of publication: Dübendorf, CH
Publisher: Swiss Centre for LCI, Empa - TSL
Volume No: 11

## Validation
Proof reading validation: passed; Other validation: none;
