# Electrolyzer production, 1MWe, PEM, Stack

Dataset: EcoSpold 1, unit process
Functional unit: 1 p
Category: fuels / synthetic\infrastructure
Geography: RER
Time period: 2024-01 to 2024-01
Generated by: Romain Sacchi
accessRestrictedTo: 0
copyright: true

## General comment
1 MW PEM electrolyzer stack based on Niklas Gerloff, Comparative Life-Cycle-Assessment analysis of three major water electrolysis technologies while applying various energy scenarios for a greener hydrogen production, Journal of Energy Storage, Volume 43, 2021, https://doi.org/10.1/j.est0.20.1. Lifetime of 45'000 hours per single stack, @ 8000 hours/year. Iridium mining process is NOT from ecoinvent. Produced amount of H2 over 20 years: 2,963,000 kg. In comparison to AEC electrolyzers, PEMEC electrolyzers are less mature. Furthermore, the PEMEC technology is commercially available and operates with a similar system efficiency as the AEC technology. However, the current density and the gas purity are higher with values in between 0.6–2.0 A/cm2 and > 99.99%, respectively. Besides this, the operating pressure (below 200 bar) is significantly higher in comparison to AEC systems, while the operating temperature (50 °C to 80 °C) and the system energy (4.2–6.6 kWh/m3H2) are similar to AEC systems. The PEMEC BoP and stack components data stem from Bareiß et al. and correspond to a 1 MW system. Moreover, some further BoP components like water purifier & feed tank, buffer tank, and heat exchanger have been added, derived from a 300 kW AEC system, under the assumption that the components are also suitable for a PEMEC system. The values have been scaled up from 300 kW to 1 MW. Stack lifetime: 5.5 years @ 8,000 hours per year. Replaced 3 times over system´s lifetime (20 years). For additional specifications, refer to Sacchi, R. and Bauer, C. LCA of Power-to-X processes and applications in the residential sector. Paul Scherrer Institut, 2023.

## Reference product
- Electrolyzer production, 1MWe, PEM, Stack [RER]: 1 p
  not defined

## Inputs from technosphere
- Electricity, low voltage, production GLO, at grid [GLO]: 311700 kWh; lognormal SD95 1.329
  assembly energy {2;4;1;3;3;5;1.05;}
- Platinum, at regional storage [RER]: 0.075 kg; lognormal SD95 1.329
  electrocatalyst cathode {2;4;1;3;3;5;1.05;}
- Copper, primary, at refinery [GLO]: 4.5 kg; lognormal SD95 1.329
  current collector {2;4;1;3;3;5;1.05;}
- Sheet rolling, aluminium [RER]: 27 kg; lognormal SD95 1.329
  end plate {2;4;1;3;3;5;1.05;}
- Iridium production [GLO]: 0.8 kg; lognormal SD95 1.329
  electrocatalyst anode {2;4;1;3;3;5;1.05;}
- Transport, barge tanker [RER]: 54.93 tkm; lognormal SD95 2.208
  Generic transport distances calculated based on Table 4.2 of the ecoinvent v.2 Methodology report. Distribution: 137.32 kg over 400.0 km.
- Chromium steel 18/8, at plant [RER]: 100 kg; lognormal SD95 1.329
  bolts and screws {2;4;1;3;3;5;1.05;}
- Sheet rolling, chromium steel [RER]: 4.5 kg; lognormal SD95 1.329
  current collector {2;4;1;3;3;5;1.05;}
- Aluminium, production mix, wrought alloy, at plant [RER]: 27 kg; lognormal SD95 1.329
  end plate {2;4;1;3;3;5;1.05;}
- Synthetic rubber, at plant [RER]: 4.8 kg; lognormal SD95 1.329
  gasket {2;4;1;3;3;5;1.05;}
- Transport, freight, lorry, 16t-32t gross weight, fleet average [RER]: 130.3 tkm; lognormal SD95 2.208
  Generic transport distances calculated based on Table 4.2 of the ecoinvent v.2 Methodology report. Distribution: 72.42 kg over 1800.0 km.
- Titanium zinc plate, without pre-weathering, at plant [DE]: 528 kg; lognormal SD95 1.329
  bipolar plate {2;4;1;3;3;5;1.05;}
- Transport, freight, rail [RER]: 31.78 tkm; lognormal SD95 2.208
  Generic transport distances calculated based on Table 4.2 of the ecoinvent v.2 Methodology report. Distribution: 15.89 kg over 2000.0 km.
- Carbon black, at plant [GLO]: 4.5 kg; lognormal SD95 1.329
  electrocatalyst anode {2;4;1;3;3;5;1.05;}
- Tetrafluoroethylene, at plant [RER]: 16 kg; lognormal SD95 1.329
  membrane polymer {2;4;1;3;3;5;1.05;}
- Carbon black, at plant [GLO]: 4.5 kg; lognormal SD95 1.329
  electrocatalyst cathode {2;4;1;3;3;5;1.05;}
- Sheet rolling, chromium steel [RER]: 100 kg; lognormal SD95 1.329
  bolts and screws {2;4;1;3;3;5;1.05;}

## Inputs from nature
- Iridium [resources, in ground]: 0.8 kg; lognormal SD95 1.637
  {2;4;1;3;3;5;1.5;}

## Sampling procedure
Sampling procedure: Literature data

## Sources
- Sacchi R., Bauer C., 2024, 2024 - LCA power-to-X in residential sector - Sacchi, Project report, PSI, Villigen, CH

## Validation
Proof reading validation: Passed, Other validation: none, Validator: Rolf Frischknecht, Telephone: 0041 44 940 61 91, E-mail: frischknecht@treeze.ch, Company: treeze, Country: CH
