# Lead concentrate, at beneficiation

Dataset: EcoSpold 1, unit process
Functional unit: 1 kg
Category: metals / non ferro
Geography: GLO
Time period: 1994-01 to 2003-12
Generated by: Mischa Classen
accessRestrictedTo: 0
copyright: true

## General comment
The module describes the global production mix for jointly produced zinc- and lead-concentrates from sulphidic deposits. The multioutput-process “exploitation, zinc-lead-deposit” delivers the three co-products “lead, concentrate, at beneficiation” and “zinc, concentrate, at beneficiation”. It is designed for the use of the concentrates as raw material for the ultimate production of lead and zinc.;

## Included processes
The module includes the mining and the beneficiation step with the mining infrastructure and disposal of overburden and tailings (see part "Auxiliary Processes").

## Geography
This module represents a global production mix. Some agents used like lime or sodium cyanide originate from data sets valid for Switzerland or Europe. Processes like blasting and transport originate from data sets valid for Switzerland or Europe.

## Technology
This module is approximated with values from nickel-mining. Mining is assumed to be underground, followed by froth beneficiation. Overburden and tailings are disposed inside the mining panels. For electricity mix a mix of 25% coal and 75% gas fired plants was chosen.

## Reference product
- Lead concentrate, at beneficiation [GLO]: 1 kg
  Global

## Inputs from technosphere
- Hydrogen cyanide, at plant [RER]: 0.00011384 kg; lognormal SD95 2
  reported values
- Portland calcareous cement, at plant [CH]: 0.12347 kg; lognormal SD95 1.5276
  (2,2,2,1,4,4,4)
- Chemicals organic, at plant [GLO]: 0.00073442 kg; lognormal SD95 2
  reported values
- Chemicals inorganic, at plant [GLO]: 0.0025029 kg; lognormal SD95 2
  reported values
- Transport, freight, lorry, fleet average [RER]: 0.16999 tkm; lognormal SD95 2.1096
  (4,2,2,1,3,4,5)
- Limestone, milled, packed, at plant [CH]: 0.0018029 kg; lognormal SD95 2
  reported values
- Diesel, burned in building machine, average [CH]: 0.38251 MJ; lognormal SD95 1.5276
  (2,2,2,1,4,4,4)
- Electricity, natural gas, at power plant [US]: 0.096662 kWh; lognormal SD95 1.8307
  (5,2,2,1,4,5,2)
- Disposal, sulfidic tailings, off-site [GLO]: 3.18764 kg; lognormal SD95 1.5276
  (2,2,2,1,4,4,6)
- Non-ferrous metal mine, underground [GLO]: 1.6263e-10 p; lognormal SD95 3.3171
  (5,5,1,1,1,5,9)
- Electricity, hard coal, at power plant [US]: 0.032222 kWh; lognormal SD95 1.8307
  (5,2,2,1,4,5,2)
- Conveyor belt, at plant [RER]: 1.096e-7 m; lognormal SD95 1.325
  (4,2,2,1,3,4,4)
- Sand, at mine [CH]: 1.55379 kg; lognormal SD95 1.5276
  (2,2,2,1,4,4,4)
- Blasting [RER]: 0.0085489 kg; lognormal SD95 1.5276
  (2,2,2,1,4,4,4)

## Inputs from nature
- Water, well [resources, in water]: 0.0068176 m3; lognormal SD95 1.5276
  (2,2,2,1,4,4,12)
- Lead [resources, in ground]: 0.57895 kg; lognormal SD95 1.582
  (4,2,2,1,4,4,12)
- Silver, 0.007% in sulfide, Ag 0.004%, Pb, Zn, Cd, In [resources, in ground]: 0.0008444 kg; lognormal SD95 1.582
  (4,2,2,1,4,4,12)
- Water, river [resources, in water]: 0.0019039 m3; lognormal SD95 1.5276
  (2,2,2,1,4,4,12)

## Emissions to nature
- Copper [emissions to water, river]: 5.3951e-8 kg; lognormal SD95 10
  reported values
- Chromium [emissions to water, river]: 3.7291e-9 kg; lognormal SD95 10
  reported values
- Calcium [emissions to water, river]: 0.0046774 kg; lognormal SD95 10
  reported values
- Cadmium [emissions to air, low. pop.]: 3.3084e-7 kg; lognormal SD95 1.592
  (3,2,1,1,3,4,31)
- Heat, waste [emissions to air, low. pop.]: 0.46399 MJ; lognormal SD95 1.8307
  same as electricity consumption
- Carbon disulfide [emissions to air, low. pop.]: 0.00032512 kg; lognormal SD95 2.2626
  (2,2,2,5,4,4,23)
- COD, Chemical Oxygen Demand [emissions to water, river]: 7.1047e-5 kg; lognormal SD95 10
  reported values
- Carbon dioxide, fossil [emissions to air, low. pop.]: 0.00079329 kg; lognormal SD95 2
  same value as for lime
- Suspended solids, unspecified [emissions to water, river]: 3.5246e-5 kg; lognormal SD95 10
  reported values
- Manganese [emissions to water, river]: 1.6819e-7 kg; lognormal SD95 10
  reported values
- Zinc [emissions to water, river]: 5.1721e-7 kg; lognormal SD95 10
  reported values
- Particulates, < 2.5 um [emissions to air, low. pop.]: 0.00016822 kg; lognormal SD95 2.3052
  (4,2,2,5,4,4,23)
- Aluminium [emissions to water, river]: 5.8862e-7 kg; lognormal SD95 10
  reported values
- Sulfate [emissions to water, river]: 0.01607 kg; lognormal SD95 10
  reported values
- Nitrogen, organic bound [emissions to water, river]: 0.00015515 kg; lognormal SD95 10
  reported values
- Mercury [emissions to water, river]: 2.5686e-10 kg; lognormal SD95 10
  reported values
- Lead [emissions to air, low. pop.]: 1.6543e-5 kg; lognormal SD95 1.592
  (3,2,1,1,3,4,31)
- Particulates, > 10 um [emissions to air, low. pop.]: 1.6263e-5 kg; lognormal SD95 2.6904
  (3,2,1,1,5,4,19)
- Lead [emissions to water, river]: 1.9073e-8 kg; lognormal SD95 10
  reported values
- Cyanide [emissions to water, river]: 1.2183e-5 kg; lognormal SD95 1.7945
  (2,2,2,3,4,4,33)
- Particulates, > 2.5 um, and < 10um [emissions to air, low. pop.]: 0.00014637 kg; lognormal SD95 3.6918
  (3,2,1,1,5,4,20)
- Nickel [emissions to water, river]: 1.6597e-7 kg; lognormal SD95 10
  reported values
- Arsenic [emissions to water, river]: 2.0111e-8 kg; lognormal SD95 10
  reported values
- Cadmium [emissions to water, river]: 2.1544e-9 kg; lognormal SD95 10
  reported values
- Cobalt [emissions to water, river]: 5.3277e-9 kg; lognormal SD95 10
  reported values
- Iron [emissions to water, river]: 1.9813e-6 kg; lognormal SD95 10
  reported values
- Zinc [emissions to air, low. pop.]: 2.9776e-5 kg; lognormal SD95 1.592
  (3,2,1,1,3,4,31)
- Water [emissions to water, unspecified]: 6.13584, 1.80871 kg (2 entries); lognormal SD95 2.5196
  (5,5,5,5,5,BU:1.05); All uncertainty-values set to 5.0 by default. Balance of input water

## Sampling procedure
literature

## Extrapolations
see Geography and Technology

## Sources
- Classen M., Althaus H.-J., Blaser S., Scharnhorst W., Tuchschmid M., Jungbluth N., Faist Emmenegger M., 2009, 2009 - LCI metals - Classen, Final report ecoinvent data v2.1, 10, Swiss Centre for LCI, Empa, ESU-services Ltd., Duebendorf, CH
Classen M., Althaus H.-J., Blaser S., Doka G., Jungbluth N., Tuchschmid M. (2008) Life Cycle Inventories of Metals. Final report ecoinvent data v2.1. Volume: 10. Issue: 0. Swiss Centre for LCI, Empa - TSL. Dübendorf, CH.
Type: Measurement on site
Source: CD-ROM
First author: Classen M.
Other authors: Althaus H.-J., Blaser S., Doka G., Jungbluth N., Tuchschmid M.
Year: 2008
Title of anthology: Final report ecoinvent data v2.1
Place of publication: Dübendorf, CH
Publisher: Swiss Centre for LCI, Empa - TSL
Volume No: 10
Issue No: 0

## Validation
Proof reading validation: Passed; Other validation: none;
