# Solar collector glass tube, with silver mirror, at plant

Dataset: EcoSpold 1, unit process
Functional unit: 1 kg
Category: glass / construction
Geography: DE
Time period: 2000-01 to 2001-12
Production volume: 250 t/a.
Generated by: Niels Jungbluth
accessRestrictedTo: 0
copyright: true

## General comment
Production of solar collector tubes.;
Synonyms: glass evacuated tube, magnetron sputtering, Internal Circular Reflector, Vakuumröhrenkollektor;

## Included processes
Gate to gate inventory for the manufacturing of collector tubes from glass tubes including a sputter coating with a selective coating and a mirror layer. Infrastructure considered for the pre-product.

## Technology
Sputtering and coating of glass.

## Time period
Data for a few month of production.

## Reference product
- Solar collector glass tube, with silver mirror, at plant [DE]: 1 kg
  GERMANY

## Inputs from technosphere
- EUR-flat pallet [RER]: 3.37e-5 p; lognormal SD95 1.22
  (2,2,1,3,1,5); Wood palette packaging
- Chemicals organic, at plant [GLO]: 0.0008 kg; lognormal SD95 1.57
  (2,2,1,3,4,5); Other chemicals
- Chromium steel 18/8, at plant [RER]: 0.026 kg; lognormal SD95 1.22
  (2,2,1,3,1,5); Steel parts of the tube.
- Transport, freight, rail [RER]: 0.633 tkm; lognormal SD95 2.1
  (4,5,na,na,na,na); Standard distance 600 km for other materials
- Transport, freight, lorry, fleet average [RER]: 0.116 tkm; lognormal SD95 2.05
  (2,2,1,3,1,5); Real distances for materials and waste reported in a questionnaire, 100 km for other materials
- Disposal, hazardous waste, 25% water, to hazardous waste incineration [CH]: 0.016 kg; lognormal SD95 1.22
  (2,2,1,3,1,5); Concentrated solvents
- Xenon, gaseous, at regional storage [CH]: 0.00389 kg; lognormal SD95 1.57
  (5,2,1,3,1,5); Xenon filling of the tube, 1bar, own calculation
- Aluminium, production mix, at plant [RER]: 0.0028 kg; lognormal SD95 1.31
  (2,2,1,3,3,5); Coating agents
- Disposal, glass, 0% water, to construction waste landfill [CH]: 0.048 kg; lognormal SD95 1.22
  (2,2,1,3,1,5); Glass used as sealing material
- Treatment, tube collector production effluent, to wastewater treatment, class 2 [CH]: 0.00312 m3; lognormal SD95 1.22
  (2,2,1,3,1,5); Questionnaire
- Tap water, at user [RER]: 3.12 kg; lognormal SD95 1.22
  (2,2,1,3,1,5); Questionnaire
- Natural gas, burned in industrial furnace 1MW [CH]: 1.16 MJ; lognormal SD95 1.22
  (2,2,1,3,1,5); Gasburner with open flame, no gas treatment.
- Electricity, medium voltage, at grid [DE]: 1.12 kWh; lognormal SD95 1.22
  (2,2,1,3,1,5); Questionnaire
- Hydrochloric acid, 30% in H2O, at plant [RER]: 0.008 kg; lognormal SD95 1.22
  (2,2,1,3,1,5); Questionnaire
- Disposal, municipal solid waste, 22.9% water, to municipal incineration [CH]: 0.002 kg; lognormal SD95 1.22
  (2,2,1,3,1,5); Questionnaire
- Glass tube, borosilicate, at plant [DE]: 1.05 kg; lognormal SD95 1.22
  (2,2,1,3,1,5); Glass wastes added.

## Emissions to nature
- Heat, waste [emissions to air, high. pop.]: 4.03 MJ; lognormal SD95 1.47
  (2,2,1,3,1,5); Calculation

## Sampling procedure
Questionnaire.

## Extrapolations
Partly based on estimations.

## Sources
- Kellenberger D., Althaus H.-J., Jungbluth N., Kuenniger T., Lehmann M., Thalmann P., 2007, 2007 - LCI building products - Kellenberger, Final report ecoinvent data v2.0, 7, Swiss Centre for LCI, Empa - TSL, ESU-services Ltd., Bau- und Umweltchimie, Duebendorf, CH
Kellenberger D., Althaus H.-J., Jungbluth N., Künniger T. (2007) Life Cycle Inventories of Building Products. Final report ecoinvent data v2.0. Volume: 7. Swiss Centre for LCI, Empa - TSL. Dübendorf, CH.
Type: Measurement on site
Source: CD-ROM
First author: Kellenberger D.
Other authors: Althaus H.-J., Jungbluth N., Künniger T.
Year: 2007
Title of anthology: Final report ecoinvent data v2.0
Place of publication: Dübendorf, CH
Publisher: Swiss Centre for LCI, Empa - TSL
Volume No: 7

## Validation
Proof reading validation: Passed.; Other validation: none;
