# Float glass, at plant

Dataset: EcoSpold 1, unit process
Functional unit: 1 kg
Category: construction materials / glazing
Geography: RER
Time period: 2000-01 to 2016-12
Generated by: Matthias Klingler
accessRestrictedTo: 0
copyright: true

## General comment
Flachglas ab Werk, gemäss LCA Float Glass, Glass for Europe 2011 ergänzt mit Daten für Durchschnittstransporte und Infrastruktur bezogen auf 1kg Flachglas.
Technology: Current technology in Europe
Time period: Daten von Glass for Europe von 25 Werken von insgesamt 3 Herstellern, Datenerhebung aus dem Jahr 2005. Gemäss dem Bericht produzieren die untersuchten Werke ca. 50% des Float Glass in Europa.
Version: 0.0

Local category: construction materials
Local subcategory: Verglasungen

## Technology
Current technology in Europe

## Reference product
- Float glass, at plant [RER]: 1 kg
  Europe

## Inputs from technosphere
- Limestone, milled, packed, at plant [CH]: 0.04 kg; lognormal SD95 1.12997
  (1;2;2;2;1)
- Dolomite, at plant [RER]: 0.17 kg; lognormal SD95 1.12997
  (1;2;2;2;1)
- Transport, freight, rail [RER]: 0.0161143 tkm; lognormal SD95 4.02002
  (2;2;2;2;1)
- Sodium chloride, powder, at plant [RER]: 5.4e-5 kg; lognormal SD95 1.12997
  (1;2;2;2;1)
- Disposal, municipal solid waste, 22.9% water, to municipal incineration [CH]: 0.00586, 0.00967 kg (2 entries); lognormal SD95 1.12997
  (1;2;2;2;1)
- Sodium sulphate, powder, production mix, at plant [RER]: 0.01 kg; lognormal SD95 1.12997
  (1;2;2;2;1)
- Soda, powder, at plant [RER]: 0.2 kg; lognormal SD95 1.12997
  (1;2;2;2;1)
- Hydrogen, liquid, at plant [RER]: 0.000367 kg; lognormal SD95 1.12997
  (1;2;2;2;1)
- Electricity, medium voltage, production ENTSO-E, at grid: 0.2222 kWh; lognormal SD95 1.12997
  (1;2;2;2;1)
- Glass cullets, sorted, at sorting plant [RER]: 0.04 kg; lognormal SD95 1.12997
  (1;2;2;2;1)
- Heavy fuel oil, at regional storage [RER]: 0.0496454 kg; lognormal SD95 1.12997
  (1;2;2;2;1)
- Disposal, inert waste, 5% water, to construction waste landfill [CH]: 0.00474, 0.0037 kg (2 entries); lognormal SD95 1.12997
  (1;2;2;2;1)
- Silica sand, at plant [DE]: 0.65 kg; lognormal SD95 1.12997
  (1;2;2;2;1)
- Disposal, hazardous waste, 25% water, to hazardous waste incineration [CH]: 0.00111 kg; lognormal SD95 1.12997
  (1;2;2;2;1)
- Hard coal, at regional storage [WEU]: 7.53e-5 kg; lognormal SD95 1.12997
  (1;2;2;2;1)
- Transport, freight, lorry, fleet average [RER]: 0.0612503 tkm; lognormal SD95 4.02002
  (2;2;2;2;1)
- Nitrogen, liquid, at plant [RER]: 0.09 kg; lognormal SD95 1.12997
  (1;2;2;2;1)
- Treatment, sewage, to wastewater treatment, class 2 [CH]: 0.00077 m3; lognormal SD95 1.12997
  (1;2;2;2;1)
- Natural gas, high pressure, at consumer [RER]: 6.1 MJ; lognormal SD95 1.12997
  (1;2;2;2;1)
- Feldspar, at plant [RER]: 0.00438 kg; lognormal SD95 1.12997
  (1;2;2;2;1)
- Oxygen, liquid, at plant [RER]: 0.01 kg; lognormal SD95 1.12997
  (1;2;2;2;1)
- Flat glass plant [RER]: 2.41e-10 p; lognormal SD95 9.44948
  (3;3;3;3;3)

## Inputs from nature
- Water, cooling, unspecified natural origin/m3 [resources, in water]: 1.44 m3; lognormal SD95 1.12997
  (1;2;2;2;1)

## Emissions to nature
- Suspended solids, unspecified [emissions to water, unspecified]: 0.01, 3.48e-5 kg (2 entries); lognormal SD95 2.27105
  (2;2;2;2;1)
- Nickel [emissions to water, unspecified]: 1e-7 kg; lognormal SD95 2.27105
  (2;2;2;2;1)
- Chloride [emissions to water, unspecified]: 2.93e-5 kg; lognormal SD95 2.27105
  (2;2;2;2;1)
- Hydrogen fluoride [emissions to air, unspecified]: 1.15e-5 kg; lognormal SD95 25.06
  (2;2;2;2;1)
- Sulfur dioxide [emissions to air, unspecified]: 0.0026 kg; lognormal SD95 25.06
  (2;2;2;2;1)
- Oils, unspecified [emissions to water, unspecified]: 3e-7 kg; lognormal SD95 2.27105
  (2;2;2;2;1)
- Nitrogen [emissions to water, unspecified]: 5.2e-6 kg; lognormal SD95 2.27105
  (2;2;2;2;1)
- Nitrogen dioxide [emissions to air, unspecified]: 0.000222 kg; lognormal SD95 25.06
  (2;2;2;2;1)
- Nitrogen oxides [emissions to air, unspecified]: 0.00421 kg; lognormal SD95 25.06
  (2;2;2;2;1)
- Chromium [emissions to air, unspecified]: 1e-7 kg; lognormal SD95 25.06
  (2;2;2;2;1)
- Lead [emissions to air, unspecified]: 3e-7 kg; lognormal SD95 25.06
  (2;2;2;2;1)
- Hydrogen chloride [emissions to air, unspecified]: 7.53e-5 kg; lognormal SD95 25.06
  (2;2;2;2;1)
- Particulates, unspecified [emissions to air, unspecified]: 0.0003 kg; lognormal SD95 25.06
  (2;2;2;2;1)
- Nickel [emissions to air, unspecified]: 4e-7 kg; lognormal SD95 25.06
  (2;2;2;2;1)
- COD, Chemical Oxygen Demand [emissions to water, unspecified]: 8.7e-5 kg; lognormal SD95 2.27105
  (2;2;2;2;1)
- Carbon dioxide, fossil [emissions to air, unspecified]: 0.7 kg; lognormal SD95 1.12997
  (2;2;2;2;1)
- NMVOC, non-methane volatile organic compounds, unspecified origin [emissions to air, unspecified]: 2.8e-6 kg; lognormal SD95 25.06
  (2;2;2;2;1)
- Phosphorus [emissions to water, unspecified]: 7e-7 kg; lognormal SD95 2.27105
  (2;2;2;2;1)
- Carbon monoxide, fossil [emissions to air, unspecified]: 0.00036 kg; lognormal SD95 1.12997
  (2;2;2;2;1)
- BOD5, Biological Oxygen Demand [emissions to water, unspecified]: 1.63e-5 kg; lognormal SD95 2.27105
  (2;2;2;2;1)
- Zinc [emissions to water, unspecified]: 5e-7 kg; lognormal SD95 2.27105
  (2;2;2;2;1)
- Water [emissions to water, unspecified]: 1368 kg; lognormal SD95 2.5196
  (5,5,5,5,5,BU:1.05); All uncertainty-values set to 5.0 by default. Balance of input water

## Sources
- Usbeck V.C., Pflieger J., Tianyin S., 2011, 2011 - LCA float glass - Usbeck, -, PE International, Leinfelden-Echterdingen, DE
Pflieger, J. et al. (2011Z) no title. unknown.

Source: Life Cycle Assessment of Float Glass, Glass for Europe, PE International
First author: Pflieger, J. et al.
Year: 2011Z
Place of publication: unknown
