# Disposal, packaging paper, 13.7% water, to municipal incineration

Dataset: EcoSpold 1, unit process
Functional unit: 1 kg
Category: waste management / municipal incineration
Geography: CH
Time period: 2000-01 to 2000-12
Generated by: Gabor Doka
accessRestrictedTo: 0
copyright: true

## General comment
This dataset represents the activity of waste disposal of waste packaging paper in a municipal solid waste incinerator (MSWI) Recommended use of this dataset: For packaging paper, which goes to disposal as part of communal waste mixture. Larger amounts of separated packaging paper will likely not be disposed in incinerators or landfills, but rather go to recycling. Waste composition (wet, in ppm): upper heating value 16.77 MJ/kg; lower heating value 14.12 MJ/kg; H2O 110980; O 377790; H 53851; C 403520; S 1381.8; N 4098.6; P 124.15; B 19.101; Cl 1892.4; Br n.a.; F 21.631; I n.a.; Ag n.a.; As 2.2761; Ba 125.43; Cd 1.8323; Co 0.71627; Cr 14.922; Cu 64.327; Hg 0.14537; Mn 39.49; Mo 4.7751; Ni 10.235; Pb 79.273; Sb 0.7879; Se 2.8651; Sn n.a.; V n.a.; Zn 132.49; Be 1.0824; Sc n.a.; Sr 64.751; Ti 191.01; Tl 1.9101; W n.a.; Si 21297; Fe 1305; Ca 3820.1; Al 12415; K 955.03; Mg 4775.1; Na 1020.9; Share of carbon in waste that is biogenic 100%. Share of metals in waste not oxidised and bulk-recyclable (exclude very small or thin parts) Iron: 0%; Alu: 0%; Copper: 0%. One kg of this waste produces 0.09872 kg of slag and 0.01674 kg of residues, which are landfilled. Additional solidification with 0.006697 kg of cement. Net energy production: 1.74MJ/kg electric energy and 3.49MJ/kg thermal energy. Recovery of metal scrap to recycling: 0g iron scrap, 0g aluminium scrap, 0g copper scrap.;;

## Included processes
Waste incineration from waste reception gate further downstream (excluding transport to the MSWI plant). Waste-specific air and water emisions from incineration, auxiliary material consumption for flue gas cleaning. Short-term emissions to river water and long-term emisisons to ground water from slag compartment (from bottom ash) and residual material landfill (from solidified fly ashes and scrubber slugde). Waste-specific process energy demands for MSWI and net energy generation.

## Geography
Specific to the technology mix encountered in Switzerland in 2010. Well applicable to modern incineration practices in Europe, North America or Japan.

## Technology
average Swiss MSWI plants in 2010 (grate incinerators) with electrostatic precipitator for fly ash (ESP), wet flue gas scrubber and 25% SNCR , 42.77% SCR-high dust , 32.68% SCR-low dust -DeNOx facilities and 0% without Denox (weighted according to mass of burnt waste, representing Swiss average). Efficiency of iron scrap separation from slag : 58%. Efficiency of non-ferrous scrap separation from slag : 31%. Gross electric efficiency technology mix 15.84% and Gross thermal efficiency technology mix 28.51%

## Time period
Waste composition as given in literature reference, theoretical data or other source. Transfer coefficients for modern MSWI.

## Reference product
- Disposal, packaging paper, 13.7% water, to municipal incineration [CH]: 1 kg
  SWITZERLAND

## Inputs from technosphere
- Quicklime, milled, packed, at plant [CH]: 0.0010195 kg; lognormal SD95 4.4928
  auxilliary inputs for the flue gas treatment stage of the incinerator plant. uncertainty calculated from uncertainty in average CaO input, of transfer coefficients in the incinerator, and the uncertainty of the waste composition of this waste
- Municipal waste incineration plant [CH]: 2.5e-10 p; lognormal SD95 1
  demands per kilogram waste. uncertainty is heeded in the module
- Disposal, cement, hydrated, 0% water, to residual material landfill [CH]: 0.016742 kg; lognormal SD95 1.3863
  Hydrated cement output for solidification of landfilled residual material. Uncertainty calculated from uncertainty of the waste composition of this waste and transfer coefficients in the incinerator and of the solidification recipe.
- Slag compartment [CH]: 1.7406e-10 p; lognormal SD95 1.4049
  landfill infrastructure required for landfilling of bottom ash. uncertainty is calculated from uncertainties in waste composition and transfer coefficients in incinerator
- Natural gas, burned in industrial furnace 1MW [CH]: 0.15526 MJ; lognormal SD95 5.287
  Input to DeNOx stage, to heat up flue gas in low-dust SCR. uncertainty calculated from uncertainty in average DeNOx input, uncertainty in the share of thermal NOx, uncertainty of nitrogen content in average municipal waste and the uncertainty in nitrogen content in *this* waste.
- Chemicals organic, at plant [GLO]: 2.8886e-6 kg; lognormal SD95 12.311
  auxilliary inputs for the wastewater treatment stage of the incinerator plant. Proxy for (pure) Trisodium-trimercapto-s-triazine (CAS 17766-26-6), used as 15% diluted solution, aka TMT15. uncertainty calculated from uncertainty in average TMT15 input, of transfer coefficients in the incinerator, and the uncertainty of the waste composition of this waste
- Ammonia, liquid, at regional storehouse [CH]: 0.00083029 kg; lognormal SD95 5.287
  Input to DeNOx stage (100% NH3). uncertainty calculated from uncertainty in average DeNOx input, uncertainty in the share of thermal NOx, uncertainty of nitrogen content in average municipal waste and the uncertainty in nitrogen content in *this* waste.
- Hydrochloric acid, 30% in H2O, at plant [RER]: 2.3075e-5 kg; lognormal SD95 2.626
  auxilliary inputs for the wastewater treatment stage of the incinerator plant. uncertainty calculated from uncertainty in average HCl input, of transfer coefficients in the incinerator, and the uncertainty of the waste composition of this waste
- Water, decarbonised, at plant [RER]: 0.55977 kg; lognormal SD95 3.5745
  Incinerator process water used in flue gas scrubber stage. uncertainty calculated from uncertainty in average water input, and the uncertainty of the waste composition of this waste
- Chemicals inorganic, at plant [GLO]: 8.7791e-5 kg; lognormal SD95 2.626
  auxilliary inputs for the wastewater treatment stage of the incinerator plant. Proxy for Polyelectrolyte. uncertainty calculated from uncertainty in average Polyelectrolyte input, of transfer coefficients in the incinerator, and the uncertainty of the waste composition of this waste
- Process-specific burdens, slag compartment [CH]: 0.097907 kg; lognormal SD95 1.4049
  mass-specific expenditures required for landfilling of bottom ash. uncertainty is calculated from uncertainties in waste composition and transfer coefficients in incinerator
- Titanium dioxide, production mix, at plant [RER]: 5.2019e-5 kg; lognormal SD95 7.6979
  Input to DeNOx stage (TiO2 catalyst carrier) uncertainty calculated from uncertainty in average DeNOx input, uncertainty in the share of thermal NOx, uncertainty of nitrogen content in average municipal waste and the uncertainty in nitrogen content in *this* waste.
- Transport, freight, lorry, 16t-32t gross weight, fleet average [CH]: 0.0089336 tkm; lognormal SD95 1.2188
  Transport services to transport incineration residues to landfills and to transport auxilliary inputs of the incinerator plant. uncertainty calculated from uncertainty in average auxiliary material input, the uncertainty of the waste composition of this waste and the uncertainty in generic transportation distances
- Process-specific burdens, residual material landfill [CH]: 0.016742 kg; lognormal SD95 1.3038
  mass-specific expenditures required for landfilling of incineration residues. uncertainty is calculated from uncertainties in waste composition and transfer coefficients in incinerator
- Residual material landfill facility [CH]: 3.488e-11 p; lognormal SD95 1.3038
  landfill infrastructure required for landfilling of incineration residues. uncertainty is calculated from uncertainties in waste composition and transfer coefficients in incinerator
- Iron (III) chloride, 40% in H2O, at plant [CH]: 1.9694e-5 kg; lognormal SD95 3.5745
  auxilliary inputs for the wastewater treatment stage of the incinerator plant. uncertainty calculated from uncertainty in average FeCl3 input, of transfer coefficients in the incinerator, and the uncertainty of the waste composition of this waste
- Sodium hydroxide, 50% in H2O, production mix, at plant [RER]: 0.00067245 kg; lognormal SD95 2.7102
  auxilliary inputs for the flue gas treatment stage of the incinerator plant. uncertainty calculated from uncertainty in average NaOH input, of transfer coefficients in the incinerator, and the uncertainty of the waste composition of this waste
- Transport, freight, rail [RER]: 0.0051596 tkm; lognormal SD95 1.2828
  (same comment as for Transport, freight, lorry, 16t-32t gross weight, fleet average)
- Chromium oxide, flakes, at plant [RER]: 1.0616e-6 kg; lognormal SD95 7.6979
  Input to DeNOx stage. uncertainty calculated from uncertainty in average DeNOx input, uncertainty in the share of thermal NOx, uncertainty of nitrogen content in average municipal waste and the uncertainty in nitrogen content in *this* waste.
- Cement, unspecified, at plant [CH]: 0.006697 kg; lognormal SD95 1.3863
  Cement required for solidification of landfilled residual material. Uncertainty calculated from uncertainty of the waste composition of this waste, of transfer coefficients in the incinerator and of the solidification recipe.

## Emissions to nature
- Phosphorus [emissions to air, high. pop.]: 1.2617e-7 kg; lognormal SD95 7.0225
  Emission to air from waste composition and transfer coefficients. uncertainty is calculated from uncertainties in waste composition and transfer coefficients in incinerator
- Boron [emissions to water, groundwater, long-term]: 1.6243e-5 kg; lognormal SD95 7.5665
  Long-term emissions from landfilling of incineration residues. uncertainty is calculated from uncertainties in waste composition and transfer coefficients in incinerator and landfills.
- Aluminium [emissions to water, river]: 1.3436e-6 kg; lognormal SD95 5.7583
  Emissions to water from waste composition and transfer coefficients in incinerator and landfills. uncertainty is calculated from uncertainties in waste composition and transfer coefficients in incinerator and landfills
- Aluminium [emissions to water, groundwater, long-term]: 0.0089782 kg; lognormal SD95 3.0333
  (same comment as for Boron)
- Beryllium [emissions to water, river]: 6.7791e-10 kg; lognormal SD95 17.826
  (same comment as for Aluminium)
- Iron [emissions to water, river]: 3.4308e-8 kg; lognormal SD95 6.6006
  (same comment as for Aluminium)
- Molybdenum [emissions to water, groundwater, long-term]: 3.4646e-6 kg; lognormal SD95 10.334
  (same comment as for Boron)
- NMVOC, non-methane volatile organic compounds, unspecified origin [emissions to air, high. pop.]: 1.4921e-6 kg; lognormal SD95 1.8433
  Incomplete combustion product emitted to air. uncertainty calculated from uncertainty in average operation emissions, and the uncertainty of the flue gas volume from this waste.
- Benzene, hexachloro- [emissions to air, high. pop.]: 6.8554e-11 kg; lognormal SD95 1.8433
  (same comment as for NMVOC, non-methane volatile organic compounds, unspecified origin)
- Cobalt [emissions to water, river]: 1.2977e-10 kg; lognormal SD95 15.585
  (same comment as for Aluminium)
- Carbon monoxide, biogenic [emissions to air, high. pop.]: 5.5733e-5 kg; lognormal SD95 6.1444
  (same comment as for NMVOC, non-methane volatile organic compounds, unspecified origin)
- Silicon [emissions to water, river]: 5.2216e-6 kg; lognormal SD95 4.6074
  (same comment as for Aluminium)
- Chromium VI [emissions to water, river]: 4.1705e-7 kg; lognormal SD95 9.6796
  (same comment as for Aluminium)
- Benzo(a)pyrene [emissions to air, high. pop.]: 7.2959e-13 kg; lognormal SD95 3.6866
  (same comment as for NMVOC, non-methane volatile organic compounds, unspecified origin)
- Heat, waste [emissions to water, river]: 3.0746 MJ; lognormal SD95 1.5743
  Waste heat generated from heating value of this waste plus any electricity required to process it. uncertainty is calculated from uncertainties in waste composition and uncertainties in energy efficiency and the uncertainty in internal energy demand
- Zinc [emissions to water, river]: 1.1954e-8 kg; lognormal SD95 5.7473
  (same comment as for Aluminium)
- Selenium [emissions to water, river]: 9.6788e-7 kg; lognormal SD95 8.4165
  (same comment as for Aluminium)
- Sulfur dioxide [emissions to air, high. pop.]: 1.4694e-5 kg; lognormal SD95 4.8756
  (same comment as for Phosphorus)
- Calcium [emissions to water, river]: 4.2291e-5 kg; lognormal SD95 3.4145
  (same comment as for Aluminium)
- Barium [emissions to water, groundwater, long-term]: 6.3167e-5 kg; lognormal SD95 20.458
  (same comment as for Boron)
- Magnesium [emissions to water, river]: 2.2281e-5 kg; lognormal SD95 5.0529
  (same comment as for Aluminium)
- Antimony [emissions to water, river]: 2.7156e-7 kg; lognormal SD95 12.503
  (same comment as for Aluminium)
- Cadmium [emissions to water, river]: 1.7562e-10 kg; lognormal SD95 9.2277
  (same comment as for Aluminium)
- Thallium [emissions to water, groundwater, long-term]: 1.1146e-6 kg; lognormal SD95 8.0874
  (same comment as for Boron)
- TOC, Total Organic Carbon [emissions to water, river]: 0.00020614 kg; lognormal SD95 1.53
  (same comment as for Aluminium)
- Zinc [emissions to water, groundwater, long-term]: 4.0291e-5 kg; lognormal SD95 32.785
  (same comment as for Boron)
- Selenium [emissions to water, groundwater, long-term]: 1.8609e-6 kg; lognormal SD95 7.707
  (same comment as for Boron)
- Lead [emissions to water, river]: 7.5829e-9 kg; lognormal SD95 6.2024
  (same comment as for Aluminium)
- Molybdenum [emissions to air, high. pop.]: 6.2831e-9 kg; lognormal SD95 10.498
  (same comment as for Phosphorus)
- Selenium [emissions to air, high. pop.]: 3.418e-8 kg; lognormal SD95 11.022
  (same comment as for Phosphorus)
- Toluene [emissions to air, high. pop.]: 6.5572e-8 kg; lognormal SD95 1.8433
  (same comment as for NMVOC, non-methane volatile organic compounds, unspecified origin)
- Thallium [emissions to water, river]: 1.1701e-9 kg; lognormal SD95 13.316
  (same comment as for Aluminium)
- Boron [emissions to water, river]: 1.4965e-7 kg; lognormal SD95 10.747
  (same comment as for Aluminium)
- Potassium [emissions to water, groundwater, long-term]: 0.00074242 kg; lognormal SD95 3.224
  (same comment as for Boron)
- Iron [emissions to water, groundwater, long-term]: 0.00065838 kg; lognormal SD95 5.9763
  (same comment as for Boron)
- Strontium [emissions to air, high. pop.]: 6.4751e-9 kg; lognormal SD95 7.7841
  (same comment as for Phosphorus)
- Arsenic [emissions to water, groundwater, long-term]: 6.8161e-7 kg; lognormal SD95 11.237
  (same comment as for Boron)
- Aluminium [emissions to air, high. pop.]: 1.0122e-8 kg; lognormal SD95 3.61
  (same comment as for Phosphorus)
- Nitrogen oxides [emissions to air, high. pop.]: 0.00030913 kg; lognormal SD95 5.6328
  sum of fuel-Nox and thermal-NOx emitted to air after DeNOx stage. uncertainty calculated from uncertainty in average N-emissions and uncertainty in the share of thermal NOx and the uncertainty in nitrogen content in *this* waste.
- Lead [emissions to air, high. pop.]: 6.5309e-9 kg; lognormal SD95 7.6176
  (same comment as for Phosphorus)
- Heat, waste [emissions to air, high. pop.]: 12.453 MJ; lognormal SD95 1.5743
  (same comment as for Heat, waste)
- Chromium VI [emissions to water, groundwater, long-term]: 1.3689e-6 kg; lognormal SD95 13.322
  (same comment as for Boron)
- Strontium [emissions to water, river]: 4.0769e-8 kg; lognormal SD95 13.898
  (same comment as for Aluminium)
- Arsenic [emissions to air, high. pop.]: 1.783e-8 kg; lognormal SD95 11.357
  (same comment as for Phosphorus)
- DOC, Dissolved Organic Carbon [emissions to water, groundwater, long-term]: 0.0011991 kg; lognormal SD95 1.3669
  (same comment as for Boron)
- Sulfate [emissions to water, river]: 0.00070097 kg; lognormal SD95 2.9184
  (same comment as for Aluminium)
- Magnesium [emissions to water, groundwater, long-term]: 0.0042288 kg; lognormal SD95 3.7693
  (same comment as for Boron)
- Nickel [emissions to air, high. pop.]: 1.2857e-8 kg; lognormal SD95 9.61
  (same comment as for Phosphorus)
- Methane, biogenic [emissions to air, high. pop.]: 4.9179e-7 kg; lognormal SD95 1.8433
  (same comment as for NMVOC, non-methane volatile organic compounds, unspecified origin)
- Fluoride [emissions to water, river]: 1.654e-6 kg; lognormal SD95 5.6233
  (same comment as for Aluminium)
- Thallium [emissions to air, high. pop.]: 1.9101e-9 kg; lognormal SD95 11.628
  (same comment as for Phosphorus)
- BOD5, Biological Oxygen Demand [emissions to water, groundwater, long-term]: 0.0009912 kg; lognormal SD95 1.3669
  (same comment as for Boron)
- Chromium [emissions to water, river]: 1.1587e-9 kg; lognormal SD95 9.3623
  (same comment as for Aluminium)
- Particulates, > 2.5 um, and < 10um [emissions to air, high. pop.]: 1.967e-8 kg; lognormal SD95 2.4578
  (same comment as for NMVOC, non-methane volatile organic compounds, unspecified origin)
- Chloride [emissions to water, river]: 0.0014528 kg; lognormal SD95 3.9212
  (same comment as for Aluminium)
- Phosphate [emissions to water, river]: 6.98e-8 kg; lognormal SD95 5.1474
  (same comment as for Aluminium)
- Benzene [emissions to air, high. pop.]: 3.2786e-8 kg; lognormal SD95 1.8433
  (same comment as for NMVOC, non-methane volatile organic compounds, unspecified origin)
- Nitrate [emissions to water, groundwater, long-term]: 0.00014741 kg; lognormal SD95 4.0176
  (same comment as for Boron)
- Titanium [emissions to water, groundwater, long-term]: 5.71e-5 kg; lognormal SD95 7.2454
  (same comment as for Boron)
- Dioxin, 2,3,7,8 Tetrachlorodibenzo-p- [emissions to air, high. pop.]: 6.5568e-14 kg; lognormal SD95 3.6866
  (same comment as for NMVOC, non-methane volatile organic compounds, unspecified origin)
- Manganese [emissions to water, river]: 6.1471e-9 kg; lognormal SD95 6.8941
  (same comment as for Aluminium)
- Titanium [emissions to water, river]: 7.1215e-8 kg; lognormal SD95 5.0696
  (same comment as for Aluminium)
- Ammonia [emissions to air, high. pop.]: 9.762e-7 kg; lognormal SD95 5.6328
  Nitrogen species emitted to air after DeNOx stage. uncertainty calculated from uncertainty in average N-emissions and uncertainty in the share of thermal NOx and the uncertainty in nitrogen content in *this* waste.
- Cobalt [emissions to air, high. pop.]: 1.3027e-9 kg; lognormal SD95 12.816
  (same comment as for Phosphorus)
- Molybdenum [emissions to water, river]: 1.3042e-6 kg; lognormal SD95 6.966
  (same comment as for Aluminium)
- Sodium [emissions to water, river]: 0.00027739 kg; lognormal SD95 3.1824
  (same comment as for Aluminium)
- Cadmium [emissions to air, high. pop.]: 9.3393e-10 kg; lognormal SD95 11.696
  (same comment as for Phosphorus)
- Phenol, pentachloro- [emissions to air, high. pop.]: 1.4278e-11 kg; lognormal SD95 1.8433
  (same comment as for NMVOC, non-methane volatile organic compounds, unspecified origin)
- Cadmium [emissions to water, groundwater, long-term]: 1.337e-7 kg; lognormal SD95 194.5
  (same comment as for Boron)
- Chloride [emissions to water, groundwater, long-term]: 0.00043851 kg; lognormal SD95 4.5403
  (same comment as for Boron)
- Calcium [emissions to air, high. pop.]: 3.0064e-5 kg; lognormal SD95 4.0804
  (same comment as for Phosphorus)
- Copper [emissions to water, groundwater, long-term]: 5.7459e-5 kg; lognormal SD95 7.4073
  (same comment as for Boron)
- Beryllium [emissions to water, groundwater, long-term]: 9.892e-7 kg; lognormal SD95 11.399
  (same comment as for Boron)
- Sodium [emissions to water, groundwater, long-term]: 0.00073515 kg; lognormal SD95 3.1454
  (same comment as for Boron)
- Calcium [emissions to water, groundwater, long-term]: 0.0028454 kg; lognormal SD95 3.8353
  (same comment as for Boron)
- Phosphate [emissions to water, groundwater, long-term]: 1.6636e-5 kg; lognormal SD95 89.942
  (same comment as for Boron)
- Hydrogen chloride [emissions to air, high. pop.]: 1.0799e-6 kg; lognormal SD95 4.6972
  (same comment as for Phosphorus)
- Copper [emissions to water, river]: 8.3353e-9 kg; lognormal SD95 6.8255
  (same comment as for Aluminium)
- Manganese [emissions to air, high. pop.]: 7.5418e-9 kg; lognormal SD95 8.2944
  (same comment as for Phosphorus)
- Copper [emissions to air, high. pop.]: 5.8917e-9 kg; lognormal SD95 7.7841
  (same comment as for Phosphorus)
- Fluoride [emissions to water, groundwater, long-term]: 1.9394e-5 kg; lognormal SD95 5.2652
  (same comment as for Boron)
- COD, Chemical Oxygen Demand [emissions to water, river]: 0.00047203 kg; lognormal SD95 1.5289
  (same comment as for Aluminium)
- Titanium [emissions to air, high. pop.]: 1.5847e-7 kg; lognormal SD95 6.6564
  (same comment as for Phosphorus)
- Dinitrogen monoxide [emissions to air, high. pop.]: 6.1129e-5 kg; lognormal SD95 9.3635
  (same comment as for Ammonia)
- Arsenic [emissions to water, river]: 1.5767e-6 kg; lognormal SD95 10.211
  (same comment as for Aluminium)
- Barium [emissions to water, river]: 1.6882e-8 kg; lognormal SD95 9.1496
  (same comment as for Aluminium)
- BOD5, Biological Oxygen Demand [emissions to water, river]: 0.00046596 kg; lognormal SD95 1.5377
  (same comment as for Aluminium)
- Cyanide [emissions to air, high. pop.]: 1.3133e-5 kg; lognormal SD95 9.3635
  (same comment as for Ammonia)
- Iron [emissions to air, high. pop.]: 2.3388e-9 kg; lognormal SD95 5.2441
  (same comment as for Phosphorus)
- Strontium [emissions to water, groundwater, long-term]: 6.4666e-5 kg; lognormal SD95 7.5332
  (same comment as for Boron)
- Cobalt [emissions to water, groundwater, long-term]: 5.8347e-7 kg; lognormal SD95 11.822
  (same comment as for Boron)
- Nickel [emissions to water, river]: 6.8767e-9 kg; lognormal SD95 14.765
  (same comment as for Aluminium)
- Mercury [emissions to air, high. pop.]: 4.1219e-9 kg; lognormal SD95 14.9
  (same comment as for Phosphorus)
- Benzene, pentachloro- [emissions to air, high. pop.]: 1.7322e-10 kg; lognormal SD95 1.8433
  (same comment as for NMVOC, non-methane volatile organic compounds, unspecified origin)
- COD, Chemical Oxygen Demand [emissions to water, groundwater, long-term]: 0.0030303 kg; lognormal SD95 1.3669
  (same comment as for Boron)
- Manganese [emissions to water, groundwater, long-term]: 2.4362e-5 kg; lognormal SD95 17.684
  (same comment as for Boron)
- Mercury [emissions to water, groundwater, long-term]: 9.259e-9 kg; lognormal SD95 38.589
  (same comment as for Boron)
- Lead [emissions to water, groundwater, long-term]: 3.8328e-5 kg; lognormal SD95 58.407
  (same comment as for Boron)
- Nickel [emissions to water, groundwater, long-term]: 9.8242e-6 kg; lognormal SD95 9.2289
  (same comment as for Boron)
- Potassium [emissions to air, high. pop.]: 4.7183e-6 kg; lognormal SD95 5.1984
  (same comment as for Phosphorus)
- Silicon [emissions to air, high. pop.]: 3.3171e-8 kg; lognormal SD95 3.24
  (same comment as for Phosphorus)
- Mercury [emissions to water, river]: 1.5788e-10 kg; lognormal SD95 9.862
  (same comment as for Aluminium)
- Zinc [emissions to air, high. pop.]: 8.8806e-8 kg; lognormal SD95 7.0225
  (same comment as for Phosphorus)
- Magnesium [emissions to air, high. pop.]: 5.0367e-6 kg; lognormal SD95 4
  (same comment as for Phosphorus)
- Potassium [emissions to water, river]: 0.00020789 kg; lognormal SD95 3.506
  (same comment as for Aluminium)
- Particulates, < 2.5 um [emissions to air, high. pop.]: 3.9144e-6 kg; lognormal SD95 3.6866
  (same comment as for NMVOC, non-methane volatile organic compounds, unspecified origin)
- Antimony [emissions to water, groundwater, long-term]: 5.0104e-7 kg; lognormal SD95 12.138
  (same comment as for Boron)
- DOC, Dissolved Organic Carbon [emissions to water, river]: 0.00020614 kg; lognormal SD95 1.53
  (same comment as for Aluminium)
- Nitrate [emissions to water, river]: 5.2247e-5 kg; lognormal SD95 3.1724
  (same comment as for Aluminium)
- Sodium [emissions to air, high. pop.]: 8.382e-6 kg; lognormal SD95 5.1076
  (same comment as for Phosphorus)
- TOC, Total Organic Carbon [emissions to water, groundwater, long-term]: 0.0011991 kg; lognormal SD95 1.3669
  (same comment as for Boron)
- Hydrogen fluoride [emissions to air, high. pop.]: 1.4594e-7 kg; lognormal SD95 8.7548
  (same comment as for Phosphorus)
- Chromium [emissions to air, high. pop.]: 1.303e-8 kg; lognormal SD95 9.2416
  (same comment as for Phosphorus)
- Antimony [emissions to air, high. pop.]: 6.3115e-13 kg; lognormal SD95 13.25
  (same comment as for Phosphorus)
- Sulfate [emissions to water, groundwater, long-term]: 0.0034223 kg; lognormal SD95 3.2573
  (same comment as for Boron)
- Carbon dioxide, biogenic [emissions to air, high. pop.]: 1.4706 kg; lognormal SD95 1.3554
  (same comment as for Phosphorus)
- Barium [emissions to air, high. pop.]: 4.9231e-7 kg; lognormal SD95 6.9696
  (same comment as for Phosphorus)
- Silicon [emissions to water, groundwater, long-term]: 0.002151 kg; lognormal SD95 84.718
  (same comment as for Boron)

## Sampling procedure
fully waste-specific calculation based on literature data for average MSWI operation performance

## Extrapolations
Typical elemental transfer coefficients from current studies for modern MSWI, completed with data from coal power plants and estimates, adapted for inert/burnable waste.

## Uncertainty adjustments
uncertainty of waste input composition data derived from generic formula GSD(c) = N*ln(c)+1

## Sources
- Doka G., 2013, 2013 - Updates LCI waste treatment services - Doka, -, Doka LCA, Zuerich, CH
Doka G. (2013) Updates to Life Cycle Inventories of Waste Treatment Services - part II: waste incineration. Doka LCA. Zurich.
Type: Separate publication
Source: Report to document the 2013 changes to the MSWI incinerator model and datasets (URL: http://www.doka.ch/ecoinventMSWIupdateLCI2013.pdf). To be read with the ecoinvent Nr 13 report (Doka 2009, Life Cycle Inventories of Waste Treatment Services) for ecoinvent v2.2.
First author: Doka G.
Year: 2013
Place of publication: Zurich
Publisher: Doka LCA
Original title: Updates to Life Cycle Inventories of Waste Treatment Services - part II: waste incineration

## Validation
Proof reading validation: Passed.; Other validation: none;
