# Transport, freight, rail, diesel

Dataset: EcoSpold 1, unit process
Functional unit: 1 tkm
Category: transport systems / train\unspecified
Geography: US
Time period: 2000-01 to 2000-12
Generated by: Christian Bauer
accessRestrictedTo: 0
copyright: true

## General comment
Based on European railway freight transport;

## Included processes
Based on European railway freight transport; instead of mix of electric and diesel trains it includes operation of diesel train only. This dataset calls the modules "operation of vehicle"; "production, maintenance and disposal of vehicles"; "construction and maintenance and disposal of railway tracks".

## Technology
Average technology

## Reference product
- Transport, freight, rail, diesel [US]: 1 tkm
  UNITED STATES

## Inputs from technosphere
- Goods wagon [RER]: 4.59e-8 p; lognormal SD95 1.3
  own estimation based on comparison with the vehicle stock-transport performance ratio in 1999 and further geographical uncertainties due to extrapolation
- Locomotive [RER]: 7.11e-10 p; lognormal SD95 1.3
  (same comment as for Goods wagon)
- Disposal, railway track [CH]: 9.3e-5 my; lognormal SD95 1.3
  (3,1,1,3,1,na); own estimation taken into account uncertainties in the infrastructure legth -transport performance ratio and further geographical uncertainties due to extrapolation
- Disposal, locomotive [RER]: 7.11e-10 p; lognormal SD95 1.3
  (same comment as for Goods wagon)
- Maintenance, locomotive [RER]: 7.11e-10 p; lognormal SD95 1.3
  (same comment as for Goods wagon)
- Operation, freight train, diesel [RER]: 1 tkm; lognormal SD95 1
  own estimation
- Operation, maintenance, railway track [CH]: 4.57e-5 my; lognormal SD95 1.3
  (same comment as for Disposal, railway track)
- Maintenance, goods wagon [RER]: 4.59e-8 p; lognormal SD95 1.3
  (same comment as for Goods wagon)
- Railway track [CH]: 9.3e-5 my; lognormal SD95 1.3
  (same comment as for Disposal, railway track)

## Sampling procedure
literature and statistics

## Extrapolations
see Geography/Text

## Sources
- Dones R., Bauer C., Roeder A., 2007, 2007 - Coal - Dones, Sachbilanzen von Energiesystemen. Final report No. 6 ecoinvent data v2.0, 6, Swiss Centre for LCI, PSI, Duebendorf and Villigen, CH
Röder, A., Ch. Bauer, R. Dones (2007) Kohle. Sachbilanzen von Energiesystemen. Final report No. 6 ecoinvent data v2.0. Editors: Dones R.. Volume: 6. Swiss Centre for LCI, PSI. Dübendorf and Villigen, CH.
Type: Measurement on site
Source: CD-ROM
First author: Röder, A.
Other authors: Ch. Bauer, R. Dones
Year: 2007
Name of editors: Dones R.
Title of anthology: Sachbilanzen von Energiesystemen. Final report No. 6 ecoinvent data v2.0
Place of publication: Dübendorf and Villigen, CH
Publisher: Swiss Centre for LCI, PSI
Volume No: 6

## Validation
Proof reading validation: passed; Other validation: none;
