# Hydrochloric acid, from the reaction of hydrogen with chlorine, at plant

Dataset: EcoSpold 1, unit process
Functional unit: 1 kg
Category: chemicals / acids (inorganic)
Geography: RER
Time period: 2000-01 to 2000-12
Generated by: Mike Chudacoff
accessRestrictedTo: 0
copyright: true

## General comment
This report assumes that HCl is generated from combustion of chlorine with hydrogen ;
CAS number: 007647-01-0;
Formula: HCl;

## Included processes
Precursor compounds, auxiliary materials, transports, infrastructure.

## Geography
RER

## Technology
represents a current cross-section of actual plants in Europe

## Reference product
- Hydrochloric acid, from the reaction of hydrogen with chlorine, at plant [RER]: 1 kg
  Europe

## Inputs from technosphere
- Electricity, medium voltage, production ENTSO-E, at grid: 0.33 kWh; lognormal SD95 1.2
  (3,3,1,1,1,4); power
- Transport, freight, lorry, fleet average [RER]: 0.05 tkm; lognormal SD95 1.2
  (4,3,1,1,1,4); transport
- Chemical plant, organics [RER]: 4e-10 p; lognormal SD95 1.3
  (4,5,1,1,1,4); infrastructure
- Transport, freight, rail [RER]: 0.1 tkm; lognormal SD95 1.2
  (4,3,1,1,1,4); transport
- Chlorine, liquid, production mix, at plant [RER]: 0.975 kg; lognormal SD95 1.3
  (3,5,1,1,1,4); precursor
- Hydrogen, liquid, at plant [RER]: 0.027 kg; lognormal SD95 1.3
  (3,5,1,1,1,4); precursor

## Emissions to nature
- Heat, waste [emissions to air, high. pop.]: 1.2 MJ; lognormal SD95 1.1
  (1,3,1,1,1,4); waste heat
- Chlorine [emissions to air, high. pop.]: 0.0019 kg; lognormal SD95 1.2
  (4,3,1,1,1,4); emissions to air

## Sampling procedure
see technology

## Sources
- Althaus H.-J., Chudacoff M., Hellweg S., Hischier R., Jungbluth N., Osses M., Primas A., 2007, 2007 - LCI chemicals - Althaus, Final report ecoinvent data v2.0, 8, Swiss Centre for LCI, Empa - TSL, ETH, ESU-services Ltd., Chudacoff Oekoscience, Duebendorf, CH
Althaus H.-J., Chudacoff M., Hischier R., Jungbluth N., Osses M., Primas A. (2007) Life Cycle Inventories of Chemicals. Final report ecoinvent data v2.0. Volume: 8. Swiss Centre for LCI, Empa - TSL. Dübendorf, CH.
Type: Measurement on site
Source: CD-ROM
First author: Althaus H.-J.
Other authors: Chudacoff M., Hischier R., Jungbluth N., Osses M., Primas A.
Year: 2007
Title of anthology: Final report ecoinvent data v2.0
Place of publication: Dübendorf, CH
Publisher: Swiss Centre for LCI, Empa - TSL
Volume No: 8

## Validation
Proof reading validation: Passed.; Other validation: none;
