# xxx Heat, at tube collector, one-family house, for combined system

Dataset: EcoSpold 1, unit process
Functional unit: 1 MJ
Category: energy, obsolete / others, obsolete
Geography: CH
Production volume: Total solar heat delivered by evacuated tube collectors in 2001 was 2.3TJ.
Generated by: Niels Jungbluth
accessRestrictedTo: 0
copyright: true

## General comment
Use of a solar system excluding the necessary auxiliary heating.;

## Included processes
Delivery of heat with a solar system including maintenance and electricity use for operation. Excluding the necessary auxiliary heating.

## Technology
Operation of a solar system, not including the necessary additional heating.

## Time period
Time of simulation.

## Reference product
- xxx Heat, at tube collector, one-family house, for combined system [CH]: 1 MJ
  SWITZERLAND

## Inputs from technosphere
- Transport, freight, lorry, 3.5t gross weight, fleet average [CH]: 0.00023474 tkm; lognormal SD95 3.0033
  (2,na,1,1,1,na); 250km per plant for maintenance
- xxx Solar system with evacuated tube collector, one-family house, combined system [CH]: 2.134e-6 p; lognormal SD95 3.0033
  (2,na,1,1,1,na); Simulation
- Electricity, low voltage, at grid [CH]: 0.0095765 kWh; lognormal SD95 1.0714
  (2,na,1,1,1,na); Simulation

## Inputs from nature
- Energy, solar, converted [resources, in air]: 1.1334 MJ; lognormal SD95 1.0714
  (2,na,1,1,1,na); Includes losses in the system

## Emissions to nature
- Heat, waste [emissions to air, high. pop.]: 1.1679 MJ; lognormal SD95 1.0714
  (2,na,1,1,1,na); Simulation and solar energy

## Sampling procedure
Simulation done by SPF Rapperswil with Polysun 3.3 computer programme.

## Sources
- Jungbluth N., 2007, 2007 - Solar collector systems - Jungbluth, Sachbilanzen von Energiesystemen. Final report No. 6 ecoinvent data v2.0, 6, Swiss Centre for LCI, ESU-services Ltd., Duebendorf, CH
Jungbluth, N. (2007) Sonnenkollektor-Anlagen. Sachbilanzen von Energiesystemen. Final report No. 6 ecoinvent data v2.0. Editors: Dones R.. Volume: 6. Swiss Centre for LCI, PSI. Dübendorf and Villigen, CH.
Type: Measurement on site
Source: CD-ROM
First author: Jungbluth, N.
Year: 2007
Name of editors: Dones R.
Title of anthology: Sachbilanzen von Energiesystemen. Final report No. 6 ecoinvent data v2.0
Place of publication: Dübendorf and Villigen, CH
Publisher: Swiss Centre for LCI, PSI
Volume No: 6

## Validation
Proof reading validation: passed; Other validation: none;
