# Negative electrode paste

Dataset: EcoSpold 1, unit process
Functional unit: 1 kg
Category: transport systems / road\Vehicle components\Energy storage\Lithium-ion battery
Geography: GLO
Time period: 2020-01 to 2020-12
Generated by: Romain Sacchi
accessRestrictedTo: 0
copyright: False

## General comment
Datasets for mobility applications, originally published in a paper about batteries for stationary applications. Original source: Tobias S. Schmidt, Martin Beuse, Xiaojin Zhang, Bjarne Steffen, Simon F. Schneider, Alejandro Pena-Bello, Christian Bauer, and David Parra, Additional Emissions and Cost from Storing Electricity in Stationary Battery Systems, Environmental Science & Technology 2019 53 (7), 3379-3390, doi: 10.1021/acs.est.8b05317.

## Time period
Base technology year of 2020

## Reference product
- Negative electrode paste [GLO]: 1 kg

## Inputs from technosphere
All rows: lognormal SD95 1.23828
- N-methyl-2-pyrrolidone, at plant [RER]: 0.94 kg
  Uncertainty from pedigree matrix: (3, 3, 2, 2, 3, 1)
- Acrylic acid, at plant [RER]: 0.02 kg
  Uncertainty from pedigree matrix: (3, 3, 2, 2, 3, 1)
- Anode, lithium-ion battery, graphite, at plant [CN]: 0.96 kg
  Uncertainty from pedigree matrix: (3, 3, 2, 2, 3, 1)
- Carboxymethyl cellulose, powder, at plant [RER]: 0.02 kg
  Uncertainty from pedigree matrix: (3, 3, 2, 2, 3, 1)
- Chemical plant, organics [RER]: 4e-10 p
  Uncertainty from pedigree matrix: (3, 3, 2, 2, 3, 1)

## Sources
- Sacchi R., Bauer C., 2023, 2023 - LCI on-road vehicles - Sacchi, PSI, Villigen, CH
doi: 10.5281/ZENODO.5156043
