# Wind turbine 4.5MW, onshore, moving parts

Dataset: EcoSpold 1, unit process, infrastructure
Functional unit: 1 unit
Category: wind power / production of components
Geography: RER
Time period: 2024 to 2024
Synonyms: 0
Share of production covered: 100 %
Generated by: Alena Frehner
accessRestrictedTo: 0
copyright: true

## Included processes
Wind turbine moving parts (without tower and substructure), at site including manufacturing, transports, installation, replacements, decommission and waste treatement. Calculated for FU of 1p.
Data are based on the Vestas V163-4.5MW onshore wind turbine (Martinez Aguado & Garrett, 2025).
Assumed lifetime is 25 years.

## Reference product
- Wind turbine 4.5MW, onshore, moving parts [RER]: 1 unit

## Inputs from technosphere
- Aluminium, production mix, at plant [RER]: 1998.1 kg; lognormal SD95 1.2426
  (2,4,1,2,1,5,BU:1.05); Input calculated based on Martinez Aguado & Garrett (2025)
- Cast iron, at plant [RER]: 78290 kg; lognormal SD95 1.2426
  (2,4,1,2,1,5,BU:1.05); Input calculated based on Martinez Aguado & Garrett (2025)
- Chromium steel 18/8, at plant [RER]: 27305 kg; lognormal SD95 1.2426
  (2,4,1,2,1,5,BU:1.05); Input calculated based on Martinez Aguado & Garrett (2025)
- Copper, at regional storage [RER]: 3193.8 kg; lognormal SD95 1.2426
  (2,4,1,2,1,5,BU:1.05); Input calculated based on Martinez Aguado & Garrett (2025)
- Electronics for control units [RER]: 5529.8 kg; lognormal SD95 1.2426
  (2,4,1,2,1,5,BU:1.05); Input calculated based on Martinez Aguado & Garrett (2025)
- Glass fibre, at plant [RER]: 34723 kg; lognormal SD95 1.2426
  (2,4,1,2,1,5,BU:1.05); Input calculated based on Martinez Aguado & Garrett (2025)
- Lubricating oil, at plant [RER]: 363.14 kg; lognormal SD95 1.2423
  (2,4,1,1,1,5,BU:1.05); Estimation: 111 kg lubrification oil per MW based on Mali and Garrett (2023)
- Permanent magnet, for electric motor [RER]: 96.46 kg; lognormal SD95 1.2426
  (2,4,1,2,1,5,BU:1.05); Input calculated based on Martinez Aguado & Garrett (2025)
- Polypropylene, granulate, at plant [RER]: 27840 kg; lognormal SD95 1.2426
  (2,4,1,2,1,5,BU:1.05); Input calculated based on Martinez Aguado & Garrett (2025)
- Silver, at regional storage [RER]: 0.14469 kg; lognormal SD95 1.2426
  (2,4,1,2,1,5,BU:1.05); Input calculated based on Martinez Aguado & Garrett (2025)
- Solder, paste, Sn95.5Ag3.9Cu0.6, for electronics industry, at plant [GLO]: 3.7758 kg; lognormal SD95 1.2426
  (2,4,1,2,1,5,BU:1.05); Input calculated based on Martinez Aguado & Garrett (2025)
- Steel, low-alloyed, at plant [RER]: 71771 kg; lognormal SD95 1.2426
  (2,4,1,2,1,5,BU:1.05); Input calculated based on Martinez Aguado & Garrett (2025)
- Sulphur hexafluoride, liquid, at plant [RER]: 8.1872 kg; lognormal SD95 1.2426
  (2,4,1,2,1,5,BU:1.05); Input based on Martinez Aguado & Garrett (2025)
- Zinc, primary, at regional storage [RER]: 241.3 kg; lognormal SD95 1.2426
  (2,4,1,2,1,5,BU:1.05); Input calculated based on Martinez Aguado & Garrett (2025)
- Aluminium product manufacturing, average metal working [RER]: 1998.1 kg; lognormal SD95 1.2426
  (2,4,1,2,1,5,BU:1.05); Input calculated based on Martinez Aguado & Garrett (2025)
- Copper product manufacturing, average metal working [RER]: 3193.8 kg; lognormal SD95 1.2426
  (2,4,1,2,1,5,BU:1.05); Input calculated based on Martinez Aguado & Garrett (2025)
- Sheet rolling, steel [RER]: 71771 kg; lognormal SD95 1.2426
  (2,4,1,2,1,5,BU:1.05); Input calculated based on Martinez Aguado & Garrett (2025)
- Sheet rolling, chromium steel [RER]: 27305 kg; lognormal SD95 1.2426
  (2,4,1,2,1,5,BU:1.05); Input calculated based on Martinez Aguado & Garrett (2025)
- Injection moulding [RER]: 27840 kg; lognormal SD95 1.2426
  (2,4,1,2,1,5,BU:1.05); Input calculated based on Martinez Aguado & Garrett (2025)
- Electricity, medium voltage, production ENTSO-E, at grid [ENTSO-E]: 125680 kWh; lognormal SD95 1.5841
  (2,4,5,2,1,5,BU:1.05); Assumed electricity consumption for assembly of rotor and nacelle of 0.5 kWh/kg.
- Transport, freight, lorry, fleet average [RER]: 202370 tkm; lognormal SD95 2.0642
  (2,4,1,2,1,5,BU:2); Includes the tranportation of components to wind farm site.
- Transport, freight, lorry, diesel, 26t gross weight, 2010, EURO-V, regional delivery [RER]: 26277 tkm; lognormal SD95 2.0642
  (2,4,1,2,1,5,BU:2); Includes the tranportation of materials to component manufacturing site and components to waste treatement site.
- Transport, transoceanic freight ship [OCE]: 2.01e6 tkm; lognormal SD95 2.0642
  (2,4,1,2,1,5,BU:2); Includes the tranportation of components to wind farm site.
- Operation, freight train, diesel [RER]: 64310 tkm; lognormal SD95 2.0642
  (2,4,1,2,1,5,BU:2); Includes the tranportation of materials to component manufacturing site.
- Diesel, burned in building machine, average [CH]: 472.48 MJ; lognormal SD95 2.2944
  (2,4,5,2,1,5,BU:2); Diesel consumption for the erection of the wind turbine, based on the potential energy.
- Recycling steel and iron [RER]: 171530 kg; lognormal SD95 1.2426
  (2,4,1,2,1,5,BU:1.05); Own calculation; recycling of steel and iron; assumed recycling rate: 95%
- Disposal, steel, 0% water, to construction waste landfill [CH]: 9027.9 kg; lognormal SD95 1.2426
  (2,4,1,2,1,5,BU:1.05); Own calculation; landfill of steel and iron; assumed landfill rate: 5%
- Disposal, aluminium, 0% water, to sanitary landfill [CH]: 99.903 kg; lognormal SD95 1.2426
  (2,4,1,2,1,5,BU:1.05); Own calculation; landfill of aluminum; assumed landfill rate: 5%
- Disposal, plastics, mixture, 15.3% water, to municipal incineration [CH]: 13920 kg; lognormal SD95 1.2426
  (2,4,1,2,1,5,BU:1.05); Own calculation; incineration of plastic materials; assumed incineration rate: 50%
- Disposal, plastics, mixture, 15.3% water, to sanitary landfill [CH]: 13920 kg; lognormal SD95 1.2426
  (2,4,1,2,1,5,BU:1.05); Own calculation; landfill of plastic materials; assumed landfill rate: 50%
- Disposal, glass fibre-reinforced polymer panel, polyester resin, to municipal incineration [CH]: 17002 kg; lognormal SD95 1.2426
  (2,4,1,2,1,5,BU:1.05); Own calculation; incineration off fiberglass and carbon fiber contained in blades; assumed incineration rate 50%
- Disposal, inert material, 0% water, to sanitary landfill [CH]: 17002 kg; lognormal SD95 1.2426
  (2,4,1,2,1,5,BU:1.05); Own calculation; incineration off fiberglass and carbon fiber contained in blades; assumed landfill rate 50%
- Disposal, inert material, 0% water, to sanitary landfill [CH]: 6961.8 kg; lognormal SD95 1.2426
  (2,4,1,2,1,5,BU:1.05); Own calculation; landfill of remaining materials (which are not classified as steel and iron, aluminum, copper, plastics or blades); assumed landfill rate 100%

## Sources
- Kroehnert H., Frehner A., Stucki M., 2025, 2025 - LCI wind Energy - Kroehnert, Project report, 0, ZHAW, Waedenswil, CH

## Validation
22.07.2025
"S:\pools\n\N-IUNR-FG-LCA\Projekte\Wind LCA\LCI-Update\Sachbilanz"
