# Flooring, laminate, at regional storage

Dataset: EcoSpold 1, unit process
Functional unit: 1 m2
Category: flooring / flooring kbob
Geography: CH
Time period: 2012-01 to 2012-12
Share of production covered: 0 %
Generated by: Matthias Klingler
accessRestrictedTo: 0
copyright: true

## General comment
Durchschnittliches Flächengewicht = 8.5 kg/m2.

Technology: unknown

Version: 1.00

0.0
Production volume: unknown
Local category: flooring
Local subcategory: flooring KBOB

## Included processes
Gebrauchsfertiger Bodenbelag. Die Verlegung des Belags ist in der Bilanz nicht berücksichtigt. Die verwendeten Daten für die Zusammensetzung des Belags stammen aus Umweltproduktdeklarationen.

## Reference product
- Flooring, laminate, at regional storage [CH]: 1 m2

## Inputs from technosphere
- Transport, freight, rail [RER]: 1.866 tkm; lognormal SD95 1.311
- Melamine formaldehyde resin, at plant [RER]: 0.3791 kg; lognormal SD95 1.0201
- Wooden board manufacturing plant, organic bonded boards [RER]: 2.831e-10 p; lognormal SD95 1.6822
- Aluminium oxide, at plant [RER]: 0.0357 kg; lognormal SD95 1.0201
- Medium density fibreboard, uncoated, at plant [RER]: 0.008913 m3; lognormal SD95 1.0201
- Transport, freight, lorry, 32t-40t gross weight, fleet average [RER]: 4.675 tkm; lognormal SD95 1.311
- Calendering, rigid sheets [RER]: 0.6582 kg; lognormal SD95 1.1151
- Paper, woodfree, coated, at regional storage [RER]: 0.2414 kg; lognormal SD95 1.0201

## Sources
- Werner F., 2017, 2017 - LCI wood and wood based products - Werner, Project Report, 0, Environment & Development, Zuerich, CH

## Validation
Proof reading validation: 13.03.2013; Other validation: \\SERVER\Users\Admin\Documents\Projekte laufend\297 BAFU Anfragen\Bodenbeläge\[c Ecospold alle Prozesse_v0.2.xlsx]X-Process;
