# Manganese concentrate, at beneficiation

Dataset: EcoSpold 1, unit process
Functional unit: 1 kg
Category: metals / non ferro
Geography: GLO
Time period: 1994-01 to 2003-12
Production volume: 23.5 million tonnes in 1995
Share of production covered: 55 %
Generated by: Mischa Classen
accessRestrictedTo: 0
copyright: true

## General comment
The module describes the production of manganese ore in 1994 for a world-wide production average. It is designed for the use of manganese ore as intermediary product in the production of ferromanganese and manganese metal. For the use of this module in the battery manufacture, the data quality may not be sufficient.;

## Included processes
The module includes a mining and a beneficiation step with the mining infrastructure and disposal of overburden and tailings (see part II "Auxiliary Processes").

## Geography
This module relates to the global situation. Some modules used like lime, blasting and transport originate from data sets valid for Switzerland or Europe

## Technology
Mining is done 70% open pit and 30% underground, followed by a beneficiation of the ore trough classification. Overburden and tailings are non-sulphidic , they are disposed near the mining site.

## Reference product
- Manganese concentrate, at beneficiation [GLO]: 1 kg
  Global

## Inputs from technosphere
- Non-ferrous metal mine, surface [GLO]: 1.94e-11 p; lognormal SD95 3.32
  (5,5,1,1,1,5); rough estimate
- Chromium steel 18/8, at plant [RER]: 0.000515 kg; lognormal SD95 1.62
  (5,5,1,1,1,5);
- Disposal, non-sulfidic overburden, off-site [GLO]: 2.61 kg; lognormal SD95 1.16
  (3,2,3,1,1,2);
- Diesel, burned in building machine, average [CH]: 0.0799 MJ; lognormal SD95 2.08
  (,,,,,); reported values w/ range
- Conveyor belt, at plant [RER]: 1.3e-7 m; lognormal SD95 3.32
  (5,5,1,1,1,5); rough estimate
- Electricity, medium voltage, production ENTSO-E, at grid: 0.00302 kWh; lognormal SD95 1.16
  (3,2,3,1,1,2);
- Aluminium hydroxide, plant [RER]: 1.44e-11 p; lognormal SD95 3.32
  (5,5,1,1,1,5);
- Blasting [RER]: 0.000452 kg; lognormal SD95 1.15
  reported values w/ range
- Non-ferrous metal mine, underground [GLO]: 8.3e-12 p; lognormal SD95 3.32
  (5,5,1,1,1,5); rough estimate
- Electricity, hydropower, at run-of-river power plant [RER]: 0.00453 kWh; lognormal SD95 1.16
  (3,2,3,1,1,2);
- Disposal, non-sulfidic tailings, off-site [GLO]: 0.71 kg; lognormal SD95 1.16
  (3,2,3,1,1,2); reported values

## Inputs from nature
- Manganese [resources, in ground]: 0.613 kg; lognormal SD95 1.13
  (2,2,3,1,1,2);
- Occupation, mineral extraction site [resources, land]: 9.01e-5 m2a; lognormal SD95 1.53
  (3,2,3,1,1,2); calculation based on reported value
- Water, river [resources, in water]: 0.00139 m3; lognormal SD95 1.13
  (2,2,3,1,1,2)
- Transformation, to mineral extraction site [resources, land]: 3e-6 m2; lognormal SD95 2.03
  (3,2,3,1,1,2); calculation based on reported value
- Transformation, from unknown [resources, land]: 3e-6 m2; lognormal SD95 2.03
  (3,2,3,1,1,2); calculation based on reported value

## Emissions to nature
- Copper [emissions to water, river]: 1.13e-10 kg; lognormal SD95 5.95
  (4,5,1,5,5,5); unspecific water quality guidelines
- Arsenic [emissions to water, river]: 1.13e-10 kg; lognormal SD95 2.38
  (4,5,1,5,5,5); unspecific water quality guidelines
- Lead [emissions to water, river]: 1.13e-10 kg; lognormal SD95 5.95
  (4,5,1,5,5,5); unspecific water quality guidelines
- Iron [emissions to water, river]: 3.96e-9 kg; lognormal SD95 5.95
  (4,5,1,5,5,5); unspecific water quality guidelines
- Zinc [emissions to water, river]: 1.13e-10 kg; lognormal SD95 5.95
  (4,5,1,5,5,5); unspecific water quality guidelines
- TOC, Total Organic Carbon [emissions to water, river]: 6.64e-8 kg; lognormal SD95 1.88
  (5,5,1,1,1,5); calculation based on reported value
- Heat, waste [emissions to air, low. pop.]: 0.0272 MJ; lognormal SD95 1.16
  (3,2,3,1,1,2);
- Aluminium [emissions to air, low. pop.]: 3.95e-9 kg; lognormal SD95 1.83
  (5,2,2,1,1,5);
- Iron [emissions to air, low. pop.]: 5.86e-6 kg; lognormal SD95 1.83
  (5,2,2,1,1,5);
- Particulates, > 10 um [emissions to air, low. pop.]: 1.22e-7 kg; lognormal SD95 1.83
  (5,2,2,1,1,5);
- Particulates, < 2.5 um [emissions to air, low. pop.]: 1.18e-8 kg; lognormal SD95 3.27
  (5,2,2,1,1,5);
- Particulates, > 2.5 um, and < 10um [emissions to air, low. pop.]: 1.06e-7 kg; lognormal SD95 2.28
  (5,2,2,1,1,5);
- BOD5, Biological Oxygen Demand [emissions to water, river]: 1.13e-7 kg; lognormal SD95 1.88
  (5,5,1,1,1,5); calculation based on reported value
- COD, Chemical Oxygen Demand [emissions to water, river]: 1.7e-7 kg; lognormal SD95 2.38
  (4,5,1,5,5,5); unspecific water quality guidelines
- Oils, unspecified [emissions to water, river]: 1.13e-8 kg; lognormal SD95 3.82
  (4,5,1,5,5,5); unspecific water quality guidelines
- Silicon [emissions to air, low. pop.]: 1.03e-7 kg; lognormal SD95 1.83
  (5,2,2,1,1,5);
- DOC, Dissolved Organic Carbon [emissions to water, river]: 6.64e-8 kg; lognormal SD95 1.88
  (5,5,1,1,1,5); calculation based on reported value
- Chromium [emissions to air, low. pop.]: 2.05e-10 kg; lognormal SD95 5.31
  (5,2,2,1,1,5);
- Magnesium [emissions to air, low. pop.]: 1.54e-9 kg; lognormal SD95 1.83
  (5,2,2,1,1,5);
- Suspended solids, unspecified [emissions to water, river]: 5.66e-8 kg; lognormal SD95 2.38
  (4,5,1,5,5,5); unspecific water quality guidelines
- Water [emissions to water, unspecified]: 1.3205 kg; lognormal SD95 2.5196
  (5,5,5,5,5,BU:1.05); All uncertainty-values set to 5.0 by default. Balance of input water

## Sampling procedure
literature

## Extrapolations
see Geography and Technology

## Sources
- Classen M., Althaus H.-J., Blaser S., Scharnhorst W., Tuchschmid M., Jungbluth N., Faist Emmenegger M., 2009, 2009 - LCI metals - Classen, Final report ecoinvent data v2.1, 10, Swiss Centre for LCI, Empa, ESU-services Ltd., Duebendorf, CH
Classen M., Althaus H.-J., Blaser S., Doka G., Jungbluth N., Tuchschmid M. (2008) Life Cycle Inventories of Metals. Final report ecoinvent data v2.1. Volume: 10. Issue: 0. Swiss Centre for LCI, Empa - TSL. Dübendorf, CH.
Type: Measurement on site
Source: CD-ROM
First author: Classen M.
Other authors: Althaus H.-J., Blaser S., Doka G., Jungbluth N., Tuchschmid M.
Year: 2008
Title of anthology: Final report ecoinvent data v2.1
Place of publication: Dübendorf, CH
Publisher: Swiss Centre for LCI, Empa - TSL
Volume No: 10
Issue No: 0

## Validation
Proof reading validation: Passed.; Other validation: none;
