# Soybean methyl ester, at esterification plant

Dataset: EcoSpold 1, unit process
Functional unit: 1 kg
Category: fuels / biofuels
Geography: US
Time period: 2004-01 to 2006-12
Production volume: Production of soybean methyl ester reached 300 kt in 2005 in the US
Share of production covered: 0 %
Generated by: Edgard Gnansounou
accessRestrictedTo: 0
copyright: true

## General comment
Inventory refers to the production of 1 kg soybean methyl ester, respectively glycerine, from soybean oil. The multioutput-process 'soybean oil, in esterification plant' delivers the co-products 'soybean methyl ester, at esterification plant' and 'glycerine, from soybean oil, at esterification plant'. Economic allocation with allocation factor of 92.0% to soybean oil and 8.0% to glycerine. Allocation of CO2 emissions is done according to carbon balance.;

## Included processes
This process includes the esterification process of soybean oil to methyl ester and glycerine, intermediate storage of the oil and products, treatment of specific wastewater effluents. System boundary is at the esterification plant.

## Technology
Typical vegetable oil esterification plant designed for the production of methyl ester (for use in the vehicle fuels market), global context. Base-catalyzed transesterification.

## Time period
Data from 1998 to 2005, current technology for large scale biodiesel plants worldwide

## Reference product
- Soybean methyl ester, at esterification plant [US]: 1 kg
  UNITED STATES

## Inputs from technosphere
- Soybean oil, at oil mill [US]: 0.94628 kg; lognormal SD95 1.2093
  (1,2,1,2,1,5); Literature data & biodiesel producer
- Tap water, at user [RER]: 0.02515 kg; lognormal SD95 1.5642
  (5,5,1,2,1,na); Literature, environmental report
- Heat, natural gas, at industrial furnace 1MW [CH]: 0.71679 MJ; lognormal SD95 1.0722
  (1,1,1,2,1,3); Literature data & biodiesel producer
- Transport, freight, rail [RER]: 0.071584 tkm; lognormal SD95 2.095
  (4,5,na,na,na,na); Based on ecoinvent Guidelines, standard distances
- Vegetable oil esterification plant [CH]: 8.6026e-10 p; lognormal SD95 3.0584
  (1,4,1,3,1,5); Calculation, according to feed capacity and lifetime of the plant
- Treatment, sewage, from residence, to wastewater treatment, class 2 [CH]: 5.7557e-5 m3; lognormal SD95 1.5642
  (5,5,1,2,1,na); Calculation, to close mass balance of process
- Electricity, medium voltage, at grid [US]: 0.038931 kWh; lognormal SD95 1.0722
  (1,1,1,2,1,3); Literature data & biodiesel producer
- Phosphoric acid, industrial grade, 85% in H2O, at plant [RER]: 0.010453 kg; lognormal SD95 1.0913
  (2,2,1,2,1,3); Literature data & biodiesel producer
- Heat, light fuel oil, at industrial furnace 1MW [RER]: 0.037413 MJ; lognormal SD95 1.0722
  (1,1,1,2,1,3); Literature data & biodiesel producer
- Hydrochloric acid, 30% in H2O, at plant [RER]: 0.0042363 kg; lognormal SD95 1.0913
  (2,2,1,2,1,3); Literature data & biodiesel producer
- Heat, at hard coal industrial furnace 1-10MW [RER]: 0.096086 MJ; lognormal SD95 1.0722
  (1,1,1,2,1,3); Literature data & biodiesel producer
- Methanol, at plant [GLO]: 0.10456 kg; lognormal SD95 1.0722
  (1,1,1,2,1,3); Literature data & biodiesel producer
- Transport, freight, lorry, fleet average [RER]: 0.011925 tkm; lognormal SD95 2.095
  (4,5,na,na,na,na); Based on ecoinvent Guidelines, standard distances

## Inputs from nature
- Carbon dioxide, in air [resources, in air]: 0.076056 kg; lognormal SD95 1.0722
  (1,1,1,2,1,3); Calculation, to close carbon balance

## Emissions to nature
- Heat, waste [emissions to air, high. pop.]: 1.38517 MJ; lognormal SD95 1.1376
  (2,4,1,3,1,3); ecoinvent guidelines, calculation from electricity consumption and energy balance
- Carbon dioxide, biogenic [emissions to air, high. pop.]: 0.082215 kg; lognormal SD95 1.05
  (1,1,1,1,1,1); Calculation, to close carbon balance

## Sampling procedure
Cross-checking of various literature sources from 1998 to 2006

## Sources
- Jungbluth N., Chudacoff M., Dauriat A., Dinkel F., Doka G., Faist Emmenegger M., Gnansounou E., Kljun N., Spielmann M., Stettler C., Sutter J., 2007, 2007 - LCI bioenergy - Jungbluth, Final report ecoinvent data v2.0, 17, Swiss Centre for LCI, ESU-services Ltd., Duebendorf and Uster, CH
Jungbluth N., Chudacoff M., Dauriat A., Dinkel F., Doka G., Faist Emmenegger M., Gnansounou E., Kljun N., Spielmann M., Stettler C., Sutter J. (2007) Life Cycle Inventories of Bioenergy. Final report ecoinvent data v2.0. Volume: 17. Swiss Centre for LCI, ESU. Duebendorf and Uster, CH.
Type: Measurement on site
Source: CD-ROM
First author: Jungbluth N.
Other authors: Chudacoff M., Dauriat A., Dinkel F., Doka G., Faist Emmenegger M., Gnansounou E., Kljun N., Spielmann M., Stettler C., Sutter J.
Year: 2007
Title of anthology: Final report ecoinvent data v2.0
Place of publication: Duebendorf and Uster, CH
Publisher: Swiss Centre for LCI, ESU
Volume No: 17

## Validation
Proof reading validation: Passed.; Other validation: none;
