# xx Heat, natural gas, allocation exergy, at SOFC-GT fuel cell 180kWe, future

Dataset: EcoSpold 1, unit process
Functional unit: 1 MJ
Category: energy, obsolete / cogeneration, obsolete\gas, obsolete
Geography: CH
Time period: 2000-01 to 2005-12
Generated by: Alex Primas
accessRestrictedTo: 0
copyright: true

## General comment
The multioutput-process 'natural gas, burned in SOFC-GT fuel cell 180kWe delivers the coproducts 'heat, natural gas, allocation exergy, at SOFC-GT fuel cell 180kWe' and 'electricity, natural gas, allocation exergy, at SOFC-GT fuel cell 180kWe'. The exergy allocation is the allocation scheme suggested to be used within the ecoinvent database (e.g. in electricity mixes).;

## Included processes
The module includes fuel input, infrastructure, emissions to air, and working materials for operation.

## Geography
Natural gas input modelled for Switzerland. Process applicable in central European conditions.

## Technology
Hybrid system combining a 125 kWe solid oxide fuel cell (SOFC) with tubular stack design and a 55kWe micro gas turbine. For central cogeneration use. Performance, stack lifetime and catalyst use according to expected future values for a serial product. Operation with connection to low pressure gas network. Electrical efficiency 58%, total efficiency 80%. Operation as base load engine with low partial load hours.

## Reference product
- xx Heat, natural gas, allocation exergy, at SOFC-GT fuel cell 180kWe, future [CH]: 1 MJ
  SWITZERLAND

## Inputs from technosphere
- Tap water, at user [CH]: 5.7273e-6 kg; lognormal SD95 1.2637
  (3,4,2,2,1,5); company data
- Disposal, used mineral oil, 10% water, to hazardous waste incineration [CH]: 5.1e-8 kg; lognormal SD95 1.3081
  (4,3,2,1,1,5); calculated from oil input
- Natural gas, low pressure, at consumer [CH]: 0.27273 MJ; lognormal SD95 1.05
  (nA,nA,nA,nA,nA,nA); input
- Maintenance SOFC-GT fuel cell 180kWe, future [CH]: 3.3818e-8 p; lognormal SD95 1.1397
  (2,3,2,1,1,4); uncertainty of maintenance cycle
- Storage 10000 l [RER]: 4.4682e-8 p; lognormal SD95 3.0201
  (2,3,2,1,1,4); uncertainty of life time
- SOFC-GT fuel cell 180kWe, future [CH]: 3.7636e-9 p; lognormal SD95 3.0201
  (2,3,2,1,1,4); uncertainty of life time
- Lubricating oil, at plant [RER]: 4.6364e-8 kg; lognormal SD95 1.1668
  (3,3,2,1,1,4); company data for 100kWel micro gas turbine

## Emissions to nature
- Heat, waste [emissions to air, high. pop.]: 0.14209 MJ; lognormal SD95 1.1073
  (2,3,2,1,1,3); uncertainty of heating value and electric efficiency
- NMVOC, non-methane volatile organic compounds, unspecified origin [emissions to air, high. pop.]: 1.9091e-7 kg; lognormal SD95 1.5813
  (4,3,2,1,1,4); estimate based on fuel cell references
- Methane, fossil [emissions to air, high. pop.]: 1.0909e-6 kg; lognormal SD95 1.6224
  (4,3,2,1,1,5); estimate based on fuel cell references
- Nitrogen oxides [emissions to air, high. pop.]: 3e-6 kg; lognormal SD95 1.6733
  (4,5,2,1,1,5); estimate based on fuel cell and micro gas turbine references
- Carbon dioxide, fossil [emissions to air, high. pop.]: 0.015273 kg; lognormal SD95 1.0714
  (2,nA,nA,nA,1,nA); composition of natural gas
- Sulfur dioxide [emissions to air, high. pop.]: 1.5e-7 kg; lognormal SD95 1.0714
  (2,nA,nA,nA,1,nA); composition of natural gas
- Carbon monoxide, fossil [emissions to air, high. pop.]: 4.6364e-7 kg; lognormal SD95 5.0229
  (2,3,2,1,1,4); estimate based on fuel cell references

## Sampling procedure
Literature data and manufacturer information

## Sources
- Primas A., 2007, 2007 - LCI new CHP systems - Primas, Final report ecoinvent Data v2.0, 20, Swiss Centre for LCI, B&H AG, Duebendorf and Zuerich, CH
Primas A., 0 (2007) Life Cycle Inventories of new CHP systems. Final report ecoinvent Data v2.0. Editors: 0. Volume: 20. Swiss Centre for LCI, B&H AG. Duebendorf and Zurich, CH.
Type: Measurement on site
Source: CD-ROM
First author: Primas A.
Other authors: 0
Year: 2007
Name of editors: 0
Title of anthology: Final report ecoinvent Data v2.0
Place of publication: Duebendorf and Zurich, CH
Publisher: Swiss Centre for LCI, B&H AG
Volume No: 20

## Validation
Proof reading validation: passed; Other validation: none;
