# Transport, freight, lorry, 3.5t gross weight, fleet average

Dataset: EcoSpold 1, unit process
Functional unit: 1 tkm
Category: transport systems / road\Transformation
Geography: CH
Time period: 2020-01 to 2020-12
Generated by: Brian Cox
accessRestrictedTo: 0
copyright: False

## General comment
Average of other Mobitool datasets created with the purpose of replacing older datasets in the database. Basis for fleet shares: Switzerland year 2020. Source: HBEFA 5.1, INFRAS.

## Time period
Technology and fleet shares valid for year 2020

## Reference product
- Transport, freight, lorry, 3.5t gross weight, fleet average [CH]: 1 tkm

## Inputs from technosphere
All rows: lognormal SD95 1.0587
- Transport, freight, lorry, battery electric, NMC-622 battery, 3.5t gross weight, 2020, urban delivery [CH]: 0.00501677 tkm
  Uncertainty from pedigree matrix: (2,1,2,1,1,1); Share of technologies from HBEFA 5.1 for CH 2020. Assume 45% Urban, 45% Rural, 10% Long-haul. Assume 10% of diesel Euro 6 powertrains are hybrids
- Transport, freight, lorry, compressed gas, 100% biomethane, 3.5t gross weight, 2020, EURO-VI, long haul [CH]: 0.000106966 tkm
  (same comment as for Transport, freight, lorry, battery electric, NMC-622 battery, 3.5t gro)
- Transport, freight, lorry, compressed gas, 100% biomethane, 3.5t gross weight, 2020, EURO-VI, regional delivery [CH]: 0.000481349 tkm
  (same comment as for Transport, freight, lorry, battery electric, NMC-622 battery, 3.5t gro)
- Transport, freight, lorry, compressed gas, 100% biomethane, 3.5t gross weight, 2020, EURO-VI, urban delivery [CH]: 0.000481349 tkm
  (same comment as for Transport, freight, lorry, battery electric, NMC-622 battery, 3.5t gro)
- Transport, freight, lorry, compressed gas, 3.5t gross weight, 2020, EURO-VI, long haul [CH]: 0.000284751 tkm
  (same comment as for Transport, freight, lorry, battery electric, NMC-622 battery, 3.5t gro)
- Transport, freight, lorry, compressed gas, 3.5t gross weight, 2020, EURO-VI, regional delivery [CH]: 0.00128138 tkm
  (same comment as for Transport, freight, lorry, battery electric, NMC-622 battery, 3.5t gro)
- Transport, freight, lorry, compressed gas, 3.5t gross weight, 2020, EURO-VI, urban delivery [CH]: 0.00128138 tkm
  (same comment as for Transport, freight, lorry, battery electric, NMC-622 battery, 3.5t gro)
- Transport, freight, lorry, diesel hybrid, 3.5t gross weight, 2020, EURO-VI, long haul [CH]: 0.00472555 tkm
  (same comment as for Transport, freight, lorry, battery electric, NMC-622 battery, 3.5t gro)
- Transport, freight, lorry, diesel hybrid, 3.5t gross weight, 2020, EURO-VI, regional delivery [CH]: 0.021265 tkm
  (same comment as for Transport, freight, lorry, battery electric, NMC-622 battery, 3.5t gro)
- Transport, freight, lorry, diesel hybrid, 3.5t gross weight, 2020, EURO-VI, urban delivery [CH]: 0.021265 tkm
  (same comment as for Transport, freight, lorry, battery electric, NMC-622 battery, 3.5t gro)
- Transport, freight, lorry, diesel, 3.5t gross weight, 2002, EURO-III, long haul [CH]: 0.00435553 tkm
  (same comment as for Transport, freight, lorry, battery electric, NMC-622 battery, 3.5t gro)
- Transport, freight, lorry, diesel, 3.5t gross weight, 2002, EURO-III, regional delivery [CH]: 0.0195999 tkm
  (same comment as for Transport, freight, lorry, battery electric, NMC-622 battery, 3.5t gro)
- Transport, freight, lorry, diesel, 3.5t gross weight, 2002, EURO-III, urban delivery [CH]: 0.0195999 tkm
  (same comment as for Transport, freight, lorry, battery electric, NMC-622 battery, 3.5t gro)
- Transport, freight, lorry, diesel, 3.5t gross weight, 2006, EURO-IV, long haul [CH]: 0.0160343 tkm
  (same comment as for Transport, freight, lorry, battery electric, NMC-622 battery, 3.5t gro)
- Transport, freight, lorry, diesel, 3.5t gross weight, 2006, EURO-IV, regional delivery [CH]: 0.0721546 tkm
  (same comment as for Transport, freight, lorry, battery electric, NMC-622 battery, 3.5t gro)
- Transport, freight, lorry, diesel, 3.5t gross weight, 2006, EURO-IV, urban delivery [CH]: 0.0721546 tkm
  (same comment as for Transport, freight, lorry, battery electric, NMC-622 battery, 3.5t gro)
- Transport, freight, lorry, diesel, 3.5t gross weight, 2010, EURO-V, long haul [CH]: 0.0314613 tkm
  (same comment as for Transport, freight, lorry, battery electric, NMC-622 battery, 3.5t gro)
- Transport, freight, lorry, diesel, 3.5t gross weight, 2010, EURO-V, regional delivery [CH]: 0.141576 tkm
  (same comment as for Transport, freight, lorry, battery electric, NMC-622 battery, 3.5t gro)
- Transport, freight, lorry, diesel, 3.5t gross weight, 2010, EURO-V, urban delivery [CH]: 0.141576 tkm
  (same comment as for Transport, freight, lorry, battery electric, NMC-622 battery, 3.5t gro)
- Transport, freight, lorry, diesel, 3.5t gross weight, 2020, EURO-VI, long haul [CH]: 0.0425299 tkm
  (same comment as for Transport, freight, lorry, battery electric, NMC-622 battery, 3.5t gro)
- Transport, freight, lorry, diesel, 3.5t gross weight, 2020, EURO-VI, regional delivery [CH]: 0.191385 tkm
  (same comment as for Transport, freight, lorry, battery electric, NMC-622 battery, 3.5t gro)
- Transport, freight, lorry, diesel, 3.5t gross weight, 2020, EURO-VI, urban delivery [CH]: 0.191385 tkm
  (same comment as for Transport, freight, lorry, battery electric, NMC-622 battery, 3.5t gro)

## Sources
- Cox B., 2025, 2025 - Mobitool integration project - Cox, INFRAS, Bern, CH

## Validation
Data from HBEFA 5.1 for the year 2020. Some technologies with very small shares in the fleet removed for simplicity. Technology shares normalised to ensure sum of 100%
