# Single cell, lithium-ion battery, LiFePO4

Dataset: EcoSpold 1, unit process
Functional unit: 1 kg
Category: electronics / component
Geography: CH
Time period: 2000-01 to 2014-12
Production volume: In 2008 there were 3'875 PV-plants with an annual production of 33'400 MWh
Share of production covered: 100 %
Generated by: Annika Messmer
accessRestrictedTo: 0
copyright: true

## General comment
Assumption that all components of a LiFePO4 cell are similar to the NCM battery cell except the cathode.;

## Included processes
All components of the battery cell: Anode, Cathode, Electrolyte, Separator, Cell container, as well as the energy, transport and facility required for the LiPO4 battery cell production.

## Technology
Electricity production for own consumption with battery-connected photovoltaic power plants mounted on buildings slanted roof. 922 kWh/kWp annual electricity output, 1117 kWh/m2 irradiation, 0.75 performance ratio, 13.2% module efficiency.

## Time period
Calculation of yield based on production with a state of the art plant.

## Reference product
- Single cell, lithium-ion battery, LiFePO4 [CH]: 1 kg
  SWITZERLAND

## Inputs from technosphere
All rows: lognormal SD95 1
- Copper, secondary, at refinery [RER]: 0.0003819 kg
- Polyethylene terephthalate, granulate, amorphous, at plant [RER]: 0.00020904 kg
- Cathode, lithium-ion battery, LiFePO4 [CH]: 0.43 kg
- Sheet rolling, aluminium [RER]: 0.002814 kg
- Water, decarbonised, at plant [RER]: 380 kg
- Anode, lithium-ion battery, graphite, at plant [RAS]: 0.39 kg
- Copper, primary, at refinery [GLO]: 0.0021641 kg
- Sheet rolling, copper [RER]: 0.002546 kg
- Nylon 6, at plant [RER]: 0.0002144 kg
- Separator, lithium-ion battery, at plant [RAS]: 0.022 kg
- Transport, freight, rail [RER]: 0.26214 tkm
- Injection moulding [RER]: 0.0012596 kg
- Polypropylene, granulate, at plant [RER]: 0.0008576 kg
- Metal working factory [RER]: 1.1712e-12 p
- Electrolyte, LiPF6, at plant [RAS]: 0.16 kg
- Polyethylene, LDPE, granulate, at plant [RER]: 6.7e-5 kg
- Facilities precious metal refinery [SE]: 1.9e-8 p
- Electricity, medium voltage, production RAS, at grid [RAS]: 22.7 kWh
- Plastics processing factory [RER]: 9.38e-13 p
- Aluminium casting, plant [RER]: 4.2746e-13 p
- Transport, freight, lorry, 32t-40t gross weight, fleet average [RER]: 0.10107 tkm

## Emissions to nature
- Heat, waste [emissions to air, high. pop.]: 100 MJ; lognormal SD95 1

## Sampling procedure
Statistical data for CH

## Sources
- Stolz P., Messmer A., Frischknecht R., 2016, 2016 - LCI road and non-road transport services - Stolz, Project report, 544, treeze Ltd., Uster, CH
Stolz P., Frischknecht R. (2016) Life Cycle Inventories of Road and Non-Road Transport Services. Project report. Volume: 544. treeze Ltd.. Uster, CH.
Type: Separate publication
Source: Report
First author: Stolz P.
Other authors: Frischknecht R.
Year: 2016
Title of anthology: Project report
Place of publication: Uster, CH
Publisher: treeze Ltd.
Volume No: 544

## Validation
Proof reading validation: 06.05.2017; Other validation: \\SRV01\ESU-Docs\Projektablage\536 PV-Batterie-Systeme ewz\EcoSpold\[536-Batterie_v0.2.xlsx]X-Process;
