# Disposal, ventilation system, Alterswohnungen Geeren

Dataset: EcoSpold 1, unit process
Functional unit: 1 p
Category: waste management / building demolition
Geography: CH
Time period: 2014-01 to 2014-12
Generated by: Alex Primas
accessRestrictedTo: 0
copyright: true

## General comment
Disposal of a ventilation system for a residential care home with apartments and multi-purpose hall. The inventory is based on a building with a total heated gross floor area of 3712 m2 and a total nominal air flow of 6000 m3/h, total weight of the components: 1674 kg/Unit, building with a specific air flow rate of 1.6 m3/h per m2 heated gross floor area. Data from call of bid including components for air handling units, ducts including insulation, air valves, roof-hoods, dampers, fire dampers, silencers. The data represent a ductwork made of galvanized steel and polyethylene tubes. It includes air handling units mainly with heat recovery. System with central air handling units. Building without ground heat exchanger.;

## Included processes
Transport to dismantling facilities, machines for handling in sorting plant, electricity demand for sorting plant, final disposal of waste material. Cut-off to recycling for metals.

## Geography
Specific to the technology mix encountered in sorting plants in Switzerland.

## Technology
Disposal to a sorting plant assumed. Metal pieces, copper in cables and electronic devices are recycled, plastic parts are incinerated, inert wastes (e.g. rock wool) are landfilled.

## Time period
Amount of material investigated in 2013. Disposal technology mix as used in late 1990ies

## Reference product
- Disposal, ventilation system, Alterswohnungen Geeren [CH]: 1 p
  SWITZERLAND

## Inputs from technosphere
- Disposal, EI 30 fire insulation, 50mm, 120kg/m3, reinforced alumium foil [CH]: 977.85 m2; lognormal SD95 1.24
  (2,4,1,1,1,5); Data related to production process
- Disposal, ventilation duct, steel, zinc coated, s= 0.87mm [CH]: 7.986 m2; lognormal SD95 1.24
  (2,4,1,1,1,5); Data related to production process
- Disposal, spiral-seam duct, steel, zinc coated, s= 0.5mm [CH]: 401.91 m2; lognormal SD95 1.24
  (2,4,1,1,1,5); Data related to production process
- Disposal, building, polyethylene/polypropylene products, to final disposal [CH]: 1579.8 kg; lognormal SD95 1.24
  (2,4,1,1,1,5); Data related to production process
- Disposal, ventilation duct, stainless steel, s= 0.62mm [CH]: 20.471 m2; lognormal SD95 1.24
  (2,4,1,1,1,5); Data related to production process
- Disposal, ventilation duct, steel, zinc coated, s= 1.0mm [CH]: 30.256 m2; lognormal SD95 1.24
  (2,4,1,1,1,5); Data related to production process
- Disposal, ventilation unit 3500 m3/h, w. cross plate heat excanger [CH]: 1.377 p; lognormal SD95 1.26
  (3,4,1,1,1,5); Data related to production process
- Disposal, ventilation system, Alterswohnungen Geeren, various components [CH]: 1 p; lognormal SD95 1.24
  (2,4,1,1,1,5); Data related to production process
- Disposal, ventilation equipment, central, 600-1200 m3/h [CH]: 1 p; lognormal SD95 1.26
  (3,4,1,1,1,5); Data related to production process
- Disposal, ventilation duct, steel, zinc coated, s= 0.75mm [CH]: 639.95 m2; lognormal SD95 1.24
  (2,4,1,1,1,5); Data related to production process
- Disposal, thermal insulation, 30mm, 40kg/m3, reinforced alumium foil [CH]: 313.7 m2; lognormal SD95 1.24
  (2,4,1,1,1,5); Data related to production process
- Disposal, ventilation duct, steel, zinc coated, s= 0.62mm [CH]: 431.47 m2; lognormal SD95 1.24
  (2,4,1,1,1,5); Data related to production process

## Sampling procedure
Waste-specific calculation based on production input data

## Sources
- Klingler M., Kasser U., Savi D., Primas A., Stettler Y., Gujer P., 2014, 2014 - LCA ventilation and heating systems - Klingler, Schlussbericht, BFE, Buero fuer Umweltchemie, B&H AG, Zuerich, CH
Klingler M., Kasser U., Savi D., Primas A., Stettler Y., Gujer P. (2014) Ökobilanzdaten für Lüftungs- und Wärmeanlagen. Schlussbericht, BFE. Bundesamt für Energie (BFE). Bern.
Type: Separate publication
Source: Report
First author: Klingler M.
Other authors: Kasser U., Savi D., Primas A., Stettler Y., Gujer P.
Year: 2014
Title of anthology: Schlussbericht, BFE
Place of publication: Bern
Publisher: Bundesamt für Energie (BFE)
