# Diborane, at plant

Dataset: EcoSpold 1, unit process
Functional unit: 1 kg
Category: chemicals / inorganic
Geography: GLO
Time period: 2000-01 to 2006-12
Share of production covered: 100 %
Generated by: Juergen Sutter
accessRestrictedTo: 0
copyright: true

## General comment
The multioutput-process "sodium tetrahydroborate fluorination" delivers the co-products diborane and sodium tetrafluoroborate. The allocation is based on stoechiometric calculation.;

## Included processes
Fluorination of sodium tetrahydroborate including materials, energy uses, infrastructure and emissions.

## Geography
The inventory is modelled for the world..

## Technology
Fluorination of sodium tetrahydroborate

## Time period
Time of publications.

## Reference product
- Diborane, at plant [GLO]: 1 kg
  Global

## Inputs from technosphere
- Chemical plant, organics [RER]: 4.0076e-10 p; lognormal SD95 3.09
  (4,5,na,na,na,na); Estimation
- Boron trifluoride, at plant [GLO]: 0.74249 kg; lognormal SD95 1.38
  (4,5,1,1,1,5); Stoechiometric calculation
- Transport, freight, rail [RER]: 0.63065 tkm; lognormal SD95 2.09
  (4,5,na,na,na,na); Standard distance 600km
- Sodium tetrahydroborate, at plant [GLO]: 0.31066 kg; lognormal SD95 1.38
  (4,5,1,1,1,5); Stoechiometric calculation
- Transport, freight, lorry, fleet average [RER]: 0.10532 tkm; lognormal SD95 2.09
  (4,5,na,na,na,na); Standard distance 100km
- Electricity, medium voltage, production ENTSO-E, at grid: 0.33241 kWh; lognormal SD95 1.3
  (4,5,na,na,na,na); Estimation
- Heat, natural gas, at industrial furnace 1MW [CH]: 1.99757 MJ; lognormal SD95 1.3
  (4,5,na,na,na,na); Estimation

## Inputs from nature
- Water, cooling, unspecified natural origin/m3 [resources, in water]: 0.023983 m3; lognormal SD95 1.3
  (4,5,na,na,na,na); Estimation

## Emissions to nature
- Boron [emissions to air, high. pop.]: 8.9782e-6 kg; lognormal SD95 5.1
  (4,5,na,na,na,na); Estimation
- Boron [emissions to water, river]: 0.010469 kg; lognormal SD95 5.1
  (4,5,na,na,na,na); Estimation
- Heat, waste [emissions to air, high. pop.]: 1.19916 MJ; lognormal SD95 1.3
  (4,5,na,na,na,na); Calculated from the electricity input
- Fluoride [emissions to water, river]: 0.031004 kg; lognormal SD95 1.62
  (4,5,na,na,na,na); Estimation
- Boron trifluoride [emissions to air, high. pop.]: 7.4249e-5 kg; lognormal SD95 1.62
  (4,5,na,na,na,na); Estimation
- Sodium [emissions to water, river]: 0.009382 kg; lognormal SD95 5.1
  (4,5,na,na,na,na); Estimation
- Water [emissions to water, unspecified]: 22.7839 kg; lognormal SD95 2.5196
  (5,5,5,5,5,BU:1.05); All uncertainty-values set to 5.0 by default. Balance of input water

## Sampling procedure
Literature data

## Extrapolations
Energy consumptions and emissions are estimated. Infrastructure and transports are calculated with standard values.

## Sources
- Sutter J., 2007, 2007 - LCI highly pure chemicals - Sutter, Final report ecoinvent Data v2.0, 19, Swiss Centre for LCI, ETH, Duebendorf and Uster, CH
Sutter, J., 0 (2007) Life Cycle Inventories of Highly Pure Chemicals. Final report ecoinvent Data v2.0. Editors: 0. Volume: 19. Swiss Centre for LCI, ETHZ. Duebendorf and St. Gallen, CH.
Type: Measurement on site
Source: CD-ROM
First author: Sutter, J.
Other authors: 0
Year: 2007
Name of editors: 0
Title of anthology: Final report ecoinvent Data v2.0
Place of publication: Duebendorf and St. Gallen, CH
Publisher: Swiss Centre for LCI, ETHZ
Volume No: 19

## Validation
Proof reading validation: passed.; Other validation: none;
