# Hazardous waste, from combined oil and gas production, offshore

Dataset: EcoSpold 1, unit process
Functional unit: 1 kg
Category: fuels / natural gas\produced gas\processes
Geography: NO
Time period: 2010-01 to 2010-12
Production volume: 1812t hazardous waste in 2010.
Share of production covered: 100 %
Generated by: Salome Schori
accessRestrictedTo: 0
copyright: true

## General comment
Without drilling wastes and waste going to recycling (batteries).;

## Included processes
This dataset includes hazardous waste from the combined offshore production of oil and gas. It includes: hazardous blasting sands, chemicals, paint, oil contaminated wastes, u.o. Batteries are assumed to go to recycling and are therefore excluded.

## Geography
Data from Norwegian offshore oil and gas production.

## Technology
Waste treatment technology according to Swiss standard.

## Time period
2010

## Reference product
- Hazardous waste, from combined oil and gas production, offshore [NO]: 1 kg
  NORWAY

## Inputs from technosphere
- Disposal, hazardous waste, 25% water, to hazardous waste incineration [CH]: 0.96301 kg; lognormal SD95 1.05
  (1,1,1,1,1,1,BU:1.05); OLF 2011. Blasting sand, chemicals, light bulbs, oil contaminated waste and spray cans.
- Disposal, emulsion paint remains, 0% water, to hazardous waste incineration [CH]: 0.036986 kg; lognormal SD95 1.05
  (1,1,1,1,1,1,BU:1.05); OLF 2011

## Sampling procedure
Literature data.

## Sources
- Frischknecht R., Stucki M., Flury K., Itten R., Tuchschmid M., 2012, 2012 - Prim. energy fact. of energy systems - Frischknecht, Project report, 407, ESU-services Ltd., Uster, CH
Schori S., Frischknecht R. (2011) Life Cycle Inventories of energy systems. Project report. Volume: 407. ESU-services Ltd.. Uster, CH.
Type: Separate publication
Source: Report
First author: Schori S.
Other authors: Frischknecht R.
Year: 2011
Title of anthology: Project report
Place of publication: Uster, CH
Publisher: ESU-services Ltd.
Volume No: 407

## Validation
Proof reading validation: 24.09.2012; Other validation: \\server\e\ESU-Docs\Projekte laufend\407 Update LCI Energiesysteme\EcoSpold\Erdgas EcoSpold\[407_NG ProdNO_v1.0.xlsx]X-Process;
