# Use of fixed IP access network per GB

Dataset: EcoSpold 1, unit process
Functional unit: 1 unit
Category: computers & network / use cases
Geography: CH
Time period: 2023-01 to 2029-12
Synonyms: Übertragungsnetz; Zugriff; Festnetz
Generated by: Lugas Raka Adrianto, Maulana Permana Ajie, Didier Beloin-Saint-Pierre
accessRestrictedTo: 0
copyright: false

## General comment
The data set represents the mix of fixed network in Switzerland;

## Included processes
The datasets represents the split of fixed networks (cable, optic fibre, xDSL) in Switzerland for the reference year of 2014. The functional unit = 1 GB.

## Geography
Data for Swiss networks

## Technology
The mix of Swiss access transmission network, fixed.

## Reference product
- Use of fixed IP access network per GB [CH]: 1 p
  1 Unit = 1 GB of data transfer (based on OECD statistics for subscribers)

## Inputs from technosphere
- Use of cable, fixed IP access network per GB [CH]: 0.31 p; lognormal SD95 1.23
  (2,3,1,2,2,5,BU:1.05) Shares based on https://www.oecd.org/digital/broadband/broadband-statistics/
- Use of optic fibre, fixed IP access network per GB [CH]: 0.09 p; lognormal SD95 1.23
  (same comment as for Use of cable, fixed IP access network per GB)
- Use of xDSL, fixed IP access network per GB [CH]: 0.6 p; lognormal SD95 1.23
  (same comment as for Use of cable, fixed IP access network per GB)

## Sampling procedure
Literature & own estimations

## Extrapolations
Average technology

## Sources
- Raka Adrianto L., Permana Ajie M., Beloin-Saint-Pierre D., 2024, 2024 - LCI ICT sector - Raka Adrianto, Empa, St. Gallen, CH

## Validation
Proof reading validation: Passed, Other validation: none, Validator: Mischa Zschokke, Company: Carbotech, Country: CH
