# Boron trifluoride, at plant

Dataset: EcoSpold 1, unit process
Functional unit: 1 kg
Category: chemicals / inorganic
Geography: GLO
Time period: 2000-01 to 2006-12
Share of production covered: 100 %
Generated by: Juergen Sutter
accessRestrictedTo: 0
copyright: true

## General comment
The process "boron trifluoride , at plant, GLO" is modelled for the production of boron trifluoride from boric acid and hydrofluoric acid in the world. Raw materials are modelled with a stoechiometric calculation. Energy consumptions and emissions are estimated. Infrastructure and transports are calculated with standard values.;
CAS number: 007637-07-2;
Formula: BF3;

## Included processes
Production of boron trifluoride including materials, energy uses, infrastructure and emissions.

## Geography
The inventory is modelled for the world.

## Technology
Fluorination of boric acid

## Time period
Time of publications

## Reference product
- Boron trifluoride, at plant [GLO]: 1 kg
  Global

## Inputs from technosphere
- Transport, freight, lorry, fleet average [RER]: 0.18885 tkm; lognormal SD95 2.095
  (4,5,na,na,na,na); Standard distances
- Hydrogen fluoride, at plant [GLO]: 0.92879 kg; lognormal SD95 1.3765
  (4,5,1,1,1,5); Stoechiometric calculation
- Heat, natural gas, at industrial furnace 1MW [CH]: 2 MJ; lognormal SD95 1.3001
  (4,5,na,na,na,na); Estimation
- Chemical plant, organics [RER]: 4e-10 p; lognormal SD95 3.0909
  (4,5,na,na,na,na); Estimation
- Boric acid, anhydrous, powder, at plant [RER]: 0.95975 kg; lognormal SD95 1.3765
  (4,5,1,1,1,5); Stoechiometric calculation
- Electricity, medium voltage, production ENTSO-E, at grid: 0.333 kWh; lognormal SD95 1.3001
  (4,5,na,na,na,na); Estimation
- Transport, freight, rail [RER]: 1.1331 tkm; lognormal SD95 2.095
  (4,5,na,na,na,na); Standard distances

## Inputs from nature
- Water, cooling, unspecified natural origin/m3 [resources, in water]: 0.024 m3; lognormal SD95 1.3001
  (4,5,na,na,na,na); Estimation

## Emissions to nature
- Boron [emissions to air, high. pop.]: 0.00034056 kg; lognormal SD95 5.1037
  (4,5,na,na,na,na); Estimation
- Heat, waste [emissions to air, high. pop.]: 1.1988 MJ; lognormal SD95 1.3001
  (4,5,na,na,na,na); Calculated from the electricity input
- Boron [emissions to water, river]: 0.0081734 kg; lognormal SD95 5.1037
  (4,5,na,na,na,na); Estimation
- Fluoride [emissions to water, river]: 0.042353 kg; lognormal SD95 1.6169
  (4,5,na,na,na,na); Estimation
- Hydrogen fluoride [emissions to air, high. pop.]: 0.0018576 kg; lognormal SD95 1.6169
  (4,5,na,na,na,na); Estimation
- Water [emissions to water, unspecified]: 22.8 kg; lognormal SD95 2.5196
  (5,5,5,5,5,BU:1.05); All uncertainty-values set to 5.0 by default. Balance of input water

## Sampling procedure
Standard values

## Sources
- Sutter J., 2007, 2007 - LCI highly pure chemicals - Sutter, Final report ecoinvent Data v2.0, 19, Swiss Centre for LCI, ETH, Duebendorf and Uster, CH
Sutter, J., 0 (2007) Life Cycle Inventories of Highly Pure Chemicals. Final report ecoinvent Data v2.0. Editors: 0. Volume: 19. Swiss Centre for LCI, ETHZ. Duebendorf and St. Gallen, CH.
Type: Measurement on site
Source: CD-ROM
First author: Sutter, J.
Other authors: 0
Year: 2007
Name of editors: 0
Title of anthology: Final report ecoinvent Data v2.0
Place of publication: Duebendorf and St. Gallen, CH
Publisher: Swiss Centre for LCI, ETHZ
Volume No: 19

## Validation
Proof reading validation: passed.; Other validation: none;
