# Laminated safety glass, at plant

Dataset: EcoSpold 1, unit process
Functional unit: 1 m2
Category: construction materials / glazing
Geography: CH
Time period: 2000-01 to 2016-12
Generated by: Matthias Klingler
accessRestrictedTo: 0
copyright: true

## General comment
Herstellung Verbundsicherheitsglas pro m2 Glas.
Technology: Daten von Flachglas Schweiz Wikon, 2013
Version: 0.0

Local category: construction materials
Local subcategory: Verglasungen

## Technology
Daten von Flachglas Schweiz Wikon, 2013

## Reference product
- Laminated safety glass, at plant [CH]: 1 m2
  SWITZERLAND

## Inputs from technosphere
- Transport, freight, lorry, fleet average [RER]: 10.8618 tkm; lognormal SD95 1.1449
  (2;3;1;1;1)
- Foaming, expanding [RER]: 0.001596 kg; lognormal SD95 1.1025
  (1;3;1;1;1)
- Disposal, plastics, mixture, 15.3% water, to municipal incineration [CH]: 0.1191 kg; lognormal SD95 1.1025
  (1;3;1;1;1)
- Polyethylene terephthalate, granulate, amorphous, at plant [RER]: 0.009413 kg; lognormal SD95 1.1025
  (1;3;1;1;1)
- Natural gas, burned in industrial furnace 1MWth [CH]: 2.872 MJ; lognormal SD95 1.1025
  (1;3;1;1;1)
- Extrusion, plastic film [RER]: 1.03043 kg; lognormal SD95 1.1025
  (1;3;1;1;1)
- Treatment, sewage, to wastewater treatment, class 2 [CH]: 0.08195 m3; lognormal SD95 1.1025
  (1;3;1;1;1)
- Polyethylene, HDPE, granulate, at plant [RER]: 1.017 kg; lognormal SD95 1.1025
  (1;3;1;1;1)
- Disposal, glass, 0% water, to construction waste landfill [CH]: 3.119 kg; lognormal SD95 1.1025
  (1;3;1;1;1)
- Coating, flat glass [CH]: 12 kg
- Electricity, medium voltage, at grid [CH]: 6.866 kWh; lognormal SD95 1.1025
  (1;3;1;1;1)
- Polyethylene, LDPE, granulate, at plant [RER]: 0.001596 kg; lognormal SD95 1.1025
  (1;3;1;1;1)
- Tap water, at user [CH]: 186.6 kg; lognormal SD95 1.1025
  (1;3;1;1;1)
- Float glass, at plant [RER]: 24.05 kg; lognormal SD95 1.1025
  (1;3;1;1;1)

## Sources
- Created for EcoSpold 1 compatibility, Sachbilanzen von Energiesystemen. Final report No. 6 ecoinvent data v2.0, 6
Faist Emmenegger, M., Heck, T., Jungbluth, N. (2007) Erdgas. Sachbilanzen von Energiesystemen. Final report No. 6 ecoinvent data v2.0. Editors: Dones R.. Volume: 6. Swiss Centre for LCI, PSI. Dübendorf and Villigen, CH.
Type: Measurement on site
Source: CD-ROM
First author: Faist Emmenegger, M.
Other authors: Heck, T., Jungbluth, N.
Year: 2007
Name of editors: Dones R.
Title of anthology: Sachbilanzen von Energiesystemen. Final report No. 6 ecoinvent data v2.0
Place of publication: Dübendorf and Villigen, CH
Publisher: Swiss Centre for LCI, PSI
Volume No: 6
