# Ethoxylated alcohols (AE7), petrochemical, at plant

Dataset: EcoSpold 1, unit process
Functional unit: 1 kg
Category: chemicals / washing agents\tensides
Geography: RER
Time period: 1992-01 to 1995-12
Production volume: 150000000
Share of production covered: 40 %
Generated by: Rainer Zah
accessRestrictedTo: 0
copyright: true

## General comment
data based on the ECOSOL study of the European surfactant industry. Allocations in multioutput processes were made, using the relative mass outputs of products.;

## Included processes
This module contains material and energy input, transport efforts, production of waste and emissions for the production of alcohol etoxylate out of fatty alcohols and ethylene oxide. Infrastructure has been estimated. No water consumption included.

## Geography
Data based on the European ethoxylated alcohols production

## Technology
Average technology for the production of AE with 7 polyether units, representing typical European production mix in the mid 90s

## Time period
data of published literature

## Reference product
- Ethoxylated alcohols (AE7), petrochemical, at plant [RER]: 1 kg
  Europe

## Inputs from technosphere
- Chemical plant, organics [RER]: 4e-10 p; lognormal SD95 3.06
  (2,3,3,2,1,4);
- Fatty alcohol, petrochemical, at plant [RER]: 0.416 kg; lognormal SD95 1.25
  (2,3,3,2,1,4);
- Nitrogen, liquid, at plant [RER]: 0.019 kg; lognormal SD95 1.25
  (2,3,3,2,1,4);
- Heat, natural gas, at industrial furnace 1MW [CH]: 0.24 MJ; lognormal SD95 1.25
  (2,3,3,2,1,4);
- Ethylene oxide, at plant [RER]: 0.556 kg; lognormal SD95 1.25
  (2,3,3,2,1,4);
- Heat, at hard coal industrial furnace 1-10MW [RER]: 0.18 MJ; lognormal SD95 1.25
  (2,3,3,2,1,4);
- Heat, heavy fuel oil, at industrial furnace 1MW [RER]: 0.28 MJ; lognormal SD95 1.25
  (2,3,3,2,1,4);
- Transport, freight, lorry, fleet average [RER]: 0.775 tkm; lognormal SD95 2.07
  (2,3,3,2,1,4);
- Electricity, medium voltage, production ENTSO-E, at grid: 0.0624 kWh; lognormal SD95 1.25
  (2,3,3,2,1,4);

## Emissions to nature
- COD, Chemical Oxygen Demand [emissions to water, river]: 0.00124 kg; lognormal SD95 1.58
  (2,3,3,2,1,4);
- Fluoride [emissions to water, river]: 2e-8 kg; lognormal SD95 1.58
  (2,3,3,2,1,4);
- NMVOC, non-methane volatile organic compounds, unspecified origin [emissions to air, high. pop.]: 0.00252 kg; lognormal SD95 1.58
  (2,3,3,2,1,4);
- Phenol [emissions to water, river]: 3.17e-9 kg; lognormal SD95 3.06
  (2,3,3,2,1,4);
- Sulfide [emissions to water, river]: 2.6e-7 kg; lognormal SD95 1.58
  (2,3,3,2,1,4);
- Hydrocarbons, unspecified [emissions to water, river]: 4.48e-8 kg; lognormal SD95 3.06
  (2,3,3,2,1,4);
- Chromium [emissions to water, river]: 3.5e-8 kg; lognormal SD95 5.07
  (2,3,3,2,1,4);
- Ammonia [emissions to air, high. pop.]: 4.51e-6 kg; lognormal SD95 1.58
  (2,3,3,2,1,4);
- Sulfate [emissions to water, river]: 8.88e-6 kg; lognormal SD95 1.58
  (2,3,3,2,1,4);
- Carbon dioxide, fossil [emissions to air, high. pop.]: 0.0213 kg; lognormal SD95 1.25
  (2,3,3,2,1,4);
- Nitrogen oxides [emissions to air, high. pop.]: 9.93e-5 kg; lognormal SD95 1.58
  (2,3,3,2,1,4);
- Zinc [emissions to water, river]: 1.88e-8 kg; lognormal SD95 5.07
  (2,3,3,2,1,4);
- Suspended solids, unspecified [emissions to water, river]: 5.6e-6, 2.56e-5 kg (2 entries); lognormal SD95 1.58
  (2,3,3,2,1,4);
- Sulfur dioxide [emissions to air, high. pop.]: 0.00015 kg; lognormal SD95 1.25
  (2,3,3,2,1,4);
- Oils, unspecified [emissions to water, river]: 7.93e-7 kg; lognormal SD95 3.06
  (2,3,3,2,1,4);
- Aluminium [emissions to water, river]: 1.84e-10 kg; lognormal SD95 1.58
  (2,3,3,2,1,4);
- Aldehydes, unspecified [emissions to air, high. pop.]: 1.01e-5 kg; lognormal SD95 2.07
  (2,3,3,2,1,4);
- Particulates, > 10 um [emissions to air, high. pop.]: 8.44e-6 kg; lognormal SD95 1.58
  (2,3,3,2,1,4);
- Chloride [emissions to water, river]: 1.92e-6 kg; lognormal SD95 1.58
  (2,3,3,2,1,4);
- Nickel [emissions to water, river]: 1.39e-9 kg; lognormal SD95 5.07
  (2,3,3,2,1,4);
- Acidity, unspecified [emissions to water, river]: 6e-7 kg; lognormal SD95 1.58
  (2,3,3,2,1,4);
- Carbon monoxide, fossil [emissions to air, high. pop.]: 5.18e-5 kg; lognormal SD95 5.07
  (2,3,3,2,1,4);
- Iron [emissions to water, river]: 4.29e-8 kg; lognormal SD95 5.07
  (2,3,3,2,1,4);
- BOD5, Biological Oxygen Demand [emissions to water, river]: 0.000879 kg; lognormal SD95 1.58
  (2,3,3,2,1,4);

## Sampling procedure
data out of ECOSOL study of European Surfactant Industry. Common translation rules used, reported in Chemical report (Althaus et al. 2003).

## Extrapolations
see technology

## Sources
- Zah R., Hischier R., 2007, 2007 - LCI detergents - Zah, Final report ecoinvent data v2.0, 12, Swiss Centre for LCI, Empa - TSL, Duebendorf and St. Gallen, CH
Zah R., Hischier R. (2007) Life Cycle Inventories of Detergents. Final report ecoinvent data v2.0. Volume: 12. Swiss Centre for LCI, Empa - TSL. Dübendorf, CH.
Type: Measurement on site
Source: CD-ROM
First author: Zah R.
Other authors: Hischier R.
Year: 2007
Title of anthology: Final report ecoinvent data v2.0
Place of publication: Dübendorf, CH
Publisher: Swiss Centre for LCI, Empa - TSL
Volume No: 12

## Validation
Proof reading validation: Passed.; Other validation: none;
