# Rhodium, primary, at refinery

Dataset: EcoSpold 1, unit process
Functional unit: 1 kg
Category: metals / non ferro
Geography: ZA
Time period: 2000-01 to 2000-12
Production volume: 221 t / a
Share of production covered: 63 %
Generated by: Mischa Classen
accessRestrictedTo: 0
copyright: true

## General comment
The multioutput-process "platinum group metal production, primary" delivers the co-products "platinum, primary, at refinery", "palladium, primary, at refinery", "rhodium, primary, at refinery", "nickel, primary, from platinum group metal production" and "copper, primary, from platinum group metal production" in South Africa (ZA). The module is designed for the use of the metal in technical systems, where it plays a minor role like the use in manufacturing of electronic or technical chemistry using certain catalysts. It is not to be used if the impact of the PGM within the modelled process in scope is considered to be high. In such cases, a more detailed analysis depending on scope and allocation procedures has to be conducted. The data used is mainly based on a LCA study for autocatalysts in Germany.;

## Included processes
The module includes a mining and a beneficiation step with the mining infrastructure and disposal of overburden and tailings. Subsequently it includes the metallurgy step with the disposal of slag, the infrastructure and the separation of the co-products nickel and copper, and the refining step yielding the desired PGM-mix inclusively the refining infrastructure. Production, application and emissions of most agents used in beneficiation and metallurgy are also included.

## Technology
Mining is done underground, followed by beneficiation trough flotation where considerable amounts of agents are added. Overburden and tailings are disposed on the mining site and partly refilled. In ZA a electric arc furnace with a Søderberg electrode system and a Pierce-Smith-Converter is used. sulphur dioxide in the off-gas is recovered producing sulphuric acid. The separation of non ferrous metals is done hydrometallurgically, the refining by selective precipitation. Allthough electricity production in ZA is mainly coal based, the UCTE production mix is inventoried.

## Reference product
- Rhodium, primary, at refinery [ZA]: 1 kg
  SOUTH AFRICA

## Inputs from technosphere
- Diesel, burned in building machine, average [CH]: 41461.9 MJ; lognormal SD95 2.33
  (4,3,2,2,4,5,5)
- Disposal, nickel smelter slag, 0% water, to residual material landfill [CH]: 1369.31 kg; lognormal SD95 1.13
  (2,2,2,3,1,4) 6;
- Hydrogen cyanide, at plant [RER]: 19.8379 kg; lognormal SD95 2
  reported values
- Chemicals inorganic, at plant [GLO]: 833.491 kg; lognormal SD95 2
  reported values
- Natural gas, burned in industrial furnace 1MWth [CH]: 40971.3 MJ; lognormal SD95 1.13
  (2,2,1,1,1,4,1)
- Non-ferrous metal mine, underground [GLO]: 1.061e-5 p; lognormal SD95 3.07
  (3,2,1,1,3,4,9)
- Chemical plant, organics [RER]: 9.2625e-10 p; lognormal SD95 3.3
  (4,2,1,5,4,4,9)
- Conveyor belt, at plant [RER]: 0.012013 m; lognormal SD95 3.93
  (5,4,3,3,5,6,9)
- Disposal, sulfidic tailings, off-site [GLO]: 291297 kg; lognormal SD95 1.13
  (2,2,2,3,1,4) 6;
- Chemicals organic, at plant [GLO]: 127.15 kg; lognormal SD95 2
  reported values
- Non-ferrous metal smelter [GLO]: 5.5283e-8 p; lognormal SD95 3.3
  (4,2,1,5,4,4,9)
- Electricity, medium voltage, production ENTSO-E, at grid: 46648.9 kWh; lognormal SD95 1.26
  (3,2,1,1,3,4) 2;
- Limestone, milled, packed, at plant [CH]: 1126.91 kg; lognormal SD95 2
  reported values
- Blasting [RER]: 0.28279 kg; lognormal SD95 1.26
  (3,2,1,1,3,4,1)

## Inputs from nature
- Water, well [resources, in water]: 78.884 m3; lognormal SD95 1.26
  (3,2,1,1,3,4,12)
- Rhodium, Rh 2.4E-5%, Pt 4.8E-4%, Pd 2.0E-4%, Ni 3.7E-2%, Cu 5.2E-2% in ore [resources, in ground]: 1.11209 kg; lognormal SD95 1.12
  reported values
- Transformation, from unknown [resources, land]: 1.40758 m2; lognormal SD95 2.03
  (3,2,3,1,1,2,8); calculation based on reported value
- Occupation, mineral extraction site [resources, land]: 99.7213 m2a; lognormal SD95 1.53
  (3,2,3,1,1,2,7); calculation based on reported value
- Transformation, to mineral extraction site [resources, land]: 1.40758 m2; lognormal SD95 2.03
  (3,2,3,1,1,2,8); calculation based on reported value
- Water, river [resources, in water]: 293.423 m3; lognormal SD95 1.13
  (2,2,1,1,1,4,12)

## Emissions to nature
- Beryllium [emissions to air, low. pop.]: 0.00057409 kg; lognormal SD95 1.59
  (3,2,1,1,3,4,31)
- Nickel [emissions to water, river]: 7.7183 kg; lognormal SD95 10
  (,,,,,) ; reported values
- Arsenic [emissions to water, river]: 0.93555 kg; lognormal SD95 10
  (,,,,,) ; reported values
- Particulates, < 2.5 um [emissions to air, low. pop.]: 10.8652 kg; lognormal SD95 3.69
  (3,2,1,1,5,4) 20;
- Manganese [emissions to water, river]: 7.82461 kg; lognormal SD95 10
  (,,,,,) ; reported values
- Fluorine [emissions to air, low. pop.]: 0.21007 kg; lognormal SD95 1.59
  (3,2,1,1,3,4,31)
- Zinc [emissions to water, river]: 24.0267 kg; lognormal SD95 10
  (,,,,,) ; reported values
- Boron [emissions to air, low. pop.]: 0.0022113 kg; lognormal SD95 1.59
  (3,2,1,1,3,4,31)
- Selenium [emissions to air, low. pop.]: 1.1057e-5 kg; lognormal SD95 1.59
  (3,2,1,1,3,4,31)
- Dioxin, 2,3,7,8 Tetrachlorodibenzo-p- [emissions to air, low. pop.]: 5.3369e-9 kg; lognormal SD95 3.07
  (3,2,1,1,3,4,21)
- Calcium [emissions to water, river]: 216.878 kg; lognormal SD95 10
  reported values
- Particulates, > 2.5 um, and < 10um [emissions to air, low. pop.]: 98.0203 kg; lognormal SD95 2.69
  (3,2,1,1,5,4) 19;
- NMVOC, non-methane volatile organic compounds, unspecified origin [emissions to air, low. pop.]: 0.10653 kg; lognormal SD95 1.59
  (3,2,1,1,3,4,16)
- Mercury [emissions to air, low. pop.]: 1.1057e-5 kg; lognormal SD95 1.59
  (3,2,1,1,3,4,31)
- BOD5, Biological Oxygen Demand [emissions to water, river]: 2.23566 kg; lognormal SD95 10
  (,,,,,) ; reported values
- Chromium [emissions to air, low. pop.]: 0.022113 kg; lognormal SD95 1.59
  (3,2,1,1,3,4,31)
- Manganese [emissions to air, low. pop.]: 0.21007 kg; lognormal SD95 1.59
  (3,2,1,1,3,4,31)
- Sulfate [emissions to water, river]: 748.441 kg; lognormal SD95 10
  (,,,,,) ; reported values
- Cobalt [emissions to air, low. pop.]: 0.020412 kg; lognormal SD95 5.08
  (3,2,1,1,3,4) 22;
- Suspended solids, unspecified [emissions to water, river]: 1.64147 kg; lognormal SD95 10
  (,,,,,) ; reported values
- Carbon disulfide [emissions to air, low. pop.]: 56.3457 kg; lognormal SD95 2.31
  (4,2,2,5,4,4,23)
- Copper [emissions to water, river]: 2.50898 kg; lognormal SD95 10
  (,,,,,) ; reported values
- Lead [emissions to air, low. pop.]: 0.019689 kg; lognormal SD95 5.08
  (3,2,1,1,3,4) 22;
- Tin [emissions to air, low. pop.]: 0.0034871 kg; lognormal SD95 5.08
  (3,2,1,1,3,4,22)
- DOC, Dissolved Organic Carbon [emissions to water, river]: 1.31585 kg; lognormal SD95 10
  (,,,,,) ; reported values
- Nitrogen, organic bound [emissions to water, river]: 7.22926 kg; lognormal SD95 10
  (,,,,,) ; reported values
- Antimony [emissions to air, low. pop.]: 0.044226 kg; lognormal SD95 1.59
  (3,2,1,1,3,4,31)
- Zinc [emissions to air, low. pop.]: 0.095894 kg; lognormal SD95 5.08
  (3,2,1,1,3,4) 22;
- Mercury [emissions to water, river]: 0.011971 kg; lognormal SD95 10
  (,,,,,) ; reported values
- Heat, waste [emissions to air, low. pop.]: 182472 MJ; lognormal SD95 1.26
  (3,2,1,1,3,4) 2;
- Arsenic [emissions to air, low. pop.]: 0.0034445 kg; lognormal SD95 5.08
  (3,2,1,1,3,4) 22;
- Aluminium [emissions to water, river]: 27.4287 kg; lognormal SD95 10
  (,,,,,) ; reported values
- Particulates, > 10 um [emissions to air, low. pop.]: 112.479 kg; lognormal SD95 2.26
  (3,2,1,1,5,4) 18;
- Sulfur dioxide [emissions to air, low. pop.]: 406.114 kg; lognormal SD95 1.38
  (4,2,2,1,3,5) 15;
- TOC, Total Organic Carbon [emissions to water, river]: 1.31585 kg; lognormal SD95 10
  (,,,,,) ; reported values
- Cadmium [emissions to air, low. pop.]: 2.4239e-5 kg; lognormal SD95 1.59
  (3,2,1,1,3,4,31)
- COD, Chemical Oxygen Demand [emissions to water, river]: 3.36414 kg; lognormal SD95 10
  (,,,,,) ; reported values
- Nickel [emissions to air, low. pop.]: 0.034233 kg; lognormal SD95 1.59
  (3,2,1,1,3,4) 31;
- Cadmium [emissions to water, river]: 0.10036 kg; lognormal SD95 10
  (,,,,,) ; reported values
- Lead [emissions to water, river]: 0.88877 kg; lognormal SD95 10
  (,,,,,) ; reported values
- Nitrogen oxides [emissions to air, low. pop.]: 0.08151 kg; lognormal SD95 1.59
  (3,2,1,1,3,4,16)
- Cyanide [emissions to water, river]: 2.19004 kg; lognormal SD95 3.84
  (4,2,2,3,4,4) 33; including stdev of sodium cyanide
- Iron [emissions to water, river]: 92.2794 kg; lognormal SD95 10
  (,,,,,) ; reported values
- Copper [emissions to air, low. pop.]: 0.032319 kg; lognormal SD95 5.08
  (3,2,1,1,3,4) 22;
- Tin [emissions to water, river]: 0.00077608 kg; lognormal SD95 10
  reported values
- Carbon dioxide, fossil [emissions to air, unspecified]: 584.72 kg; lognormal SD95 1.58
  (4,2,1,1,4,4) 14; excluding stdev of lime addition
- Chromium [emissions to water, river]: 0.17435 kg; lognormal SD95 10
  (,,,,,) ; reported values
- Cobalt [emissions to water, river]: 0.24877 kg; lognormal SD95 10
  (,,,,,) ; reported values
- Water [emissions to water, unspecified]: 70995.6, 278752 kg (2 entries); lognormal SD95 2.5196
  (5,5,5,5,5,BU:1.05); All uncertainty-values set to 5.0 by default. Balance of input water

## Sampling procedure
Literature

## Extrapolations
see Geography and Technology

## Sources
- Classen M., Althaus H.-J., Blaser S., Scharnhorst W., Tuchschmid M., Jungbluth N., Faist Emmenegger M., 2009, 2009 - LCI metals - Classen, Final report ecoinvent data v2.1, 10, Swiss Centre for LCI, Empa, ESU-services Ltd., Duebendorf, CH
Classen M., Althaus H.-J., Blaser S., Doka G., Jungbluth N., Tuchschmid M. (2008) Life Cycle Inventories of Metals. Final report ecoinvent data v2.1. Volume: 10. Issue: 0. Swiss Centre for LCI, Empa - TSL. Dübendorf, CH.
Type: Measurement on site
Source: CD-ROM
First author: Classen M.
Other authors: Althaus H.-J., Blaser S., Doka G., Jungbluth N., Tuchschmid M.
Year: 2008
Title of anthology: Final report ecoinvent data v2.1
Place of publication: Dübendorf, CH
Publisher: Swiss Centre for LCI, Empa - TSL
Volume No: 10
Issue No: 0

## Validation
Proof reading validation: passed; Other validation: none;
