# Disposal, expanded polystyrene, 5% water, to municipal incineration

Dataset: EcoSpold 1, unit process
Functional unit: 1 kg
Category: waste management / municipal incineration
Geography: CH
Time period: 2000-01 to 2000-12
Generated by: Gabor Doka
accessRestrictedTo: 0
copyright: true

## General comment
This dataset represents the activity of waste disposal of waste expanded polystyrene in a municipal solid waste incinerator (MSWI) Recommended use of this dataset: For EPS, which goes to incineration as part of communal waste mixture. Larger amounts of clean, separated EPS could go to recycling. For non-expanded polystyrene use other dataset. Waste composition (wet, in ppm): upper heating value 33.2 MJ/kg; lower heating value 32.2 MJ/kg; H2O 1988.4; O 38626; H 77592; C 863430; S 674.8; N 1931.3; P n.a.; B n.a.; Cl 1125.5; Br 6700; F 14.167; I n.a.; Ag n.a.; As 1.8311; Ba 179.73; Cd 23.201; Co 30.444; Cr 39.382; Cu 106.94; Hg 0.81832; Mn 77.018; Mo n.a.; Ni 19.852; Pb 14.848; Sb 41.408; Se 2.0238; Sn 25.255; V 277.7; Zn 829.75; Be 0.48186; Sc n.a.; Sr 85.289; Ti 963.72; Tl 0.38549; W n.a.; Si n.a.; Fe 3590.5; Ca n.a.; Al 192.74; K n.a.; Mg n.a.; Na 1412.3; Share of carbon in waste that is biogenic 0%. Share of metals in waste not oxidised and bulk-recyclable (exclude very small or thin parts) Iron: 0%; Alu: 0%; Copper: 0%. One kg of this waste produces 0.02561 kg of slag and 0.01194 kg of residues, which are landfilled. Additional solidification with 0.004777 kg of cement. Net energy production: 4.07MJ/kg electric energy and 7.88MJ/kg thermal energy. Recovery of metal scrap to recycling: 0g iron scrap, 0g aluminium scrap, 0g copper scrap.;;

## Included processes
Waste incineration from waste reception gate further downstream (excluding transport to the MSWI plant). Waste-specific air and water emisions from incineration, auxiliary material consumption for flue gas cleaning. Short-term emissions to river water and long-term emisisons to ground water from slag compartment (from bottom ash) and residual material landfill (from solidified fly ashes and scrubber slugde). Waste-specific process energy demands for MSWI and net energy generation.

## Geography
Specific to the technology mix encountered in Switzerland in 2010. Well applicable to modern incineration practices in Europe, North America or Japan.

## Technology
average Swiss MSWI plants in 2010 (grate incinerators) with electrostatic precipitator for fly ash (ESP), wet flue gas scrubber and 25% SNCR , 42.77% SCR-high dust , 32.68% SCR-low dust -DeNOx facilities and 0% without Denox (weighted according to mass of burnt waste, representing Swiss average). Efficiency of iron scrap separation from slag : 58%. Efficiency of non-ferrous scrap separation from slag : 31%. Gross electric efficiency technology mix 15.84% and Gross thermal efficiency technology mix 28.51%

## Time period
Waste composition as given in literature reference, theoretical data or other source. Transfer coefficients for modern MSWI.

## Reference product
- Disposal, expanded polystyrene, 5% water, to municipal incineration [CH]: 1 kg
  SWITZERLAND

## Inputs from technosphere
- Transport, freight, rail [RER]: 0.0069959 tkm; lognormal SD95 1.1747
  Transport services to transport incineration residues to landfills and to transport auxilliary inputs of the incinerator plant. uncertainty calculated from uncertainty in average auxiliary material input, the uncertainty of the waste composition of this waste and the uncertainty in generic transportation distances
- Process-specific burdens, residual material landfill [CH]: 0.011943 kg; lognormal SD95 1.6808
  mass-specific expenditures required for landfilling of incineration residues. uncertainty is calculated from uncertainties in waste composition and transfer coefficients in incinerator
- Ammonia, liquid, at regional storehouse [CH]: 0.0011497 kg; lognormal SD95 2.7552
  Input to DeNOx stage (100% NH3). uncertainty calculated from uncertainty in average DeNOx input, uncertainty in the share of thermal NOx, uncertainty of nitrogen content in average municipal waste and the uncertainty in nitrogen content in *this* waste.
- Iron (III) chloride, 40% in H2O, at plant [CH]: 8.8704e-5 kg; lognormal SD95 2.8059
  auxilliary inputs for the wastewater treatment stage of the incinerator plant. uncertainty calculated from uncertainty in average FeCl3 input, of transfer coefficients in the incinerator, and the uncertainty of the waste composition of this waste
- Municipal waste incineration plant [CH]: 2.5e-10 p; lognormal SD95 1
  demands per kilogram waste. uncertainty is heeded in the module
- Residual material landfill facility [CH]: 2.4882e-11 p; lognormal SD95 1.6808
  landfill infrastructure required for landfilling of incineration residues. uncertainty is calculated from uncertainties in waste composition and transfer coefficients in incinerator
- Water, decarbonised, at plant [RER]: 1.1098 kg; lognormal SD95 2.8059
  Incinerator process water used in flue gas scrubber stage. uncertainty calculated from uncertainty in average water input, and the uncertainty of the waste composition of this waste
- Transport, freight, lorry, 16t-32t gross weight, fleet average [CH]: 0.011106 tkm; lognormal SD95 1.1636
  (same comment as for Transport, freight, rail)
- Slag compartment [CH]: 4.2443e-11 p; lognormal SD95 1.6656
  landfill infrastructure required for landfilling of bottom ash. uncertainty is calculated from uncertainties in waste composition and transfer coefficients in incinerator
- Quicklime, milled, packed, at plant [CH]: 0.0013645 kg; lognormal SD95 2.9534
  auxilliary inputs for the flue gas treatment stage of the incinerator plant. uncertainty calculated from uncertainty in average CaO input, of transfer coefficients in the incinerator, and the uncertainty of the waste composition of this waste
- Chemicals inorganic, at plant [GLO]: 0.00017406 kg; lognormal SD95 2.3348
  auxilliary inputs for the wastewater treatment stage of the incinerator plant. Proxy for Polyelectrolyte. uncertainty calculated from uncertainty in average Polyelectrolyte input, of transfer coefficients in the incinerator, and the uncertainty of the waste composition of this waste
- Chromium oxide, flakes, at plant [RER]: 1.47e-6 kg; lognormal SD95 4.3368
  Input to DeNOx stage. uncertainty calculated from uncertainty in average DeNOx input, uncertainty in the share of thermal NOx, uncertainty of nitrogen content in average municipal waste and the uncertainty in nitrogen content in *this* waste.
- Natural gas, burned in industrial furnace 1MW [CH]: 0.21499 MJ; lognormal SD95 2.7552
  Input to DeNOx stage, to heat up flue gas in low-dust SCR. uncertainty calculated from uncertainty in average DeNOx input, uncertainty in the share of thermal NOx, uncertainty of nitrogen content in average municipal waste and the uncertainty in nitrogen content in *this* waste.
- Cement, unspecified, at plant [CH]: 0.0047773 kg; lognormal SD95 1.7387
  Cement required for solidification of landfilled residual material. Uncertainty calculated from uncertainty of the waste composition of this waste, of transfer coefficients in the incinerator and of the solidification recipe.
- Titanium dioxide, production mix, at plant [RER]: 7.203e-5 kg; lognormal SD95 4.3368
  Input to DeNOx stage (TiO2 catalyst carrier) uncertainty calculated from uncertainty in average DeNOx input, uncertainty in the share of thermal NOx, uncertainty of nitrogen content in average municipal waste and the uncertainty in nitrogen content in *this* waste.
- Disposal, cement, hydrated, 0% water, to residual material landfill [CH]: 0.011943 kg; lognormal SD95 1.7387
  Hydrated cement output for solidification of landfilled residual material. Uncertainty calculated from uncertainty of the waste composition of this waste and transfer coefficients in the incinerator and of the solidification recipe.
- Hydrochloric acid, 30% in H2O, at plant [RER]: 4.5751e-5 kg; lognormal SD95 2.3348
  auxilliary inputs for the wastewater treatment stage of the incinerator plant. uncertainty calculated from uncertainty in average HCl input, of transfer coefficients in the incinerator, and the uncertainty of the waste composition of this waste
- Sodium hydroxide, 50% in H2O, production mix, at plant [RER]: 0.00049404 kg; lognormal SD95 2.4049
  auxilliary inputs for the flue gas treatment stage of the incinerator plant. uncertainty calculated from uncertainty in average NaOH input, of transfer coefficients in the incinerator, and the uncertainty of the waste composition of this waste
- Process-specific burdens, slag compartment [CH]: 0.023874 kg; lognormal SD95 1.6656
  mass-specific expenditures required for landfilling of bottom ash. uncertainty is calculated from uncertainties in waste composition and transfer coefficients in incinerator
- Chemicals organic, at plant [GLO]: 1.9652e-5 kg; lognormal SD95 8.8251
  auxilliary inputs for the wastewater treatment stage of the incinerator plant. Proxy for (pure) Trisodium-trimercapto-s-triazine (CAS 17766-26-6), used as 15% diluted solution, aka TMT15. uncertainty calculated from uncertainty in average TMT15 input, of transfer coefficients in the incinerator, and the uncertainty of the waste composition of this waste

## Emissions to nature
- TOC, Total Organic Carbon [emissions to water, river]: 0.00044108 kg; lognormal SD95 1.3608
  Emissions to water from waste composition and transfer coefficients in incinerator and landfills. uncertainty is calculated from uncertainties in waste composition and transfer coefficients in incinerator and landfills
- Heat, waste [emissions to water, river]: 5.6209 MJ; lognormal SD95 1.261
  Waste heat generated from heating value of this waste plus any electricity required to process it. uncertainty is calculated from uncertainties in waste composition and uncertainties in energy efficiency and the uncertainty in internal energy demand
- Thallium [emissions to water, river]: 2.3615e-10 kg; lognormal SD95 15.368
  (same comment as for TOC, Total Organic Carbon)
- Cadmium [emissions to air, high. pop.]: 1.1826e-8 kg; lognormal SD95 8.7616
  Emission to air from waste composition and transfer coefficients. uncertainty is calculated from uncertainties in waste composition and transfer coefficients in incinerator
- Benzene, hexachloro- [emissions to air, high. pop.]: 2.1459e-11 kg; lognormal SD95 1.6417
  Incomplete combustion product emitted to air. uncertainty calculated from uncertainty in average operation emissions, and the uncertainty of the flue gas volume from this waste.
- Chromium [emissions to water, river]: 3.0579e-9 kg; lognormal SD95 8.3173
  (same comment as for TOC, Total Organic Carbon)
- Copper [emissions to air, high. pop.]: 9.7944e-9 kg; lognormal SD95 7.29
  (same comment as for Cadmium)
- Arsenic [emissions to water, river]: 1.2684e-6 kg; lognormal SD95 10.454
  (same comment as for TOC, Total Organic Carbon)
- Fluoride [emissions to water, river]: 1.0832e-6 kg; lognormal SD95 5.9004
  (same comment as for TOC, Total Organic Carbon)
- Selenium [emissions to water, river]: 6.8368e-7 kg; lognormal SD95 8.7358
  (same comment as for TOC, Total Organic Carbon)
- Cadmium [emissions to water, river]: 2.2237e-9 kg; lognormal SD95 7.1672
  (same comment as for TOC, Total Organic Carbon)
- Vanadium [emissions to water, river]: 4.4337e-7 kg; lognormal SD95 7.0302
  (same comment as for TOC, Total Organic Carbon)
- Sodium [emissions to air, high. pop.]: 1.1595e-5 kg; lognormal SD95 4.84
  (same comment as for Cadmium)
- Carbon dioxide, fossil [emissions to air, high. pop.]: 3.1468 kg; lognormal SD95 1.0538
  (same comment as for Cadmium)
- Selenium [emissions to water, groundwater, long-term]: 1.3145e-6 kg; lognormal SD95 8.0003
  Long-term emissions from landfilling of incineration residues. uncertainty is calculated from uncertainties in waste composition and transfer coefficients in incinerator and landfills.
- Arsenic [emissions to water, groundwater, long-term]: 5.4832e-7 kg; lognormal SD95 11.502
  (same comment as for Selenium)
- Zinc [emissions to water, groundwater, long-term]: 0.00025233 kg; lognormal SD95 28.586
  (same comment as for Selenium)
- Sulfur dioxide [emissions to air, high. pop.]: 7.1761e-6 kg; lognormal SD95 5.4642
  (same comment as for Cadmium)
- NMVOC, non-methane volatile organic compounds, unspecified origin [emissions to air, high. pop.]: 4.6705e-7 kg; lognormal SD95 1.6417
  (same comment as for Benzene, hexachloro-)
- Copper [emissions to water, groundwater, long-term]: 9.5519e-5 kg; lognormal SD95 6.9215
  (same comment as for Selenium)
- Chloride [emissions to water, river]: 0.00086409 kg; lognormal SD95 4.2555
  (same comment as for TOC, Total Organic Carbon)
- Aluminium [emissions to air, high. pop.]: 1.5715e-10 kg; lognormal SD95 7.0225
  (same comment as for Cadmium)
- Manganese [emissions to water, river]: 1.1989e-8 kg; lognormal SD95 6.3914
  (same comment as for TOC, Total Organic Carbon)
- Dinitrogen monoxide [emissions to air, high. pop.]: 2.8805e-5 kg; lognormal SD95 10.183
  Nitrogen species emitted to air after DeNOx stage. uncertainty calculated from uncertainty in average N-emissions and uncertainty in the share of thermal NOx and the uncertainty in nitrogen content in *this* waste.
- Zinc [emissions to water, river]: 7.4862e-8 kg; lognormal SD95 4.6385
  (same comment as for TOC, Total Organic Carbon)
- Cobalt [emissions to water, river]: 5.5157e-9 kg; lognormal SD95 10.985
  (same comment as for TOC, Total Organic Carbon)
- Mercury [emissions to water, river]: 8.8872e-10 kg; lognormal SD95 8.3417
  (same comment as for TOC, Total Organic Carbon)
- Vanadium [emissions to water, groundwater, long-term]: 0.00012945 kg; lognormal SD95 4.8002
  (same comment as for Selenium)
- Nickel [emissions to water, groundwater, long-term]: 1.9055e-5 kg; lognormal SD95 8.5225
  (same comment as for Selenium)
- Iron [emissions to water, groundwater, long-term]: 0.0018114 kg; lognormal SD95 5.1523
  (same comment as for Selenium)
- Titanium [emissions to water, river]: 3.5932e-7 kg; lognormal SD95 4.1876
  (same comment as for TOC, Total Organic Carbon)
- Benzo(a)pyrene [emissions to air, high. pop.]: 2.2838e-13 kg; lognormal SD95 3.2834
  (same comment as for Benzene, hexachloro-)
- Barium [emissions to water, river]: 2.4191e-8 kg; lognormal SD95 8.8127
  (same comment as for TOC, Total Organic Carbon)
- Aluminium [emissions to water, groundwater, long-term]: 0.00013938 kg; lognormal SD95 5.967
  (same comment as for Selenium)
- Nitrate [emissions to water, groundwater, long-term]: 6.9463e-5 kg; lognormal SD95 4.5768
  (same comment as for Selenium)
- Benzene, pentachloro- [emissions to air, high. pop.]: 5.4221e-11 kg; lognormal SD95 1.6417
  (same comment as for Benzene, hexachloro-)
- Sodium [emissions to water, river]: 0.00038374 kg; lognormal SD95 3.0554
  (same comment as for TOC, Total Organic Carbon)
- DOC, Dissolved Organic Carbon [emissions to water, groundwater, long-term]: 0.0025658 kg; lognormal SD95 1.2551
  (same comment as for Selenium)
- Manganese [emissions to air, high. pop.]: 1.4709e-8 kg; lognormal SD95 7.5625
  (same comment as for Cadmium)
- Iron [emissions to water, river]: 9.4389e-8 kg; lognormal SD95 5.9111
  (same comment as for TOC, Total Organic Carbon)
- Chromium VI [emissions to water, river]: 1.1007e-6 kg; lognormal SD95 8.6609
  (same comment as for TOC, Total Organic Carbon)
- Lead [emissions to air, high. pop.]: 1.2233e-9 kg; lognormal SD95 9.3636
  (same comment as for Cadmium)
- Thallium [emissions to water, groundwater, long-term]: 2.2494e-7 kg; lognormal SD95 9.5073
  (same comment as for Selenium)
- Barium [emissions to air, high. pop.]: 7.0546e-7 kg; lognormal SD95 6.6564
  (same comment as for Cadmium)
- Mercury [emissions to air, high. pop.]: 2.3202e-8 kg; lognormal SD95 12.532
  (same comment as for Cadmium)
- Sodium [emissions to water, groundwater, long-term]: 0.001017 kg; lognormal SD95 3.0104
  (same comment as for Selenium)
- Tin [emissions to water, groundwater, long-term]: 9.6655e-6 kg; lognormal SD95 16.965
  (same comment as for Selenium)
- Antimony [emissions to air, high. pop.]: 3.317e-11 kg; lognormal SD95 8.5264
  (same comment as for Cadmium)
- Chromium VI [emissions to water, groundwater, long-term]: 3.6127e-6 kg; lognormal SD95 12.108
  (same comment as for Selenium)
- Chloride [emissions to water, groundwater, long-term]: 0.00026081 kg; lognormal SD95 4.9462
  (same comment as for Selenium)
- Sulfate [emissions to water, river]: 0.00034232 kg; lognormal SD95 3.1876
  (same comment as for TOC, Total Organic Carbon)
- COD, Chemical Oxygen Demand [emissions to water, groundwater, long-term]: 0.0064841 kg; lognormal SD95 1.2551
  (same comment as for Selenium)
- Toluene [emissions to air, high. pop.]: 2.0525e-8 kg; lognormal SD95 1.6417
  (same comment as for Benzene, hexachloro-)
- Aluminium [emissions to water, river]: 2.0859e-8 kg; lognormal SD95 8.2314
  (same comment as for TOC, Total Organic Carbon)
- Particulates, < 2.5 um [emissions to air, high. pop.]: 1.2253e-6 kg; lognormal SD95 3.2834
  (same comment as for Benzene, hexachloro-)
- Carbon monoxide, fossil [emissions to air, high. pop.]: 1.7445e-5 kg; lognormal SD95 5.4723
  (same comment as for Benzene, hexachloro-)
- Antimony [emissions to water, groundwater, long-term]: 2.6332e-5 kg; lognormal SD95 7.7296
  (same comment as for Selenium)
- Dioxin, 2,3,7,8 Tetrachlorodibenzo-p- [emissions to air, high. pop.]: 2.0524e-14 kg; lognormal SD95 3.2834
  (same comment as for Benzene, hexachloro-)
- Nickel [emissions to water, river]: 1.3338e-8 kg; lognormal SD95 13.843
  (same comment as for TOC, Total Organic Carbon)
- Strontium [emissions to water, groundwater, long-term]: 8.5178e-5 kg; lognormal SD95 7.2621
  (same comment as for Selenium)
- Strontium [emissions to air, high. pop.]: 8.5289e-9 kg; lognormal SD95 7.5076
  (same comment as for Cadmium)
- Nitrate [emissions to water, river]: 2.4619e-5 kg; lognormal SD95 3.5361
  (same comment as for TOC, Total Organic Carbon)
- Methane, fossil [emissions to air, high. pop.]: 1.5394e-7 kg; lognormal SD95 1.6417
  (same comment as for Benzene, hexachloro-)
- Cobalt [emissions to water, groundwater, long-term]: 2.4799e-5 kg; lognormal SD95 7.7305
  (same comment as for Selenium)
- COD, Chemical Oxygen Demand [emissions to water, river]: 0.00101 kg; lognormal SD95 1.3603
  (same comment as for TOC, Total Organic Carbon)
- Bromine [emissions to water, groundwater, long-term]: 0.00064577 kg; lognormal SD95 3.6857
  (same comment as for Selenium)
- Nitrogen oxides [emissions to air, high. pop.]: 0.00042804 kg; lognormal SD95 2.9689
  sum of fuel-Nox and thermal-NOx emitted to air after DeNOx stage. uncertainty calculated from uncertainty in average N-emissions and uncertainty in the share of thermal NOx and the uncertainty in nitrogen content in *this* waste.
- BOD5, Biological Oxygen Demand [emissions to water, river]: 0.00099706 kg; lognormal SD95 1.365
  (same comment as for TOC, Total Organic Carbon)
- Mercury [emissions to water, groundwater, long-term]: 5.2119e-8 kg; lognormal SD95 34.849
  (same comment as for Selenium)
- Bromine [emissions to air, high. pop.]: 3.3467e-6 kg; lognormal SD95 3.7636
  (same comment as for Cadmium)
- Beryllium [emissions to water, river]: 3.018e-10 kg; lognormal SD95 19.131
  (same comment as for TOC, Total Organic Carbon)
- Cadmium [emissions to water, groundwater, long-term]: 1.693e-6 kg; lognormal SD95 171.16
  (same comment as for Selenium)
- TOC, Total Organic Carbon [emissions to water, groundwater, long-term]: 0.0025658 kg; lognormal SD95 1.2551
  (same comment as for Selenium)
- Titanium [emissions to air, high. pop.]: 7.9955e-7 kg; lognormal SD95 5.2441
  (same comment as for Cadmium)
- Hydrogen fluoride [emissions to air, high. pop.]: 9.5578e-8 kg; lognormal SD95 9.2141
  (same comment as for Cadmium)
- Zinc [emissions to air, high. pop.]: 5.5615e-7 kg; lognormal SD95 5.3361
  (same comment as for Cadmium)
- Tin [emissions to air, high. pop.]: 1.6497e-11 kg; lognormal SD95 9.1204
  (same comment as for Cadmium)
- Chromium [emissions to air, high. pop.]: 3.4389e-8 kg; lognormal SD95 8.1796
  (same comment as for Cadmium)
- Nickel [emissions to air, high. pop.]: 2.4938e-8 kg; lognormal SD95 8.8804
  (same comment as for Cadmium)
- Phenol, pentachloro- [emissions to air, high. pop.]: 4.4692e-12 kg; lognormal SD95 1.6417
  (same comment as for Benzene, hexachloro-)
- Particulates, > 2.5 um, and < 10um [emissions to air, high. pop.]: 6.1571e-9 kg; lognormal SD95 2.1889
  (same comment as for Benzene, hexachloro-)
- BOD5, Biological Oxygen Demand [emissions to water, groundwater, long-term]: 0.0021209 kg; lognormal SD95 1.2551
  (same comment as for Selenium)
- Benzene [emissions to air, high. pop.]: 1.0263e-8 kg; lognormal SD95 1.6417
  (same comment as for Benzene, hexachloro-)
- Cobalt [emissions to air, high. pop.]: 5.5368e-8 kg; lognormal SD95 8.41
  (same comment as for Cadmium)
- Copper [emissions to water, river]: 1.3857e-8 kg; lognormal SD95 6.4544
  (same comment as for TOC, Total Organic Carbon)
- Arsenic [emissions to air, high. pop.]: 1.4343e-8 kg; lognormal SD95 11.56
  (same comment as for Cadmium)
- Lead [emissions to water, groundwater, long-term]: 7.1791e-6 kg; lognormal SD95 64.914
  (same comment as for Selenium)
- Thallium [emissions to air, high. pop.]: 3.8549e-10 kg; lognormal SD95 13.69
  (same comment as for Cadmium)
- Vanadium [emissions to air, high. pop.]: 5.8896e-6 kg; lognormal SD95 6.2001
  (same comment as for Cadmium)
- Selenium [emissions to air, high. pop.]: 2.4144e-8 kg; lognormal SD95 11.424
  (same comment as for Cadmium)
- Bromine [emissions to water, river]: 0.0060509 kg; lognormal SD95 2.2728
  (same comment as for TOC, Total Organic Carbon)
- Heat, waste [emissions to air, high. pop.]: 24.549 MJ; lognormal SD95 1.261
  (same comment as for Heat, waste)
- Fluoride [emissions to water, groundwater, long-term]: 1.2701e-5 kg; lognormal SD95 5.5273
  (same comment as for Selenium)
- Hydrogen chloride [emissions to air, high. pop.]: 6.4229e-7 kg; lognormal SD95 5.1119
  (same comment as for Cadmium)
- Titanium [emissions to water, groundwater, long-term]: 0.0002881 kg; lognormal SD95 5.925
  (same comment as for Selenium)
- Ammonia [emissions to air, high. pop.]: 1.3517e-6 kg; lognormal SD95 2.9689
  (same comment as for Dinitrogen monoxide)
- Beryllium [emissions to water, groundwater, long-term]: 4.4039e-7 kg; lognormal SD95 12.385
  (same comment as for Selenium)
- Manganese [emissions to water, groundwater, long-term]: 4.7514e-5 kg; lognormal SD95 16.726
  (same comment as for Selenium)
- Lead [emissions to water, river]: 1.4203e-9 kg; lognormal SD95 7.5563
  (same comment as for TOC, Total Organic Carbon)
- DOC, Dissolved Organic Carbon [emissions to water, river]: 0.00044108 kg; lognormal SD95 1.3608
  (same comment as for TOC, Total Organic Carbon)
- Barium [emissions to water, groundwater, long-term]: 9.0517e-5 kg; lognormal SD95 20.031
  (same comment as for Selenium)
- Iron [emissions to air, high. pop.]: 6.4347e-9 kg; lognormal SD95 4.4521
  (same comment as for Cadmium)
- Sulfate [emissions to water, groundwater, long-term]: 0.0016713 kg; lognormal SD95 3.6004
  (same comment as for Selenium)
- Antimony [emissions to water, river]: 1.4272e-5 kg; lognormal SD95 7.9949
  (same comment as for TOC, Total Organic Carbon)
- Tin [emissions to water, river]: 6.6813e-10 kg; lognormal SD95 14.492
  (same comment as for TOC, Total Organic Carbon)
- Cyanide [emissions to air, high. pop.]: 6.1884e-6 kg; lognormal SD95 10.183
  (same comment as for Dinitrogen monoxide)
- Strontium [emissions to water, river]: 5.3701e-8 kg; lognormal SD95 13.514
  (same comment as for TOC, Total Organic Carbon)

## Sampling procedure
fully waste-specific calculation based on literature data for average MSWI operation performance

## Extrapolations
Typical elemental transfer coefficients from current studies for modern MSWI, completed with data from coal power plants and estimates, adapted for inert/burnable waste.

## Uncertainty adjustments
uncertainty of waste input composition data derived from generic formula GSD(c) = N*ln(c)+1

## Sources
- Doka G., 2013, 2013 - Updates LCI waste treatment services - Doka, -, Doka LCA, Zuerich, CH
Doka G. (2013) Updates to Life Cycle Inventories of Waste Treatment Services - part II: waste incineration. Doka LCA. Zurich.
Type: Separate publication
Source: Report to document the 2013 changes to the MSWI incinerator model and datasets (URL: http://www.doka.ch/ecoinventMSWIupdateLCI2013.pdf). To be read with the ecoinvent Nr 13 report (Doka 2009, Life Cycle Inventories of Waste Treatment Services) for ecoinvent v2.2.
First author: Doka G.
Year: 2013
Place of publication: Zurich
Publisher: Doka LCA
Original title: Updates to Life Cycle Inventories of Waste Treatment Services - part II: waste incineration

## Validation
Proof reading validation: Passed.; Other validation: none;
