# Polysulphide, sealing compound, at plant

Dataset: EcoSpold 1, unit process
Functional unit: 1 kg
Category: construction / sealing
Geography: RER
Time period: 1996-01 to 2003-12
Generated by: Martin Lehmann
accessRestrictedTo: 0
copyright: true

## General comment
This dataset is primarily used in the glazing production.;

## Included processes
The dataset describes the raw materials and processes required to produce a polysulphide sealing compound. Included is heat, electricity, and the infrastructure, but no extra transport activities apart from the ones related to the raw materials. Input materials are crushed limestone (filling material), chemicals, a hardening paste and rigid foam (polyurethane).

## Technology
Polysulphide sealing compound is produced by heating a mixture of filling material, chemicals, polyurethane and a hardening paste.

## Reference product
- Polysulphide, sealing compound, at plant [RER]: 1 kg
  Europe

## Inputs from technosphere
- Manganese, at regional storage [RER]: 0.015 kg; lognormal SD95 1.22
  (1,3,1,3,1,5,3)
- Chemical plant, organics [RER]: 4e-10 p; lognormal SD95 3.06
  (2,4,1,3,1,5,9)
- Chemicals inorganic, at plant [GLO]: 0.37 kg; lognormal SD95 1.22
  (1,3,1,3,1,5,4)
- Polyurethane, rigid foam, at plant [RER]: 0.145 kg; lognormal SD95 1.22
  (1,3,1,3,1,5,3)
- Electricity, medium voltage, production ENTSO-E, at grid: 0.164 kWh; lognormal SD95 1.22
  (1,3,1,3,1,5,2)
- Heat, light fuel oil, at industrial furnace 1MW [RER]: 0.363 MJ; lognormal SD95 1.22
  (1,3,1,3,1,5,11)
- Limestone, milled, packed, at plant [CH]: 0.47 kg; lognormal SD95 1.22
  (1,3,1,3,1,5,4)

## Emissions to nature
- Heat, waste [emissions to air, unspecified]: 0.589 MJ; lognormal SD95 1.26
  (3,4,1,3,1,5,13)

## Sampling procedure
Company documentation

## Extrapolations
see Geography

## Uncertainty adjustments
The assumption that this dataset is representative for the whole Europe is taken into account in the uncertainties.

## Sources
- Kellenberger D., Althaus H.-J., Jungbluth N., Kuenniger T., Lehmann M., Thalmann P., 2007, 2007 - LCI building products - Kellenberger, Final report ecoinvent data v2.0, 7, Swiss Centre for LCI, Empa - TSL, ESU-services Ltd., Bau- und Umweltchimie, Duebendorf, CH
Kellenberger D., Althaus H.-J., Jungbluth N., Künniger T. (2007) Life Cycle Inventories of Building Products. Final report ecoinvent data v2.0. Volume: 7. Swiss Centre for LCI, Empa - TSL. Dübendorf, CH.
Type: Measurement on site
Source: CD-ROM
First author: Kellenberger D.
Other authors: Althaus H.-J., Jungbluth N., Künniger T.
Year: 2007
Title of anthology: Final report ecoinvent data v2.0
Place of publication: Dübendorf, CH
Publisher: Swiss Centre for LCI, Empa - TSL
Volume No: 7

## Validation
Proof reading validation: passed; Other validation: none;
