# Peat, at mine

Dataset: EcoSpold 1, unit process
Functional unit: 1 kg
Category: fuels / peat
Geography: NORDEL
Time period: 2018-01 to 2020-01
Generated by: Hanna Kroehnert
accessRestrictedTo: 0
copyright: true

## General comment
Update 2022 by ZHAW only updated methane emissions at mine, Remark: In first approximation same conditions as for open cast mine, lignite, RER, are assumed.; NA;

## Included processes
Included processes: The module quantifies the directly affected area, electricity requirements and some diesel for mining operation and the extraction of groundwater.

## Geography
Geography: No information.

## Technology
Technology: No specific information available.

## Reference product
- Peat, at mine [NORDEL]: 1 kg

## Inputs from technosphere
- Open cast mine, peat [NORDEL]: 1e-11 p; lognormal SD95 1
  per definition
- Electricity, high voltage, production ENTSO-E, at grid [ENTSO]: 0.02 kWh; lognormal SD95 2
  own assumption
- Diesel, burned in building machine, average [CH]: 0.015 MJ; lognormal SD95 2
  own assumption

## Inputs from nature
- Transformation, from unknown [resources, land]: 3.7e-5 m2; lognormal SD95 3
  own assumption
- Transformation, to mineral extraction site [resources, land]: 3.7e-5 m2; lognormal SD95 3
  own assumption
- Occupation, mineral extraction site [resources, land]: 0.0011 m2a; lognormal SD95 3
  own assumption
- Transformation, from mineral extraction site [resources, land]: 3.7e-5 m2; lognormal SD95 3
  own assumption
- Transformation, to arable, non-irrigated, diverse-intensive [resources, land]: 3.7e-5 m2; lognormal SD95 3
  own assumption
- Peat [resources, biotic]: 1 kg; lognormal SD95 1
  per definition
- Water, well [resources, in water]: 0.0035 m3; lognormal SD95 2
  own assumption

## Emissions to nature
- Heat, waste [emissions to air, low. pop.]: 0.072 MJ; lognormal SD95 2
  own assumption
- Methane, fossil [emissions to air, low. pop.]: 0.000804 kg; lognormal SD95 1.5
  (1,1,1,1,1,1,BU:1.5), updated emissions based on IEA 2018 / USEPA 2020
- Particulates, > 10 um [emissions to air, low. pop.]: 0.0004 kg; lognormal SD95 2
  own assumption
- Radon-222 [emissions to air, low. pop.]: 0.003 kBq; lognormal SD95 5
  own assumption
- Iron [emissions to water, groundwater]: 0.0016 kg; lognormal SD95 2
  own assumption
- Solids, inorganic [emissions to water, groundwater]: 0.0035 kg; lognormal SD95 2
  own assumption
- Sulfate [emissions to water, groundwater]: 0.0033 kg; lognormal SD95 2
  own assumption
- Water [emissions to water, unspecified]: 3.15 kg; lognormal SD95 2.5196
  (5,5,5,5,5,BU:1.05); All uncertainty-values set to 5.0 by default. Balance of input water

## Sampling procedure
Sampling procedure: literature

## Extrapolations
Extrapolations: see Geography/Text
Uncertainty adjustments: none

## Sources
- Itten R., Oberschelp C., Kroehnert H., Stucki M., 2023, 2023 - LCI solid fossil fuel - Itten, Project report, ZHAW, Waedenswil, CH

## Validation
26.08.2023
