# Sealing sheeting polyolefin (TPO), at plant

Dataset: EcoSpold 1, unit process
Functional unit: 1 kg
Category: construction materials / others
Geography: CH
Time period: 2014-01 to 2014-12
Share of production covered: 0 %
Generated by: Franziska Wyss
accessRestrictedTo: 0
copyright: true

## General comment
dummy process based on KBoB-list.;

## Included processes
Dummy process based on KBOB results. Data set includes no inventory. Only suitable for indicators MoeK13, CED and GWP13. The densitiy is 1000 kg/m3

## Reference product
- Sealing sheeting polyolefin (TPO), at plant [CH]: 1 kg
  SWITZERLAND

## Inputs from nature
- Coal, hard [resources, in ground]: 4.3239 kg; lognormal SD95 1.7432
  (4,5,5,5,3,5,BU:1.05); fossil energy resources based on KBOB 2009/1:2014; KBOB 2009/1:2014
- Occupation, annual crop [resources, land]: 3.5751 m2a; lognormal SD95 1.7537
  (4,5,5,5,3,5,BU:1.1); total environmental impact based on KBOB 2009/1:2014; KBOB 2009/1:2014
- Energy, potential (in hydropower reservoir), converted [resources, in water]: 1.4748 MJ; lognormal SD95 1.7432
  (4,5,5,5,3,5,BU:1.05); renewable energy resources based on KBOB 2009/1:2014; KBOB 2009/1:2014

## Emissions to nature
- Carbon dioxide, fossil [emissions to air, unspecified]: 2.5186 kg; lognormal SD95 1.7432
  (4,5,5,5,3,5,BU:1.05); CO2 emissiones based on KBOB 2009/1:2014; KBOB 2009/1:2014

## Sources
- Wyss F., Frischknecht R., 2014, 2014 - EPD open hot-rolled steel profile - Wyss, Project report, 500, treeze Ltd., Uster, CH
Wyss Franziska, Frischknecht Rolf (2014) KBOB-Empfehlung 2009:2014. Project report. Volume: 500. Treeze Ltd. Uster, CH.
Type: Separate publication
Source: Report
First author: Wyss Franziska
Other authors: Frischknecht Rolf
Year: 2014
Title of anthology: Project report
Place of publication: Uster, CH
Publisher: Treeze Ltd
Volume No: 500

## Validation
Proof reading validation: 19.11.2014; Other validation: G:\Projekte laufend\500 Aktualisierung KBOB-Liste 2014\EcoSpold\Polyolefin TPO\[500_ecospold_Polyolefin TPO_Dummy_v0.1.xlsx]X-Process;
