# Hydrogen peroxide, 50% in H2O, at plant

Dataset: EcoSpold 1, unit process
Functional unit: 1 kg
Category: chemicals / inorganic
Geography: RER
Time period: 2000-01 to 2000-12
Generated by: Roland Hischier
accessRestrictedTo: 0
copyright: true

## General comment
data based on a study, performed by EMPA and Boustead Consulting, commissioned by CEFIC;
CAS number: 007722-84-1;
Formula: H2O2;
Synonyms: dihydrogen dioxide, Hydroperoxide, Hioxy, Oxydol, Peroxan, peroxide;

## Included processes
This module contains material and energy input, production of waste and emissions for the production of hydrogen peroxide by the anthrachinone process. Transport and infrastructure have been estimated. The input of 215 g air is not reported in the data according to the methodology of the study.

## Geography
average data from 8 European producers

## Technology
average technology used from these European producers

## Reference product
- Hydrogen peroxide, 50% in H2O, at plant [RER]: 1 kg
  Europe

## Inputs from technosphere
- Transport, freight, rail [RER]: 0.0963 tkm; lognormal SD95 2.09
  (4,5,na,na,na,na); standard distances
- Aluminium oxide, at plant [RER]: 0.00961 kg; lognormal SD95 1.13
  (2,2,2,1,1,4); Average data from 8 European producers
- Steam, for chemical processes, at plant [RER]: 1.58 kg; lognormal SD95 1.13
  (2,2,2,1,1,4); Average data from 8 European producers
- Disposal, aluminium, 0% water, to sanitary landfill [CH]: 0.00282 kg; lognormal SD95 1.13
  (2,2,2,1,1,4); Average data from 8 European producers
- Oxygen, liquid, at plant [RER]: 0.0293 kg; lognormal SD95 1.13
  (2,2,2,1,1,4); Average data from 8 European producers
- Heat, heavy fuel oil, at industrial furnace 1MW [RER]: 0.254 MJ; lognormal SD95 1.13
  (2,2,2,1,1,4); Average data from 8 European producers
- Transport, freight, lorry, fleet average [RER]: 0.016 tkm; lognormal SD95 2.09
  (4,5,na,na,na,na); standard distances
- Electricity, medium voltage, production ENTSO-E, at grid: 0.56 kWh; lognormal SD95 1.13
  (2,2,2,1,1,4); Average data from 8 European producers
- Heat, natural gas, at industrial furnace 1MW [CH]: 2.1 MJ; lognormal SD95 1.13
  (2,2,2,1,1,4); Average data from 8 European producers
- Disposal, residue from cooling tower, 30% water, to sanitary landfill [CH]: 4.43e-5 kg; lognormal SD95 1.13
  (2,2,2,1,1,4); Average data from 8 European producers
- Chemical plant, organics [RER]: 4e-10 p; lognormal SD95 3.77
  (4,5,1,3,5,4); estimation
- Disposal, municipal solid waste, 22.9% water, to municipal incineration [CH]: 0.0887 kg; lognormal SD95 1.13
  (2,2,2,1,1,4); Average data from 8 European producers
- Nitrogen, liquid, at plant [RER]: 0.0508 kg; lognormal SD95 1.13
  (2,2,2,1,1,4); Average data from 8 European producers
- Solvents, organic, unspecified, at plant [GLO]: 0.00145 kg; lognormal SD95 1.13
  (2,2,2,1,1,4); Average data from 8 European producers
- Chemicals inorganic, at plant [GLO]: 0.00068 kg; lognormal SD95 1.13
  (2,2,2,1,1,4); Average data from 8 European producers
- Sodium hydroxide, 50% in H2O, production mix, at plant [RER]: 0.00064 kg; lognormal SD95 1.13
  (2,2,2,1,1,4); Average data from 8 European producers
- Anthraquinone, at plant [RER]: 0.000952 kg; lognormal SD95 1.13
  (2,2,2,1,1,4); Average data from 8 European producers
- Hydrogen, liquid, at plant [RER]: 0.0656 kg; lognormal SD95 1.13
  (2,2,2,1,1,4); Average data from 8 European producers
- Benzene, at plant [RER]: 0.00193 kg; lognormal SD95 1.13
  (2,2,2,1,1,4); Average data from 8 European producers

## Inputs from nature
- Water, unspecified natural origin/m3 [resources, in water]: 0.00192 m3; lognormal SD95 1.13
  (2,2,2,1,1,4); Average data from 8 European producers
- Water, cooling, unspecified natural origin/m3 [resources, in water]: 0.17 m3; lognormal SD95 1.13
  (2,2,2,1,1,4); Average data from 8 European producers

## Emissions to nature
- Phosphate [emissions to water, river]: 1.25e-5 kg; lognormal SD95 1.52
  (2,2,2,1,1,4); Average data from 8 European producers
- Hydrogen [emissions to air, high. pop.]: 3.83e-5 kg; lognormal SD95 1.52
  (2,2,2,1,1,4); Average data from 8 European producers
- COD, Chemical Oxygen Demand [emissions to water, river]: 0.00094 kg; lognormal SD95 1.52
  (2,2,2,1,1,4); Average data from 8 European producers
- BOD5, Biological Oxygen Demand [emissions to water, river]: 0.00026 kg; lognormal SD95 1.52
  (2,2,2,1,1,4); Average data from 8 European producers
- Hydrocarbons, aromatic [emissions to air, high. pop.]: 0.000128 kg; lognormal SD95 2.02
  (2,2,2,1,1,4); Average data from 8 European producers
- Nitrate [emissions to water, river]: 0.000203 kg; lognormal SD95 1.52
  (2,2,2,1,1,4); Average data from 8 European producers
- Heat, waste [emissions to air, high. pop.]: 2.02 MJ; lognormal SD95 1.13
  (2,2,2,1,1,4); Average data from 8 European producers
- Hydrogen peroxide [emissions to water, river]: 0.0006 kg; lognormal SD95 3.02
  (2,2,2,1,1,4); Average data from 8 European producers
- TOC, Total Organic Carbon [emissions to water, river]: 0.0003 kg; lognormal SD95 1.52
  (2,2,2,1,1,4); Average data from 8 European producers
- Hydrocarbons, aromatic [emissions to water, river]: 3.75e-7 kg; lognormal SD95 3.02
  (2,2,2,1,1,4); Average data from 8 European producers
- NMVOC, non-methane volatile organic compounds, unspecified origin [emissions to air, high. pop.]: 0.00053 kg; lognormal SD95 2.02
  (2,2,2,1,1,4); Average data from 8 European producers
- Suspended solids, unspecified [emissions to water, river]: 0.000151 kg; lognormal SD95 1.52
  (2,2,2,1,1,4); Average data from 8 European producers
- Chloride [emissions to water, river]: 0.00038 kg; lognormal SD95 1.52
  (2,2,2,1,1,4); Average data from 8 European producers
- Water [emissions to water, unspecified]: 1.824, 161.5 kg (2 entries); lognormal SD95 2.5196
  (5,5,5,5,5,BU:1.05); All uncertainty-values set to 5.0 by default. Balance of input water

## Sources
- Althaus H.-J., Chudacoff M., Hellweg S., Hischier R., Jungbluth N., Osses M., Primas A., 2007, 2007 - LCI chemicals - Althaus, Final report ecoinvent data v2.0, 8, Swiss Centre for LCI, Empa - TSL, ETH, ESU-services Ltd., Chudacoff Oekoscience, Duebendorf, CH
Althaus H.-J., Chudacoff M., Hischier R., Jungbluth N., Osses M., Primas A. (2007) Life Cycle Inventories of Chemicals. Final report ecoinvent data v2.0. Volume: 8. Swiss Centre for LCI, Empa - TSL. Dübendorf, CH.
Type: Measurement on site
Source: CD-ROM
First author: Althaus H.-J.
Other authors: Chudacoff M., Hischier R., Jungbluth N., Osses M., Primas A.
Year: 2007
Title of anthology: Final report ecoinvent data v2.0
Place of publication: Dübendorf, CH
Publisher: Swiss Centre for LCI, Empa - TSL
Volume No: 8

## Validation
Proof reading validation: Passed.; Other validation: none;
