# xx Milling, chromium steel, large parts

Dataset: EcoSpold 1, unit process
Functional unit: 1 kg
Category: processing, obsolete / metals\chipping
Geography: RER
Time period: 2006-01 to 2007-12
Share of production covered: 0 %
Generated by: Roland Steiner
accessRestrictedTo: 0
copyright: true

## General comment
The reference for milling is 1 kg of metal removed. As there is a large variation from factory to factory with regard to the LCI, it is advised that in case this dataset becomes important in the results, it has to be investigated further if the rough estimations made are applicable or not. If you do not know how much has been removed by turning you can use 0.23kg of this process per kg of final product as an average assumption.;

## Included processes
This dataset encompasses the direct electricity consumption of the machine as well as compressed air and lubricant oil. Furthermore, the metal removed is included. Machine as well as factory infrastructure and operation are considered as well. The disposal of the lubricant oil is also included while the metal removed is assumed to be recycled. Degreasing is not included and has to be added if necessary

## Geography
Geographical coverage encompasses the industrialised countries.

## Technology
Average technology

## Reference product
- xx Milling, chromium steel, large parts [RER]: 1 kg
  Europe

## Inputs from technosphere
- Lubricating oil, at plant [RER]: 0.00382 kg; lognormal SD95 1.63
  (4,3,2,1,4,5); estimated
- Metal working machine, unspecified, at plant [RER]: 0.000174 kg; lognormal SD95 3.32
  (4,3,2,1,4,5); estimated
- Chromium steel 18/8, at plant [RER]: 1 kg; lognormal SD95 1.63
  (4,3,2,1,4,5);
- Disposal, used mineral oil, 10% water, to hazardous waste incineration [CH]: 0.00382 kg; lognormal SD95 1.63
  (4,3,2,1,4,5); estimated disposal pathway
- Compressed air, average installation, >30kW, 7 bar gauge, at supply network [RER]: 1.28 m3; lognormal SD95 1.63
  (4,3,2,1,4,5); estimated
- Metal working factory operation, average heat energy [RER]: 4.41 kg; lognormal SD95 1.63
  (4,3,2,1,4,5); estimated
- Electricity, low voltage, production ENTSO-E, at grid: 0.298 kWh; lognormal SD95 1.24
  (1,3,2,1,3,4); literature value
- Metal working factory [RER]: 2.02e-9 p; lognormal SD95 3.32
  (4,3,2,1,4,5); estimated

## Emissions to nature
- Heat, waste [emissions to air, high. pop.]: 1.07 MJ; lognormal SD95 1.63
  (4,3,2,1,4,5); due to electricity consumption

## Sources
- Steiner R., Frischknecht R., 2007, 2007 - LCI metal proc. and comp. air supply - Steiner, Final report ecoinvent Data v2.0, 23, Swiss Centre for LCI, ESU-services Ltd., Duebendorf and Uster, CH
Steiner, R., Frischknecht, R. (2007) Life Cycle Inventories of Metal Processing and Compressed Air Supply. Final report ecoinvent Data v2.0. Editors: 0. 0. Volume: 23. Issue: 0. Swiss Centre for LCI, ESU. Dübendorf and Uster, CH.
Type: Measurement on site
Source: CD-ROM
First author: Steiner, R.
Other authors: Frischknecht, R.
Year: 2007
Name of editors: 0
Title of anthology: Final report ecoinvent Data v2.0
Place of publication: Dübendorf and Uster, CH
Publisher: Swiss Centre for LCI, ESU
Journal: 0
Volume No: 23
Issue No: 0
Original title: Life Cycle Inventories of Metal Processing and Compressed Air Supply

## Validation
Proof reading validation: passed; Other validation: none;
