# PEM Fuel Cell

Dataset: EcoSpold 1, unit process
Functional unit: 1 p
Category: fuels / hydrogen\Transformation\Infrastructure
Geography: GLO
Time period: 2020-01 to 2020-12
Generated by: Romain Sacchi
accessRestrictedTo: 0
copyright: False

## General comment
Data for an 40kW automotive PEM fuel cell. Based on qualified estimates of the first commercially available technolgies. Original source: Simons, A. and Bauer, C. (2015). A life-cycle perspective on automotive fuel cells, Applied Energy, doi:10.1016/j.apenergy.2015.02.049.

## Time period
Base technology year of 2020

## Reference product
- PEM Fuel Cell [GLO]: 1 p

## Inputs from technosphere
- Ancillary BoP [GLO]: 0.373 kg; lognormal SD95 1.64732
  Uncertainty from pedigree matrix: (3, 5, 4, 2, 4, 4)
- Stack [GLO]: 1.13 p; lognormal SD95 1.64732
  Uncertainty from pedigree matrix: (3, 5, 4, 2, 4, 4)
- Essential BoP [GLO]: 0.6 kg; lognormal SD95 1.64732
  Uncertainty from pedigree matrix: (3, 5, 4, 2, 4, 4)

## Sources
- Sacchi R., Bauer C., 2023, 2023 - LCI on-road vehicles - Sacchi, PSI, Villigen, CH
doi: 10.5281/ZENODO.5156043
