# Electricity, hydropower, at run-of-river power plant with reservoir

Dataset: EcoSpold 1, unit process
Functional unit: 1 kWh
Category: electricity by fuel / hydro\flow through
Geography: RER
Time period: 1945-01 to 2008-12
Generated by: Karin Flury
accessRestrictedTo: 0
copyright: true

## General comment
The run-of-river hydropower station is assumed to have a small reservoir where the water is retained. This leads to a higher consumption of land as well as to greenhouse gas emissions due to the collected biomass. Efficiency: 0.82. The data set describes a mix and is therefore not representative for individual plants. This dataset is recalculated based on Frischknecht et al. (1996) and Bauer (2007), complemented with data from Vattenfall (2008) and Axpo (2008);

## Included processes
Operation of average of run-of-river power stations with a small reservoir. It includes the land area transformed and occupied, lubricant oil consumption, spill and disposal, turbined water and greenhouse gas emissions.

## Geography
Average electricity production of European run-of-river hydropower plants. GHG emissions valid for temperate zones.

## Technology
Mix of run-of-river hydropower plants built between 1945 and 1980, representative for Europe. Efficiency: 0.82.

## Reference product
- Electricity, hydropower, at run-of-river power plant with reservoir [RER]: 1 kWh
  Europe

## Inputs from technosphere
- Lubricating oil, at plant [RER]: 1.2193e-7 kg; lognormal SD95 1.77558
  (4,5,3,5,3,5,BU:1.05); In turbines; based on Axpo (2008) and Vattenfall (2008)
- Run-of-river hydropower plant [RER]: 3.2509e-10 p; lognormal SD95 3.70316
  (4,3,3,5,1,4,BU:3); Infrastructure of the run-of-river power station producing the electricity

## Inputs from nature
- Water, turbine use, unspecified natural origin [resources, in water]: 45 m3; lognormal SD95 1.5932
  (4,3,3,1,1,5,BU:1.05); Amount of water turbined for the generation of electricity; based on Frischknecht et al. (1996)
- Volume occupied, reservoir [resources, in water]: 0.0824241 m3y; lognormal SD95 1.5932
  (4,3,3,1,1,5,BU:1.05); Volume occupied due to the run-of-river hydropower station; recalculated based on Frischknecht et al. (1996)
- Energy, potential (in hydropower reservoir), converted [resources, in water]: 3.79 MJ; lognormal SD95 1.33562
  (3,1,1,1,1,1,BU:1.05); Potential energy of the water
- Occupation, water courses, artificial [resources, land]: 0.0162813 m2a; lognormal SD95 1.96327
  (4,3,3,1,1,5,BU:1.5); Area occupied due to the run-of-river hydropower station; recalculated based on Frischknecht et al. (1996)
- Transformation, from shrub land, sclerophyllous [resources, land]: 0.000102038 m2; lognormal SD95 2.53345
  (4,3,3,1,1,5,BU:2); Original area before the construction of the power station; recalculated based on Frischknecht et al. (1996)
- Transformation, to industrial area, built up [resources, land]: 5.6e-7 m2; lognormal SD95 2.53345
  (4,3,3,1,1,5,BU:2); Area covered by infrastructures, not the river; based on Frischknecht et al. (1996)
- Occupation, industrial area, built up [resources, land]: 4.48e-5 m2a; lognormal SD95 1.96327
  (same comment as for Occupation, water courses, artificial)
- Transformation, to water courses, artificial [resources, land]: 0.000203517 m2; lognormal SD95 2.53345
  (4,3,3,1,1,5,BU:2); Area covered by the river; recalculated based on Frischknecht et al. (1996)
- Transformation, from pasture, man made [resources, land]: 0.000102038 m2; lognormal SD95 1.67493
  (4,3,3,1,1,5,BU:1.2); Original area before the construction of the power station; recalculated based on Frischknecht et al. (1996)

## Emissions to nature
- Oils, unspecified [emissions to water, river]: 8.397e-8 kg; lognormal SD95 2.10443
  (4,5,3,5,3,5,BU:1.5); From turbines; based on Axpo (2008) and Vattenfall (2008)
- Water, OECD [emissions to air, unspecified]: 25 kg; lognormal SD95 2.27088
  (4,3,3,2,4,5,BU:1.5); Water evaporated from reservoir; calculated based on Pfister et al. (2011)
- Oils, unspecified [emissions to soil, industrial]: 3.796e-8 kg; lognormal SD95 2.10443
  (4,5,3,5,3,5,BU:1.5); From turbines; based on Axpo (2008) and Vattenfall (2008)
- Methane, biogenic [emissions to air, low. pop.]: 0.000671968 kg; lognormal SD95 1.96405
  (4,3,3,3,1,5,BU:1.5); Methane emissions due to the held-back river; DelSontro et al. (2010)
- Water [emissions to water, unspecified]: 45000 kg; lognormal SD95 2.5196
  (5,5,5,5,5,BU:1.05); All uncertainty-values set to 5.0 by default. Balance of input water

## Sampling procedure
literature

## Sources
- Flury K., Frischknecht R., 2012, 2012 - LCI hydroelectric power generation - Flury, Project report, 349, ESU-services Ltd., Uster, CH
Flury K., Frischknecht R. (2011) Life Cycle Inventory of hydropower. Project report. Volume: 349. ESU-services Ltd.. Uster, CH.
Type: Separate publication
Source: Report
First author: Flury K.
Other authors: Frischknecht R.
Year: 2011
Title of anthology: Project report
Place of publication: Uster, CH
Publisher: ESU-services Ltd.
Volume No: 349

## Validation
Proof reading validation: 22.10.2012; Other validation: \\Server\e\ESU-Docs\Projektablage\349 Sachbilanzen erneuerbare Energie DE\DatenErgebnisse\[Ecospold_runofriver_CH_v2.2.xlsx]X-Process;
