# Electricity, at cogen with biogas engine, agricultural covered, alloc. exergy

Dataset: EcoSpold 1, unit process
Functional unit: 1 kWh
Category: electricity by fuel / biomass\cogeneration
Geography: CH
Time period: 2006-01 to 2006-12
Production volume: 15.1 GWh electricity in this type of plant
Share of production covered: 100 %
Generated by: Fredy Dinkel
accessRestrictedTo: 0
copyright: true

## General comment
The multioutput process "biogas, agriculture covered, in cogen with biogas engine" delivers the co-products: heat "heat, at cogen with biogas engine, agricultural covered, allocation exergy" and electricity "electricity, at cogen with biogas engine, agricultural covered, alloc. Exergy". The allocation is based on the exergy values of heat and electricity. The exergy value of electricity is 1, and the exergy value of heat is 0.17. The degrees of efficiency are as follows: electricity: 33% and heat: 67%, but in these plants only half of the heat is used or sold (32%). ;

## Included processes
Use of biogas in a cogeneration unit. Included are emissions to air, biogas consumption, use and disposal of operational supplements as well as infrastructure expenditures.

## Geography
Conditions of cogeneration in Switzerland.

## Technology
Lambda 1-engine' with a catalytic converter

## Time period
Time of publications.

## Reference product
- Electricity, at cogen with biogas engine, agricultural covered, alloc. exergy [CH]: 1 kWh
  SWITZERLAND

## Inputs from technosphere
- Cogen unit 160kWe, components for electricity only [RER]: 5.625e-8 p; lognormal SD95 3.0715
  (1,4,2,1,3,4); ecoinvent V1.1. cogeneration of natural gas.
- Disposal, used mineral oil, 10% water, to hazardous waste incineration [CH]: 0.00029072 kg; lognormal SD95 1.2634
  (1,4,2,1,3,4); value of cogeneration of natural gas used as approximation
- Biogas, mix, at agricultural co-fermentation, covered [CH]: 0.40311 m3; lognormal SD95 1.2226
  (1,3,1,1,3,3); Needed heat is produced by the cogeneration
- Cogen unit 160kWe, common components for heat+electricity [RER]: 4.8454e-8 p; lognormal SD95 3.0715
  (1,4,2,1,3,4); ecoinvent V1.1. cogeneration of natural gas.
- Lubricating oil, at plant [RER]: 0.00029072 kg; lognormal SD95 1.2634
  (1,4,2,1,3,4); value of cogeneration of natural gas used as approximation

## Emissions to nature
- Sulfur dioxide [emissions to air, low. pop.]: 0.00020354 kg; lognormal SD95 1.2634
  (1,4,2,1,3,4); value of cogeneration of natural gas used as approximation
- Carbon dioxide, biogenic [emissions to air, low. pop.]: 0.78272 kg; lognormal SD95 1.2634
  (1,4,2,1,3,4); calculated from C Input
- Nitrogen oxides [emissions to air, low. pop.]: 0.00014536 kg; lognormal SD95 1.5928
  (1,4,2,1,3,4); value of cogeneration of natural gas used as approximation
- NMVOC, non-methane volatile organic compounds, unspecified origin [emissions to air, low. pop.]: 1.9381e-5 kg; lognormal SD95 1.5928
  (1,4,2,1,3,4); value of cogeneration of natural gas used as approximation
- Carbon monoxide, biogenic [emissions to air, low. pop.]: 0.00046516 kg; lognormal SD95 5.0815
  (1,4,2,1,3,4); value of cogeneration of natural gas used as approximation and entered as biogenic CO
- Methane, biogenic [emissions to air, low. pop.]: 0.00022289 kg; lognormal SD95 1.5928
  (1,4,2,1,3,4); value of cogeneration of natural gas used as approximation and entered as biogenic methane
- Heat, waste [emissions to air, low. pop.]: 3.16716 MJ; lognormal SD95 1.2634
  (1,4,2,1,3,4); own calculation
- Dinitrogen monoxide [emissions to air, low. pop.]: 2.4227e-5 kg; lognormal SD95 1.5928
  (1,4,2,1,3,4); value of cogeneration of natural gas used as approximation
- Platinum [emissions to air, low. pop.]: 6.7835e-11 kg; lognormal SD95 5.0815
  (1,4,2,1,3,4); value of cogeneration of natural gas used as approximation

## Sampling procedure
field data

## Sources
- Jungbluth N., Chudacoff M., Dauriat A., Dinkel F., Doka G., Faist Emmenegger M., Gnansounou E., Kljun N., Spielmann M., Stettler C., Sutter J., 2007, 2007 - LCI bioenergy - Jungbluth, Final report ecoinvent data v2.0, 17, Swiss Centre for LCI, ESU-services Ltd., Duebendorf and Uster, CH
Jungbluth N., Chudacoff M., Dauriat A., Dinkel F., Doka G., Faist Emmenegger M., Gnansounou E., Kljun N., Spielmann M., Stettler C., Sutter J. (2007) Life Cycle Inventories of Bioenergy. Final report ecoinvent data v2.0. Volume: 17. Swiss Centre for LCI, ESU. Duebendorf and Uster, CH.
Type: Measurement on site
Source: CD-ROM
First author: Jungbluth N.
Other authors: Chudacoff M., Dauriat A., Dinkel F., Doka G., Faist Emmenegger M., Gnansounou E., Kljun N., Spielmann M., Stettler C., Sutter J.
Year: 2007
Title of anthology: Final report ecoinvent data v2.0
Place of publication: Duebendorf and Uster, CH
Publisher: Swiss Centre for LCI, ESU
Volume No: 17

## Validation
Proof reading validation: Passed; Other validation: none;
