# xx Industrial residual wood, azobe (SFM), u=15%, CM, at sawmill

Dataset: EcoSpold 1, unit process
Functional unit: 1 m3
Category: material, obsolete / wood, obsolete\extraction, obsolete
Geography: RER
Time period: 2000-01 to 2005-12
Generated by: Frank Werner
accessRestrictedTo: 0
copyright: true

## General comment
data refers to wood from Central Africa, used in Europe. The multi-output process "sawing an planing, timber, azobe, air dried, u=15%, CM" delivers the two coproducts "sawn timber (SFM), azobe, planed, air dried, u=15%, CM, at sawmill" and "industrial residue wood, azobe (SFM), u=15%, CM, at sawmill". Allocation is based on the over-all proceeds of the process;

## Included processes
includes transportation to sawmill by lorry; sawing and plaining of azobe log in 20 mm sawn timber boards; natural drying is assumed; 30% of log input (including sapwood) is generated as co-product that is sold or is used for energy recovery used outside this process.

## Geography
Wood from Central Africa, sawing in Europe

## Technology
Data extrapolated from Meranti window production in the Netherlands. Depending on sawing technology, specific wood density of a particular log and type of sawn timber produced, data may vary

## Reference product
- xx Industrial residual wood, azobe (SFM), u=15%, CM, at sawmill [RER]: 1 m3
  Europe

## Inputs from technosphere
- Natural gas, burned in industrial furnace 1MWth [CH]: 1.81333 MJ; lognormal SD95 1.2621
  (3,4,1,3,1,5)
- Diesel, burned in building machine, average [CH]: 2.93333 MJ; lognormal SD95 1.2621
  (3,4,1,3,1,5)
- Tap water, at user [RER]: 28.16 kg; lognormal SD95 1.2621
  (3,4,1,3,1,5)
- Disposal, municipal solid waste, 22.9% water, to municipal incineration [CH]: 0.192 kg; lognormal SD95 1.2621
  (3,4,1,3,1,5)
- Roundwood, azobe (SFM), debarked, u=30%, CM, at maritime harbour [RER]: 0.17333 m3; lognormal SD95 1.2621
  (3,4,1,3,1,5)
- Petrol, at regional storage [RER]: 0.0073616 kg; lognormal SD95 1.2621
  (3,4,1,3,1,5)
- Electricity, medium voltage, production ENTSO-E, at grid: 14.1107 kWh; lognormal SD95 1.2621
  (3,4,1,3,1,5)
- Azobe, allocation correction 2 [GLO]: 0.82667 m3; lognormal SD95 1.2621
  (3,4,1,3,1,5)
- Sawmill [RER]: 5.3333e-8 p; lognormal SD95 3.0708
  (3,4,1,3,1,5)
- Transport, freight, lorry, fleet average [RER]: 56.3333 tkm; lognormal SD95 2.0742
  (3,4,1,3,1,5)

## Emissions to nature
- Heat, waste [emissions to air, unspecified]: 50.8 MJ; lognormal SD95 1.2621
  (3,4,1,3,1,5)
- BOD5, Biological Oxygen Demand [emissions to water, unspecified]: 5.6267e-8 kg; lognormal SD95 1.592
  (3,4,1,3,1,5)
- Hydrocarbons, aliphatic, unsaturated [emissions to water, unspecified]: 2.5067e-8 kg; lognormal SD95 3.0708
  (3,4,1,3,1,5)
- Suspended solids, unspecified [emissions to water, unspecified]: 5.76e-7 kg; lognormal SD95 1.592
  (3,4,1,3,1,5)
- Phenol [emissions to water, unspecified]: 1.128e-6 kg; lognormal SD95 3.0708
  (3,4,1,3,1,5)
- NMVOC, non-methane volatile organic compounds, unspecified origin [emissions to air, unspecified]: 0.0073616 kg; lognormal SD95 1.592
  (3,4,1,3,1,5)

## Sampling procedure
literature

## Extrapolations
see Technology

## Sources
- Althaus H.-J., Werner F., Stettler C., Dinkel F., 2007, 2007 - LCI renewable materials - Althaus, Final report ecoinvent Data v2.0, 21, Swiss Centre for LCI, Empa - TSL, Umwelt & Entwicklung, Carbotech AG, Duebendorf, CH
Althaus H.J., Dinkel F., Werner F. (2007) Life Cycle Inventories of Renewable Materials. Final report ecoinvent Data v2.0. Editors: 0. 0. Volume: 21. Issue: 0. Swiss Centre for LCI, Empa - TSL. Duebendorf, CH.
Type: Measurement on site
Source: CD-ROM
First author: Althaus H.J.
Other authors: Dinkel F., Werner F.
Year: 2007
Name of editors: 0
Title of anthology: Final report ecoinvent Data v2.0
Place of publication: Duebendorf, CH
Publisher: Swiss Centre for LCI, Empa - TSL
Journal: 0
Volume No: 21
Issue No: 0

## Validation
Proof reading validation: Passed; Other validation: none;
