# Kitchen worktop, chromium steel, standard, at plant

Dataset: EcoSpold 1, unit process
Functional unit: 1 m2
Category: construction / kitchen
Geography: CH
Time period: 2014-01 to 2014-12
Share of production covered: 0 %
Generated by: Franziska Wyss
accessRestrictedTo: 0
copyright: true

## Included processes
This data set includes the materials and resources needed for producing a conventionally chromium steel kitchen countertop. The chromium steel plate is 1.2 mm wide and is mounted on a plywood panel (19 mm wide). An average kitchen countertop has the measures of 2400 mm x 600 mm (1.44 m2). The sink is not included. The dataset includes cardboard wrapping and PUR-foam at the edges. Linked to updated LCI of particle boards from Ecoinvent data v3.2 for KBOB recommendation 2016; correction of amount of wood input for KBOB recommendation 2021.; Geography: Data valid for Switzerland

## Geography
Data valid for Switzerland

## Technology
conventional chromium steel product, 1.2 mm wide

## Reference product
- Kitchen worktop, chromium steel, standard, at plant [CH]: 1 m2
  SWITZERLAND

## Inputs from technosphere
- Particleboard, uncoated, average glue mix, at regional storage, with resource correction [CH]: 12.16 kg
  (1,1,1,1,1,4,BU:1.05); Holzunterbau (Spanplatte);
- Polyurethane, flexible foam, at plant [RER]: 0.019688 kg; lognormal SD95 1.113
  (1,1,1,1,1,4,BU:1.05); Kunststoffschutz (PU-Schaum);
- Titanium dioxide, production mix, at plant [RER]: 0.0002 kg; lognormal SD95 1.5276
  (2,1,2,3,4,4,BU:1.05); Monopar (Reinigungspaste);
- Adhesive for metals, at plant [DE]: 0.1 kg; lognormal SD95 1.1175
  (1,1,2,1,1,4,BU:1.05); Dispersionskleber (Stahl-Holz) mit Lösungsmitteln;
- Chromium steel sheet 18/8, recycling share 70 %, with resource correction, at plant [CH]: 9.6 m2; lognormal SD95 1.113
  (1,1,1,1,1,4,BU:1.05); Chromnickelstahl (1.4301);
- Corrugated board, mixed fibre, single wall, at plant [CH]: 1.1285 kg; lognormal SD95 1.113
  (1,1,1,1,1,4,BU:1.05); Kartonverpackung;
- Packaging film, LDPE, at plant [RER]: 0.092 kg; lognormal SD95 1.2355
  (1,1,1,1,3,4,BU:1.05); PE-Schutzfolie auf Oberfläche;
- Disposal, solvents mixture, 16.5% water, to hazardous waste incineration [CH]: 0.0002 kg; lognormal SD95 1.5276
  (2,1,2,3,4,4,BU:1.05); Entsorgung Reinigungsmittel;
- Electricity, medium voltage, at grid [CH]: 1.3889 kWh; lognormal SD95 1.113
  (1,1,1,1,1,4,BU:1.05); Elektrizität (CH-Mix);
- Transport, freight, rail, electricity with shunting [CH]: 0.13093 tkm; lognormal SD95 2.095
  (4,5,na,na,na,na,BU:2); Zug;
- Transport, freight, lorry, 16t-32t gross weight, fleet average [CH]: 28.812 tkm; lognormal SD95 2.095
  (4,5,na,na,na,na,BU:2); LKW;

## Sources
- Kasser U., R. Frischknecht, M. Klingler, D. Savi, R. Itten, F. Wyss,P. Stolz, L. Tschuemperlin, 2016, 2016 - Renewal and exp. of LCA data in KBOB - Kasser, Project report, 489, Buero fuer Umweltchemie, treeze Ltd., Zuerich and Uster, CH
Franziska Wyss, Rolf Frischknecht, Philippe Stolz (2014) Ökobilanzen von Kücheneinbauten und -möbeln. Project report. Volume: 489. treeze Ltd.. Uster, CH.
Type: Separate publication
Source: Report
First author: Franziska Wyss
Other authors: Rolf Frischknecht, Philippe Stolz
Year: 2014
Title of anthology: Project report
Place of publication: Uster, CH
Publisher: treeze Ltd.
Volume No: 489

## Validation
Proof reading validation: 05.11.2015; Other validation: \\SRV01\ESU-Docs\Projekte laufend\489 Erweiterung KBOB-Liste BFE\EcoSpold\Küche\[489_Küche_v1.10.xlsx]X-Process;
