# Basic oxygen furnace slag, at plant

Dataset: EcoSpold 1, unit process
Functional unit: 1 kg
Category: metals / extraction
Geography: RER
Time period: 2019-01 to 2021-12
Generated by: Mischa Zschokke
accessRestrictedTo: 0
copyright: true

## General comment
BOF slag is produced as a by-product. According to Remus (2013) 0.125 kg/kg LS of BOF slag is produced and 0.012 kg /kgLS of slag is produced from secondary metallurgy - assumed to be composed and used / disposed as BOF slag. 89% of total slag amount is reused, 11% is landfiled. Economic allocation factor is 0.0077.;
Synonyms: In UVEK2018 enthalten;

## Geography
Data from literature, referring to Europe

## Technology
Industry data.

## Time period
Time of publications.

## Reference product
- Basic oxygen furnace slag, at plant [RER]: 1 kg
  Europe

## Inputs from technosphere
- Iron scrap, at plant [RER]: 0.0017188 kg; lognormal SD95 1.1267
  (2,2,3,1,1,nA,BU:1.05); ; Remus (2013)
- Blast furnace gas, burned in power plant [RER]: 7.5596e-5 MJ; lognormal SD95 1.1267
  (2,2,3,1,1,nA,BU:1.05); ; Remus (2013)
- Dolomite, at plant [RER]: 0.00011044 kg; lognormal SD95 1.1267
  (2,2,3,1,1,nA,BU:1.05); ; Remus (2013)
- Disposal, basic oxygen furnace wastes, 0% water, to residual material landfill [CH]: 1.0694e-5 kg; lognormal SD95 1.1267
  (2,2,3,1,1,nA,BU:1.05); BOF slag - amount inventoried corresponds to the 11% of the slag that is landfilled. The rest is recycled or reused; (Remus 2013)
- Transport, transoceanic freight ship [OCE]: 0.00046198 tkm; lognormal SD95 2.004
  (2,2,1,1,1,nA,BU:2); ; based on UVEK:2018
- Disposal, basic oxygen furnace wastes, 0% water, to residual material landfill [CH]: 6.3775e-6 kg; lognormal SD95 1.0744
  (2,2,1,1,1,nA,BU:1.05); slag from desulphurization - amount inventoried corresponds to the 41% of the slag that is landfilled. The rest is recycled or reused; Remus (2013)
- Basic oxygen furnace gas, burned in power plant [RER]: 0.0040831 MJ; lognormal SD95 1.1267
  (2,2,3,1,1,nA,BU:1.05); ; Remus (2013)
- Nitrogen, liquid, at plant [RER]: 9.3329e-5 kg; lognormal SD95 1.1267
  (2,2,3,1,1,nA,BU:1.05); ; Remus (2013)
- Transport, freight, lorry, fleet average [RER]: 0.00017324 tkm; lognormal SD95 2.004
  (2,2,1,1,1,nA,BU:2); ; based on UVEK:2018
- Quicklime, in pieces, loose, at plant [CH]: 0.0003772 kg; lognormal SD95 1.1267
  (2,2,3,1,1,nA,BU:1.05); ; Remus (2013)
- Iron ore, 65% Fe, at beneficiation [GLO]: 7.5519e-5 kg; lognormal SD95 1.1267
  (2,2,3,1,1,nA,BU:1.05); ; Remus (2013)
- Compressed air, average installation, <30kW, 8 bar gauge, at supply network [RER]: 0.00013222 m3; lognormal SD95 1.1267
  (2,2,3,1,1,nA,BU:1.05); ; Remus (2013)
- Disposal, dust, unalloyed EAF steel, 15.4% water, to residual material landfill [CH]: 1.1573e-5 kg; lognormal SD95 1.0814
  (2,2,2,2,2,nA,BU:1.05); dusts from BOF gas treatment - approximation with EAF dust - amount inventoried corresponds to the 12% of the total dust that is landfilled. The rest is recycled or reused; (Remus 2013)
- Natural gas, high pressure, at consumer [RER]: 0.0030099 MJ; lognormal SD95 1.1267
  (2,2,3,1,1,nA,BU:1.05); ; Remus (2013)
- Argon, liquid, at plant [RER]: 1.0733e-5 kg; lognormal SD95 1.1267
  (2,2,3,1,1,nA,BU:1.05); ; Remus (2013)
- Pig iron, at plant [RER]: 0.0066886 kg; lognormal SD95 2.2948
  (4,2,5,5,5,nA,BU:1.05); hot metal; Remus (2013)
- Hard coal coke, at plant [RER]: 4.4176e-5 MJ; lognormal SD95 1.1267
  (2,2,3,1,1,nA,BU:1.05); ; Remus (2013)
- Disposal, basic oxygen furnace wastes, 0% water, to residual material landfill [CH]: 1.0266e-6 kg; lognormal SD95 1.0814
  (2,2,2,2,2,nA,BU:1.05); slag from secondary metallurgy - assumed to be composed and used / disposed as BOF slag --> amount inventoried represents only 11% of total slag; (Remus 2013)
- Blast oxygen furnace converter [RER]: 1.037e-13 p; lognormal SD95 3.0162
  (2,2,3,1,1,nA,BU:3); ; Remus (2013)
- Sinter, iron, at plant [RER]: 0.00023332 kg; lognormal SD95 1.1267
  (2,2,3,1,1,nA,BU:1.05); other Fe material ; Remus (2013)
- Disposal, inert waste, 5% water, to construction waste landfill [CH]: 2.5121e-5 kg; lognormal SD95 1.1267
  (2,2,3,1,1,nA,BU:1.05); rubble - allthough partly recycled total amount is assumed to be disposed in inert material landfill.; (Remus 2013)
- Transport, barge [RER]: 5.1331e-6 tkm; lognormal SD95 2.004
  (2,2,1,1,1,nA,BU:2); ; based on UVEK:2018
- Coke oven gas, at plant [GLO]: 0.003111 MJ; lognormal SD95 1.1267
  (2,2,3,1,1,nA,BU:1.05); ; Remus (2013)
- Oxygen, liquid, at plant [RER]: 0.00062141 kg; lognormal SD95 1.1267
  (2,2,3,1,1,nA,BU:1.05); ; Remus (2013)
- Electricity, medium voltage, production ENTSO-E, at grid: 0.00027221 kWh; lognormal SD95 1.1267
  (2,2,3,1,1,nA,BU:1.05); ; Remus (2013)
- Transport, freight, rail [RER]: 0.0011184 tkm; lognormal SD95 2.004
  (2,2,1,1,1,nA,BU:2); ; based on UVEK:2018

## Inputs from nature
- Water, cooling, unspecified natural origin/m3 [resources, in water]: 0.00016566 m3; lognormal SD95 1.1267
  (2,2,3,1,1,nA,BU:1.05); ; Remus (2013)

## Emissions to nature
- Copper [emissions to air, unspecified]: 1.0655e-8 kg; lognormal SD95 5.0184
  (2,2,3,1,1,nA,BU:5); ; (Remus 2013)
- Dioxin, 2,3,7,8 Tetrachlorodibenzo-p- [emissions to air, unspecified]: 5.3275e-16 kg; lognormal SD95 3.0162
  (2,2,3,1,1,nA,BU:3); ; (Remus 2013)
- Carbon monoxide, fossil [emissions to air, unspecified]: 2.9554e-5 kg; lognormal SD95 5.0184
  (2,2,3,1,1,nA,BU:5); ; (Remus 2013)
- Nitrogen oxides [emissions to air, unspecified]: 2.4577e-7 kg; lognormal SD95 1.5217
  (2,2,3,1,1,nA,BU:1.5); ; (Remus 2013)
- Lead [emissions to air, unspecified]: 4.472e-9 kg; lognormal SD95 5.0184
  (2,2,3,1,1,nA,BU:5); ; (Remus 2013)
- Carbon dioxide, fossil [emissions to air, unspecified]: 0.00076452 kg; lognormal SD95 1.1267
  (2,2,3,1,1,nA,BU:1.05); ; (Remus 2013)
- Particulates, < 10 um [emissions to air, unspecified]: 6.1053e-7 kg; lognormal SD95 1.5217
  (2,2,3,1,1,nA,BU:1.5); dust, Information on PM10 and PM2.5 are generally not available today.; (Remus 2013)
- Chromium [emissions to air, unspecified]: 3.3054e-10 kg; lognormal SD95 5.0184
  (2,2,3,1,1,nA,BU:5); ; (Remus 2013)
- PAH, polycyclic aromatic hydrocarbons [emissions to air, unspecified]: 7.7774e-11 kg; lognormal SD95 3.0162
  (2,2,3,1,1,nA,BU:3); ; (Remus 2013)
- Manganese [emissions to air, unspecified]: 7.233e-9 kg; lognormal SD95 5.0184
  (2,2,3,1,1,nA,BU:5); ; (Remus 2013)
- Iron [emissions to air, unspecified]: 3.5154e-7 kg; lognormal SD95 5.0184
  (2,2,3,1,1,nA,BU:5); ; (Remus 2013)
- Water [emissions to water, unspecified]: 0.157377 kg; lognormal SD95 2.5196
  (5,5,5,5,5,BU:1.05); All uncertainty-values set to 5.0 by default. Balance of input water

## Sampling procedure
Sampling procedure: Data from literature

## Sources
- Zschokke M., Bolt P., Conrad S., 2021, 2021 - LCI steel and iron processes - Zschokke, Project report, Carbotech AG, Zuerich, CH
M. Zschokke, S. Conrad, P. Bolt (2020) Life cycle inventories of steel and iron processes for UVEK:2020. Project report. carbotech. Zurich, CH.
Type: Separate publication
Source: Report
First author: M. Zschokke
Other authors: S. Conrad, P. Bolt
Year: 2020
Title of anthology: Project report
Place of publication: Zurich, CH
Publisher: carbotech
Original title: Life cycle inventories of steel and iron processes for UVEK:2020

## Validation
Proof reading validation: 23.02.2021; Other validation: [steel, converter, unalloyed, EU_v0.8.xlsx]X-Process;
