# Photovoltaic panel, perovskite-Si-tandem, at plant

Dataset: EcoSpold 1, unit process, infrastructure
Functional unit: 1 m2
Category: photovoltaic / production of components
Geography: DE
Time period: 2010-01 to 2017-12
Generated by: Philippe Stolz
accessRestrictedTo: 0
copyright: true

## General comment
LCI of CHEOPS perovskite silicon tandem modules to be produced by OXPV in Germany. LCI published in de Wild-Scholten, M. 2017: Deliverable 3.1 Life Cycle Analysis of CHEOPS technologies and benchmarking: Screening. Published LCI embeddeed in UVEK LCI data DQRv2:2018. Changes to LCI: Transport calculated based on given distances in Tabel 2 of Wild-Scholten (2017). Panel area is 1.6m2.;

## Included processes
Included are the manufacture of single-silicon PV cells in China, supply of raw materials for perovskite semiconductor, glass, aluminium frame, working and packaging materials as well as waste disposal, transport and emissions of lead to air and water.

## Technology
Company data

## Time period
Time of publications.

## Reference product
- Photovoltaic panel, perovskite-Si-tandem, at plant [DE]: 1 m2
  GERMANY

## Inputs from technosphere
- Solvents, organic, unspecified, at plant [GLO]: 0.039375 kg; lognormal SD95 1.2226
  (2,3,1,1,1,5,BU:1.05); Solvent 2, organic, halogen containing; de Wild-Scholten, M. 2017. Deliverable 3.1 Life Cycle Analysis of CHEOPS technologies and benchmarking: Screening. Available online.
- Flat glass, uncoated, at plant [RER]: 5.075 kg; lognormal SD95 1.2226
  (2,3,1,1,1,5,BU:1.05); Backside glass; de Wild-Scholten, M. 2017. Deliverable 3.1 Life Cycle Analysis of CHEOPS technologies and benchmarking: Screening. Available online.
- Lead, at regional storage [RER]: 0.0016187 kg; lognormal SD95 1.2226
  (2,3,1,1,1,5,BU:1.05); Lead iodide; de Wild-Scholten, M. 2017. Deliverable 3.1 Life Cycle Analysis of CHEOPS technologies and benchmarking: Screening. Available online.
- Tempering, flat glass [RER]: 8 kg; lognormal SD95 1.2226
  (2,3,1,1,1,5,BU:1.05); Tempering, flat glass; de Wild-Scholten, M. 2017. Deliverable 3.1 Life Cycle Analysis of CHEOPS technologies and benchmarking: Screening. Available online.
- Transport, transoceanic freight ship [OCE]: 61.356 tkm; lognormal SD95 2.0545
  (2,3,1,1,1,5,BU:2); Transport ship; de Wild-Scholten, M. 2017. Deliverable 3.1 Life Cycle Analysis of CHEOPS technologies and benchmarking: Screening. Available online.
- Lead, at regional storage [RER]: 0.000725 kg; lognormal SD95 1.2226
  (2,3,1,1,1,5,BU:1.05); String lead; de Wild-Scholten, M. 2017. Deliverable 3.1 Life Cycle Analysis of CHEOPS technologies and benchmarking: Screening. Available online.
- Solar glass, low-iron, at regional storage [RER]: 8.125 kg; lognormal SD95 1.2226
  (2,3,1,1,1,5,BU:1.05); Front glass; de Wild-Scholten, M. 2017. Deliverable 3.1 Life Cycle Analysis of CHEOPS technologies and benchmarking: Screening. Available online.
- Photovoltaic panel factory [GLO]: 4e-6 p; lognormal SD95 3.0519
  (2,3,1,1,1,5,BU:3); Factory; de Wild-Scholten, M. 2017. Deliverable 3.1 Life Cycle Analysis of CHEOPS technologies and benchmarking: Screening. Available online.
- Metallization paste, front side, at plant [RER]: 0.009375 kg; lognormal SD95 1.2226
  (2,3,1,1,1,5,BU:1.05); Silver paste; de Wild-Scholten, M. 2017. Deliverable 3.1 Life Cycle Analysis of CHEOPS technologies and benchmarking: Screening. Available online.
- Solvents, organic, unspecified, at plant [GLO]: 0.42375 kg; lognormal SD95 1.2226
  (2,3,1,1,1,5,BU:1.05); Solvent 1, organic, no halogen containing; de Wild-Scholten, M. 2017. Deliverable 3.1 Life Cycle Analysis of CHEOPS technologies and benchmarking: Screening. Available online.
- Diode, unspecified, at plant [GLO]: 0.0028125 kg; lognormal SD95 1.2226
  (2,3,1,1,1,5,BU:1.05); Bypass diode; de Wild-Scholten, M. 2017. Deliverable 3.1 Life Cycle Analysis of CHEOPS technologies and benchmarking: Screening. Available online.
- Silicone product, at plant [RER]: 0.12187 kg; lognormal SD95 1.2226
  (2,3,1,1,1,5,BU:1.05); Silicone; de Wild-Scholten, M. 2017. Deliverable 3.1 Life Cycle Analysis of CHEOPS technologies and benchmarking: Screening. Available online.
- 1-propanol, at plant [RER]: 0.015875 kg; lognormal SD95 1.2226
  (2,3,1,1,1,5,BU:1.05); Soldering flux: propanol; de Wild-Scholten, M. 2017. Deliverable 3.1 Life Cycle Analysis of CHEOPS technologies and benchmarking: Screening. Available online.
- Aluminium alloy, AlMg3, at plant [RER]: 2.125 kg; lognormal SD95 1.2226
  (2,3,1,1,1,5,BU:1.05); Module frame: aluminium; de Wild-Scholten, M. 2017. Deliverable 3.1 Life Cycle Analysis of CHEOPS technologies and benchmarking: Screening. Available online.
- Tin, at regional storage [RER]: 0.012875 kg; lognormal SD95 1.2226
  (2,3,1,1,1,5,BU:1.05); String tin; de Wild-Scholten, M. 2017. Deliverable 3.1 Life Cycle Analysis of CHEOPS technologies and benchmarking: Screening. Available online.
- Methyl iodide [RER]: 0.00039375 kg; lognormal SD95 1.2226
  (2,3,1,1,1,5,BU:1.05); Methyl iodide; de Wild-Scholten, M. 2017. Deliverable 3.1 Life Cycle Analysis of CHEOPS technologies and benchmarking: Screening. Available online.
- Ethylene bromide, at plant [RER]: 0.00039375 kg; lognormal SD95 1.2226
  (2,3,1,1,1,5,BU:1.05); Ethylene bromide; de Wild-Scholten, M. 2017. Deliverable 3.1 Life Cycle Analysis of CHEOPS technologies and benchmarking: Screening. Available online.
- Disposal, solvents mixture, 16.5% water, to hazardous waste incineration [CH]: 0.88562 kg; lognormal SD95 1.2226
  (2,3,1,1,1,5,BU:1.05); organic solvent (halogen free), halogen contatining solvent, PB + halogen contating solvent; de Wild-Scholten, M. 2017. Deliverable 3.1 Life Cycle Analysis of CHEOPS technologies and benchmarking: Screening. Available online.
- Silver, at regional storage [RER]: 0.0035209 kg; lognormal SD95 1.2226
  (2,3,1,1,1,5,BU:1.05); Conductive Adhesive: NAMICS H9455: 85-95% Ag, <5% resins (phenolyc/epoxy), <5% additives, 5-10% ethylene glycol monophenyl ether (MSDS H9455-21); de Wild-Scholten, M. 2017. Deliverable 3.1 Life Cycle Analysis of CHEOPS technologies and benchmarking: Screening. Available online.
- Epoxy resin, liquid, at plant [RER]: 9.2656e-5 kg; lognormal SD95 1.2226
  (same comment as for Silver, at regional storage)
- EUR-flat pallet [RER]: 0.03125 p; lognormal SD95 1.2226
  (2,3,1,1,1,5,BU:1.05); wooden pallet; de Wild-Scholten, M. 2017. Deliverable 3.1 Life Cycle Analysis of CHEOPS technologies and benchmarking: Screening. Available online.
- Disposal, plastics, mixture, 15.3% water, to municipal incineration [CH]: 0.030188 kg; lognormal SD95 1.2226
  (2,3,1,1,1,5,BU:1.05); EVA cutting loss; de Wild-Scholten, M. 2017. Deliverable 3.1 Life Cycle Analysis of CHEOPS technologies and benchmarking: Screening. Available online.
- Ethylvinylacetate, foil, at plant [RER]: 0.975 kg; lognormal SD95 1.2226
  (2,3,1,1,1,5,BU:1.05); Ethylvinylacetate foil; de Wild-Scholten, M. 2017. Deliverable 3.1 Life Cycle Analysis of CHEOPS technologies and benchmarking: Screening. Available online.
- Corrugated board, mixed fibre, single wall, at plant [RER]: 0.7625 kg; lognormal SD95 1.2226
  (2,3,1,1,1,5,BU:1.05); Cardboard for packaging; de Wild-Scholten, M. 2017. Deliverable 3.1 Life Cycle Analysis of CHEOPS technologies and benchmarking: Screening. Available online.
- Diphenylether-compounds, at regional storehouse [RER]: 0.00037062 kg; lognormal SD95 1.2226
  (same comment as for Silver, at regional storage)
- Glass fibre reinforced plastic, polyamide, injection moulding, at plant [RER]: 0.295 kg; lognormal SD95 1.2226
  (2,3,1,1,1,5,BU:1.05); Junction box; de Wild-Scholten, M. 2017. Deliverable 3.1 Life Cycle Analysis of CHEOPS technologies and benchmarking: Screening. Available online.
- Phenolic resin, at plant [RER]: 9.2656e-5 kg; lognormal SD95 1.2226
  (same comment as for Silver, at regional storage)
- Electricity, medium voltage, at grid [DE]: 23.438 kWh; lognormal SD95 1.2226
  (2,3,1,1,1,5,BU:1.05); electricity from external supply; de Wild-Scholten, M. 2017. Deliverable 3.1 Life Cycle Analysis of CHEOPS technologies and benchmarking: Screening. Available online.
- Transport, freight, lorry, fleet average [RER]: 4.6102 tkm; lognormal SD95 2.0545
  (2,3,1,1,1,5,BU:2); Transport lorry; de Wild-Scholten, M. 2017. Deliverable 3.1 Life Cycle Analysis of CHEOPS technologies and benchmarking: Screening. Available online.
- Chemicals organic, at plant [GLO]: 8.125e-5 kg; lognormal SD95 1.2226
  (2,3,1,1,1,5,BU:1.05); C60 fullerene; de Wild-Scholten, M. 2017. Deliverable 3.1 Life Cycle Analysis of CHEOPS technologies and benchmarking: Screening. Available online.
- Copper, at regional storage [RER]: 0.1025 kg; lognormal SD95 1.2226
  (2,3,1,1,1,5,BU:1.05); String copper; de Wild-Scholten, M. 2017. Deliverable 3.1 Life Cycle Analysis of CHEOPS technologies and benchmarking: Screening. Available online.
- Chemicals organic, at plant [GLO]: 3.8187e-5 kg; lognormal SD95 1.2226
  (2,3,1,1,1,5,BU:1.05); Spiro-OMeTAD: 2,2’,7,7’-Tetrakis-(N,N-di-4-methoxyphenylamino)-9,9’-spirobifluorene; de Wild-Scholten, M. 2017. Deliverable 3.1 Life Cycle Analysis of CHEOPS technologies and benchmarking: Screening. Available online.
- Wire drawing, copper [RER]: 0.1025 kg; lognormal SD95 1.2226
  (same comment as for Copper, at regional storage)
- Indium, at regional storage [RER]: 0.0075 kg; lognormal SD95 1.2226
  (2,3,1,1,1,5,BU:1.05); Indium Tin Oxide; de Wild-Scholten, M. 2017. Deliverable 3.1 Life Cycle Analysis of CHEOPS technologies and benchmarking: Screening. Available online.
- Tin, at regional storage [RER]: 0.0075 kg; lognormal SD95 1.2226
  (same comment as for Indium, at regional storage)
- Photovoltaic cell, single-Si, at plant [CN]: 0.93541 m2; lognormal SD95 1.2226
  (2,3,1,1,1,5,BU:1.05); Monocrystalline silicone solar cell without the grid, 156mm x 156mm; de Wild-Scholten, M. 2017. Deliverable 3.1 Life Cycle Analysis of CHEOPS technologies and benchmarking: Screening. Available online.

## Inputs from nature
- Water, cooling, unspecified natural origin, DE [resources, in water]: 0.73125 m3; lognormal SD95 1.2226
  (2,3,1,1,1,5,BU:1.05); cooling water, from natural origin; de Wild-Scholten, M. 2017. Deliverable 3.1 Life Cycle Analysis of CHEOPS technologies and benchmarking: Screening. Available online.

## Emissions to nature
- Lead [emissions to air, high. pop.]: 1.1562e-5 kg; lognormal SD95 5.0592
  (2,3,1,1,1,5,BU:5); Lead to air; de Wild-Scholten, M. 2017. Deliverable 3.1 Life Cycle Analysis of CHEOPS technologies and benchmarking: Screening. Available online.
- Water [emissions to air, high. pop.]: 36.562 kg; lognormal SD95 1.5798
  (3,3,1,1,1,5,BU:1.5); Cooling water emissions (5% of used cooling water); Estmated based Frischknecht and Büsser (2013)
- Lead [emissions to water, unspecified]: 1.1562e-5 kg; lognormal SD95 5.0592
  (2,3,1,1,1,5,BU:5); Lead to water; de Wild-Scholten, M. 2017. Deliverable 3.1 Life Cycle Analysis of CHEOPS technologies and benchmarking: Screening. Available online.

## Sources
- Frischknecht R., Itten R., Sinha P., de Wild-Scholten M., Zhank J., 2020, 2015 - LCI and LCA photovoltaic systems - Frischknecht, Project report, 174, IEA PVPS Task 12, Petten, NL
Frischknecht R.,, Stolz P., Sinha P., de Wild-Scholten M. (2020) Life Cycle Inventories and Life Cycle Assessments of Photovoltaic Systems. Project report. Volume: 174. IEA PVPS Task 12.
Type: Separate publication
Source: Report
First author: Frischknecht R.,
Other authors: Stolz P., Sinha P., de Wild-Scholten M.
Year: 2020
Title of anthology: Project report
Publisher: IEA PVPS Task 12
Volume No: 174
Original title: Life Cycle Inventories and Life Cycle Assessments of Photovoltaic Systems

## Validation
Proof reading validation: 30.09.2020; Other validation: G:\Projekte laufend\174 Photovoltaic, IEA Task 12\2017 Global supply chain\EcoSpold\[174-photovoltaics-global-supply-chain-v2.5.xlsx]X-Process;
