# Electricity imports

Dataset: EcoSpold 1, unit process
Functional unit: 1 kWh
Category: electricity / Electricity imports
Geography: GB
Time period: 2023 to 2023
Synonyms: 0
Share of production covered: 100 %
Generated by: Christopher Oberschelp
accessRestrictedTo: 0
copyright: true

## General comment
Electricity imports in this dataset are representing physical electricity imports as far as such data is available from statistical data sources, in case of data gaps supplemented by trade flow information that also includes physical amounts. Unrealistic values were removed where present. The imported electricity is assumed to reflect the corresponding foreign consumption mix.

## Included processes
Included are the shares of supply mixes for the corresponding trade partners. Not included are transformation, transport or distribution losses except those already covered in the supply mixes.

## Geography
Data apply to utilities and auto-producers.

## Technology
No technology description is provided because the dataset just describes the power plant portfolio of the respective country using current average technology per energy carrier.

## Time period
Time period of statistics used.

## Reference product
- Electricity imports [GB]: 1 kWh

## Inputs from technosphere
All rows: lognormal SD95 1.0714
- Electricity mix [BE]: 0.231379 kWh
  (1,1,1,1,1,3,BU:1.05), EIA energy statistics and others, own calculations
- Electricity mix [FR]: 0.404779 kWh
  (1,1,1,1,1,3,BU:1.05), EIA energy statistics and others, own calculations
- Electricity mix [IE]: 0.0495263 kWh
  (1,1,1,1,1,3,BU:1.05), EIA energy statistics and others, own calculations
- Electricity mix [NL]: 0.179908 kWh
  (1,1,1,1,1,3,BU:1.05), EIA energy statistics and others, own calculations
- Electricity mix [NO]: 0.134407 kWh
  (1,1,1,1,1,3,BU:1.05), EIA energy statistics and others, own calculations

## Sampling procedure
Statistical data

## Sources
- Oberschelp C., 2025, 2025 - Electricity mixes in UVEK database - Oberschelp, Project reports, 0, Oberschelp Consulting, Zuerich, CH

## Validation
manual review of spold files and documentation
none
