# xxx Softwood, stand establishment, tending, site development, under bark

Dataset: EcoSpold 1, unit process
Functional unit: 1 m3
Category: material, obsolete / wood, obsolete\extraction, obsolete
Geography: RER
Generated by: Hans-Joerg Althaus
accessRestrictedTo: 0
copyright: true

## General comment
The volume refers to the wood not including the bark;
Synonyms: Spruce, Fichte;

## Included processes
Includes motormanual processes for stand establishment, tending and site development for spruce and the land and material (including transports) use for the forest roads.

## Technology
Considers only one type of forest interventions (Motormanual processes for "Fichte, I. Ertragsklasse, starke Durchforstung")

## Reference product
- xxx Softwood, stand establishment, tending, site development, under bark [RER]: 1 m3
  Europe

## Inputs from technosphere
- Gravel, crushed, at mine [CH]: 62.1 kg; lognormal SD95 1.12
  (1,4,2,3,1,1,4)
- Power sawing, without catalytic converter [RER]: 0.0201 hr; lognormal SD95 2.01
  (1,3,2,3,1,1,5)
- Transport, freight, lorry, 7.5t-16t gross weight, fleet average [RER]: 3.1 tkm; lognormal SD95 2.09
  (4,5,nA,nA,nA,nA,5)
- Diesel, burned in building machine, average [CH]: 2.06 MJ; lognormal SD95 2.01
  (1,3,2,3,1,1,5)

## Inputs from nature
- Occupation, traffic area, road embankment [resources, land]: 9.7 m2a; lognormal SD95 1.57
  (2,3,1,3,1,5,7)
- Transformation, from forest, extensive [resources, land]: 0.0808 m2; lognormal SD95 2.06
  (2,3,1,3,1,5,8)
- Transformation, to traffic area, road embankment [resources, land]: 0.0808 m2; lognormal SD95 2.06
  (2,3,1,3,1,5,8)

## Sampling procedure
Literature

## Extrapolations
see Geography and Technology

## Uncertainty adjustments
The assumption that Germany is representative for central Europe is considered in the uncertainties.

## Sources
- Werner F., Althaus H.-J., Kuenniger T., Richter K., Jungbluth N., 2007, 2007 - LCI wood as fuel and const. mat. - Werner, Final report ecoinvent data v2.0, 9, Swiss Centre for LCI, Empa - TSL, ESU-services Ltd., Duebendorf, CH
Werner F., Althaus H.-J., Künniger T., Richter K., Jungbluth N. (2007) 1Life Cycle Inventories of Wood as Fuel and Construction Material. Final report ecoinvent data v2.0. Volume: 9. Issue: 0. Swiss Centre for LCI, Empa - TSL. Dübendorf, CH.
Type: Measurement on site
Source: CD-ROM
First author: Werner F.
Other authors: Althaus H.-J., Künniger T., Richter K., Jungbluth N.
Year: 2007
Title of anthology: Final report ecoinvent data v2.0
Place of publication: Dübendorf, CH
Publisher: Swiss Centre for LCI, Empa - TSL
Volume No: 9
Issue No: 0

## Validation
Proof reading validation: passed; Other validation: none;
