# Resistor, wirewound, through-hole mounting, at plant

Dataset: EcoSpold 1, unit process
Functional unit: 1 kg
Category: electronics / component
Geography: GLO
Time period: 2023-01 to 2029-12
Generated by: Lugas Raka Adrianto, Maulana Permana Ajie, Didier Beloin-Saint-Pierre
accessRestrictedTo: 0
copyright: false

## General comment
The data represent a typical wirewound type resistor for through-hole mounting, used in the information and communication technology. Material data are taken from datasheets of producers of such resistors. Infrastructure and production efforts are based on own assumptions. The dataset represents 1 kg of resistors with a weight of 3.8 gram/unit. Updates were made in 2023, mainly concerning the regionalization of energy and material input flows;

## Included processes
This dataset covers raw material input and production efforts for the production of currently used wirewound resistors for through-hole mounting technology.

## Geography
Data represent a global valuable composition of wirewound type resistors.

## Technology
Average technology for the production of resistors and potentiometers - comprising terminmation printing; resistive body printing; glass coat printing; laser trimming; substrate stripping (SMT) resp. ceramic rods; deposition processes; ageing; capping (THT) resp. printing; curing; punching; revetting; molding (ptoentiom.)

## Reference product
- Resistor, wirewound, through-hole mounting, at plant [GLO]: 1 kg
  Global

## Inputs from technosphere
- Aluminium oxide, at plant [RER]: 0.29581 kg; lognormal SD95 1.32
  (1,4,4,1,1,5,BU:1.05); company information
- Aluminium, primary, at plant [RER]: 0.00492 kg; lognormal SD95 1.32
  (1,4,4,1,1,5,BU:1.05); company information
- Copper, primary, at refinery [GLO]: 0.04059 kg; lognormal SD95 1.32
  (1,4,4,1,1,5,BU:1.05); company information
- Glass tube, borosilicate, at plant [DE]: 0.01476 kg; lognormal SD95 1.32
  (1,4,4,1,1,5,BU:1.05); company information
- Limestone, milled, packed, at plant [CH]: 0.12091 kg; lognormal SD95 1.32
  (1,4,4,1,1,5,BU:1.05); company information
- Nickel, 99.5%, at plant [GLO]: 0.01353 kg; lognormal SD95 1.32
  (1,4,4,1,1,5,BU:1.05); company information
- Pig iron, at plant [GLO]: 0.06396 kg; lognormal SD95 1.32
  (1,4,4,1,1,5,BU:1.05); company information
- Production efforts, resistors [GLO]: 1 kg; lognormal SD95 1.65
  (3,4,4,1,4,5,BU:1.05); rough estimation
- Silica sand, at plant [DE]: 0.50036 kg; lognormal SD95 1.32
  (1,4,4,1,1,5,BU:1.05); company information
- Silicone product, at plant [RER]: 0.011439 kg; lognormal SD95 1.32
  (1,4,4,1,1,5,BU:1.05); company information
- Steel, low-alloyed, at plant [RER]: 0.13653 kg; lognormal SD95 1.32
  (1,4,4,1,1,5,BU:1.05); company information
- Tin, at regional storage [RER]: 0.02706 kg; lognormal SD95 1.32
  (1,4,4,1,1,5,BU:1.05); company information

## Sampling procedure
literature

## Extrapolations
see Geography & Technology

## Sources
- Raka Adrianto L., Permana Ajie M., Beloin-Saint-Pierre D., 2024, 2024 - LCI ICT sector - Raka Adrianto, Empa, St. Gallen, CH

## Validation
Proof reading validation: Passed, Other validation: none, Validator: Mischa Zschokke, Company: Carbotech, Country: CH
