# Cogen unit 200kWe diesel SCR, components for electricity only

Dataset: EcoSpold 1, unit process, infrastructure
Functional unit: 1 p
Category: heat / oil\cogeneration\power unit\infrastructure
Geography: RER
Time period: 1990-01 to 2000-12
Generated by: Thomas Heck
accessRestrictedTo: 0
copyright: true

## General comment
The module summarises infrastructure components of a cogeneration unit. ;
Synonyms: Selective Catalytic Reduction, SCR;

## Included processes
The module includes all components related exclusively to electricity production.

## Geography
Extrapolated from data of a plant in Switzerland, assumed valid for Europe (RER).

## Technology
Partly extrapolated from data of a 160kWe lambda=1 natural gas plant, adjusted to diesel cogen with SCR and oxidation catalytic converters.

## Reference product
- Cogen unit 200kWe diesel SCR, components for electricity only [RER]: 1 p
  Europe

## Inputs from technosphere
- Assembly, generator and motor, cogen unit 160kWe [RER]: 1 p; lognormal SD95 1
- Generator 200kWe [RER]: 1.25 p; lognormal SD95 1
- Electric parts of cogen unit 160kWe [RER]: 1 p; lognormal SD95 1

## Sampling procedure
Operator and manufacturer information

## Extrapolations
see Geography/Text, see Technolgy Text

## Sources
- Heck T., 2007, 2007 - Combined heat power generation - Heck, Sachbilanzen von Energiesystemen. Final report No. 6 ecoinvent data v2.0, 6, Swiss Centre for LCI, PSI, Duebendorf and Villigen, CH
Heck, T. (2007) Wärme-Kraft-Kopplung. Sachbilanzen von Energiesystemen. Final report No. 6 ecoinvent data v2.0. Editors: Dones R.. Volume: 6. Swiss Centre for LCI, PSI. Dübendorf and Villigen, CH.
Type: Measurement on site
Source: CD-ROM
First author: Heck, T.
Year: 2007
Name of editors: Dones R.
Title of anthology: Sachbilanzen von Energiesystemen. Final report No. 6 ecoinvent data v2.0
Place of publication: Dübendorf and Villigen, CH
Publisher: Swiss Centre for LCI, PSI
Volume No: 6

## Validation
Proof reading validation: passed; Other validation: none;
