# Dichloromethane, at plant

Dataset: EcoSpold 1, unit process
Functional unit: 1 kg
Category: chemicals / organic
Geography: RER
Time period: 2000-01 to 2000-12
Production volume: 0.138 Mt sold in Europe in 1996
Share of production covered: 78 %
Generated by: Alex Primas
accessRestrictedTo: 0
copyright: true

## General comment
The data source for this process is a system inventory from Boustead. Due to the cumulated form of this data only the ressources and emissions included in the data source were considered. No land occupation and land use is included in this dataset. Further it was not possible to implement an uncertainity assessment with this data.;
CAS number: 000075-09-2;
Formula: CH2Cl2;
Synonyms: methylene dichloride, methylene chloride, methane dichloride, methylene bichloride, Freon 30;

## Included processes
Raw materials, processing energy, emissions to air and water from process, energy services and transports, infrastructure only partly included, no infrastructure of main process included, no land use data included.

## Geography
Data from various plants within Europe.

## Technology
Data refers to actual technology used in the companies included. This leads in total to an average value including all important production routes for this chemical

## Time period
Time of literature publication. Measurements took place before this period.

## Reference product
- Dichloromethane, at plant [RER]: 1 kg
  Europe

## Inputs from technosphere
All rows: lognormal SD95 1
- Disposal, plastics, mixture, 15.3% water, to sanitary landfill [CH]: 3e-6 kg
- Disposal, municipal solid waste, 22.9% water, to sanitary landfill [CH]: 0.0015 kg
- Disposal, average incineration residue, 0% water, to residual material landfill [CH]: 0.0271 kg
- Disposal, wood untreated, 20% water, to sanitary landfill [CH]: 5e-7 kg
- Disposal, municipal solid waste, 22.9% water, to municipal incineration [CH]: 2.5e-6 kg
- Disposal, spoil from coal mining, in surface landfill [GLO]: 0.077 kg
- Disposal, hazardous waste, 25% water, to hazardous waste incineration [CH]: 0.00084 kg
- Disposal, facilities, chemical production [RER]: 7e-6 kg

## Inputs from nature
All rows: lognormal SD95 1
- Sodium chloride [resources, in ground]: 1.2 kg
- Sand [resources, in ground]: 0.00068 kg
- Coal, hard [resources, in ground]: 0.28 kg
- Oil, crude [resources, in ground]: 0.093 kg
- Olivine [resources, in ground]: 1e-6 kg
- Water, unspecified natural origin/m3 [resources, in water]: 0.00491 m3
- Water, salt, ocean [resources, in water]: 1.5e-7 m3
- Fluorspar [resources, in ground]: 3e-6 kg
- Barite [resources, in ground]: 0.00024 kg
- Iron [resources, in ground]: 0.00014 kg
- Dolomite [resources, in ground]: 2e-6 kg
- Water, cooling, unspecified natural origin/m3 [resources, in water]: 0.024 m3
- Calcite [resources, in ground]: 0.026 kg
- Wood, unspecified, standing/m3 [resources, biotic]: 1.82e-8 m3
- Gas, natural/m3 [resources, in ground]: 0.537 m3
- Uranium [resources, in ground]: 1.72e-5 kg
- Coal, brown [resources, in ground]: 0.037 kg
- Water, well [resources, in water]: 0.00071 m3
- Sulfur [resources, in ground]: 0.0011 kg
- Aluminium [resources, in ground]: 1.11e-5 kg
- Water, river [resources, in water]: 4.1e-6 m3
- Energy, potential (in hydropower reservoir), converted [resources, in water]: 0.32 MJ

## Emissions to nature
- Mercury [emissions to water, river]: 5e-7 kg; lognormal SD95 1
- Dinitrogen monoxide [emissions to air, high. pop.]: 5e-7 kg; lognormal SD95 1
- Chlorinated solvents, unspecified [emissions to water, river]: 7.5e-5 kg; lognormal SD95 1
- Chlorine [emissions to water, river]: 5e-7 kg; lognormal SD95 1
- Calcium [emissions to water, river]: 0.0061 kg; lognormal SD95 1
- Zinc [emissions to water, river]: 5e-7 kg; lognormal SD95 1
- Sodium [emissions to water, river]: 0.11 kg; lognormal SD95 1
- Acidity, unspecified [emissions to water, river]: 2e-5 kg; lognormal SD95 1
- COD, Chemical Oxygen Demand [emissions to water, river]: 0.00014 kg; lognormal SD95 1
- Ethane, 1,2-dichloro- [emissions to water, river]: 5e-7 kg; lognormal SD95 1
- Ethene, chloro- [emissions to water, river]: 5e-7 kg; lognormal SD95 1
- Hydrogen chloride [emissions to air, high. pop.]: 0.00018 kg; lognormal SD95 1
- Iron [emissions to water, river]: 1.1e-5 kg; lognormal SD95 1
- Magnesium [emissions to water, river]: 8e-6 kg; lognormal SD95 1
- Sulfate [emissions to air, high. pop.]: 4.9e-7 kg; lognormal SD95 1
- Copper [emissions to water, river]: 5e-7 kg; lognormal SD95 1
- Aluminium [emissions to water, river]: 5e-7 kg; lognormal SD95 1
- Chlorine [emissions to air, high. pop.]: 2e-6 kg; lognormal SD95 1
- Nitrogen oxides [emissions to air, high. pop.]: 0.014 kg; lognormal SD95 1
- Chloride [emissions to water, river]: 0.19 kg; lognormal SD95 1
- Potassium [emissions to water, river]: 5e-7 kg; lognormal SD95 1
- Sulfate [emissions to water, river]: 0.0039 kg; lognormal SD95 1
- Fluoride [emissions to water, river]: 5e-7 kg; lognormal SD95 1
- Nitrogen [emissions to water, river]: 5e-7 kg; lognormal SD95 1
- Cyanide [emissions to water, river]: 5e-7 kg; lognormal SD95 1
- Ammonium, ion [emissions to water, river]: 1e-6 kg; lognormal SD95 1
- Fluorine [emissions to air, high. pop.]: 5e-7 kg; lognormal SD95 1
- Hydrocarbons, aromatic [emissions to air, high. pop.]: 5e-7 kg; lognormal SD95 1
- Particulates, > 10 um [emissions to air, high. pop.]: 0.0016 kg; lognormal SD95 1
- Carbonate [emissions to water, river]: 5e-7 kg; lognormal SD95 1
- Particulates, > 2.5 um, and < 10um [emissions to air, high. pop.]: 0.00215 kg; lognormal SD95 1
- Hydrogen sulfide [emissions to air, high. pop.]: 5e-7 kg; lognormal SD95 1
- Carbon dioxide, fossil [emissions to air, high. pop.]: 2.3 kg; lognormal SD95 1
- Phenol [emissions to water, river]: 4e-6 kg; lognormal SD95 1
- Ethane, 1,2-dichloro- [emissions to air, high. pop.]: 2e-6 kg; lognormal SD95 1
- Methane, fossil [emissions to air, high. pop.]: 0.014 kg; lognormal SD95 1
- Hydrocarbons, chlorinated [emissions to air, high. pop.]: 0.0034 kg; lognormal SD95 1
- AOX, Adsorbable Organic Halogen as Cl [emissions to water, river]: 5e-7 kg; lognormal SD95 1
- Aldehydes, unspecified [emissions to air, high. pop.]: 5e-7 kg; lognormal SD95 1
- Oils, unspecified [emissions to water, river]: 5e-7 kg; lognormal SD95 1
- Suspended solids, unspecified [emissions to water, river]: 0.001, 2.6e-5 kg (2 entries); lognormal SD95 1
- Carbon monoxide, fossil [emissions to air, high. pop.]: 0.001 kg; lognormal SD95 1
- Mercury [emissions to air, high. pop.]: 5e-7 kg; lognormal SD95 1
- Sulfide [emissions to water, river]: 1.8e-5 kg; lognormal SD95 1
- Chlorate [emissions to water, river]: 5e-7 kg; lognormal SD95 1
- Lead [emissions to air, high. pop.]: 5e-7 kg; lognormal SD95 1
- Methane, dichlorodifluoro-, CFC-12 [emissions to air, high. pop.]: 6.7e-5 kg; lognormal SD95 1
- TOC, Total Organic Carbon [emissions to water, river]: 6e-6 kg; lognormal SD95 1
- Hydrocarbons, unspecified [emissions to water, river]: 3.25e-5 kg; lognormal SD95 1
- Ammonia [emissions to air, high. pop.]: 5e-7 kg; lognormal SD95 1
- Nickel [emissions to water, river]: 5e-7 kg; lognormal SD95 1
- Sulfur dioxide [emissions to air, high. pop.]: 0.013 kg; lognormal SD95 1
- Bromate [emissions to water, river]: 5e-7 kg; lognormal SD95 1
- Nitrate [emissions to water, river]: 5e-7 kg; lognormal SD95 1
- Ethene, chloro- [emissions to air, high. pop.]: 2e-6 kg; lognormal SD95 1
- Hydrogen [emissions to air, high. pop.]: 0.0008 kg; lognormal SD95 1
- Phosphorus [emissions to water, river]: 2.2e-7 kg; lognormal SD95 1
- BOD5, Biological Oxygen Demand [emissions to water, river]: 8e-6 kg; lognormal SD95 1
- NMVOC, non-methane volatile organic compounds, unspecified origin [emissions to air, high. pop.]: 0.00106 kg; lognormal SD95 1
- Particulates, < 2.5 um [emissions to air, high. pop.]: 0.00125 kg; lognormal SD95 1
- Heat, waste [emissions to air, high. pop.]: 38.9 MJ; lognormal SD95 1
- Hydrogen fluoride [emissions to air, high. pop.]: 7e-6 kg; lognormal SD95 1
- Water [emissions to water, unspecified]: 4.6645, 22.8, 0.639, 0.003895 kg (4 entries); lognormal SD95 2.5196
  (5,5,5,5,5,BU:1.05); All uncertainty-values set to 5.0 by default. Balance of input water

## Sampling procedure
Data represent a large share of the European production. Due to the cummulated data source for the product system invetory there are important parameters as land use or soil emissions missing in this dataset. Considered are only emissions stated in the original source of Boustead.

## Uncertainty adjustments
Uncertainty for LCI results cannot be determined. Terefore uncertainity set to 1 which means no uncertainity is included

## Sources
- Althaus H.-J., Chudacoff M., Hellweg S., Hischier R., Jungbluth N., Osses M., Primas A., 2007, 2007 - LCI chemicals - Althaus, Final report ecoinvent data v2.0, 8, Swiss Centre for LCI, Empa - TSL, ETH, ESU-services Ltd., Chudacoff Oekoscience, Duebendorf, CH
Althaus H.-J., Chudacoff M., Hischier R., Jungbluth N., Osses M., Primas A. (2007) Life Cycle Inventories of Chemicals. Final report ecoinvent data v2.0. Volume: 8. Swiss Centre for LCI, Empa - TSL. Dübendorf, CH.
Type: Measurement on site
Source: CD-ROM
First author: Althaus H.-J.
Other authors: Chudacoff M., Hischier R., Jungbluth N., Osses M., Primas A.
Year: 2007
Title of anthology: Final report ecoinvent data v2.0
Place of publication: Dübendorf, CH
Publisher: Swiss Centre for LCI, Empa - TSL
Volume No: 8

## Validation
Proof reading validation: passed.; Other validation: none;
