# Disposal, biowaste, to anaerobic digestion, economic allocation

Dataset: EcoSpold 1, unit process
Functional unit: 1 kg
Category: Others / biomass
Geography: CH
Time period: 2016-01 to 2016-12
Generated by: Thomas Kaegi
accessRestrictedTo: 0
copyright: true

## General comment
Inventory refers to 1kg of biowaste. Electricity consumption and emissions represent the biogas production in a digestion plant. Infrastructure expenditures are included. Methane emissions are based on Dinkel et al. 2012, Ökobilanzen zur Biomasseverwertung, Tab 4: sum of pre-storage, fermentation and cogen, but without post rotting (not common anymore) and purification (outside the systemboundary). Allocation factor of 18% and 82% for biogas production and biowaste disposal was considered.;

## Included processes
Data represents the environmental exchanges due to biowaste pre treatment biowaste digestion and post-composting of digested matter

## Geography
Data represents conditions of biogas from biowaste production in Switzerland

## Technology
Industry data.

## Reference product
- Disposal, biowaste, to anaerobic digestion, economic allocation [CH]: 1 kg
  SWITZERLAND

## Inputs from technosphere
- Tap water, at user [CH]: 0.1845 kg; lognormal SD95 1.6115
  (3,4,3,3,4,5,BU:1.05); ;
- Anaerobic digestion plant, biowaste [CH]: 1.3694e-9 p; lognormal SD95 3.1039
  (1,4,1,3,3,5,BU:3); ;
- Heat, at cogen with biogas engine, allocation exergy [CH]: 0.19844 MJ; lognormal SD95 1.3958
  (4,5,1,5,1,5,BU:1.05); ;
- Electricity, low voltage, at grid [CH]: 0.00028864 kWh; lognormal SD95 1.2264
  (2,3,2,3,1,5,BU:1.05); ;
- Treatment, sewage, to wastewater treatment, class 4 [CH]: 0.0001845 m3; lognormal SD95 1.6115
  (3,4,3,3,4,5,BU:1.05); ;

## Emissions to nature
- Hydrogen sulfide [emissions to air, high. pop.]: 7.093e-5 kg; lognormal SD95 1.6209
  (4,3,1,1,1,5,BU:1.5); ;
- Nitrate [emissions to water, unspecified]: 2.4354e-6 kg; lognormal SD95 1.6872
  (4,4,4,3,1,5,BU:1.5); ;
- Nitrite [emissions to water, unspecified]: 7.6096e-8 kg; lognormal SD95 1.6872
  (4,4,4,3,1,5,BU:1.5); ;
- Nitrogen, organic bound [emissions to water, unspecified]: 8.938e-8 kg; lognormal SD95 1.6872
  (4,4,4,3,1,5,BU:1.5); ;
- Ammonium, ion [emissions to water, unspecified]: 7.6096e-8 kg; lognormal SD95 1.6872
  (4,4,4,3,1,5,BU:1.5); ;
- Methane, biogenic [emissions to air, high. pop.]: 0.001394 kg; lognormal SD95 1.5598
  (1,1,1,1,1,5,BU:1.5); ;
- Phosphorus [emissions to water, unspecified]: 5.7728e-8 kg; lognormal SD95 1.6872
  (4,4,4,3,1,5,BU:1.5); ;
- Carbon dioxide, biogenic [emissions to air, high. pop.]: 0.1722 kg; lognormal SD95 1.3059
  (4,3,1,1,1,5,BU:1.05); ;

## Sampling procedure
Data provided by factories

## Sources
- Kaegi T., Zschokke M., Dinkel F., 2022, 2022 - LCI biogas and biomethane processes - Kaegi, -, Carbotech AG, Zuerich, CH
Kägi T, Zschokke M, Dinkel F (2021) Life Cycle Inventories of Biogas and Biomethane Processes. On behaltf of FOEN, 2021\n

## Validation
Proof reading validation: 12.04.2021; Other validation: Z:\Schreibtisch\WinShare\BAFU Heizsysteme\A_zum konvertieren\[EcoSpold_biogas_rohbiogas.xlsx]X-Process;
