# xx Nuclear power plant, boiling water reactor 1000MW

Dataset: EcoSpold 1, unit process, infrastructure
Functional unit: 1 p
Category: energy, obsolete / electricity by fuel, obsolete\nuclear, obsolete\bwr, obsolete\infrastructure, obsolete
Geography: US
Time period: 1999-01 to 2002-12
Generated by: Roberto Dones
accessRestrictedTo: 0
copyright: true

## General comment
The module is based on "nuclear power plant, boiling water reactor 1000MW", CH. Only two differences are: the supply mix of electricity, US instead of CH;

## Included processes
The module includes materials, energy and transport requirements used for construction of the plant. Land-use is included with the assumption of 40 years operation. Disposal of non-contaminated material from dismantling is also included, whereas contaminated materials are attributed to the operation.

## Geography
Swiss data on one specific plant adapted to USA.

## Technology
The described plant Leibstadt (CH) started commercial operation at the end of 1984. It belongs to the 1000 MW class (net installed capacity has been upgraded in steps from the original 990 MW to 1165 MW at the end of 1999). It has a GE (USA) designed primary circuit, a Mark III containment, and a cooling tower. This module can be assumed to be representative for the boiling water reactors of the same class in USA.

## Reference product
- xx Nuclear power plant, boiling water reactor 1000MW [US]: 1 p
  UNITED STATES

## Inputs from technosphere
- Electricity, medium voltage, at grid [US]: 5.31e8 kWh; lognormal SD95 1.2
  estrapolation from Swiss data
- Reinforcing steel, at plant [RER]: 4e7 kg; lognormal SD95 1.2
  estrapolation from Swiss data
- Fibre cement facing tile, at plant [CH]: 5.3e6 kg; lognormal SD95 1.2
  estrapolation from Swiss data
- Transport, freight, lorry, fleet average [RER]: 3.9e7 tkm; lognormal SD95 2.5
  own estimation (standard is 2.1 but higher uncertainty for US average transport distamces have not been assessed)
- Paper, woodfree, coated, at integrated mill [RER]: 4.25e6 kg; lognormal SD95 1.2
  estrapolation from Swiss data
- Diesel, burned in building machine, average [CH]: 1.9e8 MJ; lognormal SD95 1.2
  estrapolation from Swiss data
- Steel, low-alloyed, at plant [RER]: 5.57e6 kg; lognormal SD95 1.2
  estrapolation from Swiss data
- Aluminium, production mix, at plant [RER]: 200000 kg; lognormal SD95 1.2
  estrapolation from Swiss data
- Copper, at regional storage [RER]: 1.47e6 kg; lognormal SD95 1.2
  estrapolation from Swiss data
- Disposal, inert waste, 5% water, to construction waste landfill [CH]: 3.79e8 kg; lognormal SD95 1.3
  extrapolation from Swiss data
- Transport, freight, rail, diesel [US]: 2.16e7 tkm; lognormal SD95 2.5
  (same comment as for Transport, freight, lorry, fleet average)
- Chromium steel 18/8, at plant [RER]: 2.06e7 kg; lognormal SD95 1.2
  estrapolation from Swiss data
- Excavation, hydraulic digger, average [CH]: 100000 m3; lognormal SD95 1.3
  estrapolation from Swiss data
- Plywood, outdoor use, at plant [RER]: 8000 m3; lognormal SD95 1.2
  estrapolation from Swiss data
- Light fuel oil, burned in industrial furnace 1MW, non-modulating [RER]: 1.74e8 MJ; lognormal SD95 1.2
- Lubricating oil, at plant [RER]: 200000 kg; lognormal SD95 1.2
  estrapolation from Swiss data
- Concrete, normal, at plant [CH]: 200000 m3; lognormal SD95 1.2
  estrapolation from Swiss data

## Inputs from nature
All rows: lognormal SD95 1.1
- Occupation, industrial area, vegetation [resources, land]: 760000 m2a
  own estimation on plan (Swiss plant)
- Transformation, to industrial area, built up [resources, land]: 171000 m2
  assumption
- Transformation, from industrial area [resources, land]: 190000 m2
  assumption
- Occupation, construction site [resources, land]: 3.61e6 m2a
  own estimation on plan (Swiss plant)
- Transformation, to unknown [resources, land]: 190000 m2
  assumption
- Occupation, industrial area, built up [resources, land]: 6.84e6 m2a
  own estimation on plan (Swiss plant)
- Transformation, from unknown [resources, land]: 190000 m2
  assumption
- Transformation, to industrial area, vegetation [resources, land]: 19000 m2
  assumption

## Emissions to nature
- Heat, waste [emissions to water, river]: 9.56e8 MJ; lognormal SD95 1.2
  extrapolation from Swiss data
- Heat, waste [emissions to water, ocean]: 1.91e8 MJ; lognormal SD95 1.2
  extrapolation from Swiss data
- Heat, waste [emissions to air, low. pop.]: 7.65e8 MJ; lognormal SD95 1.2
  extrapolation from Swiss data

## Sampling procedure
Literature

## Sources
- Dones R., Bauer C., Doka G., 2009, 2009 - Nuclear energy - Dones, Sachbilanzen von Energiesystemen. Final report No. 6 ecoinvent v2.1, 6, Swiss Centre for LCI, PSI, Doka LCA, Duebendorf and Villigen, CH
Dones, R., Doka G. (2009) Kernenergie. Sachbilanzen von Energiesystemen. Final report No. 6 ecoinvent v2.1. Editors: Bauer C.. Volume: 6. Swiss Centre for LCI, PSI. Dübendorf and Villigen, CH.
Type: Measurement on site
Source: CD-ROM
First author: Dones, R.
Other authors: Doka G.
Year: 2009
Name of editors: Bauer C.
Title of anthology: Sachbilanzen von Energiesystemen. Final report No. 6 ecoinvent v2.1
Place of publication: Dübendorf and Villigen, CH
Publisher: Swiss Centre for LCI, PSI
Volume No: 6

## Validation
Proof reading validation: Passed.; Other validation: none;
