# Sulphate pulp, TCF bleached, at plant

Dataset: EcoSpold 1, unit process
Functional unit: 1 kg
Category: paper+ board / pulp
Geography: RER
Time period: 2000-01 to 2000-12
Production volume: Total European market sulphate pulp production in 2000: 9297 kt
Generated by: Roland Hischier
accessRestrictedTo: 0
copyright: true

## General comment
na;
Synonyms: kraft pulp, Kraftzellstoff;

## Included processes
This module includes the production of sulphate pulp with the TCF bleaching process - including transports to the pulp mill, wood handling, chemical pulping and bleaching, drying process, energy production on-site, recovery cycles of chemicals and internal waste water treatment.; Geography: Data from a finnish database and from several Scandinavian producers used as European average data.' where ID=449046;This module includes the production of sulphate pulp with the TCF bleaching process - including transports to the pulp mill, wood handling, chemical pulping and bleaching, drying process, energy production on-site, recovery cycles of chemicals and internal waste water treatment.; Geography: Data from a finnish database and from several Scandinavian producers used as European average data.

## Technology
Modern average technology.

## Reference product
- Sulphate pulp, TCF bleached, at plant [RER]: 1 kg
  Europe

## Inputs from technosphere
- Wood chips, softwood, wet, measured as dry mass, at sawmill [RER]: 0.2304 kg
  (2,4,1,3,1,5); average from KCL EcoData
- Malusil, at plant [RER]: 0.002 kg; lognormal SD95 1.24
  (2,4,1,3,1,5); average from KCL EcoData
- Hydrogen peroxide, 50% in H2O, at plant [RER]: 0.0264 kg; lognormal SD95 1.24
  (2,4,1,3,1,5); average from KCL EcoData
- Disposal, municipal solid waste, 22.9% water, to sanitary landfill [CH]: 0.0086 kg; lognormal SD95 1.24
  (2,4,1,3,1,5); average from KCL EcoData
- Transport, freight, rail [RER]: 0.198 tkm; lognormal SD95 2.09
  (4,5,na,na,na,na); standard distances
- Pulpwood, spruce, sustainable forest management, measured as solid wood under bark, at forest road [DE]: 0.000888 m3; lognormal SD95 1.24
  (2,4,1,3,1,5); average from KCL EcoData
- Natural gas, high pressure, at consumer [RER]: 0.639 MJ; lognormal SD95 1.09
  (2,2,1,1,1,3); from European Energy statistics
- Quicklime, milled, loose, at plant [CH]: 0.0104 kg; lognormal SD95 1.24
  (2,4,1,3,1,5); average from KCL EcoData
- Disposal, wood ash mixture, pure, 0% water, to sanitary landfill [CH]: 0.0053 kg; lognormal SD95 1.24
  (2,4,1,3,1,5); average from KCL EcoData
- Slab and siding, softwood, wet, measured as dry mass, at sawmill [RER]: 0.1714 kg
  (2,4,1,3,1,5); average from KCL EcoData
- Pulpwood, spruce, sustainable forest management, measured as solid wood under bark, at forest road [SE]: 0.000595 m3
  (2,4,1,3,1,5); average from KCL EcoData;
- Pulp plant [RER]: 5e-11 p; lognormal SD95 3.05
  (4,na,na,na,na,na); own estimation
- Heavy fuel oil, at regional storage [RER]: 0.0103 kg; lognormal SD95 1.09
  (2,2,1,1,1,3); from European Energy statistics
- Disposal, hazardous waste, 0% water, to underground deposit [DE]: 0.00027 kg; lognormal SD95 1.24
  (2,4,1,3,1,5); average from KCL EcoData
- Sodium hydroxide, 50% in H2O, production mix, at plant [RER]: 0.043 kg; lognormal SD95 1.24
  (2,4,1,3,1,5); average from KCL EcoData
- Electricity, medium voltage, production NORDEL, at grid [NORDEL]: 0.0573 kWh; lognormal SD95 1.22
  (1,3,1,3,1,5); average from CER of European producers
- Magnesium sulphate, at plant [RER]: 0.0036 kg; lognormal SD95 1.24
  (2,4,1,3,1,5); average from KCL EcoData
- Disposal, green liquor dregs, 25% water, to residual material landfill [CH]: 0.004 kg; lognormal SD95 1.24
  (2,4,1,3,1,5); average from KCL EcoData
- EDTA, ethylenediaminetetraacetic acid, at plant [RER]: 0.003 kg; lognormal SD95 1.24
  (2,4,1,3,1,5); average from KCL EcoData
- Ozone, liquid, at plant [RER]: 0.003 kg; lognormal SD95 1.24
  (2,4,1,3,1,5); average from KCL EcoData
- Sulphuric acid, liquid, at plant [RER]: 0.0242 kg; lognormal SD95 1.24
  (2,4,1,3,1,5); average from KCL EcoData
- Electricity, medium voltage, production ENTSO-E, at grid: 0.0427 kWh; lognormal SD95 1.22
  (1,3,1,3,1,5); average from CER of European producers
- Pulpwood, beech, sustainable forest management, measured as solid wood under bark, at forest road [DE]: 0.000611 m3; lognormal SD95 1.24
  (2,4,1,3,1,5); average from KCL EcoData
- Carbon dioxide liquid, at plant [RER]: 0.002 kg; lognormal SD95 1.24
  (2,4,1,3,1,5); average from KCL EcoData
- Hard coal, at regional storage [WEU]: 0.00508 kg; lognormal SD95 1.09
  (2,2,1,1,1,3); from European Energy statistics
- Nitrogen, liquid, at plant [RER]: 0.0002 kg; lognormal SD95 1.24
  (2,4,1,3,1,5); average from KCL EcoData
- Disposal, limestone residue, 5% water, to construction waste landfill [CH]: 0.00688 kg; lognormal SD95 1.24
  (2,4,1,3,1,5); average from KCL EcoData
- Pulpwood, birch, sustainable forest management, measured as solid wood under bark, at forest road [SE]: 0.00082 m3; lognormal SD95 1.24
  (2,4,1,3,1,5); average from KCL EcoData
- Pulpwood, pine, sustainable forest management, measured as solid wood under bark, at forest road [SE]: 0.000595 m3
  (2,4,1,3,1,5); average from KCL EcoData;
- Oxygen, liquid, at plant [RER]: 0.037 kg; lognormal SD95 1.24
  (2,4,1,3,1,5); average from KCL EcoData
- Transport, freight, lorry, fleet average [RER]: 0.387 tkm; lognormal SD95 2.09
  (4,5,na,na,na,na); standard distances
- Sulphur dioxide, liquid, at plant [RER]: 0.006 kg; lognormal SD95 1.24
  (2,4,1,3,1,5); average from KCL EcoData

## Inputs from nature
- Water, cooling, unspecified natural origin/m3 [resources, in water]: 0.036 m3; lognormal SD95 1.24
  (2,4,1,3,1,5); average from KCL EcoData
- Water, unspecified natural origin/m3 [resources, in water]: 0.021 m3; lognormal SD95 1.24
  (2,4,1,3,1,5); average from KCL EcoData

## Emissions to nature
- Benzene, hexachloro- [emissions to air, high. pop.]: 1.06e-14 kg; lognormal SD95 1.88
  (2,5,2,1,4,5); estimation, based on industrial heating modules of energy carriers used
- Cobalt [emissions to air, high. pop.]: 1.44e-8 kg; lognormal SD95 5.37
  (2,5,2,1,4,5); estimation, based on industrial heating modules of energy carriers used
- Chlorine [emissions to air, high. pop.]: 2.66e-7 kg; lognormal SD95 3.32
  (2,5,2,1,4,5); estimation, based on industrial heating modules of energy carriers used
- Sulfur dioxide [emissions to air, high. pop.]: 0.00084 kg; lognormal SD95 1.22
  (1,3,1,3,1,5); average from CER of European producers
- Sodium [emissions to air, high. pop.]: 2.33e-6 kg; lognormal SD95 5.37
  (2,5,2,1,4,5); estimation, based on industrial heating modules of energy carriers used
- Ethane [emissions to air, high. pop.]: 2.2e-7 kg; lognormal SD95 1.88
  (2,5,2,1,4,5); estimation, based on industrial heating modules of energy carriers used
- Thorium-232 [emissions to air, high. pop.]: 5.14e-7 kBq; lognormal SD95 3.32
  (2,5,2,1,4,5); estimation, based on industrial heating modules of energy carriers used
- Chromium [emissions to air, high. pop.]: 1.58e-8 kg; lognormal SD95 5.37
  (2,5,2,1,4,5); estimation, based on industrial heating modules of energy carriers used
- Carbon monoxide, fossil [emissions to air, high. pop.]: 1.9e-5 kg; lognormal SD95 5.37
  (2,5,2,1,4,5); estimation, based on industrial heating modules of energy carriers used
- Nitrogen [emissions to water, river]: 0.00017 kg; lognormal SD95 1.56
  (1,3,1,3,1,5); average from CER of European producers
- Methane, biogenic [emissions to air, high. pop.]: 5.91e-7 kg; lognormal SD95 1.88
  (2,5,2,1,4,5); estimation, based on industrial heating modules of energy carriers used
- Fluorine [emissions to air, high. pop.]: 7.39e-8 kg; lognormal SD95 1.88
  (2,5,2,1,4,5); estimation, based on industrial heating modules of energy carriers used
- Zinc [emissions to air, high. pop.]: 4.61e-7 kg; lognormal SD95 5.37
  (2,5,2,1,4,5); estimation, based on industrial heating modules of energy carriers used
- Formaldehyde [emissions to air, high. pop.]: 4.58e-7 kg; lognormal SD95 1.88
  (2,5,2,1,4,5); estimation, based on industrial heating modules of energy carriers used
- Radon-222 [emissions to air, high. pop.]: 1.47e-7 kBq; lognormal SD95 3.32
  (2,5,2,1,4,5); estimation, based on industrial heating modules of energy carriers used
- Hydrogen chloride [emissions to air, high. pop.]: 6.56e-6 kg; lognormal SD95 1.88
  (2,5,2,1,4,5); estimation, based on industrial heating modules of energy carriers used
- Uranium-238 [emissions to air, high. pop.]: 1.47e-6 kBq; lognormal SD95 3.32
  (2,5,2,1,4,5); estimation, based on industrial heating modules of energy carriers used
- Propane [emissions to air, high. pop.]: 2.87e-7 kg; lognormal SD95 1.88
  (2,5,2,1,4,5); estimation, based on industrial heating modules of energy carriers used
- Thorium [emissions to air, high. pop.]: 2.79e-10 kg; lognormal SD95 5.37
  (2,5,2,1,4,5); estimation, based on industrial heating modules of energy carriers used
- Aluminium [emissions to air, high. pop.]: 1.57e-6 kg; lognormal SD95 1.88
  (2,5,2,1,4,5); estimation, based on industrial heating modules of energy carriers used
- Particulates, > 10 um [emissions to air, high. pop.]: 6.2e-5 kg; lognormal SD95 1.56
  (1,3,1,3,1,5); average from CER of European producers
- Magnesium [emissions to air, high. pop.]: 1.09e-6 kg; lognormal SD95 5.37
  (2,5,2,1,4,5); estimation, based on industrial heating modules of energy carriers used
- m-Xylene [emissions to air, high. pop.]: 1.77e-7 kg; lognormal SD95 1.88
  (2,5,2,1,4,5); estimation, based on industrial heating modules of energy carriers used
- Benzene, ethyl- [emissions to air, high. pop.]: 4.43e-8 kg; lognormal SD95 1.88
  (2,5,2,1,4,5); estimation, based on industrial heating modules of energy carriers used
- AOX, Adsorbable Organic Halogen as Cl [emissions to water, river]: 2e-5 kg; lognormal SD95 1.56
  (1,3,1,3,1,5); average from CER of European producers
- Selenium [emissions to air, high. pop.]: 6.46e-9 kg; lognormal SD95 5.37
  (2,5,2,1,4,5); estimation, based on industrial heating modules of energy carriers used
- Molybdenum [emissions to air, high. pop.]: 7.46e-9 kg; lognormal SD95 5.37
  (2,5,2,1,4,5); estimation, based on industrial heating modules of energy carriers used
- Beryllium [emissions to air, high. pop.]: 1.85e-10 kg; lognormal SD95 5.37
  (2,5,2,1,4,5); estimation, based on industrial heating modules of energy carriers used
- Lead-210 [emissions to air, high. pop.]: 6.83e-6 kBq; lognormal SD95 3.32
  (2,5,2,1,4,5); estimation, based on industrial heating modules of energy carriers used
- Dioxin, 2,3,7,8 Tetrachlorodibenzo-p- [emissions to air, high. pop.]: 2.98e-12 kg; lognormal SD95 1.88
  (2,5,2,1,4,5); estimation, based on industrial heating modules of energy carriers used
- Iodine [emissions to air, high. pop.]: 1.67e-9 kg; lognormal SD95 1.88
  (2,5,2,1,4,5); estimation, based on industrial heating modules of energy carriers used
- Copper [emissions to air, high. pop.]: 5.57e-8 kg; lognormal SD95 5.37
  (2,5,2,1,4,5); estimation, based on industrial heating modules of energy carriers used
- Ammonia [emissions to air, high. pop.]: 2.56e-6 kg; lognormal SD95 1.88
  (2,5,2,1,4,5); estimation, based on industrial heating modules of energy carriers used
- Ethanol [emissions to air, high. pop.]: 1.27e-7 kg; lognormal SD95 1.88
  (2,5,2,1,4,5); estimation, based on industrial heating modules of energy carriers used
- Polonium-210 [emissions to air, high. pop.]: 1.25e-5 kBq; lognormal SD95 3.32
  (2,5,2,1,4,5); estimation, based on industrial heating modules of energy carriers used
- Suspended solids, unspecified [emissions to water, river]: 0.00044 kg; lognormal SD95 1.56
  (1,3,1,3,1,5); average from CER of European producers
- Carbon dioxide, fossil [emissions to air, high. pop.]: 0.106 kg; lognormal SD95 1.22
  (1,3,1,3,1,5); average from CER of European producers
- Carbon monoxide, biogenic [emissions to air, high. pop.]: 7.09e-5 kg; lognormal SD95 5.37
  (2,5,2,1,4,5); estimation, based on industrial heating modules of energy carriers used
- Ethyne [emissions to air, high. pop.]: 7.34e-8 kg; lognormal SD95 1.88
  (2,5,2,1,4,5); estimation, based on industrial heating modules of energy carriers used
- Radium-226 [emissions to air, high. pop.]: 1.76e-6 kBq; lognormal SD95 3.32
  (2,5,2,1,4,5); estimation, based on industrial heating modules of energy carriers used
- Thorium-228 [emissions to air, high. pop.]: 8.07e-7 kBq; lognormal SD95 3.32
  (2,5,2,1,4,5); estimation, based on industrial heating modules of energy carriers used
- Iron [emissions to air, high. pop.]: 7.25e-7 kg; lognormal SD95 5.37
  (2,5,2,1,4,5); estimation, based on industrial heating modules of energy carriers used
- Potassium-40 [emissions to air, high. pop.]: 1.98e-6 kBq; lognormal SD95 3.32
  (2,5,2,1,4,5); estimation, based on industrial heating modules of energy carriers used
- Methane, fossil [emissions to air, high. pop.]: 4.01e-6 kg; lognormal SD95 1.88
  (2,5,2,1,4,5); estimation, based on industrial heating modules of energy carriers used
- Barium [emissions to air, high. pop.]: 1.85e-8 kg; lognormal SD95 5.37
  (2,5,2,1,4,5); estimation, based on industrial heating modules of energy carriers used
- PAH, polycyclic aromatic hydrocarbons [emissions to air, high. pop.]: 2.3e-8 kg; lognormal SD95 1.88
  (2,5,2,1,4,5); estimation, based on industrial heating modules of energy carriers used
- Particulates, < 2.5 um [emissions to air, high. pop.]: 0.000639 kg; lognormal SD95 3.05
  (1,3,1,3,1,5); average from CER of European producers
- Nitrogen oxides [emissions to air, high. pop.]: 0.00148 kg; lognormal SD95 1.56
  (1,3,1,3,1,5); average from CER of European producers
- Uranium [emissions to air, high. pop.]: 3.71e-10 kg; lognormal SD95 5.37
  (2,5,2,1,4,5); estimation, based on industrial heating modules of energy carriers used
- Tin [emissions to air, high. pop.]: 9.28e-11 kg; lognormal SD95 5.37
  (2,5,2,1,4,5); estimation, based on industrial heating modules of energy carriers used
- Dinitrogen monoxide [emissions to air, high. pop.]: 4.58e-6 kg; lognormal SD95 1.88
  (2,5,2,1,4,5); estimation, based on industrial heating modules of energy carriers used
- Toluene [emissions to air, high. pop.]: 5.98e-7 kg; lognormal SD95 1.88
  (2,5,2,1,4,5); estimation, based on industrial heating modules of energy carriers used
- Phosphorus [emissions to air, high. pop.]: 4.52e-7 kg; lognormal SD95 1.88
  (2,5,2,1,4,5); estimation, based on industrial heating modules of energy carriers used
- Thallium [emissions to air, high. pop.]: 2.32e-10 kg; lognormal SD95 5.37
  (2,5,2,1,4,5); estimation, based on industrial heating modules of energy carriers used
- Mercury [emissions to air, high. pop.]: 9.43e-10 kg; lognormal SD95 5.37
  (2,5,2,1,4,5); estimation, based on industrial heating modules of energy carriers used
- Methanol [emissions to air, high. pop.]: 2.16e-7 kg; lognormal SD95 1.88
  (2,5,2,1,4,5); estimation, based on industrial heating modules of energy carriers used
- Acetic acid [emissions to air, high. pop.]: 3.5e-7 kg; lognormal SD95 1.88
  (2,5,2,1,4,5); estimation, based on industrial heating modules of energy carriers used
- Chromium VI [emissions to air, high. pop.]: 5.35e-10 kg; lognormal SD95 5.37
  (2,5,2,1,4,5); estimation, based on industrial heating modules of energy carriers used
- Titanium [emissions to air, high. pop.]: 5.56e-8 kg; lognormal SD95 5.37
  (2,5,2,1,4,5); estimation, based on industrial heating modules of energy carriers used
- COD, Chemical Oxygen Demand [emissions to water, river]: 0.0157 kg; lognormal SD95 1.56
  (1,3,1,3,1,5); average from CER of European producers
- Carbon dioxide, biogenic [emissions to air, high. pop.]: 2.26 kg; lognormal SD95 1.22
  (1,3,1,3,1,5); average from CER of European producers
- Vanadium [emissions to air, high. pop.]: 1.1e-6 kg; lognormal SD95 5.37
  (2,5,2,1,4,5); estimation, based on industrial heating modules of energy carriers used
- Cadmium [emissions to air, high. pop.]: 1.52e-8 kg; lognormal SD95 5.37
  (2,5,2,1,4,5); estimation, based on industrial heating modules of energy carriers used
- Boron [emissions to air, high. pop.]: 6.96e-8 kg; lognormal SD95 5.37
  (2,5,2,1,4,5); estimation, based on industrial heating modules of energy carriers used
- Bromine [emissions to air, high. pop.]: 9e-8 kg; lognormal SD95 1.88
  (2,5,2,1,4,5); estimation, based on industrial heating modules of energy carriers used
- Radon-220 [emissions to air, high. pop.]: 1.47e-7 kBq; lognormal SD95 3.32
  (2,5,2,1,4,5); estimation, based on industrial heating modules of energy carriers used
- Radium-228 [emissions to air, high. pop.]: 9.54e-6 kBq; lognormal SD95 3.32
  (2,5,2,1,4,5); estimation, based on industrial heating modules of energy carriers used
- Particulates, > 2.5 um, and < 10um [emissions to air, high. pop.]: 6.9e-5 kg; lognormal SD95 2.05
  (1,3,1,3,1,5); average from CER of European producers
- Calcium [emissions to air, high. pop.]: 8.86e-6 kg; lognormal SD95 3.32
  (2,5,2,1,4,5); estimation, based on industrial heating modules of energy carriers used
- BOD5, Biological Oxygen Demand [emissions to water, river]: 0.00093 kg; lognormal SD95 1.56
  (1,3,1,3,1,5); average from CER of European producers
- Hydrogen fluoride [emissions to air, high. pop.]: 2.46e-7 kg; lognormal SD95 1.88
  (2,5,2,1,4,5); estimation, based on industrial heating modules of energy carriers used
- Phosphorus [emissions to water, river]: 2e-5 kg; lognormal SD95 1.56
  (1,3,1,3,1,5); average from CER of European producers
- Hydrocarbons, aliphatic, alkanes, unspecified [emissions to air, high. pop.]: 1.67e-6 kg; lognormal SD95 1.88
  (2,5,2,1,4,5); estimation, based on industrial heating modules of energy carriers used
- Acetaldehyde [emissions to air, high. pop.]: 1.54e-7 kg; lognormal SD95 1.88
  (2,5,2,1,4,5); estimation, based on industrial heating modules of energy carriers used
- Benzo(a)pyrene [emissions to air, high. pop.]: 7.58e-10 kg; lognormal SD95 1.88
  (2,5,2,1,4,5); estimation, based on industrial heating modules of energy carriers used
- Hydrogen sulfide [emissions to air, high. pop.]: 7e-5 kg; lognormal SD95 1.56
  (1,3,1,3,1,5); average from CER of European producers
- Potassium [emissions to air, high. pop.]: 3.48e-5 kg; lognormal SD95 5.37
  (2,5,2,1,4,5); estimation, based on industrial heating modules of energy carriers used
- Propene [emissions to air, high. pop.]: 7.34e-8 kg; lognormal SD95 1.88
  (2,5,2,1,4,5); estimation, based on industrial heating modules of energy carriers used
- Heat, waste [emissions to air, high. pop.]: 3.29 MJ; lognormal SD95 1.22
  (1,3,1,3,1,5); calculated, based on electricity and fuel input
- Nickel [emissions to air, high. pop.]: 2.86e-7 kg; lognormal SD95 5.37
  (2,5,2,1,4,5); estimation, based on industrial heating modules of energy carriers used
- Pentane [emissions to air, high. pop.]: 7.67e-7 kg; lognormal SD95 1.88
  (2,5,2,1,4,5); estimation, based on industrial heating modules of energy carriers used
- Ethene [emissions to air, high. pop.]: 4.4e-7 kg; lognormal SD95 5.37
  (2,5,2,1,4,5); estimation, based on industrial heating modules of energy carriers used
- Benzene [emissions to air, high. pop.]: 1.67e-6 kg; lognormal SD95 1.88
  (2,5,2,1,4,5); estimation, based on industrial heating modules of energy carriers used
- Hydrocarbons, aliphatic, unsaturated [emissions to air, high. pop.]: 4.67e-6 kg; lognormal SD95 1.88
  (2,5,2,1,4,5); estimation, based on industrial heating modules of energy carriers used
- Silicon [emissions to air, high. pop.]: 2.32e-6 kg; lognormal SD95 5.37
  (2,5,2,1,4,5); estimation, based on industrial heating modules of energy carriers used
- Xylene [emissions to air, high. pop.]: 1.47e-8 kg; lognormal SD95 1.88
  (2,5,2,1,4,5); estimation, based on industrial heating modules of energy carriers used
- Hydrocarbons, aromatic [emissions to air, high. pop.]: 6.34e-8 kg; lognormal SD95 1.88
  (2,5,2,1,4,5); estimation, based on industrial heating modules of energy carriers used
- Manganese [emissions to air, high. pop.]: 2.54e-7 kg; lognormal SD95 5.37
  (2,5,2,1,4,5); estimation, based on industrial heating modules of energy carriers used
- NMVOC, non-methane volatile organic compounds, unspecified origin [emissions to air, high. pop.]: 1.14e-6 kg; lognormal SD95 1.88
  (2,5,2,1,4,5); estimation, based on industrial heating modules of energy carriers used
- TOC, Total Organic Carbon [emissions to water, river]: 0.00744 kg; lognormal SD95 1.56
  (1,3,1,3,1,5); average from CER of European producers
- Acetone [emissions to air, high. pop.]: 6.34e-8 kg; lognormal SD95 1.88
  (2,5,2,1,4,5); estimation, based on industrial heating modules of energy carriers used
- Scandium [emissions to air, high. pop.]: 1.85e-10 kg; lognormal SD95 5.37
  (2,5,2,1,4,5); estimation, based on industrial heating modules of energy carriers used
- Lead [emissions to air, high. pop.]: 7.22e-8 kg; lognormal SD95 5.37
  (2,5,2,1,4,5); estimation, based on industrial heating modules of energy carriers used
- Propionic acid [emissions to air, high. pop.]: 1.28e-8 kg; lognormal SD95 1.88
  (2,5,2,1,4,5); estimation, based on industrial heating modules of energy carriers used
- Phenol, pentachloro- [emissions to air, high. pop.]: 1.2e-11 kg; lognormal SD95 1.88
  (2,5,2,1,4,5); estimation, based on industrial heating modules of energy carriers used
- Strontium [emissions to air, high. pop.]: 2.79e-8 kg; lognormal SD95 5.37
  (2,5,2,1,4,5); estimation, based on industrial heating modules of energy carriers used
- Butane [emissions to air, high. pop.]: 4.47e-7 kg; lognormal SD95 3.32
  (2,5,2,1,4,5); estimation, based on industrial heating modules of energy carriers used
- Arsenic [emissions to air, high. pop.]: 1.07e-8 kg; lognormal SD95 1.88
  (2,5,2,1,4,5); estimation, based on industrial heating modules of energy carriers used
- Antimony [emissions to air, high. pop.]: 2.32e-10 kg; lognormal SD95 1.88
  (2,5,2,1,4,5); estimation, based on industrial heating modules of energy carriers used
- Water [emissions to water, unspecified]: 34.2, 19.95 kg (2 entries); lognormal SD95 2.5196
  (5,5,5,5,5,BU:1.05); All uncertainty-values set to 5.0 by default. Balance of input water

## Sources
- Hischier R., 2007, 2007 - LCI packagings and graphical papers - Hischier, Final report ecoinvent data v2.0, 11, Swiss Centre for LCI, Empa - TSL, Duebendorf and St. Gallen, CH
Hischier R. (2007) Life Cycle Inventories of Packaging and Graphical Paper. Final report ecoinvent data v2.0. Volume: 11. Swiss Centre for LCI, Empa - TSL. Dübendorf, CH.
Type: Measurement on site
Source: CD-ROM
First author: Hischier R.
Year: 2007
Title of anthology: Final report ecoinvent data v2.0
Place of publication: Dübendorf, CH
Publisher: Swiss Centre for LCI, Empa - TSL
Volume No: 11

## Validation
Proof reading validation: passed; Other validation: none;
