# Silicone plant

Dataset: EcoSpold 1, unit process, infrastructure
Functional unit: 1 p
Category: chemicals / silicons\infrastructure
Geography: RER
Time period: 1999-01 to 2002-12
Production volume: Normalized for a production capacity of 1 000 000t/a.
Generated by: Niels Jungbluth
accessRestrictedTo: 0
copyright: true

## General comment
Average of two plants. Chemical production since more than 100 years. Life time estimated to be 100a. Annual production 1 Mio. tonnes.;

## Included processes
Inventory for the production plant including land use, machinery and buildings.

## Technology
Chemical production facility.

## Time period
Reporting time of environmental reports.

## Reference product
- Silicone plant [RER]: 1 p
  Europe

## Inputs from technosphere
- Railway track [CH]: 62903 my; lognormal SD95 3.0038
  (1,2,1,1,1,3); Calculation for 100a, approx. 150 factories
- Disposal, railway track [CH]: 62903 my; lognormal SD95 3.0038
  (1,2,1,1,1,3); Calculation for 100a, approx. 150 factories
- Disposal, facilities, chemical production [RER]: 3.2e7 kg; lognormal SD95 3.8994
  (5,na,1,1,5,na); Rough estimation
- Building, hall [CH]: 2.2809e6 m2; lognormal SD95 3.0038
  (1,2,1,1,1,3); Calculation for 100a, approx. 150 factories
- Facilities, chemical production [RER]: 3.2e7 kg; lognormal SD95 3.8994
  (5,na,1,1,5,na); Rough estimation, doubled inventory for life time of 100a.
- Pipeline, crude oil, onshore [RER]: 253.86 km; lognormal SD95 3.0038
  (1,2,1,1,1,3); Calculation for 100a, approx. 150 factories
- Pipeline, natural gas, low pressure distribution network [CH]: 161.75 km; lognormal SD95 3.0038
  (1,2,1,1,1,3); Calculation for 100a, approx. 150 factories

## Inputs from nature
- Transformation, to industrial area, built up [resources, land]: 1.1405e6 m2; lognormal SD95 2.004
  (1,2,1,1,1,3); Environmental report
- Transformation, to industrial area, vegetation [resources, land]: 1.6031e6 m2; lognormal SD95 2.004
  (1,2,1,1,1,3); Environmental report
- Transformation, to dump site, residual material landfill [resources, land]: 215180 m2; lognormal SD95 2.004
  (1,2,1,1,1,3); Environmental report
- Transformation, from unknown [resources, land]: 3.4644e6 m2; lognormal SD95 2.004
  (1,2,1,1,1,3); Environmental report
- Occupation, industrial area, built up [resources, land]: 1.1405e8 m2a; lognormal SD95 1.5051
  (1,2,1,1,1,3); 100a occupation
- Occupation, dump site [resources, land]: 2.1518e7 m2a; lognormal SD95 1.5051
  (1,2,1,1,1,3); 100a occupation
- Occupation, traffic area, road network [resources, land]: 5.0568e7 m2a; lognormal SD95 1.5051
  (1,2,1,1,1,3); 100a occupation
- Occupation, industrial area, vegetation [resources, land]: 1.6031e8 m2a; lognormal SD95 1.5051
  (1,2,1,1,1,3); 100a occupation
- Transformation, to traffic area, road network [resources, land]: 505680 m2; lognormal SD95 2.004
  (1,2,1,1,1,3); Environmental report

## Sampling procedure
Environmental reports and webpage.

## Sources
- Althaus H.-J., Chudacoff M., Hellweg S., Hischier R., Jungbluth N., Osses M., Primas A., 2007, 2007 - LCI chemicals - Althaus, Final report ecoinvent data v2.0, 8, Swiss Centre for LCI, Empa - TSL, ETH, ESU-services Ltd., Chudacoff Oekoscience, Duebendorf, CH
Althaus H.-J., Chudacoff M., Hischier R., Jungbluth N., Osses M., Primas A. (2007) Life Cycle Inventories of Chemicals. Final report ecoinvent data v2.0. Volume: 8. Swiss Centre for LCI, Empa - TSL. Dübendorf, CH.
Type: Measurement on site
Source: CD-ROM
First author: Althaus H.-J.
Other authors: Chudacoff M., Hischier R., Jungbluth N., Osses M., Primas A.
Year: 2007
Title of anthology: Final report ecoinvent data v2.0
Place of publication: Dübendorf, CH
Publisher: Swiss Centre for LCI, Empa - TSL
Volume No: 8

## Validation
Proof reading validation: Passed.; Other validation: none;
