# Electricity, high voltage, production from hydro power, at grid

Dataset: EcoSpold 1, unit process
Functional unit: 1 kWh
Category: energy supply, kbob recommendation / electricity, delivered via network
Geography: CH
Time period: 2004-01 to 2004-12
Share of production covered: 100 %
Generated by: Philippe Stolz
accessRestrictedTo: 0
copyright: true

## General comment
This dataset describes the transmission of high voltage electricity.;

## Included processes
Included are the hydropower electricity production in Switzerland, the transmission network and direct emissions to air (ozone and N2O). Electricity losses are accounted for.

## Geography
Data apply to public and self producers. Geographical classification according to IEA. Ozone- and NO2-emission factors are based on published measurements made in various countries. Assumptions for transmission network, losses and emissions are based on UTCE data.

## Technology
Average technology used to transmit and distribute electricity. Includes underground and overhead lines. Electricity production according to related datasets

## Time period
Time of publications.

## Reference product
- Electricity, high voltage, production from hydro power, at grid [CH]: 1 kWh
  SWITZERLAND

## Inputs from technosphere
- Transmission network, electricity, high voltage [CH]: 6.8199e-9 km; lognormal SD95 3.0909
  (4,5,na,na,na,na,BU:3); based on consumption statistics
- Electricity, production from hydro power, at plant [CH]: 1.033 kWh; lognormal SD95 1.05
  (1,1,1,1,1,1,BU:1.05); specific losses of network estimated based on statistics

## Emissions to nature
- Heat, waste [emissions to air, unspecified]: 0.11293 MJ; lognormal SD95 1.2423
  (2,4,1,1,1,5,BU:1.05); estimations based on losses
- Dinitrogen monoxide [emissions to air, unspecified]: 5e-6 kg; lognormal SD95 1.6249
  (2,3,1,1,3,5,BU:1.5); standard deviation based on variation reported in literature
- Ozone [emissions to air, unspecified]: 4.5e-6 kg; lognormal SD95 1.5798
  (2,4,1,1,1,5,BU:1.5); standard deviation based on variation reported in literature
- Heat, waste [emissions to soil, unspecified]: 0.0059435 MJ; lognormal SD95 1.2423
  (2,4,1,1,1,5,BU:1.05); estimations based on losses

## Sampling procedure
Statistical data

## Sources
- Stolz P., Frischknecht R., 2015, 2015 - LCA electricity mix Switzerland 2011 - Stolz, Project reports, 537, treeze Ltd., Uster, CH
Stolz, P., Frischknecht, R. (2015) Umweltbilanz Strommix Schweiz 2011: Hydropower mix. Project reports. Volume: 537. treeze Ltd.. Uster, CH.
Type: Separate publication
First author: Stolz, P.
Other authors: Frischknecht, R.
Year: 2015
Title of anthology: Project reports
Place of publication: Uster, CH
Publisher: treeze Ltd.
Volume No: 537

## Validation
Proof reading validation: automatic validation in Excel; Other validation: \\SRV01\ESU-Docs\Projekte laufend\563 Aktualisierung KBOB_2016\EcoSpold\[563-Hydropower-CH-v0.1.xlsx]X-Process;
