# Desktop computer, without screen, at plant

Dataset: EcoSpold 1, unit process
Functional unit: 1 p
Category: electronics / devices
Geography: GLO
Time period: 2023-01 to 2029-12
Synonyms: PC
Generated by: Lugas Raka Adrianto, Maulana Permana Ajie, Didier Beloin-Saint-Pierre
accessRestrictedTo: 0
copyright: false

## General comment
This dataset can be applied to describe the production (without monitor!) of a common desktop computer in the last 3 years in the reference year 2010 - 2015 (Intel® Core™ i5-8500, 6 Cores/9MB/6T/up to 4.1GH, 500 GB RAM HDD, 8 GB working memory, total weight without screen and cardboard packaging 8.8 kg). The information is based on own measurements of computer parts at Empa Laboratories. Computer parts like Graphic card, Network card, Hard disk drive, CD Rom drive, Power supply unit, Printed wiring boards (e.g. motherboard) and batteries are inventoried in individual ecoinvent datasets. In 2023, this dataset has been updated to reflect the recent laptops found in the literature (Babbit et al 2020;

## Included processes
Describes the production of a desktop computer without screen. Calculated per 1 produced computer (1 unit). Included are the materials (mainly metals and plastics) with their respective manufacturing processes (e.g. sheet rolling or blow moulding). Further inventoried is the infrastructure (factory), the electricity for the assembly of the desktop computer, the water consumption and industrial waste water, the required ship, rail and road transport for input materials, the packaging, plus the disposal of the computer.

## Geography
The data is based on weighing a typical desktop computer at the EMPA laboratories in St. Gallen + supplemented with new data from recent literature. Such a desktop computer like other PC brands may be assembled anywhere in the world.

## Technology
The production of a desktop computer includes the steel processing steps rolling, cutting, mill cutting, and coating. Plastic parts are blow moulded or extruded into required shapes. The process technology of the parts (capacitors, resistors, microchips etc.) mounted onto the printed wiring board are described in the individual datasets.

## Reference product
- Desktop computer, without screen, at plant [GLO]: 1 p
  Global

## Inputs from technosphere
- Acrylonitrile-butadiene-styrene copolymer, ABS, at plant [RER]: 0.158 kg; lognormal SD95 1.33
  (1,4,2,3,3,5,BU:1.05) Data from Babbit et al 2020 and Teehan et al 2013
- Aluminium, production mix, at plant [RER]: 0.766 kg; lognormal SD95 1.33
  (1,4,2,3,3,5,BU:1.05) Data from Babbit et al 2020 and Teehan et al 2013
- Cable, connector for computer, without plugs, at plant [GLO]: 2.5 m; lognormal SD95 1.33
  (1,4,2,3,3,5,BU:1.05)
- Cable, network cable, category 5, without plugs, at plant [GLO]: 3 m; lognormal SD95 1.33
  (1,4,2,3,3,5,BU:1.05)
- Cable, ribbon cable, 20-pin, with plugs, at plant [GLO]: 0.0506 kg; lognormal SD95 1.33
  (1,4,2,3,3,5,BU:1.05)
- Chromium steel 18/8, at plant [RER]: 0.0237 kg; lognormal SD95 1.33
  (1,4,2,3,3,5,BU:1.05) Data from Babbit et al 2020 and Teehan et al 2013
- Copper, primary, at refinery [GLO]: 0.344 kg; lognormal SD95 1.33
  (1,4,2,3,3,5,BU:1.05) Data from Babbit et al 2020 and Teehan et al 2013
- Corrugated board, recycling fibre, double wall, at plant [RER]: 1.84 kg; lognormal SD95 1.33
  (1,4,2,3,3,5,BU:1.05) Data from Babbit et al 2020 and Teehan et al 2013
- Electricity, medium voltage, production GLO, at grid [GLO]: 7.0277 kWh; lognormal SD95 1.33
  (1,4,2,3,3,5,BU:1.05) Data from Babbit et al 2020 and Teehan et al 2013
- Foaming, expanding [RER]: 0.16 kg; lognormal SD95 1.33
  (1,4,2,3,3,5,BU:1.05) Adjuster after mass
- HDD, desktop computer, at plant [GLO]: 1 p; lognormal SD95 1.33
  (1,4,2,3,3,5,BU:1.05)
- Hot rolling, steel [RER]: 0.0237 kg; lognormal SD95 1.33
  (1,4,2,3,3,5,BU:1.05) Data from Babbit et al 2020 and Teehan et al 2013
- Integrated circuit, IC, memory type, at plant [GLO]: 0.04 kg; lognormal SD95 1.33
  (1,4,2,3,3,5,BU:1.05) Data from Babbit et al 2020 and Teehan et al 2013
- Photovoltaic cell factory [DE]: 1.3333e-8 p; lognormal SD95 3.11
  (1,4,2,3,3,5,BU:3.00)
- Plugs, inlet and outlet, for computer cable, at plant [GLO]: 1 p; lognormal SD95 1.33
  (1,4,2,3,3,5,BU:1.05)
- Plugs, inlet and outlet, for network cable, at plant [GLO]: 1 p; lognormal SD95 1.33
  (1,4,2,3,3,5,BU:1.05)
- Polyethylene, HDPE, granulate, at plant [RER]: 0.0195 kg; lognormal SD95 1.33
  (1,4,2,3,3,5,BU:1.05) Adjusted after mass
- Polypropylene, granulate, at plant [RER]: 0.16 kg; lognormal SD95 1.33
  (1,4,2,3,3,5,BU:1.05) Adjusted after mass
- Powder coating, steel [RER]: 0.294 m2; lognormal SD95 1.33
  (1,4,2,3,3,5,BU:1.05) Adjusted after mass
- Power supply unit, at plant [GLO]: 1 p; lognormal SD95 1.33
  (1,4,2,3,3,5,BU:1.05)
- Printed wiring board, mounted, Desktop PC mainboard, at plant [GLO]: 0.757 kg; lognormal SD95 1.33
  (1,4,2,3,3,5,BU:1.05) Data from Babbit et al 2020 and Teehan et al 2013
- Printed wiring board, surface mount, at plant [GLO]: 0.00809 m2; lognormal SD95 1.33
  (1,4,2,3,3,5,BU:1.05)
- Printed wiring board, surface mounted, unspec., solder mix, at plant [GLO]: 0.212 kg; lognormal SD95 1.33
  (1,4,2,3,3,5,BU:1.05) Adjusted according to PWB mass
- Section bar extrusion, aluminium [RER]: 0.766 kg; lognormal SD95 1.33
  (1,4,2,3,3,5,BU:1.05) Data from Babbit et al 2020 and Teehan et al 2013
- Sheet rolling, steel [RER]: 4.59 kg; lognormal SD95 1.33
  (1,4,2,3,3,5,BU:1.05) Data from Babbit et al 2020 and Teehan et al 2013
- Steel, low-alloyed, at plant [RER]: 4.59 kg; lognormal SD95 1.33
  (1,4,2,3,3,5,BU:1.05) Data from Babbit et al 2020 and Teehan et al 2013
- Stretch blow moulding [RER]: 0.0751 kg; lognormal SD95 1.33
  (1,4,2,3,3,5,BU:1.05) Data from Babbit et al 2020 and Teehan et al 2013
- Tap water, at user [RER]: 1620 kg; lognormal SD95 1.33
  (1,4,2,3,3,5,BU:1.05)
- Transport, freight, rail [RER]: 1.69 tkm; lognormal SD95 2.1
  (2,2,2,1,3,5,BU:2.00) Adjusted from 11.3 kg to 8.8 kg total mass
- Transport, freight, lorry, fleet average [RER]: 0.847 tkm; lognormal SD95 2.1
  (2,2,2,1,3,5,BU:2.00) Adjusted from 11.3 kg to 8.8 kg total mass
- Transport, transoceanic freight ship [OCE]: 180 tkm; lognormal SD95 2.1
  (2,2,2,1,3,5,BU:2.00) Adjusted from 11.3 kg to 8.8 kg total mass
- Wire drawing, copper [RER]: 0.0487 kg; lognormal SD95 1.33
  (1,4,2,3,3,5,BU:1.05) Data from Babbit et al 2020 and Teehan et al 2013
- Disposal, desktop computer, to WEEE treatment [CH]: 1 p; lognormal SD95 1.33
  (1,4,2,3,3,5,BU:1.05)
- Disposal, polypropylene, 15.9% water, to municipal incineration [CH]: 0.128 kg; lognormal SD95 1.33
  (1,4,2,3,3,5,BU:1.05) Adjusted according to PP fraction
- Treatment, sewage, unpolluted, to wastewater treatment, class 3 [CH]: 1.62 m3; lognormal SD95 1.33
  (1,4,2,3,3,5,BU:1.05)

## Sampling procedure
Own measurements at laboratory (weighing) and manufacturer information.

## Extrapolations
see Geography and Technology

## Sources
- Raka Adrianto L., Permana Ajie M., Beloin-Saint-Pierre D., 2024, 2024 - LCI ICT sector - Raka Adrianto, Empa, St. Gallen, CH

## Validation
Proof reading validation: Passed, Other validation: none, Validator: Mischa Zschokke, Company: Carbotech, Country: CH
