# Cupboard hinges and screws, at plant

Dataset: EcoSpold 1, unit process
Functional unit: 1 p
Category: construction / kitchen
Geography: CH
Time period: 2014-01 to 2014-12
Share of production covered: 0 %
Generated by: Franziska Wyss
accessRestrictedTo: 0
copyright: true

## Included processes
This data set describes the production of cuboard hinges, screws, drawer rails and handels for the kitchen. The tall cupboard requires 4 hinges, whereas the bottom and top section need each 2 hinges per cupboard, total 30 hinges are required (steel, 90 g each). Each hinge needs 2 screws (steel, 0.0009 g each) There are 6 drawers with drawer rails (steel, 1.11 kg per drawer) and each drawer needs 24 screws for its rails. All 20 cupboards and drawers have handles (chromium steel, 60 g each) that need 2 screws each. Transport to the construction site is not included. All metallic components are recycled at the end of life.; Geography: Data valid for Switzerland

## Geography
Data valid for Switzerland

## Technology
Average disposal

## Reference product
- Cupboard hinges and screws, at plant [CH]: 1 p
  SWITZERLAND

## Inputs from technosphere
- Selective coating, aluminium sheet, nickel pigmented aluminium oxide [SK]: 0.07933 m2; lognormal SD95 1.2423
  (4,3,1,1,1,4,BU:1.05); Nickelbeschichtung;
- Powder coating, steel [RER]: 1.6794 m2; lognormal SD95 1.2423
  (4,3,1,1,1,4,BU:1.05); Pulverbeschichtung;
- Steel, low-alloyed, at plant [RER]: 10.692 kg; lognormal SD95 1.2423
  (4,3,1,1,1,4,BU:1.05); Stahl für Führungsschiene;
- Steel, low-alloyed, at plant [RER]: 1.2455 kg; lognormal SD95 1.2423
  (4,3,1,1,1,4,BU:1.05); Stahl für Griff;
- Transport, freight, rail, electricity with shunting [CH]: 9.0657 tkm; lognormal SD95 2.095
  (4,5,na,na,na,na,BU:2); Metalltransport Zug;
- Steel product manufacturing, average metal working [RER]: 10.692, 2.88, 1.2455 kg (3 entries); lognormal SD95 1.2423
  (4,3,1,1,1,4,BU:1.05); Stahlbearbeitung;
- Transport, freight, lorry, 16t-32t gross weight, fleet average [CH]: 0.75547 tkm; lognormal SD95 2.095
  (4,5,na,na,na,na,BU:2); Metalltransport LKW;
- Steel, low-alloyed, at plant [RER]: 2.88 kg; lognormal SD95 1.2423
  (4,3,1,1,1,4,BU:1.05); Stahl für Topfbänder;
- Steel, low-alloyed, at plant [RER]: 0.29202 kg; lognormal SD95 1.2423
  (4,3,1,1,1,4,BU:1.05); Masse Schrauben total;
- Steel product manufacturing, average metal working [RER]: 0.29202 kg; lognormal SD95 1.2423
  (4,3,1,1,1,4,BU:1.05); Metallbearbeitung Schrauben;

## Inputs from nature
- Nickel, resource correction [resources, in ground]: -0.0017207 kg; lognormal SD95 1.3221
  (4,1,3,1,1,5,BU:1.05); Ressourcenkorrektur für MoeK13;
- Iron, resource correction [resources, in ground]: -9.8212 kg; lognormal SD95 1.3221
  (4,1,3,1,1,5,BU:1.05); Ressourcenkorrektur für MoeK13;

## Sources
- Kasser U., R. Frischknecht, M. Klingler, D. Savi, R. Itten, F. Wyss,P. Stolz, L. Tschuemperlin, 2016, 2016 - Renewal and exp. of LCA data in KBOB - Kasser, Project report, 489, Buero fuer Umweltchemie, treeze Ltd., Zuerich and Uster, CH
Franziska Wyss, Rolf Frischknecht, Philippe Stolz (2014) Ökobilanzen von Kücheneinbauten und -möbeln. Project report. Volume: 489. treeze Ltd.. Uster, CH.
Type: Separate publication
Source: Report
First author: Franziska Wyss
Other authors: Rolf Frischknecht, Philippe Stolz
Year: 2014
Title of anthology: Project report
Place of publication: Uster, CH
Publisher: treeze Ltd.
Volume No: 489

## Validation
Proof reading validation: 05.11.2015; Other validation: \\SRV01\ESU-Docs\Projekte laufend\489 Erweiterung KBOB-Liste BFE\EcoSpold\Küche\[489_Küche_v1.10.xlsx]X-Process;
