# Paper, recycling, average, at plant

Dataset: EcoSpold 1, unit process
Functional unit: 1 kg
Category: paper+ board / graphic paper
Geography: RER
Time period: 2000-01 to 2000-12
Generated by: Emil Franov
accessRestrictedTo: 0
copyright: true

## General comment
The total annual production is 1'242'000 metric tons which represents about 10.4% of the annual production of the graphical recycling papers (without newspaper) used in the EU.

This module includes the production of recycled paper in Europe - including waste paper, deinking of pulp, paper production, energy production on-site, internal waste water treatment and transports of the auxiliaries to the paper mill. Not included are the infrastructure and the transport of waste paper to the mill, as this is already included in the used waste paper datasets.
UUID: 56e66adb-917e-30f4-bc8f-92e4f3b83

## Reference product
- Paper, recycling, average, at plant [RER]: 1 kg
  This module refers to the European recycling paper production based on confidential primary data from 9 common recycling paper (weighted average) on behalf of a project funded by the Swiss Federal Office for the Environment FOEN: The total annual production is 1'242'000 metric tons which represents about 10.4% of the annual production of the graphical recycling papers (without newspaper) used in the EU.
  This module includes the production of recycled paper in Europe - including waste paper, deinking of pulp, paper production, energy production on-site, internal waste water treatment and transports of the auxiliaries to the paper mill. Not included are the infrastructure and the transport of waste paper to the mill, as this is already included in the used waste paper datasets.

## Inputs from technosphere
- Sodium silicate, spray powder 80%, at plant [RER]: 0.00247 kg; lognormal SD95 1.22
- Natural gas, burned in industrial furnace 1MW [CH]: 0.457049 MJ; lognormal SD95 1.22
- Disposal, paper, 11.2% water, to municipal incineration [CH]: 0.01377 kg; lognormal SD95 1.22
- Diesel, burned in diesel-electric generating set [GLO]: 0.000527 MJ; lognormal SD95 1.22
- Waste paper, mixed, from public collection, for further treatment [RER]: 0.90312 kg; lognormal SD95 1.22
- Lignite, burned in power plant [DE]: 0.20373 MJ; lognormal SD95 1.22
- Transport, freight, rail [RER]: 0.0133 tkm; lognormal SD95 1.63
- Transport, freight, lorry, 32t-40t gross weight, fleet average [RER]: 0.2694 tkm; lognormal SD95 1.63
- Transport, transoceanic freight ship [OCE]: 0.1024 tkm; lognormal SD95 1.63
- Kaolin, at plant [RER]: 0.00462 kg; lognormal SD95 1.22
- Sodium hydroxide, 50% in H2O, production mix, at plant [RER]: 0.00261 kg; lognormal SD95 1.22
- Chemicals inorganic, at plant [GLO]: 0.0041 kg; lognormal SD95 1.22
- Light fuel oil, burned in industrial furnace 1MW, non-modulating [RER]: 0.09336 MJ; lognormal SD95 1.22
- Sodium chloride, powder, at plant [RER]: 0.00016 kg; lognormal SD95 1.22
- Hydrogen peroxide, 50% in H2O, at plant [RER]: 0.00533 kg; lognormal SD95 1.22
- Disposal, wood ash mixture, pure, 0% water, to municipal incineration [CH]: 0.00688 kg; lognormal SD95 1.22
- Chemicals organic, at plant [GLO]: 0.00516 kg; lognormal SD95 1.22
- Quicklime, milled, packed, at plant [CH]: 0.06664 kg; lognormal SD95 1.22
- Electricity, medium voltage, production ENTSO-E, at grid: 0.5032 kWh; lognormal SD95 1.22
- Hydrogen sulphide, H2S, at plant [RER]: 0.00533 kg; lognormal SD95 1.22
- Limestone, milled, packed, at plant [CH]: 0.10816 kg; lognormal SD95 1.22
- Wood chips, burned in cogen 1MWth [CH]: 7.58894 MJ; lognormal SD95 1.22
- Natural gas, burned in cogen 1MWe lean burn [RER]: 1.04787 MJ; lognormal SD95 1.22
- Sulphate pulp, average, at regional storage [RER]: 0.0265 kg; lognormal SD95 1.22
- Latex, at plant [RER]: 0.00371 kg; lognormal SD95 1.22
- Potato starch, at plant [DE]: 0.04137 kg; lognormal SD95 1.22
- Optical brighteners, in paper production, at plant [RER]: 0.00156 kg; lognormal SD95 1.22
- Disposal, hazardous waste, 25% water, to hazardous waste incineration [CH]: 0.00011 kg; lognormal SD95 1.22
- Hard coal, burned in power plant [DE]: 0.44176 MJ; lognormal SD95 1.22
- Sodium dithionite, anhydrous, at plant [RER]: 0.0005 kg; lognormal SD95 1.22

## Inputs from nature
- Wood, unspecified, standing/kg [resources, land]: 0.04994 kg; lognormal SD95 2.1

## Emissions to nature
- DOC, Dissolved Organic Carbon [emissions to water, unspecified]: 0.00029125 kg; lognormal SD95 2
  assumed to be half of TOC.
- Phosphorus [emissions to water, unspecified]: 1.98e-5 kg; lognormal SD95 1.22
- BOD5, Biological Oxygen Demand [emissions to water, unspecified]: 0.001165 kg; lognormal SD95 2
  relation BOD5 to TOC is about 1:2 according to AbwV (Abwasserverordnung Deutschland)
- AOX, Adsorbable Organic Halogen as Cl [emissions to water, unspecified]: 1.79e-6 kg; lognormal SD95 1.22
- Nitrogen [emissions to water, unspecified]: 0.000109 kg; lognormal SD95 1.22
- Waste water/m3 [emissions to water, unspecified]: 0.01055 m3; lognormal SD95 1.22
- COD, Chemical Oxygen Demand [emissions to water, unspecified]: 0.002327 kg; lognormal SD95 1.22
- TOC, Total Organic Carbon [emissions to water, unspecified]: 0.0005825 kg; lognormal SD95 2
  realtion COD to TOC is about 4:1 according to AbwV (Abwasserverordnung Deuschland)

## Sources
- Werner F., 2017, 2017 - LCI wood and wood based products - Werner, Project Report, 0, Environment & Development, Zuerich, CH

## Validation
Proof reading validation: 17.06.2011; Other validation: none;
