# xx Wind power plant 600kW, moving parts

Dataset: EcoSpold 1, unit process, infrastructure
Functional unit: 1 p
Category: electricity by fuel / wind\infrastructure
Geography: CH
Time period: 2000-01 to 2000-12
Generated by: Christian Bauer
accessRestrictedTo: 0
copyright: true

## General comment
Lifetime is assumed to be 20 years. Annual electricity production is assumed to be 736 MWh. Most data are from a Nordex N43/600 plant, a few are extrapolations from the module "wind power plant 30kW, moving parts".;

## Included processes
Includes materials used for moving parts: rotor, nacelle, electric parts, and their disposal. Also includes the prozessing, the energy requirements for assembling, the transports needed, and the connection to the grid.

## Technology
Average European technology of a 600 kW wind power plant.

## Reference product
- xx Wind power plant 600kW, moving parts [CH]: 1 p
  SWITZERLAND

## Inputs from technosphere
- Synthetic rubber, at plant [RER]: 100 kg; lognormal SD95 1.5
  own estimation
- Transport, freight, rail, electricity with shunting [CH]: 49200 tkm; lognormal SD95 2.1
  standard for transprts
- Disposal, plastics, mixture, 15.3% water, to municipal incineration [CH]: 2600 kg; lognormal SD95 1.2
  uncertainty of input plus composition of glass fibre reinforced plastic
- Section bar rolling, steel [RER]: 9920 kg; lognormal SD95 1.2
  own estimation
- Wire drawing, copper [RER]: 1300 kg; lognormal SD95 3
  own estimation
- Electricity, medium voltage, production ENTSO-E, at grid: 17500 kWh; lognormal SD95 2
  own estimation
- Disposal, glass, 0% water, to municipal incineration [CH]: 4640 kg; lognormal SD95 1.2
  uncertainty of input plus composition of glass fibre reinforced plastic
- Polyvinylchloride, bulk polymerised, at plant [RER]: 421 kg; lognormal SD95 3
  own estimation
- Copper, at regional storage [RER]: 1300 kg; lognormal SD95 3
  own estimation
- Disposal, polypropylene, 15.9% water, to municipal incineration [CH]: 20 kg; lognormal SD95 3
  own estimation
- Cast iron, at plant [RER]: 7270 kg; lognormal SD95 1.2
  own estimation
- Glass fibre reinforced plastic, polyamide, injection moulding, at plant [RER]: 7140 kg; lognormal SD95 1.1
  own estimation
- Steel, low-alloyed, at plant [RER]: 2710 kg; lognormal SD95 1.05
  standard for metals
- Disposal, polyvinylchloride, 0.2% water, to municipal incineration [CH]: 415 kg; lognormal SD95 3
  own estimation
- Electricity, medium voltage, at grid [CH]: 10 kWh; lognormal SD95 2
  own estimation
- Lubricating oil, at plant [RER]: 50.4 kg; lognormal SD95 1.05
  own estimation
- Sheet rolling, aluminium [RER]: 204 kg; lognormal SD95 1.1
  own estimation
- Chromium steel 18/8, at plant [RER]: 17800 kg; lognormal SD95 1.2
  own estimation
- Disposal, polyethylene, 0.4% water, to municipal incineration [CH]: 576 kg; lognormal SD95 3
  own estimation
- Tin, at regional storage [RER]: 0.5 kg; lognormal SD95 1.05
  standard for metals
- Aluminium, primary, at plant [RER]: 204 kg; lognormal SD95 1.1
  own estimation
- Transport, freight, lorry, 16t-32t gross weight, fleet average [CH]: 5720 tkm; lognormal SD95 2.1
  standard for transprts
- Polyethylene, HDPE, granulate, at plant [RER]: 603 kg; lognormal SD95 3
  own estimation
- Sheet rolling, chromium steel [RER]: 17800 kg; lognormal SD95 1.2
  own estimation
- Disposal, used mineral oil, 10% water, to hazardous waste incineration [CH]: 50.4 kg; lognormal SD95 1.05
  own estimation
- Polypropylene, granulate, at plant [RER]: 20 kg; lognormal SD95 3
  own estimation
- Lead, at regional storage [RER]: 0.5 kg; lognormal SD95 1.05
  standard for metals

## Sampling procedure
Literature

## Sources
- Burger B., Bauer C., 2007, 2007 - Windpower - Buger, Sachbilanzen von Energiesystemen. Final report No. 6 ecoinvent data v2.0, 6, Swiss Centre for LCI, PSI, Duebendorf and Villigen, CH
Burger, B., Bauer, Ch. (2007) Windkraft. Sachbilanzen von Energiesystemen. Final report No. 6 ecoinvent data v2.0. Editors: Dones R.. Volume: 6. Swiss Centre for LCI, PSI. Dübendorf and Villigen, CH.
Type: Measurement on site
Source: CD-ROM
First author: Burger, B.
Other authors: Bauer, Ch.
Year: 2007
Name of editors: Dones R.
Title of anthology: Sachbilanzen von Energiesystemen. Final report No. 6 ecoinvent data v2.0
Place of publication: Dübendorf and Villigen, CH
Publisher: Swiss Centre for LCI, PSI
Volume No: 6

## Validation
Proof reading validation: Passed.; Other validation: none;
