# Transport, freight, lorry, diesel, 40t gross weight, 2002, EURO-III, long haul

Dataset: EcoSpold 1, unit process
Functional unit: 1 tkm
Category: transport systems / road\Transformation
Geography: RER
Time period: 2002-01 to 2002-12
Generated by: Romain Sacchi
accessRestrictedTo: 0
copyright: False

## General comment
Combustion engine power: 428 [kW]. Power share from combustion engine: 100 [%]. Km over lifetime: 350000 [km]. Yearly mileage: 28000 [km/year]. Autonomy on a full tank/battery: 800 [km]. Tank-to-wheel efficiency: 31 [%]. Tank-to-wheel energy consumption: 11341 [kj/km]. Fuel tank capacity: 2520 [kWh]. Available payload: 24631 [kg]. Payload: 8830 [kg]. Load factor: 35 [%]. Curb mass (excl. driver and cargo): 15293 [kg]. Driving mass (incl. driver and cargo): 24198 [kg]..

## Time period
EURO-III emissions standards apply to truck registrations from 2000-01 until 2004-12. Vehicle lightweighting factors match manufacture year of 2002

## Reference product
- Transport, freight, lorry, diesel, 40t gross weight, 2002, EURO-III, long haul [RER]: 1 tkm

## Inputs from technosphere
- Tyre wear emissions, lorry [RER]: 1.11832e-5 kg; lognormal SD95 1.62301
  Uncertainty from pedigree matrix: (4, 5, 2, 3, 4, 3)
- Operation, maintenance, road [CH]: 0.000142 my; lognormal SD95 1.51685
  Uncertainty from pedigree matrix: (3, 1, 5, 2, 1, 1)
- Road [CH]: 0.00144 my; lognormal SD95 1.51685
  Uncertainty from pedigree matrix: (3, 1, 5, 2, 1, 1)
- Road wear emissions, lorry [RER]: 1.44593e-5 kg; lognormal SD95 1.62301
  Uncertainty from pedigree matrix: (4, 5, 2, 3, 4, 3)
- Refrigerant R134a, at plant [RER]: 3.16e-7 kg; lognormal SD95 1.56552
  Uncertainty from pedigree matrix: (5, 5, 2, 1, 1, 3)
- Transport, freight, rail [RER]: 1.896e-7 tkm; lognormal SD95 1.45944
  Uncertainty from pedigree matrix: (4, 5, 2, 5, 3, 5)
- Transport, freight, lorry, 16t-32t gross weight, fleet average [RER]: 3.16e-8 tkm; lognormal SD95 1.45944
  Uncertainty from pedigree matrix: (4, 5, 2, 5, 3, 5)
- Brake wear emissions, lorry [RER]: 8.81348e-6 kg; lognormal SD95 1.62301
  Uncertainty from pedigree matrix: (4, 5, 2, 3, 4, 3)
- Fuel supply for diesel vehicles [RER]: 0.0293 kg; lognormal SD95 1.03168
  Uncertainty from pedigree matrix: (1, 1, 2, 2, 1, 1)
- Heavy duty truck, diesel, 40t gross weight, 2002, EURO-III, long haul [RER]: 1.55e-7 p; lognormal SD95 1.12899
  Uncertainty from pedigree matrix: (3, 3, 2, 1, 1, 3)
- Disposal, road [RER]: 0.0014 my; lognormal SD95 1.51685
  Uncertainty from pedigree matrix: (3, 1, 5, 2, 1, 1)

## Emissions to nature
- Heptane [emissions to air, low. pop.]: 2.31e-9 kg; lognormal SD95 1.07516
  Uncertainty from pedigree matrix: (2, 2, 1, 2, 1, 3)
- Particulates, < 2.5 um [emissions to air, low. pop.]: 2.92e-5 kg; lognormal SD95 1.07516
  Uncertainty from pedigree matrix: (2, 2, 1, 2, 1, 3)
- Ethane, 1,1,1,2-tetrafluoro-, HFC-134a [emissions to air, unspecified]: 1.46e-7 kg; lognormal SD95 1.07516
  Uncertainty from pedigree matrix: (2, 2, 1, 2, 1, 3)
- Dinitrogen monoxide [emissions to air, low. pop.]: 7.69e-7 kg; lognormal SD95 1.07516
  Uncertainty from pedigree matrix: (2, 2, 1, 2, 1, 3)
- Mercury [emissions to air, low. pop.]: 1.54e-10 kg; lognormal SD95 1.07516
  Uncertainty from pedigree matrix: (2, 2, 1, 2, 1, 3)
- Styrene [emissions to air, low. pop.]: 4.31e-9 kg; lognormal SD95 1.07516
  Uncertainty from pedigree matrix: (2, 2, 1, 2, 1, 3)
- Butane [emissions to air, low. pop.]: 1.15e-9 kg; lognormal SD95 1.07516
  Uncertainty from pedigree matrix: (2, 2, 1, 2, 1, 3)
- Selenium [emissions to air, low. pop.]: 2.92e-12 kg; lognormal SD95 1.07516
  Uncertainty from pedigree matrix: (2, 2, 1, 2, 1, 3)
- m-Xylene [emissions to air, low. pop.]: 7.54e-9 kg; lognormal SD95 1.07516
  Uncertainty from pedigree matrix: (2, 2, 1, 2, 1, 3)
- Acetaldehyde [emissions to air, low. pop.]: 3.52e-8 kg; lognormal SD95 1.07516
  Uncertainty from pedigree matrix: (2, 2, 1, 2, 1, 3)
- Toluene [emissions to air, low. pop.]: 7.69e-11 kg; lognormal SD95 1.07516
  Uncertainty from pedigree matrix: (2, 2, 1, 2, 1, 3)
- Carbon monoxide, fossil [emissions to air, low. pop.]: 0.000321 kg; lognormal SD95 1.07516
  Uncertainty from pedigree matrix: (2, 2, 1, 2, 1, 3)
- Nickel [emissions to air, low. pop.]: 2.57e-10 kg; lognormal SD95 1.07516
  Uncertainty from pedigree matrix: (2, 2, 1, 2, 1, 3)
- Zinc [emissions to air, low. pop.]: 5.07e-8 kg; lognormal SD95 1.07516
  Uncertainty from pedigree matrix: (2, 2, 1, 2, 1, 3)
- Chromium VI [emissions to air, low. pop.]: 1.75e-12 kg; lognormal SD95 1.07516
  Uncertainty from pedigree matrix: (2, 2, 1, 2, 1, 3)
- NMVOC, non-methane volatile organic compounds, unspecified origin [emissions to air, low. pop.]: 4.99e-5 kg; lognormal SD95 1.07516
  Uncertainty from pedigree matrix: (2, 2, 1, 2, 1, 3)
- Arsenic [emissions to air, low. pop.]: 2.92e-12 kg; lognormal SD95 1.07516
  Uncertainty from pedigree matrix: (2, 2, 1, 2, 1, 3)
- Methane, fossil [emissions to air, low. pop.]: 1.51e-6 kg; lognormal SD95 1.07516
  Uncertainty from pedigree matrix: (2, 2, 1, 2, 1, 3)
- Acrolein [emissions to air, low. pop.]: 1.36e-8 kg; lognormal SD95 1.07516
  Uncertainty from pedigree matrix: (2, 2, 1, 2, 1, 3)
- Benzaldehyde [emissions to air, low. pop.]: 1.05e-8 kg; lognormal SD95 1.07516
  Uncertainty from pedigree matrix: (2, 2, 1, 2, 1, 3)
- Pentane [emissions to air, low. pop.]: 4.62e-10 kg; lognormal SD95 1.07516
  Uncertainty from pedigree matrix: (2, 2, 1, 2, 1, 3)
- PAH, polycyclic aromatic hydrocarbons [emissions to air, low. pop.]: 2.28e-9 kg; lognormal SD95 1.07516
  Uncertainty from pedigree matrix: (2, 2, 1, 2, 1, 3)
- Sulfur dioxide [emissions to air, unspecified]: 1.27e-5 kg; lognormal SD95 1.07516
  Uncertainty from pedigree matrix: (2, 2, 1, 2, 1, 3)
- Chromium [emissions to air, low. pop.]: 8.75e-10 kg; lognormal SD95 1.07516
  Uncertainty from pedigree matrix: (2, 2, 1, 2, 1, 3)
- Carbon dioxide, fossil [emissions to air, unspecified]: 0.0869 kg; lognormal SD95 1.07516
  Uncertainty from pedigree matrix: (2, 2, 1, 2, 1, 3)
- Ammonia [emissions to air, low. pop.]: 4.04e-7 kg; lognormal SD95 1.07516
  Uncertainty from pedigree matrix: (2, 2, 1, 2, 1, 3)
- Formaldehyde [emissions to air, low. pop.]: 6.46e-8 kg; lognormal SD95 1.07516
  Uncertainty from pedigree matrix: (2, 2, 1, 2, 1, 3)
- Nitrogen oxides [emissions to air, low. pop.]: 0.00083 kg; lognormal SD95 1.07516
  Uncertainty from pedigree matrix: (2, 2, 1, 2, 1, 3)
- Ethane [emissions to air, low. pop.]: 2.31e-10 kg; lognormal SD95 1.07516
  Uncertainty from pedigree matrix: (2, 2, 1, 2, 1, 3)
- Cadmium [emissions to air, low. pop.]: 2.53e-10 kg; lognormal SD95 1.07516
  Uncertainty from pedigree matrix: (2, 2, 1, 2, 1, 3)
- o-Xylene [emissions to air, low. pop.]: 3.08e-9 kg; lognormal SD95 1.07516
  Uncertainty from pedigree matrix: (2, 2, 1, 2, 1, 3)
- Carbon dioxide, biogenic [emissions to air, unspecified]: 0.00491 kg; lognormal SD95 1.07516
  Uncertainty from pedigree matrix: (2, 2, 1, 2, 1, 3)
- Hydrocarbons, chlorinated [emissions to air, low. pop.]: 6.29e-5 kg; lognormal SD95 1.07516
  Uncertainty from pedigree matrix: (2, 2, 1, 2, 1, 3)
- Benzene [emissions to air, low. pop.]: 1.05e-6 kg; lognormal SD95 1.07516
  Uncertainty from pedigree matrix: (2, 2, 1, 2, 1, 3)
- Propane [emissions to air, low. pop.]: 7.69e-10 kg; lognormal SD95 1.07516
  Uncertainty from pedigree matrix: (2, 2, 1, 2, 1, 3)
- Copper [emissions to air, low. pop.]: 6.18e-10 kg; lognormal SD95 1.07516
  Uncertainty from pedigree matrix: (2, 2, 1, 2, 1, 3)
- Noise, road, lorry, average [non material emissions, unspecified]: 0.113 km; lognormal SD95 1.87651
  Uncertainty from pedigree matrix: (5, 5, 2, 1, 4, 5)

## Extrapolations
Extrapolated from value for Switzerland

## Sources
- Sacchi R., Bauer C., 2023, 2023 - LCI on-road vehicles - Sacchi, PSI, Villigen, CH
doi: 10.5281/ZENODO.5156043
