# CEM II, B cement, at plant

Dataset: EcoSpold 1, unit process
Functional unit: 1 kg
Category: construction materials / binder
Geography: CH
Time period: 2017-01 to 2021-12
Generated by: Frank Werner

## General comment
The dataset describes the production of cement (CEM II/B) in Switzerland and covers the representative production mix of CEM II/B-M (T-LL), CEM II/B-LL, CEM II/B-M (V-LL) and CEM II/B-T according to EN 197-1.
Technology: Industry data. Data approximates average swiss production
Time period: Time of publications.
Version: 1

Local category: Mineralische Baustoffe
Local subcategory: Bindemittel
UVEK 2022;

## Included processes
The activity starts with the clinker in the silo to be used for cement production and with the additional ingredients of the cement at the gate of the cement plant. The activity includes also the electricy used for the grinding of the clinker, griding aids, heat for the drying of additions etc. and ends with the cement produced in the cement mill. The dataset does not include packaging and administration.

## Time period
Time of publications.

## Reference product
- CEM II, B cement, at plant [CH]: 1 kg
  SWITZERLAND

## Inputs from technosphere
- Transport, freight, rail [RER]: 0.0224 tkm; lognormal SD95 2.0511
  (2,1,1,1,1,5,BU:2); ;
- Cement plant [CH]: 5.36e-11 p; lognormal SD95 3
  (1,1,1,1,1,1,BU:3); ;
- Ethylene glycol, at plant [RER]: 0.00021 kg; lognormal SD95 1.1267
  (1,3,3,3,1,1,BU:1.05); ;
- Transport, freight, lorry, 16t-32t gross weight, fleet average [CH]: 0.00821 tkm; lognormal SD95 2.0511
  (2,1,1,1,1,5,BU:2); ;
- Gypsum, mineral, at mine [CH]: 0.0392 kg; lognormal SD95 1.3001
  (4,5,na,na,na,na,BU:1.05); ;
- Electricity, medium voltage, at grid [CH]: 0.029 kWh; lognormal SD95 1.3059
  (2,1,1,1,3,5,BU:1.05); ;
- Steel, low-alloyed, at plant [RER]: 4e-5 kg; lognormal SD95 1.2152
  (2,1,1,1,1,5,BU:1.05); ;
- Burnt shale, at plant [DE]: 0.059 kg; lognormal SD95 1.3059
  (1,3,3,3,1,1,BU:1.05); ;
- Clinker, at plant [CH]: 0.705 kg; lognormal SD95 1.3059
  (2,1,1,1,3,5,BU:1.05); ;
- Iron sulphate, at plant [RER]: 0.0151 kg; lognormal SD95 1.596
  (3,4,5,3,3,na)
- Ground granulated blast furnace slag, no burdens, at plant [RER]: 0.0129 kg; lognormal SD95 1.3059
  (1,3,3,3,1,1,BU:1.05)
- Dried hard coal fly ash, at plant [CH]: 3.95e-5 kg; lognormal SD95 1.3059
  (1,3,3,3,1,1,BU:1.05)
- Limestone, crushed, for mill [CH]: 0.166 kg; lognormal SD95 1.2152
  (2,1,1,1,1,5,BU:1.05); ;

## Emissions to nature
- Heat, waste [emissions to air, unspecified]: 0.12312 MJ; lognormal SD95 1.2152
  (2,1,1,1,1,5,BU:1.05); ;

## Sampling procedure
Measured data of several Swiss plants, intended to be representative for the Swiss production volume

## Sources
- Werner F., 2025, 2025 - Indicator values clinker and cement KBOB list - Werner, Environment & Development, Zuerich, CH
