# Soybeans, at farm

Dataset: EcoSpold 1, unit process
Functional unit: 1 kg
Category: agricultural / plant production
Geography: US
Time period: 2004-01 to 2006-12
Production volume: Total production in the USA is around 82.8 Million tons.
Share of production covered: 100 %
Generated by: Juergen Sutter
accessRestrictedTo: 0
copyright: true

## General comment
The inventory for the cultivation of soybeans in the USA is modelled with data from literature. Some data are extrapolated from Europe (production of fertilizers and pesticides) or Switzerland , (machine use). Some transports are modelled with standard distances. The functional unit is 1 kg soybeans (fresh mass with a water content of 11 %). Carbon content: 0.388 kg/kg fresh mass. Biomass energy content: 20.45 MJ/kg fresh mass. Yield: 2641 kg/ha. The emissions of N2O and NH3 to air are calculated standard factors for mineral fertilizers from Nemecek et al. 2004 and standard factors for the emission from the crop residue from Ostermayer 2002. The emission of nitrate to water is calculated with a nitrogen loss factor of 30%.;

## Included processes
Cultivation of soybeans in the USA including use of diesel, machines, fertilizers, and pesticides.

## Technology
Cultivation of soybeans

## Time period
Time of publications

## Reference product
- Soybeans, at farm [US]: 1 kg
  UNITED STATES

## Inputs from technosphere
- Lime, from carbonation, at regional storehouse [CH]: 0.00835 kg; lognormal SD95 1.06
  (1,2,1,3,1,1); NREL 2006
- Potassium chloride, as K2O, at regional storehouse [RER]: 0.00933 kg; lognormal SD95 1.06
  (1,2,1,3,1,1); IFA 2006; NASS 2005
- Transport, freight, lorry, fleet average [CH]: 0.015 tkm; lognormal SD95 2.09
  (4,5,na,na,na,na); Standard Distances
- Transport, freight, lorry, fleet average [RER]: 0.0223 tkm; lognormal SD95 2
  (1,2,1,3,1,1); NREL 2006; Spielmann 2004
- Diammonium phosphate, as P2O5, at regional storehouse [RER]: 0.00612 kg; lognormal SD95 1.06
  (1,2,1,3,1,1); IFA 2006; NASS 2005
- Combine harvesting [CH]: 0.000106 ha; lognormal SD95 1.08
  (2,2,1,3,1,1); NREL 2006; Nemecek 2004
- [thio]carbamate-compounds, at regional storehouse [RER]: 2.55e-7 kg; lognormal SD95 1.06
  (1,2,1,3,1,1); USDA 2004
- Ammonia, liquid, at regional storehouse [RER]: 0.000947 kg; lognormal SD95 1.06
  (1,2,1,3,1,1); IFA 2006; NASS 2005
- Triazine-compounds, at regional storehouse [RER]: 2.33e-6 kg; lognormal SD95 1.06
  (1,2,1,3,1,1); USDA 2004
- [sulfonyl]urea-compounds, at regional storehouse [RER]: 5.94e-7 kg; lognormal SD95 1.06
  (1,2,1,3,1,1); USDA 2004
- Application of plant protection products, by field sprayer [CH]: 0.000255 ha; lognormal SD95 1.08
  (2,2,1,3,1,1); NREL 2006; Nemecek 2004
- Sowing [CH]: 0.000204 ha; lognormal SD95 1.08
  (2,2,1,3,1,1); NREL 2006; Nemecek 2004
- Diphenylether-compounds, at regional storehouse [RER]: 4.24e-7 kg; lognormal SD95 1.06
  (1,2,1,3,1,1); USDA 2004
- Pea seed IP, at regional storehouse [CH]: 0.0417 kg; lognormal SD95 1.31
  (2,3,1,3,3,5); Nemecek 2004
- Ammonium nitrate, as N, at regional storehouse [RER]: 0.000549 kg; lognormal SD95 1.06
  (1,2,1,3,1,1); IFA 2006; NASS 2005
- Pyretroid-compounds, at regional storehouse [CH]: 8.49e-8 kg; lognormal SD95 1.06
  (1,2,1,3,1,1); USDA 2004
- Transport, freight, rail [RER]: 0.0463 tkm; lognormal SD95 2
  (1,2,1,3,1,1); NREL 2006
- Urea, as N, at regional storehouse [RER]: 0.000398 kg; lognormal SD95 1.06
  (1,2,1,3,1,1); IFA 2006; NASS 2005
- Phenoxy-compounds, at regional storehouse [RER]: 7.47e-6 kg; lognormal SD95 1.06
  (1,2,1,3,1,1); USDA 2004
- Tillage, ploughing [CH]: 9.3e-5 ha; lognormal SD95 1.08
  (2,2,1,3,1,1); NREL 2006; Nemecek 2004
- Dinitroaniline-compounds, at regional storehouse [RER]: 3.45e-5 kg; lognormal SD95 1.06
  (1,2,1,3,1,1); USDA 2004
- Organophosphorus-compounds, at regional storehouse [RER]: 0.000421 kg; lognormal SD95 1.06
  (1,2,1,3,1,1); USDA 2004
- Benzo[thia]diazole-compounds, at regional storehouse [RER]: 3.06e-6 kg; lognormal SD95 1.06
  (1,2,1,3,1,1); USDA 2004
- Fertilising, by broadcaster [CH]: 5.35e-5 ha; lognormal SD95 1.08
  (2,2,1,3,1,1); NREL 2006; Nemecek 2004
- Tillage, harrowing, by spring tine harrow [CH]: 0.000297 ha; lognormal SD95 1.08
  (2,2,1,3,1,1); NREL 2006; Nemecek 2004
- Acetamide-anillide-compounds, at regional storehouse [RER]: 5.43e-6 kg; lognormal SD95 1.06
  (1,2,1,3,1,1); USDA 2004
- Benzimidazole-compounds, at regional storehouse [RER]: 8.49e-7 kg; lognormal SD95 1.06
  (1,2,1,3,1,1); USDA 2004

## Inputs from nature
- Transformation, to annual crop, non-irrigated [resources, land]: 3.79 m2; lognormal SD95 1.2
  (1,1,1,1,1,1); FAOSTAT 2006
- Carbon dioxide, in air [resources, in air]: 1.37 kg; lognormal SD95 1.24
  (4,3,1,1,1,4); calculated from the carbon balance
- Energy, gross calorific value, in biomass [resources, biotic]: 20.5 MJ; lognormal SD95 1.24
  (4,3,1,1,1,4); calculated from the energy balance
- Occupation, annual crop, non-irrigated [resources, land]: 3.79 m2a; lognormal SD95 1.1
  (1,1,1,1,1,1); FAOSTAT 2006; Nemecek 2004
- Transformation, from annual crop, non-irrigated [resources, land]: 3.79 m2; lognormal SD95 1.2
  (1,1,1,1,1,1); FAOSTAT 2006

## Emissions to nature
- Clethodim [emissions to soil, agricultural]: 8.49e-7 kg; lognormal SD95 1.3
  (4,3,1,1,1,1); Calculated from the pesticide application
- Metribuzin [emissions to soil, agricultural]: 2.04e-6 kg; lognormal SD95 1.3
  (4,3,1,1,1,1); Calculated from the pesticide application
- Chlorimuron-ethyl [emissions to soil, agricultural]: 5.94e-7 kg; lognormal SD95 1.3
  (4,3,1,1,1,1); Calculated from the pesticide application
- Cadmium [emissions to soil, agricultural]: -4.95e-8 kg; lognormal SD95 1.58
  (4,3,1,1,1,4); Calculated from the fertilizer application
- Dinitrogen monoxide [emissions to air, low. pop.]: 0.000893 kg; lognormal SD95 1.58
  (4,3,1,1,1,4); Calculated with standard method
- Fomesafen [emissions to soil, agricultural]: 1.95e-6 kg; lognormal SD95 1.3
  (4,3,1,1,1,1); Calculated from the pesticide application
- Nitrate [emissions to water, groundwater]: 0.0377 kg; lognormal SD95 1.58
  (4,3,1,1,1,4); Calculated with standard method
- Metolachlor [emissions to soil, agricultural]: 5.43e-6 kg; lognormal SD95 1.3
  (4,3,1,1,1,1); Calculated from the pesticide application
- Sulfentrazone [emissions to soil, agricultural]: 3.06e-6 kg; lognormal SD95 1.3
  (4,3,1,1,1,1); Calculated from the pesticide application
- Zinc [emissions to soil, agricultural]: -3.92e-5 kg; lognormal SD95 1.58
  (4,3,1,1,1,4); Calculated from the fertilizer application
- Nickel [emissions to soil, agricultural]: -4.24e-6 kg; lognormal SD95 1.58
  (4,3,1,1,1,4); Calculated from the fertilizer application
- Nitrogen oxides [emissions to air, low. pop.]: 0.000187 kg; lognormal SD95 1.58
  (4,3,1,1,1,4); Calculated with standard method
- Cloransulam-methyl [emissions to soil, agricultural]: 2.55e-7 kg; lognormal SD95 1.3
  (4,3,1,1,1,1); Calculated from the pesticide application
- Phosphorus [emissions to water, river]: 0.000301 kg; lognormal SD95 1.58
  (4,3,1,1,1,4); Calculated with standard method
- Lead [emissions to soil, agricultural]: 6.36e-8 kg; lognormal SD95 1.58
  (4,3,1,1,1,4); Calculated from the fertilizer application
- Sulfosate [emissions to soil, agricultural]: 1.26e-5 kg; lognormal SD95 1.3
  (4,3,1,1,1,1); Calculated from the pesticide application
- Fenoxaprop [emissions to soil, agricultural]: 5.09e-7 kg; lognormal SD95 1.3
  (4,3,1,1,1,1); Calculated from the pesticide application
- Imazamox [emissions to soil, agricultural]: 2.55e-7 kg; lognormal SD95 1.3
  (4,3,1,1,1,1); Calculated from the pesticide application
- Fluazifop-P-butyl [emissions to soil, agricultural]: 1.7e-7 kg; lognormal SD95 1.3
  (4,3,1,1,1,1); Calculated from the pesticide application
- Pendimethalin [emissions to soil, agricultural]: 1.48e-5 kg; lognormal SD95 1.3
  (4,3,1,1,1,1); Calculated from the pesticide application
- Copper [emissions to soil, agricultural]: -1.28e-5 kg; lognormal SD95 1.58
  (4,3,1,1,1,4); Calculated from the fertilizer application
- Trifluralin [emissions to soil, agricultural]: 1.78e-5 kg; lognormal SD95 1.3
  (4,3,1,1,1,1); Calculated from the pesticide application
- Flumioxazin [emissions to soil, agricultural]: 2.97e-7 kg; lognormal SD95 1.3
  (4,3,1,1,1,1); Calculated from the pesticide application
- Phosphorus [emissions to water, groundwater]: 2.65e-5 kg; lognormal SD95 1.58
  (4,3,1,1,1,4); Calculated with standard method
- Glyphosate [emissions to soil, agricultural]: 0.000406 kg; lognormal SD95 1.3
  (4,3,1,1,1,1); Calculated from the pesticide application
- Lambda-cyhalothrin [emissions to soil, agricultural]: 8.49e-8 kg; lognormal SD95 1.3
  (4,3,1,1,1,1); Calculated from the pesticide application
- Ammonia [emissions to air, low. pop.]: 0.000943 kg; lognormal SD95 1.32
  (4,3,1,1,1,4); Calculated with standard method
- Imazethapyr [emissions to soil, agricultural]: 6.37e-7 kg; lognormal SD95 1.3
  (4,3,1,1,1,1); Calculated from the pesticide application
- 2,4-D [emissions to soil, agricultural]: 6.32e-6 kg; lognormal SD95 1.3
  (4,3,1,1,1,1); Calculated from the pesticide application
- Chlorpyrifos [emissions to soil, agricultural]: 1.91e-6 kg; lognormal SD95 1.3
  (4,3,1,1,1,1); Calculated from the pesticide application
- Chromium [emissions to soil, agricultural]: -3.19e-7 kg; lognormal SD95 1.58
  (4,3,1,1,1,4); Calculated from the fertilizer application

## Sampling procedure
Literature data

## Extrapolations
The usage of agricultural machines is extrapolated with Swiss equipment and US diesel consumption. Transports are modelled with standard distances. Emissions are calculated with standard methods.

## Sources
- Jungbluth N., Chudacoff M., Dauriat A., Dinkel F., Doka G., Faist Emmenegger M., Gnansounou E., Kljun N., Spielmann M., Stettler C., Sutter J., 2007, 2007 - LCI bioenergy - Jungbluth, Final report ecoinvent data v2.0, 17, Swiss Centre for LCI, ESU-services Ltd., Duebendorf and Uster, CH
Jungbluth N., Chudacoff M., Dauriat A., Dinkel F., Doka G., Faist Emmenegger M., Gnansounou E., Kljun N., Spielmann M., Stettler C., Sutter J. (2007) Life Cycle Inventories of Bioenergy. Final report ecoinvent data v2.0. Volume: 17. Swiss Centre for LCI, ESU. Duebendorf and Uster, CH.
Type: Measurement on site
Source: CD-ROM
First author: Jungbluth N.
Other authors: Chudacoff M., Dauriat A., Dinkel F., Doka G., Faist Emmenegger M., Gnansounou E., Kljun N., Spielmann M., Stettler C., Sutter J.
Year: 2007
Title of anthology: Final report ecoinvent data v2.0
Place of publication: Duebendorf and Uster, CH
Publisher: Swiss Centre for LCI, ESU
Volume No: 17

## Validation
Proof reading validation: Passed.; Other validation: none;
