# Disposal, tram track

Dataset: EcoSpold 1, unit process, infrastructure
Functional unit: 1 my
Category: transport waste / unspecified
Geography: CH
Time period: 2000-01 to 2000-12
Generated by: Michael Spielmann
accessRestrictedTo: 0
copyright: true

## General comment
Expenditures for the recycling of excavated materials are not considered.;

## Included processes
This module merely contains transport of tram track materials to the recycling facilities (20km)

## Geography
Data refers to Swiss conditions

## Technology
Swiss state of the art technology

## Reference product
- Disposal, tram track [CH]: 1 my
  SWITZERLAND

## Inputs from technosphere
- Transport, freight, lorry, 16t-32t gross weight, fleet average [CH]: 5.39 tkm; lognormal SD95 2.28
  (4,5,na,na,na,na); standard transport distance

## Sampling procedure
literature

## Sources
- Spielmann M., Bauer C., Dones R., Tuchschmid M., 2007, 2007 - Transport services - Spielmann, Final report ecoinvent Data v2.0, 14, Swiss Centre for LCI, PSI, ESU-services Ltd., Duebendorf, Villigen and Uster, CH
Spielmann M., Dones R; Bauer C. (2007) Life Cycle Inventories of Transport Services. Final report ecoinvent Data v2.0. Volume: 14. Issue: 0. Swiss Centre for LCI, PSI. Dübendorf and Villigen, CH.
Type: Measurement on site
Source: CD-ROM
First author: Spielmann M.
Other authors: Dones R; Bauer C.
Year: 2007
Title of anthology: Final report ecoinvent Data v2.0
Place of publication: Dübendorf and Villigen, CH
Publisher: Swiss Centre for LCI, PSI
Volume No: 14
Issue No: 0

## Validation
Proof reading validation: Passed.; Other validation: none;
