# Ethanol, 99.7% in H2O, from biomass, at distillation

Dataset: EcoSpold 1, unit process
Functional unit: 1 kg
Category: biomass / fuels
Geography: RER
Time period: 2000-01 to 2000-12
Production volume: 1.2 Mio tonnes
Generated by: Niels Jungbluth
accessRestrictedTo: 0
copyright: true

## General comment
Inventory refers to the production of 1 kg anhydrous ethanol 99.7% (dry basis, i.e. 1.003 kg anhydrous ethanol wet basis). Dehydration is carried out by molecular sieve technology. Ethanol is produced from rye, in the average RER context.;
CAS number: 000064-17-5;
Formula: C2H6O;
Synonyms: Alkohol, alcohol dehydrated, algrain, Anhydrol, cologne spirit, cologne spirits (alcohol), Denatured alcohol, Ethyl alcohol, Ethanol, ethanol 200 proof, Ethanol absolute, ethyl hydrate, ethyl hydroxide, fermentation alcohol, grain alcohol, bioethanol, bio-ethanol;

## Included processes
This dataset includes the dehydration of hydrated ethanol (95%) to anhydrous ethanol (99.7%). Hydrated ethanol input is modelled for the present European ethanol consumption mix. Treatment of waste streams is included.

## Geography
Data is from the etha+ project (Alcosuisse, CH), adapted to RER context

## Technology
Dehydration is done by molecular sieve technology.

## Time period
Data from 2002 to 2006, current technology for the production of ethanol from starch-based feedstocks. Data for the supply mix in 2016.

## Reference product
- Ethanol, 99.7% in H2O, from biomass, at distillation [RER]: 1 kg
  Europe

## Inputs from technosphere
- Ethanol fermentation plant [CH]: 5.2989e-11 p; lognormal SD95 3.046
  (1,2,1,1,1,5); etha+ project Alcosuisse, industrial data
- Ethanol, 95% in H2O, from rye, at distillery [RER]: 0.04 kg; lognormal SD95 1.05
  (1,1,1,1,1,1); Barley
- Ethanol, 95% in H2O, from wood, at distillery [SE]: 0.05 kg; lognormal SD95 1.05
  (1,1,1,1,1,1); Cellulosic biomass
- Treatment, sewage, from residence, to wastewater treatment, class 2 [CH]: 4.9623e-5 m3; lognormal SD95 1.209
  (1,2,1,1,1,5); etha+ project Alcosuisse, industrial data
- Electricity, low voltage, production ENTSO-E, at grid: 0.009151 kWh; lognormal SD95 1.209
  (1,2,1,1,1,5); etha+ project Alcosuisse, industrial data
- Ethanol, 95% in H2O, from corn, at distillery [US]: 0.31 kg; lognormal SD95 1.05
  (1,1,1,1,1,1); Corn
- Ethanol, 95% in H2O, from rye, at distillery [RER]: 0.32 kg; lognormal SD95 1.05
  (1,1,1,1,1,1); Wheat
- Heat, natural gas, at industrial furnace 1MW [CH]: 1.0153 MJ; lognormal SD95 1.209
  (1,2,1,1,1,5); etha+ project Alcosuisse, industrial data
- Ethanol, 95% in H2O, from sugar beets, at fermentation plant [CH]: 0.24 kg; lognormal SD95 1.05
  (1,1,1,1,1,1); Sugar beet
- Ethanol, 95% in H2O, from rye, at distillery [RER]: 0.04 kg; lognormal SD95 1.05
  (1,1,1,1,1,1); Rye

## Emissions to nature
- Heat, waste [emissions to air, high. pop.]: 0.032944 MJ; lognormal SD95 1.1376
  (2,4,1,3,1,3); ecoinvent guidelines, calculation from electricity consumption and energy balance

## Sampling procedure
Statistical data published by the European Commission.

## Sources
- Jungbluth N., Meili C., 2018, 2018 - LCI oil products distribution - Jungbluth, Project report, 565, ESU-services Ltd., Schaffhausen, CH
Jungbluth N., Wenzel P., Meili C. (2018) Life cycle inventories of storage and distribution for oil products. Project report. Volume: 565. ESU-services Ltd.. Schaffhausen, CH.
Type: Separate publication
Source: Report
First author: Jungbluth N.
Other authors: Wenzel P., Meili C.
Year: 2018
Title of anthology: Project report
Place of publication: Schaffhausen, CH
Publisher: ESU-services Ltd.
Volume No: 565
Original title: Life cycle inventories of storage and distribution for oil products

## Validation
Proof reading validation: 22.10.2018; Other validation: C:\Users\Regula\OneDrive - ESU-services\565 LCI oil sector CH BAFU\EcoSpold\[EcoSpold-distribution-2018-v5.0.xlsx]X-Process;
