# Methane, from biological methanation, with carbon from municipal waste incineration plant, with heat recovery (100:0 alloc.)

Dataset: EcoSpold 1, unit process
Functional unit: 1 kg
Category: fuels / synthetic\transformation
Geography: CH
Time period: 2024-01 to 2024-01
Generated by: Romain Sacchi
accessRestrictedTo: 0
copyright: true

## General comment
Based on stoichiometry, for every kilogram of methane produced, the system would consume approximately 2.75 kilograms of CO2 and 0.5 kilograms of H2, and produce approximately 2.25 kilograms of water. Rest of info Adapted from BioCat II project Annex I 2014. Consider 51.3 kg CH4 per full-load hour. Reactor heat re-circulated at the wastewater treatment plant, hence not considered here. Infrastructure missing. Note that a 100:0 CO2 alloc. is applied: the carbon dioxide emissions from the MSWI plant are entirely allocated to the cement plant, but the carbon capture efforst fall within the synthetic natural gas producer's system boundaries. The combustion of the resulting synthetic natural gas does not lead to any carbon dioxide emissions. Source: https://energiforskning.dk/sites/energiforskning.dk/files/slutrapporter/12164_annex_1_p2g_biocat_lca_final_report.pdf

## Reference product
- Methane, from biological methanation, with carbon from municipal waste incineration plant, with heat recovery (100:0 alloc.) [CH]: 1 kg
  not defined

## Inputs from technosphere
- Electricity, low voltage, at grid [CH]: 1.55 kWh; lognormal SD95 1.447
  60 kW at full-load, 10 kW at standby, 3000 full-load hours per year. 51.3 kg CH4 /h at full-load {4;5;2;2;3;5;1.05;}
- Carbon dioxide, captured at municipal solid waste incineration plant, with heat recovery, for subsequent reuse [CH]: 2.75 kg; lognormal SD95 1.447
  {4;5;2;2;3;5;1.05;}
- Hydrogen production, gaseous, 30 bar, from PEM electrolysis, from grid electricity [CH]: 0.5 kg; lognormal SD95 1.447
  {4;5;2;2;3;5;1.05;}
- Ammonia, liquid, at regional storehouse [CH]: 0.001624 kg; lognormal SD95 1.447
  0,0833 kg Ammonia/full load hour. {4;5;2;2;3;5;1.05;}
- Transport, freight, rail, electricity with shunting [CH]: 0.0009743 tkm; lognormal SD95 2.208
  Generic transport distances calculated based on Table 4.2 of the ecoinvent v.2 Methodology report. Distribution: 0.0 kg over 600.0 km.
- Transport, freight, lorry, 16t-32t gross weight, fleet average [CH]: 8.119e-5 tkm; lognormal SD95 2.208
  Generic transport distances calculated based on Table 4.2 of the ecoinvent v.2 Methodology report. Distribution: 0.0 kg over 50.0 km.
- Treatment, sewage, to wastewater treatment, class 1 [CH]: 0.6628 m3; lognormal SD95 1.447
  34 m3 of wastewater/full-load hour. {4;5;2;2;3;5;1.05;}

## Sampling procedure
Sampling procedure: Literature data

## Sources
- Sacchi R., Bauer C., 2024, 2024 - LCA power-to-X in residential sector - Sacchi, Project report, PSI, Villigen, CH

## Validation
Proof reading validation: Passed, Other validation: none, Validator: Rolf Frischknecht, Telephone: 0041 44 940 61 91, E-mail: frischknecht@treeze.ch, Company: treeze, Country: CH
