# Electricity, medium voltage, railway, at grid

Dataset: EcoSpold 1, unit process
Functional unit: 1 kWh
Category: electricity / supply mix
Geography: FR
Time period: 2014-01 to 2014-12
Production volume: GWh
Share of production covered: 100 %
Generated by: Luana Krebs
accessRestrictedTo: 0
copyright: true

## General comment
Distribution losses are taken from Itten, Frischknecht and Stucki (2014): LCI of Electricity Mixes and Grid.;

## Included processes
This dataset describes the distribution of the railway mix in France and includes the low voltage network infrastructure, transmission losses and air pollutant emissions. Not included are electricity losses due to building distribution.

## Geography
France

## Technology
Average technology

## Time period
Time of publications

## Reference product
- Electricity, medium voltage, railway, at grid [FR]: 1 kWh
  FRANCE

## Inputs from technosphere
- Transmission network, electricity, medium voltage [CH]: 1.8628e-8 km; lognormal SD95 3.2848
  (3,2,5,3,1,5,BU:3); Assumed service life of the electricity grid: 40a; Itten, Frischknecht & Stucki 2014
- Electricity, high voltage, railway, at grid [FR]: 1.0259 kWh; lognormal SD95 1.129
  (3,1,2,1,1,3,BU:1,05); Specific network losses estimated based on statistics; Itten, Frischknecht & Stucki 2014
- Sulphur hexafluoride, liquid, at plant [RER]: 4.789e-8 kg; lognormal SD95 1.2502
  (2,3,3,3,1,5,BU:1,05); Estimation based on SF6 emissions; Itten, Frischknecht & Stucki 2014

## Emissions to nature
- Heat, waste [emissions to air, unspecified]: 0.088578 MJ; lognormal SD95 1.2423
  (2,4,1,1,1,5,BU:1,05); Estimation based on network losses;
- Heat, waste [emissions to soil, unspecified]: 0.004662 MJ; lognormal SD95 1.2423
  (2,4,1,1,1,5,BU:1,05); Estimation based on network losses;
- Sulfur hexafluoride [emissions to air, unspecified]: 4.789e-8 kg; lognormal SD95 1.5846
  (2,3,3,3,1,5,BU:1,5); Estimation based on national statistics from Switzerland with an emission rate of 0.9%; Itten, Frischknecht & Stucki 2014

## Sampling procedure
Statistics

## Extrapolations
Some generic datasets from ecoinvent have been used.

## Sources
- Krebs L., Frischknecht R., 2020, 2020 - Update Mobitool 2020 - Krebs, Project report, 713, treeze Ltd., Uster, CH
L. Krebs, R. Frischknecht (2020) Aktualisierung Ökobilanzdaten mobitool 2020, Teil 1. Project report. Volume: 713. treeze Ltd.. Uster, CH.
Type: Separate publication
Source: Report
First author: L. Krebs
Other authors: R. Frischknecht
Year: 2020
Title of anthology: Project report
Place of publication: Uster, CH
Publisher: treeze Ltd.
Volume No: 713

## Validation
Proof reading validation: 02.11.2020; Other validation: G:\Projekte laufend\713 Aktualisierung mobitool 2020\EcoSpold\[713-Strommix-Übertragung-Verteilung-Bahnstrom-EIv2-v0.4.xlsx]X-Process;
