# xxx Polylactide, granulate, NatureWorks Nebraska

Dataset: EcoSpold 1, unit process
Functional unit: 1 kg
Category: material, obsolete / others, obsolete
Geography: US
Generated by: Cornelia Stettler
accessRestrictedTo: 0
copyright: true

## General comment
Inventory refers to the production of 1 kg PLA in the world largest PLA plant. The inventories include the LCI data from the report of the producer NatureWorks. ;

## Included processes
The publication contains only cumulative results. To get more transparency and to be in accordance with other ecoi nvent processes and the guideline the data has been splitted up in maize production, enegy use, transport and waste water treatement. The infrastructure has been added. So the emissions from energy consumption, waste water treatement and raw material inputs have been subtracted resulting in a difference in NMVOC emissions.shown in this process.

## Technology
Evaluation of plant site in Minnetonka

## Reference product
- xxx Polylactide, granulate, NatureWorks Nebraska [US]: 1 kg
  UNITED STATES

## Inputs from technosphere
- Light fuel oil, burned in industrial furnace 1MW, non-modulating [RER]: 0.159 MJ; lognormal SD95 1.2165
  (2,2,1,1,1,5);
- Sulphur hexafluoride, liquid, at plant [RER]: 1.0038e-7 kg; lognormal SD95 1.2165
  (2,2,1,1,1,5); according to ecoinvent data on grid
- Disposal, hazardous waste, 25% water, to hazardous waste incineration [CH]: 0.0064 kg; lognormal SD95 1.0907
  (2,2,1,1,1,3);
- Corn, at farm [US]: 1.507 kg; lognormal SD95 1.209
  (1,2,1,1,1,5);
- Disposal, plastics, mixture, 15.3% water, to sanitary landfill [CH]: 0.001 kg; lognormal SD95 1.0907
  (2,2,1,1,1,3);
- Transport, freight, lorry, fleet average [RER]: 0.2 tkm; lognormal SD95 2.0517
  (2,2,1,1,1,5);
- Electricity, at wind farm [RER]: 1.9925 kWh; lognormal SD95 1.2165
  (2,2,1,1,1,5); grid losses of 9% have been added
- Chemical plant, organics [RER]: 4e-10 p; lognormal SD95 3.2717
  (5,2,1,1,1,5);
- Distribution network, electricity, low voltage [CH]: 2e-7 km; lognormal SD95 3.0492
  (2,2,1,1,1,5); according to ecoinvent data on grid
- Natural gas, high pressure, at consumer [RER]: 0.1296 MJ; lognormal SD95 1.2165
  (2,2,1,1,1,5);
- Natural gas, burned in industrial furnace 1MWth [CH]: 18.46 MJ; lognormal SD95 1.2165
  (2,2,1,1,1,5);
- Transmission network, long-distance [UCTE]: 3.17e-10 km; lognormal SD95 3.0492
  (2,2,1,1,1,5); according to ecoinvent data on grid
- Naphtha, at refinery [RER]: 0.007 kg; lognormal SD95 1.2165
  (2,2,1,1,1,5);
- Treatment, maize starch production effluent, to wastewater treatment, class 2 [CH]: 0.0032 m3; lognormal SD95 1.1267
  (2,2,1,1,1,4);
- Transmission network, electricity, high voltage [CH]: 8.44e-9 km; lognormal SD95 3.0492
  (2,2,1,1,1,5); according to ecoinvent data on grid
- Transmission network, electricity, medium voltage [CH]: 3.24e-8 km; lognormal SD95 3.0492
  (2,2,1,1,1,5); according to ecoinvent data on grid

## Emissions to nature
- NMVOC, non-methane volatile organic compounds, unspecified origin [emissions to air, low. pop.]: 0.00252 kg; lognormal SD95 1.6175
  (4,2,1,1,1,5);
- Sulfur hexafluoride [emissions to air, unspecified]: 1.0038e-7 kg; lognormal SD95 1.6175
  (4,2,1,1,1,5); emissions from the transmission of electricity according to ecoinvent
- Heat, waste [emissions to air, unspecified]: 0.1049 MJ; lognormal SD95 1.301
  (4,2,1,1,1,5); emissions from the transmission of electricity according to ecoinvent
- Heat, waste [emissions to air, low. pop.]: 7.1731 MJ; lognormal SD95 1.2165
  (2,2,1,1,1,5);
- Ozone [emissions to air, unspecified]: 4.6e-6 kg; lognormal SD95 1.6175
  (4,2,1,1,1,5); emissions from the transmission of electricity according to ecoinvent

## Sampling procedure
Data were compiled from LCI report of producer

## Sources
- Althaus H.-J., Werner F., Stettler C., Dinkel F., 2007, 2007 - LCI renewable materials - Althaus, Final report ecoinvent Data v2.0, 21, Swiss Centre for LCI, Empa - TSL, Umwelt & Entwicklung, Carbotech AG, Duebendorf, CH
Althaus H.J., Dinkel F., Werner F. (2007) Life Cycle Inventories of Renewable Materials. Final report ecoinvent Data v2.0. Editors: 0. 0. Volume: 21. Issue: 0. Swiss Centre for LCI, Empa - TSL. Duebendorf, CH.
Type: Measurement on site
Source: CD-ROM
First author: Althaus H.J.
Other authors: Dinkel F., Werner F.
Year: 2007
Name of editors: 0
Title of anthology: Final report ecoinvent Data v2.0
Place of publication: Duebendorf, CH
Publisher: Swiss Centre for LCI, Empa - TSL
Journal: 0
Volume No: 21
Issue No: 0

## Validation
Proof reading validation: passed; Other validation: none;
