# Sodium silicate, furnace liquor, 37% in H2O, at plant

Dataset: EcoSpold 1, unit process
Functional unit: 1 kg
Category: chemicals / inorganic
Geography: RER
Time period: 2000-01 to 2000-12
Generated by: Roland Hischier
accessRestrictedTo: 0
copyright: true

## General comment
data based on a EMPA study, commissioned by the CEES.;
CAS number: 001344-09-8;

## Included processes
This module contains material and energy input, production of waste and emissions for the production of sodium silicate, 37% furnace liquid. Transport and infrastructure have been estimated. The input of compressed air is not reported in the data according to the methodology of the study.

## Technology
average technology used from these European producers

## Time period
producer information for production year 1995

## Reference product
- Sodium silicate, furnace liquor, 37% in H2O, at plant [RER]: 1 kg
  Europe

## Inputs from technosphere
- Heat, natural gas, at industrial furnace 1MW [CH]: 0.716 MJ; lognormal SD95 1.1
  (2,2,2,1,1,4); Average data from 6 European producers
- Heat, heavy fuel oil, at industrial furnace 1MW [RER]: 0.2 MJ; lognormal SD95 1.1
  (2,2,2,1,1,4); Average data from 6 European producers
- Chemicals organic, at plant [GLO]: 0.00189 kg; lognormal SD95 1.1
  (2,2,2,1,1,4); Average data from 6 European producers
- Electricity, medium voltage, production ENTSO-E, at grid: 0.00757 kWh; lognormal SD95 1.1
  (2,2,2,1,1,4); Average data from 6 European producers
- Transport, freight, rail [RER]: 0.604 tkm; lognormal SD95 2.1
  (4,5,na,na,na,na); standard distances
- Steam, for chemical processes, at plant [RER]: 0.303 kg; lognormal SD95 1.1
  (2,2,2,1,1,4); Average data from 6 European producers
- Disposal, residue from cooling tower, 30% water, to sanitary landfill [CH]: 0.00257 kg; lognormal SD95 1.1
  (2,2,2,1,1,4); Average data from 6 European producers
- Transport, freight, lorry, fleet average [RER]: 0.101 tkm; lognormal SD95 2.1
  (4,5,na,na,na,na); standard distances
- Chemical plant, organics [RER]: 4e-10 p; lognormal SD95 3.8
  (4,5,1,3,5,4); estimation
- Sodium silicate, furnace process, pieces, at plant [RER]: 1.01 kg; lognormal SD95 1.1
  (2,2,2,1,1,4); Average data from 6 European producers
- Disposal, inert waste, 5% water, to construction waste landfill [CH]: 5.41e-5 kg; lognormal SD95 1.1
  (2,2,2,1,1,4); Average data from 6 European producers
- Heat, at hard coal industrial furnace 1-10MW [RER]: 0.0805 MJ; lognormal SD95 1.1
  (2,2,2,1,1,4); Average data from 6 European producers

## Inputs from nature
- Water, cooling, unspecified natural origin/m3 [resources, in water]: 1.08e-6 m3; lognormal SD95 1.1
  (2,2,2,1,1,4); Average data from 6 European producers
- Water, unspecified natural origin/m3 [resources, in water]: 0.00224 m3; lognormal SD95 1.1
  (2,2,2,1,1,4); Average data from 6 European producers

## Emissions to nature
- Heat, waste [emissions to air, high. pop.]: 0.905 MJ; lognormal SD95 1.1
  (2,2,2,1,1,4); calculated from electricity and steam input
- Water [emissions to water, unspecified]: 0.001026, 2.128 kg (2 entries); lognormal SD95 2.5196
  (5,5,5,5,5,BU:1.05); All uncertainty-values set to 5.0 by default. Balance of input water

## Sampling procedure
sampling of questionnaires

## Extrapolations
see included processes

## Sources
- Zah R., Hischier R., 2007, 2007 - LCI detergents - Zah, Final report ecoinvent data v2.0, 12, Swiss Centre for LCI, Empa - TSL, Duebendorf and St. Gallen, CH
Zah R., Hischier R. (2007) Life Cycle Inventories of Detergents. Final report ecoinvent data v2.0. Volume: 12. Swiss Centre for LCI, Empa - TSL. Dübendorf, CH.
Type: Measurement on site
Source: CD-ROM
First author: Zah R.
Other authors: Hischier R.
Year: 2007
Title of anthology: Final report ecoinvent data v2.0
Place of publication: Dübendorf, CH
Publisher: Swiss Centre for LCI, Empa - TSL
Volume No: 12

## Validation
Proof reading validation: Passed.; Other validation: none;
