# Anhydrite floor screed, ready for processing

Dataset: EcoSpold 1, unit process
Functional unit: 1 kg
Category: construction materials / subfloors
Geography: CH
Time period: 2000-01 to 2016-12
Generated by: Daniel Savi
accessRestrictedTo: 0
copyright: true

## General comment
Anhydrit-UB, verarbeitungsfertig
Version: 0.0

Local category: construction materials
Local subcategory: Unterlagsboeden

## Reference product
- Anhydrite floor screed, ready for processing [CH]: 1 kg
  SWITZERLAND

## Inputs from technosphere
- Transport, freight, lorry, 16t-32t gross weight, fleet average [CH]: 0.01129 tkm
- Anhydrite from hydrofluoric acid synthesis, at plant [DE]: 0.0354 kg
- Melamine formaldehyde resin, at plant [RER]: 0.000818 kg
- Potassium sulphate, as K2O, at regional storehouse [RER]: 0.00142 kg
- Anhydrite from FDG gypsum, at plant [DE]: 0.1287 kg
- Transport, freight, lorry, 16t-32t gross weight, fleet average [RER]: 0.1137 tkm
- Disposal, non-specific mineral building materials, as building waste [CH]: 0.00442 kg
- Lubricating oil, at plant [RER]: 2.21e-6 kg
- Anhydrite rock, at mine [CH]: 0.0502 kg
- Industrial machine, heavy, unspecified, at plant [RER]: 3.45e-7 kg
- Tap water, at user [CH]: 0.0224, 0.1154 kg (2 entries)
- Electricity, medium voltage, at grid [CH]: 0.00025, 0.02105 kWh (2 entries)
- Bentonite, at processing [DE]: 0.01 kg
- Gypsum a-hemihydrate from FDG gypsum, at plant [DE]: 0.0245 kg
- Heat, light fuel oil, at industrial furnace 1MW [RER]: 0.0014 MJ
- Heat, natural gas, at industrial furnace 1MW [CH]: 0.00665 MJ
- Compressed air, average installation, <30kW, 8 bar gauge, at supply network [RER]: 0.00665 m3
- Sand, at mine [CH]: 0.6245 kg
- Chemicals organic, at plant [GLO]: 0.000155 kg
- Portland cement, strength class Z 42.5, at plant [CH]: 0.00885 kg
- Treatment, sewage, to wastewater treatment, class 3 [CH]: 2.24e-5 m3
- Plaster bag incl. transport packaging, at plant [CH]: 0.001552 p

## Sources
- Kasser U., R. Frischknecht, M. Klingler, D. Savi, R. Itten, F. Wyss,P. Stolz, L. Tschuemperlin, 2016, 2016 - Renewal and exp. of LCA data in KBOB - Kasser, -, Buero fuer Umweltchemie, treeze Ltd., Zuerich and Uster, CH
U. Kasser, R. Frischknecht, M. Klingler, D. Savi, R. Itten, F. Wyss,P. Stolz, L. Tschümperlin 2016 (2015Z) Erneuerung und Erweiterung der Ökobilanzdaten in der KBOB-Liste "Ökobilanzdaten im Baubereich", Projekt QualiBOB. unknown.

First author: U. Kasser, R. Frischknecht, M. Klingler, D. Savi, R. Itten, F. Wyss,P. Stolz, L. Tschümperlin 2016
Year: 2015Z
Place of publication: unknown
Original title: Erneuerung und Erweiterung der Ökobilanzdaten in der KBOB-Liste "Ökobilanzdaten im Baubereich", Projekt QualiBOB
