# xx Heat, biowaste, at waste incineration plant, future, allocation price

Dataset: EcoSpold 1, unit process
Functional unit: 1 MJ
Category: energy, obsolete / heat, obsolete\waste, obsolete
Geography: CH
Time period: 2000-01 to 2000-12
Generated by: Gabor Doka
accessRestrictedTo: 0
copyright: true

## General comment
Incinerated amount = 1 kg . Incinerated waste contains 100% biowaste; . waste composition (wet, in ppm): upper heating value 6.82 MJ/kg; lower heating value 5.104 MJ/kg; H2O 600000; O 126430; H 20000; C 162400; S 1499.3; N 4000; P 1130; B 10.24; Cl 4000; Br 6; F 200; I 0.055; Ag n.a.; As 2; Ba n.a.; Cd 0.138; Co 5; Cr 8; Cu 18; Hg 0.07; Mn 4.3; Mo 0.4; Ni 5.42; Pb 18.56; Sb n.a.; Se 0.49976; Sn 7.9961; V 2.9985; Zn 58.24; Be n.a.; Sc n.a.; Sr n.a.; Ti n.a.; Tl n.a.; W n.a.; Si 39980; Fe 600; Ca 21800; Al 9995.1; K 3500; Mg 2820; Na 1500; Share of carbon in waste that is biogenic 100%. Share of iron in waste that is metallic/recyclable 0%. Net energy produced in MSWI: 0.49MJ/kg waste electric energy and 2.77MJ/kg waste thermal energy One kg of this waste produces 0.1337 kg of slag and 0.01883 kg of residues, which are landfilled. Additional solidification with 0.007533 kg of cement.;;

## Included processes
transport to incinerator. waste-specific air and water emisions from incineration, auxiliary material consumption for flue gas cleaning. Short-term emissions to river water and long-term emisisons to ground water from slag compartment (from bottom slag) and residual material landfill (from solidified fly ashes and scrubber slugde). Process energy demands for (future) MSWI.

## Geography
Based on planing data for modernisation of a Swiss MSWI plant

## Technology
Based on average Swiss MSWI plants in 2000 (grate incinerators) with electrostatic precipitator for fly ash (ESP), wet flue gas scrubber and 29.4% SNCR , 32.2% SCR-high dust , 24.6% SCR-low dust -DeNOx facilities and 13.8% without Denox (by burnt waste, according to Swiss average). Modernised (future) energy production. Gross electric efficiency technology mix 16.7% and Gross thermal efficiency technology mix 56.3%

## Time period
Waste composition as given in literature reference. Transfer coefficients for modern Swiss MSWI. Emission speciation based on early 90ies data.

## Reference product
- xx Heat, biowaste, at waste incineration plant, future, allocation price [CH]: 1 MJ
  SWITZERLAND

## Inputs from technosphere
- Transport, freight, rail [RER]: 0.0016027 tkm; lognormal SD95 3.0238
  uncertainty calculated from uncertainty in average auxiliary material input, the unertainty of the waste composition of this waste and the uncertainty in generic transportation distances
- Titanium dioxide, production mix, at plant [RER]: 8.9812e-7 kg; lognormal SD95 18.202
  uncertainty calculated from uncertainty in average DeNOx input, uncertainty in the share of thermal NOx, uncertainty of nitrogen content in average municipal waste and the unertainty in nitrogen content in *this* waste.
- Iron (III) chloride, 40% in H2O, at plant [CH]: 1.2198e-6 kg; lognormal SD95 5.5752
  uncertainty calculated from uncertainty in average auxiliary material input, and the unertainty of the waste composition of this waste
- Residual material landfill facility [CH]: 6.1003e-12 p; lognormal SD95 1.3708
  uncertainty is calculated from uncertainties in waste composition and transfer coefficients in incinerator
- Quicklime, milled, packed, at plant [CH]: 0.00010844 kg; lognormal SD95 3.9799
  (same comment as for Iron (III) chloride, 40% in H2O, at plant)
- Transport, freight, lorry, 16t-32t gross weight, fleet average [CH]: 0.0011327 tkm; lognormal SD95 1.4225
  uncertainty calculated from calculated from uncertainties in waste composition, in transfer coefficients in incinerator, uncertainty in average auxiliary material input, the unertainty of the waste composition of this waste and the uncertainty in generic transportation distances
- Process-specific burdens, slag compartment [CH]: 0.020792 kg; lognormal SD95 1.5365
  (same comment as for Residual material landfill facility)
- Chromium oxide, flakes, at plant [RER]: 1.8329e-8 kg; lognormal SD95 18.202
  Proxy for vanadium pentoxide V2O5 in SCR catalyst, uncertainty calculated from uncertainty in average DeNOx input, uncertainty in the share of thermal NOx, uncertainty of nitrogen content in average municipal waste and the unertainty in nitrogen content in *this* waste.
- Ammonia, liquid, at regional storehouse [CH]: 3.1375e-5 kg; lognormal SD95 10.639
  (same comment as for Titanium dioxide, production mix, at plant)
- Municipal waste incineration plant [CH]: 3.8869e-11 p; lognormal SD95 1
  demands per kilogram waste. uncertainty is heeded in the module
- Disposal, cement, hydrated, 0% water, to residual material landfill [CH]: 0.0029281 kg; lognormal SD95 1.4456
  Hydrated cement for solidification of landfilled residual material. Uncertainty calculated from unertainty of the waste composition of this waste and transfer coefficients in the incinerator and of the solidification recipe.
- Chemicals organic, at plant [GLO]: 1.0952e-7 kg; lognormal SD95 11.485
  Proxy for TMT15. uncertainty calculated from uncertainty in average auxiliary material input, and the unertainty of the waste composition of this waste
- Chemicals inorganic, at plant [GLO]: 2.0018e-6 kg; lognormal SD95 3.623
  Proxy for Polyelectrolyte. uncertainty calculated from uncertainty in average auxiliary material input, and the unertainty of the waste composition of this waste
- Transport, municipal waste collection, lorry 21t [CH]: 0.0015548 tkm; lognormal SD95 1
  waste transport to incinerator
- Process-specific burdens, residual material landfill [CH]: 0.0029281 kg; lognormal SD95 1.3708
  (same comment as for Residual material landfill facility)
- Cement, unspecified, at plant [CH]: 0.0011713 kg; lognormal SD95 1.4456
  Cement for solidification of landfilled residual material. Uncertainty calculated from unertainty of the waste composition of this waste, of transfer coefficients in the incinerator and of the solidification recipe.
- Sodium hydroxide, 50% in H2O, production mix, at plant [RER]: 0.00069722 kg; lognormal SD95 3.5127
  (same comment as for Iron (III) chloride, 40% in H2O, at plant)
- Slag compartment [CH]: 3.6965e-11 p; lognormal SD95 1.5365
  (same comment as for Residual material landfill facility)
- Natural gas, burned in industrial furnace 1MW [CH]: 0.0030598 MJ; lognormal SD95 10.639
  (same comment as for Titanium dioxide, production mix, at plant)
- Process-specific burdens, municipal waste incineration [CH]: 0.15548 kg; lognormal SD95 1
  demands per kilogram waste. uncertainty is heeded in the module
- Hydrochloric acid, 30% in H2O, at plant [RER]: 1.2011e-6 kg; lognormal SD95 3.623
  (same comment as for Iron (III) chloride, 40% in H2O, at plant)

## Emissions to nature
- Vanadium [emissions to water, groundwater, long-term]: 7.9965e-8 kg; lognormal SD95 18.691
  Long-term emissions from landfilling of incineration residues. uncertainty is calculated from uncertainties in waste composition and transfer coefficients in incinerator and landfills.
- Ammonia [emissions to air, high. pop.]: 4.9277e-7 kg; lognormal SD95 11.658
  uncertainty calculated from uncertainty in average N-emissions, uncertainty in the share of thermal NOx, uncertainty of nitrogen content in average municipal waste and the unertainty in nitrogen content in *this* waste.
- Mercury [emissions to air, high. pop.]: 3.75e-16 kg; lognormal SD95 17.223
  (same comment as for Residual material landfill facility)
- Arsenic [emissions to water, river]: 1.4019e-7 kg; lognormal SD95 9.2728
  uncertainty is calculated from uncertainties in waste composition and transfer coefficients in incinerator and landfills
- Bromine [emissions to air, high. pop.]: 2.7986e-9 kg; lognormal SD95 10.24
  (same comment as for Residual material landfill facility)
- Hydrogen chloride [emissions to air, high. pop.]: 6.9051e-9 kg; lognormal SD95 4.2902
  (same comment as for Residual material landfill facility)
- Nickel [emissions to air, high. pop.]: 3.6369e-14 kg; lognormal SD95 11.089
  (same comment as for Residual material landfill facility)
- Boron [emissions to water, groundwater, long-term]: 1.0494e-6 kg; lognormal SD95 5.3529
  (same comment as for Vanadium)
- Lead [emissions to water, groundwater, long-term]: 2.0559e-7 kg; lognormal SD95 216.5
  (same comment as for Vanadium)
- Calcium [emissions to air, high. pop.]: 5.6502e-6 kg; lognormal SD95 2.9584
  (same comment as for Residual material landfill facility)
- Sulfate [emissions to water, river]: 0.00011318 kg; lognormal SD95 2.8559
  (same comment as for Arsenic)
- Sulfate [emissions to water, groundwater, long-term]: 0.00058463 kg; lognormal SD95 3.1995
  (same comment as for Vanadium)
- Iron [emissions to water, river]: 3.1924e-8 kg; lognormal SD95 5.386
  (same comment as for Arsenic)
- Silicon [emissions to water, groundwater, long-term]: 0.00053977 kg; lognormal SD95 86.924
  (same comment as for Vanadium)
- TOC, Total Organic Carbon [emissions to water, groundwater, long-term]: 0.00024656 kg; lognormal SD95 1.6489
  (same comment as for Vanadium)
- Vanadium [emissions to air, high. pop.]: 4.662e-11 kg; lognormal SD95 11.222
  (same comment as for Residual material landfill facility)
- Heat, waste [emissions to water, river]: 0.21664 MJ; lognormal SD95 1.8336
  uncertainty is calculated from uncertainties in waste composition and uncertainties in energy efficiency and the uncertainty in internal energy demand
- Manganese [emissions to water, groundwater, long-term]: 5.757e-7 kg; lognormal SD95 11.183
  (same comment as for Vanadium)
- Potassium [emissions to water, groundwater, long-term]: 0.00044816 kg; lognormal SD95 3.0918
  (same comment as for Vanadium)
- Cadmium [emissions to air, high. pop.]: 1.1815e-12 kg; lognormal SD95 15.288
  (same comment as for Residual material landfill facility)
- Molybdenum [emissions to water, river]: 1.0622e-8 kg; lognormal SD95 8.4216
  (same comment as for Arsenic)
- Iron [emissions to air, high. pop.]: 3.1144e-9 kg; lognormal SD95 5.76
  (same comment as for Residual material landfill facility)
- Mercury [emissions to water, river]: 1.1639e-10 kg; lognormal SD95 15.615
  (same comment as for Arsenic)
- Chromium VI [emissions to water, river]: 4.0527e-8 kg; lognormal SD95 9.0571
  (same comment as for Arsenic)
- Sodium [emissions to water, river]: 5.042e-5 kg; lognormal SD95 3.0482
  (same comment as for Arsenic)
- Sulfur dioxide [emissions to air, high. pop.]: 9.9307e-7 kg; lognormal SD95 4.8366
  (same comment as for Residual material landfill facility)
- Manganese [emissions to water, river]: 3.7403e-11 kg; lognormal SD95 18.538
  (same comment as for Arsenic)
- Iron [emissions to water, groundwater, long-term]: 4.3695e-5 kg; lognormal SD95 11.37
  (same comment as for Vanadium)
- Zinc [emissions to water, groundwater, long-term]: 1.4039e-7 kg; lognormal SD95 114.29
  (same comment as for Vanadium)
- Hydrogen fluoride [emissions to air, high. pop.]: 1.6366e-8 kg; lognormal SD95 6.6244
  (same comment as for Residual material landfill facility)
- Molybdenum [emissions to air, high. pop.]: 1.2438e-10 kg; lognormal SD95 13.616
  (same comment as for Residual material landfill facility)
- Nickel [emissions to water, river]: 5.2855e-10 kg; lognormal SD95 16.016
  (same comment as for Arsenic)
- Chromium [emissions to water, river]: 3.9642e-9 kg; lognormal SD95 9.8795
  (same comment as for Arsenic)
- Chloride [emissions to water, groundwater, long-term]: 1.4674e-5 kg; lognormal SD95 2.5159
  (same comment as for Vanadium)
- Selenium [emissions to water, groundwater, long-term]: 5.2244e-8 kg; lognormal SD95 8.4609
  (same comment as for Vanadium)
- Arsenic [emissions to air, high. pop.]: 3.171e-15 kg; lognormal SD95 12.532
  (same comment as for Residual material landfill facility)
- Cobalt [emissions to water, river]: 1.3299e-10 kg; lognormal SD95 14.578
  (same comment as for Arsenic)
- Potassium [emissions to water, river]: 9.4363e-5 kg; lognormal SD95 2.9493
  (same comment as for Arsenic)
- Molybdenum [emissions to water, groundwater, long-term]: 5.1444e-8 kg; lognormal SD95 13.429
  (same comment as for Vanadium)
- COD, Chemical Oxygen Demand [emissions to water, groundwater, long-term]: 0.00062309 kg; lognormal SD95 1.6489
  (same comment as for Vanadium)
- DOC, Dissolved Organic Carbon [emissions to water, river]: 6.9219e-7 kg; lognormal SD95 2.8511
  (same comment as for Arsenic)
- DOC, Dissolved Organic Carbon [emissions to water, groundwater, long-term]: 0.00024656 kg; lognormal SD95 1.6489
  (same comment as for Vanadium)
- Bromine [emissions to water, groundwater, long-term]: 1.6313e-7 kg; lognormal SD95 10.08
  (same comment as for Vanadium)
- Phosphate [emissions to water, groundwater, long-term]: 2.0576e-5 kg; lognormal SD95 81.955
  (same comment as for Vanadium)
- Phosphorus [emissions to air, high. pop.]: 1.7569e-7 kg; lognormal SD95 5.1076
  (same comment as for Residual material landfill facility)
- Magnesium [emissions to water, groundwater, long-term]: 0.00040474 kg; lognormal SD95 4.1782
  (same comment as for Vanadium)
- Magnesium [emissions to air, high. pop.]: 6.0374e-7 kg; lognormal SD95 4.3681
  (same comment as for Residual material landfill facility)
- Cadmium [emissions to water, groundwater, long-term]: 2.1529e-10 kg; lognormal SD95 239.52
  (same comment as for Vanadium)
- Phosphate [emissions to water, river]: 3.4351e-8 kg; lognormal SD95 7.2586
  (same comment as for Arsenic)
- Nickel [emissions to water, groundwater, long-term]: 7.8899e-7 kg; lognormal SD95 9.7495
  (same comment as for Vanadium)
- Bromine [emissions to water, river]: 7.6881e-7 kg; lognormal SD95 8.3962
  (same comment as for Arsenic)
- Selenium [emissions to air, high. pop.]: 3.9e-16 kg; lognormal SD95 14.44
  (same comment as for Residual material landfill facility)
- Aluminium [emissions to water, groundwater, long-term]: 0.00115 kg; lognormal SD95 3.2087
  (same comment as for Vanadium)
- BOD5, Biological Oxygen Demand [emissions to water, river]: 9.449e-7 kg; lognormal SD95 2.2082
  (same comment as for Arsenic)
- Calcium [emissions to water, river]: 1.2813e-5 kg; lognormal SD95 5.5576
  (same comment as for Arsenic)
- Carbon monoxide, biogenic [emissions to air, high. pop.]: 3.4656e-5 kg; lognormal SD95 5.01
  (1,3,2,2,1,2) & basic uncertainty of 5; literature data from switzerland and germany adapted to plant age distribution in switzerland
- Cadmium [emissions to water, river]: 9.7306e-12 kg; lognormal SD95 14.428
  (same comment as for Arsenic)
- Aluminium [emissions to air, high. pop.]: 2.4276e-6 kg; lognormal SD95 3.4596
  (same comment as for Residual material landfill facility)
- Nitrate [emissions to water, groundwater, long-term]: 2.2341e-5 kg; lognormal SD95 4.0623
  (same comment as for Vanadium)
- TOC, Total Organic Carbon [emissions to water, river]: 6.9219e-7 kg; lognormal SD95 2.8511
  (same comment as for Arsenic)
- Fluoride [emissions to water, groundwater, long-term]: 2.7739e-5 kg; lognormal SD95 4.4508
  (same comment as for Vanadium)
- Nitrogen oxides [emissions to air, high. pop.]: 1.9786e-5 kg; lognormal SD95 11.658
  (same comment as for Ammonia)
- Chromium [emissions to air, high. pop.]: 9.197e-14 kg; lognormal SD95 10.562
  (same comment as for Residual material landfill facility)
- Silicon [emissions to water, river]: 1.3172e-6 kg; lognormal SD95 4.3647
  (same comment as for Arsenic)
- Methane, biogenic [emissions to air, high. pop.]: 9.9227e-7 kg; lognormal SD95 1.57
  (2,3,4,2,1,2) & basic uncertainty of 1.5; confidential data from 5 plants in Switzerland and Germany
- Copper [emissions to water, river]: 1.1364e-10 kg; lognormal SD95 14.556
  (same comment as for Arsenic)
- Potassium [emissions to air, high. pop.]: 1.6406e-6 kg; lognormal SD95 4.1616
  (same comment as for Residual material landfill facility)
- Iodide [emissions to water, groundwater, long-term]: 7.1e-17 kg; lognormal SD95 12.786
  (same comment as for Vanadium)
- Tin [emissions to water, groundwater, long-term]: 6.2494e-7 kg; lognormal SD95 12.95
  (same comment as for Vanadium)
- Nitrate [emissions to water, river]: 7.955e-6 kg; lognormal SD95 3.1928
  (same comment as for Arsenic)
- Chromium VI [emissions to water, groundwater, long-term]: 1.3167e-7 kg; lognormal SD95 11.642
  (same comment as for Vanadium)
- Boron [emissions to air, high. pop.]: 1.9105e-7 kg; lognormal SD95 9.4864
  (same comment as for Residual material landfill facility)
- Copper [emissions to water, groundwater, long-term]: 2.2622e-6 kg; lognormal SD95 8.6037
  (same comment as for Vanadium)
- Sodium [emissions to water, groundwater, long-term]: 0.0001806 kg; lognormal SD95 3.4571
  (same comment as for Vanadium)
- Manganese [emissions to air, high. pop.]: 3.64e-15 kg; lognormal SD95 11.628
  (same comment as for Residual material landfill facility)
- Lead [emissions to water, river]: 8.0382e-11 kg; lognormal SD95 8.8177
  (same comment as for Arsenic)
- Chloride [emissions to water, river]: 0.00060723 kg; lognormal SD95 3.71
  (same comment as for Arsenic)
- Cyanide [emissions to air, high. pop.]: 5.5972e-7 kg; lognormal SD95 11.658
  (same comment as for Ammonia)
- Silicon [emissions to air, high. pop.]: 1.4471e-5 kg; lognormal SD95 2.5921
  (same comment as for Residual material landfill facility)
- Aluminium [emissions to water, river]: 1.2931e-7 kg; lognormal SD95 6.1348
  (same comment as for Arsenic)
- Boron [emissions to water, river]: 2.49e-7 kg; lognormal SD95 9.0184
  (same comment as for Arsenic)
- Fluoride [emissions to water, river]: 2.3903e-6 kg; lognormal SD95 4.6656
  (same comment as for Arsenic)
- Zinc [emissions to air, high. pop.]: 1.4793e-10 kg; lognormal SD95 8.0089
  (same comment as for Residual material landfill facility)
- BOD5, Biological Oxygen Demand [emissions to water, groundwater, long-term]: 0.00020382 kg; lognormal SD95 1.6489
  (same comment as for Vanadium)
- Cobalt [emissions to air, high. pop.]: 2.4682e-14 kg; lognormal SD95 11.222
  (same comment as for Residual material landfill facility)
- Cobalt [emissions to water, groundwater, long-term]: 6.8062e-7 kg; lognormal SD95 9.8281
  (same comment as for Vanadium)
- Tin [emissions to air, high. pop.]: 1.6492e-9 kg; lognormal SD95 9.9225
  (same comment as for Residual material landfill facility)
- Selenium [emissions to water, river]: 2.5307e-8 kg; lognormal SD95 10.059
  (same comment as for Arsenic)
- Zinc [emissions to water, river]: 1.6649e-9 kg; lognormal SD95 6.765
  (same comment as for Arsenic)
- Iodide [emissions to water, river]: 8.5511e-9 kg; lognormal SD95 14.346
  (same comment as for Arsenic)
- Lead [emissions to air, high. pop.]: 1.0711e-10 kg; lognormal SD95 9.1809
  (same comment as for Residual material landfill facility)
- Iodine [emissions to air, high. pop.]: 9.234e-14 kg; lognormal SD95 16.565
  (same comment as for Residual material landfill facility)
- Calcium [emissions to water, groundwater, long-term]: 0.0029496 kg; lognormal SD95 2.8051
  (same comment as for Vanadium)
- Heat, waste [emissions to air, high. pop.]: 0.82316 MJ; lognormal SD95 1.8336
  (same comment as for Heat, waste)
- Dinitrogen monoxide [emissions to air, high. pop.]: 2.6262e-6 kg; lognormal SD95 11.658
  (same comment as for Ammonia)
- COD, Chemical Oxygen Demand [emissions to water, river]: 1.6876e-6 kg; lognormal SD95 2.9203
  (same comment as for Arsenic)
- Vanadium [emissions to water, river]: 3.1458e-10 kg; lognormal SD95 12.246
  (same comment as for Arsenic)
- Mercury [emissions to water, groundwater, long-term]: 5.6625e-10 kg; lognormal SD95 45.579
  (same comment as for Vanadium)
- Copper [emissions to air, high. pop.]: 2.0658e-11 kg; lognormal SD95 9.3025
  (same comment as for Residual material landfill facility)
- Tin [emissions to water, river]: 4.6126e-11 kg; lognormal SD95 10.407
  (same comment as for Arsenic)
- Magnesium [emissions to water, river]: 1.5349e-6 kg; lognormal SD95 7.3919
  (same comment as for Arsenic)
- Arsenic [emissions to water, groundwater, long-term]: 1.7076e-7 kg; lognormal SD95 11.389
  (same comment as for Vanadium)
- Sodium [emissions to air, high. pop.]: 2.1943e-6 kg; lognormal SD95 4.7961
  (same comment as for Residual material landfill facility)

## Sampling procedure
waste-specific calculation based on literature data

## Sources
- Jungbluth N., Chudacoff M., Dauriat A., Dinkel F., Doka G., Faist Emmenegger M., Gnansounou E., Kljun N., Spielmann M., Stettler C., Sutter J., 2007, 2007 - LCI bioenergy - Jungbluth, Final report ecoinvent data v2.0, 17, Swiss Centre for LCI, ESU-services Ltd., Duebendorf and Uster, CH
Jungbluth N., Chudacoff M., Dauriat A., Dinkel F., Doka G., Faist Emmenegger M., Gnansounou E., Kljun N., Spielmann M., Stettler C., Sutter J. (2007) Life Cycle Inventories of Bioenergy. Final report ecoinvent data v2.0. Volume: 17. Swiss Centre for LCI, ESU. Duebendorf and Uster, CH.
Type: Measurement on site
Source: CD-ROM
First author: Jungbluth N.
Other authors: Chudacoff M., Dauriat A., Dinkel F., Doka G., Faist Emmenegger M., Gnansounou E., Kljun N., Spielmann M., Stettler C., Sutter J.
Year: 2007
Title of anthology: Final report ecoinvent data v2.0
Place of publication: Duebendorf and Uster, CH
Publisher: Swiss Centre for LCI, ESU
Volume No: 17

## Validation
Proof reading validation: Passed.; Other validation: none;
