# xx Ethanol, 99.7% in H2O, from biomass, production CN, at service station

Dataset: EcoSpold 1, unit process
Functional unit: 1 kg
Category: material, obsolete / fuels, obsolete\biofuels, obsolete\ethanols
Geography: CH
Time period: 2000-01 to 2000-12
Production volume: Production capacity of ethanol for use as a fuel was 1'500 Ml in 2005 in CN
Share of production covered: 0 %
Generated by: Edgard Gnansounou
accessRestrictedTo: 0
copyright: true

## General comment
Inventory refers to the distribution of 1 kg of anhydrous ethanol 99.7% in Switzerland. Ethanol is imported from CN and produced from sweet sorghum juice. Distribution to the final consumer (service station) including all necessary transports.;
CAS number: 000064-17-5;
Formula: C2H6O ;
Synonyms: Alkohol, alcohol dehydrated, algrain, Anhydrol, cologne spirit, cologne spirits (alcohol), Denatured alcohol, Ethyl alcohol, Ethanol, ethanol 200 proof, Ethanol absolute, ethyl hydrate, ethyl hydroxide, fermentation alcohol, grain alcohol, bioethanol, bio-ethanol;

## Included processes
This dataset includes the transport of (sorghum-based) anhydrous ethanol from distilleries in CN to Switzerland (1350 km by rail, 150 km by truck, 23000 km by tanker), and distribution to the end user (100 km by rail and 150 km by road). Operation of storage tanks and fuel station is included. Emissions from evaporation and treatment of effluents are also included.

## Geography
Transport from Jilin (CN) to the gulf of Bohai (850 km by rail and 150 km by road), and then oversea to Marseille (F) harbour through Suez canal (23000 km by tanker). Delivery from Marseille to Geneva (500 km by train), and distribution in CH (100 km by rail and 150 km by road). Surveys for distribution mainly for DE and CH.

## Technology
Distribution of fuels

## Reference product
- xx Ethanol, 99.7% in H2O, from biomass, production CN, at service station [CH]: 1 kg
  SWITZERLAND

## Inputs from technosphere
- Ethanol, 99.7% in H2O, from biomass, at distillation [CN]: 1.0005 kg; lognormal SD95 1.05
  (1,1,1,1,1,1); Product plus losses
- Transport, freight, rail, electricity with shunting [CH]: 0.1 tkm; lognormal SD95 2.095
  (4,5,na,na,na,na); Based on ecoinvent Guidelines, standard distances
- Electricity, low voltage, at grid [CH]: 0.0067 kWh; lognormal SD95 1.2502
  (2,4,1,3,3,3); Data for fuel distribution (storage and filling station)
- Transport, transoceanic tanker [OCE]: 23 tkm; lognormal SD95 2.095
  (4,5,na,na,na,na); Assumption, distance to Rotterdam (NL) or Marseille (FR)
- Light fuel oil, burned in boiler 100kW, non-modulating [CH]: 0.000621 MJ; lognormal SD95 1.2502
  (2,4,1,3,3,3); Data for fuel distribution (storage)
- Treatment, sewage, to wastewater treatment, class 2 [CH]: 6.89e-7 m3; lognormal SD95 1.2502
  (2,4,1,3,3,3); Used water
- Regional distribution, oil products [RER]: 2.6205e-10 p; lognormal SD95 3.0584
  (3,na,1,3,3,na); Average data for petrol station
- Treatment, rainwater mineral oil storage, to wastewater treatment, class 2 [CH]: 7.5e-5 m3; lognormal SD95 1.3966
  (4,5,3,3,3,na); Treatment of rainwater with pollutants
- Transport, freight, rail [RER]: 1.35 tkm; lognormal SD95 2.095
  (4,5,na,na,na,na); Assumption, standard distances
- Transport, freight, lorry, 16t-32t gross weight, fleet average [CH]: 0.15 tkm; lognormal SD95 2.095
  (4,5,na,na,na,na); Based on ecoinvent Guidelines, standard distances
- Disposal, separator sludge, 90% water, to hazardous waste incineration [CH]: 0.000168 kg; lognormal SD95 1.2748
  (2,4,3,3,3,3); Sludge from storage, environmental report and literature
- Transport, freight, lorry, fleet average [RER]: 0.15 tkm; lognormal SD95 2.095
  (4,5,na,na,na,na); Assumption, standard distances
- Disposal, municipal solid waste, 22.9% water, to sanitary landfill [CH]: 6.27e-6 kg; lognormal SD95 1.2502
  (2,4,1,3,3,3); Environmental report for wastes
- Tap water, at user [CH]: 0.000689 kg; lognormal SD95 1.2502
  (2,4,1,3,3,3); Data for petrol distribution

## Emissions to nature
- Ethanol [emissions to air, high. pop.]: 0.0005 kg; lognormal SD95 1.7026
  (4,5,2,5,3,4); Losses 0.05% according to product properties
- Heat, waste [emissions to air, high. pop.]: 0.02412 MJ; lognormal SD95 1.1376
  (2,4,1,3,1,3); ecoinvent guidelines, calculation from electricity consumption and energy balance

## Sampling procedure
Environmental reports and literature. Calculation of freight distances.

## Sources
- Jungbluth N., Chudacoff M., Dauriat A., Dinkel F., Doka G., Faist Emmenegger M., Gnansounou E., Kljun N., Spielmann M., Stettler C., Sutter J., 2007, 2007 - LCI bioenergy - Jungbluth, Final report ecoinvent data v2.0, 17, Swiss Centre for LCI, ESU-services Ltd., Duebendorf and Uster, CH
Jungbluth N., Chudacoff M., Dauriat A., Dinkel F., Doka G., Faist Emmenegger M., Gnansounou E., Kljun N., Spielmann M., Stettler C., Sutter J. (2007) Life Cycle Inventories of Bioenergy. Final report ecoinvent data v2.0. Volume: 17. Swiss Centre for LCI, ESU. Duebendorf and Uster, CH.
Type: Measurement on site
Source: CD-ROM
First author: Jungbluth N.
Other authors: Chudacoff M., Dauriat A., Dinkel F., Doka G., Faist Emmenegger M., Gnansounou E., Kljun N., Spielmann M., Stettler C., Sutter J.
Year: 2007
Title of anthology: Final report ecoinvent data v2.0
Place of publication: Duebendorf and Uster, CH
Publisher: Swiss Centre for LCI, ESU
Volume No: 17

## Validation
Proof reading validation: Passed.; Other validation: none;
