# xx Lime, algae, at regional storehouse

Dataset: EcoSpold 1, unit process
Functional unit: 1 kg
Category: material, obsolete / chemicals, obsolete\fertilizers, organic, obsolete
Geography: CH
Time period: 2000-01 to 2000-12
Generated by: Angelika Heil
accessRestrictedTo: 0
copyright: true

## General comment
Values originate from a single producer of lime from algae in France, which, however, can be considered typical for the Swiss market.;

## Included processes
The inventory contains transports connected with the collection of the algae from the sea ground and the delivery to the fertiliser plant as well as the distribution of the usable product to the regional storehouse. Energy requirements for drying of the algae from a water content of 25 % per weight to a final water content of 2.5 %, and milling of the algae were taken into consideration. Demand of the resource calcite contained in the algae was included. Infrastructure and land use were included by means of a proxy-module.

## Geography
The values refer to the market situation in Switzerland. The production takes place in France.

## Technology
Values refer to a commonly used technology for this product.

## Time period
Year when data for the inventory were communicated

## Reference product
- xx Lime, algae, at regional storehouse [CH]: 1 kg
  SWITZERLAND

## Inputs from technosphere
- Transport, freight, lorry, fleet average [RER]: 0.0195 tkm; lognormal SD95 2.06
  (3,3,1,3,1,5)
- Transport, barge [RER]: 0.078 tkm; lognormal SD95 2.06
  (3,3,1,3,1,5)
- Chemical plant, organics [RER]: 4e-10 p; lognormal SD95 2.06
  (3,3,1,3,1,5)
- Heat, natural gas, at industrial furnace 1MW [CH]: 1.5 MJ; lognormal SD95 1.24
  (3,3,1,3,1,5)
- Electricity, low voltage, at grid [FR]: 0.02 kWh; lognormal SD95 1.24
  (3,3,1,3,1,5)
- Transport, freight, rail [RER]: 1 tkm; lognormal SD95 2.06
  (3,3,1,3,1,5)

## Inputs from nature
- Calcite [resources, in ground]: 0.892 kg; lognormal SD95 1.24
  (3,3,1,3,1,5)

## Emissions to nature
- Heat, waste [emissions to air, high. pop.]: 0.072 MJ; lognormal SD95 1.24
  (3,3,1,3,1,5)

## Sampling procedure
Data retrieved from a manufacturer in France.

## Sources
- Nemecek T., Kaegi T., 2007, 2007 - LCI agricultural prod. systems - Nemecek, Ecoinvent report version 2.0, 15, Swiss Centre for LCI, ART, Duebendorf and Zuerich, CH
Nemecek, T., Kägi, T., Blaser, S. (2007) Life Cycle Inventories of Agricultural Production Systems. Ecoinvent report version 2.0. Editors: 0. Volume: 15. Swiss Centre for LCI, ART. Duebendorf and Zurich, CH.
Type: Measurement on site
Source: CD-ROM
First author: Nemecek, T.
Other authors: Kägi, T., Blaser, S.
Year: 2007
Name of editors: 0
Title of anthology: Ecoinvent report version 2.0
Place of publication: Duebendorf and Zurich, CH
Publisher: Swiss Centre for LCI, ART
Volume No: 15

## Validation
Proof reading validation: Passed.; Other validation: none;
