# Harvesting, bundling, energy wood harvester

Dataset: EcoSpold 1, unit process
Functional unit: 1 hr
Category: wood / wooden materials\new processes\other material
Geography: RER
Generated by: default
accessRestrictedTo: 0
copyright: true

## Reference product
- Harvesting, bundling, energy wood harvester [RER]: 1 hr

## Inputs from technosphere
- Lubricating oil, at plant [RER]: 0.354 kg; lognormal SD95 1.18285
  Pedigree: (2,3,3,1,1).
- Diesel, at regional storage [CH]: 9.7 kg; lognormal SD95 1.04029
  Pedigree: (1,1,2,1,1).
- Transport, freight, lorry, 16t-32t gross weight, fleet average [RER]: 161 tkm; lognormal SD95 1.18773
  Pedigree: (3,3,3,1,1).
- Rape oil, at oil mill [RER]: 0.353 kg; lognormal SD95 1.18285
  Pedigree: (2,3,3,1,1).
- Disposal, used mineral oil, 10% water, to hazardous waste incineration [CH]: 0.393689 kg
- Energy wood harvester, at plant [RER]: 5.68e-5 p; lognormal SD95 2.09962
  Pedigree: (1,1,2,1,1).
- Packaging film, LDPE, at plant [RER]: 1.6 kg; lognormal SD95 1.31069
  Pedigree: (5,5,2,1,1).

## Emissions to nature
- Selenium [emissions to air, low. pop.]: 9.72e-8 kg; lognormal SD95 1.01424
  Pedigree: (1,1,2,1,1).
- Methane, fossil [emissions to air, low. pop.]: 0.000559 kg; lognormal SD95 1.01457
  Pedigree: (1,1,2,1,1).
- PAH, polycyclic aromatic hydrocarbons [emissions to air, low. pop.]: 3.26e-5 kg; lognormal SD95 1.01424
  Pedigree: (1,1,2,1,1).
- Particulates, < 2.5 um [emissions to air, low. pop.]: 0.00683 kg; lognormal SD95 1.02914
  Pedigree: (1,1,2,1,1).
- Dinitrogen monoxide [emissions to air, low. pop.]: 0.00116 kg; lognormal SD95 1.01424
  Pedigree: (1,1,2,1,1).
- Oils, biogenic [emissions to soil, forestry]: 0.0353 kg; lognormal SD95 1.01597
  Pedigree: (1,1,2,1,1).
- Copper [emissions to air, low. pop.]: 1.65e-5 kg; lognormal SD95 1.01424
  Pedigree: (1,1,2,1,1).
- Particulates, > 2.5 um, and < 10um [emissions to air, low. pop.]: 0.000304 kg; lognormal SD95 1.01426
  Pedigree: (1,1,2,1,1).
- Cadmium [emissions to air, low. pop.]: 9.72e-8 kg; lognormal SD95 1.01424
  Pedigree: (1,1,2,1,1).
- Zinc [emissions to air, low. pop.]: 9.72e-6 kg; lognormal SD95 1.01424
  Pedigree: (1,1,2,1,1).
- Nickel [emissions to air, low. pop.]: 6.81e-7 kg; lognormal SD95 1.01424
  Pedigree: (1,1,2,1,1).
- NMVOC, non-methane volatile organic compounds, unspecified origin [emissions to air, low. pop.]: 0.0227 kg; lognormal SD95 1.06845
  Pedigree: (1,1,2,1,1).
- Carbon dioxide, fossil [emissions to air, low. pop.]: 30.3 kg; lognormal SD95 1.01425
  Pedigree: (1,1,2,1,1).
- Dioxin, 2,3,7,8 Tetrachlorodibenzo-p- [emissions to air, low. pop.]: 5.81e-13 kg; lognormal SD95 1.01424
  Pedigree: (1,1,2,1,1).
- Ammonia [emissions to air, low. pop.]: 0.000194 kg; lognormal SD95 1.01424
  Pedigree: (1,1,2,1,1).
- Carbon monoxide, fossil [emissions to air, low. pop.]: 0.108 kg; lognormal SD95 1.01424
  Pedigree: (1,1,2,1,1).
- Benzo(a)pyrene [emissions to air, low. pop.]: 2.91e-7 kg; lognormal SD95 1.01424
  Pedigree: (1,1,2,1,1).
- Nitrogen oxides [emissions to air, low. pop.]: 0.186 kg; lognormal SD95 1.62468
  Pedigree: (1,1,2,1,1).
- Particulates, > 10 um [emissions to air, low. pop.]: 0.000455 kg; lognormal SD95 1.0143
  Pedigree: (1,1,2,1,1).

## Sources
- Werner F., 2017, 2017 - LCI wood and wood based products - Werner, Project Report, 0, Environment & Development, Zuerich, CH
