# Complex Set Top Boxes (CSTB), for customer premise equipment (CPE)

Dataset: EcoSpold 1, unit process
Functional unit: 1 p
Category: electronics / internet network
Geography: CH
Time period: 2023-01 to 2029-12
Synonyms: Übertragungsnetz; Nutzung; CSTB
Generated by: Lugas Raka Adrianto, Maulana Permana Ajie, Didier Beloin-Saint-Pierre
accessRestrictedTo: 0
copyright: false

## General comment
The data set represents the CSTB networks in Switzerland;

## Included processes
Dataset is based on an average of 6 different complex set top boxes (CSTB) types. Power supply unit assumed to be 1.5019 kg/p (UVEK) and router to be 0.58 kg/pcs (UVEK). HDD weight is assumed to be 0.45 kg/p (UVEK). Total weight is therefore 1.42 kg. The functional unit = 1 GB.

## Geography
Data for Swiss networks

## Technology
Swiss use CSTB transmission networks.

## Reference product
- Complex Set Top Boxes (CSTB), for customer premise equipment (CPE) [CH]: 1 p

## Inputs from technosphere
All rows: lognormal SD95 1.26
- Power supply unit, at plant [GLO]: 0.0803 p
  (2,3,3,2,2,5,BU:1.06)
- Printed wiring board, surface mounted, unspec., Pb free, at plant [GLO]: 0.00176 kg
  (2,3,3,2,2,5,BU:1.06)
- Printed wiring board, through-hole mounted, unspec., Pb free, at plant [GLO]: 0.00176 kg
  (2,3,3,2,2,5,BU:1.06)
- Cable, three-conductor cable, at plant [GLO]: 0.00148 m
  (2,3,3,2,2,5,BU:1.06)
- Steel, low-alloyed, at plant [RER]: 0.00526 kg
  (2,3,3,2,2,5,BU:1.06)
- Polyethylene, HDPE, granulate, at plant [RER]: 0.00045 kg
  (2,3,3,2,2,5,BU:1.06)
- Polypropylene, granulate, at plant [RER]: 0.00045 kg
  (2,3,3,2,2,5,BU:1.06)
- Polyvinylchloride, at regional storage [RER]: 0.00045 kg
  (2,3,3,2,2,5,BU:1.06)
- Injection moulding [RER]: 0.00135 kg
  (2,3,3,2,2,5,BU:1.06)
- Hot rolling, steel [RER]: 0.00526 kg
  (2,3,3,2,2,5,BU:1.06)
- HDD, desktop computer, at plant [GLO]: 1.3 p
  (2,3,3,2,2,5,BU:1.06)

## Sampling procedure
Literature & own estimations

## Extrapolations
Average technology

## Sources
- Raka Adrianto L., Permana Ajie M., Beloin-Saint-Pierre D., 2024, 2024 - LCI ICT sector - Raka Adrianto, Empa, St. Gallen, CH

## Validation
Proof reading validation: Passed, Other validation: none, Validator: Mischa Zschokke, Company: Carbotech, Country: CH
