# Sweetening, natural gas

Dataset: EcoSpold 1, unit process
Functional unit: 1 m3
Category: fuels / natural gas\produced gas\processes
Geography: DE
Time period: 2000-01 to 2000-12
Production volume: 4.8E9 Sm3 natural gas, 0.7 E9 kg Sulphur
Share of production covered: 50 %
Generated by: Mireille Faist Emmenegger
accessRestrictedTo: 0
copyright: true

## General comment
Data is based on the environmental report of the plant of Grossenkneten.;

## Included processes
Sweetening of sour gas with average 10 Vol.-% of H2S. The data refers to 1 m3 output gas

## Technology
The data is taken out the BEB environmental report 2000. The plant in Grossenkneten is operational since 1972 and is according to BEB one of the biggest and environmental friendliest of the world. It eliminates sulphur compounds to 99.99% from gas. The connected sulphur extraction plant has an extraction rate of 99.8%. The production in Grossenkneten is 4.8 Mrd. m3 gas per year. Sour gas with less as 1% H2S (lean gas) is treated with the Purisol process (physically), sour gas with more sulphur is treated chemically. The solutions used for the gas scrubbing are regenerated and warmed up to 130 °C. By this process a gas mix of H2S and CO2 is released. Subsequently H2S is transformed in elementary sulphur and water in a thermal process by 1"000-2"000°C and in a three-stage catalytic part.

## Time period
Average of 5 last years is used (1996-2000). Emissions per m3 were stable.

## Reference product
- Sweetening, natural gas [DE]: 1 m3
  GERMANY

## Inputs from technosphere
- Production plant, natural gas [GLO]: 3.944e-13 p; lognormal SD95 1.0541
  (1,2,1,1,1,1); environmental report
- Natural gas, at production onshore [DE]: 0.032503 m3; lognormal SD95 1.0541
  (1,2,1,1,1,1); environmental report
- Chemicals organic, at plant [GLO]: 2.6504e-6 kg; lognormal SD95 2.3293
  (5,5,2,3,5,5); estimate
- Sour gas, burned in gas turbine, production, MJ [NO]: 0.9438 MJ; lognormal SD95 1.0541
  (1,2,1,1,1,1); environmental report
- Transport, freight, rail [RER]: 1.5902e-6 tkm; lognormal SD95 2.09
  (4,5,na,na,na,na); standard distance
- Transport, freight, lorry, fleet average [RER]: 2.6504e-7 tkm; lognormal SD95 2.09
  (4,5,na,na,na,na); standard distance

## Emissions to nature
- Carbon monoxide, fossil [emissions to air, low. pop.]: 0.0003264 kg; lognormal SD95 5.0006
  (1,2,1,1,1,1); environmental report
- NMVOC, non-methane volatile organic compounds, unspecified origin [emissions to air, low. pop.]: 0.004 kg; lognormal SD95 2.0006
  (1,2,1,1,1,1); environmental report
- Methane, fossil [emissions to air, low. pop.]: 2e-5 kg; lognormal SD95 1.5007
  (1,2,1,1,1,1); environmental report
- Sulfur dioxide [emissions to air, low. pop.]: 0.00072133 kg; lognormal SD95 1.0541
  (1,2,1,1,1,1); environmental report
- Nitrogen oxides [emissions to air, low. pop.]: 3.488e-5 kg; lognormal SD95 1.5007
  (1,2,1,1,1,1); environmental report
- Carbon dioxide, fossil [emissions to air, low. pop.]: 0.1489 kg; lognormal SD95 1.0541
  (1,2,1,1,1,1); environmental report, emissions from energy use subtracted

## Sampling procedure
Data is based on environmental report. No information about the sampling procedure.

## Extrapolations
Data for Germany are extrapolated out of the data for the sweetening plant Grossenkneten.

## Sources
- Faist Emmenegger M., Heck T., Jungbluth N., Tuchschmid M., 2007, 2007 - Natural gas - Faist-Emmeneger, Sachbilanzen von Energiesystemen. Final report No. 6 ecoinvent data v2.0, 6, Swiss Centre for LCI, PSI, ESU-services Ltd., Duebendorf and Villigen, CH
Faist Emmenegger, M., Heck, T., Jungbluth, N. (2007) Erdgas. Sachbilanzen von Energiesystemen. Final report No. 6 ecoinvent data v2.0. Editors: Dones R.. Volume: 6. Swiss Centre for LCI, PSI. Dübendorf and Villigen, CH.
Type: Measurement on site
Source: CD-ROM
First author: Faist Emmenegger, M.
Other authors: Heck, T., Jungbluth, N.
Year: 2007
Name of editors: Dones R.
Title of anthology: Sachbilanzen von Energiesystemen. Final report No. 6 ecoinvent data v2.0
Place of publication: Dübendorf and Villigen, CH
Publisher: Swiss Centre for LCI, PSI
Volume No: 6

## Validation
Proof reading validation: passed; Other validation: none;
