# Substation, offshore, 1005MW offshore wind farm

Dataset: EcoSpold 1, unit process, infrastructure
Functional unit: 1 unit
Category: wind power / production of components
Geography: RER
Time period: 2024 to 2024
Share of production covered: 100 %
Generated by: Hanna Kroehnert
accessRestrictedTo: 0
copyright: true

## Included processes
Offshore substation of a 1005 MW offshore wind farm. Included processes: manufacturing, transports, installation, replacements, decommission and waste treatement. Calculated for FU of 1p.
Data are based on a fictitious offshore wind farm consisting of 67 wind turbines with a nominal capacity of 15 MW, as defined in the Renewable Energy Material Property Database, REMPD.

Main data source for material composition:
Renewable Energy Material Property Database, REMPD (Cooperman et al., 2023)

## Reference product
- Substation, offshore, 1005MW offshore wind farm [RER]: 1 unit

## Inputs from technosphere
- Chromium, at regional storage [RER]: 5469 kg; lognormal SD95 1.1466
  (2,3,3,2,1,3,BU:1.05); Input based on Cooperman et al. (2023) and (Gaertner et al., 2020)
- Cobalt, at plant [GLO]: 146.58 kg; lognormal SD95 1.1466
  (2,3,3,2,1,3,BU:1.05); Input based on Cooperman et al. (2023) and (Gaertner et al., 2020)
- Copper, at regional storage [RER]: 82245 kg; lognormal SD95 1.1466
  (2,3,3,2,1,3,BU:1.05); Input based on Cooperman et al. (2023) and (Gaertner et al., 2020)
- Gallium, semiconductor-grade, at regional storage [RER]: 1.6017 kg; lognormal SD95 1.1466
  (2,3,3,2,1,3,BU:1.05); Input based on Cooperman et al. (2023) and (Gaertner et al., 2020)
- Pig iron, at plant [RER]: 3512.6 kg; lognormal SD95 1.1466
  (2,3,3,2,1,3,BU:1.05); Input based on Cooperman et al. (2023) and (Gaertner et al., 2020)
- Lithium, at plant [GLO]: 0.0020561 kg; lognormal SD95 1.1466
  (2,3,3,2,1,3,BU:1.05); Input based on Cooperman et al. (2023)
- Steel, low-alloyed, at plant [RER]: 7.4596e6 kg; lognormal SD95 1.1466
  (2,3,3,2,1,3,BU:1.05); Input based on Cooperman et al. (2023)
- Manganese, at regional storage [RER]: 138720 kg; lognormal SD95 1.1466
  (2,3,3,2,1,3,BU:1.05); Input based on Cooperman et al. (2023)
- Nickel, 99.5%, at plant [GLO]: 103460 kg; lognormal SD95 1.1466
  (2,3,3,2,1,3,BU:1.05); Input based on Cooperman et al. (2023)
- Tantalum, powder, capacitor-grade, at regional storage [GLO]: 21.139 kg; lognormal SD95 1.1466
  (2,3,3,2,1,3,BU:1.05); Input based on Cooperman et al. (2023)
- Lanthanum oxide, at plant [CN]: 37.099 kg; lognormal SD95 1.1466
  (2,3,3,2,1,3,BU:1.05); Input based on Cooperman et al. (2023)
- Sulphur hexafluoride, liquid, at plant [RER]: 115.78 kg; lognormal SD95 1.1466
  (2,3,3,2,1,3,BU:1.05); Input based on Cooperman et al. (2023)
- Tin, at regional storage [RER]: 9.6618 kg; lognormal SD95 1.1466
  (2,3,3,2,1,3,BU:1.05); Input based on Cooperman et al. (2023)
- Zinc, primary, at regional storage [RER]: 1161.9 kg; lognormal SD95 1.1466
  (2,3,3,2,1,3,BU:1.05); Input based on Cooperman et al. (2023)
- Copper product manufacturing, average metal working [RER]: 82245 kg; lognormal SD95 1.1466
  (2,3,3,2,1,3,BU:1.05); Input based on Cooperman et al. (2023)
- Sheet rolling, steel [RER]: 7.4596e6 kg; lognormal SD95 1.1466
  (2,3,3,2,1,3,BU:1.05); Input based on Cooperman et al. (2023)
- Transport, freight, lorry, fleet average [RER]: 1.5589e6 tkm; lognormal SD95 2.0675
  (4,3,3,1,1,3,BU:2); Includes the transportation of components to port of installation.
- Transport, freight, lorry, diesel, 26t gross weight, 2010, EURO-V, regional delivery [RER]: 1.1592e6 tkm; lognormal SD95 2.0675
  (4,3,3,1,1,3,BU:2); Includes the transportation of materials to component manufacturing site and components to waste treatement site.
- Transport, transoceanic freight ship [OCE]: 4.2842e8 tkm; lognormal SD95 2.2975
  (4,3,3,1,4,3,BU:2); Includes the transportation of components to installation port and vessel activiy for installation and decommissioning.
- Operation, freight train, diesel [RER]: 1.559e6 tkm; lognormal SD95 2.0675
  (4,3,3,1,1,3,BU:2); Includes the transportation of components to port of installation.
- Diesel, burned in building machine, average [CH]: 41498 MJ; lognormal SD95 2.2975
  (4,3,3,1,4,3,BU:2); Refers to port crane operation during installation and decommissioning.
- Recycling steel and iron [RER]: 7.1681e6 kg; lognormal SD95 1.2748
  (2,4,3,3,3,3,BU:1.05); Own calculation; recycling of steel and iron; assumed recycling rate: 95%
- Disposal, steel, 0% water, to construction waste landfill [CH]: 377270 kg; lognormal SD95 1.2748
  (2,4,3,3,3,3,BU:1.05); Own calculation; landfill of steel and iron; assumed landfill rate: 5%
- Disposal, plastics, mixture, 15.3% water, to municipal incineration [CH]: 18.547 kg; lognormal SD95 1.2748
  (2,4,3,3,3,3,BU:1.05); Own calculation; incineration of plastic materials; assumed incineration rate: 50%
- Disposal, plastics, mixture, 15.3% water, to sanitary landfill [CH]: 18.547 kg; lognormal SD95 1.2748
  (2,4,3,3,3,3,BU:1.05); Own calculation; landfill of plastic materials; assumed landfill rate: 50%
- Disposal, inert material, 0% water, to sanitary landfill [CH]: 249110 kg; lognormal SD95 1.2748
  (2,4,3,3,3,3,BU:1.05); Own calculation; landfill of remaining materials (which are not classified as steel and iron, aluminum, copper or plastics); assumed landfill rate 100%

## Sources
- Kroehnert H., Frehner A., Stucki M., 2025, 2025 - LCI wind Energy - Kroehnert, Project report, 0, ZHAW, Waedenswil, CH

## Validation
22.07.2025
"S:\pools\n\N-IUNR-FG-LCA\Projekte\Wind LCA\LCI-Update\Sachbilanz"
