# Uranium natural, at open pit mine

Dataset: EcoSpold 1, unit process
Functional unit: 1 kg
Category: fuels / uranium\enriched
Geography: BR
Time period: 2011-01 to 2011-12
Generated by: Gabor Doka
accessRestrictedTo: 0
copyright: true

## General comment
PSI data (BFE project 407, Christian Bauer, April 2012).;

## Technology
Since commercial production began only in 2001, one can assume the facilities to be modern

## Reference product
- Uranium natural, at open pit mine [BR]: 1 kg
  BRAZIL

## Inputs from technosphere
- Electricity, medium voltage, at grid [BR]: 4.8 kWh; lognormal SD95 1
  there must be a mistake in the data received from Caetite: electricity consumption should be MWh, mWh seems way too small
- Transport, freight, lorry, 32t-40t gross weight, fleet average [RER]: 3.5 tkm
  rough estimate: 800km
- Uranium open pit mine [US]: 1.23e-7 p
  400 tons U3O8 /year with a lifetime of 10 years
- Blasting [RER]: 0.8 kg; lognormal SD95 1
  Data specifies the following:
  - emulsion : 0.46 kg/kgU
  - grainned: 0.34 kg/kgU
- Diesel, burned in building machine, average [CH]: 58.5 MJ
  specific data for BR (Caetité); assumption: 50% of total thermal energy; 89% U recovery in mill
- Heavy fuel oil, burned in industrial furnace 1MW, non-modulating [RER]: 58.5 MJ
  (same comment as for Diesel, burned in building machine, average)

## Inputs from nature
- Transformation, from mineral extraction site [resources, land]: 0.27 m2
- Occupation, mineral extraction site [resources, land]: 5.4 m2a
  occupation: 20 years
- Uranium [resources, in ground]: 1.12 kg
  overall recovery factor for mining and milling in Brazil: 0.8
  50% of losses allocated to mining
- Transformation, to unknown [resources, land]: 0.27 m2
- Water, process, unspecified natural origin/kg [resources, land]: 24.6 kg
- Transformation, to mineral extraction site [resources, land]: 0.27 m2
- Transformation, from unknown [resources, land]: 0.27 m2
  Caetite data (IAEA report) - total area for mine&mill: 120ha
  assumption: 90% mine, 10% mill

## Emissions to nature
- Particulates, > 10 um [emissions to air, low. pop.]: 0.056 kg
  v2.2
- Magnesium [emissions to water, river]: 0.11 kg
  v2.2
- Thorium-230 [emissions to water, river]: 460 kBq
  v2.2
- Radium-226 [emissions to water, river]: 5000 kBq
  v2.2
- Uranium alpha [emissions to water, river]: 220 kBq
  v2.2
- Vanadium [emissions to water, river]: 0.0065 kg
  v2.2
- Uranium alpha [emissions to air, low. pop.]: 0.094 kBq
  v2.2
- Barium [emissions to water, river]: 0.0019 kg
  v2.2
- Arsenic [emissions to water, river]: 9.3e-5 kg
  v2.2
- Nitrate [emissions to water, river]: 0.0021 kg
  v2.2
- Sulfate [emissions to water, river]: 48 kg
  v2.2
- Radon-222 [emissions to air, low. pop.]: 130000 kBq
  v2.2
- Selenium [emissions to water, river]: 0.00019 kg
  v2.2
- Cadmium [emissions to water, river]: 9.3e-5 kg
  v2.2
- Ammonium, ion [emissions to water, river]: 0.0085 kg
  v2.2
- Lead [emissions to water, river]: 0.018 kg
  v2.2
- Iron [emissions to water, river]: 0.034 kg
  v2.2
- Zinc [emissions to water, river]: 0.0012 kg
  v2.2
- Aluminium [emissions to water, river]: 0.0031 kg
  v2.2
- Suspended solids, unspecified [emissions to water, river]: 2.1 kg
  v2.2
- Manganese [emissions to water, river]: 0.069 kg
  v2.2
- Molybdenum [emissions to water, river]: 0.0016 kg
  v2.2
- Chloride [emissions to water, river]: 0.86 kg
  v2.2

## Sampling procedure
Sampling procedure: Data from Caetite

## Sources
- Bauer C., Frischknecht R., Eckle P., Flury K., Neal T., Papp K., Schori S., Simons A., Stucki M., Treyer K., 2012, 2012 - LCA electricity generation in Switzerland - Uster, -, 407, Swiss Centre for LCI, ESU-services Ltd., PSI, Uster and Villigen, CH
Ch. Bauer, Frischknecht (2012) Umweltauswirkungen Strom. Volume: 407. PSI. Uster und Villigen, CH.
Type: Separate publication
Source: CD-ROM
First author: Ch. Bauer
Other authors: Frischknecht
Year: 2012
Place of publication: Uster und Villigen, CH
Publisher: PSI
Volume No: 407

## Validation
Proof reading validation: Unknown; Other validation: \\Server\E\ESU-Docs\Projektablage\407 Update LCI Energiesysteme\EcoSpold\import in unit process library\[uranium natural.xls]X-Process;
