# Chromium steel 18/8, at plant

Dataset: EcoSpold 1, unit process
Functional unit: 1 kg
Category: metals / ferro
Geography: RER
Time period: 2000-01 to 2000-12
Generated by: Hans-Joerg Althaus
accessRestrictedTo: 0
copyright: true

## General comment
represents Average of World and European production mix. This is assumed to correspond to the consumption mix in Europe;
Synonyms: high alloyed steel, stainless steel;

## Included processes
Mix of differently produced steels and hot rolling

## Geography
Data relate to plants in the EU

## Technology
technology mix

## Reference product
- Chromium steel 18/8, at plant [RER]: 1 kg
  Europe

## Inputs from technosphere
- Steel, electric, chromium steel 18/8, at plant [RER]: 0.37 kg; lognormal SD95 1.1094
  (2,3,2,3,1,3,3)
- Hot rolling, steel [RER]: 1 kg; lognormal SD95 1
  relates directly to output
- Steel, converter, chromium steel 18/8, at plant [RER]: 0.63 kg; lognormal SD95 1.1094
  (2,3,2,3,1,3,3)

## Sampling procedure
literature, statistics

## Sources
- Classen M., Althaus H.-J., Blaser S., Scharnhorst W., Tuchschmid M., Jungbluth N., Faist Emmenegger M., 2009, 2009 - LCI metals - Classen, Final report ecoinvent data v2.1, 10, Swiss Centre for LCI, Empa, ESU-services Ltd., Duebendorf, CH
Classen M., Althaus H.-J., Blaser S., Doka G., Jungbluth N., Tuchschmid M. (2008) Life Cycle Inventories of Metals. Final report ecoinvent data v2.1. Volume: 10. Issue: 0. Swiss Centre for LCI, Empa - TSL. Dübendorf, CH.
Type: Measurement on site
Source: CD-ROM
First author: Classen M.
Other authors: Althaus H.-J., Blaser S., Doka G., Jungbluth N., Tuchschmid M.
Year: 2008
Title of anthology: Final report ecoinvent data v2.1
Place of publication: Dübendorf, CH
Publisher: Swiss Centre for LCI, Empa - TSL
Volume No: 10
Issue No: 0

## Validation
Proof reading validation: passed; Other validation: none;
