# Flat glass plant

Dataset: EcoSpold 1, unit process, infrastructure
Functional unit: 1 p
Category: glass / construction\infrastructure
Geography: RER
Time period: 2000-01 to 2000-12
Generated by: Daniel Kellenberger
accessRestrictedTo: 0
copyright: true

## General comment
The lifespan of the buildings and the land occupation is assumed to be 50 years and of the equipment (furnace (exkl. fireproof brick), float bath, annealing lehr, warehouse, stacking) 20 years. The module is based on a yearly production volume of 83'000 t/a;
Synonyms: Flachglasfabrik, Flach, plate;

## Included processes
includes the infrastructure (multi-storey buildings and halls, tin initial load and equipment) and the land-use (built and not built areas)

## Geography
Data from one company in Germany is extrapolated to RER. For some exchanges CH-modules are used as proxy

## Technology
Assumed data for average European plant

## Reference product
- Flat glass plant [RER]: 1 p
  Europe

## Inputs from technosphere
- Tin, at regional storage [RER]: 200000 kg; lognormal SD95 1.26
  (3,4,1,3,1,5);
- Building, hall, steel construction [CH]: 48300 m2; lognormal SD95 3.14
  (1,5,1,3,3,5);
- Building, multi-storey [RER]: 84000 m3; lognormal SD95 3.14
  (1,5,1,3,3,5);
- Industrial machine, heavy, unspecified, at plant [RER]: 300000 kg; lognormal SD95 5
  Estimation of standard deviation

## Inputs from nature
- Transformation, from unknown [resources, land]: 128000 m2; lognormal SD95 2.14
  (1,5,1,3,3,5);
- Transformation, to traffic area, road embankment [resources, land]: 21400 m2; lognormal SD95 2.14
  (1,5,1,3,3,5);
- Transformation, to industrial area, built up [resources, land]: 73200 m2; lognormal SD95 2.14
  (1,5,1,3,3,5);
- Transformation, to industrial area, vegetation [resources, land]: 54900 m2; lognormal SD95 2.14
  (1,5,1,3,3,5);
- Occupation, industrial area, built up [resources, land]: 3.66e6 m2a; lognormal SD95 1.67
  (1,5,1,3,3,5);
- Occupation, industrial area, vegetation [resources, land]: 2.74e6 m2a; lognormal SD95 1.67
  (1,5,1,3,3,5);
- Occupation, traffic area, road embankment [resources, land]: 1.07e6 m2a; lognormal SD95 1.67
  (1,5,1,3,3,5);

## Sampling procedure
Questionnaire (one German company)

## Extrapolations
See geography

## Sources
- Kellenberger D., Althaus H.-J., Jungbluth N., Kuenniger T., Lehmann M., Thalmann P., 2007, 2007 - LCI building products - Kellenberger, Final report ecoinvent data v2.0, 7, Swiss Centre for LCI, Empa - TSL, ESU-services Ltd., Bau- und Umweltchimie, Duebendorf, CH
Kellenberger D., Althaus H.-J., Jungbluth N., Künniger T. (2007) Life Cycle Inventories of Building Products. Final report ecoinvent data v2.0. Volume: 7. Swiss Centre for LCI, Empa - TSL. Dübendorf, CH.
Type: Measurement on site
Source: CD-ROM
First author: Kellenberger D.
Other authors: Althaus H.-J., Jungbluth N., Künniger T.
Year: 2007
Title of anthology: Final report ecoinvent data v2.0
Place of publication: Dübendorf, CH
Publisher: Swiss Centre for LCI, Empa - TSL
Volume No: 7

## Validation
Proof reading validation: passed; Other validation: none;
