# xx Dried roughage store, air dried, solar, operation

Dataset: EcoSpold 1, unit process
Functional unit: 1 kg
Category: processing, obsolete / agricultural, obsolete\operations
Geography: CH
Time period: 2000-01 to 2000-12
Production volume: Existing dried roughage stores with solar air dry in CH in 1996: 2140 units.
Generated by: Dunja Dux
accessRestrictedTo: 0
copyright: true

## General comment
The module includes the use of energy and auxiliary materials for the operation of lighting, impeller blower and ventilator. The functional unit is kg DM hay (DM: dry matter).;

## Included processes
The inventory takes into account the energy and auxiliary materials like water, lubricating oil and cleaning agents. Also included is the use of the infrastructure. Not taken into account were the direct emission of the animal husbandry, fodder production and produced waste water.

## Geography
The inventory applies for Swiss agricultural buildings only, because of the solid method of construction.

## Technology
The use of energy and auxiliary materials are calculated for the conditions defined in the infrastructure-module with literature data and experts knowledge.

## Time period
Period indicated in the reference.

## Reference product
- xx Dried roughage store, air dried, solar, operation [CH]: 1 kg
  SWITZERLAND

## Inputs from technosphere
- Dried roughage store, air dried, solar [CH]: 0.000253 m3; lognormal SD95 3
  (2,2,1,1,1,na)
- Electricity, low voltage, at grid [CH]: 0.0891 kWh; lognormal SD95 1.07
  (2,2,1,1,1,na)

## Inputs from nature
- Energy, solar, converted [resources, in air]: 16 MJ; lognormal SD95 1.07
  (2,2,1,1,1,na)

## Emissions to nature
- Heat, waste [emissions to air, low. pop.]: 0.321 MJ; lognormal SD95 1.07
  (2,2,1,1,1,na)

## Sampling procedure
In the use of energy and auxiliary materials are big differences between the farms. The inventory is based on mean values from CH and WEU.

## Sources
- Nemecek T., Kaegi T., 2007, 2007 - LCI agricultural prod. systems - Nemecek, Ecoinvent report version 2.0, 15, Swiss Centre for LCI, ART, Duebendorf and Zuerich, CH
Nemecek, T., Kägi, T., Blaser, S. (2007) Life Cycle Inventories of Agricultural Production Systems. Ecoinvent report version 2.0. Editors: 0. Volume: 15. Swiss Centre for LCI, ART. Duebendorf and Zurich, CH.
Type: Measurement on site
Source: CD-ROM
First author: Nemecek, T.
Other authors: Kägi, T., Blaser, S.
Year: 2007
Name of editors: 0
Title of anthology: Ecoinvent report version 2.0
Place of publication: Duebendorf and Zurich, CH
Publisher: Swiss Centre for LCI, ART
Volume No: 15

## Validation
Proof reading validation: Passed.; Other validation: none;
