# Pyretroid-compounds, at regional storehouse

Dataset: EcoSpold 1, unit process
Functional unit: 1 kg
Category: chemicals / pesticides
Geography: RER
Time period: 1987-01 to 1987-12
Share of production covered: 100 %
Generated by: Juergen Sutter
accessRestrictedTo: 0
copyright: true

## General comment
Production of pyrethroid-compounds including materials, energy uses, infrastructure and emissions.;

## Technology
pesticides

## Time period
Time of publications

## Reference product
- Pyretroid-compounds, at regional storehouse [RER]: 1 kg
  Europe

## Inputs from technosphere
- Transport, freight, lorry, fleet average [RER]: 1.3674 tkm; lognormal SD95 2.095
  (4,5,na,na,na,na); Standard distances
- Chemical plant, organics [RER]: 3.3018e-9 p; lognormal SD95 3.0909
  (4,5,na,na,na,na); Estimation
- Ammonia, liquid, at regional storehouse [RER]: 0.37407 kg; lognormal SD95 1.3765
  (4,5,1,1,1,5); Stoechiometric calculation
- Carbon tetrachloride, at plant [RER]: 0.26217 kg; lognormal SD95 1.3765
  (4,5,1,1,1,5); Stoechiometric calculation
- Hydrochloric acid, 30% in H2O, at plant [RER]: 0.10355 kg; lognormal SD95 1.3765
  (4,5,1,1,1,5); Stoechiometric calculation
- Formaldehyde, production mix, at plant [RER]: 0.81069 kg; lognormal SD95 1.3765
  (4,5,1,1,1,5); Stoechiometric calculation
- Hydrogen fluoride, at plant [GLO]: 0.016535 kg; lognormal SD95 1.3765
  (4,5,1,1,1,5); Stoechiometric calculation
- Phenol, at plant [RER]: 0.36288 kg; lognormal SD95 1.3765
  (4,5,1,1,1,5); Stoechiometric calculation
- Sodium hydroxide, 50% in H2O, production mix, at plant [RER]: 0.86578 kg; lognormal SD95 1.3765
  (4,5,1,1,1,5); Stoechiometric calculation
- Acetonitrile, at plant [RER]: 0.051882 kg; lognormal SD95 1.3765
  (4,5,1,1,1,5); Stoechiometric calculation
- Ethanol from ethylene, at plant [RER]: 0.25397 kg; lognormal SD95 1.3765
  (4,5,1,1,1,5); Stoechiometric calculation
- Chlorine, liquid, production mix, at plant [RER]: 0.8299 kg; lognormal SD95 1.3765
  (4,5,1,1,1,5); Stoechiometric calculation
- Water, decarbonised, at plant [RER]: 0.056598 kg; lognormal SD95 1.3765
  (4,5,1,1,1,5); Stoechiometric calculation
- Hydrogen cyanide, at plant [RER]: 0.084896 kg; lognormal SD95 1.3765
  (4,5,1,1,1,5); Stoechiometric calculation
- Transport, freight, rail [RER]: 8.2046 tkm; lognormal SD95 2.095
  (4,5,na,na,na,na); Standard distances
- Electricity, medium voltage, production ENTSO-E, at grid: 2.7511 kWh; lognormal SD95 1.3765
  (4,5,1,1,1,5); Estimation
- Butene, mixed, at plant [RER]: 0.06732 kg; lognormal SD95 1.3765
  (4,5,1,1,1,5); Stoechiometric calculation
- Heat, unspecific, in chemical plant [RER]: 69.38 MJ; lognormal SD95 1.3765
  (4,5,1,1,1,5); Estimation
- Toluene, liquid, at plant [RER]: 0.37785 kg; lognormal SD95 1.3765
  (4,5,1,1,1,5); Stoechiometric calculation

## Inputs from nature
- Water, cooling, unspecified natural origin/m3 [resources, in water]: 0.19811 m3; lognormal SD95 1.3765
  (4,5,1,1,1,5); Estimation
- Water, salt, sole [resources, in water]: 60.139 m3; lognormal SD95 1.3765
  (4,5,1,1,1,5); Stoechiometric calculation
- Bromine [resources, in water]: 1.3832 kg; lognormal SD95 1.3765
  (4,5,1,1,1,5); Stoechiometric calculation

## Emissions to nature
- Formaldehyde [emissions to water, river]: 0.0073753 kg; lognormal SD95 3.0909
  (4,5,na,na,na,na); Estimation
- Hydrogen [emissions to air, high. pop.]: 1.2577e-5 kg; lognormal SD95 1.6169
  (4,5,na,na,na,na); Estimation
- 2-Methyl-1-propanol [emissions to water, river]: 0.00032314 kg; lognormal SD95 3.0909
  (4,5,na,na,na,na); Estimation
- Ammonium, ion [emissions to water, river]: 0.0017955 kg; lognormal SD95 1.6169
  (4,5,na,na,na,na); Estimation
- Toluene [emissions to water, river]: 0.0018137 kg; lognormal SD95 3.0909
  (4,5,na,na,na,na); Estimation
- 2-Methyl-1-propanol [emissions to air, high. pop.]: 0.00013464 kg; lognormal SD95 1.6169
  (4,5,na,na,na,na); Estimation
- Chloride [emissions to water, river]: 0.070672 kg; lognormal SD95 3.0909
  (4,5,na,na,na,na); Estimation
- Toluene [emissions to air, high. pop.]: 0.0007557 kg; lognormal SD95 1.6169
  (4,5,na,na,na,na); Estimation
- Fluoride [emissions to water, river]: 0.0038238 kg; lognormal SD95 1.6169
  (4,5,na,na,na,na); Estimation
- Formaldehyde [emissions to air, high. pop.]: 0.0016214 kg; lognormal SD95 1.6169
  (4,5,na,na,na,na); Estimation
- Bromide [emissions to water, river]: 1.3772 kg; lognormal SD95 5.1037
  (4,5,na,na,na,na); Estimation
- Carbon dioxide, fossil [emissions to air, high. pop.]: 1.028 kg; lognormal SD95 1.3001
  (4,5,na,na,na,na); Estimation
- Phenol [emissions to water, river]: 0.0017418 kg; lognormal SD95 3.0909
  (4,5,na,na,na,na); Estimation
- Heat, waste [emissions to air, high. pop.]: 9.904 MJ; lognormal SD95 1.3765
  (4,5,1,1,1,5); Calculated from the electricity input
- Ammonia [emissions to air, high. pop.]: 0.00074814 kg; lognormal SD95 1.3713
  (4,5,na,na,na,na); Estimation
- Ethanol [emissions to water, river]: 0.0062351 kg; lognormal SD95 3.0909
  (4,5,na,na,na,na); Estimation
- Ethanol [emissions to air, high. pop.]: 0.00050794 kg; lognormal SD95 1.6169
  (4,5,na,na,na,na); Estimation
- Sodium [emissions to water, river]: 0.3539 kg; lognormal SD95 5.1037
  (4,5,na,na,na,na); Estimation
- Phenol [emissions to air, high. pop.]: 0.00072575 kg; lognormal SD95 1.6169
  (4,5,na,na,na,na); Estimation
- Water [emissions to water, unspecified]: 188.204 kg; lognormal SD95 2.5196
  (5,5,5,5,5,BU:1.05); All uncertainty-values set to 5.0 by default. Balance of input water

## Sampling procedure
Literature data

## Extrapolations
Transports and emissions are modelled with standard methods.

## Sources
- Nemecek T., Kaegi T., 2007, 2007 - LCI agricultural prod. systems - Nemecek, Ecoinvent report version 2.0, 15, Swiss Centre for LCI, ART, Duebendorf and Zuerich, CH
Nemecek, T., Kägi, T., Blaser, S. (2007) Life Cycle Inventories of Agricultural Production Systems. Ecoinvent report version 2.0. Editors: 0. Volume: 15. Swiss Centre for LCI, ART. Duebendorf and Zurich, CH.
Type: Measurement on site
Source: CD-ROM
First author: Nemecek, T.
Other authors: Kägi, T., Blaser, S.
Year: 2007
Name of editors: 0
Title of anthology: Ecoinvent report version 2.0
Place of publication: Duebendorf and Zurich, CH
Publisher: Swiss Centre for LCI, ART
Volume No: 15

## Validation
Proof reading validation: Passed.; Other validation: none;
