# Natural gas, production mix, at service station

Dataset: EcoSpold 1, unit process
Functional unit: 1 kg
Category: fuels / natural gas\gas to user
Geography: CH
Time period: 2000-01 to 2004-12
Share of production covered: 0 %
Generated by: Mireille Faist Emmenegger
accessRestrictedTo: 0
copyright: true

## General comment
This data set includes electricity requirements of a service station as well as emissions from losses. The data set represents the Swiss mix of services stations with high (92%), medium (6%) and low (2%) initial pressure. VOC emissions are calculated from gas losses and composition of Swiss natural gas.;

## Included processes
This data set includes electricity requirements of a natural gas service station as well as emissions from losses.

## Geography
Data for Switzerland

## Technology
Service station with a mix of with high (92%), medium (6%) and low (2%) initial pressure.

## Time period
personal communication

## Reference product
- Natural gas, production mix, at service station [CH]: 1 kg
  SWITZERLAND

## Inputs from technosphere
- Natural gas service station [CH]: 8.4821e-8 p; lognormal SD95 3.0611
  (2,4,1,1,1,5); Expert data for one service station
- Natural gas, high pressure, at consumer [CH]: 46.942 MJ; lognormal SD95 1.0579
  (1,2,1,1,1,2); Estimation from industry expert
- Natural gas, low pressure, at consumer [CH]: 0.95801 MJ; lognormal SD95 1.0579
  (1,2,1,1,1,2); Estimation from industry expert
- Electricity, medium voltage, at grid [CH]: 0.22746 kWh; lognormal SD95 1.0579
  (1,2,1,1,1,2); Model from industry expert

## Emissions to nature
- NMVOC, non-methane volatile organic compounds, unspecified origin [emissions to air, high. pop.]: 8.1694e-7 kg; lognormal SD95 2.0545
  (2,3,1,1,1,5); Data from industry expert
- Butane [emissions to air, high. pop.]: 1.4801e-6 kg; lognormal SD95 2.0545
  (2,3,1,1,1,5); Data from industry expert
- Heat, waste [emissions to air, high. pop.]: 0.81886 MJ; lognormal SD95 1.0579
  (1,2,1,1,1,2); Average from literature
- Carbon dioxide, fossil [emissions to air, high. pop.]: 2.8147e-6 kg; lognormal SD95 2.0545
  (2,3,1,1,1,5); Data from industry expert
- Propane [emissions to air, high. pop.]: 3.2616e-6 kg; lognormal SD95 2.0545
  (2,3,1,1,1,5); Data from industry expert
- Methane, fossil [emissions to air, high. pop.]: 0.00017652 kg; lognormal SD95 2.0545
  (2,3,1,1,1,5); Data from industry expert
- Ethane [emissions to air, high. pop.]: 8.552e-6 kg; lognormal SD95 2.0545
  (2,3,1,1,1,5); Data from industry expert

## Sources
- Jungbluth N., Chudacoff M., Dauriat A., Dinkel F., Doka G., Faist Emmenegger M., Gnansounou E., Kljun N., Spielmann M., Stettler C., Sutter J., 2007, 2007 - LCI bioenergy - Jungbluth, Final report ecoinvent data v2.0, 17, Swiss Centre for LCI, ESU-services Ltd., Duebendorf and Uster, CH
Jungbluth N., Chudacoff M., Dauriat A., Dinkel F., Doka G., Faist Emmenegger M., Gnansounou E., Kljun N., Spielmann M., Stettler C., Sutter J. (2007) Life Cycle Inventories of Bioenergy. Final report ecoinvent data v2.0. Volume: 17. Swiss Centre for LCI, ESU. Duebendorf and Uster, CH.
Type: Measurement on site
Source: CD-ROM
First author: Jungbluth N.
Other authors: Chudacoff M., Dauriat A., Dinkel F., Doka G., Faist Emmenegger M., Gnansounou E., Kljun N., Spielmann M., Stettler C., Sutter J.
Year: 2007
Title of anthology: Final report ecoinvent data v2.0
Place of publication: Duebendorf and Uster, CH
Publisher: Swiss Centre for LCI, ESU
Volume No: 17

## Validation
Proof reading validation: Passed.; Other validation: none;
