# Chlorodifluoromethane, at plant

Dataset: EcoSpold 1, unit process
Functional unit: 1 kg
Category: chemicals / organic
Geography: NL
Time period: 2000-01 to 2000-12
Production volume: The worldwide production capacity in 1987 for fluoroplastics was ca. 45 000t.
Generated by: Matthias Stucki
accessRestrictedTo: 0
copyright: true

## General comment
Inventory for a chemical. Emissions of HFC-23 are much higher in the world wide average. Emission data from PRTR-database.;
CAS number: 75-45-6;
Formula: CHClF2;
Synonyms: HCFC-22, Freon 22, Algeon 22, Isotron 22, Difluorochloromethane, Monochlorodifluoromethane, Refrigerant R22, Fluorocarbon 22, Fisherbrand histo freeze(TM)-22, R-22, Freon R-22, Halocarbon 22, chlorodifluoromethane (R-22), Chlorodifluoromethane;

## Included processes
Gate to gate inventory for the production in the Netherlands, estimation for infrastructure and not including by-products.

## Geography
Plant e.g. in NL

## Technology
Chemical processing

## Reference product
- Chlorodifluoromethane, at plant [NL]: 1 kg

## Inputs from technosphere
- Electricity, medium voltage, at grid [NL]: 0.5 kWh; lognormal SD95 1.2423
  (3,3,1,1,1,5); Based on PRTR 2010
- Sodium hydroxide, 50% in H2O, production mix, at plant [RER]: 0.061562 kg; lognormal SD95 1.2621
  (3,na,3,3,1,5); Calculation in literature
- Trichloromethane, at plant [RER]: 1.6 kg; lognormal SD95 1.2423
  (3,3,1,1,1,5); Estimation based on literature values
- Disposal, refinery sludge, 89.5% water, to hazardous waste incineration [CH]: 0.0044 kg; lognormal SD95 1.3081
  (4,3,2,1,1,5); Chemical wastes, literature 1994
- Natural gas, burned in industrial furnace 1MWth [CH]: 37.513 MJ; lognormal SD95 1.2423
  (3,3,1,1,1,5); Based on PRTR 2010
- Transport, freight, rail [RER]: 1.4545 tkm; lognormal SD95 2.095
  (4,5,na,na,na,na); Standard distance 600km
- Sulphuric acid, liquid, at plant [RER]: 0.21254 kg; lognormal SD95 1.2621
  (3,na,3,3,1,5); Calculation in literature
- Disposal, municipal solid waste, 22.9% water, to municipal incineration [CH]: 0.0012 kg; lognormal SD95 1.3081
  (4,3,2,1,1,5); Other wastes, literature 1994
- Wood chips, from industry, mixed, burned in furnace 1000kW [CH]: 4.6792 MJ; lognormal SD95 1.2355
  (3,3,1,1,1,5);
- Hydrogen fluoride, at plant [GLO]: 0.55 kg; lognormal SD95 1.2423
  (3,3,1,1,1,5); Estimation based on literature values
- Transport, freight, lorry, fleet average [RER]: 0.24241 tkm; lognormal SD95 2.095
  (4,5,na,na,na,na); Standard distance 100km
- Tap water, at user [RER]: 0.95309 kg; lognormal SD95 1.2621
  (3,na,3,3,1,5); Calculation in literature
- Chemical plant, organics [RER]: 4e-10 p; lognormal SD95 3.8994
  (5,na,1,1,5,na); Generic estimation

## Emissions to nature
- Chloride [emissions to water, river]: 0.098321 kg; lognormal SD95 5.0807
  (3,na,3,3,1,5); Calculation in literature
- Hydrogen fluoride [emissions to air, high. pop.]: 0.0031006 kg; lognormal SD95 1.592
  (3,na,3,3,1,5); Based on PRTR 2010
- Fluoride [emissions to air, high. pop.]: 0.00046187 kg; lognormal SD95 2.0511
  (4,3,na,na,1,na); Based on PRTR 2010
- Methane, trifluoro-, HFC-23 [emissions to air, high. pop.]: 0.0019343 kg; lognormal SD95 1.6074
  (3,4,3,3,1,5); Based on PRTR 2010
- Hydrogen chloride [emissions to air, high. pop.]: 0.0056011 kg; lognormal SD95 1.592
  (3,na,3,3,1,5); Based on PRTR 2010
- Sodium [emissions to water, river]: 0.064611 kg; lognormal SD95 5.0807
  (3,na,3,3,1,5); Calculation in literature
- Zinc [emissions to water, river]: 4.3e-6 kg; lognormal SD95 5.071
  (3,3,2,1,1,5); Literature 1994
- Methane, chlorodifluoro-, HCFC-22 [emissions to air, high. pop.]: 0.0034468 kg; lognormal SD95 1.6074
  (3,4,3,3,1,5); Based on PRTR 2010
- Antimony [emissions to water, river]: 3.6e-5 kg; lognormal SD95 5.071
  (3,3,2,1,1,5); Literature 1994
- Chloroform [emissions to air, high. pop.]: 0.0001 kg; lognormal SD95 1.5813
  (3,3,2,1,1,5); Literature 1994
- Methane, dichlorodifluoro-, CFC-12 [emissions to air, high. pop.]: 0.00012529 kg; lognormal SD95 1.5813
  (3,3,2,1,1,5); Based on PRTR 2010
- Chloroform [emissions to water, river]: 1.1e-5 kg; lognormal SD95 3.0623
  (3,3,2,1,1,5); Literature 1994
- Hydrocarbons, unspecified [emissions to water, river]: 1e-6 kg; lognormal SD95 3.0623
  (3,3,2,1,1,5); Literature 1994
- Methane, trichlorofluoro-, CFC-11 [emissions to air, high. pop.]: 1.7585e-6 kg; lognormal SD95 1.5813
  (3,3,2,1,1,5); Based on PRTR 2010
- Methane, dichlorofluoro-, HCFC-21 [emissions to air, high. pop.]: 1.0366e-5 kg; lognormal SD95 1.5798
  (3,3,1,1,1,5); Based on PRTR 2010
- Sulfate [emissions to water, river]: 0.27767 kg; lognormal SD95 5.0807
  (3,na,3,3,1,5); Calculation in literature
- Heat, waste [emissions to air, high. pop.]: 1.8 MJ; lognormal SD95 1.2423
  (3,3,1,1,1,5); Based on PRTR 2010
- Methane, dichloro-, HCC-30 [emissions to air, high. pop.]: 0.0001036 kg; lognormal SD95 2.0511
  (4,3,na,na,1,na); Literature

## Sampling procedure
Literature, company information, stoichiometric calculations, emission database, assumptions.

## Extrapolations
from one plant

## Sources
- Jungbluth N., Stucki M., Flury K., Frischknecht R., Buesser S., 2012, 2012 - LCI photovoltaics - Jungbluth, 0, 407, ESU-services Ltd., Uster, CH
Jungbluth, N., Stucki M., Fluri K., Frischknecht R., Buesser S. (2012) Life Cycle Inventories of Photovoltaics. 0. Editors: Bauer C.. Volume: 407. ESU-services ltd.. Uster, CH.
Type: Separate publication
Source: www.esu-services.ch
First author: Jungbluth, N.
Other authors: Stucki M., Fluri K., Frischknecht R., Buesser S.
Year: 2012
Name of editors: Bauer C.
Title of anthology: 0
Place of publication: Uster, CH
Publisher: ESU-services ltd.
Volume No: 407

## Validation
Proof reading validation: 05.09.2012; Other validation: \\server\e\ESU-Docs\Projekte laufend\174 Photovoltaic, IEA Task 12\berechnung\Chemicals\PTFE\[neueingabe-PTFE-2.3-SP.xlsx]X-Process;
