# Ammonium thiocyanate, at plant

Dataset: EcoSpold 1, unit process
Functional unit: 1 kg
Category: chemicals / organic
Geography: GLO
Time period: 2000-01 to 2006-12
Share of production covered: 100 %
Generated by: Juergen Sutter
accessRestrictedTo: 0
copyright: true

## General comment
The process "ammonium thiocyanate, at plant, GLO" is modelled for the production of ammonium thiocyanate from carbon disulfide and ammonia in the world. Raw materials are modelled with a stoechiometric calculation, Energy consumptions, emissions, infrastructure and transports are calculated with standard values.;
CAS number: 001762-95-4;
Formula: NH4SCN;

## Included processes
Production of ammonium thiocyanate including materials, energy uses, infrastructure and emissions.

## Geography
The inventory is modelled for the world.

## Technology
Amination of carbon disulfide.

## Time period
Time of publications

## Reference product
- Ammonium thiocyanate, at plant [GLO]: 1 kg
  Global

## Inputs from technosphere
- Chemical plant, organics [RER]: 1e-10 p; lognormal SD95 3.0909
  (4,5,na,na,na,na); Estimation
- Heat, natural gas, at industrial furnace 1MW [CH]: 2 MJ; lognormal SD95 1.3001
  (4,5,na,na,na,na); Estimation
- Transport, freight, lorry, fleet average [RER]: 0.60752 tkm; lognormal SD95 2.095
  (4,5,na,na,na,na); Standard distances
- Natural gas, high pressure, at consumer [RER]: 5.097 MJ; lognormal SD95 1.3765
  (4,5,1,1,1,5); Stoechiometric calculation
- Transport, freight, rail [RER]: 3.6451 tkm; lognormal SD95 2.095
  (4,5,na,na,na,na); Standard distances
- Carbon disulfide, at plant [GLO]: 0.52632 kg; lognormal SD95 1.3765
  (4,5,1,1,1,5); Stoechiometric calculation
- Electricity, medium voltage, production ENTSO-E, at grid: 0.333 kWh; lognormal SD95 1.3001
  (4,5,na,na,na,na); Estimation
- Ammonia, liquid, at regional storehouse [RER]: 0.45189 kg; lognormal SD95 1.3765
  (4,5,1,1,1,5); Stoechiometric calculation

## Inputs from nature
- Water, cooling, unspecified natural origin/m3 [resources, in water]: 0.024 m3; lognormal SD95 1.3001
  (4,5,na,na,na,na); Estimation

## Emissions to nature
- DOC, Dissolved Organic Carbon [emissions to water, river]: 0.000399 kg; lognormal SD95 1.6169
  (4,5,na,na,na,na); Calculated from the water emissions
- TOC, Total Organic Carbon [emissions to water, river]: 0.000399 kg; lognormal SD95 1.6169
  (4,5,na,na,na,na); Calculated from the water emissions
- Ammonium, ion [emissions to water, river]: 0.0036151 kg; lognormal SD95 1.6169
  (4,5,na,na,na,na); Estimation
- Carbon disulfide [emissions to air, high. pop.]: 0.0010526 kg; lognormal SD95 1.6169
  (4,5,na,na,na,na); Estimation
- Sulfide [emissions to water, river]: 0.0025263 kg; lognormal SD95 1.6169
  (4,5,na,na,na,na); Estimation
- Heat, waste [emissions to air, high. pop.]: 1.1988 MJ; lognormal SD95 1.3001
  (4,5,na,na,na,na); Calculated from the electricity input
- Methane, fossil [emissions to air, high. pop.]: 0.00055402 kg; lognormal SD95 1.6169
  (4,5,na,na,na,na); Estimation
- COD, Chemical Oxygen Demand [emissions to water, river]: 0.00347 kg; lognormal SD95 1.6169
  (4,5,na,na,na,na); Calculated from the water emissions
- BOD5, Biological Oxygen Demand [emissions to water, river]: 0.00347 kg; lognormal SD95 1.6169
  (4,5,na,na,na,na); Calculated from the water emissions
- Ammonia [emissions to air, high. pop.]: 0.00090377 kg; lognormal SD95 1.3713
  (4,5,na,na,na,na); Estimation
- Carbon dioxide, fossil [emissions to air, high. pop.]: 0.026235 kg; lognormal SD95 1.3001
  (4,5,na,na,na,na); Estimation
- Water [emissions to water, unspecified]: 22.8 kg; lognormal SD95 2.5196
  (5,5,5,5,5,BU:1.05); All uncertainty-values set to 5.0 by default. Balance of input water

## Sampling procedure
Standard values

## Sources
- Sutter J., 2007, 2007 - LCI highly pure chemicals - Sutter, Final report ecoinvent Data v2.0, 19, Swiss Centre for LCI, ETH, Duebendorf and Uster, CH
Sutter, J., 0 (2007) Life Cycle Inventories of Highly Pure Chemicals. Final report ecoinvent Data v2.0. Editors: 0. Volume: 19. Swiss Centre for LCI, ETHZ. Duebendorf and St. Gallen, CH.
Type: Measurement on site
Source: CD-ROM
First author: Sutter, J.
Other authors: 0
Year: 2007
Name of editors: 0
Title of anthology: Final report ecoinvent Data v2.0
Place of publication: Duebendorf and St. Gallen, CH
Publisher: Swiss Centre for LCI, ETHZ
Volume No: 19

## Validation
Proof reading validation: passed.; Other validation: none;
