# Palladium, at regional storage

Dataset: EcoSpold 1, unit process
Functional unit: 1 kg
Category: metals / non ferro
Geography: RER
Time period: 2000-01 to 2000-12
Production volume: 54.9 t / a
Share of production covered: 92.1 %
Generated by: Mischa Classen
accessRestrictedTo: 0
copyright: true

## General comment
The consumer mix is an assembly of the primary palladium transported from ZA and RUS for consumption in Europe and secondary palladium recovered and consumed in RER according the global market share in 2002.;

## Included processes
Primary PGM transported from ZA and RU for consumption in Europe and secondary PGM recovered and consumed in RER.

## Geography
Global supply data for Europe used, no import statistic available. Supply per region is assumed to correspond to the import to Europe

## Technology
European consumer mix

## Reference product
- Palladium, at regional storage [RER]: 1 kg
  Europe

## Inputs from technosphere
- Palladium, secondary, at refinery [RER]: 0.03 kg; lognormal SD95 1.1
  (1,2,1,1,1,4,3)
- Transport, aircraft, freight [RER]: 8.98 tkm; lognormal SD95 1.1
  (1,2,1,1,1,4,3)
- Palladium, primary, at refinery [ZA]: 0.285 kg; lognormal SD95 1.1
  (1,2,1,1,1,4,3)
- Palladium, primary, at refinery [RU]: 0.685 kg; lognormal SD95 1.1
  (1,2,1,1,1,4,3)

## Sampling procedure
Literature

## Extrapolations
see Geography and Technology

## Sources
- Classen M., Althaus H.-J., Blaser S., Scharnhorst W., Tuchschmid M., Jungbluth N., Faist Emmenegger M., 2009, 2009 - LCI metals - Classen, Final report ecoinvent data v2.1, 10, Swiss Centre for LCI, Empa, ESU-services Ltd., Duebendorf, CH
Classen M., Althaus H.-J., Blaser S., Doka G., Jungbluth N., Tuchschmid M. (2008) Life Cycle Inventories of Metals. Final report ecoinvent data v2.1. Volume: 10. Issue: 0. Swiss Centre for LCI, Empa - TSL. Dübendorf, CH.
Type: Measurement on site
Source: CD-ROM
First author: Classen M.
Other authors: Althaus H.-J., Blaser S., Doka G., Jungbluth N., Tuchschmid M.
Year: 2008
Title of anthology: Final report ecoinvent data v2.1
Place of publication: Dübendorf, CH
Publisher: Swiss Centre for LCI, Empa - TSL
Volume No: 10
Issue No: 0

## Validation
Proof reading validation: Passed.; Other validation: none;
