# Metal working factory

Dataset: EcoSpold 1, unit process, infrastructure
Functional unit: 1 p
Category: metals / infrastructure
Geography: RER
Time period: 2006-01 to 2007-12
Share of production covered: 0 %
Generated by: Roland Steiner
accessRestrictedTo: 0
copyright: true

## General comment
4.58E-10 units of this process are needed to produce 1 kg of final product. This dataset can be used in combination with the metal working factory operation to get the operation plus infrastructure of metal working without the machine processing.;

## Included processes
This dataset includes the infrastructure of a metal working factory. This encompasses the buildings, roads and parking spaces on the premises as well as other land occupation.

## Geography
Average data from several local to global sized companies. The main focus is on Germany and Europe.

## Technology
The companies are expected to cover the whole range of metal working.

## Reference product
- Metal working factory [RER]: 1 p
  Europe

## Inputs from technosphere
- Building, hall [CH]: 274000 m2; lognormal SD95 3.06
  (1,3,2,1,3,4); average value of three companies
- Roads, company, internal [CH]: 1.62e7 m2a; lognormal SD95 3.06
  (1,3,2,1,3,4); average value of three companies

## Inputs from nature
- Transformation, to industrial area, vegetation [resources, land]: 418000 m2; lognormal SD95 2.07
  (1,3,2,1,3,4); average value of three companies
- Transformation, from unknown [resources, land]: 854000 m2; lognormal SD95 2.07
  (1,3,2,1,3,4); average value of three companies
- Transformation, to industrial area, built up [resources, land]: 274000 m2; lognormal SD95 2.07
  (1,3,2,1,3,4); average value of three companies
- Occupation, industrial area, vegetation [resources, land]: 2.09e7 m2a; lognormal SD95 1.58
  (1,3,2,1,3,4); average value of three companies
- Occupation, traffic area, road network [resources, land]: 1.62e7 m2a; lognormal SD95 1.58
  (1,3,2,1,3,4); average value of three companies
- Occupation, industrial area, built up [resources, land]: 1.37e7 m2a; lognormal SD95 1.58
  (1,3,2,1,3,4); average value of three companies
- Transformation, to traffic area, road network [resources, land]: 162000 m2; lognormal SD95 2.07
  (1,3,2,1,3,4); average value of three companies

## Sources
- Steiner R., Frischknecht R., 2007, 2007 - LCI metal proc. and comp. air supply - Steiner, Final report ecoinvent Data v2.0, 23, Swiss Centre for LCI, ESU-services Ltd., Duebendorf and Uster, CH
Steiner, R., Frischknecht, R. (2007) Life Cycle Inventories of Metal Processing and Compressed Air Supply. Final report ecoinvent Data v2.0. Editors: 0. 0. Volume: 23. Issue: 0. Swiss Centre for LCI, ESU. Dübendorf and Uster, CH.
Type: Measurement on site
Source: CD-ROM
First author: Steiner, R.
Other authors: Frischknecht, R.
Year: 2007
Name of editors: 0
Title of anthology: Final report ecoinvent Data v2.0
Place of publication: Dübendorf and Uster, CH
Publisher: Swiss Centre for LCI, ESU
Journal: 0
Volume No: 23
Issue No: 0
Original title: Life Cycle Inventories of Metal Processing and Compressed Air Supply

## Validation
Proof reading validation: passed; Other validation: none;
