# Spruce wood, chipping and drying

Dataset: EcoSpold 1, unit process
Functional unit: 1 kg
Category: wood / wooden materials\new processes\other material
Geography: CH
Time period: 2024 to 2024
Generated by: Romain Sacchi
accessRestrictedTo: 0
copyright: true

## General comment
This dataset supplies 1 kilogram of preprocessed spruce wood before entering the pyrolysis process. The wood goes through drying and chipping. The energy requirements for drying the feedstock depend on its moisture content. The moisture level is assumed to be 40% (based on data from Tisserant, A., Morales, M., Cavalett, O., O'Toole, A., Weldon, S., Rasse, D. P., & Cherubini, F. (2022). Life-cycle assessment to unravel co-benefits and trade-offs of large-scale biochar deployment in Norwegian agriculture. Resources, Conservation and Recycling, 179, 106030. https://doi.org/10.1016/j.resconrec.2021.106030) with a conversion factor to dry ton of 0.6. The feedstock is assumed to be dried to zero moisture content to be on the safe side in accounting for the energy requirements of evaporating water at all stages. Rotary drier requirements: 0.1 GJ electricity/tonnes of water and 2.7 GJ thermal energy/tonnes of water. Electricity and heat requirements are taken from Manouchehrinejad, M., & Mani, S. (2019). Process simulation of an integrated biomass torrefaction and pelletization (iBTP) plant to produce solid biofuels. Energy Conversion and Management: X, 1, 100008. https://doi.org/10.1016/j.ecmx.2019.100008. Electric chipping requirements: 0.0005 GJ/ MJfsdry. The requirements for electric chipping are taken from Kuptz, D., & Hartmann, H. (2014). Throughput Rate and Energy Consumption During Wood Chip Production in Relation to Raw Material, Chipper Type and Machine Setting. https://doi.org/10.5071/22ndEUBCE2014-2CO.1.5. The distance from the collection point to the plant is assumed to be 100km.

Source: Hoeskuldsdottir, Gudrun. 2022. Life Cycle Assessment of Biochar to Soil Systems: A Parametric Analysis. Master’s thesis, Swiss Federal Institute of Technology Zürich and Paul Scherrer Institute.

## Reference product
- Spruce wood, chipping and drying [CH]: 1 kg

## Inputs from technosphere
- Cleft timber, spruce, sustainable forest management, measured as dry mass, at forest road [DE]: 1 kg
  Pedigree: (1,1,4,5,4).
- Heat, natural gas, at industrial furnace 1MW [CH]: 1.08 MJ; lognormal SD95 1.24
  Heat input for drying (2,4,1,3,1,5,1.05)
- Electricity, low voltage, at grid [CH]: 0.0152055 kWh; lognormal SD95 1.396
  {3;5;1;2;3;5;1.05;}
- Transport, freight, rail, electricity with shunting [CH]: 0.1 tkm; lognormal SD95 2.208
  Distribution: 1.0 kg over 100.0 km.

## Sampling procedure
Sampling procedure: Literature data

## Sources
- Sacchi R., Bauer C., 2024, 2024 - LCA power-to-X in residential sector - Sacchi, Project report, PSI, Villigen, CH

## Validation
Proof reading validation: Passed, Other validation: none, Validator: Pierryves Padey, Telephone: +41 58 462 93 11, E-mail: pierryves.padey@bafu.admin.ch, Company: Federal Office for the Environment, Country: CH
