# xxx Heat, at cogen 6400kWth, wood, emission control, allocation heat

Dataset: EcoSpold 1, unit process
Functional unit: 1 MJ
Category: energy, obsolete / cogeneration, obsolete\wood
Geography: CH
Time period: 2000-01 to 2001-12
Generated by: Christian Bauer
accessRestrictedTo: 0
copyright: true

## General comment
The multioutput-prozess "wood chips, burned in cogen 6400kWth, emission control, allocation heat" delivers the coproducts "heat, at cogen 6400kWth, wood, emission control, allocation heat" and "electricity, at cogen 6400kWth, wood, emission control, allocation heat".;

## Included processes
This module describes the combustion of natural wood chips. Included are the infrastructure, the wood input, the emissions to air, the transport of the fuel, and the disposal of the ashes. Also included are substances needed for operation: lubricating oil, urea, organic chemicals, sodium chloride, chlorine and decarbonized water.

## Technology
Specific cogeneration unit installed in Switzerland with hypothetical pollution control (filter for particulate and SNCR for NOx).

## Reference product
- xxx Heat, at cogen 6400kWth, wood, emission control, allocation heat [CH]: 1 MJ
  SWITZERLAND

## Inputs from technosphere
- Disposal, municipal solid waste, 22.9% water, to municipal incineration [CH]: 4.2764e-6 kg; lognormal SD95 1.2
  general assumption
- Wood chips, production mix, wet, measured as dry mass, at forest road & at sawmill [CH]: 0.07082 kg
  uncertainty on energy and water content, and bulk density
- Treatment, sewage, to wastewater treatment, class 2 [CH]: 1.0261e-6 m3; lognormal SD95 1.2
  general assumption
- Cogen unit 6400kWth, wood burning, building [CH]: 3.1551e-10 p; lognormal SD95 1.2
  uncertainty on lifetime and material
- Disposal, wood ash mixture, pure, 0% water, to sanitary landfill [CH]: 0.0003455 kg; lognormal SD95 1.05
  homogeneous fuel
- Water, decarbonised, at plant [RER]: 0.0010261 kg; lognormal SD95 1.2
  general assumption
- Ammonia, liquid, at regional storehouse [CH]: 1.0691e-8 kg; lognormal SD95 1.2
  general assumption
- Chemicals organic, at plant [GLO]: 7.4837e-6 kg; lognormal SD95 1.2
  general assumption
- Chlorine, liquid, production mix, at plant [RER]: 4.2764e-7 kg; lognormal SD95 1.2
  general assumption
- Disposal, used mineral oil, 10% water, to hazardous waste incineration [CH]: 4.2764e-6 kg; lognormal SD95 1.2
  general assumption
- Lubricating oil, at plant [RER]: 4.2764e-6 kg; lognormal SD95 1.1
  general assumption
- Cogen unit 6400kWth, wood burning, common components for heat+electricity [CH]: 1.2621e-9 p; lognormal SD95 1.2
  uncertainty on lifetime and material
- Disposal, wood ash mixture, pure, 0% water, to landfarming [CH]: 0.0001721 kg; lognormal SD95 1.05
  homogeneous fuel
- Transport, freight, lorry, 16t-32t gross weight, fleet average [CH]: 0.0062451 tkm; lognormal SD95 1.2
  general assumption
- Urea, as N, at regional storehouse [RER]: 3.4941e-5 kg; lognormal SD95 1.2
  general assumption
- Disposal, wood ash mixture, pure, 0% water, to municipal incineration [CH]: 0.0001721 kg; lognormal SD95 1.05
  homogeneous fuel
- Sodium chloride, powder, at plant [RER]: 5.3455e-6 kg; lognormal SD95 1.2
  general assumption

## Emissions to nature
- Benzo(a)pyrene [emissions to air, high. pop.]: 6.5189e-10 kg; lognormal SD95 3.7
  extrapolation
- Hydrocarbons, aliphatic, unsaturated [emissions to air, high. pop.]: 4.0417e-6 kg; lognormal SD95 3.7
  extrapolation
- Magnesium [emissions to air, high. pop.]: 4.7066e-7 kg; lognormal SD95 3.7
  extrapolation
- Chromium [emissions to air, high. pop.]: 5.163e-9 kg; lognormal SD95 3.7
  extrapolation
- Copper [emissions to air, high. pop.]: 2.8683e-8 kg; lognormal SD95 3.7
  extrapolation
- Acetaldehyde [emissions to air, high. pop.]: 7.9531e-8 kg; lognormal SD95 3.7
  extrapolation
- Phenol, pentachloro- [emissions to air, high. pop.]: 1.0561e-11 kg; lognormal SD95 3.7
  extrapolation
- NMVOC, non-methane volatile organic compounds, unspecified origin [emissions to air, high. pop.]: 7.9531e-7 kg; lognormal SD95 3.7
  extrapolation
- m-Xylene [emissions to air, high. pop.]: 1.5645e-7 kg; lognormal SD95 3.7
  extrapolation
- Cadmium [emissions to air, high. pop.]: 9.1265e-10 kg; lognormal SD95 3.7
  extrapolation
- Carbon dioxide, biogenic [emissions to air, high. pop.]: 0.12829 kg; lognormal SD95 1.05
  uncertainty of carbon content in the wood
- Chlorine [emissions to air, high. pop.]: 2.3468e-7 kg; lognormal SD95 3.7
  extrapolation
- Nitrogen oxides [emissions to air, high. pop.]: 5.7366e-5 kg; lognormal SD95 1.45
  measurements and assumption, based on literature
- Heat, waste [emissions to air, high. pop.]: 1.29205 MJ; lognormal SD95 1.05
  own estimation, based on uncertainty of upper heating value and electricity production
- Particulates, < 2.5 um [emissions to air, high. pop.]: 6.5189e-6 kg; lognormal SD95 1.1
  measurements
- Mercury [emissions to air, high. pop.]: 3.9113e-10 kg; lognormal SD95 3.7
  extrapolation
- Zinc [emissions to air, high. pop.]: 3.9113e-7 kg; lognormal SD95 3.7
  extrapolation
- Benzene, hexachloro- [emissions to air, high. pop.]: 9.387e-15 kg; lognormal SD95 3.7
  extrapolation
- Methane, biogenic [emissions to air, high. pop.]: 5.6584e-7 kg; lognormal SD95 3.7
  extrapolation
- Arsenic [emissions to air, high. pop.]: 1.3038e-9 kg; lognormal SD95 3.7
  extrapolation
- Bromine [emissions to air, high. pop.]: 7.8227e-8 kg; lognormal SD95 3.7
  extrapolation
- Manganese [emissions to air, high. pop.]: 2.2295e-7 kg; lognormal SD95 3.7
  extrapolation
- Fluorine [emissions to air, high. pop.]: 6.5189e-8 kg; lognormal SD95 3.7
  extrapolation
- Dinitrogen monoxide [emissions to air, high. pop.]: 2.8683e-5 kg; lognormal SD95 1.9
  measurements and assumption, based on literature
- Sulfur dioxide [emissions to air, high. pop.]: 3.2464e-6 kg; lognormal SD95 3.7
  extrapolation
- Sodium [emissions to air, high. pop.]: 1.6949e-6 kg; lognormal SD95 3.7
  extrapolation
- Calcium [emissions to air, high. pop.]: 7.6271e-6 kg; lognormal SD95 3.7
  extrapolation
- Nickel [emissions to air, high. pop.]: 7.8227e-9 kg; lognormal SD95 3.7
  extrapolation
- Potassium [emissions to air, high. pop.]: 3.0508e-5 kg; lognormal SD95 3.7
  extrapolation
- Benzene [emissions to air, high. pop.]: 1.1864e-6 kg; lognormal SD95 3.7
  extrapolation
- Lead [emissions to air, high. pop.]: 3.2464e-8 kg; lognormal SD95 3.7
  extrapolation
- Chromium VI [emissions to air, high. pop.]: 5.2151e-11 kg; lognormal SD95 4
  range of data
- Dioxin, 2,3,7,8 Tetrachlorodibenzo-p- [emissions to air, high. pop.]: 4.0417e-14 kg; lognormal SD95 3.7
  extrapolation
- Carbon monoxide, biogenic [emissions to air, high. pop.]: 9.1265e-6 kg; lognormal SD95 2.2
  measurements
- Toluene [emissions to air, high. pop.]: 3.9113e-7 kg; lognormal SD95 3.7
  extrapolation
- Hydrocarbons, aliphatic, alkanes, unspecified [emissions to air, high. pop.]: 1.1864e-6 kg; lognormal SD95 3.7
  extrapolation
- Formaldehyde [emissions to air, high. pop.]: 1.6949e-7 kg; lognormal SD95 3.7
  extrapolation
- Ammonia [emissions to air, high. pop.]: 2.2164e-5 kg; lognormal SD95 3.7
  extrapolation
- PAH, polycyclic aromatic hydrocarbons [emissions to air, high. pop.]: 1.4342e-8 kg; lognormal SD95 3.7
  extrapolation
- Benzene, ethyl- [emissions to air, high. pop.]: 3.9113e-8 kg; lognormal SD95 3.7
  extrapolation
- Phosphorus [emissions to air, high. pop.]: 3.9113e-7 kg; lognormal SD95 3.7
  extrapolation

## Sampling procedure
literature

## Sources
- Bauer C., 2007, 2007 - Wood energy - Bauer, Sachbilanzen von Energiesystemen. Final report No. 6 ecoinvent data v2.0, 6, Swiss Centre for LCI, PSI, Duebendorf and Villigen, CH
Bauer, C. (2007) Holzenergie. Sachbilanzen von Energiesystemen. Final report No. 6 ecoinvent data v2.0. Editors: Dones R.. Volume: 6. Swiss Centre for LCI, PSI. Dübendorf and Villigen, CH.
Type: Measurement on site
Source: CD-ROM
First author: Bauer, C.
Year: 2007
Name of editors: Dones R.
Title of anthology: Sachbilanzen von Energiesystemen. Final report No. 6 ecoinvent data v2.0
Place of publication: Dübendorf and Villigen, CH
Publisher: Swiss Centre for LCI, PSI
Volume No: 6

## Validation
Proof reading validation: passed; Other validation: none;
