# PEM electrolyzer, Balance of Plant

Dataset: EcoSpold 1, unit process
Functional unit: 1 p
Category: fuels / hydrogen\Transformation\Infrastructure
Geography: GLO
Time period: 2020-01 to 2020-12
Generated by: Romain Sacchi
accessRestrictedTo: 0
copyright: False

## General comment
Data for an 40kW automotive PEM fuel cell. Based on qualified estimates of the first commercially available technolgies. Original source: Simons, A. and Bauer, C. (2015). A life-cycle perspective on automotive fuel cells, Applied Energy, doi:10.1016/j.apenergy.2015.02.049.

## Time period
Base technology year of 2020

## Reference product
- PEM electrolyzer, Balance of Plant [GLO]: 1 p

## Inputs from technosphere
All rows: lognormal SD95 1.64732
- Aluminium, production mix, wrought alloy, at plant [RER]: 23.2 kg
  Uncertainty from pedigree matrix: (3, 5, 4, 2, 4, 4)
- Steel, low-alloyed, at plant [RER]: 114 kg
  Uncertainty from pedigree matrix: (3, 5, 4, 2, 4, 4)
- Cast iron, at plant [RER]: 24.7 kg
  Uncertainty from pedigree matrix: (3, 5, 4, 2, 4, 4)
- Polypropylene, granulate, at plant [RER]: 77.3 kg
  Uncertainty from pedigree matrix: (3, 5, 4, 2, 4, 4)
- Polyethylene, HDPE, granulate, at plant [RER]: 46.4 kg
  Uncertainty from pedigree matrix: (3, 5, 4, 2, 4, 4)
- Chromium steel 18/8, at plant [RER]: 34 kg
  Uncertainty from pedigree matrix: (3, 5, 4, 2, 4, 4)
- Transport, freight, rail [RER]: 64 tkm
  Uncertainty from pedigree matrix: (3, 5, 4, 2, 4, 4)
- Transport, freight, lorry, 16t-32t gross weight, fleet average [RER]: 32 tkm
  Uncertainty from pedigree matrix: (3, 5, 4, 2, 4, 4)

## Sources
- Sacchi R., Bauer C., 2023, 2023 - LCI on-road vehicles - Sacchi, PSI, Villigen, CH
doi: 10.5281/ZENODO.5156043
