# Tellurium, semiconductor-grade, at plant

Dataset: EcoSpold 1, unit process
Functional unit: 1 kg
Category: metals / non ferro
Geography: GLO
Time period: 2005-01 to 2005-12
Production volume: 200 - 300 t in 2005
Generated by: Matthias Tuchschmid
accessRestrictedTo: 0
copyright: true

## General comment
This datasets describes the production of high-grade tellurium (99.999%) from copper-telluride cementate by hydrometallurgical processes. These hydrometallurgical processes are the dissolving of copper-telluride cementate with sulphuric acid, the following electrolysis and subsequent purification with zone-melting. This purity of tellurium can be used in the production of thin film solar cells. ;
CAS number: 013494-80-9;
Formula: Te;

## Included processes
This datasets describes the production of high-grade tellurium (99.999%) from copper-telluride cementate by hydrometallurgical processes. The energy consumption, emissions as well as transports are considered.

## Technology
Production of tellurium from copper-telluride cementate (from copper production), purification to 99.999% (5N)

## Time period
based on literature and patents

## Reference product
- Tellurium, semiconductor-grade, at plant [GLO]: 1 kg
  Global

## Inputs from technosphere
- Electricity, medium voltage, production ENTSO-E, at grid: 10.886 kWh; lognormal SD95 1.3824
  (4,3,1,3,3,5); Literature, personal communication (Fthenakis)
- Transport, freight, lorry, fleet average [RER]: 0.13875 tkm; lognormal SD95 2.095
  (4,5,na,na,na,na); standard distances (100km), allocation of copper-cementate by weight
- Transport, transoceanic freight ship [OCE]: 5.55 tkm; lognormal SD95 2.095
  (4,5,na,na,na,na); estimated distances (4000km), allocation of copper-cementate by weight
- Transport, freight, rail [RER]: 0.2775 tkm; lognormal SD95 2.095
  (4,5,na,na,na,na); standard distances (200km), allocation of copper-cementate by weight
- Copper telluride cement, from copper production [GLO]: 2.775 kg; lognormal SD95 1.1724
  (2,3,3,1,1,4); Literature (Shibasaki, 1992)
- Sulphuric acid, liquid, at plant [RER]: 0.0375 kg; lognormal SD95 2.147
  (4,5,2,3,5,5); Estimation
- Chemical plant, organics [RER]: 4e-10 p; lognormal SD95 3.8088
  (4,5,2,3,5,5); Estimation
- Treatment, sewage, to wastewater treatment, class 5 [CH]: 0.0162 m3; lognormal SD95 1.6001
  (2,4,3,3,4,5); Literature, Xiao in Althaus 2004 (extrapolation from zinc)

## Inputs from nature
- Water, river [resources, in water]: 0.0162 m3; lognormal SD95 3.2996
  (2,4,3,1,4,5); Literature, Xiao in Althaus 2004 (extrapolation from zinc)

## Emissions to nature
- Heat, waste [emissions to air, low. pop.]: 39.19 MJ; lognormal SD95 1.2226
  (2,3,1,1,1,5); Calculation
- Sulfur dioxide [emissions to air, low. pop.]: 0.00955 kg; lognormal SD95 1.5994
  (2,4,3,1,4,5); Literature, Xiao in Althaus 2004 (extrapolation from zinc)
- Water [emissions to water, unspecified]: 15.39 kg; lognormal SD95 2.5196
  (5,5,5,5,5,BU:1.05); All uncertainty-values set to 5.0 by default. Balance of input water

## Sampling procedure
Analysis based on literature.

## Extrapolations
Some data available only for zinc are used as proxy

## Sources
- Classen M., Althaus H.-J., Blaser S., Scharnhorst W., Tuchschmid M., Jungbluth N., Faist Emmenegger M., 2009, 2009 - LCI metals - Classen, Final report ecoinvent data v2.1, 10, Swiss Centre for LCI, Empa, ESU-services Ltd., Duebendorf, CH
Classen M., Althaus H.-J., Blaser S., Doka G., Jungbluth N., Tuchschmid M. (2008) Life Cycle Inventories of Metals. Final report ecoinvent data v2.1. Volume: 10. Issue: 0. Swiss Centre for LCI, Empa - TSL. Dübendorf, CH.
Type: Measurement on site
Source: CD-ROM
First author: Classen M.
Other authors: Althaus H.-J., Blaser S., Doka G., Jungbluth N., Tuchschmid M.
Year: 2008
Title of anthology: Final report ecoinvent data v2.1
Place of publication: Dübendorf, CH
Publisher: Swiss Centre for LCI, Empa - TSL
Volume No: 10
Issue No: 0

## Validation
Proof reading validation: passed; Other validation: none;
