# xxx Electricity, at cogen 200kWe diesel SCR, allocation energy

Dataset: EcoSpold 1, unit process
Functional unit: 1 kWh
Category: energy, obsolete / heat, obsolete\oil, obsolete
Geography: CH
Time period: 2000-01 to 2000-12
Generated by: Thomas Heck
accessRestrictedTo: 0
copyright: true

## General comment
The multioutput-process 'diesel, burned in cogen 200kWe diesel SCR, allocation energy' delivers the coproducts 'heat, at cogen 200kWe diesel SCR, allocation energy' and 'electricity, at cogen 200kWe diesel SCR, allocation energy'.;

## Included processes
The module includes fuel input, infrastructure, emissions to air, and substances needed for operation.

## Technology
Average technology available on market.

## Reference product
- xxx Electricity, at cogen 200kWe diesel SCR, allocation energy [CH]: 1 kWh
  SWITZERLAND

## Inputs from technosphere
- Cogen unit 200kWe diesel SCR, components for electricity only [RER]: 5.0185e-8 p; lognormal SD95 1
- Lubricating oil, at plant [RER]: 0.00029778 kg; lognormal SD95 1.2
  vender information
- Urea, as N, at regional storehouse [RER]: 0.0035556 kg; lognormal SD95 1.4
  different references; uncertainty of urea needs from variation of NOx emissions before SCR and NH3 losses
- Diesel, at regional storage [CH]: 0.104 kg; lognormal SD95 1
- Cogen unit 200kWe diesel SCR, common components for heat+electricity [RER]: 2.4089e-8 p; lognormal SD95 1
- Disposal, used mineral oil, 10% water, to hazardous waste incineration [CH]: 0.00029778 kg; lognormal SD95 2
  rough estimate

## Emissions to nature
- Carbon monoxide, fossil [emissions to air, high. pop.]: 0.00066667 kg; lognormal SD95 2
  estimate based on different references
- Ammonia [emissions to air, high. pop.]: 4.4444e-6 kg; lognormal SD95 2
  estimate based on different references
- Platinum [emissions to air, high. pop.]: 3.1111e-11 kg; lognormal SD95 10
  (Artelt et al. 2000)
- NMVOC, non-methane volatile organic compounds, unspecified origin [emissions to air, high. pop.]: 0.00022222 kg; lognormal SD95 2
  estimate based on different references
- Sulfur dioxide [emissions to air, high. pop.]: 0.00022222 kg; lognormal SD95 1.2
  composition of oil
- Carbon dioxide, fossil [emissions to air, high. pop.]: 0.32756 kg; lognormal SD95 1.1
  composition of oil
- Methane, fossil [emissions to air, high. pop.]: 5.3333e-5 kg; lognormal SD95 2
  estimate based on different references
- Heat, waste [emissions to air, high. pop.]: 3.15556 MJ; lognormal SD95 1.1
  uncertainty of heating value and electric efficiency
- Dinitrogen monoxide [emissions to air, high. pop.]: 2.2222e-5 kg; lognormal SD95 5
  rough estimate
- Particulates, < 2.5 um [emissions to air, high. pop.]: 4.4444e-6 kg; lognormal SD95 2
  estimate based on different references
- Nitrogen oxides [emissions to air, high. pop.]: 0.00031111 kg; lognormal SD95 1.3
  estimate based on different references

## Sampling procedure
Literature. Manufacturer information.

## Sources
- Heck T., 2007, 2007 - Combined heat power generation - Heck, Sachbilanzen von Energiesystemen. Final report No. 6 ecoinvent data v2.0, 6, Swiss Centre for LCI, PSI, Duebendorf and Villigen, CH
Heck, T. (2007) Wärme-Kraft-Kopplung. Sachbilanzen von Energiesystemen. Final report No. 6 ecoinvent data v2.0. Editors: Dones R.. Volume: 6. Swiss Centre for LCI, PSI. Dübendorf and Villigen, CH.
Type: Measurement on site
Source: CD-ROM
First author: Heck, T.
Year: 2007
Name of editors: Dones R.
Title of anthology: Sachbilanzen von Energiesystemen. Final report No. 6 ecoinvent data v2.0
Place of publication: Dübendorf and Villigen, CH
Publisher: Swiss Centre for LCI, PSI
Volume No: 6

## Validation
Proof reading validation: passed; Other validation: none;
