# Bitumen, at refinery

Dataset: EcoSpold 1, unit process
Functional unit: 1 kg
Category: oil / fuels
Geography: CH
Time period: 2000-01 to 2000-12
Production volume: 4.6 mio. tonnes crude oil throughput in 2000.
Share of production covered: 100 %
Generated by: Philippe Stolz
accessRestrictedTo: 0
copyright: true

## General comment
Description of all flows of materials and energy due to the throughput of 1kg crude oil in the refinery. The multioutput-process 'crude oil, in refinery' delivers the co-products petrol, unleaded, bitumen, diesel, light fuel oil, heavy fuel oil, kerosene, naphtha, propane/ butane, refinery gas, secondary sulphur and electricity. The impacts of processing are allocated to the different products. Crude oil mix from different regions updated to the year 2016 based on data reported by the Swiss Petroleum Association (Erdölvereinigung).;

## Included processes
All processes on the refinery site excluding the emissions from combustion facilities, including waste water treatment, process emissions and direct discharges to rivers.

## Geography
Investigation for the refineries in Collombey and Cressier in Switzerland.

## Technology
Average data for the used technology.

## Time period
The most important data (e.g. production, throughput, energy use, regulated emissions) have been investigated for the 2 Swiss refineries for the year 2000. Other data and indicators have been assessed based on older literature data.

## Reference product
- Bitumen, at refinery [CH]: 1 kg
  SWITZERLAND

## Inputs from technosphere
- Refinery gas, burned in flare [GLO]: 0.032843 MJ; lognormal SD95 1.16
  (2,4,1,3,1,4); Swiss plant
- Crude oil, production US, at long distance transport [CH]: 0.17167 kg; lognormal SD95 1.07
  (1,1,1,1,1,3); Swiss Petroleum Association (Erdölvereinigung): Annual Report 2016
- Refinery [RER]: 1.9813e-11 p; lognormal SD95 3.03
  (3,3,1,1,1,4); Estimation
- Crude oil, production RME, at long distance transport [CH]: 0.04699 kg; lognormal SD95 1.07
  (1,1,1,1,1,3); Swiss Petroleum Association (Erdölvereinigung): Annual Report 2016
- Electricity, medium voltage, at grid [CH]: 0.019889 kWh; lognormal SD95 1.1
  (2,3,1,3,1,3); Average of plant data
- Transport, freight, lorry, fleet average [RER]: 0.0013208 tkm; lognormal SD95 2.1
  (4,5,na,na,na,na); Standard distance 100km
- Lubricating oil, at plant [RER]: 2.4444e-5 kg; lognormal SD95 1.14
  (2,4,1,3,1,3); Env. reports DE
- Nitrogen, liquid, at plant [RER]: 0.00081219 kg; lognormal SD95 1.14
  (2,4,1,3,1,3); Env. reports DE
- Ammonia, liquid, at regional storehouse [RER]: 1.9713e-6 kg; lognormal SD95 1.34
  (3,4,4,3,3,na); Literature
- Propylene glycol, liquid, at plant [RER]: 6.2366e-7 kg; lognormal SD95 1.26
  (3,4,1,3,3,na); Literature
- Iron sulphate, at plant [RER]: 4.9283e-5 kg; lognormal SD95 1.34
  (3,4,4,3,3,na); Literature, waste water treatment
- Sulphuric acid, liquid, at plant [RER]: 1.1729e-5 kg; lognormal SD95 1.1
  (2,3,1,3,1,3); Average of plant data
- Crude oil, production KZ, at long distance transport [CH]: 0.16176 kg; lognormal SD95 1.07
  (1,1,1,1,1,3); Swiss Petroleum Association (Erdölvereinigung): Annual Report 2016
- Sodium hypochlorite, 15% in H2O, at plant [RER]: 4.9283e-5 kg; lognormal SD95 1.34
  (3,4,4,3,3,na); Literature, waste water treatment
- Tap water, at user [CH]: 0.014982 kg; lognormal SD95 1.1
  (2,3,1,3,1,3); Average of plant data
- Crude oil, production RU, at long distance transport [CH]: 0.078455 kg; lognormal SD95 1.07
  (1,1,1,1,1,3); Swiss Petroleum Association (Erdölvereinigung): Annual Report 2016
- Refinery gas, burned in furnace [CH]: 0.8986 MJ; lognormal SD95 1.09
  (2,1,1,1,1,3); Swiss statistic
- Soap, at plant [RER]: 2.6416e-6 kg; lognormal SD95 1.1
  (2,3,1,3,1,3); Average of plant data
- Chemicals organic, at plant [GLO]: 0.0010398 kg; lognormal SD95 1.19
  (3,4,2,1,1,4); IPPC European plant data
- Crude oil, production RAF, at long distance transport [CH]: 0.021173 kg; lognormal SD95 1.07
  (1,1,1,1,1,3); Swiss Petroleum Association (Erdölvereinigung): Annual Report 2016
- Hydrochloric acid, 30% in H2O, at plant [RER]: 8.7724e-5 kg; lognormal SD95 1.14
  (2,4,1,3,1,3); Env. reports DE
- Lime, hydrated, packed, at plant [CH]: 3.4498e-5 kg; lognormal SD95 1.26
  (3,4,1,3,3,na); Estimation based on literature
- Heavy fuel oil, burned in refinery furnace [CH]: 0.20771 MJ; lognormal SD95 1.09
  (2,1,1,1,1,3); Swiss statistic
- Transport, freight, rail [RER]: 0.0079346 tkm; lognormal SD95 2.1
  (4,5,na,na,na,na); Standard distance 600km
- Calcium chloride, CaCl2, at plant [RER]: 1.5968e-5 kg; lognormal SD95 1.1
  (2,3,1,3,1,3); Average of plant data
- Crude oil, production NG, at long distance transport [CH]: 0.35236 kg; lognormal SD95 1.07
  (1,1,1,1,1,3); Swiss Petroleum Association (Erdölvereinigung): Annual Report 2016
- Disposal, refinery sludge, 89.5% water, to hazardous waste incineration [CH]: 0.00012025 kg; lognormal SD95 1.09
  (2,2,1,1,1,3); Average of plant data
- Crude oil, production MX, at long distance transport [CH]: 0.1676 kg; lognormal SD95 1.07
  (1,1,1,1,1,3); Swiss Petroleum Association (Erdölvereinigung): Annual Report 2016

## Inputs from nature
- Water, river [resources, in water]: 0.00055789 m3; lognormal SD95 1.16
  (3,3,1,3,1,4); Average of plant data
- Water, cooling, unspecified natural origin/m3 [resources, in water]: 0.0039722 m3; lognormal SD95 1.12
  (3,3,1,1,1,na); Average of plant data

## Emissions to nature
- Sulfide [emissions to water, river]: 5.5789e-8 kg; lognormal SD95 10
  Range for RER refineries
- Boron [emissions to water, river]: 2.2276e-7 kg; lognormal SD95 1.65
  (3,5,4,3,1,4); Literature
- Dinitrogen monoxide [emissions to air, high. pop.]: 5.8434e-7 kg; lognormal SD95 1.52
  (3,na,na,na,1,na); Average of plant data
- Hydrocarbons, aliphatic, alkanes, unspecified [emissions to air, high. pop.]: 4.4158e-11 kg; lognormal SD95 1.51
  (2,3,1,3,1,3); Average of plant data
- PAH, polycyclic aromatic hydrocarbons [emissions to water, river]: 8.1159e-9 kg; lognormal SD95 3.16
  Range for RER refineries
- COD, Chemical Oxygen Demand [emissions to water, river]: 6.8208e-6 kg; lognormal SD95 2.04
  Range for RER refineries
- Toluene [emissions to air, high. pop.]: 8.7034e-6 kg; lognormal SD95 1.65
  (3,5,4,3,1,4); Literature
- Chromium [emissions to water, river]: 1.2427e-7 kg; lognormal SD95 2.24
  Range for RER refineries
- Chloride [emissions to water, river]: 4.4355e-5 kg; lognormal SD95 5.02
  (2,4,1,2,1,3); Average of CH plant, basic uncertainity = 5 estimated based on range
- Phosphorus [emissions to water, river]: 2.1586e-7 kg; lognormal SD95 3.87
  Range for RER refineries
- Lead [emissions to water, river]: 1.7515e-7 kg; lognormal SD95 5.02
  (2,3,1,1,1,4); Range for RER refineries
- Arsenic [emissions to water, river]: 5.5383e-9 kg; lognormal SD95 5.13
  (3,5,4,3,1,4); Literature
- Iron [emissions to water, river]: 2.7894e-7 kg; lognormal SD95 5.13
  (3,5,4,3,1,4); Literature
- Manganese [emissions to water, river]: 1.1138e-7 kg; lognormal SD95 5.13
  (3,5,4,3,1,4); Literature
- Heat, waste [emissions to air, high. pop.]: 0.010522 MJ; lognormal SD95 1.1
  (2,3,1,3,1,3); Average of plant data
- Potassium [emissions to water, river]: 5.5789e-6 kg; lognormal SD95 1.65
  (3,5,4,3,1,4); Literature
- Heptane [emissions to air, high. pop.]: 1.4489e-5 kg; lognormal SD95 1.65
  (3,5,4,3,1,4); Literature
- Nitrogen, organic bound [emissions to water, river]: 2.7346e-6 kg; lognormal SD95 2.65
  Range for RER refineries
- Propane [emissions to air, high. pop.]: 5.8056e-5 kg; lognormal SD95 1.65
  (3,5,4,3,1,4); Literature
- Benzene, ethyl- [emissions to water, river]: 1.2151e-10 kg; lognormal SD95 3.12
  (3,5,4,3,1,4); Literature
- Benzene [emissions to air, high. pop.]: 5.8056e-6 kg; lognormal SD95 1.65
  (3,5,4,3,1,4); Literature
- Hydrocarbons, unspecified [emissions to water, river]: 5.6667e-8 kg; lognormal SD95 5.48
  Range for RER refineries
- DOC, Dissolved Organic Carbon [emissions to water, river]: 1.4135e-8 kg; lognormal SD95 1.53
  (2,4,1,2,1,3); Average of CH plant
- Phenol [emissions to water, river]: 1.5445e-7 kg; lognormal SD95 5.77
  Range for RER refineries
- Fluoride [emissions to water, river]: 2.4937e-6 kg; lognormal SD95 4.47
  Range for RER refineries
- Hydrocarbons, aromatic [emissions to water, river]: 4.0116e-7 kg; lognormal SD95 3.01
  (2,3,1,1,1,3); Average of plant data
- Suspended solids, unspecified [emissions to water, river]: 5.5789e-6 kg; lognormal SD95 5
  Range for RER refineries
- Nickel [emissions to water, river]: 7.3094e-9 kg; lognormal SD95 5.02
  (2,4,1,2,1,3); Average of CH plant
- Butene [emissions to air, high. pop.]: 1.4489e-6 kg; lognormal SD95 1.65
  (3,5,4,3,1,4); Literature
- Ethene [emissions to air, high. pop.]: 2.8978e-6 kg; lognormal SD95 1.65
  (3,5,4,3,1,4); Literature
- Nitrate [emissions to water, river]: 4.5833e-6 kg; lognormal SD95 1.65
  (3,5,4,3,1,4); Literature
- Calcium [emissions to water, river]: 2.7894e-5 kg; lognormal SD95 1.65
  (3,5,4,3,1,4); Literature
- Aluminium [emissions to water, river]: 2.7894e-8 kg; lognormal SD95 5.13
  (3,5,4,3,1,4); Literature
- Sulfate [emissions to water, river]: 0.00010247 kg; lognormal SD95 1.65
  (3,5,4,3,1,4); Literature
- Sulfur dioxide [emissions to air, high. pop.]: 1.2427e-5 kg; lognormal SD95 1.51
  (2,1,1,1,1,3); Swiss plants
- Toluene [emissions to water, river]: 5.5789e-7 kg; lognormal SD95 3.12
  (3,5,4,3,1,4); Literature
- BOD5, Biological Oxygen Demand [emissions to water, river]: 1.45e-6 kg; lognormal SD95 3.16
  Range for RER refineries
- Ethane [emissions to air, high. pop.]: 1.4489e-5 kg; lognormal SD95 1.65
  (3,5,4,3,1,4); Literature
- Copper [emissions to water, river]: 5.5383e-9 kg; lognormal SD95 5.13
  (3,5,4,3,1,4); Literature
- Xylene [emissions to air, high. pop.]: 5.8056e-6 kg; lognormal SD95 1.65
  (3,5,4,3,1,4); Literature
- Silver [emissions to water, river]: 2.7894e-8 kg; lognormal SD95 5.13
  (3,5,4,3,1,4); Literature
- Zinc [emissions to water, river]: 9.5403e-8 kg; lognormal SD95 5.02
  (2,4,1,2,1,3); Average of CH plant
- Hydrocarbons, aliphatic, unsaturated [emissions to air, high. pop.]: 2.4247e-12 kg; lognormal SD95 1.51
  (2,3,1,3,1,3); Average of plant data
- Particulates, > 10 um [emissions to air, high. pop.]: 9.8566e-6 kg; lognormal SD95 2.12
  (3,5,4,3,1,4); Literature
- Hydrocarbons, aromatic [emissions to air, high. pop.]: 6.6237e-13 kg; lognormal SD95 1.51
  (2,3,1,3,1,3); Average of plant data
- Ammonium, ion [emissions to water, river]: 1.7132e-6 kg; lognormal SD95 6.32
  Range for RER refineries
- Sodium [emissions to water, river]: 0.00016756 kg; lognormal SD95 1.65
  (3,5,4,3,1,4); Literature
- Vanadium [emissions to water, river]: 1.6634e-8 kg; lognormal SD95 5.13
  (3,5,4,3,1,4); Literature
- Pentane [emissions to air, high. pop.]: 7.2545e-5 kg; lognormal SD95 1.65
  (3,5,4,3,1,4); Literature
- Oils, unspecified [emissions to water, river]: 1.4477e-7 kg; lognormal SD95 14
  Range for RER refineries
- Benzene [emissions to water, river]: 1.1516e-8 kg; lognormal SD95 44.7
  Range for RER refineries
- Cyanide [emissions to water, river]: 9.6595e-8 kg; lognormal SD95 5.77
  Range for RER refineries
- Molybdenum [emissions to water, river]: 5.5789e-9 kg; lognormal SD95 5.13
  (3,5,4,3,1,4); Literature
- Mercury [emissions to water, river]: 5.5789e-11 kg; lognormal SD95 5.13
  (3,5,4,3,1,4); Literature
- Magnesium [emissions to water, river]: 1.3898e-5 kg; lognormal SD95 5.13
  (3,5,4,3,1,4); Literature
- Propene [emissions to air, high. pop.]: 2.8978e-6 kg; lognormal SD95 1.65
  (3,5,4,3,1,4); Literature
- Methane, fossil [emissions to air, high. pop.]: 1.6263e-5 kg; lognormal SD95 1.23
  (3,na,na,na,1,na); Average of plant data
- Ammonia [emissions to air, high. pop.]: 7.2446e-8 kg; lognormal SD95 1.54
  (3,4,1,3,1,3); Plant data
- Cadmium [emissions to water, river]: 5.5383e-9 kg; lognormal SD95 5.13
  (3,5,4,3,1,4); Literature
- Hexane [emissions to air, high. pop.]: 2.8978e-5 kg; lognormal SD95 1.65
  (3,5,4,3,1,4); Literature
- TOC, Total Organic Carbon [emissions to water, river]: 5.7108e-6 kg; lognormal SD95 1.65
  (3,5,4,3,1,4); Estimation
- Benzene, ethyl- [emissions to air, high. pop.]: 1.4489e-6 kg; lognormal SD95 1.65
  (3,5,4,3,1,4); Literature
- Xylene [emissions to water, river]: 5.5789e-8 kg; lognormal SD95 3.12
  (3,5,4,3,1,4); Literature
- AOX, Adsorbable Organic Halogen as Cl [emissions to water, river]: 8.1159e-9 kg; lognormal SD95 3.16
  Range for RER refineries
- Barium [emissions to water, river]: 5.5789e-8 kg; lognormal SD95 5.13
  (3,5,4,3,1,4); Literature
- Nitrogen oxides [emissions to air, high. pop.]: 1.1097e-5 kg; lognormal SD95 1.51
  (2,1,1,1,1,3); Swiss plants
- Butane [emissions to air, high. pop.]: 5.8056e-5 kg; lognormal SD95 1.65
  (3,5,4,3,1,4); Literature
- Selenium [emissions to water, river]: 8.3683e-9 kg; lognormal SD95 5.13
  (3,5,4,3,1,4); Literature
- Strontium [emissions to water, river]: 3.8748e-7 kg; lognormal SD95 5.13
  (3,5,4,3,1,4); Literature
- Water [emissions to water, unspecified]: 0.529995, 3.77359 kg (2 entries); lognormal SD95 2.5196
  (5,5,5,5,5,BU:1.05); All uncertainty-values set to 5.0 by default. Balance of input water

## Sampling procedure
Questionnaires and literature.

## Sources
- Stolz P., Frischknecht R., 2017, 2017 - Energy label for passenger cars - Stolz, -, 611, treeze Ltd., Bern, CH
Stolz P., Frischknecht R. (2017) Energieetikette für Personenwagen: Umweltkennwerte 2017 der Strom- und Treibstoffbereitstellung. Volume: 611. treeze Ltd.. Uster, CH.
Type: Measurement on site
First author: Stolz P.
Other authors: Frischknecht R.
Year: 2017
Place of publication: Uster, CH
Publisher: treeze Ltd.
Volume No: 611
Original title: Energieetikette für Personenwagen: Umweltkennwerte 2017 der Strom- und Treibstoffbereitstellung
