# Insulation spiral-seam duct, rockwool, DN 400, 30 mm, at plant

Dataset: EcoSpold 1, unit process
Functional unit: 1 m
Category: construction / ventilation\components
Geography: RER
Time period: 2003-01 to 2003-12
Generated by: Alex Primas
accessRestrictedTo: 0
copyright: true

## General comment
Production of a typical component used for a ventilation system in a multi family house. The house considered in the investigation includes 6 flats with 130 m2 floor area each and a ventilation rate of 120 m3/h.;

## Included processes
Materials used for the production. Estimation of electricity use for the different production steps. Energy use for heating of the production building. Transport of raw materials to the plant. Estimation for the Infrastructure of the Production site included.

## Geography
Data for production in Germany used.

## Technology
Insulation made of rock wool with 0.2 mm aluminium foil cover. Protected with a net made of galvanised steel wire. Weight 3.3 kg/m

## Time period
Materials investigated in 2003

## Reference product
- Insulation spiral-seam duct, rockwool, DN 400, 30 mm, at plant [RER]: 1 m
  Europe

## Inputs from technosphere
- Rock wool, packed, at plant [CH]: 1.76 kg; lognormal SD95 1.24
  (2,4,1,1,1,5); Questionnaire
- Zinc coating, coils [RER]: 0.45 m2; lognormal SD95 1.26
  (3,4,1,1,1,5); Questionnaire, estimations
- Transport, freight, rail [RER]: 0.726 tkm; lognormal SD95 2.09
  (4,5,nA,nA,nA,nA); Standard distance of ecoinvent used
- Light fuel oil, burned in industrial furnace 1MW, non-modulating [RER]: 6.93 MJ; lognormal SD95 1.38
  4,5,1,1,1,5; Data estimated from related companies
- Disposal, inert waste, 5% water, to construction waste landfill [CH]: 0.16 kg; lognormal SD95 1.32
  (4,4,1,1,1,5); Estimations on precentage material disposed
- Sheet rolling, aluminium [RER]: 0.88 kg; lognormal SD95 1.26
  (3,4,1,1,1,5); Questionnaire, estimations
- Aluminium, production mix, wrought alloy, at plant [RER]: 0.88 kg; lognormal SD95 1.24
  (2,4,1,1,1,5); Questionnaire
- Steel, electric, un- and low-alloyed, at plant [RER]: 0.366 kg; lognormal SD95 1.24
  (2,4,1,1,1,5); Questionnaire
- Electricity, medium voltage, production ENTSO-E, at grid: 0.671 kWh; lognormal SD95 1.69
  (3,5,5,1,3,5); Data estimated from related processes
- Wire drawing, steel [RER]: 0.99 kg; lognormal SD95 1.26
  (3,4,1,1,1,5); Questionnaire, estimations
- Natural gas, burned in industrial furnace 1MWth [CH]: 6.93 MJ; lognormal SD95 1.38
  (4,5,1,1,1,5); Data estimated from related companies
- Ventilation components factory [RER]: 1.32e-8 p; lognormal SD95 3.18
  (4,5,1,1,3,5); Calculated with data of a similar company
- Transport, freight, lorry, fleet average [RER]: 0.365 tkm; lognormal SD95 2.09
  (4,5,nA,nA,nA,nA); Standard distance of ecoinvent used
- Steel, converter, unalloyed, at plant [RER]: 0.624 kg; lognormal SD95 1.24
  (2,4,1,1,1,5); Questionnaire

## Emissions to nature
- Heat, waste [emissions to air, high. pop.]: 2.41 MJ; lognormal SD95 1.69
  (3,5,5,1,3,5); Calculated from electricity use

## Sampling procedure
Questionnaire and technical information of producer. Data of one common product used.

## Sources
- Haessig W., Primas A., 2007, 2007 - LCI comfort ventilation in dwellings - Haessig, Final report ecoinvent Data v2.0, 25, Swiss Centre for LCI, B+H, Duebendorf and Zuerich, CH
Hässig, W., Primas, A. (2007) Ökologische Aspekte der Komfortlüftungen im Wohnbereich. Final report ecoinvent Data v2.0. Volume: 25. Swiss Centre for LCI, B+H. Dübendorf and Zürich, CH.
Type: Measurement on site
Source: CD-ROM
First author: Hässig, W.
Other authors: Primas, A.
Year: 2007
Title of anthology: Final report ecoinvent Data v2.0
Place of publication: Dübendorf and Zürich, CH
Publisher: Swiss Centre for LCI, B+H
Volume No: 25

## Validation
Proof reading validation: passed; Other validation: none;
