# Flooring, 2K epoxy resin PU, living and administration, at plant

Dataset: EcoSpold 1, unit process
Functional unit: 1 m2
Category: flooring / flooring kbob
Geography: CH
Time period: 2012-01 to 2012-12
Share of production covered: 0 %
Generated by: Matthias Klingler
accessRestrictedTo: 0
copyright: true

## General comment
Durchschnittliches Flächengewicht = 3.6 kg/m2;

## Included processes
Bilanzen beruhen auf Herstellerangaben für durchschnittliche Rezepturen, Energieverbrauch und Emissionen.

## Reference product
- Flooring, 2K epoxy resin PU, living and administration, at plant [CH]: 1 m2

## Inputs from technosphere
- Barite, at plant [RER]: 0.45 kg; lognormal SD95 1.0712
- Acrylic dispersion, 65% in H2O, at plant [RER]: 0.06125 kg; lognormal SD95 1.0712
- Titanium dioxide, production mix, at plant [RER]: 0.1 kg; lognormal SD95 1.0712
- Silica sand, at plant [DE]: 0.3563 kg; lognormal SD95 1.0712
- Polyols, at plant [RER]: 1.025 kg; lognormal SD95 1.0712
- Electricity, medium voltage, at grid [CH]: 0.198 kWh; lognormal SD95 1.0712
- Kaolin, at plant [RER]: 0.46875 kg; lognormal SD95 1.0712
- Chemical plant, organics [RER]: 1.44e-9 p; lognormal SD95 1.6822
- Benzyl alcohol, at plant [RER]: 0.0475 kg; lognormal SD95 1.0712
- Epoxy resin, liquid, at plant [RER]: 0.285 kg; lognormal SD95 1.0712
- Transport, freight, lorry, 32t-40t gross weight, fleet average [CH]: 0.18 tkm; lognormal SD95 1.311
- Methylene diphenyl diisocyanate, at plant [RER]: 0.525 kg; lognormal SD95 1.0712
- Dimethylamine, at plant [RER]: 0.1663 kg; lognormal SD95 1.0712
- Transport, freight, rail [RER]: 2.16 tkm; lognormal SD95 1.311
- Phenol, at plant [RER]: 0.02375 kg; lognormal SD95 1.0712
- Butane-1,4-diol, at plant [RER]: 0.07125 kg; lognormal SD95 1.0712
- Solvents, organic, unspecified, at plant [GLO]: 0.02 kg; lognormal SD95 1.0712

## Emissions to nature
- NMVOC, non-methane volatile organic compounds, unspecified origin [emissions to air, high. pop.]: 0.044842 kg; lognormal SD95 1.1025
- COD, Chemical Oxygen Demand [emissions to water, unspecified]: 5.0026e-9 kg; lognormal SD95 1.1025

## Sources
- Werner F., 2017, 2017 - LCI wood and wood based products - Werner, Project Report, 0, Environment & Development, Zuerich, CH

## Validation
Proof reading validation: 13.03.2013; Other validation: \\SERVER\Users\Admin\Documents\Projekte laufend\297 BAFU Anfragen\Bodenbeläge\[c Ecospold alle Prozesse_v0.2.xlsx]X-Process;
