# Palladium, primary, at refinery

Dataset: EcoSpold 1, unit process
Functional unit: 1 kg
Category: metals / non ferro
Geography: ZA
Time period: 2000-01 to 2000-12
Production volume: 221 t / a
Share of production covered: 63 %
Generated by: Mischa Classen
accessRestrictedTo: 0
copyright: true

## General comment
The multioutput-process "platinum group metal production, primary" delivers the co-products "platinum, primary, at refinery", "palladium, primary, at refinery", "rhodium, primary, at refinery", "nickel, primary, from platinum group metal production" and "copper, primary, from platinum group metal production" in South Africa (ZA). The module is designed for the use of the metal in technical systems, where it plays a minor role like the use in manufacturing of electronic or technical chemistry using certain catalysts. It is not to be used if the impact of the PGM within the modelled process in scope is considered to be high. In such cases, a more detailed analysis depending on scope and allocation procedures has to be conducted. The data used is mainly based on a LCA study for autocatalysts in Germany.;

## Included processes
The module includes a mining and a beneficiation step with the mining infrastructure and disposal of overburden and tailings. Subsequently it includes the metallurgy step with the disposal of slag, the infrastructure and the separation of the co-products nickel and copper, and the refining step yielding the desired PGM-mix inclusively the refining infrastructure. Production, application and emissions of most agents used in beneficiation and metallurgy are also included.

## Geography
Some agents used like lime or sodium cyanide originate from data sets valid for Switzerland or Europe. Processes like blasting and transport originate from data sets valid for Switzerland or Europe.

## Technology
Mining is done underground, followed by beneficiation trough flotation where considerable amounts of agents are added. Overburden and tailings are disposed on the mining site and partly refilled. In ZA a electric arc furnace with a Søderberg electrode system and a Pierce-Smith-Converter is used. sulphur dioxide in the off-gas is recovered producing sulphuric acid. The separation of non ferrous metals is done hydrometallurgically, the refining by selective precipitation. Allthough electricity production in ZA is mainly coal based, the UCTE production mix is inventoried.

## Reference product
- Palladium, primary, at refinery [ZA]: 1 kg
  SOUTH AFRICA

## Inputs from technosphere
- Non-ferrous metal smelter [GLO]: 1.697e-8 p; lognormal SD95 3.3
  (4,2,1,5,4,4,9)
- Chemicals organic, at plant [GLO]: 39.0299 kg; lognormal SD95 2
  reported values
- Non-ferrous metal mine, underground [GLO]: 3.2568e-6 p; lognormal SD95 3.07
  (3,2,1,1,3,4,9)
- Natural gas, burned in industrial furnace 1MWth [CH]: 12576 MJ; lognormal SD95 1.13
  (2,2,1,1,1,4,1)
- Disposal, nickel smelter slag, 0% water, to residual material landfill [CH]: 420.322 kg; lognormal SD95 1.13
  (2,2,2,3,1,4) 6;
- Electricity, medium voltage, production ENTSO-E, at grid: 14320.2 kWh; lognormal SD95 1.26
  (3,2,1,1,3,4) 2;
- Hydrogen cyanide, at plant [RER]: 6.08944 kg; lognormal SD95 2
  reported values
- Limestone, milled, packed, at plant [CH]: 345.917 kg; lognormal SD95 2
  reported values
- Chemical plant, organics [RER]: 2.8433e-10 p; lognormal SD95 3.3
  (4,2,1,5,4,4,9)
- Diesel, burned in building machine, average [CH]: 12727.1 MJ; lognormal SD95 2.33
  (4,3,2,2,4,5,5)
- Disposal, sulfidic tailings, off-site [GLO]: 89416.3 kg; lognormal SD95 1.13
  (2,2,2,3,1,4) 6;
- Conveyor belt, at plant [RER]: 0.0036876 m; lognormal SD95 3.93
  (5,4,3,3,5,6,9)
- Chemicals inorganic, at plant [GLO]: 255.848 kg; lognormal SD95 2
  reported values
- Blasting [RER]: 0.086806 kg; lognormal SD95 1.26
  (3,2,1,1,3,4,1)

## Inputs from nature
- Occupation, mineral extraction site [resources, land]: 30.6104 m2a; lognormal SD95 1.53
  (3,2,3,1,1,2,7); calculation based on reported value
- Transformation, from unknown [resources, land]: 0.43207 m2; lognormal SD95 2.03
  (3,2,3,1,1,2,8); calculation based on reported value
- Palladium, Pd 2.0E-4%, Pt 4.8E-4%, Rh 2.4E-5%, Ni 3.7E-2%, Cu 5.2E-2% in ore [resources, in ground]: 1.11111 kg; lognormal SD95 1.12
  reported values
- Water, river [resources, in water]: 90.069 m3; lognormal SD95 1.13
  (2,2,1,1,1,4,12)
- Water, well [resources, in water]: 24.2142 m3; lognormal SD95 1.26
  (3,2,1,1,3,4,12)
- Transformation, to mineral extraction site [resources, land]: 0.43207 m2; lognormal SD95 2.03
  (3,2,3,1,1,2,8); calculation based on reported value

## Emissions to nature
- Heat, waste [emissions to air, low. pop.]: 56013.7 MJ; lognormal SD95 1.26
  (3,2,1,1,3,4) 2;
- Lead [emissions to water, river]: 0.27282 kg; lognormal SD95 10
  (,,,,,) ; reported values
- Nickel [emissions to air, low. pop.]: 0.010508 kg; lognormal SD95 1.59
  (3,2,1,1,3,4) 31;
- Cadmium [emissions to water, river]: 0.030806 kg; lognormal SD95 10
  (,,,,,) ; reported values
- Sulfur dioxide [emissions to air, low. pop.]: 124.661 kg; lognormal SD95 1.38
  (4,2,2,1,3,5) 15;
- Copper [emissions to air, low. pop.]: 0.0099206 kg; lognormal SD95 5.08
  (3,2,1,1,3,4) 22;
- Carbon disulfide [emissions to air, low. pop.]: 17.2959 kg; lognormal SD95 2.31
  (4,2,2,5,4,4,23)
- Manganese [emissions to water, river]: 2.40184 kg; lognormal SD95 10
  (,,,,,) ; reported values
- Tin [emissions to water, river]: 0.00023823 kg; lognormal SD95 10
  reported values
- Carbon dioxide, fossil [emissions to air, unspecified]: 179.485 kg; lognormal SD95 1.58
  (4,2,1,1,4,4) 14; excluding stdev of lime addition
- Chromium [emissions to air, low. pop.]: 0.0067878 kg; lognormal SD95 1.59
  (3,2,1,1,3,4,31)
- Zinc [emissions to water, river]: 7.37521 kg; lognormal SD95 10
  (,,,,,) ; reported values
- Cadmium [emissions to air, low. pop.]: 7.4405e-6 kg; lognormal SD95 1.59
  (3,2,1,1,3,4,31)
- Cyanide [emissions to water, river]: 0.67225 kg; lognormal SD95 3.84
  (4,2,2,3,4,4) 33; including stdev of sodium cyanide
- BOD5, Biological Oxygen Demand [emissions to water, river]: 0.68629 kg; lognormal SD95 10
  (,,,,,) ; reported values
- Beryllium [emissions to air, low. pop.]: 0.00017622 kg; lognormal SD95 1.59
  (3,2,1,1,3,4,31)
- Aluminium [emissions to water, river]: 8.41949 kg; lognormal SD95 10
  (,,,,,) ; reported values
- Arsenic [emissions to water, river]: 0.28718 kg; lognormal SD95 10
  (,,,,,) ; reported values
- Nitrogen, organic bound [emissions to water, river]: 2.21909 kg; lognormal SD95 10
  (,,,,,) ; reported values
- TOC, Total Organic Carbon [emissions to water, river]: 0.40393 kg; lognormal SD95 10
  (,,,,,) ; reported values
- Nickel [emissions to water, river]: 2.36921 kg; lognormal SD95 10
  (,,,,,) ; reported values
- Mercury [emissions to water, river]: 0.0036746 kg; lognormal SD95 10
  (,,,,,) ; reported values
- Arsenic [emissions to air, low. pop.]: 0.0010573 kg; lognormal SD95 5.08
  (3,2,1,1,3,4) 22;
- DOC, Dissolved Organic Carbon [emissions to water, river]: 0.40393 kg; lognormal SD95 10
  (,,,,,) ; reported values
- Suspended solids, unspecified [emissions to water, river]: 0.50386 kg; lognormal SD95 10
  (,,,,,) ; reported values
- Cobalt [emissions to air, low. pop.]: 0.0062657 kg; lognormal SD95 5.08
  (3,2,1,1,3,4) 22;
- Tin [emissions to air, low. pop.]: 0.0010704 kg; lognormal SD95 5.08
  (3,2,1,1,3,4,22)
- Lead [emissions to air, low. pop.]: 0.0060438 kg; lognormal SD95 5.08
  (3,2,1,1,3,4) 22;
- Mercury [emissions to air, low. pop.]: 3.3939e-6 kg; lognormal SD95 1.59
  (3,2,1,1,3,4,31)
- Particulates, > 10 um [emissions to air, low. pop.]: 34.5264 kg; lognormal SD95 2.26
  (3,2,1,1,5,4) 18;
- Cobalt [emissions to water, river]: 0.076363 kg; lognormal SD95 10
  (,,,,,) ; reported values
- Particulates, < 2.5 um [emissions to air, low. pop.]: 3.33516 kg; lognormal SD95 3.69
  (3,2,1,1,5,4) 20;
- COD, Chemical Oxygen Demand [emissions to water, river]: 1.03271 kg; lognormal SD95 10
  (,,,,,) ; reported values
- Manganese [emissions to air, low. pop.]: 0.064484 kg; lognormal SD95 1.59
  (3,2,1,1,3,4,31)
- Fluorine [emissions to air, low. pop.]: 0.064484 kg; lognormal SD95 1.59
  (3,2,1,1,3,4,31)
- Particulates, > 2.5 um, and < 10um [emissions to air, low. pop.]: 30.0883 kg; lognormal SD95 2.69
  (3,2,1,1,5,4) 19;
- Nitrogen oxides [emissions to air, low. pop.]: 0.025021 kg; lognormal SD95 1.59
  (3,2,1,1,3,4,16)
- Copper [emissions to water, river]: 0.77015 kg; lognormal SD95 10
  (,,,,,) ; reported values
- Zinc [emissions to air, low. pop.]: 0.029436 kg; lognormal SD95 5.08
  (3,2,1,1,3,4) 22;
- NMVOC, non-methane volatile organic compounds, unspecified origin [emissions to air, low. pop.]: 0.032699 kg; lognormal SD95 1.59
  (3,2,1,1,3,4,16)
- Antimony [emissions to air, low. pop.]: 0.013576 kg; lognormal SD95 1.59
  (3,2,1,1,3,4,31)
- Sulfate [emissions to water, river]: 229.741 kg; lognormal SD95 10
  (,,,,,) ; reported values
- Calcium [emissions to water, river]: 66.5727 kg; lognormal SD95 10
  reported values
- Selenium [emissions to air, low. pop.]: 3.3939e-6 kg; lognormal SD95 1.59
  (3,2,1,1,3,4,31)
- Boron [emissions to air, low. pop.]: 0.00067878 kg; lognormal SD95 1.59
  (3,2,1,1,3,4,31)
- Chromium [emissions to water, river]: 0.053519 kg; lognormal SD95 10
  (,,,,,) ; reported values
- Iron [emissions to water, river]: 28.326 kg; lognormal SD95 10
  (,,,,,) ; reported values
- Dioxin, 2,3,7,8 Tetrachlorodibenzo-p- [emissions to air, low. pop.]: 1.6382e-9 kg; lognormal SD95 3.07
  (3,2,1,1,3,4,21)
- Water [emissions to water, unspecified]: 85565.5, 21792.8 kg (2 entries); lognormal SD95 2.5196
  (5,5,5,5,5,BU:1.05); All uncertainty-values set to 5.0 by default. Balance of input water

## Sampling procedure
Literature

## Extrapolations
see Geography and Technology

## Sources
- Classen M., Althaus H.-J., Blaser S., Scharnhorst W., Tuchschmid M., Jungbluth N., Faist Emmenegger M., 2009, 2009 - LCI metals - Classen, Final report ecoinvent data v2.1, 10, Swiss Centre for LCI, Empa, ESU-services Ltd., Duebendorf, CH
Classen M., Althaus H.-J., Blaser S., Doka G., Jungbluth N., Tuchschmid M. (2008) Life Cycle Inventories of Metals. Final report ecoinvent data v2.1. Volume: 10. Issue: 0. Swiss Centre for LCI, Empa - TSL. Dübendorf, CH.
Type: Measurement on site
Source: CD-ROM
First author: Classen M.
Other authors: Althaus H.-J., Blaser S., Doka G., Jungbluth N., Tuchschmid M.
Year: 2008
Title of anthology: Final report ecoinvent data v2.1
Place of publication: Dübendorf, CH
Publisher: Swiss Centre for LCI, Empa - TSL
Volume No: 10
Issue No: 0

## Validation
Proof reading validation: passed; Other validation: none;
