# Light fuel oil, burned in boiler 10kW, condensing, modulating

Dataset: EcoSpold 1, unit process
Functional unit: 1 MJ
Category: heat / oil\heating systems
Geography: CH
Generated by: Niels Jungbluth
accessRestrictedTo: 0
copyright: true

## General comment
Inventory for the operation of a modern condensing, modulating low-temperature oil boiler for one-family houses, data related to fuel input.;

## Included processes
Direct air emissions from combustion, waste, effluents and auxiliary electricity use, input of fuel oil. Infrastructure is included.

## Geography
Assumption for operation in Switzerland.

## Technology
Average modulating, condensing boiler used in 2016.

## Time period
Estimation for regulated emissions investigated in 2016. Data for subsidiary regulated emissions are partly based on older literature data.

## Reference product
- Light fuel oil, burned in boiler 10kW, condensing, modulating [CH]: 1 MJ
  SWITZERLAND

## Inputs from technosphere
- Oil storage 3000l [CH]: 4.4092e-7 p; lognormal SD95 3.2412
  (3,3,5,1,1,na); Calculated
- Chimney [CH]: 2.6455e-6 m; lognormal SD95 3.2412
  (3,3,5,1,1,na); Calculated
- Electricity, low voltage, at grid [CH]: 0.0027275 kWh; lognormal SD95 1.5253
  (3,3,5,1,1,na); Literature
- Treatment, condensate from light oil boiler, to wastewater treatment, class 2 [CH]: 9.7902e-6 m3; lognormal SD95 3.2412
  (3,3,5,1,1,na); Literature, basic uncertainity = 3
- Disposal, hazardous waste, 25% water, to hazardous waste incineration [CH]: 4.15e-6 kg; lognormal SD95 1.5253
  (3,3,5,1,1,na); Literature
- Oil boiler 10kW [CH]: 6.8413e-7 p; lognormal SD95 3.0281
  (3,3,3,1,1,na); Estimation 2100h use per year
- Light fuel oil, at regional storage [CH]: 0.02331 kg; lognormal SD95 1.1249
  (3,3,1,1,1,na); Literature

## Emissions to nature
- Hydrocarbons, aliphatic, unsaturated [emissions to air, high. pop.]: 2e-8 kg; lognormal SD95 1.521
  (3,3,1,1,1,na); Literature
- Acetone [emissions to air, high. pop.]: 3.5e-7 kg; lognormal SD95 1.521
  (3,3,1,1,1,na); Literature
- Acetic acid [emissions to air, high. pop.]: 1.4e-7 kg; lognormal SD95 1.521
  (3,3,1,1,1,na); Literature
- Nickel [emissions to air, high. pop.]: 1.1655e-7 kg; lognormal SD95 5.0178
  (3,3,1,1,1,na); Product properties
- Hydrocarbons, aliphatic, alkanes, unspecified [emissions to air, high. pop.]: 1.75e-6 kg; lognormal SD95 1.521
  (3,3,1,1,1,na); Literature
- Ethene [emissions to air, high. pop.]: 5e-8 kg; lognormal SD95 1.521
  (3,3,1,1,1,na); Literature
- Sulfur dioxide [emissions to air, high. pop.]: 1.3e-6 kg; lognormal SD95 1.1635
  (3,3,3,1,1,na); Calculated
- Hydrogen fluoride [emissions to air, high. pop.]: 4.5e-9 kg; lognormal SD95 1.521
  (3,3,1,1,1,na); Literature
- Formaldehyde [emissions to air, high. pop.]: 4.2e-8 kg; lognormal SD95 1.521
  (3,3,1,1,1,na); Literature
- Acetylene, dichloro- [emissions to air, high. pop.]: 7e-8 kg; lognormal SD95 1.521
  (3,3,1,1,1,na); Literature
- Ethyne [emissions to air, high. pop.]: 1e-8 kg; lognormal SD95 1.521
  (3,3,1,1,1,na); Literature
- Hydrogen chloride [emissions to air, high. pop.]: 9.4e-8 kg; lognormal SD95 1.521
  (3,3,1,1,1,na); Literature
- Propane [emissions to air, high. pop.]: 2.1e-7 kg; lognormal SD95 1.521
  (3,3,1,1,1,na); Literature
- Propionic acid [emissions to air, high. pop.]: 1.4e-7 kg; lognormal SD95 1.521
  (3,3,1,1,1,na); Literature
- Ethane [emissions to air, high. pop.]: 1.4e-7 kg; lognormal SD95 1.521
  (3,3,1,1,1,na); Literature
- Ethanol [emissions to air, high. pop.]: 7e-8 kg; lognormal SD95 1.521
  (3,3,1,1,1,na); Literature
- Hydrocarbons, aromatic [emissions to air, high. pop.]: 1.19e-7 kg; lognormal SD95 1.521
  (3,3,1,1,1,na); Literature
- Dinitrogen monoxide [emissions to air, high. pop.]: 5.5e-7 kg; lognormal SD95 4.0297
  (3,3,3,1,1,na); Struschka 2008 basic uncertainty estimated = 4
- Heat, waste [emissions to air, high. pop.]: 1.0634 MJ; lognormal SD95 1.5253
  (3,3,5,1,1,na); Literature
- Zinc [emissions to air, high. pop.]: 5e-10 kg; lognormal SD95 5.032
  (3,3,3,1,1,na); Literature
- Aldehydes, unspecified [emissions to air, high. pop.]: 3.5e-7 kg; lognormal SD95 1.521
  (3,3,1,1,1,na); Literature
- Ethylene diamine [emissions to air, high. pop.]: 3.5e-7 kg; lognormal SD95 1.521
  (3,3,1,1,1,na); Literature
- Benzene [emissions to air, high. pop.]: 1.4e-7 kg; lognormal SD95 3.0157
  (3,3,1,1,1,na); Literature
- Butane [emissions to air, high. pop.]: 1.05e-6 kg; lognormal SD95 1.521
  (3,3,1,1,1,na); Literature
- Particulates, < 2.5 um [emissions to air, high. pop.]: 3.9167e-7 kg; lognormal SD95 3.0281
  (3,3,3,1,1,na); Literature, basic uncertainty estimated = 3
- Mercury [emissions to air, high. pop.]: 4.662e-10 kg; lognormal SD95 5.0178
  (3,3,1,1,1,na); Product properties
- Benzaldehyde [emissions to air, high. pop.]: 6e-9 kg; lognormal SD95 1.521
  (3,3,1,1,1,na); Literature
- Propanal [emissions to air, high. pop.]: 6e-9 kg; lognormal SD95 1.521
  (3,3,1,1,1,na); Literature
- Copper [emissions to air, high. pop.]: 4e-10 kg; lognormal SD95 5.0178
  (3,3,1,1,1,na); Literature
- Propene [emissions to air, high. pop.]: 2e-8 kg; lognormal SD95 1.521
  (3,3,1,1,1,na); Literature
- Nitrogen oxides [emissions to air, high. pop.]: 2.22e-5 kg; lognormal SD95 1.5044
  (2,1,1,1,1,na); Literature
- PAH, polycyclic aromatic hydrocarbons [emissions to air, high. pop.]: 4.6e-10 kg; lognormal SD95 3.0281
  (3,3,3,1,1,na); Literature
- Acrolein [emissions to air, high. pop.]: 1.15e-8 kg; lognormal SD95 1.521
  (3,3,1,1,1,na); Literature
- Lead [emissions to air, high. pop.]: 1.1655e-7 kg; lognormal SD95 5.0178
  (3,3,1,1,1,na); Product properties
- Acetaldehyde [emissions to air, high. pop.]: 1.4e-7 kg; lognormal SD95 1.521
  (3,3,1,1,1,na); Literature
- Dioxin, 2,3,7,8 Tetrachlorodibenzo-p- [emissions to air, high. pop.]: 5.7e-17 kg; lognormal SD95 3.0281
  (3,3,3,1,1,na); Literature
- Pentane [emissions to air, high. pop.]: 7e-7 kg; lognormal SD95 1.521
  (3,3,1,1,1,na); Literature
- Methane, fossil [emissions to air, high. pop.]: 1.0003e-6 kg; lognormal SD95 1.521
  (3,3,1,1,1,na); Literature
- Propylene oxide [emissions to air, high. pop.]: 1.4e-7 kg; lognormal SD95 1.521
  (3,3,1,1,1,na); Literature
- Toluene [emissions to air, high. pop.]: 9.87e-8 kg; lognormal SD95 1.521
  (3,3,1,1,1,na); Literature
- Carbon monoxide, fossil [emissions to air, high. pop.]: 3e-6 kg; lognormal SD95 5.0178
  (3,3,1,1,1,na); Literature
- Carbon dioxide, fossil [emissions to air, high. pop.]: 0.073675 kg; lognormal SD95 1.1249
  (3,3,1,1,1,na); Literature

## Sampling procedure
Data published in literature based on measurements and technical data sheets.

## Extrapolations
Some information from other European countries has been used to determine the emission factors.

## Sources
- Jungbluth N., Wenzel P., Meili C., 2018, 2018 - LCI oil heating systems - Jungbluth, Project report, 565, ESU-services Ltd., Schaffhausen, CH
Jungbluth N., Wenzel P., Meili C. (2018) Life cycle inventories of oil heating systems. Project report. Volume: 565. ESU-services Ltd.. Schaffhausen, CH.
Type: Separate publication
Source: Report
First author: Jungbluth N.
Other authors: Wenzel P., Meili C.
Year: 2018
Title of anthology: Project report
Place of publication: Schaffhausen, CH
Publisher: ESU-services Ltd.
Volume No: 565

## Validation
Proof reading validation: automatic validation in Excel; Other validation: https://esuservices-my.sharepoint.com/personal/mitarbeiter1_esuservices_onmicrosoft_com/Documents/565 LCI oil sector CH BAFU/EcoSpold/[EcoSpold-heating-2018-v6.0.xlsx]X-Process;
