# High pressure hydrogen Type IV storage tank production

Dataset: EcoSpold 1, unit process
Functional unit: 1 p
Category: pipeline / infrastructure
Geography: GLO
Time period: 2024-01 to 2024-01
Generated by: Romain Sacchi
accessRestrictedTo: 0
copyright: true

## General comment
Inventory for a high pressure storage Type IV tank, with a capacity of 10 kg of hydrogen at 700 bar (Boureima et al., 2011; Das, 2011). Assumed lifetime of 20 years. Source: C. Wulf et al. / Journal of Cleaner Production 199 (2018) 431-443

## Reference product
- High pressure hydrogen Type IV storage tank production [GLO]: 1 p
  not defined

## Inputs from technosphere
- Electricity, low voltage, production ENTSO-E, at grid: 4.5 kWh; lognormal SD95 2.565
  {5;5;5;5;5;5;1.05;}
- Sheet rolling, aluminium [RER]: 6 kg; lognormal SD95 2.565
  {5;5;5;5;5;5;1.05;}
- Aluminium alloy, AlMg3, at plant [RER]: 6 kg; lognormal SD95 2.565
  {5;5;5;5;5;5;1.05;}
- Sheet rolling, chromium steel [RER]: 9 kg; lognormal SD95 2.565
  {5;5;5;5;5;5;1.05;}
- Chromium steel 18/8, at plant [RER]: 9 kg; lognormal SD95 2.565
  {5;5;5;5;5;5;1.05;}
- Carbon fiber production, weaved, at factory [RER]: 71.4 kg; lognormal SD95 2.565
  {5;5;5;5;5;5;1.05;}
- Epoxy resin, liquid, at plant [RER]: 30.6 kg; lognormal SD95 2.565
  {5;5;5;5;5;5;1.05;}
- Sheet rolling, steel [RER]: 9 kg; lognormal SD95 2.565
  {5;5;5;5;5;5;1.05;}
- Steel, low-alloyed, at plant [RER]: 9 kg; lognormal SD95 2.565
  {5;5;5;5;5;5;1.05;}
- Transport, freight, rail [RER]: 23.16 tkm; lognormal SD95 2.208
  Generic transport distances calculated based on Table 4.2 of the ecoinvent v.2 Methodology report. Distribution: 19.3 kg over 1200.0 km.
- Transport, freight, lorry, 16t-32t gross weight, fleet average [RER]: 48.3 tkm; lognormal SD95 2.208
  Generic transport distances calculated based on Table 4.2 of the ecoinvent v.2 Methodology report. Distribution: 48.3 kg over 1000.0 km.
- Transport, barge tanker [RER]: 7.14 tkm; lognormal SD95 2.208
  Generic transport distances calculated based on Table 4.2 of the ecoinvent v.2 Methodology report. Distribution: 71.4 kg over 100.0 km.

## Sampling procedure
Sampling procedure: Literature data

## Sources
- Sacchi R., Bauer C., 2024, 2024 - LCA power-to-X in residential sector - Sacchi, Project report, PSI, Villigen, CH

## Validation
Proof reading validation: Passed, Other validation: none, Validator: Rolf Frischknecht, Telephone: 0041 44 940 61 91, E-mail: frischknecht@treeze.ch, Company: treeze, Country: CH
