# Marble pit lime plaster, at plant

Dataset: EcoSpold 1, unit process
Functional unit: 1 kg
Category: construction materials / plaster
Geography: CH
Time period: 2000-01 to 2016-12
Generated by: Daniel Savi
accessRestrictedTo: 0
copyright: true

## General comment
Sumpfkalkputz, Herstellung
Version: 0.0

Local category: construction materials
Local subcategory: Putze

## Reference product
- Marble pit lime plaster, at plant [CH]: 1 kg
  SWITZERLAND

## Inputs from technosphere
- Silicone product, at plant [RER]: 0.001005 kg; lognormal SD95 1.10306
- Manufacturing, dry mortar, per kg mortar [CH]: 1 kg; lognormal SD95 1.10306
  (2;3;1;2;2)
- Tap water, at user [CH]: 0.253 kg; lognormal SD95 1.10306
- Carboxymethyl cellulose, powder, at plant [RER]: 0.00402 kg; lognormal SD95 1.10306
- Transport, freight, lorry, 16t-32t gross weight, fleet average [RER]: 0.343 tkm; lognormal SD95 2.01043
  (2;3;1;2;2)
- Plastics bucket 18 l incl. transport packaging, at plant [RER]: 0.04 p; lognormal SD95 1.10306
- Disposal, plaster, mortar, as building waste [CH]: 0.005 kg; lognormal SD95 1.10306
- Acrylic binder, 34% in H2O, at plant [RER]: 0.001005 kg; lognormal SD95 1.10306
- Disposal, plastics bucket 18 l [CH]: 0.04 p; lognormal SD95 1.10306
- Limestone, milled, loose, at plant [CH]: 0.65325 kg; lognormal SD95 1.10306
  (2;3;1;2;2)
- Quicklime, milled, loose, at plant [CH]: 0.0931 kg; lognormal SD95 1.10306

## Sources
- Kasser U., R. Frischknecht, M. Klingler, D. Savi, R. Itten, F. Wyss,P. Stolz, L. Tschuemperlin, 2016, 2016 - Renewal and exp. of LCA data in KBOB - Kasser, -, Buero fuer Umweltchemie, treeze Ltd., Zuerich and Uster, CH
U. Kasser, R. Frischknecht, M. Klingler, D. Savi, R. Itten, F. Wyss,P. Stolz, L. Tschümperlin 2016 (2015Z) Erneuerung und Erweiterung der Ökobilanzdaten in der KBOB-Liste "Ökobilanzdaten im Baubereich", Projekt QualiBOB. unknown.

First author: U. Kasser, R. Frischknecht, M. Klingler, D. Savi, R. Itten, F. Wyss,P. Stolz, L. Tschümperlin 2016
Year: 2015Z
Place of publication: unknown
Original title: Erneuerung und Erweiterung der Ökobilanzdaten in der KBOB-Liste "Ökobilanzdaten im Baubereich", Projekt QualiBOB
