# Ozone, liquid, at plant

Dataset: EcoSpold 1, unit process
Functional unit: 1 kg
Category: chemicals / gases
Geography: RER
Time period: 2000-01 to 2000-12
Generated by: Roland Hischier
accessRestrictedTo: 0
copyright: true

## General comment
The functional unit is 1 kg of liquid ozone. Large uncertainty of the process data due to weak data on the production process.;
CAS number: 010028-15-6;
Formula: O3;

## Included processes
Energy consumption, estimation of cooling water and infrastructure. Not included is the input of 38.2 kg air (representing 8 kg of oxygen) and the output of the remaining parts of this input (as nitrogen, carbon dioxide, oxygen ....).

## Geography
Data used for energy are from EU-IPPC report and represent average European situation.

## Technology
Production of ozone from air in a corona discharge system.

## Reference product
- Ozone, liquid, at plant [RER]: 1 kg
  Europe

## Inputs from technosphere
- Chemical plant, organics [RER]: 4e-10 p; lognormal SD95 3.2
  (5,na,na,na,na,na); estimation
- Electricity, medium voltage, production ENTSO-E, at grid: 15 kWh; lognormal SD95 1.2
  (2,4,1,1,1,5); data from EU IPPC report & 1 producer

## Inputs from nature
- Water, cooling, unspecified natural origin/m3 [resources, in water]: 0.024 m3; lognormal SD95 1.2
  (2,4,1,1,1,5); data from EU IPPC report & 1 producer

## Emissions to nature
- Ozone [emissions to air, high. pop.]: 0.002 kg; lognormal SD95 5.4
  (5,5,na,na,na,5); estimation
- Heat, waste [emissions to air, high. pop.]: 54 MJ; lognormal SD95 1.2
  (2,4,1,1,1,5); calculated from electricity input
- Water [emissions to water, unspecified]: 22.8 kg; lognormal SD95 2.5196
  (5,5,5,5,5,BU:1.05); All uncertainty-values set to 5.0 by default. Balance of input water

## Extrapolations
Electricity consumption represents the upper limit reported in EU-IPPC report.

## Sources
- Hischier R., 2007, 2007 - LCI packagings and graphical papers - Hischier, Final report ecoinvent data v2.0, 11, Swiss Centre for LCI, Empa - TSL, Duebendorf and St. Gallen, CH
Hischier R. (2007) Life Cycle Inventories of Packaging and Graphical Paper. Final report ecoinvent data v2.0. Volume: 11. Swiss Centre for LCI, Empa - TSL. Dübendorf, CH.
Type: Measurement on site
Source: CD-ROM
First author: Hischier R.
Year: 2007
Title of anthology: Final report ecoinvent data v2.0
Place of publication: Dübendorf, CH
Publisher: Swiss Centre for LCI, Empa - TSL
Volume No: 11

## Validation
Proof reading validation: passed; Other validation: none;
