# Photovoltaic panel factory

Dataset: EcoSpold 1, unit process, infrastructure
Functional unit: 1 p
Category: photovoltaic / production of components
Geography: GLO
Time period: 2000-01 to 2006-12
Production volume: 1500 MWP in 2005
Share of production covered: 0 %
Generated by: Philippe Stolz
accessRestrictedTo: 0
copyright: true

## General comment
Capacity of 10'000 modules per year. Life time assumed to be 25 years.;

## Included processes
Materials and land use for a new production plant.

## Technology
Production plant in an industrial area.

## Time period
Date of literature publications

## Reference product
- Photovoltaic panel factory [GLO]: 1 p
  Global

## Inputs from technosphere
- Building, hall [CH]: 799.15 m2; lognormal SD95 3.0038
  (1,2,1,1,1,3); Environmental report
- Metal working machine, unspecified, at plant [RER]: 4000 kg; lognormal SD95 3.3171
  (5,5,1,1,1,5); rough assumption, 4t weight per laminator

## Inputs from nature
- Occupation, industrial area, vegetation [resources, land]: 23323 m2a; lognormal SD95 1.5051
  (1,2,1,1,1,3); 25a occupation
- Occupation, traffic area, road network [resources, land]: 2870.2 m2a; lognormal SD95 1.5051
  (1,2,1,1,1,3); 25a occupation
- Transformation, to industrial area, vegetation [resources, land]: 932.93 m2; lognormal SD95 2.004
  (1,2,1,1,1,3); Environmental report, weighted average for 3 companies
- Occupation, industrial area, built up [resources, land]: 16466 m2a; lognormal SD95 1.5051
  (1,2,1,1,1,3); 25a occupation
- Transformation, from unknown [resources, land]: 1706.4 m2; lognormal SD95 2.004
  (1,2,1,1,1,3); Environmental report, calculated
- Transformation, to traffic area, road network [resources, land]: 114.81 m2; lognormal SD95 2.004
  (1,2,1,1,1,3); Environmental report, weighted average for 2 companies
- Transformation, to industrial area, built up [resources, land]: 658.65 m2; lognormal SD95 2.004
  (1,2,1,1,1,3); Environmental report, weighted average for 5 companies

## Sampling procedure
Environmental report and literature.

## Sources
- Frischknecht R., Itten R., Sinha P., de Wild-Scholten M., Zhank J., 2020, 2015 - LCI and LCA photovoltaic systems - Frischknecht, Project report, 174, IEA PVPS Task 12, Petten, NL
Frischknecht R.,, Stolz P., Sinha P., de Wild-Scholten M. (2020) Life Cycle Inventories and Life Cycle Assessments of Photovoltaic Systems. Project report. Volume: 174. IEA PVPS Task 12.
Type: Separate publication
Source: Report
First author: Frischknecht R.,
Other authors: Stolz P., Sinha P., de Wild-Scholten M.
Year: 2020
Title of anthology: Project report
Publisher: IEA PVPS Task 12
Volume No: 174
Original title: Life Cycle Inventories and Life Cycle Assessments of Photovoltaic Systems

## Validation
Proof reading validation: 30.09.2020; Other validation: G:\Projekte laufend\174 Photovoltaic, IEA Task 12\2017 Global supply chain\EcoSpold\[174-photovoltaics-global-supply-chain-v2.5.xlsx]X-Process;
