# Paper, recycling, with deinking, at plant

Dataset: EcoSpold 1, unit process
Functional unit: 1 kg
Category: paper+ board / graphic paper
Geography: RER
Time period: 2000-01 to 2000-12
Production volume: no information available in CEPI statistics
Generated by: Roland Hischier
accessRestrictedTo: 0
copyright: true

## Included processes
This module includes the European recyclin paper production with deinking - including deinking of waste paper, paper production, energy production on-site, internal waste water treatment and transports of the auxillaries to the paper mill. Not included is the transport of waste paper to the mill, as this is already included in the used waste paper datasets.; Geography: Data from two European producers used as European average data.

## Technology
Average of present used technology

## Reference product
- Paper, recycling, with deinking, at plant [RER]: 1 kg
  Europe

## Inputs from technosphere
- Core board, at plant [RER]: 0.0022 kg; lognormal SD95 1.14
  (3,3,1,1,1,3); data from one European producer
- Light fuel oil, burned in industrial furnace 1MW, non-modulating [RER]: 0.656 MJ; lognormal SD95 1.09
  (2,2,1,1,1,3); according to CEPI energy statistics
- Aluminium sulphate, powder, at plant [RER]: 0.0159 kg; lognormal SD95 1.1
  (2,3,1,1,1,3); average from one producer and a German LCA study
- Disposal, textiles, soiled, 25% water, to municipal incineration [CH]: 0.000464 kg; lognormal SD95 1.14
  (3,3,1,1,1,3); average data from two producers
- Disposal, ash from deinking sludge, 0% water, to residual material landfill [CH]: 0.0778 kg; lognormal SD95 1.14
  (3,3,1,1,1,3); average data from two producers
- Sodium hydroxide, 50% in H2O, production mix, at plant [RER]: 0.0157 kg; lognormal SD95 1.1
  (2,3,1,1,1,3); average from one producer and a German LCA study
- Sodium silicate, spray powder 80%, at plant [RER]: 0.0125 kg; lognormal SD95 1.1
  (2,3,1,1,1,3); average from one producer and a German LCA study
- Natural gas, burned in industrial furnace 1MWth [CH]: 6.78 MJ; lognormal SD95 1.09
  (2,2,1,1,1,3); according to CEPI energy statistics
- Waste paper, sorted, for further treatment [RER]: 0.587 kg; lognormal SD95 1.1
  (2,3,1,1,1,3); average from one producer and a German LCA study
- Disposal, municipal solid waste, 22.9% water, to sanitary landfill [CH]: 0.00239 kg; lognormal SD95 1.14
  (3,3,1,1,1,3); average data from two producers
- Rosin size, in paper production, at plant [RER]: 0.0245 kg; lognormal SD95 1.1
  (2,3,1,1,1,3); average from one producer and a German LCA study
- Disposal, wood ash mixture, pure, 0% water, to sanitary landfill [CH]: 0.0628 kg; lognormal SD95 1.14
  (3,3,1,1,1,3); average data from two producers
- Kaolin, at plant [RER]: 0.0992 kg; lognormal SD95 1.1
  (2,3,1,1,1,3); average from one producer and a German LCA study
- Sheet rolling, steel [RER]: 0.0002 kg; lognormal SD95 1.14
  (3,3,1,1,1,3); data from one European producer
- Polyethylene, HDPE, granulate, at plant [RER]: 0.0006 kg; lognormal SD95 1.14
  (3,3,1,1,1,3); data from one European producer
- Hard coal, burned in industrial furnace 1-10MW [RER]: 1.55 MJ; lognormal SD95 1.09
  (2,2,1,1,1,3); according to CEPI energy statistics
- Heavy fuel oil, burned in industrial furnace 1MW, non-modulating [RER]: 0.656 MJ; lognormal SD95 1.09
  (2,2,1,1,1,3); according to CEPI energy statistics
- Hydrogen peroxide, 50% in H2O, at plant [RER]: 0.0211 kg; lognormal SD95 1.1
  (2,3,1,1,1,3); average from one producer and a German LCA study
- Waste paper, mixed, from public collection, for further treatment [RER]: 0.587 kg; lognormal SD95 1.1
  (2,3,1,1,1,3); average from one producer and a German LCA study
- Disposal, hazardous waste, 0% water, to underground deposit [DE]: 0.00012 kg; lognormal SD95 1.14
  (3,3,1,1,1,3); average data from two producers
- Chemicals inorganic, at plant [GLO]: 0.0074 kg; lognormal SD95 1.1
  (2,3,1,1,1,3); average from one producer and a German LCA study
- Transport, freight, lorry, fleet average [RER]: 0.0248 tkm; lognormal SD95 2.09
  (4,5,na,na,na,na); standard distances
- Transport, freight, rail [RER]: 0.149 tkm; lognormal SD95 2.09
  (4,5,na,na,na,na); standard distances
- Disposal, paper, 11.2% water, to municipal incineration [CH]: 0.00143 kg; lognormal SD95 1.14
  (3,3,1,1,1,3); average data from two producers
- Disposal, wood untreated, 20% water, to municipal incineration [CH]: 0.00025 kg; lognormal SD95 1.14
  (3,3,1,1,1,3); average data from two producers
- Solid unbleached board, SUB, at plant [RER]: 0.0367 kg; lognormal SD95 1.14
  (3,3,1,1,1,3); data from one European producer
- EUR-flat pallet [RER]: 0.0013 p; lognormal SD95 1.14
  (3,3,1,1,1,3); data from one European producer
- Kraft paper, unbleached, at plant [RER]: 0.0069 kg; lognormal SD95 1.14
  (3,3,1,1,1,3); data from one European producer
- Steel, converter, unalloyed, at plant [RER]: 0.0002 kg; lognormal SD95 1.14
  (3,3,1,1,1,3); data from one European producer
- Potato starch, at plant [DE]: 0.0519 kg; lognormal SD95 1.1
  (2,3,1,1,1,3); average from one producer and a German LCA study
- Disposal, plastics, mixture, 15.3% water, to municipal incineration [CH]: 0.0045 kg; lognormal SD95 1.14
  (3,3,1,1,1,3); average data from two producers
- Paper mill, integrated [RER]: 5.44e-11 p; lognormal SD95 3.05
  (4,na,na,na,na,na); own assumption
- Electricity, medium voltage, production ENTSO-E, at grid: 0.79 kWh; lognormal SD95 1.1
  (2,3,1,1,1,3); average from two producer and a German LCA study
- Disposal, steel, 0% water, to municipal incineration [CH]: 0.0005 kg; lognormal SD95 1.14
  (3,3,1,1,1,3); average data from two producers

## Inputs from nature
- Water, well [resources, in water]: 0.017 m3; lognormal SD95 1.1
  (2,3,1,1,1,3); average from two producer and a German LCA study

## Emissions to nature
- Heat, waste [emissions to air, high. pop.]: 2.84 MJ; lognormal SD95 1.1
  (2,3,1,1,1,3); calculated from input
- BOD5, Biological Oxygen Demand [emissions to water, river]: 0.00041 kg; lognormal SD95 1.51
  (2,3,1,1,1,3); average from one producer and a German LCA study
- COD, Chemical Oxygen Demand [emissions to water, river]: 0.00342 kg; lognormal SD95 1.51
  (2,3,1,1,1,3); average from one producer and a German LCA study
- TOC, Total Organic Carbon [emissions to water, river]: 0.0105 kg; lognormal SD95 1.51
  (2,3,1,1,1,3); average from one producer and a German LCA study
- Phosphorus [emissions to water, river]: 3.06e-6 kg; lognormal SD95 1.51
  (2,3,1,1,1,3); average from one producer and a German LCA study
- Nitrogen [emissions to water, river]: 0.00021 kg; lognormal SD95 1.51
  (2,3,1,1,1,3); average from one producer and a German LCA study
- Suspended solids, unspecified [emissions to water, river]: 0.00125 kg; lognormal SD95 1.51
  (2,3,1,1,1,3); average from one producer and a German LCA study
- AOX, Adsorbable Organic Halogen as Cl [emissions to water, river]: 9.67e-6 kg; lognormal SD95 1.51
  (2,3,1,1,1,3); average from one producer and a German LCA study
- Water [emissions to water, unspecified]: 15.3 kg; lognormal SD95 2.5196
  (5,5,5,5,5,BU:1.05); All uncertainty-values set to 5.0 by default. Balance of input water

## Sources
- Hischier R., 2007, 2007 - LCI packagings and graphical papers - Hischier, Final report ecoinvent data v2.0, 11, Swiss Centre for LCI, Empa - TSL, Duebendorf and St. Gallen, CH
Hischier R. (2007) Life Cycle Inventories of Packaging and Graphical Paper. Final report ecoinvent data v2.0. Volume: 11. Swiss Centre for LCI, Empa - TSL. Dübendorf, CH.
Type: Measurement on site
Source: CD-ROM
First author: Hischier R.
Year: 2007
Title of anthology: Final report ecoinvent data v2.0
Place of publication: Dübendorf, CH
Publisher: Swiss Centre for LCI, Empa - TSL
Volume No: 11

## Validation
Proof reading validation: Passed; Other validation: none;
