# Treatment, LCD module production effluent, to wastewater treatment, class 2

Dataset: EcoSpold 1, unit process
Functional unit: 1 m3
Category: wastewater treatment / unspecified
Geography: CH
Time period: 2004-01 to 2004-12
Generated by: Roland Hischier
accessRestrictedTo: 0
copyright: true

## General comment
Wastewater purified in a moderatly large municipal wastewater treatment plant (capacity class 2), with an average capacity size of 71100 per-captia-equivalents PCE. \nWastewater contains (in kg/m3): COD: 2.6 (GSD=122.5%);

## Included processes
Infrastructure materials for municipal wastewater treatment plant, transports, dismantling. Land use burdens.

## Technology
Three stage wastewater treatment (mechanical, biological, chemical) including sludge digestion (fermentation) according to the average technology in Switzerland

## Reference product
- Treatment, LCD module production effluent, to wastewater treatment, class 2 [CH]: 1 m3
  SWITZERLAND

## Inputs from technosphere
- Residual material landfill facility [CH]: 2.5799e-12 p; lognormal SD95 1.4495
  burden from sludge incineration. Uncertainty calculated from wastewater composition and treatment model
- Chromium oxide, flakes, at plant [RER]: 1.1592e-6 kg; lognormal SD95 4.1037
  (same comment as for Residual material landfill facility)
- Cement, unspecified, at plant [CH]: 0.00049534 kg; lognormal SD95 1.5179
  (same comment as for Residual material landfill facility)
- Wastewater treatment plant, class 2 [CH]: 1.9883e-9 p; lognormal SD95 1
  uncertainty heeded in exchanges of the module
- Sodium hydroxide, 50% in H2O, production mix, at plant [RER]: 9.8603e-5 kg; lognormal SD95 1.6584
  (same comment as for Residual material landfill facility)
- Municipal waste incineration plant [CH]: 4.5077e-10 p; lognormal SD95 1.1405
  (same comment as for Residual material landfill facility)
- Electricity from waste, at municipal waste incineration plant [CH]: 0.25923 kWh; lognormal SD95 3.8046
  (same comment as for Residual material landfill facility)
- Disposal, paper, 11.2% water, to municipal incineration [CH]: 0.0155 kg; lognormal SD95 1.07
  direct wastewater treatment plant burden. Uncertainty calculated from wastewater composition and treatment model
- Heat from waste, at municipal waste incineration plant [CH]: 1.5122 MJ; lognormal SD95 1.1506
  (same comment as for Residual material landfill facility)
- Titanium dioxide, production mix, at plant [RER]: 5.6801e-5 kg; lognormal SD95 4.1037
  (same comment as for Residual material landfill facility)
- Ammonia, liquid, at regional storehouse [CH]: 0.0019843 kg; lognormal SD95 2.3097
  (same comment as for Residual material landfill facility)
- Slag compartment [CH]: 7.8367e-12 p; lognormal SD95 1.4438
  (same comment as for Residual material landfill facility)
- Natural gas, burned in industrial furnace 1MW [CH]: 0.19352 MJ; lognormal SD95 2.3097
  (same comment as for Residual material landfill facility)
- Process-specific burdens, slag compartment [CH]: 0.0044082 kg; lognormal SD95 1.4438
  (same comment as for Residual material landfill facility)
- Disposal, plastics, mixture, 15.3% water, to municipal incineration [CH]: 0.0155 kg; lognormal SD95 1.07
  (same comment as for Disposal, paper, 11.2% water, to municipal incineration)
- Slurry spreading, by vacuum tanker [CH]: 0.005854 m3; lognormal SD95 1.0937
  burden from sludge spreading. Uncertainty calculated from wastewater composition and treatment model
- Process-specific burdens, municipal waste incineration [CH]: 1.8031 kg; lognormal SD95 1.1405
  (same comment as for Residual material landfill facility)
- Hydrochloric acid, 30% in H2O, at plant [RER]: 8.8797e-8 kg; lognormal SD95 1.5711
  (same comment as for Residual material landfill facility)
- Electricity, low voltage, at grid [CH]: 4.0522 kWh; lognormal SD95 1.4155
  (same comment as for Disposal, paper, 11.2% water, to municipal incineration)
- Process-specific burdens, residual material landfill [CH]: 0.0012383 kg; lognormal SD95 1.4495
  (same comment as for Residual material landfill facility)
- Chemicals inorganic, at plant [GLO]: 1.48e-7 kg; lognormal SD95 1.5711
  (same comment as for Residual material landfill facility)
- Quicklime, milled, packed, at plant [CH]: 1.7877e-5 kg; lognormal SD95 1.6802
  (same comment as for Residual material landfill facility)
- Transport, freight, rail [RER]: 0.0050227 tkm; lognormal SD95 2.2234
  direct wastewater treatment plant burden plus burden from sludge incineration. Uncertainty calculated from wastewater composition and treatment model
- Transport, freight, lorry, 16t-32t gross weight, fleet average [CH]: 0.1562 tkm; lognormal SD95 1.0749
  (same comment as for Transport, freight, rail)
- Sewer grid, class 2 [CH]: 1.6832e-7 km; lognormal SD95 1
  uncertainty heeded in exchanges of the module
- Disposal, cement, hydrated, 0% water, to residual material landfill [CH]: 0.0012383 kg; lognormal SD95 1.5179
  (same comment as for Residual material landfill facility)

## Emissions to nature
- Fluoride [emissions to water, river]: 0.016 kg; lognormal SD95 4.9019
  sewer overload discharge plus direct wastewater treatment plant emission plus emission from sludge incineration. Uncertainty calculated from wastewater composition and treatment model
- Ammonia [emissions to air, high. pop.]: 0.0098071 kg; lognormal SD95 2.639
  direct digester gas emission plus emission from sludge incineration plus emission from sludge spreading. Uncertainty calculated from wastewater composition and treatment model
- Carbon monoxide, fossil [emissions to air, high. pop.]: 0.0054259 kg; lognormal SD95 1.9969
  emission from sludge incineration. Uncertainty calculated from wastewater composition and treatment model
- Nitrate [emissions to water, river]: 1.3302 kg; lognormal SD95 1.3168
  (same comment as for Fluoride)
- Nitrite [emissions to water, river]: 0.017734 kg; lognormal SD95 1.5041
  direct wastewater treatment plant emission. Uncertainty calculated from wastewater composition and treatment model
- Cyanide [emissions to air, high. pop.]: 3.5399e-5 kg; lognormal SD95 2.4331
  (same comment as for Carbon monoxide, fossil)
- Ammonium, ion [emissions to water, river]: 0.30365 kg; lognormal SD95 1.342
  (same comment as for Nitrite)
- TOC, Total Organic Carbon [emissions to water, river]: 0.26035 kg; lognormal SD95 1.4265
  (same comment as for Fluoride)
- Heat, waste [emissions to water, river]: 37.088 MJ; lognormal SD95 1.3854
  direct wastewater treatment plant emission plus emission from sludge incineration. Uncertainty calculated from wastewater composition and treatment model
- DOC, Dissolved Organic Carbon [emissions to water, river]: 0.24376 kg; lognormal SD95 1.4606
  (same comment as for Fluoride)
- Nitrate [emissions to water, groundwater, long-term]: 0.0014129 kg; lognormal SD95 1.5118
  (same comment as for Carbon monoxide, fossil)
- DOC, Dissolved Organic Carbon [emissions to water, groundwater, long-term]: 0.0035052 kg; lognormal SD95 1.717
  (same comment as for Carbon monoxide, fossil)
- Carbon [emissions to soil, agricultural]: 0.22637 kg; lognormal SD95 1.6656
  emission from sludge spreading. Uncertainty calculated from wastewater composition and treatment model
- Methane, fossil [emissions to air, high. pop.]: 0.016997 kg; lognormal SD95 1.8775
  (same comment as for Carbon monoxide, fossil)
- Nitrogen [emissions to water, river]: 0.013494 kg; lognormal SD95 1.5053
  (same comment as for Nitrite)
- COD, Chemical Oxygen Demand [emissions to water, river]: 0.50384 kg; lognormal SD95 1.4736
  (same comment as for Fluoride)
- COD, Chemical Oxygen Demand [emissions to water, groundwater, long-term]: 0.0088583 kg; lognormal SD95 1.717
  (same comment as for Carbon monoxide, fossil)
- NMVOC, non-methane volatile organic compounds, unspecified origin [emissions to air, high. pop.]: 7.7225e-5 kg; lognormal SD95 2.5292
  direct digester gas emission. Uncertainty calculated from wastewater composition and treatment model
- BOD5, Biological Oxygen Demand [emissions to water, groundwater, long-term]: 0.0028975 kg; lognormal SD95 1.717
  (same comment as for Carbon monoxide, fossil)
- Heat, waste [emissions to air, high. pop.]: 33.458 MJ; lognormal SD95 1.375
  (same comment as for Heat, waste)
- Nitrogen oxides [emissions to air, high. pop.]: 0.019275 kg; lognormal SD95 1.5125
  direct digester gas emission plus emission from sludge incineration. Uncertainty calculated from wastewater composition and treatment model
- Dinitrogen monoxide [emissions to air, high. pop.]: 0.0028538 kg; lognormal SD95 1.4291
  direct wastewater treatment plant emission plus direct digester gas emission plus emission from sludge incineration plus emission from sludge spreading. Uncertainty calculated from wastewater composition and treatment model
- BOD5, Biological Oxygen Demand [emissions to water, river]: 0.31953 kg; lognormal SD95 1.4543
  (same comment as for Fluoride)
- Carbon dioxide, fossil [emissions to air, high. pop.]: 6.2311 kg; lognormal SD95 1.3548
  (same comment as for Carbon monoxide, fossil)
- TOC, Total Organic Carbon [emissions to water, groundwater, long-term]: 0.0035052 kg; lognormal SD95 1.717
  (same comment as for Carbon monoxide, fossil)

## Sources
- Hischier R., Classen M., Lehmann M., Scharnhorst W., 2007, 2007 - LCI electric and electronic equipment - Hischier, Final report ecoinvent Data v2.0, 18, Swiss Centre for LCI, Empa - TSL, Duebendorf and St. Gallen, CH
Hischier R., Classen M., Lehmann M., Scharnhorst W. (2007) Life Cycle Inventories of Electric and Electronic Equipment - Production, Use & Disposal. Final report ecoinvent Data v2.0. Volume: 18. Swiss Centre for LCI, Empa - TSL. Duebendorf and St. Gallen, CH.
Type: Measurement on site
Source: CD-ROM
First author: Hischier R.
Other authors: Classen M., Lehmann M., Scharnhorst W.
Year: 2007
Title of anthology: Final report ecoinvent Data v2.0
Place of publication: Duebendorf and St. Gallen, CH
Publisher: Swiss Centre for LCI, Empa - TSL
Volume No: 18
Original title: Life Cycle Inventories of Electric and Electronic Equipment - Production, Use & Disposal

## Validation
Proof reading validation: passed.; Other validation: none;
