# xx Esterquat, coconut oil and palm kernel oil, at plant

Dataset: EcoSpold 1, unit process
Functional unit: 1 kg
Category: material, obsolete / chemicals, obsolete\washing agents, obsolete\tensides, obsolete
Geography: RER
Time period: 2000-01 to 2000-12
Generated by: Rainer Zah
accessRestrictedTo: 0
copyright: true

## General comment
data based on the ECOSOL study of the European surfactant industry. Allocations in multioutput processes were made, using the relative mass outputs of products.;

## Included processes
This module contains material and energy input, production of waste and emissions for the production of esterquat out of palm and coconut oil. Transports and infrastructure have been estimated. No water consumption and no process emissions are included.

## Geography
Data based on the European esterquat production

## Technology
Average technology for the production of esterquat out of palm kernel oil and coconut oil by esterification with triethanolamine and quaternication with DMS. Data representing typical European production mix in the mid 90s.

## Time period
data of published literature

## Reference product
- xx Esterquat, coconut oil and palm kernel oil, at plant [RER]: 1 kg
  Europe

## Inputs from technosphere
- Transport, freight, lorry, fleet average [RER]: 0.105 tkm; lognormal SD95 2.1
  (2,3,3,2,1,4);
- Palm kernel oil, at oil mill [MY]: 0.3 kg; lognormal SD95 1.3
  (2,3,3,2,1,4);
- Transport, freight, rail [RER]: 0.632 tkm; lognormal SD95 2.1
  (2,3,3,2,1,4);
- Triethanolamine, at plant [RER]: 0.17 kg; lognormal SD95 1.3
  (2,3,3,2,1,4);
- Chemical plant, organics [RER]: 4e-10 p; lognormal SD95 3.1
  (2,3,3,2,1,4);
- Crude coconut oil, at plant [PH]: 0.3 kg; lognormal SD95 1.3
  (2,3,3,2,1,4);
- Nitrogen, liquid, at plant [RER]: 0.0028 kg; lognormal SD95 1.3
  (2,3,3,2,1,4);
- Heat, unspecific, in chemical plant [RER]: 2.11 MJ; lognormal SD95 1.3
  (2,3,3,2,1,4);
- Treatment, sewage, unpolluted, to wastewater treatment, class 3 [CH]: 0.00026 m3; lognormal SD95 1.3
  (2,3,3,2,1,4);
- Isopropanol, at plant [RER]: 0.15 kg; lognormal SD95 1.3
  (2,3,3,2,1,4);
- Dimethyl sulphate, at plant [RER]: 0.13 kg; lognormal SD95 1.3
  (2,3,3,2,1,4);

## Sampling procedure
data out of ECOSOL study of European Surfactant Industry. Common translation rules used, reported in Chemical report (Althaus et al. 2003).

## Sources
- Zah R., Hischier R., 2007, 2007 - LCI detergents - Zah, Final report ecoinvent data v2.0, 12, Swiss Centre for LCI, Empa - TSL, Duebendorf and St. Gallen, CH
Zah R., Hischier R. (2007) Life Cycle Inventories of Detergents. Final report ecoinvent data v2.0. Volume: 12. Swiss Centre for LCI, Empa - TSL. Dübendorf, CH.
Type: Measurement on site
Source: CD-ROM
First author: Zah R.
Other authors: Hischier R.
Year: 2007
Title of anthology: Final report ecoinvent data v2.0
Place of publication: Dübendorf, CH
Publisher: Swiss Centre for LCI, Empa - TSL
Volume No: 12

## Validation
Proof reading validation: Passed.; Other validation: none;
